# Soil remediation;In-situ;In-situ Chemical Oxidation;repair process;soil;

Dataset: ILCD process, Unit process, single operation
Geography: CN
Reference year: 2021
Classification: Unit processes / Other Services / Repair and maintenance
Generated by: Wang Yipeng, wangyp@caep.org.cn
Owner: Tiangong LCI Data Working Group
Review: Dependent internal review by Tiangong LCI Data Working Group
Amounts: no units in this file; such an amount is in the reference unit of its flow, which a separate flow dataset defines
copyright: false
licenseType: Free of charge for all users and uses

## General comment
repair process

## Technology and included processes
Destruction of the molecular structure of organic pollutants

## Technical purpose
This data set pertains to the process of in-situ soil remediation, specifically in-situ chemical oxidation, which is employed to destroy the molecular structure of organic pollutants within the soil. This technique is intended for use in environmental engineering and land rehabilitation where direct treatment of contaminated soil on-site is feasible.

## Reference product
- Remediated soil: 1; input; measured

## Inputs
- Electricity: 1945.44; measured
- Stainless Steel: 50; measured
- contaminated soil: 1000; measured

## Outputs
- sulfate: 12.492; measured
- chloride: 15; measured
- carbon dioxide (fossil): 30.4; measured
- contaminated soil: 1; measured

## Use advice
Users of this data set should note that it includes all major raw materials and essential energy consumption within the unit process of the soil remediation by in-situ chemical oxidation. It is imperative to consider the complete life cycle of the remediation process, including pre-treatment, actual oxidation, and post-treatment phases. Users should model the use-phase behavior accounting for the efficiency of the oxidation process and potential environmental releases. Exclusions of any co-products or recycling should be justified within the context of the intended application.

## Review details
Inventory: The internal review was done by several iteration steps concerning raw data validation, raw data documentation, representativity, completeness and consistency of modelling with regard to ISO 14040 and 14044.

## Data sources
- 王顺扬. 基于多目标决策方法改进LCA的污染场地修复技术比选研究.山西大学（硕士论文）,2021.
