# Tower manufacture ; Cable tower (40)

Dataset: ILCD process, Unit process, single operation
Geography: NMG-CN
Reference year: 2017
Classification: Unit processes / Systems / Construction
Functional unit: The functional unit is 1.5 MW wind turbine
LCI method principle: Attributional
LCI method approaches: Allocation
Generated by: Yunzhi Zhao, ll10088@163.com
Owner: Tiangong LCI Data Working Group
Review: Dependent internal review by Tiangong LCI Data Working Group
Amounts: no units in this file; such an amount is in the reference unit of its flow, which a separate flow dataset defines
copyright: false
licenseType: Free of charge for all users and uses

## General comment
The manufactured iron towers, equipped to support 40 cable lines, are specifically used for the construction of wind farms. These towers are part of the infrastructure that enables the mounting of 33 domestically produced 1.5 megawatt (MW) wind turbines, which are utilised for generating renewable energy and reducing environmental impacts through substitution effects.

## Geography
The data regarding the parameters of wind power has been collected from Wang (2012). A wind farm equipped with 33 domestic 1.5 megawatts (MW) wind turbines is regarded as a case study to analyze the environmental impact and its substitution effects. The wind farm is located in the northeast of Inner Mongolia, the province in which most of China’s wind power is installed (Xia and Song, 2017).

## Reference product
- Wind foundation tower: 40; estimated
  Cable tower

## Inputs
- iron: 2.4e6; calculated
  Steel and iron

## Deviations from the LCI method approaches
The life cycle inventory for wind power is illustrated as follows. The production and manufacturing stage include the production of wind turbines, substations, and cables, which consume a large amount of energy and emit pollutants (Xue et al., 2015).

## Use advice
Users of this LCA data set should consider the context of the wind farm's location in northeast Inner Mongolia, where wind power installation is most prevalent, to assess environmental impact appropriateness. When employing this data, users must account for manufacturing stages encompassing production of wind turbines, substations, and cables, while paying special attention to the energy consumed and pollutants emitted during these processes as documented by Xue et al. (2015). Ensure that the functional unit for assessment corresponds to the 1.5 MW turbine's life cycle.

## Review details
Inventory: The internal review was done by several iteration steps concerning raw data validation, raw data documentation, representativity, completeness and consistency of modelling with regard to ISO 14040 and 14044.

## Data sources
- Li, H., Jiang, H.-D., Dong, K.-Y., Wei, Y.-M. & Liao, H. A comparative analysis of the life cycle environmental emissions from wind and coal power: Evidence from China. Journal of Cleaner Production 248, 119192 (2020).
