# Propylene Production ; Propylene ; Naphtha Route ; Naphtha

Dataset: ILCD process, Unit process, black box
Geography: CN
Reference year: 2010
Classification: Unit processes / Materials production / Organic chemicals
Functional unit: The functional unit is 1t of propylene product
LCI method principle: Attributional
LCI method approaches: Allocation - mass
Generated by: Yanan Ren, renyn15@tsinghua.org.cn
Owner: Tiangong LCI Data Working Group
Review: Dependent internal review by Tiangong LCI Data Working Group
Amounts: no units in this file; such an amount is in the reference unit of its flow, which a separate flow dataset defines
copyright: false
licenseType: Free of charge for all users and uses

## General comment
In 2010, 4 million-ton enterprises of Sinopec and PetroChina; ethylene complex, by-product propylene

## Geography
Four million-ton enterprises of Sinopec and PetroChina in 2010

## Technology and included processes
There are many raw materials for propylene production in my country and the sources are complex, mainly including naphtha, cracked tail oil, ethylene-rich gas and liquefied petroleum gas, etc. Therefore, this study mainly investigates the tube furnace steam cracking method for the production of ethylene, and the upstream raw materials are four products of petroleum refining.

## Technical purpose
The propylene produced via the naphtha route is intended for use in a variety of chemical products including plastics, packaging, textiles, and other consumer goods. This propylene, from Sinopec and PetroChina's four million-ton enterprises, typically comes as a by-product of ethylene production in an ethylene complex and is suitable for large scale synthesis in the petrochemical industry.

## Model description
According to the literature (IPCC, 2006; China Petroleum and Chemical Corporation, 2007), the cooling water, purified air, etc. are discounted, and the unknown pollutant CO2 is estimated

## Reference product
- propene (propylene): 1000; measured
  Acrylic

## Inputs
All rows: measured
- naphtha: 700
- tall oil: 230
  Add cracked tail oil
- LPG - liquefied petroleum gas: 50
  Liquefied gas
- ethene (ethylene): 30
  Ethylene-rich gas
- Electricity: 137.484
  electricity
- light fuel oil: 126.13
  fuel oil
- natural gas: 53.87
  fuel gas

## Outputs
- carbon dioxide (fossil): 560; missing unimportant
  CO2
- carbon monoxide (fossil): 0.03079; measured
  CO
- sulfur dioxide: 1.36854; measured
  SO2
- nitrogen monoxide: 0.30795; measured
  NOx
- methane (fossil): 0.01854; measured
  CH4
- nitrous oxide: 0.00331; measured
  N2O
- Suspended solids, unspecified,Suspended solids, unspecified: 0.31159; measured
  TSP
- Water: 92.72; measured
  wastewater
- chemical oxygen demand: 0.0053; measured
  COD
- ammonia: 0.00033; measured
  NH3-N
- Oils, unspecified: 0.00033; measured
  Oil
- Suspended solids, unspecified,Suspended solids, unspecified: 0.00464; measured
  SS

## Deviations from the LCI method approaches
According to the distribution principle of product mass proportion

## Data selection and combination
The inventory of raw material input, product output, energy consumption and pollutant discharge for propylene production comes from the 4 million-ton enterprises of Sinopec and PetroChina in 2010.

## Use advice
When utilizing this LCA data set, users should consider that the propylene production data is based on the mixed feedstocks of naphtha, cracked tail oil, ethylene-rich gas, and liquefied petroleum gas, reflecting the complex input sources of the Chinese petrochemical industry in 2010. The allocation of environmental impacts is based on the product mass proportion, and this approach needs to be consistently applied when integrating the data into broader assessments. Adjustments have been made in accordance with IPCC and Sinopec guidelines for standardizing emissions and estimating unknown pollutants such as CO2. The functional unit for assessing impacts is 1 tonne of propylene product. Adjustments based on specific use cases, include or exclude such data accordingly.

## Review details
Inventory: The internal review was done by several iteration steps concerning raw data validation, raw data documentation, representativity, completeness and consistency of modelling with regard to ISO 14040 and 14044.

## Data sources
- 赵志仝, 王峰, 赵宁, 李学宽, 魏伟, 孙予罕. 生命周期评价在我国乙烯行业环境评估中的应用. 环境科学学报 34, 3200–3206 (2014).
