# Aluminum blank foil (anode) production ; 0.12 mm aluminum plate roll ; Aluminum ingot

Dataset: ILCD process, Unit process, single operation
Geography: JS-CN
Reference year: 2020
Classification: Unit processes / Materials production / Metals and semimetals
Generated by: Huimin Chang, huiminchang@tsinghua.edu.cn
Owner: Tiangong LCI Data Working Group
Review: Dependent internal review by Tiangong LCI Data Working Group
Amounts: no units in this file; such an amount is in the reference unit of its flow, which a separate flow dataset defines
copyright: false
licenseType: Free of charge for all users and uses

## General comment
铝空白箔（阳极）生产 ; 铝电解电容器（AEC）生产 ; 420V 680uf

## Time period
The investigated manufacturer produced about 1.183 billion AECs of all kinds in 2020.

## Technical purpose
The aluminum blank foil (anode) discussed in this data set is produced for use in manufacturing aluminum electrolytic capacitors (AEC), specifically for a 420V 680uf unit process. These AECs are used mainly in electronic circuits as filters, decoupling capacitors, and for energy storage, supporting applications like power supplies, automotive electronics, and consumer electronics.

## Reference product
- 0.12mm Al blank coil: 1000; measured
  0.12mm Al blank coil [kg] ; Production of Al blank foil (anode)

## Inputs
All rows: measured
- electricity, high voltage, aluminium industry: 2273.68
  Electricity [kWh] ; Al smelting preparation (anode)
- electricity, high voltage, aluminium industry: 111.06
  Electricity [kWh] ; Casting rolling (anode)
- electricity, high voltage, aluminium industry: 186.829
  Electricity [kWh] ; Cold rolling 1 (anode)
- electricity, high voltage, aluminium industry: 504.72
  Electricity [kWh] ; Intermediate annealing 1 (anode)
- electricity, high voltage, aluminium industry: 1061.52
  Electricity [kWh] ; Cold rolling 2 (anode)
- electricity, high voltage, aluminium industry: 180.36
  Electricity [kWh] ; Intermediate annealing 2 (anode)
- electricity, high voltage, aluminium industry: 1796.42
  Electricity [kWh] ; Foil rolling (anode)
- electricity, high voltage, aluminium industry: 467.64
  Electricity [kWh] ; Final annealing (anode)
- aluminium, primary, ingot: 1052.63
  Al ingots (99.99%) [kg] ; Al smelting preparation (anode)
- argon, liquid: 0.189
  Ar gas [kg] ; Al smelting preparation (anode)
- Graphitic lubricant: 0.032
  Graphitic lubricant [kg] ; Casting rolling (anode)
- water, deionised: 2.56
  Deionized water [kg] ; Casting rolling (anode)
- tap water: 1368.42
  Tap water [kg] ; Casting rolling (anode)
- water, deionised: 12.093
  Deionized water [kg] ; Cold rolling 1 (anode)
- heavy fuel oil: 0.387
  Rolling oil [kg} ; Cold rolling 1 (anode)
- water, deionised: 226.748
  Deionized water [kg] ; Cold rolling 2 (anode)
- heavy fuel oil: 7.256
  Rolling oil [kg} ; Cold rolling 2 (anode)
- water, deionised: 302.33
  Deionized water [kg] ; Foil rolling (anode)
- heavy fuel oil: 9.675
  Rolling oil [kg} ; Foil rolling (anode)
- sodium hydroxide, without water, in 50% solution state: 31.8
  NaOH solution (30%) [kg] ; Final annealing (anode)
- nitrogen, liquid: 1.29
  N2 gas[kg] ; Final annealing (anode)

## Outputs
All rows: measured
- aluminium scrap, new: 52.24
  Al scraps [kg] ; Al smelting preparation (anode)
- Dust: 0.389
  Dust[kg] ; Al smelting preparation (anode)
- wastewater, average: 1197.54
  Wastewater [kg] ; Production of Al blank foil (anode)
- Chemical Oxygen Demand (COD): 0.084
  COD [kg] ; Production of Al blank foil (anode)
- Suspended solids, unspecified: 0.084
  SS [kg] ; Production of Al blank foil (anode)
- BOD5, Biological Oxygen Demand: 0.527
  BOD [kg] ; Production of Al blank foil (anode)
- ammonia: 0.024
  NH3-N [kg] ; Production of Al blank foil (anode)

## Data selection and combination
The inventory data of capacitor production come from the AECs’ production factory in Jiangsu Province, China. The cut-off criteria of LCI data collection for each process is coverage of at least 95% of the mass and energy of the input and output flows. The inventory data of anode foil production and cathode foil production is obtained based on the analysis of the manufacturing processes and corresponding process parameters. The upstream data (i.e., aluminum ingots, separator paper, transport, electricity, and water) are acquired from the Gabi software (Version: 10.6.1.35). In detail, the profile of Chineses electricity grid from the China Electric Power Yearbook adopts the reference year 2016. The reference year of aluminum ingot production is 2015. The inaccessible data about ammonium citrate, ammonium pentaborate, NH4H2PO4, and HBO3 are estimated based on chemical equations using the existing materials (reactants) in the Gabi software. The use and end-of-life stage inventory data are obtained based on analysis and calculation.

## Use advice
Users of this LCA data should attribute the appropriate mass and energy flow coverage, ensuring a minimum of 95% is accounted for in the process inputs and outputs. The data set is based on the manufacturing processes for anodes and cathodes for AEC production, with upstream data from Gabi software including aluminum ingots, separator paper, transport, electricity, and water. Reference years for electricity and aluminum ingot production are 2016 and 2015, respectively. Users should note that data for certain chemicals is estimated based on similar chemical compositions available within the software. Methodological adjustments may be needed related to the use and end-of-life stage inventory data to reflect specific use phase behavior and disposal or recycling practices.

## Review details
Inventory: The internal review was done by several iteration steps concerning raw data validation, raw data documentation, representativity, completeness and consistency of modelling with regard to ISO 14040 and 14044.

## Data sources
- Zhang, C., Jing, J., Yun, L., Zheng, Y. & Huang, H. A cradle-to-grave life cycle assessment of high-voltage aluminum electrolytic capacitors in China. J. Clean. Prod. 370, (2022).
