# Beneficiation of Rare Earth Oxides (REO) Rare Earth Oxides (REO);bastnaesite route;Rare Earth Elements (REE) containing ore

Dataset: ILCD process, Unit process, single operation
Geography: CN
Reference year: 2007
Valid until: 2020
Classification: Unit processes / Materials production / Non-energetic raw materials
Functional unit: The study considered 15 different functional units corresponding to different RE metals. The assessment included three main RE production sites in China: REO production in Bayan Obo, Sichuan, and IACs. Primary data were collected for foreground production processes from Chinese and further international scientific literature, industry reports, government and industry surveys. The authors assumed a baseline for aqueous and gaseous emissions using national discharge standards for industry from the Chinese Ministry of
LCI method principle: Attributional
LCI method approaches: Allocation
Generated by: Tao Wang, twang@iue.ac.cn
Owner: Tiangong LCI Data Working Group
Review: Dependent internal review by Tiangong LCI Data Working Group
Amounts: no units in this file; such an amount is in the reference unit of its flow, which a separate flow dataset defines
copyright: false
licenseType: Free of charge for all users and uses

## General comment
The described process pertains to the beneficiation of Rare Earth Oxides (REO), specifically using the bastnaesite route for REE containing ore, from Bayan Obo in the Chinese Southern Provinces. This beneficiation process is a critical unit operation in the production of rare earth oxides (Rare Earth Oxides (REO)), which are integral to a wide spectrum of high-tech applications, from permanent magnets used in wind turbines and electric vehicles to catalysts in petroleum refining and additives in high-strength alloys.

## Geography
Bayan Obo, Chinese Southern Provinces

## Technology and included processes
Because no primary mining data from Bayan Obo were available, LCI data in the studies (Sprecher, Arshi, Marx, Bailey (Classen et al., 2007)) are based on different data sources either from iron mining or in Althaus from phosphate rock mining. Main inputs are energy and blasting agent

## Reference product
- Raw ore: 65.74; input; calculated

## Inputs
- Electricity: 4.32; calculated
- water: 62.04; calculated
- Chemicals inorganic,Chemicals, inorganic: 0.25; calculated
  Inorganic flotation chemicals
- Chemicals organic,Chemicals, organic: 0.053; calculated
  Organic flotation chemicals

## Deviations from the LCI method approaches
Goal of this chapter is to identify the most important differences and uncertainties of crucial parameters in the LCIs and to link those directly to the affected LCIAs. However, comparability of LCIA results shown in Fig. 4 is limited due to different LCIA methods, as already mentioned in the chapter “methods”. All LCIA results are shown in Tables S1 and S3 (Supplementary material). It should also be mentioned that we calculated Althaus' LCIA data, as he provided only the LCI in the ecoinvent database. For this, we rebuilt Althaus' original process “rare earth oxide production from bastnasite” in the GaBi software and evaluated it with two LCIA methods for comparison (Table S1).

## Use advice
When utilizing the LCI data for this beneficiation process, it is important to note that the data are proxies based on iron mining or phosphate rock mining due to the lack of primary mining data from Bayan Obo. This necessitates caution when interpreting the results and extrapolating these for environmental impact assessments of actual REO production. Users must consider the most important differences and uncertainties of crucial parameters in the LCIs, such as energy consumption and emissions. Additionally, since the comparability of LCIA results may be limited due to different methodologies, users should pay attention to the methods used and acknowledge this when comparing different LCIA outcomes. Users are advised to utilize the supplementary tables (S1 and S3) and consider recalculating LCIA data when original processes are available in databases such as the ecoinvent database using a consistent LCIA method for comparison purposes.

## Review details
Inventory: The internal review was done by several iteration steps concerning raw data validation, raw data documentation, representativity, completeness and consistency of modelling with regard to ISO 14040 and 14044.

## Data sources
- Schreiber, A., Marx, J. & Zapp, P. Life Cycle Assessment studies of rare earths production - Findings from a systematic review. Science of The Total Environment 791, 148257 (2021).
