# Biomass aviation fuel bio-oil hydrogenation

Dataset: ILCD process, Unit process, black box
Geography: CN
Classification: Unit processes / Energy carriers and technologies / Renewable fuels
Functional unit: 1 MJ aviation fuel
LCI method principle: Attributional
LCI method approaches: Allocation - gross calorific value
Generated by: Zhang Yixuan, zhangyixuan0444@igsnrr.ac.cn
Owner: Tiangong LCI Data Working Group
Review: Dependent internal review by Tiangong LCI Data Working Group
Amounts: no units in this file; such an amount is in the reference unit of its flow, which a separate flow dataset defines
licenseType: Free of charge for all users and uses

## General comment
Bio-oil hydrogenation technology (HEFA) can use vegetable oil, waste oil and waste animal fat as raw materials, through the conversion of triglycerides in oil, saturated or unsaturated fatty acids, to produce good quality bio-aviation oil.

## Technical purpose
Bio-oil hydrogenation technology (HEFA) is utilized for the production of bio-aviation fuel, using vegetable oil, waste oils, and waste animal fats as feedstocks. The process converts triglycerides and fatty acids found in these oils into high-quality bio-aviation fuel suitable for use in aircraft engines. The product is intended for use as a sustainable alternative to conventional jet fuel in the aviation industry.

## Model description
Build a simulation model of the complete process using Aspen Plus software and perform simulation calculations to obtain the mass flow, energy flow, thermodynamic parameters, and reactor power consumption of each process based on mass balance

## Reference product
- Electricity: 0.0396; input; calculated

## Inputs
- Diesel: 5.04e-5; calculated
- Electricity: 0.0052; calculated
- sodium hydroxide: 6.2e-5; calculated
- Electricity: 1.908e-5; calculated
  hydrocracking

## Outputs
- waste water - untreated: 0.00011, 2.4e-6 (2 entries); calculated
- carbon monoxide (biogenic): 6.6e-5; calculated
  The original article does not distinguish between bio and fossil, and experts judge that this is bio
- hydrocarbons (unspecified): 6.8e-6; calculated

## Deviations from the LCI method approaches
Allocate environmental impact values according to energy allocation, that is, during the emission allocation process, allocate the energy of aviation fuel and other fuels to each MJ of aviation fuel production

## Use advice
When utilizing this data set for life cycle assessment, it is crucial to consider energy allocation principles. The environmental impacts must be allocated based on the energy content of the bio-aviation fuel and any other co-produced fuels. The allocation should be proportionate to the energy provided by each MJ of bio-aviation fuel produced. It is important to ensure that methodological consistency is maintained with the system boundaries, and that the selection of allocation method is justified and in line with the goals of the study.

## Review details
Inventory: The internal review was done by several iteration steps concerning raw data validation, raw data documentation, representativity, completeness and consistency of modelling with regard to ISO 14040 and 14044.

## Data sources
- 朱啸南. 基于生命周期评价的生物航油制备及利用对环境的影响研究. (浙江大学, 2022).
