# cement production;cement, portland-composite cement;new dry process;mixed solid wastes

Dataset: ILCD process, Unit process, black box
Geography: CN
Reference year: 2013
Classification: Unit processes / Materials production / Other mineralic materials
Generated by: #REF!, ysqsophia@gmail.com
Owner: Tiangong LCI Data Working Group
Review: Dependent internal review by Tiangong LCI Data Working Group
Amounts: no units in this file; such an amount is in the reference unit of its flow, which a separate flow dataset defines
copyright: false
licenseType: Free of charge for all users and uses

## General comment
Use the new dry cement production technology as the technical object.The main raw materials required for portland-composite cement production include limestone, clay, iron powder, gypsum, granulated blast furnace slag and fly ash. During the production process, granulated blast furnace slag and fly ash are added to the cement instead of clinker.

## Technology and included processes
The main raw materials required for the production of composite Portland cement include limestone, clay, iron powder, gypsum, granulated blast furnace slag and fly ash. During the production process, granulated blast furnace slag and fly ash are added to the cement instead of clinker. Take The average value of the general Portland cement standard value of GB-175-2007 is used as the raw material data. Among them, the gypsum addition ratio is 5% of the cement quality, and the clinker addition ratio is 60% of the cement quality. Clinker is made of limestone, clay and Iron powder is used as a raw material and is made by false firing.

## Technical purpose
Portland-composite cement production using the new dry process applies predominantly to the construction industry. This cement variant is specifically designed for general construction purposes such as the building of structures, pavements, foundations, and is suitable for both reinforced concrete and pre-stressed concrete. The incorporation of granulated blast furnace slag and fly ash as partial substitutes for clinker not only optimizes the use of by-products from other industrial processes but also contributes to the reduction of CO2 emissions and energy consumption in the cement industry.

## Model description
The functional unit of LCA is 1t of composite Portland cement. The system boundaries include: the transportation and grinding process of granulated blast furnace slag and fly ash, excluding their production process; the mining and transportation of limestone, iron ore, clay, gypsum and coal; cement production and electricity production. The main cement production processes considered at the boundary of the cement system include: ① Mining and transportation of raw materials and transportation of industrial slag; ② Processing and pre-homogenization of raw materials; ③ Mixing of raw materials; ④ Raw meal grinding; ⑤ Raw meal homogenization; ⑥Clinker calcination; ⑦Clinker, gypsum, and industrial waste grinding treatment; ⑧Cement grinding.

## Reference product
- cement, portland-composite cement: 1000
  Composite silicate cement (PC)

## Inputs
- limestone, crushed, for mill: 848.37
  Limestone. Taking the average value of GB-175-2007 General Portland Cement as the raw material data, where the proportion of gypsum addition is 5% of the cement mass and the proportion of clinker addition is 60% of the cement mass. The clinker is made by blending limestone, clay, and iron powder as raw materials and then artificially calcining. Based on the material balance equation in the cement production process, the raw material consumption is obtained, where the material balance equation is: M_raw = M_material + M_decomposition + M_water + M_dust - M_fly_ash, where M_raw is the amount of raw material fed into the system, M_material is the amount of clinker, M_decomposition is the mass of CO2 and H2O decomposed from the raw material, M_water is the moisture content in the raw material, M_dust is the amount of dust in the exhaust gas, and M_fly_ash is the amount of fly ash.
- clay: 143.55
  Clay. Taking the average value of GB-175-2007 General Portland Cement as the raw material data, where the proportion of gypsum addition is 5% of the cement mass and the proportion of clinker addition is 60% of the cement mass. The clinker is made by blending limestone, clay, and iron powder as raw materials and then artificially calcining. Based on the material balance equation in the cement production process, the raw material consumption is obtained, where the material balance equation is: M_raw = M_material + M_decomposition + M_water + M_dust - M_fly_ash, where M_raw is the amount of raw material fed into the system, M_material is the amount of clinker, M_decomposition is the mass of CO2 and H2O decomposed from the raw material, M_water is the moisture content in the raw material, M_dust is the amount of dust in the exhaust gas, and M_fly_ash is the amount of fly ash.
- iron, powder: 26.04
  Iron powder. Taking the average value of GB-175-2007 General Portland Cement as the raw material data, where the proportion of gypsum addition is 5% of the cement mass and the proportion of clinker addition is 60% of the cement mass. The clinker is made by blending limestone, clay, and iron powder as raw materials and then artificially calcining. Based on the material balance equation in the cement production process, the raw material consumption is obtained, where the material balance equation is: M_raw = M_material + M_decomposition + M_water + M_dust - M_fly_ash, where M_raw is the amount of raw material fed into the system, M_material is the amount of clinker, M_decomposition is the mass of CO2 and H2O decomposed from the raw material, M_water is the moisture content in the raw material, M_dust is the amount of dust in the exhaust gas, and M_fly_ash is the amount of fly ash.
- gypsum stone (CaSO4-dihydrate): 50
  Gupsum. Taking the average value of GB-175-2007 General Portland Cement as the raw material data, where the proportion of gypsum addition is 5% of the cement mass and the proportion of clinker addition is 60% of the cement mass. The clinker is made by blending limestone, clay, and iron powder as raw materials and then artificially calcining. Based on the material balance equation in the cement production process, the raw material consumption is obtained, where the material balance equation is: M_raw = M_material + M_decomposition + M_water + M_dust - M_fly_ash, where M_raw is the amount of raw material fed into the system, M_material is the amount of clinker, M_decomposition is the mass of CO2 and H2O decomposed from the raw material, M_water is the moisture content in the raw material, M_dust is the amount of dust in the exhaust gas, and M_fly_ash is the amount of fly ash.
- granulated blast furnace slag: 100
  Gravated blast furnace slag. Taking the average value of GB-175-2007 General Portland Cement as the raw material data, where the proportion of gypsum addition is 5% of the cement mass and the proportion of clinker addition is 60% of the cement mass. The clinker is made by blending limestone, clay, and iron powder as raw materials and then artificially calcining. Based on the material balance equation in the cement production process, the raw material consumption is obtained, where the material balance equation is: M_raw = M_material + M_decomposition + M_water + M_dust - M_fly_ash, where M_raw is the amount of raw material fed into the system, M_material is the amount of clinker, M_decomposition is the mass of CO2 and H2O decomposed from the raw material, M_water is the moisture content in the raw material, M_dust is the amount of dust in the exhaust gas, and M_fly_ash is the amount of fly ash.
- ash: 200
  Fly ash. Taking the average value of GB-175-2007 General Portland Cement as the raw material data, where the proportion of gypsum addition is 5% of the cement mass and the proportion of clinker addition is 60% of the cement mass. The clinker is made by blending limestone, clay, and iron powder as raw materials and then artificially calcining. Based on the material balance equation in the cement production process, the raw material consumption is obtained, where the material balance equation is: M_raw = M_material + M_decomposition + M_water + M_dust - M_fly_ash, where M_raw is the amount of raw material fed into the system, M_material is the amount of clinker, M_decomposition is the mass of CO2 and H2O decomposed from the raw material, M_water is the moisture content in the raw material, M_dust is the amount of dust in the exhaust gas, and M_fly_ash is the amount of fly ash.
- hard coal; 26.3 MJ/kg: 68.4
  Coal. The coal consumption is calculated based on the standard coal consumption and calorific value of large and medium-sized pre-decomposition kilns in China's production lines.
- Electricity: 354.06
  Electricity. Due to limited data on electricity consumption, the electricity consumption of various stages of composite Portland cement production is simplified based on the average electricity consumption in China.

## Outputs
- carbon dioxide (fossil): 604
  CO2. The data on pollutant emissions from limestone and gypsum mining, as well as transportation, electricity production (using national average electricity grid mix and transmission data), and coal mining are obtained from the China Life Cycle Reference Database (CLCD). CO2 emissions during cement production come from two sources: the decomposition of calcium carbonate and magnesium carbonate in raw materials during calcination, and the combustion of coal as fuel.
- sulfur dioxide: 0.372
  SO2. Data on SO2 emission is from the first survey of pollution sources in China's cement manufacturing industry.
- Nitrogen oxides: 1.92
  NOx. Data on NOx emission is from the first survey of pollution sources in China's cement manufacturing industry.
- particles (> PM10): 0.341
  Dust, with an unspecified particle size, is treated as PM > 10 micrometers in diameter. Data on dust emissions during cement production is based on the upper limit of the atmospheric pollutant emissions standard for China's cement industry.
- chemical oxygen demand: 0.0102
  COD. Data on COD emission is from the first survey of pollution sources in China's cement manufacturing industry.
- Oils, unspecified: 0.261
  Oil. Pollutant emission data for limestone and gypsum mining, as well as transportation, electricity production (using national average electricity mix and transmission data) and coal mining data are all from the Chinese Life Cycle Database (CLCD).
- methane (fossil): 0.733
  Methane. Pollutant emission data for limestone and gypsum mining, as well as transportation, electricity production (using national average electricity mix and transmission data) and coal mining data are all from the Chinese Life Cycle Database (CLCD).
- mercury: 0.0079
  Mercury. Pollutant emission data for limestone and gypsum mining, as well as transportation, electricity production (using national average electricity mix and transmission data) and coal mining data are all from the Chinese Life Cycle Database (CLCD).

## Use advice
When utilizing this dataset for Life Cycle Assessment of Portland-composite cement, it's crucial to adhere to the defined system boundaries which include the transportation and grinding of granulated blast furnace slag and fly ash, as well as the mining and transportation of limestone, iron ore, clay, gypsum, and coal. Processes like electricity production for the manufacturing should be considered in the impact assessment. The dataset should be applied assuming the recycling and energy recovery aspects are excluded. Ensure that the addition ratios for clinker and gypsum are at 60% and 5% of the cement mass respectively, as per the GB-175-2007 standard when applying material data to ensure accuracy and consistency.

## Review details
Inventory: The internal review was done by several iteration steps concerning raw data validation, raw data documentation, representativity, completeness and consistency of modelling with regard to ISO 14040 and 14044.

## Data sources
- 徐小宁, 陈郁, 张树深, 张芸, & 宋国宝. (2013). 复合硅酸盐水泥的生命周期评价. 环境科学学报, 33(9), 2632–2638.
