# Plexiglass ; PMMA: Polymethyl Methacrylate (also known as Acrylic or Plexiglass); Two-stage condensation process

Dataset: ILCD process, Unit process, single operation
Geography: JX-CN
Classification: Unit processes / Materials production / Glass and ceramics
Generated by: He xiaxia, 18616148319@163.com
Owner: Tiangong LCI Data Working Group
Review: Dependent internal review by Tiangong LCI Data Working Group
Amounts: no units in this file; such an amount is in the reference unit of its flow, which a separate flow dataset defines
copyright: false
licenseType: Free of charge for all users and uses

## General comment
This data set pertains to the production of Polymethyl methacrylate (PMMA), commonly known as acrylic glass or plexiglass. The process involves a two-stage condensation reaction to synthesize PMMA monomers. The resulting PMMA is a transparent thermoplastic often used in applications requiring transparency and high impact resistance, such as in the manufacturing of window glass, lenses, and displays.

## Reference product
- methyl methacrylate: 997.513; measured

## Inputs
- Electricity: 405.36; measured
- methyl methacrylate: 1015.48; measured

## Outputs
- waste heat: 17.964; measured

## Use advice
Users of this data set should pay special attention to the specific boundary conditions of the two-stage condensation process when applying it to life cycle assessments. Include all relevant energy and material inputs, and consider the potential end-of-life scenarios, such as recycling or energy recovery, which could affect the LCA results. The technological applicability and assumptions of the data set should align with the specific PMMA applications being assessed. Account for any transportation of intermediate or final products if applicable.

## Review details
Inventory: The internal review was done by several iteration steps concerning raw data validation, raw data documentation, representativity, completeness and consistency of modelling with regard to ISO 14040 and 14044.

## Data sources
- 江西旺达新材料有限公司年产20000吨有机玻璃原料生产项目
