# cement production|cement, ordinary portland cement, 42.5MPa|new dry process, 2000 t/d|mixed solid wastes

Dataset: ILCD process, LCI结果
Geography: CN
Classification: Materials production / Other mineralic materials
Generated by: Siqi Yang
Amounts: no units in this file; such an amount is in the reference unit of its flow, which a separate flow dataset defines
copyright: false

## General comment
The new dry process produces ordinary portland cement by mixing solid waste materials, namely fly ash and slag.

## Model description
The functional unit is 1 ton of cement. The system boundary is the cement production process.

## Reference product
- cement, ordinary portland cement, 42.5MPa: 1000
  P.O.42.5

## Inputs
All rows: measured
- limestone, crushed, for mill: 1073.71
  Limestone
- sandstone: 69.77
  Sandstone
- iron, powder: 28.59
  Iron powder
- gypsum (desulphurized): 51.14
  Gupsum
- ash: 98.02
  Fly ash
- blast furnace slag: 137.55
  Blast furnace slag
- hard coal, run-of-mine: 130.18
  Coal. The original data was 130.2, but in another paper by the same author, "Quantitative Evaluation of the Physical and Chemical Environmental Conditions in the Life Cycle of Building Materials," the data was 130.18, which is more accurate, so it is used here. The original text also provides the heat consumption (i.e., coal consumption) as 2745617KJ. The air-dried low calorific value of coal is calculated as 23301kJ/kg. The amount of coal used for each ton of clinker burning is 139.7kg, and the amount of coal used for drying is 2.5kg (here the coal is dried). Since the coal used for drying accounts for only 1.76% of the total coal consumption, for convenience of calculation, it is assumed that all coal consumption is used in the clinker burning process. (with moisture)
- electricity, medium voltage: 435.237
  Power consumption

## Outputs
All rows: missing unimportant
- carbon dioxide: 729.2
  CO2
- sulfur dioxide: 0.0663
  SO2
- Nitrogen oxides: 0.787
  NOx
- Carbon monoxide, non-fossil: 0.00256
  CO
- chemical oxygen demand: 0.0258
  COD
- Suspended solids, unspecified: 0.0196
  SS
- Oils, unspecified: 8.3e-5
  Oil
- particles (> PM10): 0.804
  Dust, with an unspecified particle size, is treated as PM > 10 micrometers in diameter.

## Sampling procedure
A certain cement plant has two new dry production lines with a capacity of 2000 tons per day each.

## Data sources
- 龚志起 & 张智慧. (2004). 水泥生命周期中物化环境状况的研究. 土木工程学报, 5, 86–91.
