# Treatment of waste reverse osmosis module ; mix of incineration and landfilling, CN

Dataset: ILCD process, Unit process, single operation
Geography: US
Reference year: 2022
Classification: Unit processes / End-of-life treatment / Other end-of-life services
Functional unit: 1 item of reverse osmosis module
Generated by: Jiaqi Lu, wilsherelu@foxmail.com
Owner: Tiangong LCI Data Working Group
Review: Dependent internal review by Tiangong LCI Data Working Group
Amounts: no units in this file; such an amount is in the reference unit of its flow, which a separate flow dataset defines
copyright: false
licenseType: Free of charge for all users and uses

## General comment
The reverse osmosis module described is utilized for the purification and treatment of wastewater in both incineration and landfilling applications. It is specifically designed for the removal of contaminants from leachate or other liquid wastes, which is a common need in waste management facilities within China.

## Reference product
- waste incineration of plastics (unspecified) fraction in municipal solid waste (MSW): 1; input; measured
  1 waste RO module

## Outputs
All rows: measured
- waste incineration of plastics (unspecified) fraction in municipal solid waste (MSW): 0.052
  Waste PVC
- waste incineration of plastics (unspecified) fraction in municipal solid waste (MSW): 0.088
  Waste PVDF membrane
- waste incineration of plastics (unspecified) fraction in municipal solid waste (MSW): 0.129
  Waste PP film
- waste incineration of plastics (unspecified) fraction in municipal solid waste (MSW): 1.643
  Waste tape (wrapping the casing)
- waste incineration of plastics (unspecified) fraction in municipal solid waste (MSW): 0.016
  Waste extruded plastic pipe
- waste incineration of plastics (unspecified) fraction in municipal solid waste (MSW): 0.012
  Waste injection molded plastic
- waste incineration of plastics (unspecified) fraction in municipal solid waste (MSW): 0.032
  Waste PU filler

## Use advice
When incorporating this data set into a Life Cycle Assessment, ensure accurate representation of the geographical relevance (China-specific) and process-specific parameters such as efficiency, capacity, and technological applicability. Attention must be paid to the differentiation between the impacts of incineration and landfilling, and the treatment efficiency of the reverse osmosis module. For scenarios involving material recycling, considerations of the upstream and downstream impacts, as well as end-of-life phase, must be integrated carefully.

## Review details
Inventory: The internal review was done by several iteration steps concerning raw data validation, raw data documentation, representativity, completeness and consistency of modelling with regard to ISO 14040 and 14044.

## Data sources
- DuPont. Product Data Sheet
