# Electricity production ; Electricity mix ; Hubei

Dataset: ILCD process, Unit process, single operation
Geography: HUB-CN
Reference year: 2019
Classification: Unit processes / Energy carriers and technologies / Electricity
Generated by: Ruoxi Xiong, xiongrx0126@163.com
Owner: Tiangong LCI Data Working Group
Review: Dependent internal review by Tiangong LCI Data Working Group
Amounts: no units in this file; such an amount is in the reference unit of its flow, which a separate flow dataset defines
copyright: false
licenseType: Free of charge for all users and uses

## General comment
Electricity mix includes thermal, hydro, wind, nuclear and solar generation

## Technical purpose
The electricity generated through this process is intended for general use within the Hubei region. It incorporates a mix of different energy sources, including thermal (likely coal or natural gas), hydroelectric, wind, nuclear, and solar energy. This mix is designed to provide a steady and reliable supply of electricity to meet the diverse demands of residential, commercial, and industrial users in the area.

## Reference product
- Electricity: 3.6; missing unimportant
  [{'text': '能量', 'type': 'text'}]

## Inputs
All rows: missing unimportant
- electricity for thermal power: 1.78901
  [{'text': '能量', 'type': 'text'}]
- electricity from hydroelectric power plant: 1.65155
  [{'text': '能量', 'type': 'text'}]
- electricity for nuclear power: 0
  [{'text': '能量', 'type': 'text'}]
- electricity from wind power: 0.0900612
  [{'text': '能量', 'type': 'text'}]
- electricity for solar power: 0.069372
  [{'text': '能量', 'type': 'text'}]

## Use advice
Users of this data should note that the electricity mix reflects the specific energy sources used in the Hubei region and may not be representative of other regions. This data set should be applied with consideration for geographical boundaries and should not be extrapolated beyond the Hubei region without adjusting for regional energy source differences. When modeling the life cycle impacts, make sure to factor in this regional-specific electricity mix and acknowledge the potential seasonal and temporal variations in the energy source contributions.

## Review details
Inventory: The internal review was done by several iteration steps concerning raw data validation, raw data documentation, representativity, completeness and consistency of modelling with regard to ISO 14040 and 14044.

## Data sources
- 能源统计年鉴2020
