# Aluminum Recycling ; Recycled Aluminum Ingots ; Scrap Aluminum ; 2013

Dataset: ILCD process, Unit process, single operation
Geography: CN
Reference year: 2021
Classification: Unit processes / Materials production / Metals and semimetals
Generated by: Zimeng Cai, caizm6178@163.com
Owner: Tiangong LCI Data Working Group
Review: Dependent internal review by Tiangong LCI Data Working Group
Amounts: no units in this file; such an amount is in the reference unit of its flow, which a separate flow dataset defines
copyright: false
licenseType: Free of charge for all users and uses

## General comment
The recycled aluminum ingots are utilized in various industries such as automotive, construction, and packaging. These ingots are produced from scrap aluminum through a recycling process. The data set represents how aluminum recycling decreases the need for primary aluminum, therefore reducing the environmental impact associated with bauxite mining, alumina refining, and primary aluminum production. The material can be used in applications where the physical and mechanical properties of primary aluminum are not strictly required or where cost-effectiveness is a priority.

## Time period
Date of publication

## Reference product
- secondary aluminium ingot: 1000; missing unimportant
  ingot

## Inputs
- electricity, high voltage, aluminium industry: 1148.4; missing unimportant
  electricity
- aluminium scrap, unspecified: 1180; missing unimportant
  aluminum scrap

## Data selection and combination
The data in this study refers to the LCA data of PA, SA, electricity, and other background data. The PA data were obtained from statistical data sources, and the SA data were mainly obtained from the literatures. The background data were mainly derived from the Chinese localization LCA database CAS RCEES 2018, which was established by the Research Center for Eco-Environmental Sciences, Chinese Academy of Sciences and covers LCA data for energy, materials, transportation, waste management etc.

## Use advice
The LCA data for recycled aluminum ingots should account for the specific energy sources and processes used during recycling. Users of this dataset should ensure that they apply the data appropriately to the geographical context, as the environmental impact can vary significantly depending on the region's energy mix and recycling technology. It is important to use the exact year of data (2013 in this case) to capture the technological relevance. The technological applicability and the quality of the ingots may differ based on the scrap source and the recycling process; thus, users must consider the suitability of these data for their specific end-use applications.

## Review details
Inventory: The internal review was done by several iteration steps concerning raw data validation, raw data documentation, representativity, completeness and consistency of modelling with regard to ISO 14040 and 14044.

## Data sources
- Ding, N., Liu, N., Lu, B. & Yang, J. Life cycle greenhouse gas emissions of aluminum based on regional industrial transfer in China. J. Ind. Ecol. 25, 1657–1672 (2021).
