# Steelmaking ; crude steel ; converter steelmaking ; hot metal/scrap steel

Dataset: ILCD process, Unit process, single operation
Geography: CN
Reference year: 2006
Classification: Unit processes / Materials production / Metals and semimetals
Generated by: Wanghuanyu, wanghuanyu00@126.com
Owner: Tiangong LCI Data Working Group
Review: Dependent internal review by Tiangong LCI Data Working Group
Amounts: no units in this file; such an amount is in the reference unit of its flow, which a separate flow dataset defines
copyright: false
licenseType: Free of charge for all users and uses

## General comment
The technical usage of the process described refers to converter steelmaking for the production of crude steel. This process primarily uses hot metal derived from iron ore and scrap steel as feed materials. The data set pertains to a specific unit process at a steelmaking facility, identified as Z1. This process is applicable in the manufacture of a wide range of steel products, from construction materials to automotive and machinery components. The steel produced through this process meets industrial-grade specifications and can be utilized in various manufacturing sectors.

## Geography
Z1工厂同一名称的工艺过程

## Reference product
- Steel sections: 1.8926; measured

## Inputs
- iron: 1084; measured
- Alloy steel: 11.8; measured
  alloy steel

## Outputs
- Flue dust: 0.039; measured
- municipal solid waste deposition: 120; measured
  billet

## Use advice
When utilizing this LCA data set for modeling the impacts of steel production, users should pay attention to the process's technological scope and specificity to the Z1 facility. Assumptions such as the proportion of hot metal and scrap steel used, energy source types, and emission controls need to be consistent with this facility's reality. The data set might not consider end-of-life recycling or the use phase of the steel; therefore, these stages should be modeled separately if relevant. Users should also take into account the technological evolution and potential improvements in the process that may have occurred after the data was compiled. For comparative studies, it is essential to ensure methodological consistency across different data sets.

## Review details
Inventory: The internal review was done by several iteration steps concerning raw data validation, raw data documentation, representativity, completeness and consistency of modelling with regard to ISO 14040 and 14044.

## Data sources
- 刘微. LCI数据质量体系中的分析方法研究. (北京工业大学, 2006).
