# NMC532 hydrometallurgical recycling（LCC）

Dataset: ILCD process, Unit process, single operation
Geography: CN
Reference year: 2021
Classification: End-of-life treatment / Material recycling
Functional unit: 333.9 kg of the degraded NMC532 can be sorted from per 1 ton of degraded battery
Generated by: maqingyuan, m1120498928@163.com
Owner: Tiangong LCI Data Working Group
Review: Dependent internal review by Tiangong LCI Data Working Group
Amounts: no units in this file; such an amount is in the reference unit of its flow, which a separate flow dataset defines
copyright: false
licenseType: Free of charge for all users and uses

## General comment
The used NMC cells are firstly pretreated, then acid leaching is performed to get metal sulfate, and NMC precursors are obtained by adding alkali for co-precipitation, and new NMC is obtained by sintering.

## Technical purpose
The NMC532 hydrometallurgical recycling process is intended for recovering valuable metals from used NMC (Nickel Manganese Cobalt) batteries. This process mostly applies to the recycling industry where the aim is to extract and reclaim Ni, Co, and Mn from degraded lithium-ion batteries, and transform these extracted materials into new NMC cathode materials for reuse in battery manufacturing.

## Reference product
- Degraded NMC532: 226680; input; calculated

## Inputs
- P204（95%）P507（95%）: 17401.9; calculated
- Nickel sulfate: 160034; calculated
- sodium hydroxide: 12149.6; calculated
- nitrogen: 162; measured
- Liquid ammonia: 3990; measured
- Lithium Hydroxide Monohydrate: 369684; calculated
- Average labor (Disassemble degraded battery): 5475; measured
- Average labor（Material preparation）: 10950; measured
- water,water: 36000; measured
- Electricity: 83700; calculated
- Equipment Depreciation: 45187.5; measured

## Outputs
- Sewage treatment: 6000; measured
- Ni-Co-Mn precursor,Ni-Co-Mn precursor: 1.4475e6; measured

## Data treatment and extrapolations
① We calculated the cost per one ton of recycled cathode materials. The recycle process can be divided into four steps: DISASSEMBLE degraded battery, EXTRACTION to get Ni/Co/Mn sulfates, NCM(OH)2 PRECURSOR PREPARATION and LITHIATION.② During the DISASSEMBLE process, we use degraded NMC532 as raw material.③ During the EXTRACTION process, Ni/Co/Mn sulfates are generated, we suggest the yield can be up to 100%.

## Use advice
When utilizing this data set for Life Cycle Assessment (LCA), ensure to account for the full process chain, including pretreatment, acid leaching, co-precipitation, and sintering. Consider the recovery yields of metal sulfates during extraction, which are suggested to reach up to 100%. Model the use phase behavior accurately, including the efficiency of disassembling and the yield of NMC from the spent batteries. Note that one ton of retired batteries can yield approximately 333.9 kg of spent NMC532, which serves as the input raw material for the recycle process.

## Review details
Inventory: The internal review was done by several iteration steps concerning raw data validation, raw data documentation, representativity, completeness and consistency of modelling with regard to ISO 14040 and 14044.

## Data sources
- Qian, G. et al. Value-creating upcycling of retired electric vehicle battery cathodes. Cell Reports Physical Science 3, 100741 (2022).
