# Fresh Water ; Seawater ; Reverse osmosis (RO) ; All sizes; NESPS2 / 淡水 ; 海水 ; 反渗透法（RO） ; 所有规模 ; 全国第二次污染普查数据

Dataset: ILCD process, Unit process, single operation
Geography: CN
Reference year: 2019
Classification: Reference Parameters / Energy carriers and technologies / Electricity
Generated by: The data was created by the Office of the Second National Pollution Source Census of the Ministry of Ecology and Environment, and the data was organized by the TianGong Plan team for ILCD format / 生态环境部第二次全国污染源普查工作办公室创建数据，天工计划团队常慧敏整理数据为ILCD格式
Owner: Tiangong LCI Data Working Group / 天工LCI数据工作小组
Review: Dependent internal review by Tiangong LCI Data Working Group / 天工LCI数据工作小组
Amounts: no units in this file; such an amount is in the reference unit of its flow, which a separate flow dataset defines
copyright: false
licenseType: Free of charge for all users and uses

## General comment
the Technical of end-of-pipe management technology for pollution Nitrogen, organic boundisDirect discharge，Its Technical efficiency of end-of-pipe management0

## Technical purpose
所描述的技术过程是利用反渗透(RO)法对海水进行脱盐，以生产淡水，适用于所有规模的装置。这种RO过程通常用于淡水资源匮乏的地区，有效地将含盐水转换为适用于各种用途的水，包括饮用、灌溉和工业过程。指定的管道末端管理技术表明，废水以及诸如总磷和有机氮等污染物直接排放，没有任何处理。因此，这一过程适用于直接排放符合当地环境法规的应用场合。

## Reference product
- fresh water, regionalized, ID: 1000; calculated
  源文件中描述为为淡水，此处对其进行了匹配工作，将其匹配到LCAflow库里面相最符合的流，污染物指标备注为工业废水量

## Outputs
- phosphorus, total: 0.000187; calculated
  the Technical of end-of-pipe management technology for pollution phosphorus, totalisDirect discharge，Its Technical efficiency of end-of-pipe management0
  污染物指标总磷的末端治理技术是直排，其效率为0，末端治理设施实际运行率（k值）计算公式为-。原文件中描述污染物类别为废水，污染物指标为总磷，此处对其进行了匹配工作，将其匹配到LCAflow库里面相最符合的流，污染物指标备注为总磷
- Waste water: 2720; calculated
  the Technical of end-of-pipe management technology for pollution Waste waterisDirect discharge，Its Technical efficiency of end-of-pipe management0
  污染物指标工业废水量的末端治理技术是直排，其效率为0，末端治理设施实际运行率（k值）计算公式为-。原文件中描述污染物类别为废水，污染物指标为工业废水量，此处对其进行了匹配工作，将其匹配到LCAflow库里面相最符合的流，污染物指标备注为工业废水量
- Nitrogen, organic bound: 0.0031; calculated
  the Technical of end-of-pipe management technology for pollution Nitrogen, organic boundisDirect discharge，Its Technical efficiency of end-of-pipe management0
  污染物指标总氮的末端治理技术是直排，其效率为0，末端治理设施实际运行率（k值）计算公式为-。原文件中描述污染物类别为废水，污染物指标为总氮，此处对其进行了匹配工作，将其匹配到LCAflow库里面相最符合的流，污染物指标备注为总氮

## Use advice
This dataset is derived from the Pollution Source Census Report and contains information on pollution emissions and related products. However, it does not include data on energy or chemical consumption, nor does it provide information on waste or co-product generation. When utilizing this dataset, please supplement the missing data based on actual conditions before use
该数据集来源于污染源普查报告，包含污染物排放及相关产品信息，但不包含能源或化学品消耗数据，也不提供废弃物或共生产物产生信息。在使用该数据集时，请根据实际情况补充缺失数据后再使用。

## Review details
Inventory: The internal review was done by several iteration steps concerning raw data validation, raw data documentation, representativity, completeness and consistency of modelling with regard to ISO 14040 and 14044.
清单： 内部审查通过几个迭代步骤完成，涉及原始数据验证、原始数据记录、代表性、完整性、与 ISO 14040 和 14044 有关的建模的一致性。

## Data sources
- 第二次全国污染源普查产排污核算系数手册（试用版）,三级代码463.0文件，在完整版文件中第5492页
