# Gearbox manufacture ; Gearbox of a 1.5 MW wind turbine

Dataset: ILCD process, Unit process, single operation
Geography: NMG-CN
Reference year: 2017
Classification: Systems / Other machines
Functional unit: The functional unit is 1.5 MW wind turbine
LCI method principle: Attributional
LCI method approaches: Allocation
Generated by: Yunzhi Zhao, ll10088@163.com
Owner: Tiangong LCI Data Working Group
Review: Dependent internal review by Tiangong LCI Data Working Group
Amounts: no units in this file; such an amount is in the reference unit of its flow, which a separate flow dataset defines
copyright: false
licenseType: Free of charge for all users and uses

## General comment
The gearbox manufactured as described in this data set is designed specifically for use in 1.5 MW wind turbines. These gearboxes are integral components intended for operation within wind farms, particularly those located in regions with significant wind power installations, such as the northeast of Inner Mongolia. The data supports the application of the gearbox in the energy sector, focusing on clean and renewable wind energy generation.

## Geography
The data regarding the parameters of wind power has been collected from Wang (2012). A wind farm equipped with 33 domestic 1.5 megawatts (MW) wind turbines is regarded as a case study to analyze the environmental impact and its substitution effects. The wind farm is located in the northeast of Inner Mongolia, the province in which most of China’s wind power is installed (Xia and Song, 2017).

## Reference product
- Gearbox: 1; article inperiodical

## Inputs
- iron: 25000; article inperiodical
  Steel and iron
- copper: 1850; article inperiodical

## Deviations from the LCI method approaches
The life cycle inventory for wind power is illustrated as follows. The production and manufacturing stage include the production of wind turbines, substations, and cables, which consume a large amount of energy and emit pollutants (Xue et al., 2015).

## Use advice
Users of this data set should carefully consider the geographical and technological context when assessing the environmental impacts and substitution effects of the gearbox manufacturing process for 1.5 MW wind turbines. It is important to note that the life cycle inventory data, derived from Wang (2012) and Xue et al. (2015), may need to be updated or regionalized to reflect current manufacturing practices and energy consumption patterns. Users should also ensure that the functional unit of the life cycle assessment matches the specific application and capacity (1.5 MW) of the wind turbines being evaluated.

## Review details
Inventory: The internal review was done by several iteration steps concerning raw data validation, raw data documentation, representativity, completeness and consistency of modelling with regard to ISO 14040 and 14044.

## Data sources
- Li, H., Jiang, H.-D., Dong, K.-Y., Wei, Y.-M. & Liao, H. A comparative analysis of the life cycle environmental emissions from wind and coal power: Evidence from China. Journal of Cleaner Production 248, 119192 (2020).
