# Electricity production ; Electricity mix ; Shaanxi

Dataset: ILCD process, Unit process, single operation
Geography: SAX-CN
Reference year: 2019
Classification: Unit processes / Energy carriers and technologies / Electricity
Generated by: Ruoxi Xiong, xiongrx0126@163.com
Owner: Tiangong LCI Data Working Group
Review: Dependent internal review by Tiangong LCI Data Working Group
Amounts: no units in this file; such an amount is in the reference unit of its flow, which a separate flow dataset defines
copyright: false
licenseType: Free of charge for all users and uses

## General comment
Electricity mix includes thermal, hydro, wind, nuclear and solar generation

## Technical purpose
The electricity mix data set described pertains to the Shaanxi region and includes various forms of electricity production used to supply power demands across multiple sectors. This includes thermal (such as coal, natural gas), hydroelectric, wind, nuclear, and solar power generation. The mix can be utilized in regional power grids for residential, commercial, and industrial applications, ensuring a diverse energy portfolio for electricity consumers in Shaanxi.

## Reference product
- Electricity: 3.6; missing unimportant
  [{'text': '能量', 'type': 'text'}]

## Inputs
All rows: missing unimportant
- electricity for thermal power: 3.09152
  [{'text': '能量', 'type': 'text'}]
- electricity from hydroelectric power plant: 0.214358
  [{'text': '能量', 'type': 'text'}]
- electricity for nuclear power: 0
  [{'text': '能量', 'type': 'text'}]
- electricity from wind power: 0.137923
  [{'text': '能量', 'type': 'text'}]
- electricity for solar power: 0.1562
  [{'text': '能量', 'type': 'text'}]

## Use advice
Users of the electricity mix data set should consider the regional specificity when applying this data to life cycle assessment or other environmental analyses. The proportion of each electricity generation type in the mix is influenced by local resource availability and energy policy; therefore, it may not be representative of other regions. Users should also take into account temporal variability, such as seasonal and annual fluctuations in energy production. Additionally, if the renewable fraction of the mix changes, this should be reflected in the assessment to maintain accuracy.

## Review details
Inventory: The internal review was done by several iteration steps concerning raw data validation, raw data documentation, representativity, completeness and consistency of modelling with regard to ISO 14040 and 14044.

## Data sources
- 能源统计年鉴2020
