# Municipal sludge treatment and disposal;dry sludge;landfilling

Dataset: ILCD process, Unit process, single operation
Geography: CN
Classification: Unit processes / End-of-life treatment / Waste water treatment
Functional unit: The functional unit used for GHGs in this LCA is one dry ton (DT) of sludge.
Generated by: Jin Sitian, 2331276@tongji.edu.cn
Owner: Tiangong LCI Data Working Group
Review: Dependent internal review by Tiangong LCI Data Working Group
Amounts: no units in this file; such an amount is in the reference unit of its flow, which a separate flow dataset defines
copyright: ['opt4ROkqig']
licenseType: Free of charge for all users and uses

## General comment
The main data sources used in our study are as follows: 1) Energy consumption and material inputs are obtained from investigations in Tai Lake Watershed; 2) The energy use emission factor is obtained from our own calculation, IPCC, and the literature.3) The fugitive emissions during landfilling, incineration, and composting are mainly determined by the model given in the other study as well as by the IPCC factors (2006), except for the CH4 emission in landfilling, which is obtained from study.4) Data from theoretical calculations (see Incineration section).

## Geography
Tai Lake Watershed

## Technology and included processes
After filter pressing, the sludge contains less than 60% water content and can thus be adopted for sanitary landfills.

## Technical purpose
The municipal sludge treatment and disposal process described represents the activities necessary for the handling and landfilling of dry sludge within the Tai Lake Watershed. Its primary function is in environmental management, where it's used to manage and reduce the ecological footprint of municipal waste by converting wet sludge into dry sludge before safely disposing of it in landfills.

## Reference product
- Sludge: 1000; input; estimated
  one dry ton (DT) of sludge

## Inputs
- Polymer: 5.65; measured
- Electricity: 252; measured
- Diesel: 0.0031; measured

## Use advice
When using this LCA dataset, it is critical to ensure that its scope is limited to the treatment and disposal of municipal sludge in the form of dry sludge and its subsequent landfilling within the Tai Lake Watershed. Users should take note that the functional unit for measuring greenhouse gases' impact is one dry ton (DT) of sludge. The dataset is not suitable for scenarios outside of landfilling, such as incineration or recycling of sludge, and does not account for such processes. Methodological consistency with other parts of the life cycle assessment where sludge plays a role must be maintained.

## Review details
Inventory: The internal review was done by several iteration steps concerning raw data validation, raw data documentation, representativity, completeness and consistency of modelling with regard to ISO 14040 and 14044.

## Data sources
- Liu, B., Wei, Q., Zhang, B. & Bi, J. Life cycle GHG emissions of sewage sludge treatment and disposal options in Tai Lake Watershed, China. Science of The Total Environment 447, 361–369 (2013).
