# Aluminum electrolysis ; Liquid primary aluminum ; Prebaking ; Alumina for metallurgy ; 2009

Dataset: ILCD process, Unit process, single operation
Geography: CN
Reference year: 2021
Classification: Unit processes / Materials production / Metals and semimetals
Generated by: Zimeng Cai, caizm6178@163.com
Owner: Tiangong LCI Data Working Group
Review: Dependent internal review by Tiangong LCI Data Working Group
Amounts: no units in this file; such an amount is in the reference unit of its flow, which a separate flow dataset defines
copyright: false
licenseType: Free of charge for all users and uses

## General comment
The aluminum electrolysis process described herein is utilized for the production of liquid primary aluminum through the prebaking method. This liquid primary aluminum is specifically intended for use in metallurgy. The data set corresponding to this process is relevant for applications that involve casting, refining, and further fabrication of aluminum products. It encompasses industrial operations such as the creation of aluminum alloys, components for the automotive industry, construction materials, and aerospace parts that require metallurgical grade aluminum.

## Time period
Date of publication

## Reference product
- aluminium, primary, liquid: 1000; software or database

## Inputs
All rows: software or database
- Integrated AC power consumption: 49174.3
- aluminium oxide, metallurgical: 1918.21
- fluoride salt: 22.37
- anode, prebake, for aluminium electrolysis: 422.8
- Water, unspecified natural origin: 3.75
  water consumption

## Data selection and combination
The data in this study refers to the LCA data of PA, SA, electricity, and other background data. The PA data were obtained from statistical data sources, and the SA data were mainly obtained from the literatures. The background data were mainly derived from the Chinese localization LCA database CAS RCEES 2018, which was established by the Research Center for Eco-Environmental Sciences, Chinese Academy of Sciences and covers LCA data for energy, materials, transportation, waste management etc.

## Use advice
When using this dataset for Life Cycle Assessment (LCA), practitioners need to ensure that the technological scope corresponds to the prebaking aluminum electrolysis technology and its use in metallurgy. It is important to pay attention to the temporal relevance of the data, as it represents practices and efficiencies from the year 2009. Users should also be aware that the primary aluminum (PA) data was sourced from statistical data, secondary aluminum (SA) data from literature, and background data from the CAS RCEES 2018 Chinese localization LCA database. Adjustments may be needed to reflect current practices or local conditions. It is also essential to understand the geographical context (China) and adapt the data accordingly when applying it to other regions.

## Review details
Inventory: The internal review was done by several iteration steps concerning raw data validation, raw data documentation, representativity, completeness and consistency of modelling with regard to ISO 14040 and 14044.

## Data sources
- Ding, N., Liu, N., Lu, B. & Yang, J. Life cycle greenhouse gas emissions of aluminum based on regional industrial transfer in China. J. Ind. Ecol. 25, 1657–1672 (2021).
