# Proton exchange membrane hydrogen production ; deionized water ; PEM technology is used in the hydroelectric electrolysis tank

Dataset: ILCD process
Geography: US
Reference year: 2022
Classification: Unit processes / Energy carriers and technologies / Electricity
Functional unit: Production of 1kg hydrogen gas
Generated by: Xiaohua Liu, lxh01311@163.com
Owner: Tiangong LCI Data Working Group
Review: Dependent internal review by Tiangong LCI Data Working Group
Amounts: no units in this file; such an amount is in the reference unit of its flow, which a separate flow dataset defines
copyright: false
licenseType: Free of charge for all users and uses

## General comment
The data set describes the use of Proton Exchange Membrane (PEM) technology in a hydroelectric electrolysis cell to produce high-purity hydrogen gas, usually employed in industries where the precise composition and purity of hydrogen are critical, such as in electronic manufacturing, pharmaceuticals, or as a clean energy carrier.

## Reference product
- Green Hydrogen: 1; measured
  Green hydrogen

## Inputs
- Electricity: 198; measured
  electricity
- Deionized Water: 12; measured
  deionized water

## Outputs
- waste heat: 28.8; measured
  heat output
- oxygen: 8; measured

## Use advice
When utilizing this data set for Life Cycle Assessment purposes, ensure to consider the source of electricity powering the electrolysis process as it significantly impacts the environmental profile of the produced hydrogen. Users should also account for potential losses during hydrogen production and incorporate appropriate upstream and downstream processes, including the purification of deionized water and lifecycle management of the PEM equipment.

## Review details
Inventory: The internal review was done by several iteration steps concerning raw data validation, raw data documentation, representativity, completeness and consistency of modelling with regard to ISO 14040 and 14044.

## Data sources
- Climate change performance of hydrogen production based on life cycle assess
