# Polypropylene separator production ; Polypropylene separator ; Dry process ; Polypropylene

Dataset: ILCD process, Unit process, single operation
Geography: SZ-GD-CN
Classification: Materials production / Plastics
Functional unit: Production of 1kg polypropylene diaphragm
LCI method principle: Attributional
Generated by: Xin Chen, xinchen@mail.nankai.edu.cn
Owner: Tiangong LCI Data Working Group
Review: Dependent internal review by Tiangong LCI Data Working Group
Amounts: no units in this file; such an amount is in the reference unit of its flow, which a separate flow dataset defines
copyright: false
licenseType: Free of charge for all users and uses

## General comment
The polymer, additives and other raw materials are mixed to form a uniform melt. During extrusion, a lamellar structure is formed under tensile stress. The lamellar structure is heat treated to obtain a hard elastic polymer film, which is then stretched at a certain temperature to form a narrow Slit-like micropores, microporous membrane is produced after heat setting.

## Geography
Shenzhen Xingyuan Materials Techonlogy Co., Ltd

## Technology and included processes
Producing polypropylene separators using a dry process

## Technical purpose
The polypropylene separator produced by the dry process is utilized in the manufacturing of batteries. It serves as a crucial component to separate the anode and cathode, preventing electrical short circuits while facilitating ionic transfer in batteries such as for automotive, consumer electronics, and energy storage applications.

## Inputs
- polypropylene granulate (PP): 1.09
  The data comes from the environmental performance assessment report of Shenzhen Xingyuan Material Technology Co., Ltd. The data should be processed by simple multiplication and division. The data here ignores the input part of transportation.
- Diesel: 0.00399
  (same comment as for polypropylene granulate (PP))
- Electricity: 14.076
  (same comment as for polypropylene granulate (PP))
- Natural gas, at consumer EU-27: 0.322
  (same comment as for polypropylene granulate (PP))

## Outputs
- non-methane volatile organic compounds: 0.00038
  (same comment as for polypropylene granulate (PP))
- sulfur dioxide: 0.000144
  (same comment as for polypropylene granulate (PP))
- nitrogen dioxide: 0.000636
  (same comment as for polypropylene granulate (PP))
- particles (PM10): 7.87e-5
  (same comment as for polypropylene granulate (PP))

## Data selection and combination
Data comes from the environmental performance assessment report of Shenzhen Star Material Technology Co., Ltd.

## Data treatment and extrapolations
There should be simple multiplication and division operations on the data.

## Use advice
When using this LCA dataset for polypropylene separator production, ensure to perform simple arithmetic operations (multiplication and division) as necessary to align the data with the specific mass of separators required for your assessment. Consider the completeness of input/output energy, material, and emissions data. Be aware that this data reflects the environmental performance based on the production of 1kg of polypropylene separator by Shenzhen Star Material Technology Co., Ltd using a dry process.

## Review details
Inventory: The internal review was done by several iteration steps concerning raw data validation, raw data documentation, representativity, completeness and consistency of modelling with regard to ISO 14040 and 14044.

## Data sources
- Yin, R., Hu, S. & Yang, Y. Life cycle inventories of the commonly used materials for lithium-ion batteries in China. Journal of Cleaner Production227, 960–971 (2019).
