# Electricity production ; Electricity mix ; Jiangsu

Dataset: ILCD process, Unit process, single operation
Geography: JS-CN
Reference year: 2019
Classification: Unit processes / Energy carriers and technologies / Electricity
Generated by: Ruoxi Xiong, xiongrx0126@163.com
Owner: Tiangong LCI Data Working Group
Review: Dependent internal review by Tiangong LCI Data Working Group
Amounts: no units in this file; such an amount is in the reference unit of its flow, which a separate flow dataset defines
copyright: false
licenseType: Free of charge for all users and uses

## General comment
Electricity mix includes thermal, hydro, wind, nuclear and solar generation

## Technical purpose
The data set describes the industrial process for electricity production in Jiangsu, which encompasses a mix of energy sources including thermal (presumably from burning fossil fuels like coal, natural gas, or oil), hydroelectric, wind, nuclear, and solar power generation. This electricity is used for a variety of applications, from residential and commercial power needs to industrial operations requiring a reliable electricity supply.

## Reference product
- Electricity: 3.6; missing unimportant
  [{'text': '能量', 'type': 'text'}]

## Inputs
All rows: missing unimportant
- electricity for thermal power: 3.11367
  [{'text': '能量', 'type': 'text'}]
- electricity from hydroelectric power plant: 0.0216
  [{'text': '能量', 'type': 'text'}]
- electricity for nuclear power: 0.229234
  [{'text': '能量', 'type': 'text'}]
- electricity from wind power: 0.128203
  [{'text': '能量', 'type': 'text'}]
- electricity for solar power: 0.107302
  [{'text': '能量', 'type': 'text'}]

## Use advice
When using this data set for Life Cycle Assessments, it is important to consider the specific energy mix and the associated environmental impacts of each type of generation. Users should pay attention to the temporal and regional boundaries of the data, update it if necessary for future assessments, and ensure that the electricity consumption patterns reflected in models correspond to the actual end use. If the process for a specific product or service relies heavily on electricity, the proportional impact of each generation type should be accurately represented in the LCA model.

## Review details
Inventory: The internal review was done by several iteration steps concerning raw data validation, raw data documentation, representativity, completeness and consistency of modelling with regard to ISO 14040 and 14044.

## Data sources
- 能源统计年鉴2020
