# Plexiglass ; laminated glass ; hand cutting

Dataset: ILCD process, Unit process, single operation
Geography: SX-ZJ-CN
Reference year: 2004
Classification: Unit processes / Materials production / Glass and ceramics
Generated by: He xiaxia, 18616148319@163.com
Owner: Tiangong LCI Data Working Group
Review: Dependent internal review by Tiangong LCI Data Working Group
Amounts: no units in this file; such an amount is in the reference unit of its flow, which a separate flow dataset defines
copyright: false
licenseType: Free of charge for all users and uses

## General comment
The data set represents a single operation process in the production of laminated sheet glass, with a specific application in constructing safety and security glass for buildings, vehicles, and various industrial uses. The hand-cutting stage is indicative of a bespoke or small-scale production operation, often employed for specialized dimensions or designs not catered to by mass production techniques.

## Reference product
- Glass (formed & finished): 22930; measured

## Inputs
- Glass (formed & finished): 23560; measured
  original glass

## Outputs
- Waste (solid): 630; measured

## Use advice
Users of this data set should account for the higher energy consumption and potentially increased waste associated with hand-cutting precision processes as opposed to automated production methods. Care must be taken when extrapolating this data for larger scale applications where process efficiency and waste management may differ. Additionally, this data should reflect the bespoke nature of production and may not be fully representative of standardized, large-scale glass manufacturing operations.

## Review details
Inventory: The internal review was done by several iteration steps concerning raw data validation, raw data documentation, representativity, completeness and consistency of modelling with regard to ISO 14040 and 14044.

## Data sources
- 年产5600吨钢化玻璃及250吨夹层玻璃生产线建设项目环境影响报告
