# Lithium carbonate production ; Lithium carbonate ; Lithium concentrate, sulfuric acid, calcium carbonate, calcium oxide, sodium hydroxide, sodium carbonate

Dataset: ILCD process, Unit process, single operation
Geography: JS-CN
Classification: Materials production / Inorganic chemicals
Functional unit: Produce 1kg of lithium carbonate
Generated by: Xin Chen, xinchen@mail.nankai.edu.cn
Owner: Tiangong LCI Data Working Group
Review: Dependent internal review by Tiangong LCI Data Working Group
Amounts: no units in this file; such an amount is in the reference unit of its flow, which a separate flow dataset defines
copyright: false
licenseType: Free of charge for all users and uses

## General comment
Lithium carbonate is one of the most common lithium sources for the preparation of lithium-containing cathode materials. The current process of lithium carbonate production in China is as follows: firstly, the crystalline shape of lithium concentrate is transformed from α to β type by high-temperature calcination, followed by cooling and ball milling, reacting the ball mill fines with concentrated sulfuric acid to produce lithium sulfate, then adding calcium oxide, calcium carbonate and sodium carbonate for calcium removal and lithium precipitation respectively, and finally, lithium carbonate is obtained through the refining process (churning and washing, centrifugal filtration and drying). The process requires the consumption of electricity, hard coal, and steam.

## Geography
General Lithium Co.

## Technical purpose
Lithium carbonate produced through this process is a key raw material predominantly used in the manufacturing of lithium-ion batteries, specifically for lithium-containing cathode materials. It is applicable in various industries such as electronics, automotive (electric vehicle batteries), and renewable energy storage systems.

## Reference product
- Lithium carbonate: 1
  The relevant inventory data were obtained from a chemical enterprise in Jiangsu Province with an annual production capacity of 6000 tons of lithium carbonate(General Lithium Co., 2015).

## Inputs
- Lithium concentrates: 8.08
  (same comment as for Lithium carbonate)
- Sulfuric acid: 2.08
  (same comment as for Lithium carbonate)
- Calcium carbonate (> 63 microns): 0.54
  (same comment as for Lithium carbonate)
- Calcium oxide: 0.54
  (same comment as for Lithium carbonate)
- sodium hydroxide: 0.05
  (same comment as for Lithium carbonate)
- Sodium carbonate: 1.57
  (same comment as for Lithium carbonate)
- electricity: 11.88
  (same comment as for Lithium carbonate)
- Hard coal, at consumer EU-27: 0.675
  (same comment as for Lithium carbonate)
- process steam: 15.2
  (same comment as for Lithium carbonate)

## Outputs
- sulfur dioxide: 0.00157
  (same comment as for Lithium carbonate)
- Dust: 0.0079
  (same comment as for Lithium carbonate)
- chemical oxygen demand: 0.00042
  (same comment as for Lithium carbonate)
- ammonium: 4.25e-5
  (same comment as for Lithium carbonate)
- Suspended solids, unspecified: 0.00024
  (same comment as for Lithium carbonate)

## Data selection and combination
Data taken from Jiangsu General Lithium Co.(annual output of 6,000 tons of lithium carbonate)

## Use advice
This data set represents the production of lithium carbonate with specifications for application in high-performance batteries and should be used accordingly. When modeling the environmental impact, users should consider the methodological consistency, ensuring that the data set's unit processes match the technological era and regional applicability. Attention should be paid to the consumption rates of electricity, hard coal, and steam given in the data set for accuracy in impact analysis. The considered functional unit is the production of 1 kg of lithium carbonate.

## Review details
Inventory: The internal review was done by several iteration steps concerning raw data validation, raw data documentation, representativity, completeness and consistency of modelling with regard to ISO 14040 and 14044.

## Data sources
- Feng, T., Guo, W., Li, Q., Meng, Z. & Liang, W. Life cycle assessment of lithium nickel cobalt manganese oxide batteries and lithium iron phosphate batteries for electric vehicles in China. Journal of Energy Storage52, 104767 (2022).
