# Aluminum electrolysis ; Liquid primary aluminum ; Prebaking ; Alumina for metallurgy ; 2010

Dataset: ILCD process, Unit process, single operation
Geography: CN
Reference year: 2021
Classification: Unit processes / Materials production / Metals and semimetals
Generated by: Zimeng Cai, caizm6178@163.com
Owner: Tiangong LCI Data Working Group
Review: Dependent internal review by Tiangong LCI Data Working Group
Amounts: no units in this file; such an amount is in the reference unit of its flow, which a separate flow dataset defines
copyright: false
licenseType: Free of charge for all users and uses

## General comment
The industrial process described pertains to the production of liquid primary aluminum using the prebaking technology for the electrolysis of alumina specifically suited for metallurgical applications. It is a unit process data set from 2010 intended to be used for life cycle assessment studies in the aluminum industry, reflecting the manufacturing stage of aluminum production for use in various products that require high-quality metallurgical grade aluminum.

## Time period
Date of publication

## Reference product
- aluminium, primary, liquid: 1000; software or database

## Inputs
All rows: software or database
- Integrated AC power consumption: 48791.1
- aluminium oxide, metallurgical: 1919.06
- fluoride salt: 21.88
- anode, prebake, for aluminium electrolysis: 425.48
- Water, unspecified natural origin: 3.19

## Data selection and combination
The data in this study refers to the LCA data of PA, SA, electricity, and other background data. The PA data were obtained from statistical data sources, and the SA data were mainly obtained from the literatures. The background data were mainly derived from the Chinese localization LCA database CAS RCEES 2018, which was established by the Research Center for Eco-Environmental Sciences, Chinese Academy of Sciences and covers LCA data for energy, materials, transportation, waste management etc.

## Use advice
Users of this LCA data set should ensure that they are applying it to scenarios appropriate for the metallurgical grade aluminum production. The primary aluminum (PA) and secondary aluminum (SA) data shall be considered based on statistical and literature sources respectively. It is critical to utilize the background data from the Chinese localization LCA database CAS RCEES 2018 accurately. Users should take care to apply the data consistently with the technological scope being modeled and pay special attention to methodological choices regarding the inclusion or exclusion of recycling impacts in the LCA model. The vintage of the data (2010) should be taken into account when assessing the relevance and accuracy for current applications.

## Review details
Inventory: The internal review was done by several iteration steps concerning raw data validation, raw data documentation, representativity, completeness and consistency of modelling with regard to ISO 14040 and 14044.

## Data sources
- Ding, N., Liu, N., Lu, B. & Yang, J. Life cycle greenhouse gas emissions of aluminum based on regional industrial transfer in China. J. Ind. Ecol. 25, 1657–1672 (2021).
