# Aluminum ingot casting ; Primary aluminum ingot ; Aluminum alloy wheel manufacturing process ; Liquid primary aluminum

Dataset: ILCD process, Unit process, single operation
Geography: CN
Reference year: 2018
Classification: Unit processes / Materials production / Metals and semimetals
Generated by: Chenling Fu, fu-chenling@tsinghua.edu.cn
Owner: Tiangong LCI Data Working Group
Review: Dependent internal review by Tiangong LCI Data Working Group
Amounts: no units in this file; such an amount is in the reference unit of its flow, which a separate flow dataset defines
copyright: false
licenseType: Free of charge for all users and uses

## General comment
铝合金轮毂铸造工艺

## Time period
Date of publication

## Technical purpose
The primary aluminum ingots obtained from the casting process are used in the manufacturing of aluminum alloy wheels. This high-purity aluminum is suitable for applications requiring superior strength and light-weight properties, especially tailored for the automotive industry. Aluminum alloy wheels provide a balance of durability, performance, and aesthetics for various vehicles.

## Reference product
- aluminium, primary, ingot: 55.5; missing unimportant

## Inputs
All rows: missing unimportant
- electricity, high voltage, aluminium industry: 785.232
- flux, for wave soldering: 0.22
- hard coal; 26.3 MJ/kg: 4.32
- heavy fuel oil: 2.16
- Gas, mine, off-gas, process, coal mining: 17.26
- natural gas, high pressure: 2.32
  Natural gas

## Outputs
All rows: missing unimportant
- carbon dioxide (fossil),carbon dioxide (fossil): 45.62
- carbon monoxide (fossil),carbon monoxide (fossil): 0.04
- sulfur dioxide: 0.12
- Nitrogen oxides: 0.17
- methane (fossil): 0.51
- particles, unspecified: 0.13
- Aluminum slag: 0.22

## Use advice
When utilizing this data for life cycle assessment or other environmental impact studies, ensure to consider the specific manufacturing process emissions and energy requirements. Attention should be paid to the end-of-life phase where the potential for recycling the aluminum material can reduce the overall environmental burden. The dataset should be used with the understanding of the technological advances and possible variations in production practices, as aluminum alloy wheel manufacturing may evolve over time. The publication date of the dataset must also be considered, as more recent data may provide more accurate reflections of the current processes.

## Review details
Inventory: The internal review was done by several iteration steps concerning raw data validation, raw data documentation, representativity, completeness and consistency of modelling with regard to ISO 14040 and 14044.

## Data sources
- Yi Qiu-ping & Tang Chang-ping. Environmental impact assessment of magnesium alloy automobile hub based on life cycle assessment. JOURNAL OF CENTRAL SOUTH UNIVERSITY 25, 1870–1878 (2018).
