# Ultrafiltration module production ; hollow fiber membrane, CN

Dataset: ILCD process, Unit process, single operation
Geography: CN
Reference year: 2022
Classification: Unit processes / Materials production / Other materials
Functional unit: 1 item of ultrafiltration module
Generated by: Jiaqi Lu, wilsherelu@foxmail.com
Owner: Tiangong LCI Data Working Group
Review: Dependent internal review by Tiangong LCI Data Working Group
Amounts: no units in this file; such an amount is in the reference unit of its flow, which a separate flow dataset defines
copyright: false
licenseType: Free of charge for all users and uses

## General comment
The ultrafiltration module with hollow fiber membrane is typically utilized in water and wastewater treatment processes for the removal of suspended solids, bacteria, and viruses, ensuring a high level of water purification. This component can also be employed in the food and beverage industry for the clarification of juices and wines, and for the dairy industry in the production of cheese and milk concentration.

## Reference product
- Ultrafiltration Component; measured
  1Ultrafiltration module

## Inputs
All rows: measured
- plastic pipes: 11.75
  extruded plastic tube
- Plastic (unspecified): 4.27
  Injection molded plastic
- Polyurethane (PU) Filler: 2.42
  Polyurethane (PU) filler
- Polyvinylidene fluoride: 21.97
  Polyvinylidene fluoride (PVDF) membrane
- polyvinylchloride resin (E-PVC): 29.28
  Polyvinyl chloride (PVC) shell
- Electricity: 12.06
  Process power consumption
- natural gas,natural gas: 0.166
  The process consumes natural gas

## Outputs
- waste water - treated: 0.143; measured
  wastewater treatment
- municipal solid waste deposition: 0.287; measured
  Solid Waste

## Use advice
When incorporating this data set into a life cycle assessment, users should consider the full lifespan of the ultrafiltration module, including manufacture, usage, maintenance, and disposal phases. Specific attention should be given to the energy and resources consumed during the production of the hollow fiber membrane as well as any chemical inputs involved. Users must also account for end-of-life scenarios such as recycling, incineration, or landfill and their associated environmental impacts when modeling the use phase of the ultrafiltration module.

## Review details
Inventory: The internal review was done by several iteration steps concerning raw data validation, raw data documentation, representativity, completeness and consistency of modelling with regard to ISO 14040 and 14044.

## Data sources
- Ultrafiltration product manual
