# Hazelnut production

Dataset: ILCD process, Unit process, black box
Geography: TR
Reference year: 2019
Valid until: 2020
Classification: Materials production / Agricultural production means
Functional unit: One-kilogram of in-shell hazelnut
Generated by: zhu xian, zzhu0918@163.com
Owner: Tiangong LCI Data Working Group
Review: Dependent internal review by Tiangong LCI Data Working Group
Amounts: no units in this file; such an amount is in the reference unit of its flow, which a separate flow dataset defines
copyright: false
licenseType: Free of charge for all users and uses

## General comment
Hazelnut saplings are cultivated, fertilised, pruned and weeded during the cultivation phase, and the fruits are harvested at maturity by manual or mechanical means.

## Geography
In Ordu province , in the Black Sea region, Türkiye

## Technical purpose
The data represents the production process of one kilogram of in-shell hazelnuts. Hazelnuts produced in this manner are commonly used in the food industry for products such as spreads, confectionery, bakery items, and as roasted nuts for direct consumption.

## Reference product
- Biological yield: 25; article inperiodical

## Inputs
All rows: measured
- Nitrogenous fertilizer: 157.9; min 30; max 382
- Phosphate fertilizer: 61.1; min 14.4; max 132
- Potassium fertilizer: 76.4; min 18; max 165
- Diesel: 0.0106; min 0.0048; max 0.028
- Gasoline (regular): 0.0085; min 0.004; max 0.0198
- Labor: 33.1042; min 174.75; max 7.75

## Use advice
When utilizing this dataset for Life Cycle Assessment purposes, it is essential to ensure consistency with the system boundary definitions. Exclude any transportation processes not related to the primary hazelnut cultivation. Consider the end-of-life scenarios for the product, particularly if the hazelnut shells can be utilized as a byproduct, such as in biomass energy production. Ensure alignment with geographical and technological relevance, as this dataset is specific to the Ordu province in the Black Sea region of Türkiye.

## Review details
Inventory: The internal review was done by several iteration steps concerning raw data validation, raw data documentation, representativity, completeness and consistency of modelling with regard to ISO 14040 and 14044.
