# Electricity generation from straw combustion ｜Electricity｜biomass boiler（15MW*2）

Dataset: ILCD process, Unit process, single operation
Geography: CN
Reference year: 2020
Classification: Unit processes / Energy carriers and technologies / Electricity
Functional unit: Taking 1 ton of straw as the functional unit
LCI method principle: Consequential
Generated by: Chaoshuo Liu, liucs22@mails.jlu.edu.cn
Owner: Tiangong LCI Data Working Group
Review: Dependent internal review by Tiangong LCI Data Working Group
Amounts: no units in this file; such an amount is in the reference unit of its flow, which a separate flow dataset defines
copyright: false
licenseType: Free of charge for all users and uses

## General comment
The data represents the electricity generation process using a biomass boiler powered by straw combustion. Specifically, it describes a system with two 15 megawatt boilers designed for generating power within an electricity grid. This electricity produced can be utilized for both residential and industrial applications where the use of renewable biomass as a fuel source is prioritized.

## Reference product
- electricity from waste incineration: 2721.6; measured

## Inputs
- Crop straw: 1000; measured
- electricity from waste incineration: 468; measured

## Outputs
- carbon dioxide (biogenic),carbon dioxide (biogenic): 1620; measured
  The expert notes that the original text does not differentiate between biogenic and fossil sources of emissions, and in their opinion, the emissions in question are biogenic.
- sulfur dioxide: 2.4; measured
- nitrogen dioxide: 0.634; measured
- particles (> PM10),particles (> PM10): 0.147; measured

## Use advice
When using this data, it is important to consistently apply it as the functional unit of 1 ton of straw to ensure comparability across assessments. Users should account for the system boundary that includes the cultivation, harvest, transport, and combustion of the straw. Considerations for end-of-life scenarios for the straw such as ash disposal and potential nutrient recycling should be included. Additionally, assess any indirect environmental impacts linked to the replacement of non-renewable fuels and the implications of diverting straw from other potential uses.

## Review details
Inventory: The internal review was done by several iteration steps concerning raw data validation, raw data documentation, representativity, completeness and consistency of modelling with regard to ISO 14040 and 14044.

## Data sources
- Dai, Y., Zheng, H., Jiang, Z. & Xing, B. Comparison of different crop residue-based technologies for their energy production and air pollutant emission. Science of The Total Environment 707, 136122 (2020).
