# Remelting of glass;glass;remelting

Dataset: ILCD process, Unit process, single operation
Geography: CN
Classification: Unit processes / End-of-life treatment / Material recycling
Generated by: Nan Wang, 1209824595@qq.com
Owner: Tiangong LCI Data Working Group
Review: Dependent internal review by Tiangong LCI Data Working Group
Amounts: no units in this file; such an amount is in the reference unit of its flow, which a separate flow dataset defines
copyright: false
licenseType: Free of charge for all users and uses

## General comment
Glass need to beremelted, EVA (Ethylene Vinyl Acetat) need thermal treatment, and aluminum need remetling and chemical treatment before they may substitute virgin materials in the module assembling process. Meanwhile, chemical treatment is necessary for silicon and silver before recycling in polysilicon production and multi-Si PV cell respectively.

## Technical purpose
The described industrial process involves the recycling and treatment of materials for the manufacturing of multi-crystalline silicon photovoltaic (multi-Si PV) modules. Specifically, glass is remelted, ethylene vinyl acetate (EVA) undergoes thermal treatment, and aluminum is subject to remelting and chemical processing to allow their use as substitutes for virgin materials in the assembly of PV modules. Chemical treatments are also necessary for the recycling of silicon and silver as part of the production process for polysilicon and multi-Si PV cells.

## Reference product
- Glass for recovery (shards): 47.5; input; software or database

## Inputs
- Oxidant: 9.47; software or database
- Standard coal: 6.8; software or database
  standard coal

## Outputs
All rows: software or database
- Glass for recovery (shards): 42.3
- oxygen: 3.5
- sulfur dioxide: 4.3
- carbon dioxide: 8.5
- nitrogen dioxide: 2.6
- nitrogen: 2.5

## Data selection and combination
The inventory data of the multi-Si PV modules are collected from several sources: (1) Literatures including Fu (2013), which contain material inventory of several photovoltaic enterprises in Jiangsu province; Diao and Shi (2011), which contain material inventory of two photovoltaic enterprises in Beijing; He (2013), which contain material inventory of four photovoltaic enterprises in Gansu and Sichuan province. (2) Environment Impact Assessment Statements (EIAS) of multi-Si PV production companies from Sichuan (EIAS-Sichuan, 2008), Henan (EIAS-Henan, 2009) and Chongqing (EIAS-Chongqing, 2008). (3) Industry report of market foresight and investment prospect for China’s photovoltaic development (2014) and Industrial report of market foresight and investment prospect for China’s polysilicon development (2014). The mean value is applied when there are different data sources for specific materials.

## Use advice
When utilizing the inventory data for multi-Si PV modules, ensure that the mean values are used if different data sources are encountered for specific materials. This guidance is necessary to maintain consistency and reliability in life cycle assessments. Data sources include academic literature, Environmental Impact Assessment Statements (EIAS), and industry reports pertinent to Chinese photovoltaic enterprises. For detailed LCA modelling, pay attention to geographical and technological relevance, validating and updating the data when applicable to ensure accurate representation of the assessed process.

## Review details
Inventory: The internal review was done by several iteration steps concerning raw data validation, raw data documentation, representativity, completeness and consistency of modelling with regard to ISO 14040 and 14044.

## Data sources
- Huang, B. et al. Environmental influence assessment of China’s multi-crystalline silicon (multi-Si) photovoltaic modules considering recycling process. Solar Energy 143, 132–141 (2017).
