# Cellulose fiber filament ; Chemical fiber pulp ; Alkalization - Aging - Yellowing - Dissolving - Filtration - Spinning - Washing - Drying ; All sizes; NESPS2 / 纤维素纤长丝 ; 化纤浆粕 ; 碱化－老化－黄化－溶解－过滤—纺丝—水洗－烘干 ; 所有规模 ; 全国第二次污染普查数据

Dataset: ILCD process, Unit process, single operation
Geography: CN
Reference year: 2019
Classification: Reference Parameters / Materials production / Organic chemicals
Generated by: The data was created by the Office of the Second National Pollution Source Census of the Ministry of Ecology and Environment, and the data was organized by the TianGong Plan team for ILCD format / 生态环境部第二次全国污染源普查工作办公室创建数据，天工计划团队常慧敏整理数据为ILCD格式
Owner: Tiangong LCI Data Working Group / 天工LCI数据工作小组
Review: Dependent internal review by Tiangong LCI Data Working Group / 天工LCI数据工作小组
Amounts: no units in this file; such an amount is in the reference unit of its flow, which a separate flow dataset defines
copyright: false
licenseType: Free of charge for all users and uses

## General comment
the treatment technology for the pollution of Exhaust gasdidn't offered，The formula for calculating the actual operation rate (k-value) of the end-of-pipe treatment facility is k = power consumption of wastewater treatment facilities (kWh/year) / operating time of wastewater treatment facilities (hours/year) / total power of wastewater treatment facilities (kW)

## Technical purpose
所描述的过程用于生产纳米纤维素纤长丝，在纺织品、复合材料和过滤等多种应用中使用。所提到的末端处理技术用于处理废水和废气，以减少磷、氨氮、化学需氧量(COD)、石油相关废物和有机结合氮等污染。

## Reference product
- Cotton: 1000, 1000 (2 entries); calculated
  源文件中描述为为纤维素纤长丝，此处对其进行了匹配工作，将其匹配到LCAflow库里面相最符合的流

## Outputs
All rows: calculated
- phosphorus, total: 0.00363
  the Technical of end-of-pipe management technology for pollution phosphorus, totalisPhysicochemical treatment + anaerobic biological treatment + aerobic biological treatment + physicochemical treatment，Its Technical efficiency of end-of-pipe management90，The formula for calculating the actual operation rate (k-value) of the end-of-pipe treatment facility is /
  污染物指标总磷的末端治理技术是物理化学法+厌氧生物处理法+好氧生物处理法+物理化学法，其效率为90，末端治理设施实际运行率（k值）计算公式为k=污水治理设施运行时间（小时）/正常生产时间（小时）。原文件中描述污染物类别为废水，污染物指标为总磷，此处对其进行了匹配工作，将其匹配到LCAflow库里面相最符合的流
- phosphorus, total: 0.006534
  the Technical of end-of-pipe management technology for pollution phosphorus, totalisPhysicochemical treatment + anaerobic biological treatment + aerobic biological treatment，Its Technical efficiency of end-of-pipe management82
  污染物指标总磷的末端治理技术是物理化学法+厌氧生物处理法+好氧生物处理法，其效率为82，末端治理设施实际运行率（k值）计算公式为k=污水治理设施运行时间（小时）/正常生产时间（小时）。原文件中描述污染物类别为废水，污染物指标为总磷，此处对其进行了匹配工作，将其匹配到LCAflow库里面相最符合的流
- Petroleum-related waste: 0.0234
  the Technical of end-of-pipe management technology for pollution Petroleum-related wasteisPhysicochemical treatment + anaerobic biological treatment + aerobic biological treatment + physicochemical treatment，Its Technical efficiency of end-of-pipe management85，The formula for calculating the actual operation rate (k-value) of the end-of-pipe treatment facility is k = power consumption of wastewater treatment facilities (kWh/year) / operating time of wastewater treatment facilities (hours/year) / total power of wastewater treatment facilities (kW)
  污染物指标石油类的末端治理技术是物理化学法+厌氧生物处理法+好氧生物处理法+物理化学法，其效率为85，末端治理设施实际运行率（k值）计算公式为k=污水治理设施运行时间（小时）/正常生产时间（小时）。原文件中描述污染物类别为废水，污染物指标为石油类，此处对其进行了匹配工作，将其匹配到LCAflow库里面相最符合的流
- Petroleum-related waste: 0.0546
  the Technical of end-of-pipe management technology for pollution Petroleum-related wasteisPhysicochemical treatment + anaerobic biological treatment + aerobic biological treatment，Its Technical efficiency of end-of-pipe management65，The formula for calculating the actual operation rate (k-value) of the end-of-pipe treatment facility is k = power consumption of wastewater treatment facilities (kWh/year) / operating time of wastewater treatment facilities (hours/year) / total power of wastewater treatment facilities (kW)
  污染物指标石油类的末端治理技术是物理化学法+厌氧生物处理法+好氧生物处理法，其效率为65，末端治理设施实际运行率（k值）计算公式为k=污水治理设施运行时间（小时）/正常生产时间（小时）。原文件中描述污染物类别为废水，污染物指标为石油类，此处对其进行了匹配工作，将其匹配到LCAflow库里面相最符合的流
- Waste water: 209000
  the treatment technology for the pollution of Waste waterdidn't offered，The formula for calculating the actual operation rate (k-value) of the end-of-pipe treatment facility is /
  污染物指标工业废水量的末端治理技术未说明。原文件中描述污染物类别为废水，污染物指标为工业废水量，此处对其进行了匹配工作，将其匹配到LCAflow库里面相最符合的流
- Nitrogen, organic bound: 0.6587
  the Technical of end-of-pipe management technology for pollution Nitrogen, organic boundisPhysicochemical treatment + anaerobic biological treatment + aerobic biological treatment + physicochemical treatment，Its Technical efficiency of end-of-pipe management90，The formula for calculating the actual operation rate (k-value) of the end-of-pipe treatment facility is k = power consumption of wastewater treatment facilities (kWh/year) / operating time of wastewater treatment facilities (hours/year) / total power of wastewater treatment facilities (kW)
  污染物指标总氮的末端治理技术是物理化学法+厌氧生物处理法+好氧生物处理法+物理化学法，其效率为90，末端治理设施实际运行率（k值）计算公式为k=污水治理设施运行时间（小时）/正常生产时间（小时）。原文件中描述污染物类别为废水，污染物指标为总氮，此处对其进行了匹配工作，将其匹配到LCAflow库里面相最符合的流
- Nitrogen, organic bound: 0.98805
  the Technical of end-of-pipe management technology for pollution Nitrogen, organic boundisPhysicochemical treatment + anaerobic biological treatment + aerobic biological treatment，Its Technical efficiency of end-of-pipe management85，The formula for calculating the actual operation rate (k-value) of the end-of-pipe treatment facility is k = power consumption of wastewater treatment facilities (kWh/year) / operating time of wastewater treatment facilities (hours/year) / total power of wastewater treatment facilities (kW)
  污染物指标总氮的末端治理技术是物理化学法+厌氧生物处理法+好氧生物处理法，其效率为85，末端治理设施实际运行率（k值）计算公式为k=污水治理设施运行时间（小时）/正常生产时间（小时）。原文件中描述污染物类别为废水，污染物指标为总氮，此处对其进行了匹配工作，将其匹配到LCAflow库里面相最符合的流
- Ammonia Nitrogen: 1.3145
  the Technical of end-of-pipe management technology for pollution Ammonia NitrogenisPhysicochemical treatment + anaerobic biological treatment + aerobic biological treatment + physicochemical treatment，Its Technical efficiency of end-of-pipe management78，The formula for calculating the actual operation rate (k-value) of the end-of-pipe treatment facility is /
  污染物指标氨氮的末端治理技术是物理化学法+厌氧生物处理法+好氧生物处理法+物理化学法，其效率为78，末端治理设施实际运行率（k值）计算公式为k=污水治理设施运行时间（小时）/正常生产时间（小时）。原文件中描述污染物类别为废水，污染物指标为氨氮，此处对其进行了匹配工作，将其匹配到LCAflow库里面相最符合的流
- Ammonia Nitrogen: 1.434
  the Technical of end-of-pipe management technology for pollution Ammonia NitrogenisPhysicochemical treatment + anaerobic biological treatment + aerobic biological treatment，Its Technical efficiency of end-of-pipe management76，The formula for calculating the actual operation rate (k-value) of the end-of-pipe treatment facility is /
  污染物指标氨氮的末端治理技术是物理化学法+厌氧生物处理法+好氧生物处理法，其效率为76，末端治理设施实际运行率（k值）计算公式为k=污水治理设施运行时间（小时）/正常生产时间（小时）。原文件中描述污染物类别为废水，污染物指标为氨氮，此处对其进行了匹配工作，将其匹配到LCAflow库里面相最符合的流
- chemical oxygen demand: 1.443
  the Technical of end-of-pipe management technology for pollution chemical oxygen demandisPhysicochemical treatment + anaerobic biological treatment + aerobic biological treatment + physicochemical treatment，Its Technical efficiency of end-of-pipe management97
  污染物指标化学需氧量的末端治理技术是物理化学法+厌氧生物处理法+好氧生物处理法+物理化学法，其效率为97，末端治理设施实际运行率（k值）计算公式为k=污水治理设施运行时间（小时）/正常生产时间（小时）。原文件中描述污染物类别为废水，污染物指标为化学需氧量，此处对其进行了匹配工作，将其匹配到LCAflow库里面相最符合的流
- chemical oxygen demand: 4.81
  the Technical of end-of-pipe management technology for pollution chemical oxygen demandisPhysicochemical treatment + anaerobic biological treatment + aerobic biological treatment，Its Technical efficiency of end-of-pipe management90，The formula for calculating the actual operation rate (k-value) of the end-of-pipe treatment facility is /
  污染物指标化学需氧量的末端治理技术是物理化学法+厌氧生物处理法+好氧生物处理法，其效率为90，末端治理设施实际运行率（k值）计算公式为k=污水治理设施运行时间（小时）/正常生产时间（小时）。原文件中描述污染物类别为废水，污染物指标为化学需氧量，此处对其进行了匹配工作，将其匹配到LCAflow库里面相最符合的流
- Exhaust gas: 31000
  the treatment technology for the pollution of Exhaust gasdidn't offered，The formula for calculating the actual operation rate (k-value) of the end-of-pipe treatment facility is k = power consumption of wastewater treatment facilities (kWh/year) / operating time of wastewater treatment facilities (hours/year) / total power of wastewater treatment facilities (kW)
  污染物指标工业废气量的末端治理技术未说明。原文件中描述污染物类别为废气，污染物指标为工业废气量，此处对其进行了匹配工作，将其匹配到LCAflow库里面相最符合的流

## Use advice
This dataset is derived from the Pollution Source Census Report and contains information on pollution emissions and related products. However, it does not include data on energy or chemical consumption, nor does it provide information on waste or co-product generation. When utilizing this dataset, please supplement the missing data based on actual conditions before use
该数据集来源于污染源普查报告，包含污染物排放及相关产品信息，但不包含能源或化学品消耗数据，也不提供废弃物或共生产物产生信息。在使用该数据集时，请根据实际情况补充缺失数据后再使用。

## Review details
Inventory: The internal review was done by several iteration steps concerning raw data validation, raw data documentation, representativity, completeness and consistency of modelling with regard to ISO 14040 and 14044.
清单： 内部审查通过几个迭代步骤完成，涉及原始数据验证、原始数据记录、代表性、完整性、与 ISO 14040 和 14044 有关的建模的一致性。

## Data sources
- 第二次全国污染源普查产排污核算系数手册（试用版）,二级代码28,三级代码281.0,四级代码2812文件，在完整版文件中第546页
