# Livestock and poultry breeding ; feed processing stage ; broiler breeding area

Dataset: ILCD process, Unit process, single operation
Geography: CN
Reference year: 2014
Classification: Unit processes / Materials production / Agricultural production means
Functional unit: 1kg chicken
Generated by: Rui Yang, 1632707028@qq.com
Owner: Tiangong LCI Data Working Group
Review: Dependent internal review by Tiangong LCI Data Working Group
Amounts: no units in this file; such an amount is in the reference unit of its flow, which a separate flow dataset defines
copyright: false
licenseType: Free of charge for all users and uses

## General comment
Livestock and poultry feed processing mainly consumes electricity and coal.

## Geography
This study was conducted from 2014 to 2015, aiming at livestock and poultry feeding cycle, meat ratio, feed formula, feed consumption, coal and electricity consumption, etc. Has been to Shandong Gaomi Zhengda pig farm, Laixi City Zhishuang dairy farm, Jimo city Duan Bolan town Jiangjiapo village pig farm, Jimo City Liujiazhuang town livestock farm, Rizhao City Changling town Guanzhuang village, Juxian County Zhailihe town Dongxing Agriculture and animal husbandry company, Juxian Qiaoshan town east Chen dairy farm, Juxian Qiaoshan town Liu Jiayi water pig farm, Zhucheng Foreign Trade Co., LTD. Phoenix parents breeding duck farm, Xinjiang Fukang Hongfa Breeding professional cooperative, Jiuyun Street Town Xuhong laying Chicken cooperative, Jiuyun Street Town Liuyun Village self-contained breeding farm, China Australia Holding Group Co., LTD., Dezhou City Qingyun County Wayu Village, Shandong Province Qingyun County four Liu community beef cattle breeding base, Dezhou City Qingyun Qingnian chicken breeding base, Qingyun County Yongli Poultry layer breeding company, Qingyun County Xingchen youth chicken breeding Field research was carried out by professional breeding cooperatives, Qingyun Dongtai broiler breeding cooperatives, Hebei Yanshan Boyuan Feed Co., LTD., Yanshan Da Chinese Feed Co., LTD., Wudi Liuhe Feed Co., LTD., and China-Australia Oriental Hope Feed Co., LTD.

## Technology and included processes
In this paper, the life cycle of livestock and poultry farming is divided into six stages: feed crop planting, feed processing, livestock and poultry raising, manure treatment, slaughter and transportation. The specific life cycle process of livestock and poultry breeding is shown in Figure 2-1. Due to the lack of some data and the limitations of basic conditions, the production, transportation and use of pesticides, mulch and feed additives have not been analyzed, and the environmental impact caused by other related infrastructure construction, transport production and labor costs is no longer considered.

## Technical purpose
The data set describes the feed processing stage of the broiler breeding area within the livestock and poultry breeding industry. This process is essential for preparing feed for broiler chickens, which is used to nourish and grow the birds that will ultimately be sold as 1kg portions of chicken meat. The feed processing is tailored to optimize the feed formula, meat to feed ratio, and feed consumption, aiming to enhance the efficiency of meat production. This data is relevant for poultry breeders, agricultural analysts, and researchers examining the environmental impacts and resource consumption—namely electricity and coal—of producing chicken meat at scale.

## Reference product
- feed: 2.27505; calculated

## Inputs
- Electricity: 0.204755; calculated
- hard coal: 0.0273006; calculated
- maize grain: 1.57; measured
- soybean: 0.71; measured
- wheat: 0.95; measured

## Outputs
- carbon dioxide (fossil),carbon dioxide (fossil): 0.11387; measured
  Broiler chicken breeding community
- sulfur dioxide: 0.00199; measured
  Broiler chicken breeding community
- nitrogen, total (excluding N2): 0.00032; measured
  Broiler chicken breeding community
- carbon monoxide (fossil): 5.1e-5; measured
  Broiler chicken breeding community

## Use advice
When utilizing this data set in Life Cycle Assessments or other environmental impact studies, users should pay special attention to the energy inputs (electricity and coal) associated with the feed processing stage. It is suggested that users incorporate the feed conversion efficiency and the inputs' regional energy mix data to better estimate environmental burdens. Recycling and end-of-life scenarios for feed processing by-products should be considered where relevant. The temporal scope of the data (2014-2015) must be acknowledged, as changes in technology and practices since then may affect the applicability of the data. Finally, analysts should ensure that the boundaries of the assessed systems are consistent with the operations described in the data.

## Review details
Inventory: The internal review was done by several iteration steps concerning raw data validation, raw data documentation, representativity, completeness and consistency of modelling with regard to ISO 14040 and 14044.

## Data sources
- 周景月. 基于生命周期评价的畜禽养殖环境影响分析. (青岛科技大学, 2017).
