# falling and mining Coal ; coal mining ; underground fully mechanized coal mining

Dataset: ILCD process, Unit process, single operation
Geography: ZZ-SD-CN
Reference year: 2022
Classification: Energy carriers and technologies / Energetic raw materials
Generated by: Linlin Yin, yinlinlin0623@163.com
Owner: Tiangong LCI Data Working Group
Review: Dependent internal review by Tiangong LCI Data Working Group
Amounts: no units in this file; such an amount is in the reference unit of its flow, which a separate flow dataset defines
licenseType: Free of charge for all users and uses

## Geography
The Fifth-II mining area of the Jinda Coal Mine is located in Tengzhou City, Shandong Province, China . The average east–west width of the Fifth-II mining area is about 0.66 km, the average north–south length is about 2.9 km, and the total area is about 1.94 km^2.

## Technology and included processes
Shearer and spray pumping stations are used in this process.

## Reference product
- Hard coal, at consumer EU-27: 1000; uniform; estimated
  One ton of coal is mined by the coal caving mining process in 5 coal mining areas.

## Outputs
- carbon dioxide (fossil): 1.21154e7; uniform; measured
  The amount of CO2 released by the falling coal mining process in 5 coal mining areas.
- carbon dioxide (fossil): 8488.85; uniform; calculated
  The amount of CO2 released by 1 ton of coal mining in 5 coal mining areas.

## Data selection and combination
The B-R model is used to obtain the carbon emissions in the mining process of the mining area.

## Review details
Inventory: The internal review was done by several iteration steps concerning raw data validation, raw data documentation, representativity, completeness and consistency of modelling with regard to ISO 14040 and 14044.

## Data sources
- Li, B. et al. Research on a Carbon Emission Calculation Model and Method for an Underground Fully Mechanized Mining Process. Energies 15, 2871 (2022).
