# Caustic soda production ; sodium hydroxide ; cradle

Dataset: ILCD process, Unit process, single operation
Geography: CN
Reference year: 2019
Classification: Unit processes / Materials production / Inorganic chemicals
Generated by: Zimeng Cai, caizm6178@163.com
Owner: Tiangong LCI Data Working Group
Review: Dependent internal review by Tiangong LCI Data Working Group
Amounts: no units in this file; such an amount is in the reference unit of its flow, which a separate flow dataset defines
copyright: false
licenseType: Free of charge for all users and uses

## General comment
Sodium hydroxide, also known as caustic soda, produced in this process is widely used across various industries. It serves as a key chemical in the manufacture of paper and pulp, textiles, drinking water, soaps and detergents, and as a drain cleaner. Moreover, it's utilized in the food industry for cleaning and disinfecting equipment, peeling fruits and vegetables, and in the process of food preparation. In the chemical industry, it is used for pH regulation, as a reagent in the production of various chemical compounds, and in petroleum refining.

## Time period
Date of publication

## Reference product
- Sodium hydroxide: 1000; software or database
  caustic soda

## Inputs
- hard coal; 26.3 MJ/kg: 2062.56; software or database
  Fuel mix: raw coal (20%), electricity (80%)
- electricity, high voltage, aluminium industry: 8251.04; software or database
  Fuel mix: raw coal (20%), electricity (80%)

## Data selection and combination
Inventories of energy input and material flow are collected from updated yearbook s, published papers, official reports and databases. The details of the inventory are presented as Table 1. It should be noted that the data for the material transportation assumptions are based on relevant studies, whic h may be slightly different from the actual situation. The life-cycle intensities of each end-use energy type are based on the results of our previous studies.

## Use advice
When using this data for Life Cycle Assessment, please pay close attention to the energy input and material flow inventory presented in Table 1. Consider potential deviations between the transportation assumptions used in this data set and actual transportation scenarios. Furthermore, adjustments might be required based on the specific sub-processes and end-use energy types involved in your study. Ensure that your LCA modeling accurately reflects the life-cycle intensities for each energy type based on the parameters presented in this dataset and take into account the results of previous studies highlighted in the dataset for a comprehensive evaluation.

## Review details
Inventory: The internal review was done by several iteration steps concerning raw data validation, raw data documentation, representativity, completeness and consistency of modelling with regard to ISO 14040 and 14044.

## Data sources
- Peng, T., Ou, X., Yan, X. & Wang, G. Life-cycle analysis of energy consumption and GHG emissions of aluminium production in China. in Energy Procedia vol. 158 3937–3943 (2019).
