# Fattening pig production ; feed growing process

Dataset: ILCD process, Unit process, single operation
Geography: LN-CN
Reference year: 2010
Classification: Unit processes / Materials production / Agricultural production means
Functional unit: The evaluation unit was 1000 fattening pigs
Generated by: Rui Yang, 1632707028@qq.com
Owner: Tiangong LCI Data Working Group
Review: Dependent internal review by Tiangong LCI Data Working Group
Amounts: no units in this file; such an amount is in the reference unit of its flow, which a separate flow dataset defines
copyright: false
licenseType: Free of charge for all users and uses

## General comment
The energy consumption involved in crop cultivation is mainly the fuel consumption of agricultural machinery during fertilization, weeding and harvesting. According to the research of Huang Hu et al., the average fuel consumption (diesel) of agricultural machinery was 56.25 L·hm-2 between fixed path conservation tillage and non-fixed path conservation tillage. The combustion value of diesel oil is 9 800 kcal·kg-1, and the density of diesel oil is 0.85 kg·L-1. Therefore, burning 1 L of diesel can release 8 330 kcal heat, 1 kcal can be converted to 4.2 kJ, then burning 1 L of diesel can produce 34.99 MJ energy.

## Geography
The yield per hectare of corn, soybean and wheat in Liaoning Province in 2010 was ··

## Time period
The yield per hectare of corn, soybean and wheat in Liaoning Province in 2010 was respectively

## Technology and included processes
The evaluation includes: gas emissions from the use of agricultural machinery for fuel consumption

## Technical purpose
The industrial process described is primarily used in the agricultural sector for the production of fattening pigs. This encompasses crop cultivation for feed, where energy consumption is a key factor during the operations of fertilization, weeding, and harvesting with agricultural machinery. The use of diesel for agricultural machinery is also captured to provide insights on gas emissions that contribute to global warming, environmental acidification, and eutrophication. The data is relevant for agricultural production analysis and environmental impact assessments in pig farming operations.

## Reference product
- pig: 1000; estimated
  作为参考定量，非实际输出

## Inputs
- Diesel: 4.52925; calculated

## Outputs
All rows: measured
- carbon dioxide (fossil),carbon dioxide (fossil): 14371.3
- carbon monoxide (fossil): 4.92
- nitrogen, total (excluding N2): 24.24
  1 NOx
- sulfur oxides: 44.69
  1Sulfur oxides
- maize grain: 216000
- soybean: 33100
- wheat: 144000

## Data selection and combination
The data in this paper were collected from 36 large-scale chemical fattening pig farms in Liaoning province. The potential impacts of global warming, environmental acidification and eutrophication in the process of fattening pig production were calculated with reference to the relevant data provided by Liaoning Statistical Yearbook.

## Use advice
When using the provided data set, researchers and practitioners should take note of the specific methodologies used for calculating environmental impacts. Careful consideration of the unit of analysis (per 1000 fattening pigs released) is critical. The fuel consumption values from agricultural machinery should be included in the total energy consumption analysis. Users should convert energy units appropriately when integrating into broader LCA frameworks, and ensure that gas emissions resulting from fuel consumption are adequately accounted for in impact potential calculations.

## Review details
Inventory: The internal review was done by several iteration steps concerning raw data validation, raw data documentation, representativity, completeness and consistency of modelling with regard to ISO 14040 and 14044.

## Data sources
- 刘鸣达, 赵妍, 刘显军, & 王耀晶. 辽宁省育肥猪生产环境影响的生命周期评价. 农业环境科学学报 31, 1250–1255 (2012).
