# Solvent extraction of Rare Earth Elements (REE) Rare Earth Elements (REE);baseline;Rare Earth Elements (REE) containing ore

Dataset: ILCD process, Unit process, single operation
Geography: NMG-CN
Reference year: 2012
Classification: Unit processes / Materials production / Non-energetic raw materials
Functional unit: Not Mentationed
LCI method principle: Attributional
LCI method approaches: Allocation - market value
Generated by: Tao Wang, twang@iue.ac.cn
Owner: Tiangong LCI Data Working Group
Review: Dependent internal review by Tiangong LCI Data Working Group
Amounts: no units in this file; such an amount is in the reference unit of its flow, which a separate flow dataset defines
copyright: false
licenseType: Free of charge for all users and uses

## General comment
This data set pertains to the solvent extraction of rare earth elements (REE) from an ore containing REE using conventional surface mining techniques, such as drilling and blasting. The ore is sourced from an open pit mine with a reserve of 750 million tons at a 4.1% REO concentration. This raw material extraction process is typically utilized in the production of various high-strength permanent magnets, such as those made from neodymium-iron-boron (NdFeB). These magnets are commonly used in a wide range of applications including electric motors, wind turbines, and hard disk drives.

## Technology and included processes
Ore is recovered from the open pit mine using conventional surface mining techniques such as drilling and blasting. The mine contains 750 million tons of ore at 4.1% REO

## Reference product
- Rare Earth Oxides: 3.87; software or database
  Other 99.99% REO's, at solvent extraction, primary, baseline

## Inputs
All rows: software or database
- Chemicals organic,Chemicals, organic: 0.317
  Chemicals, organic
- transport in t*km,transport in t*km: 1.43
  lorry >16t
- transport in t*km,transport in t*km: 25.7
  freight, rail
- Hydrochloric acid: 0.72
- sodium hydroxide: 1.86
- Ammonium bicarbonate: 1.1
- heavy fuel oil: 3.9
- Hazardous organic waste for disposal (unspecific): 0.2
- Kerosene: 5.31
- Electricity: 3.348
- Rare Earth Oxides: 4.91
  LANGUAGE

## Outputs
All rows: software or database
- Neodymium oxide: 1
- waste heat: 3.35
- chloride: 0.0163
- carbon dioxide (fossil): 2.27
  原文未区分bio和fossil，根据专家判断此处为fossil
- hydrogen fluoride: 0.0143
- Suspended solids, unspecified,Suspended solids, unspecified: 0.0107
- thorium-232: 0.271
- antimony-122: 1

## Deviations from the LCI method approaches
In this section, we discuss the life cycle inventory (LCI) in detail. Each subsection discusses one process of the LCA. Section 3.1 describes the conventional method of rare earths in China from mineral sources. Section 3.2 describes the production process used to transform neodymium oxide into an NdFeB magnet. Finally, section 3.3 describes two alternative recycling processes that could be used. Detailed information on the LCI, assumptions, and allocation choices can be found in the Supporting Information.

## Use advice
Users of this data set should consider the specific environmental impacts associated with conventional surface mining techniques. It is recommended to account for all stages of the extraction process in the Life Cycle Inventory (LCI), including any environmental remediation required post-mining. Additionally, users should be aware of technological advancements in mining and solvent extraction that could alter the environmental profile of this data. When using this data in comparative studies, ensure consistency by applying the same technological scope and assumptions to all alternatives being evaluated.

## Review details
Inventory: The internal review was done by several iteration steps concerning raw data validation, raw data documentation, representativity, completeness and consistency of modelling with regard to ISO 14040 and 14044.

## Data sources
- Sprecher, B. et al. Life Cycle Inventory of the Production of Rare Earths and the Subsequent Production of NdFeB Rare Earth Permanent Magnets. Environ. Sci. Technol. 48, 3951–3958 (2014).
