# Vanadium Slag ; steel scrap,iron(lump)，ferroalloy,slagging agent ; Converter method ; All sizes; NESPS2 / 钒渣 ; 废钢、铁水（块）、铁合金、造渣剂 ; 转炉法 ; 所有规模 ; 全国第二次污染普查数据

Dataset: ILCD process, Unit process, single operation
Geography: CN
Reference year: 2019
Classification: Reference Parameters / Materials production / Metals and semimetals
Generated by: The data was created by the Office of the Second National Pollution Source Census of the Ministry of Ecology and Environment, and the data was organized by the TianGong Plan team for ILCD format / 生态环境部第二次全国污染源普查工作办公室创建数据，天工计划团队常慧敏整理数据为ILCD格式
Owner: Tiangong LCI Data Working Group / 天工LCI数据工作小组
Review: Dependent internal review by Tiangong LCI Data Working Group / 天工LCI数据工作小组
Amounts: no units in this file; such an amount is in the reference unit of its flow, which a separate flow dataset defines
copyright: false
licenseType: Free of charge for all users and uses

## General comment
the Technical of end-of-pipe management technology for pollution Exhaust gasis/，Its Technical efficiency of end-of-pipe management0

## Technical purpose
此工业流程涉及使用转炉法生产钒渣。它使用的原料包括钢铁废料、团块铁、铁合金和造渣剂。该流程适用于所有规模，并适合冶金工业，用于生产高强度钢合金和其他含钒产品。

## Reference product
- Vanadium Slag: 1000; calculated
  源文件中描述为为钒渣，此处对其进行了匹配工作，将其匹配到LCAflow库里面相最符合的流，污染物指标备注为提钒转炉二次烟气废气量，产污系数备注为专指提钒转炉对应的产污系数

## Outputs
- particles (PM2.5 - PM10): 0.0512; calculated
  the Technical of end-of-pipe management technology for pollution particles (PM2.5 - PM10)isBag filter，Its Technical efficiency of end-of-pipe management99.6
  污染物指标颗粒物(提钒转炉二次烟气有组织)的末端治理技术是布袋除尘，其效率为99.6，末端治理设施实际运行率（k值）计算公式为k=除尘设备年正常运行小时数（小时）/生产系统年运行小时数（小时）。原文件中描述污染物类别为废气，污染物指标为颗粒物(提钒转炉二次烟气有组织)，此处对其进行了匹配工作，将其匹配到LCAflow库里面相最符合的流，污染物指标备注为提钒转炉二次烟气有组织颗粒物，产污系数备注为专指提钒转炉对应的产污系数
- Exhaust gas: 3403; calculated
  the Technical of end-of-pipe management technology for pollution Exhaust gasis/，Its Technical efficiency of end-of-pipe management0
  污染物指标提钒转炉二次烟气废气量的末端治理技术是/，其效率为0。原文件中描述污染物类别为废气，污染物指标为提钒转炉二次烟气废气量，此处对其进行了匹配工作，将其匹配到LCAflow库里面相最符合的流，污染物指标备注为提钒转炉二次烟气废气量，产污系数备注为专指提钒转炉对应的产污系数

## Use advice
This dataset is derived from the Pollution Source Census Report and contains information on pollution emissions and related products. However, it does not include data on energy or chemical consumption, nor does it provide information on waste or co-product generation. When utilizing this dataset, please supplement the missing data based on actual conditions before use
该数据集来源于污染源普查报告，包含污染物排放及相关产品信息，但不包含能源或化学品消耗数据，也不提供废弃物或共生产物产生信息。在使用该数据集时，请根据实际情况补充缺失数据后再使用。

## Review details
Inventory: The internal review was done by several iteration steps concerning raw data validation, raw data documentation, representativity, completeness and consistency of modelling with regard to ISO 14040 and 14044.
清单： 内部审查通过几个迭代步骤完成，涉及原始数据验证、原始数据记录、代表性、完整性、与 ISO 14040 和 14044 有关的建模的一致性。

## Data sources
- 第二次全国污染源普查产排污核算系数手册（试用版）,四级代码3120文件，在完整版文件中第4111页
