# Municipal sludge treatment and disposal;wet sludge moisture content 80.94%;incineration

Dataset: ILCD process, Unit process, single operation
Geography: HF-AH-CN
Classification: Unit processes / End-of-life treatment / Waste water treatment
Functional unit: The residual sludge moisture content of Hefei Wangtang Sewage Treatment Plant is 80.94%, and the functional unit is 1t of residual sludge.
Generated by: Jin Sitian, 2331276@tongji.edu.cn
Owner: Tiangong LCI Data Working Group
Review: Dependent internal review by Tiangong LCI Data Working Group
Amounts: no units in this file; such an amount is in the reference unit of its flow, which a separate flow dataset defines
copyright: ['opt4ROkqig']
licenseType: Free of charge for all users and uses

## General comment
A common heat pump dehumidification dryer (model DBDMB36000) was selected as the heat source to make a simple analysis of the actual situation of residual sludge drying in the sewage treatment plant. The analysis and calculation of the residual sludge incineration power generation was carried out using a 25 MW direct combustion power generation system. The energy consumption of this process is provided by the power generation system itself.

## Geography
Hefei Wangtang Sewage Treatment Plant

## Technology and included processes
For 1 t sludge with a moisture content of 80.94%, it is first dried to sludge with a moisture content of 36%.

## Technical purpose
The municipal sludge treatment and disposal process, with a sludge moisture content of 80.94%, is intended for the incineration of wet sludge. This process is specifically utilized at the Hefei Wangtang Sewage Treatment Plant and is applicable in municipal waste management. It is used to manage and treat the residual wet sludge obtained from sewage treatment processes.

## Reference product
- Sludge: 1000; input; estimated
  1t of remaining sludge with a moisture content of 80.94%

## Outputs
All rows: calculated
- carbon dioxide (biogenic): 209.127
  The original text does not distinguish between biogenic and fossil, and according to experts, it is biogenic here.
- sulfur dioxide: 1.182
- mineral waste (ash): 98.185
- methane (biogenic),methane (biogenic): 0.009827
  (same comment as for carbon dioxide (biogenic))
- Nitrogen oxides: 2.204
- carbon monoxide (biogenic): 0.8288
  (same comment as for carbon dioxide (biogenic))
- nitrous oxide: 0.008636
- volatile organic compound: 0.00953
- Flue dust: 1.885
- cadmium: 3.375e-5
- zinc: 0.059835
- copper: 0.02677
- lead: 0.002443
- nickel: 0.001146
- chromium: 0.00203

## Use advice
Attention should be paid to the high moisture content of the sludge when using this dataset as it affects the efficiency and environmental impact of the incineration process. The functional unit of this dataset is defined as 1 tonne of residual sludge. Users must take into account any pre-treatment or drying necessary prior to incineration. It is also important to consider the technological applicability and the regional specificity of the process conditions when applying this data in life cycle assessment models.

## Review details
Inventory: The internal review was done by several iteration steps concerning raw data validation, raw data documentation, representativity, completeness and consistency of modelling with regard to ISO 14040 and 14044.

## Data sources
- 齐星昊. 基于生命周期评价的典型剩余污泥处理方法的环境影响比较研究[D].河南师范大学,2020.
