# Coke production;Coke; Coking

Dataset: ILCD process, Unit process, single operation
Geography: CN
Reference year: 2014
Classification: Unit processes / Energy carriers and technologies / Energetic raw materials
Generated by: Fuxiang, 1162850692@qq.com
Owner: Tiangong LCI Data Working Group
Review: Dependent internal review by Tiangong LCI Data Working Group
Amounts: no units in this file; such an amount is in the reference unit of its flow, which a separate flow dataset defines
copyright: false
licenseType: Free of charge for all users and uses

## General comment
The coke produced in this process is intended for use in blast furnace operations in the iron and steel industry. It serves as a reducing agent, energy carrier, and support structure for the raw materials during the iron smelting process.

## Time period
基于 A 钢厂 2014 年的生产数据进行计算和分析对比。

## Reference product
- coke,Coke: 367.5; measured
  Coke

## Inputs
All rows: measured
- process steam: 150
- oxygen: 3.32
- Electricity: 58.68
- Cleaned coal: 512.6
  Clean coal
- Coke oven gas: 21
  coke oven gas
- Blast furnace gas: 384
  blast furnace gas

## Outputs
All rows: measured
- process steam: 630
- benzene: 3.6
- Coal tar: 16.1
  coal tar
- Electricity: 167.328
  Dry coke quenching to generate electricity
- Coke oven gas: 165
  coke oven gas
- carbon dioxide (fossil): 394300
  原文未区分bio和fossil，根据专家判断此处为fossil
- methane: 10
- nitrous oxide: 8

## Use advice
When utilizing this data set for life cycle assessment, users should consider that the data is based on a single operation unit process from a specific steel plant in 2014. It is advised to check for process and energy efficiency improvements in the industry post-2014. Data extrapolation to other locations or time periods should be done with caution, taking into account the technological advancements and regional production practices.

## Review details
Inventory: The internal review was done by several iteration steps concerning raw data validation, raw data documentation, representativity, completeness and consistency of modelling with regard to ISO 14040 and 14044.

## Data sources
- 刘宏强, 付建勋, 刘思雨, 谢欣悦, & 杨笑楹. 钢铁生产过程二氧化碳排放计算方法与实践. 钢铁 51, 74–82 (2016).
