# Foundation constriction ; Tower foundation constriction of 3.6 MW Turbine

Dataset: ILCD process, Unit process, single operation
Geography: SH-CN
Reference year: 2009
Classification: Unit processes / Systems / Construction
Functional unit: The functional unit is 1 kWh on-grid electricity provision.
LCI method principle: Attributional
LCI method approaches: Allocation
Generated by: Yunzhi Zhao, ll10088@163.com
Owner: Tiangong LCI Data Working Group
Review: Dependent internal review by Tiangong LCI Data Working Group
Amounts: no units in this file; such an amount is in the reference unit of its flow, which a separate flow dataset defines
copyright: false
licenseType: Free of charge for all users and uses

## General comment
The dataset represents the tower foundation construction of a 3.6 MW wind turbine, essential for the establishment of the Donghai Bridge Offshore Wind Farm (DBOWF). This offshore wind farm is used to generate on-grid electricity, contributing to renewable energy provision and reducing dependency on fossil fuels. The turbine foundations are integral to the structural stability and operational efficiency of wind farms and are specifically designed for the unique conditions faced in offshore environments.

## Geography
The studied wind farm, the Donghai Bridge Offshore Wind Farm (DBOWF), is China's first offshore wind farm within the jurisdiction of Shanghai, as well as the first offshore wind farm outside Europe. The project has two-phases of construction, located on each side of the Donghai bridge (Fig. 1).

## Reference product
- Wind tower foundation: 1; measured

## Inputs
- Concrete: 1475.5
  Marine/Core concrete
- steel rebar: 174900
  Steel bar
- Steel,Steel: 216000
- Pile foundation steel pipe column: 829900
  Steel pipe column
- aluminium: 3000
  Al alloy

## Deviations from the LCI method approaches
The present study employed the PLCA modeling approach to calculate the energy and environmental emissions of a typical offshore wind farm in China. The cradle-to-grave process includes four stages, materials and equipment manufacturing, transportation and installation, operation and maintenance, and dismantling and recycling (Fig. 2).

## Data selection and combination
The technical parameters of wind turbines, foundations and cables are obtained from the design documents of the DBOWF (Table 2). The energy and emissions factors (i.e., the energy consumption and environmental emissions of per unit material and component production) are derived from the Ecoinvent 2.2 dataset (Ecoinvent Centre, 2009), and the coefficients of China's practices were preferentially referred. For key materials and equipment, their sea transportation energy is calculated from the transportation load and shipping energy intensity. The facility installation energy and emissions were estimated based on the construction plan. The wind farm's operation and maintenance data, such as the frequency and working time of maintenance, were obtained from site investigations with engineers and technicians. The uncertainties associated with model parameters and input data are illustrated in the sensitivity analysis section of this paper.

## Use advice
Data users should reference this dataset when evaluating the environmental impact of constructing wind turbine foundations in an offshore setting, specifically for DBOWF-like projects within the jurisdiction of Shanghai. The dataset is based on the PLCA modeling approach, thus should be integrated in similar methodological frameworks for consistency. Users should note the energy consumption and environmental emissions of each stage in the cradle-to-grave life cycle, and apply the related coefficients based on Chinese practices. Be aware of the potential uncertainties in model parameters and input data, and consult the sensitivity analysis section for guidance on these variances.

## Review details
Inventory: The internal review was done by several iteration steps concerning raw data validation, raw data documentation, representativity, completeness and consistency of modelling with regard to ISO 14040 and 14044.

## Data sources
- Yang, J. et al. The life-cycle energy and environmental emissions of a typical offshore wind farm in China. Journal of Cleaner Production 180, 316–324 (2018).
