# Medical dry non-silver films ; Substrates, ethyl acetate, special preparations ; Extrusion coating ; All sizes; NESPS2 / 医用干式非银胶片 ; 基材、乙酸乙酯、专用制剂 ; 挤压涂布 ; 所有规模 ; 全国第二次污染普查数据

Dataset: ILCD process, Unit process, single operation
Geography: CN
Reference year: 2019
Classification: Reference Parameters / Materials production / Other materials
Generated by: The data was created by the Office of the Second National Pollution Source Census of the Ministry of Ecology and Environment, and the data was organized by the TianGong Plan team for ILCD format / 生态环境部第二次全国污染源普查工作办公室创建数据，天工计划团队常慧敏整理数据为ILCD格式
Owner: Tiangong LCI Data Working Group / 天工LCI数据工作小组
Review: Dependent internal review by Tiangong LCI Data Working Group / 天工LCI数据工作小组
Amounts: no units in this file; such an amount is in the reference unit of its flow, which a separate flow dataset defines
copyright: false
licenseType: Free of charge for all users and uses

## General comment
the Technical of end-of-pipe management technology for pollution Exhaust gasis/，Its Technical efficiency of end-of-pipe management0

## Technical purpose
本数据集描述了一种工业流程，该流程涉及使用乙酸乙酯和专用制剂在挤出涂布过程中制造医用干式非银胶片基材，适用于所有规模的生产。该过程适用于医疗成像领域的生产商，并可应用于生产各种医疗诊断胶片。

## Reference product
- Medical Dry Film: 1; calculated
  源文件中描述为为医用干式非银胶片，此处对其进行了匹配工作，将其匹配到LCAflow库里面相最符合的流，污染物指标备注为工业废水量

## Outputs
- Waste water: 22500; calculated
  the Technical of end-of-pipe management technology for pollution Waste wateris/，Its Technical efficiency of end-of-pipe management0
  污染物指标工业废水量的末端治理技术是/，其效率为0。原文件中描述污染物类别为废水，污染物指标为工业废水量，此处对其进行了匹配工作，将其匹配到LCAflow库里面相最符合的流，污染物指标备注为工业废水量
- volatile organic compound: 0.3668; calculated
  the Technical of end-of-pipe management technology for pollution volatile organic compoundisCatalytic combustion method，Its Technical efficiency of end-of-pipe management86
  污染物指标挥发性有机物的末端治理技术是催化燃烧法，其效率为86，末端治理设施实际运行率（k值）计算公式为k=设备耗电量（千瓦时）/（设备额定功率（千瓦）×设备运行时间（小时））。原文件中描述污染物类别为废气，污染物指标为挥发性有机物，此处对其进行了匹配工作，将其匹配到LCAflow库里面相最符合的流，污染物指标备注为挥发性有机物
- chemical oxygen demand: 1.098; calculated
  the Technical of end-of-pipe management technology for pollution chemical oxygen demandisAerobic biological treatment，Its Technical efficiency of end-of-pipe management80
  污染物指标化学需氧量的末端治理技术是好氧生物处理，其效率为80，末端治理设施实际运行率（k值）计算公式为k=设备耗电量（千瓦时）/（设备额定功率（千瓦）×设备运行时间（小时））。原文件中描述污染物类别为废水，污染物指标为化学需氧量，此处对其进行了匹配工作，将其匹配到LCAflow库里面相最符合的流，污染物指标备注为化学需氧量
- Exhaust gas: 228000; calculated
  the Technical of end-of-pipe management technology for pollution Exhaust gasis/，Its Technical efficiency of end-of-pipe management0
  污染物指标工业废气量的末端治理技术是/，其效率为0，末端治理设施实际运行率（k值）计算公式为/。原文件中描述污染物类别为废气，污染物指标为工业废气量，此处对其进行了匹配工作，将其匹配到LCAflow库里面相最符合的流，污染物指标备注为工业废气量

## Use advice
This dataset is derived from the Pollution Source Census Report and contains information on pollution emissions and related products. However, it does not include data on energy or chemical consumption, nor does it provide information on waste or co-product generation. When utilizing this dataset, please supplement the missing data based on actual conditions before use
该数据集来源于污染源普查报告，包含污染物排放及相关产品信息，但不包含能源或化学品消耗数据，也不提供废弃物或共生产物产生信息。在使用该数据集时，请根据实际情况补充缺失数据后再使用。

## Review details
Inventory: The internal review was done by several iteration steps concerning raw data validation, raw data documentation, representativity, completeness and consistency of modelling with regard to ISO 14040 and 14044.
清单： 内部审查通过几个迭代步骤完成，涉及原始数据验证、原始数据记录、代表性、完整性、与 ISO 14040 和 14044 有关的建模的一致性。

## Data sources
- 第二次全国污染源普查产排污核算系数手册（试用版）,二级代码26,四级代码2665文件，在完整版文件中第4111页
