# Naphtha fraction, fuel oil diesel fraction, bitumen, gasoline fraction, coke ; Coal tar, hydrogen ; Whole distillate fixed bed hydrotreating process ; All sizes; NESPS2 / 石脑油组分、燃料油柴油组分、沥青、汽油组分、焦炭 ; 煤焦油、氢气 ; 全馏分固定床加氢工艺 ; 所有规模 ; 全国第二次污染普查数据

Dataset: ILCD process, Unit process, single operation
Geography: CN
Reference year: 2019
Classification: Reference Parameters / Energy carriers and technologies / Crude oil based fuels
Generated by: The data was created by the Office of the Second National Pollution Source Census of the Ministry of Ecology and Environment, and the data was organized by the TianGong Plan team for ILCD format / 生态环境部第二次全国污染源普查工作办公室创建数据，天工计划团队常慧敏整理数据为ILCD格式
Owner: Tiangong LCI Data Working Group / 天工LCI数据工作小组
Review: Dependent internal review by Tiangong LCI Data Working Group / 天工LCI数据工作小组
Amounts: no units in this file; such an amount is in the reference unit of its flow, which a separate flow dataset defines
copyright: false
licenseType: Free of charge for all users and uses

## General comment
the Technical of end-of-pipe management technology for pollution Exhaust gasis/

## Technical purpose
所描述的过程包括生产石脑油组分、燃料油柴油组分、沥青、汽油组分等多种石油产品，以及焦炭和煤焦油氢等副产品。这些产品被广泛用于燃料生产、道路建设（沥青）、化学合成，以及作为进一步精炼过程的原料。该技术还配备了用于控制废气、颗粒物、氮氧化物、二氧化硫、氨和挥发性有机化合物（VOCs）的尾气处理污染管理系统，确保各种规模的工业操作符合环保要求。

## Reference product
- Coal tar: 1000; input; calculated
  源文件中描述为为煤焦油、氢气，此处对其进行了匹配工作，将其匹配到LCAflow库里面相最符合的流，污染物指标备注为工业废气量

## Outputs
All rows: calculated
- volatile organic compound: 0.00042
  the Technical of end-of-pipe management technology for pollution volatile organic compoundisOthers (wastewater treatment station: biochemical filtration + activated carbon adsorption)，Its Technical efficiency of end-of-pipe management97
  污染物指标挥发性有机物的末端治理技术是其他（废水处理站：生化过滤+活性炭吸附），其效率为97，末端治理设施实际运行率（k值）计算公式为k=废气治理设施运行时间（小时/年）/正常生产时间（小时/年）。原文件中描述污染物类别为废气，污染物指标为挥发性有机物，此处对其进行了匹配工作，将其匹配到LCAflow库里面相最符合的流，污染物指标备注为挥发性有机物
- particles (PM2.5 - PM10): 0.0113
  the Technical of end-of-pipe management technology for pollution particles (PM2.5 - PM10)isOthers (direct discharge)，Its Technical efficiency of end-of-pipe management0
  污染物指标颗粒物的末端治理技术是其他（直接排放），其效率为0，末端治理设施实际运行率（k值）计算公式为/。原文件中描述污染物类别为废气，污染物指标为颗粒物，此处对其进行了匹配工作，将其匹配到LCAflow库里面相最符合的流，污染物指标备注为颗粒物
- sulfur dioxide: 0.0183
  the Technical of end-of-pipe management technology for pollution sulfur dioxideisOthers (direct discharge)，Its Technical efficiency of end-of-pipe management0
  污染物指标二氧化硫的末端治理技术是其他（直接排放），其效率为0，末端治理设施实际运行率（k值）计算公式为/。原文件中描述污染物类别为废气，污染物指标为二氧化硫，此处对其进行了匹配工作，将其匹配到LCAflow库里面相最符合的流，污染物指标备注为二氧化硫
- Nitrogen oxides: 0.0426
  the Technical of end-of-pipe management technology for pollution Nitrogen oxidesisOthers (direct discharge)，Its Technical efficiency of end-of-pipe management0
  污染物指标氮氧化物的末端治理技术是其他（直接排放），其效率为0，末端治理设施实际运行率（k值）计算公式为/。原文件中描述污染物类别为废气，污染物指标为氮氧化物，此处对其进行了匹配工作，将其匹配到LCAflow库里面相最符合的流，污染物指标备注为氮氧化物
- ammonia: 0.0544608
  the Technical of end-of-pipe management technology for pollution ammoniaisOthers (wastewater treatment station: biochemical filtration + activated carbon adsorption)，Its Technical efficiency of end-of-pipe management2.4
  污染物指标氨的末端治理技术是其他（废水处理站：生化过滤+活性炭吸附），其效率为2.4，末端治理设施实际运行率（k值）计算公式为k=废气治理设施运行时间（小时/年）/正常生产时间（小时/年）。原文件中描述污染物类别为废气，污染物指标为氨，此处对其进行了匹配工作，将其匹配到LCAflow库里面相最符合的流，污染物指标备注为氨
- ammonia: 0.0558
  the Technical of end-of-pipe management technology for pollution ammoniaisOthers (direct discharge)，Its Technical efficiency of end-of-pipe management0
  污染物指标氨的末端治理技术是其他（直接排放），其效率为0，末端治理设施实际运行率（k值）计算公式为/。原文件中描述污染物类别为废气，污染物指标为氨，此处对其进行了匹配工作，将其匹配到LCAflow库里面相最符合的流，污染物指标备注为氨
- Exhaust gas: 1217
  the Technical of end-of-pipe management technology for pollution Exhaust gasis/
  污染物指标工业废气量的末端治理技术是/，末端治理设施实际运行率（k值）计算公式为/。原文件中描述污染物类别为废气，污染物指标为工业废气量，此处对其进行了匹配工作，将其匹配到LCAflow库里面相最符合的流，污染物指标备注为工业废气量

## Use advice
This dataset is derived from the Pollution Source Census Report and contains information on pollution emissions and related products. However, it does not include data on energy or chemical consumption, nor does it provide information on waste or co-product generation. When utilizing this dataset, please supplement the missing data based on actual conditions before use
该数据集来源于污染源普查报告，包含污染物排放及相关产品信息，但不包含能源或化学品消耗数据，也不提供废弃物或共生产物产生信息。在使用该数据集时，请根据实际情况补充缺失数据后再使用。

## Review details
Inventory: The internal review was done by several iteration steps concerning raw data validation, raw data documentation, representativity, completeness and consistency of modelling with regard to ISO 14040 and 14044.
清单： 内部审查通过几个迭代步骤完成，涉及原始数据验证、原始数据记录、代表性、完整性、与 ISO 14040 和 14044 有关的建模的一致性。

## Data sources
- 第二次全国污染源普查产排污核算系数手册（试用版）,二级代码25,四级代码2519文件，在完整版文件中第4111页
