# Soil and groundwater remediation;Ex-situ;Soil washing;Chemical extraction

Dataset: ILCD process, Unit process, single operation
Geography: KR
Reference year: 2023
Classification: Unit processes / Other Services / Repair and maintenance
Generated by: Huang Yue, huangyue@caep.org.cn
Owner: Tiangong LCI Data Working Group
Review: Dependent internal review by Tiangong LCI Data Working Group
Amounts: no units in this file; such an amount is in the reference unit of its flow, which a separate flow dataset defines
copyright: false
licenseType: Free of charge for all users and uses

## General comment
Include the soil washing process

## Geography
Incheon City, approximately 50 km east of Seoul, South Korea

## Technical purpose
The described process is utilized for ex-situ soil and groundwater remediation, specifically through soil washing and chemical extraction. This remediation technique is applied to contaminated soil, removed from its original location to a controlled setting, commonly in scenarios where in-situ treatment is not feasible. The process is effective for various pollutants and is implemented in environmental engineering projects. The locality of the referenced use is in Incheon City, which is approximately 50 km east of Seoul, South Korea. This approach is suitable for industrial applications where soil contamination hampers site redevelopment or poses environmental health risks.

## Reference product
- Remediated soil: 1; measured

## Inputs
All rows: measured
- Electricity: 61413.8
- hydrogen chloride: 174
- Tap Water: 5215
- Pre-treatment Soil: 1
- waste water - untreated: 1

## Outputs
- carbon dioxide (fossil): 317000; measured
- particles (PM10): 1.51; measured
- sulfur oxides: 30.6; measured
- nitrous oxide: 32.5; measured

## Data treatment and extrapolations
The total footprint was analyzed by calculating the footprints of each stage separately using SiteWiseTM ver.2

## Use advice
When utilizing this data set for Life Cycle Assessment (LCA), incorporate all main raw materials and essential energy consumption in your analysis. Ensure that the soil washing process is included as part of the unit processes. Use SiteWiseTM ver.2 to calculate the environmental footprints of each stage individually to derive the total environmental footprint. Carefully review the methodological fit, considering the technological applicability for remediation projects within similar geographical and technological contexts as Incheon City, South Korea.

## Review details
Inventory: The internal review was done by several iteration steps concerning raw data validation, raw data documentation, representativity, completeness and consistency of modelling with regard to ISO 14040 and 14044.

## Data sources
- Kim, D.-H., Hwang, B.-R., Moon, D.-H., Kim, Y.-S. & Baek, K. Environmental assessment on a soil washing process of a Pb-contaminated shooting range site: a case study. Environ Sci Pollut Res 20, 8417–8424 (2013).
