# cathode copper production;cathode copper;Pyrometallurgy;copper ore

Dataset: ILCD process, Unit process, single operation
Geography: CN
Reference year: 2009
Valid until: 2013
Classification: Unit processes / Materials production / Metals and semimetals
Functional unit: the functional unit was defined as the production of 1 ton of cathode copper.
LCI method principle: Attributional
LCI method approaches: Allocation - mass
Generated by: Peng Wang, 2867919560@qq.com
Owner: Tiangong LCI Data Working Group
Review: Dependent internal review by Tiangong LCI Data Working Group
Amounts: no units in this file; such an amount is in the reference unit of its flow, which a separate flow dataset defines
copyright: false
licenseType: Free of charge for all users and uses

## General comment
Cathode copper obtained through this industrial process is primarily used for electrical wiring, roofing, plumbing, and industrial machinery. It serves as a key raw material in electrical engineering, construction, transport manufacturing, and other heavy industries, due to its high electrical conductivity and durability. Given that the copper was obtained by pyrometallurgy and hydrometallurgy from ore averages in China between 2009 and 2013, this cathode copper suits large-scale applications where high purity and quality are essential.

## Geography
Central of China

## Time period
The ore grade of fire refining process is the average level of the Chinese underground and open-pit mining from 2009 to 2013,

## Technology and included processes
Heap leaching system from the ore mining stage, through crushing, heap leching, extraction, to the electrowinning stage for produce cathode copper (Fig. 1). After an open-pit mining process, the mined copper ores were trucked to the fine ore bin crushing into uniform-sized particles, followed by a sieving process. The ores filtered by sieve with a diameter of 40 mm were belted to the heap leaching field for acid leaching. The leachate was then pumped into a solvent extraction tank for extraction and stripping, and the raffinate was pumped back to the heap leaching stage for recycling. Copper is ultimately deposited on the cathode through electrowinning.Mining&Beneficiation-Transportation-Flash Smelting-Converting-Fire Refining-Electrolytic Refining

## Reference product
- Refined copper: 1000; software or database

## Inputs
All rows: software or database
- hard coal,hard coal,hard coal: 1280
  Coal
- crude oil; 42.3 MJ/kg: 354
  Crude oil
- natural gas; 44.1 MJ/kg: 105
  Natural gas
- Active carbon: 23.9
  Active carbon needs to be replenished
- Anode Plate: 0
  Anode Plate needs to be supplemented
- bauxite: 0
  Bauxite
- Bone glue: 0.1
  Bone glue needs to be replenished
- calcium carbonate: 130
- Casein: 0.025
  Casein needs to be supplemented
- clay: 79
  Clay
- Copper ore: 181000
- Copper sulphate: 95.5
  Copper sulphate needs to be supplemented
- dolomite: 0.912
  Dolomite
- water: 98.2
  Fresh water
- gravel: 204
  Gravel
- Iron ore powder: 87.5
  Iron ore powder needs to be supplemented
- Limestone: 495
- magnesite: 5
  Magnesite brick
- oxygen: 735
  Oxygen
- Pine camphor oil: 4.48
  Pine oil
- Sodium silicate: 2.99
  Sodium silicate needs to be supplemented
- sodium sulfate: 11.9
  Sodium sulfate
- Thiourea: 0.035
  Need to add
- Xanthate: 13.7
  Xanthate needs to be replenished

## Deviations from the LCI method approaches
The characterization factors related to pollution emission were derived from CML methodology

## Data selection and combination
The ore grade of fire refining process is the average level of the Chinese underground and open-pit mining from 2009 to 2013, and what was more, the real situation of ore grade in hydrometallurgical methods is taken into account[14]. Other data that were not available from the actual plant were sourced frompublished literature or calculated by mass balance, for instance,

## Data treatment and extrapolations
n this article, eleven indictors were selected to evaluate the effect of cathode copper production on environment and calculated through Simapro7.0.

## Use advice
Users of this LCA data set should ensure they apply the data to processes and products where fire-refined cathode copper is relevant. The data reflects an average ore grade sourced from 2009 to 2013 and may require updating to reflect current mining conditions. Special attention should be given to the methodological alignment when integrating this data into broader environmental impact assessments. Specifically, users should consider the technological applicability and potential variances in regional mining practices, as well as closely adhere to the CML methodology for characterizing pollution emissions. The data set corresponds to the functional unit of 1 ton of cathode copper production and must be scaled appropriately for different applications.

## Review details
Inventory: The internal review was done by several iteration steps concerning raw data validation, raw data documentation, representativity, completeness and consistency of modelling with regard to ISO 14040 and 14044.

## Data sources
- Li, H., Gong, X. Z., Wang, Z. H. & Li, Y. Life Cycle Assessment of Cathode Copper Production. MSF 898, 2422–2431 (2017).
