# Large yellow croaker production ;Large yellow croaker adult fish ; Deep water windstorm cage culture

Dataset: ILCD process, Unit process, black box
Geography: ZS-ZJ-CN
Reference year: 2014
Valid until: 2014
Classification: Unit processes / Materials production / Food and renewable raw materials
Functional unit: 1000kg large yellow croaker
LCI method principle: Attributional
LCI method approaches: Allocation
Generated by: Kangni Wu, wukangni@xmu.stu.edu.cn
Owner: Tiangong LCI Data Working Group
Review: Dependent internal review by Tiangong LCI Data Working Group
Amounts: no units in this file; such an amount is in the reference unit of its flow, which a separate flow dataset defines
copyright: false
licenseType: Free of charge for all users and uses

## General comment
The system boundary of large yellow croaker cage culture includes the production of materials required for the construction of large yellow croaker cages (wood, polyethylene and cement), the production of materials required for large yellow croaker culture (compound feed, formaldehyde and refrigerators, etc.), the transportation of various materials and the production of aquaculture processes and the production and consumption of energy used in each process. It does not include the hatching of large yellow croaker fry to the breeding of semi-adult fish and the processing of large yellow croaker adult fish.

## Geography
The study is located in Dongji Town, Zhoushan City, China, large yellow croaker deep water cage culture base

## Time period
The literature does not specify the data or sampling time, and the breeding seedlings were purchased in June 2014, and the breeding period was about 6 months

## Technology and included processes
The deep water windstorm cage is made of high-density polyethylene circular floating cage. The net coat is generally made of polyethylene material or nylon material. The material of the net coat can effectively protect the large yellow croaker and prevent the large yellow croaker from scratching. The bottom of the cage is equipped with a certain amount of weight to ensure that the mesh is formed underwater.

## Technical purpose
The large yellow croaker deep water windstorm-resistant cage culture process is designed to raise adult large yellow croakers for the seafood market. This aquaculture method can be utilized by the fisheries sector, particularly in offshore marine areas where fish are cultured to marketable size within constructed cages that are made to withstand harsh open-water conditions.

## Model description
The world environmental impact per capita baseline for 2000 was used as the baseline for data standardization; The weighted evaluation uses the weight coefficient set by the panel review

## Reference product
- Large Yellow Croaker: 1000; measured

## Inputs
All rows: measured
- Electricity: 48.708
- polyethylene high density granulate (PE-HD): 64.45
- cement, unspecified: 1.8
- trash fish: 3364
- Assorted Feed: 336
- Formaldehyde: 0.079
- Diesel: 46.21

## Deviations from the LCI method approaches
This study calculates life cycle pollution emission based on pollutant emission according to the calculation formula. The energy consumption and environmental emission data of the energy production and use process, the production of polyethylene, refrigerator, preservative wood, cement and formaldehyde were respectively referred to the research results of the existing literature. Pollutant emissions from diesel combustion refer to the United States Environmental Protection Agency (EPA) List of automotive diesel production and combustion

## Data selection and combination
For each breeding or production stage of large yellow croaker cage culture, the basic data were collected through direct field detection, or indirect literature search and reports of government companies. The validity and authenticity of the data are very important. The correct data should be further collected and distributed for the establishment of the life cycle list. When the collected data is invalid, the collection method should be adjusted to transform it into valid data. The data that is still invalid or wrong should be eliminated, and the relevant data should be supplemented

## Data treatment and extrapolations
The literature calculates carbon footprints based on inventories and emission factors, and the emission factor data come from other literature and reported data.Each input data is converted according to the service life of the corresponding material

## Sampling procedure
The data mainly comes from Zhejiang Da Ocean Technology Co., LTD., which conducts deep-water windwave-resistant cage farming of large yellow croaker in Dongji Town, Putuo District, Zhoushan City.

## Use advice
The data set covers the life cycle of large yellow croaker culture in deep water windstorm-resistant cages, excluding the phases of hatching and semi-adult fish breeding as well as adult fish processing. Users should not include these excluded processes in their environmental impact calculations and should ensure the correct scope of application when utilizing this data for LCA in the seafood industry. Attention should be given to methodological consistency, especially pertaining to the boundaries defined for this system.

## Review details
Inventory: The internal review was done by several iteration steps concerning raw data validation, raw data documentation, representativity, completeness and consistency of modelling with regard to ISO 14040 and 14044.

## Data sources
- 付晓洋. 基于生命周期评价的大黄鱼网箱养殖环境影响分析. (浙江海洋大学, 2016).
