# Pre-treatment ; Printing and dyeing chemical fiber fabric type ; Chemical fiber fabric ; Refining ; All sizes; NESPS2 / 前处理 ; 印染化纤布类 ; 化纤布类 ; 精炼 ; 所有规模 ; 全国第二次污染普查数据

Dataset: ILCD process, Unit process, single operation
Geography: CN
Reference year: 2019
Classification: Reference Parameters / Materials production / Organic chemicals
Generated by: The data was created by the Office of the Second National Pollution Source Census of the Ministry of Ecology and Environment, and the data was organized by the TianGong Plan team for ILCD format / 生态环境部第二次全国污染源普查工作办公室创建数据，天工计划团队常慧敏整理数据为ILCD格式
Owner: Tiangong LCI Data Working Group / 天工LCI数据工作小组
Review: Dependent internal review by Tiangong LCI Data Working Group / 天工LCI数据工作小组
Amounts: no units in this file; such an amount is in the reference unit of its flow, which a separate flow dataset defines
copyright: false
licenseType: Free of charge for all users and uses

## General comment
the Technical of end-of-pipe management technology for pollution chemical oxygen demandisChemical coagulation + anaerobic biological treatment + aerobic biological treatment，Its Technical efficiency of end-of-pipe management90.44

## Technical purpose
本工业流程涉及纺织行业，特别是化纤布类的前处理和精炼。这一流程是随后的印染过程的预备阶段。它涵盖了各种纤维材料，并且能够适应所有规模的生产。末端处理技术用于处理这些工艺过程中的废水中的各种污染物，如氨氮、有机结合态氮、化学需氧量（COD）和总磷。这种综合处理结合了化学混凝、厌氧生物处理、好氧生物处理及额外的化学处理，以高效去除这些污染物。

## Reference product
- Textile Printing: 1000; calculated
  源文件中描述为为印染化纤布类，此处对其进行了匹配工作，将其匹配到LCAflow库里面相最符合的流

## Outputs
All rows: calculated
- phosphorus, total: 0.0087804
  the Technical of end-of-pipe management technology for pollution phosphorus, totalisChemical coagulation + anaerobic biological treatment + aerobic biological treatment + chemical treatment，Its Technical efficiency of end-of-pipe management94.58，The formula for calculating the actual operation rate (k-value) of the end-of-pipe treatment facility is k = operating time of wastewater treatment facilities (hours) / normal production time (hours)
  污染物指标总磷的末端治理技术是化学混凝法+厌氧生物处理法+好氧生物处理法+化学处理法，其效率为94.58，末端治理设施实际运行率（k值）计算公式为k=污水治理设施运行时间/正常生产时间。原文件中描述污染物类别为废水，污染物指标为总磷，此处对其进行了匹配工作，将其匹配到LCAflow库里面相最符合的流
- phosphorus, total: 0.009558
  the Technical of end-of-pipe management technology for pollution phosphorus, totalisChemical coagulation + anaerobic biological treatment + aerobic biological treatment，Its Technical efficiency of end-of-pipe management94.1，The formula for calculating the actual operation rate (k-value) of the end-of-pipe treatment facility is k = operating time of wastewater treatment facilities (hours) / normal production time (hours)
  污染物指标总磷的末端治理技术是化学混凝法+厌氧生物处理法+好氧生物处理法，其效率为94.1，末端治理设施实际运行率（k值）计算公式为k=污水治理设施运行时间/正常生产时间。原文件中描述污染物类别为废水，污染物指标为总磷，此处对其进行了匹配工作，将其匹配到LCAflow库里面相最符合的流
- Ammonia Nitrogen: 0.0135884
  the Technical of end-of-pipe management technology for pollution Ammonia NitrogenisChemical coagulation + anaerobic biological treatment + aerobic biological treatment + chemical treatment，Its Technical efficiency of end-of-pipe management91.56，The formula for calculating the actual operation rate (k-value) of the end-of-pipe treatment facility is k = operating time of wastewater treatment facilities (hours) / normal production time (hours)
  污染物指标氨氮的末端治理技术是化学混凝法+厌氧生物处理法+好氧生物处理法+化学处理法，其效率为91.56，末端治理设施实际运行率（k值）计算公式为k=污水治理设施运行时间/正常生产时间。原文件中描述污染物类别为废水，污染物指标为氨氮，此处对其进行了匹配工作，将其匹配到LCAflow库里面相最符合的流
- Waste water: 37.44
  the treatment technology for the pollution of Waste waterdidn't offered，The formula for calculating the actual operation rate (k-value) of the end-of-pipe treatment facility is k = operating time of wastewater treatment facilities (hours) / normal production time (hours)
  污染物指标工业废水量的末端治理技术未说明。原文件中描述污染物类别为废水，污染物指标为工业废水量，此处对其进行了匹配工作，将其匹配到LCAflow库里面相最符合的流
- Ammonia Nitrogen: 0.041216
  the Technical of end-of-pipe management technology for pollution Ammonia NitrogenisChemical coagulation + anaerobic biological treatment + aerobic biological treatment，Its Technical efficiency of end-of-pipe management74.4，The formula for calculating the actual operation rate (k-value) of the end-of-pipe treatment facility is k = operating time of wastewater treatment facilities (hours) / normal production time (hours)
  污染物指标氨氮的末端治理技术是化学混凝法+厌氧生物处理法+好氧生物处理法，其效率为74.4，末端治理设施实际运行率（k值）计算公式为k=污水治理设施运行时间/正常生产时间。原文件中描述污染物类别为废水，污染物指标为氨氮，此处对其进行了匹配工作，将其匹配到LCAflow库里面相最符合的流
- Nitrogen, organic bound: 0.066198
  the Technical of end-of-pipe management technology for pollution Nitrogen, organic boundisChemical coagulation + anaerobic biological treatment + aerobic biological treatment + chemical treatment，Its Technical efficiency of end-of-pipe management90.65，The formula for calculating the actual operation rate (k-value) of the end-of-pipe treatment facility is k = operating time of wastewater treatment facilities (hours) / normal production time (hours)
  污染物指标总氮的末端治理技术是化学混凝法+厌氧生物处理法+好氧生物处理法+化学处理法，其效率为90.65，末端治理设施实际运行率（k值）计算公式为k=污水治理设施运行时间/正常生产时间。原文件中描述污染物类别为废水，污染物指标为总氮，此处对其进行了匹配工作，将其匹配到LCAflow库里面相最符合的流
- Nitrogen, organic bound: 0.200576
  the Technical of end-of-pipe management technology for pollution Nitrogen, organic boundisChemical coagulation + anaerobic biological treatment + aerobic biological treatment，Its Technical efficiency of end-of-pipe management71.67，The formula for calculating the actual operation rate (k-value) of the end-of-pipe treatment facility is k = operating time of wastewater treatment facilities (hours) / normal production time (hours)
  污染物指标总氮的末端治理技术是化学混凝法+厌氧生物处理法+好氧生物处理法，其效率为71.67，末端治理设施实际运行率（k值）计算公式为k=污水治理设施运行时间/正常生产时间。原文件中描述污染物类别为废水，污染物指标为总氮，此处对其进行了匹配工作，将其匹配到LCAflow库里面相最符合的流
- chemical oxygen demand: 14.273
  the Technical of end-of-pipe management technology for pollution chemical oxygen demandisChemical coagulation + anaerobic biological treatment + aerobic biological treatment + chemical treatment，Its Technical efficiency of end-of-pipe management90.87，The formula for calculating the actual operation rate (k-value) of the end-of-pipe treatment facility is k = operating time of wastewater treatment facilities (hours) / normal production time (hours)
  污染物指标化学需氧量的末端治理技术是化学混凝法+厌氧生物处理法+好氧生物处理法+化学处理法，其效率为90.87，末端治理设施实际运行率（k值）计算公式为k=污水治理设施运行时间/正常生产时间。原文件中描述污染物类别为废水，污染物指标为化学需氧量，此处对其进行了匹配工作，将其匹配到LCAflow库里面相最符合的流
- chemical oxygen demand: 14.9452
  the Technical of end-of-pipe management technology for pollution chemical oxygen demandisChemical coagulation + anaerobic biological treatment + aerobic biological treatment，Its Technical efficiency of end-of-pipe management90.44
  污染物指标化学需氧量的末端治理技术是化学混凝法+厌氧生物处理法+好氧生物处理法，其效率为90.44，末端治理设施实际运行率（k值）计算公式为k=污水治理设施运行时间/正常生产时间。原文件中描述污染物类别为废水，污染物指标为化学需氧量，此处对其进行了匹配工作，将其匹配到LCAflow库里面相最符合的流

## Use advice
This dataset is derived from the Pollution Source Census Report and contains information on pollution emissions and related products. However, it does not include data on energy or chemical consumption, nor does it provide information on waste or co-product generation. When utilizing this dataset, please supplement the missing data based on actual conditions before use
该数据集来源于污染源普查报告，包含污染物排放及相关产品信息，但不包含能源或化学品消耗数据，也不提供废弃物或共生产物产生信息。在使用该数据集时，请根据实际情况补充缺失数据后再使用。

## Review details
Inventory: The internal review was done by several iteration steps concerning raw data validation, raw data documentation, representativity, completeness and consistency of modelling with regard to ISO 14040 and 14044.
清单： 内部审查通过几个迭代步骤完成，涉及原始数据验证、原始数据记录、代表性、完整性、与 ISO 14040 和 14044 有关的建模的一致性。

## Data sources
- 第二次全国污染源普查产排污核算系数手册（试用版）,二级代码17,三级代码175.0,四级代码1752文件，在完整版文件中第279页
