# Resin and fiber glass production ; Total of all wind farm

Dataset: ILCD process, Unit process, single operation
Geography: SH-CN
Reference year: 2009
Classification: Materials production / Glass and ceramics
Functional unit: The functional unit is 1 kWh on-grid electricity provision.
LCI method principle: Attributional
LCI method approaches: Allocation
Generated by: Yunzhi Zhao, ll10088@163.com
Owner: Tiangong LCI Data Working Group
Review: Dependent internal review by Tiangong LCI Data Working Group
Amounts: no units in this file; such an amount is in the reference unit of its flow, which a separate flow dataset defines
copyright: false
licenseType: Free of charge for all users and uses

## General comment
The resin and fiberglass production process is specifically purposed for the construction of wind turbines in offshore wind farms. The materials produced are used in the manufacturing of key components including the turbines, foundations, and cables for the Donghai Bridge Offshore Wind Farm (DBOWF), which is a pioneering wind energy project both in China and globally. This dataset can guide the materials and energy consumed, as well as the environmental emissions from these processes for lifecycle assessment purposes.

## Geography
The studied wind farm, the Donghai Bridge Offshore Wind Farm (DBOWF), is China's first offshore wind farm within the jurisdiction of Shanghai, as well as the first offshore wind farm outside Europe. The project has two-phases of construction, located on each side of the Donghai bridge (Fig. 1).

## Reference product
- Resin: 6.07e6; article inperiodical

## Inputs
- Energy, geothermal, converted: 5.02e8; software or database

## Outputs
- carbon dioxide: 2.96e7; software or database
  GHG
- particles (PM2.5): 4010; software or database
- sulfur dioxide: 87470; software or database
- nitrous oxide: 51870; software or database

## Deviations from the LCI method approaches
The present study employed the PLCA modeling approach to calculate the energy and environmental emissions of a typical offshore wind farm in China. The cradle-to-grave process includes four stages, materials and equipment manufacturing, transportation and installation, operation and maintenance, and dismantling and recycling (Fig. 2).

## Data selection and combination
The technical parameters of wind turbines, foundations and cables are obtained from the design documents of the DBOWF (Table 2). The energy and emissions factors (i.e., the energy consumption and environmental emissions of per unit material and component production) are derived from the Ecoinvent 2.2 dataset (Ecoinvent Centre, 2009), and the coefficients of China's practices were preferentially referred. For key materials and equipment, their sea transportation energy is calculated from the transportation load and shipping energy intensity. The facility installation energy and emissions were estimated based on the construction plan. The wind farm's operation and maintenance data, such as the frequency and working time of maintenance, were obtained from site investigations with engineers and technicians. The uncertainties associated with model parameters and input data are illustrated in the sensitivity analysis section of this paper.

## Use advice
When utilizing this LCA dataset, users should ensure the inclusion of energy and emissions factors according to Ecoinvent 2.2 or subsequent datasets, and apply Chinese coefficients where applicable. The data regarding energy for sea transportation of materials and components should be precisely accounted for, considering the load and shipping energy intensity. Users must take into account the uncertainties mentioned in the sensitivity analysis section, particularly when extrapolating the findings to other scenarios. The operational and maintenance phase should be modeled reflecting real frequencies and durations, as obtained from actual site investigations. It is critical to follow the cradle-to-grave model encompassing manufacturing, transportation, installation, operation, maintenance, dismantling, and recycling stages to fully understand the environmental impact of 1 kWh on-grid electricity provision from the wind farm.

## Review details
Inventory: The internal review was done by several iteration steps concerning raw data validation, raw data documentation, representativity, completeness and consistency of modelling with regard to ISO 14040 and 14044.

## Data sources
- Yang, J. et al. The life-cycle energy and environmental emissions of a typical offshore wind farm in China. Journal of Cleaner Production 180, 316–324 (2018).
