# Livestock and poultry breeding ; feed crop planting stage ; layer scale

Dataset: ILCD process, Unit process, single operation
Geography: CN
Reference year: 2014
Classification: Unit processes / Materials production / Agricultural production means
Functional unit: 1kg eggs
Generated by: Rui Yang, 1632707028@qq.com
Owner: Tiangong LCI Data Working Group
Review: Dependent internal review by Tiangong LCI Data Working Group
Amounts: no units in this file; such an amount is in the reference unit of its flow, which a separate flow dataset defines
copyright: false
licenseType: Free of charge for all users and uses

## General comment
The feed described in this paper is mainly energy feed, including: corn, wheat, soybean, sorghum, rice. In fact, in the process of livestock breeding, livestock feed is mainly composed of corn, wheat and soybeans. Feed crop planting stage mainly includes fertilizer production stage, corn, soybean, wheat planting stage.

## Geography
This study was conducted from 2014 to 2015, aiming at livestock and poultry feeding cycle, meat ratio, feed formula, feed consumption, coal and electricity consumption, etc. Has been to Shandong Gaomi Zhengda pig farm, Laixi City Zhishuang dairy farm, Jimo city Duan Bolan town Jiangjiapo village pig farm, Jimo City Liujiazhuang town livestock farm, Rizhao City Changling town Guanzhuang village, Juxian County Zhailihe town Dongxing Agriculture and animal husbandry company, Juxian Qiaoshan town east Chen dairy farm, Juxian Qiaoshan town Liu Jiayi water pig farm, Zhucheng Foreign Trade Co., LTD. Phoenix parents breeding duck farm, Xinjiang Fukang Hongfa Breeding professional cooperative, Jiuyun Street Town Xuhong laying Chicken cooperative, Jiuyun Street Town Liuyun Village self-contained breeding farm, China Australia Holding Group Co., LTD., Dezhou City Qingyun County Wayu Village, Shandong Province Qingyun County four Liu community beef cattle breeding base, Dezhou City Qingyun Qingnian chicken breeding base, Qingyun County Yongli Poultry layer breeding company, Qingyun County Xingchen youth chicken breeding Field research was carried out by professional breeding cooperatives, Qingyun Dongtai broiler breeding cooperatives, Hebei Yanshan Boyuan Feed Co., LTD., Yanshan Da Chinese Feed Co., LTD., Wudi Liuhe Feed Co., LTD., and China-Australia Oriental Hope Feed Co., LTD.

## Technology and included processes
In this paper, the life cycle of livestock and poultry farming is divided into six stages: feed crop planting, feed processing, livestock and poultry raising, manure treatment, slaughter and transportation. The specific life cycle process of livestock and poultry breeding is shown in Figure 2-1. Due to the lack of some data and the limitations of basic conditions, the production, transportation and use of pesticides, mulch and feed additives have not been analyzed, and the environmental impact caused by other related infrastructure construction, transport production and labor costs is no longer considered.

## Technical purpose
The energy feed described is primarily utilized in large-scale, industrial livestock and poultry breeding operations, specifically for layer hens. The feed components such as corn, wheat, soybean, sorghum, and rice are fundamental to sustaining the animals' dietary requirements during their growth and egg-producing stages. The feed crop planting stage preceding feed formulation integrates fertilizer production and planting of the significant feed components, ensuring a controlled and sustainable feed source for livestock production.

## Reference product
- egg: 1; measured
  作为参考定量，非实际输出

## Inputs
- Fertilizer: 0.0607418; calculated
- hard coal: 0.00881633; calculated

## Outputs
All rows: measured
- nitrous oxide: 0.001799
  Layer scale
- nitrogen, total (excluding N2): 0.0049548
  Layer scale
- Nitrogen trioxide: 0.0019285
  Layer scale
- ammonia: 0.0055948
  Layer scale
- hydrocarbons (unspecified): 3.2e-5
  Layer scale
- carbon monoxide (fossil): 0.0002373
  Layer scale
- sulfur dioxide: 0.0002877
  Layer scale
- carbon dioxide (fossil),carbon dioxide (fossil): 0.573461
  Layer scale

## Use advice
When utilizing this LCA dataset for evaluating the environmental impact of egg production processes, it is essential to consider the entire lifecycle of layer hens, from feed cultivation to egg collection. Pay particular attention to the energy feed composition, as well as the related inputs such as fertilizer use, energy consumption for feed crop cultivation, and the operational efficiency of different livestock breeding facilities. Inclusion or exclusion of additional stages such as transportation, processing, and product packaging should be based on system boundaries specific to the study objectives. Data users should also consider regional variability and technological advancements since the data collection period (2014-2015) for current relevance.

## Review details
Inventory: The internal review was done by several iteration steps concerning raw data validation, raw data documentation, representativity, completeness and consistency of modelling with regard to ISO 14040 and 14044.

## Data sources
- 周景月. 基于生命周期评价的畜禽养殖环境影响分析. (青岛科技大学, 2017).
