# Municipal sludge treatment and disposal;dry sludge;anaerobic diegestion

Dataset: ILCD process, Unit process, single operation
Geography: QD-SD-CN
Classification: Unit processes / End-of-life treatment / Waste water treatment
Functional unit: The functional unit is the base for the treatment comparison in the life-cycle inventory. The management of one tone of dry sludge (DS) is selected.
Generated by: Jin Sitian, 2331276@tongji.edu.cn
Owner: Tiangong LCI Data Working Group
Review: Dependent internal review by Tiangong LCI Data Working Group
Amounts: no units in this file; such an amount is in the reference unit of its flow, which a separate flow dataset defines
copyright: ['opt4ROkqig']
licenseType: Free of charge for all users and uses

## General comment
The annual average monitoring data of anaerobic digestion and dewatering processes in Maidao wastewater treatment plant of Qingdao in Shandong Province of China, which is the most typical wastewater treatment plant that uses anaerobic digestion technology to treat sewage sludge in the country, were used in this study

## Geography
Maidao sewage treatment plant

## Technology and included processes
The sludge treatment and disposal steps are gravity thicking, anaerobic digestion, dewatering, and agricultural use.

## Technical purpose
This data set describes the process used at the Maidao sewage treatment plant for the treatment and disposal of municipal sludge. The anaerobic digestion of dry sludge is intended for reducing the volume and mass of waste, biogas production, and potentially for energy recovery and soil amendment applications. This process can serve municipal waste management systems by transforming biodegradable sludge into stabilized products used in various sectors.

## Reference product
- Sludge: 1000; input; estimated
  one tone of dry sludge (DS)

## Inputs
- Electricity: 553.86; measured

## Outputs
All rows: measured
- electricity from landfill gas utilisation: 2215.37
- waste water - untreated: 3.56
- methane (biogenic),methane (biogenic): 250
  The original text does not distinguish between biogenic and fossil, and according to experts, it is biogenic here.
- dinitrogen: 10.08
  nitrogen,emission to air
- hydrogen: 0.71
- hydrogen sulfide: 0.43

## Use advice
When using this data set for life cycle assessment, the selected functional unit is the management of one tonne of dry sludge (DS). Ensure the treatment process being compared in the life-cycle inventory is equivalent in the terms of the functional unit. For modeling purposes, explicitly account for all outputs, including any biogas produced during anaerobic digestion, and consider the final disposition of the digested sludge. Additionally, evaluate the local technological practices for potential variability in the data.

## Review details
Inventory: The internal review was done by several iteration steps concerning raw data validation, raw data documentation, representativity, completeness and consistency of modelling with regard to ISO 14040 and 14044.

## Data sources
- Xu, C., Chen, W. & Hong, J. Life-cycle environmental and economic assessment of sewage sludge treatment in China. Journal of Cleaner Production 67, 79–87 (2014).
