# Open field vegetable production ; Crop Production (Cabbage)

Dataset: ILCD process, Unit process, single operation
Geography: CN
Classification: Unit processes / Materials production / Agricultural production means
Functional unit: hm2
Generated by: Haoran Zhang, hrzhang@whu.edu.cn
Owner: Tiangong LCI Data Working Group
Review: Dependent internal review by Tiangong LCI Data Working Group
Amounts: no units in this file; such an amount is in the reference unit of its flow, which a separate flow dataset defines
copyright: false
licenseType: Free of charge for all users and uses

## General comment
The boundary of the system is concentrated in the whole process of open field vegetable production (from sowing to harvesting), which is divided into agricultural phase and agricultural phase. The agricultural phase focuses on greenhouse gas emissions from the production and transportation of fertilizers (fertilizers and organic fertilizers), pesticides and agricultural film. The agricultural stage mainly focuses on the greenhouse gas emissions generated by the application process of fertilizer and pesticide, the diesel consumption and artificial energy consumption in the process of agricultural operation (tillage, irrigation, etc.), and the fixation of soil organic carbon caused by the net primary productivity of vegetables and the input of organic fertilizer [16]. Select unit area (per hm2) for this system evaluation unit.

## Technology and included processes
Based on national agricultural statistical data, using the life cycle assessment (LCA) method, the net greenhouse gas emissions (NGHGE) of four typical field vegetable productions in China, including open-field tomatoes, cucumbers, Chinese cabbage, and radishes, were quantified. The study compared the differences in net greenhouse gas emissions among vegetable types and provinces, and analyzed emission reduction measures.

## Technical purpose
The data set pertains to the assessment of net greenhouse gas emissions in the production of open-field vegetables, specifically tomatoes, cucumbers, Chinese cabbage, and radishes, based on agricultural input (chemical and organic fertilizers, pesticides, and agricultural films) and farming operations (cultivation, irrigation, and labor) within the Chinese context. It is intended for use in environmental impact assessments, policy-making for emission reduction strategies, and comparison across different vegetable types and provinces within China.

## Reference product
- celery cabbage: 68700; software or database

## Inputs
All rows: software or database
- nitrogen: 323
  肥料
- phosphorus: 166
  肥料
- Diesel: 0.0668
- potassium: 158
  肥料
- nitrogen: 296
  化肥
- phosphorus: 148
  化肥
- potassium: 139
  化肥
- nitrogen: 26.9
  有机肥
- phosphorus: 17.1
  有机肥
- potassium: 18.9
  有机肥
- Agricultural film: 14.6
- Labor: 297

## Deviations from the LCI method approaches
The process is divided into two phases: agricultural input and farming. The agricultural input phase mainly focuses on the greenhouse gas emissions produced and transported during the production of fertilizers (chemical and organic), pesticides, and agricultural films. The farming phase primarily concentrates on the greenhouse gas emissions from the application of fertilizers and pesticides, agricultural operations (such as plowing and irrigation), diesel consumption, and the energy consumed by human labor. Additionally, this phase considers the carbon sequestration in vegetables through net primary productivity and the fixation of soil organic carbon caused by the input of organic fertilizers.

## Data selection and combination
Based on the types of vegetables and the planting distribution information available in the database, four typical open-field vegetables were selected, namely fruit vegetables (tomatoes, cucumbers), leafy vegetables (Chinese cabbage), and root vegetables (radishes). The related planting production data from various provinces across the country for these four types of open-field vegetables were collected and organized for the year 2016 (data from Taiwan, China is temporarily unavailable).

## Data treatment and extrapolations
Various vegetables’ fertilizer application rates, diesel consumption, agricultural film usage, labor employment, and yield data are obtained from the literature. Diesel cost is calculated using the formula [18]: Diesel cost = (mechanical operation fee + irrigation fee - water fee) x 21% + fuel power fee, and the diesel price data comes from China's oil price network database [19]. Pesticide input data refer to Luo Wei’s [20] study results on the big data analysis of pesticide application in open-field vegetables across the country. The planting areas of various types of vegetables in different provinces were retrieved from the literature [15].

## Use advice
When using this data set, ensure a clear understanding of regional differences in greenhouse gas (GHG) emissions within China, as variability across provinces can significantly impact results. Additionally, consider the specific characteristics of each vegetable type and local farming practices. GHG emissions from production and transportation of agricultural inputs, as well as their application and related farming operations, are critical factors to be accounted for. Exclusion of data from Taiwan, China requires additional consideration, and users should adjust analyses accordingly if regional comparability is desired. Carbon sequestration elements, such as net primary productivity and organic carbon fixation in soil, should also be integrated into the overall LCA framework.

## Review details
Inventory: The internal review was done by several iteration steps concerning raw data validation, raw data documentation, representativity, completeness and consistency of modelling with regard to ISO 14040 and 14044.

## Data sources
- 张芬,程泰鸿,陈新平,王孝忠.我国典型露地蔬菜生产中的温室气体排放[J].环境科学,2020,41(07):3410-3417.
