# clinker production;clinker;new dry, 5000 t/d;mixed solid wastes

Dataset: ILCD process, Unit process, black box
Geography: HAIN-CN
Classification: Unit processes / Materials production / Inorganic chemicals
Generated by: #REF!, ysqsophia@gmail.com
Owner: Tiangong LCI Data Working Group
Review: Dependent internal review by Tiangong LCI Data Working Group
Amounts: no units in this file; such an amount is in the reference unit of its flow, which a separate flow dataset defines
copyright: false
licenseType: Free of charge for all users and uses

## General comment
Papermaking dregs, known as the papermaking green dregs, is a solid waste that generated in the caustic alkali recovery process of pulp and paper mill. The dregs came from one of pulp and paper mill in Hainan Province China. The solid waste mixture includes fly ash and papermaking dregs.

## Technical purpose
The clinker production process described is for the manufacturing of cement clinker utilizing a new dry process on a 5000 t/d production line. The process involves co-processing mixed solid wastes, including fly ash and papermaking dregs, as part of the raw material input. The described clinker is suitable for use in a range of construction applications, primarily as a binder in concrete products.

## Model description
Functional unit definition: Define 1 ton of cement clinker as a functional unit. System boundary setting: The raw materials of the plant are set as the starting point of the life cycle, and the output of clinker cement is set as the end point.

## Reference product
- clinker: 1000
  Clinker

## Inputs
- limestone, crushed, for mill: 1344
  Limestone
- clay: 93
  Clay
- ash: 63
  Fly ash
- iron ore: 32
  Ironstone
- Waste, solid, from paper production: 25
  Papermaking dregs
- hard coal; 26.3 MJ/kg: 106
  Coal
- Electricity: 288
  Power average consumption

## Outputs
- carbon dioxide (fossil): 264
  m-CO2. The CO2 emissions of coal burning (mc) are calculated with the heat carbon equivalent method. mc=standard coal x 2.93x10^7x 8.494x10^-8 = standard coal x 2.489 where the CO2 of 1 J heat releasing is equivalent to 8.494 × 10^-8 kg. 1 kg of standard coal is equivalent to 2.93 × 10^7 J of heat (calorific value).
- carbon dioxide (fossil): 532
  n-CO2. The CO2 emissions of limestone decomposition (nc) are calculated with Eq. nc = Limestone consumption x 90% x 44% = Limestone consumption x 0.396 where the percent of CaCO3 in the limestone is 90% according to its quality. The percent of CO2 in the CaCO3 is 44%.
- sulfur dioxide: 0.86
  SO2. The data of SO2 emission mainly came from the online monitoring system of the plant.
- Nitrogen oxides: 1.71
  NOx. The data of NOx emission mainly came from the online monitoring system of the plant.
- particles (> PM10): 0.05
  Dust. The particle size is not specified. Here we treat it as PM>10. The data of dust emission mainly came from the online monitoring system of the plant.

## Data selection and combination
The papermaking residue comes from a pulp and paper mill in Hainan. Other raw materials for cement production come from a mine in Hainan.

## Sampling procedure
A cement plant with a 5,000 tons/day new dry process cement production line was selected in a city in Hainan Province and tested. Papermaking residue is mixed into limestone and put into the cement kiln along with other raw materials. Processed 150 tons/day of papermaking residue.

## Use advice
When using this dataset, users should account for the specific nature of the co-processing of mixed solid wastes in the cement production line. This includes the consideration of the unique emissions profile resulting from the use of papermaking dregs and fly ash. Additionally, if this dataset is used for comparative purposes, it is important to ensure that similar system boundaries are considered regarding starting materials and end outputs. Users should note that this dataset reflects the environmental burdens associated with the defined functional unit of 1 ton of clinker and should adjust their models accordingly when integrating this data for different production scales or functional units.

## Review details
Inventory: The internal review was done by several iteration steps concerning raw data validation, raw data documentation, representativity, completeness and consistency of modelling with regard to ISO 14040 and 14044.

## Data sources
- Kan Fu, Xiao Yu Ren, Jin Quan Lin, & Ping Yue. (2013). Comparative Analysis of Environmental Impacts between Dregs Disposal and Conventional Cement Production by Life Cycle Assessment (LCA). Advanced Materials Research 777, 461–466.
