# Refined copper production;Electrolytic copper (1 t, 99.9%);double side blowing bath smelting technology;Copper concentrate

Dataset: ILCD process, Unit process, single operation
Geography: CN
Reference year: 2018
Classification: Unit processes / Materials production / Metals and semimetals
Functional unit: the production of 1 ton of copper (i.e., refined or reclaimed copper) was selected as the functional unit.
LCI method principle: Attributional
LCI method approaches: Allocation - mass
Generated by: Peng Wang, 2867919560@qq.com
Owner: Tiangong LCI Data Working Group
Review: Dependent internal review by Tiangong LCI Data Working Group
Amounts: no units in this file; such an amount is in the reference unit of its flow, which a separate flow dataset defines
copyright: false
licenseType: Free of charge for all users and uses

## General comment
This dataset pertains to the production of high-purity electrolytic copper with a concentration of 99.9%, using double side blowing bath smelting technology primarily sourced from copper concentrate. The refined copper is commonly used in electrical engineering for wiring, electronics, and manufacturing high-conductivity components and is also essential in the production of various alloys.

## Geography
two refined and reclaimed copper production sites in China.

## Reference product
- Refined copper: 1000; software or database
  copper

## Inputs
- unspecified: 0.06; measured
  Land occupation
- water: 14340; measured
  Water
- Electricity: 4307.72; software or database
- Oils, unspecified: 0; software or database
  Oil
- hard coal,hard coal,hard coal: 0.08; software or database
  Coal
- Copper concentrates: 4410; measured
  Copper concentrate needs to be replenished
- calcium carbonate: 110; software or database
- coke: 160; software or database
  Coke needs to be replenished
- Diesel: 1; software or database
- Silica sand,silica sand: 400; software or database
  Silica sand
- Chemicals inorganic,Chemicals, inorganic: 3.64; software or database
  Chemicals inorganic need to be supplemented
- Chemicals organic,Chemicals, organic: 0; software or database
  Chemicals organic needs to be supplemented
- natural gas,natural gas,natural gas: 48.58; software or database
  Natural gas
- Sulfuric acid(98%): 12270; software or database
  Sulfuric acid needs to be supplemented with resourse
- hydrogen chloride: 1660; software or database
- freshwater,freshwater: 2330; software or database
  Soft water needs to be replenished

## Outputs
- carbon dioxide (fossil): 398.19; software or database
  原文未区分bio和fossil，根据专家判断此处为fossil
- mercury: 5.75e-5, 4.46e-8 (2 entries); software or database
  Mercury
- particles (PM2.5 - PM10): 0.16709; software or database
- sulfur oxides: 0.56605; software or database
  Sulfur dioxide
- arsenic: 0.00034, 1.68e-5 (2 entries); software or database
  Arsenic
- Phosphorus: 2.56e-5; software or database
- chemical oxygen demand: 0.01956; software or database
  COD needs to be supplemented
- nitrogen, total (excluding N2): 0.00193; software or database
- copper: 2.34e-5; software or database
  Copper
- sulfide: 2.13e-6; software or database
  Sulfide
- lead-210: 2.23e-5; software or database
  Lead
- cadmium: 1.25e-5; software or database
  Cadmium
- fluoride: 0.0003; software or database
  Fluoride
- chromium VI: 1.7e-6; software or database
  Chromium VI
- Petroleum: 1.7e-5; measured
  Petroleum oil needs to be replenished
- Drilling waste: 14720; measured
  Drilling waste needs to be replenished
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
## Deviations from the LCI method approaches
A life cycle impact assessment (LCIA) was conducted at the midpoint level by employing the ReCiPe method, which is one of the most commonly used indicator approaches in the LCA analysis (Goedkoop et al. 2009;Schryveretal.2009).

## Data selection and combination
The LCI data presented in this study were collected from two refined and reclaimed copper production sites in China.

## Data treatment and extrapolations
The LCA was conducted using the SimaPro 8.2 software.

## Use advice
When utilizing this LCI data, users should take into account the geographic specificity of the data as it has been collected from two production sites in China. Ensure the methodological consistency by employing the ReCiPe method at the midpoint level for LCIA, as was conducted in the original LCA using SimaPro 8.2 software. The functional unit for comparison is the production of 1 ton of copper. Considerations of the downstream use phase and end-of-life recycling processes should be taken into account where relevant, paying special attention to regional recycling rates and practices.

## Review details
Inventory: The internal review was done by several iteration steps concerning raw data validation, raw data documentation, representativity, completeness and consistency of modelling with regard to ISO 14040 and 14044.

## Data sources
- Hong, J. et al. Life cycle assessment of copper production: a case study in China. Int J Life Cycle Assess 23, 1814–1824 (2018).
