# Printed cloth production | Printed cloth | Printing post-processing

Dataset: ILCD process, Unit process, black box
Geography: CN
Reference year: 2014
Classification: Materials production / Other mineralic materials
Generated by: Yingfan Duan, 1300925579@qq.com
Review: Dependent internal review by Tiangong LCI Data Working Group
Amounts: no units in this file; such an amount is in the reference unit of its flow, which a separate flow dataset defines
copyright: false

## Inputs
- Electricity: 140.994; measured
- Water for industrial use: 4.976; measured
- natural gas: 14.938; measured
- process steam: 395; measured

## Review details
Inventory: The internal review was done by several iteration steps concerning raw data validation, raw data documentation, representativity, completeness and consistency of modelling with regard to ISO 14040 and 14044.

## Data sources
- 王赛赛, 吴雄英 & 丁雪梅. 三种LCA核算软件对印花布碳足迹核算的比较. 印染 40, 41–44 (2014).
