# Apple production

Dataset: ILCD process, Unit process, black box
Geography: IR
Reference year: 2016
Valid until: 2016
Classification: Unit processes / Materials production / Food and renewable raw materials
Functional unit: One hectare apple orchard
Generated by: zhu xian, zzhu0918@163.com
Owner: Tiangong LCI Data Working Group
Review: Dependent internal review by Tiangong LCI Data Working Group
Amounts: no units in this file; such an amount is in the reference unit of its flow, which a separate flow dataset defines
copyright: false
licenseType: Free of charge for all users and uses

## General comment
Apple seedlings were cultivated, nitrogen, phosphorus and potassium fertilizer and farm manure were applied, water resources were irrigated at the same time, and fruit trees were picked after blooming and fruiting.

## Geography
In this research, the information was collected using questionnaires and consultation with gardeners and experts from the jihad agriculture firm of West Azerbaijanprovince in Iran.

## Technical purpose
This dataset represents the apple production process, which involves the cultivation of apple seedlings, application of nitrogen, phosphorus, and potassium fertilizers along with farm manure, irrigation using water resources, and harvesting of apples after the trees bloom and bear fruit. It is relevant for actors involved in agricultural planning, orchard management, food supply chains, and environmental impact assessments of agricultural practices.

## Reference product
- Apple: 27120; measured

## Inputs
All rows: measured
- Labor: 61.0396
- diesel oil: 0.13328
- Pesticide: 42.48
- Nitrogenous fertilizer: 139.56
- Phosphate fertilizer: 141.53
- Potassium fertilizer: 113.28
- Electricity: 4446.36
- Gasoline (regular): 14.42
- Farmyard manure: 9900
- Irrigation water: 4007.54

## Use advice
When utilizing this data set, users should consider methodological consistency with the scope of their LCA study. Factors like geographical relevance, climatic conditions similar to West Azerbaijan province in Iran, and cultural farming practices should be taken into account to ensure accuracy. The unit process (black box) included requires a clear understanding that modeling and assumptions are based on data from a specific region and might not be representative of apple orchards globally. Care should be taken to adjust for regional differences when applying this dataset to other zones.

## Review details
Inventory: The internal review was done by several iteration steps concerning raw data validation, raw data documentation, representativity, completeness and consistency of modelling with regard to ISO 14040 and 14044.
