# Wafer slicing ; Multi-Si wafer ; Multi wire saw

Dataset: ILCD process, Unit process, single operation
Geography: CN
Reference year: 2014
Classification: Unit processes / Materials production / Metals and semimetals
Functional unit: The functional unit of the LCA study was 1 kWh based on a multi-Si PV module
LCI method principle: Attributional
LCI method approaches: Allocation
Generated by: Jinfeng Yang, yjfzfshn@163.com
Owner: Tiangong LCI Data Working Group
Review: Dependent internal review by Tiangong LCI Data Working Group
Amounts: no units in this file; such an amount is in the reference unit of its flow, which a separate flow dataset defines
copyright: false
licenseType: Free of charge for all users and uses

## General comment
Multi-Si

## Geography
This study performs a life-cycle assessment for a photovoltaic (PV) system with multi-crystalline silicon (multi-Si) modules in China

## Time period
Available online

## Technical purpose
The multi-crystalline silicon (multi-Si) wafer slicing process using multi wire saw is intended for the production of solar-grade wafers for use in photovoltaic (PV) systems. These wafers are the foundation for creating multi-Si ingots, cells, and modules that are essential components in the assembly of PV panels designed to convert sunlight into electrical energy. This technology is predominantly utilized for the manufacture of multi-Si PV modules within the Chinese PV industry, contributing to its sustainable development.

## Reference product
- Multi-Si wafer,Multi-Si wafer,Multi-Si wafer: 3.34; measured
  Multi-Si Wafer

## Inputs
All rows: measured
- Multi-Si ingot: 5.47
- Glass: 2.47
- Silicon carbide,Silicon carbide: 0.17578
  Silicon carbide
- Steel Wire,Cable: 17.11
  Steel wire
- Acetic acid: 0.6
- Detergent: 2.23
- Compressed air: 29.05
- freshwater: 528.63
  Water
- Electricity: 24.01

## Outputs
All rows: measured
- acetic acid: 0.6
  Acetic acid
- Glass for recovery (shards): 2.47
  Glass
- Glue residues: 0.24328
  Glue residues for disposal
- Silicon scrap: 2.07
  Silicon scrap for recovery
- waste water - untreated: 336.94
  Waste water

## Deviations from the LCI method approaches
The goal of this study was to quantitatively assess the life-cycleenvironmental impacts of PV systems in China and provide a scientific basis for policy-making regarding the sustainable development of Chinese PV industry.

## Data selection and combination
The inventory data, including the material consumption and environmental emissions involved in the production of solar-grade silicon, wafers, ingots, cells, and modules, were mainly collected from companies that represent the current domain multi-Si PV technologies in China. The energy consumption data referred to the report “Clean Production ofSolar PV in China” (Li and Chang, 2012). The data of MG-Si production was from literature about MG-Si produced in China

## Use advice
When using this LCA data set for evaluating the environmental impacts of PV systems, it is crucial to apply the functional unit of 1 kWh based on a multi-Si PV module. Care should be taken to ensure that the scope of the assessment includes all relevant stages of the multi-Si PV module's life cycle, including production, use, and end-of-life management. Data users should also consider the technological specificity of the Chinese PV industry as described in the report 'Clean Production of Solar PV in China' and reference the MG-Si production data sourced from contemporary Chinese literature.

## Review details
Inventory: The internal review was done by several iteration steps concerning raw data validation, raw data documentation, representativity, completeness and consistency of modelling with regard to ISO 14040 and 14044.

## Data sources
- Fu, Y., Liu, X. & Yuan, Z. Life-cycle assessment of multi-crystalline photovoltaic (PV) systems in China. Journal of Cleaner Production 86, 180–190 (2015).
