# Soil remediation ; Ex-situ remediation ; Chemical oxidation ; Project implementation ; On-site transfer ; Remediated soil

Dataset: ILCD process, Unit process, single operation
Geography: AH-CN
Reference year: 2023
Classification: Unit processes / Other Services / Repair and maintenance
Generated by: Sang Chunhui, sangch@mail.bnu.edu.cn
Owner: Tiangong LCI Data Working Group
Review: Dependent internal review by Tiangong LCI Data Working Group
Amounts: no units in this file; such an amount is in the reference unit of its flow, which a separate flow dataset defines
copyright: false
licenseType: Free of charge for all users and uses

## General comment
Transfer of treated soil 29437.9 m3

## Geography
Iron and steel mill site contaminated with a combination of heavy metals and organic matter in Hefei, Anhui Province, China

## Technology and included processes
Transfer of remediated soil

## Technical purpose
The dataset describes an Ex-situ Chemical Oxidation soil remediation process used for the treatment of soils from a steel mill site in Hefei, Anhui Province, China, contaminated by heavy metals and organic compounds. This remediation process is applied in engineering projects aimed at decontaminating industrial sites and it includes on-site transfer of the contaminated soil, treatment through chemical oxidation, and transfer of the treated soil. It is particularly used for the remediation of large volumes of contaminated soil, as indicated by the transfer of 29,437.9 m³ of treated soil.

## Reference product
- Remedied site: 1; estimated

## Inputs
- Diesel: 13.929; estimated
- Remediated soil: 29437.9; estimated
  清洁土壤

## Use advice
Users of this dataset should account for the specific context in which the soil remediation process occurs, including the types of contaminants (heavy metals and organic compounds) and the volume of soil being treated (29,437.9 m³). When applying this data to similar remediation projects, it is important to consider the representativeness of the dataset, ensuring that local conditions such as soil composition and contamination levels are comparable. Users should include the energy and materials input for the soil transfer process, and accurately represent the emissions associated with the fuel used for the on-site transfer and subsequent transport of the remediated soil.

## Review details
Inventory: The internal review was done by several iteration steps concerning raw data validation, raw data documentation, representativity, completeness and consistency of modelling with regard to ISO 14040 and 14044.

## Data sources
- 桑春晖,杨欣桐,李香兰等.基于SEFA方法的异位土壤修复环境足迹分析——以某钢铁厂为例[J].中国环境科学,2023,43(10):
