# Electricity production ; Electricity mix ; China

Dataset: ILCD process, Unit process, single operation
Geography: CN
Reference year: 2019
Classification: Unit processes / Energy carriers and technologies / Electricity
Generated by: Ruoxi Xiong, xiongrx0126@163.com
Owner: Tiangong LCI Data Working Group
Review: Dependent internal review by Tiangong LCI Data Working Group
Amounts: no units in this file; such an amount is in the reference unit of its flow, which a separate flow dataset defines
copyright: false
licenseType: Free of charge for all users and uses

## General comment
Electricity mix includes thermal, hydro, wind, nuclear and solar generation

## Technical purpose
This dataset represents the mixed electricity generation in China, which includes a range of generation methods such as thermal (coal, gas, and oil-fired), hydroelectric, wind, nuclear, and solar power. The electricity mix is applicable to various sectors including residential, commercial, and industrial contexts where electricity sourced from the national grid is utilized.

## Reference product
- Electricity: 3.6; missing unimportant
  [{'text': '能量', 'type': 'text'}]

## Inputs
All rows: missing unimportant
- electricity for thermal power: 2.50508
  [{'text': '能量', 'type': 'text'}]
- electricity from hydroelectric power plant: 0.625982
  [{'text': '能量', 'type': 'text'}]
- electricity for nuclear power: 0.167171
  [{'text': '能量', 'type': 'text'}]
- electricity from wind power: 0.194849
  [{'text': '能量', 'type': 'text'}]
- electricity for solar power: 0.106919
  [{'text': '能量', 'type': 'text'}]

## Use advice
When using this dataset for Life Cycle Assessment, data users should consider the proportions of the electricity mix based on current or projected generation data. It is important to note regional variations within China which might affect the applicability of the data for specific geographies. The temporal relevancy of the data should also be examined as the electricity mix can vary over time. The inclusion or exclusion of upstream processes (e.g., fuel extraction for thermal generation) and downstream processes (e.g., waste treatment and decommissioning) should be well-documented and consistent with the goal and scope of the assessment.

## Review details
Inventory: The internal review was done by several iteration steps concerning raw data validation, raw data documentation, representativity, completeness and consistency of modelling with regard to ISO 14040 and 14044.

## Data sources
- 能源统计年鉴2020
