# secondary copper production ;cathode copper;TSA process;waste wire

Dataset: ILCD process, Unit process, single operation
Geography: CN
Reference year: 2014
Classification: Materials production / Metals and semimetals
Functional unit: functional unit was defined as the production of 1 t of refined copper (i.e., cathode copper).
LCI method principle: Attributional
LCI method approaches: Allocation - market value
Generated by: Peng Wang, 2867919560@qq.com
Owner: Tiangong LCI Data Working Group
Review: Dependent internal review by Tiangong LCI Data Working Group
Amounts: no units in this file; such an amount is in the reference unit of its flow, which a separate flow dataset defines
copyright: false
licenseType: Free of charge for all users and uses

## General comment
The secondary copper produced through the TSA process is primarily used for the recovery of copper from waste sources. This includes extracting copper from discarded electronic equipment, end-of-life vehicles, industrial electrical equipment scrap, municipal solid waste, and construction and demolition debris. This recovered copper can be used in electrical wiring, plumbing, roofing materials, and various other applications where copper is required.

## Geography
Inventory data of copper production originated mainly from two plants that adopted different equipment and processes

## Technology and included processes
Secondary copper production begins with copper scraps collection, followed by disassembly, separation, transportation, and ending in the smelting plant or refinery for copper recovery. Copper scraps are contained mainly in waste electric and electronic equipment, end-of-life vehicles, industrial electrical equipment waste, municipal solid waste, construction and demolition waste.

## Reference product
- copper ore/(0.81%): 0; input; missing unimportant
  copper ore/(0.81%) needs to be supplemented

## Inputs
All rows: missing unimportant
- copper ore/(1.02%): 0
  copper ore/(1.02%) needs to be supplemented
- waste wire: 4302
  waste wire needs to be replenished
- Limestone: 51.8
  imestone
- quartz sand: 45.53
- oxygen: 0
- Sulfuric acid(98%): 3
  Sulfuric acid needs to be supplemented with resourse
- steam: 1000
  steam needs to be supplemented
- Alternating Current Electricity: 925.2
  AC electricity needs to be replenished
- Direct Current Electricity: 972
  DC electricity needs to be replenished
- hard coal: 0
  coal
- coke: 13781
  Coke needs to be replenished
- diesel oil: 0
  Diesel oil needs to be replenished
- Heavy fuel oil (1.0 wt.% S): 5983.5
  heavy fuel oil

## Outputs
All rows: missing unimportant
- carbon dioxide: 724.15
  CO2
- sulfur oxides: 6.45
  SO2
- chemical oxygen demand: 2.03
  COD needs to be supplemented
- particles (PM2.5 - PM10): 0.67
  dust needs to be replenished
- Slag: 681.83
  slag

## Deviations from the LCI method approaches
The Eco-Indicator 99 (EI99), a damage-oriented method widely used as an impact assessment method in LCA [22], was applied for the life cycle impact assessment. The impact assessment was performed with the EI99 methodology (hierarchist perspective).

## Data selection and combination
published literature

## Data treatment and extrapolations
GaBi 4 software was used to model the copper production processes and determine the environmental burdens in this study.

## Use advice
When using data from the provided LCA study, ensure that the functional unit is consistent with your own application, which in this case is the production of 1 ton of refined copper (cathode copper). If the application involves similar equipment and processes as the ones from the two plants studied, this data can be referenced directly. However, if different processes or equipment are involved, adjustments may be necessary. Caution should be taken to model the use phase behavior accurately, particularly if recycling practices differ significantly from the assessed scenarios. Apply the Eco-Indicator 99 (hierarchist perspective) method for comparative life cycle impact assessment if consistent with your study's requirements.

## Review details
Inventory: The internal review was done by several iteration steps concerning raw data validation, raw data documentation, representativity, completeness and consistency of modelling with regard to ISO 14040 and 14044.

## Data sources
- Song, X., Yang, J., Lu, B., Li, B. & Zeng, G. Identification and assessment of environmental burdens of Chinese copper production from a life cycle perspective. Front. Environ. Sci. Eng. 8, 580–588 (2014).
