# municipal wastewater treatment ; wastewater ; conventional activated sludge

Dataset: ILCD process, Unit process, black box
Geography: GR
Classification: Unit processes / End-of-life treatment / Waste water treatment
Generated by: Xu Qianrong, 2331391@tongji.edu.cn
Owner: Tiangong LCI Data Working Group
Review: Dependent internal review by Tiangong LCI Data Working Group
Amounts: no units in this file; such an amount is in the reference unit of its flow, which a separate flow dataset defines
copyright: ['opt4ROkqig']
licenseType: Free of charge for all users and uses

## General comment
The gas pollutants that can be released directly from the wastewater treatment processes were not considered in the LCIA study. Gas pollutants are produced during the biological wastewater degradation process and are calculated based on the load of influent and effluent wastewater (defined by COD, TN, and SS concentrations) as well as the inflow and outflow rates.

## Technology and included processes
The unit included a denitrification tank followed by a nitrification tank with total working volume 650 m³, where the wastewater was mixed with a stirrer in the first tank and was aerated by diffusers in the latter. After that, the wastewater passed into a secondary sedimentation tank of 78.5 m3 active volume while tertiary treatment followed that was carried out in a system included a mixing tank—where PAC and polyelectrolyte were added as flocculants—a flocculation tank and a drum filter.

## Technical purpose
The conventional activated sludge process described by this dataset is used for the treatment of municipal wastewater. This biological treatment process is designed for the removal of contaminants from urban sewage and is typically implemented in municipal wastewater treatment facilities. It is applicable to the treatment of domestic sewage or municipal effluent which may include household waste liquid from toilets, baths, showers, kitchens, and sinks draining into sewers.

## Reference product
- Wastewater: 499; measured
  Treated

## Inputs
All rows: measured
- Wastewater: 528
- Electricity: 202.68
  influent pump
- Electricity: 103.68
  equalization tank mixer
- Electricity: 103.68
  denitrification mixer
- Electricity: 1728
  nitrification blowers
- Electricity: 64.8
  sedimentation bridge
- Electricity: 345.6
  sludge circulation pump
- Electricity: 5.4
  sludge removal pump
- transportation: 9.4255
  Lorry EURO610 tons
- Polyaluminum chloride: 90.6
  EcoSpold 2iron(II) chloride
- Polyelectrolyte: 0.97
  EcoSpold 2aluminium sulfate, powder
- Electricity: 35.424
  mixer
- Electricity: 34.56
  Polyelectrolyte Pump
- Electricity: 35.424
  Flocculation Mixer
- Electricity: 10.8
  Drum Filter

## Outputs
- Sludge: 269.3; measured
  to landfill

## Use advice
When using this dataset for Life Cycle Assessment, consider the geographical and technological relevance of the dataset to the specific case being studied. The data represents a 'black box' unit process, and users should be cautious of system boundaries and any allocation procedures involved in their LCA model. The dataset generally excludes the construction phase of the wastewater treatment facility and end-of-life scenarios. Recycled water outputs or sludge treatment should be handled separately according to the specifics of the local system.

## Review details
Inventory: The internal review was done by several iteration steps concerning raw data validation, raw data documentation, representativity, completeness and consistency of modelling with regard to ISO 14040 and 14044.

## Data sources
- Banti，D.C.、Tsangas，M.、Samaras，P.和Zorpas，A.膜生物反应器与活性污泥系统在城市污水处理中的LCA比较。膜10（2020）
