# clinker production|clinker, portland cement clinker, 52.5MPa

Dataset: ILCD process, LCI结果
Geography: CN
Classification: Materials production / Other mineralic materials
Generated by: Siqi Yang
Amounts: no units in this file; such an amount is in the reference unit of its flow, which a separate flow dataset defines
copyright: false

## General comment
The company solely uses natural minerals to manufacture cement clinker.

## Model description
Select 1 ton of cement clinker with a strength of 52.5 MPa as the functional unit. The "cradle-to-gate" system boundary is adopted. The system of producing cement clinker from natural minerals includes the acquisition and transportation of raw materials and the production process of cement clinker. The system boundary of the production of cement clinker by comprehensive utilization of fly ash also includes the upstream power generation system and the process of avoiding fly ash pile disposal process.

## Reference product
- clinker, portland cement clinker, 52.5MPa: 1000
  Clinker, 52.5MPa

## Inputs
All rows: measured
- limestone, crushed, for mill: 1260
  Limestone
- clay: 231
  Clay
- sandstone: 96
  Sandstone
- hard coal, run-of-mine: 161
  Raw coal
- electricity, medium voltage: 149.76
  Electricity

## Outputs
All rows: measured
- carbon dioxide: 842
  CO2
- Nitrogen oxides: 1.57
  NOx
- sulfur dioxide: 0.801
  SO2
- carbon monoxide: 0.356
  CO
- methane: 1.61
  CH4
- non-methane volatile organic compounds: 0.142
  NMVOC

## Deviations from the LCI method approaches
The inventory data for the extraction, energy production, transportation, and other processes of limestone, clay, sandstone, and other raw materials are sourced from the Ecoinvent database.

## Data sources
- 邵亦白, 刘宇, 郑焱, 任品桥, & 杜世伟. (2022). 利废水泥熟料产品系统的生命周期清单分析方法及应用. 中国水泥, 11, 59–62.
