# Groundwater ex-situ remediation ; Groundwater pump and treat ; construction ; Treatment facilities

Dataset: ILCD process, Unit process, single operation
Geography: DK
Reference year: 2021
Classification: Unit processes / Other Services / Repair and maintenance
Generated by: Wang Ning, wang_ning@caep.org.cn
Owner: Tiangong LCI Data Working Group
Review: Dependent internal review by Tiangong LCI Data Working Group
Amounts: no units in this file; such an amount is in the reference unit of its flow, which a separate flow dataset defines
copyright: false
licenseType: Free of charge for all users and uses

## General comment
Construction of wastewater disposal facilities using activated carbon, high-density polyethylene, iron

## Technology and included processes
Construction of treatment facilities using electricity, quartz sand, high-density polyethylene, steel, activated carbon

## Technical purpose
The described process involves the construction of wastewater treatment facilities for groundwater ex-situ remediation. These facilities are used for the treatment of contaminated groundwater, which is pumped out of the ground and processed through systems made with activated carbon filters, high-density polyethylene, and iron components. This type of remediation facility is typically used in environmental engineering projects to clean up polluted groundwater sites.

## Reference product
- Treatment facilities: 1; estimated

## Inputs
All rows: estimated
- polyethylene high density granulate (PE-HD): 410
- Steel sections: 50
- Activated Carbon: 180
- Electricity: 38000
- quartz sand: 300000

## Use advice
When utilizing this Life Cycle Assessment data for the construction of groundwater treatment facilities, users should account for the specific inputs (electricity, quartz sand, high-density polyethylene, steel, activated carbon) as defined in the provided dataset. Ensure to include these materials in the LCA inventory for accurate impact assessment. Users should consider the technological lifecycle of the constructed facilities, including potential end-of-life scenarios such as dismantling and recycling of materials or disposal. The geographic specificity of resource extraction and construction processes should also be considered when applying this data to specific projects.

## Review details
Inventory: The internal review was done by several iteration steps concerning raw data validation, raw data documentation, representativity, completeness and consistency of modelling with regard to ISO 14040 and 14044.

## Data sources
- Sustainable remediation assessment of a chlorinated ethene plume: method evelopment, application, and assessment
