# Soil remediation;soil vapor extraction;in-situ;construction;site foundation;

Dataset: ILCD process, Unit process, single operation
Geography: KR
Reference year: 2011
Classification: Other Services / Repair and maintenance
Generated by: Lei Qiushuang, leiqs@caep.org.cn
Owner: Tiangong LCI Data Working Group
Review: Dependent internal review by Tiangong LCI Data Working Group
Amounts: no units in this file; such an amount is in the reference unit of its flow, which a separate flow dataset defines
copyright: false
licenseType: Free of charge for all users and uses

## General comment
Office, storage, and SVE system foundation

## Technical purpose
This industrial process refers to the construction phase of soil remediation, specifically in-situ soil vapor extraction (SVE). It includes the establishment of site foundation as well as the foundation for office, storage, and the SVE system. The process is utilized in environmental engineering to remove volatile compounds from polluted soils at the location where the contamination has occurred without the need to excavate large amounts of soil.

## Reference product
- SVE site: 1; measured
  建成的SVE场地

## Inputs
- gravel: 9.6; measured
- Concrete: 19; measured
- Diesel: 0.021; measured
- Wire Mesh: 96; measured
  金属丝网

## Use advice
Users applying this data set should ensure the scope of their Life Cycle Assessment includes the construction phase of soil remediation projects. Attention should be given to the geographic location and the specific contaminants targeted by the SVE system. The temporal boundary should include the time frame for construction and installation of the SVE system. Users must differentiate between the impacts of construction and operation phases. Furthermore, they should consider any possible environmental benefits or trade-offs as a result of using an in-situ remediation approach, such as reduced soil excavation and transport.

## Review details
Inventory: The internal review was done by several iteration steps concerning raw data validation, raw data documentation, representativity, completeness and consistency of modelling with regard to ISO 14040 and 14044.

## Data sources
- Assessment of Environmental Impacts and CO2 Emissions from Soil Remediation Technologies using Life cycle Assessment - Case Studies on SVE and Biopile Systems
