# Steel products ; steel ; recycled steel production

Dataset: ILCD process, Unit process, single operation
Geography: JL-CN
Reference year: 2016
Classification: Unit processes / Materials production / Metals and semimetals
Generated by: Wanghuanyu, wanghuanyu00@126.com
Owner: Tiangong LCI Data Working Group
Review: Dependent internal review by Tiangong LCI Data Working Group
Amounts: no units in this file; such an amount is in the reference unit of its flow, which a separate flow dataset defines
copyright: false
licenseType: Free of charge for all users and uses

## General comment
Recycled steel production is utilized for manufacturing steel products which are then used in various industries such as construction, automotive, and manufacturing of durable goods. This process involves melting scrap steel and processing it to regain properties comparable to those of virgin steel.

## Reference product
- iron: 1000; measured
  Steel

## Inputs
- Energy, geothermal, converted: 3244.94; measured
  standard coal

## Outputs
- phenol,Sulphur oxides (as SO2): 0.102; measured
- nitrogen monoxide: 0.345; measured

## Use advice
When incorporating this data into a Life Cycle Assessment, users should account for the energy consumption and emissions associated with the collection, sorting, and melting of scrap steel. It is also crucial to consider any transportation impacts related to the movement of scrap materials. Appropriate allocation methods should be applied if the recycling process yields co-products. The quality of the input scrap steel and the technology used in processing should also be reflected in the assessment.

## Review details
Inventory: The internal review was done by several iteration steps concerning raw data validation, raw data documentation, representativity, completeness and consistency of modelling with regard to ISO 14040 and 14044.

## Data sources
- 王宪恩, 栾天阳, 陈英姿, & 段海燕. 基于LCA的废旧资源循环利用节能减排效果评估模式与方法研究——以吉林省某钢铁企业为例. 中国人口·资源与环境 26, 69–77 (2016).
