# Grape production

Dataset: ILCD process, Unit process, black box
Geography: CA
Reference year: 2006
Valid until: 2007
Classification: Unit processes / Materials production / Agricultural production means
Functional unit: 1 hectare vineyard
Generated by: zhu xian, zzhu0918@163.com
Owner: Tiangong LCI Data Working Group
Review: Dependent internal review by Tiangong LCI Data Working Group
Amounts: no units in this file; such an amount is in the reference unit of its flow, which a separate flow dataset defines
copyright: false
licenseType: Free of charge for all users and uses

## General comment
The grape seeds are sown, chemical fertilizers, pesticides and artificial fertilizers are applied in the growth stage, and irrigation is carried out at the same time, and the grape fruits are obtained at the harvest stage after the grape blossoms.

## Geography
Located in Nova Scotia, Canada

## Time period
Vineyard-specific inventory data were compiled and weighted using 2006 vineyard grape production volumes to provide a representative vineyard model for Nova Scotia.

## Technical purpose
The grape production process data set represents the agricultural cultivation and harvesting of grapes in a vineyard. It typically includes the sowing of grape seeds, application of chemical and artificial fertilizers, pesticides, and the use of irrigation methods. This process culminates in the harvesting of grape fruits. The grapes produced are generally used for consumption as fresh fruit, for juice production, or in the winemaking industry.

## Reference product
- Grape: 6370; measured

## Inputs
All rows: measured
- Nitrogenous fertilizer: 96
- Phosphate fertilizer: 73.12
- Potassium fertilizer: 166.98
- diesel oil: 0.23957
- sulfur: 27.2
- Pesticide: 16.91
- Gasoline (regular): 0.00557

## Outputs
All rows: measured
- carbon dioxide (biogenic): 741.85
  The original text does not distinguish between biogenic and fossil, which in the expert's judgment is biogenic here.
- nitrous oxide: 3.43
- nitrogen monoxide: 3.62
- ammonia: 24.17
- nitrate: 90.7
- Phosphorus Pentoxide: 2.03

## Use advice
When utilizing this data set for life cycle assessment (LCA) of grape production, it is important to ensure the scope of the LCA matches the vineyard-specific conditions captured in the data. The model is based on data from 2006 and may need to be updated to reflect current practices. Consider regional factors, irrigation practices, and technological advancements in cultivation that may affect the LCA results. Carefully account for allocation decisions, especially if the harvested grapes are used for multiple purposes. The methodology and data set should be adjusted if the technology or cultivation practices significantly differ from those used in Nova Scotia, Canada, in 2006.

## Review details
Inventory: The internal review was done by several iteration steps concerning raw data validation, raw data documentation, representativity, completeness and consistency of modelling with regard to ISO 14040 and 14044.
