# PV cell production ; PV cell ; Mixed acids are used to wash wafer, and then add p-n knot and cover with deposition film

Dataset: ILCD process, Unit process, single operation
Geography: CN
Reference year: 2016
Classification: Unit processes / Materials production / Inorganic chemicals
Functional unit: Grid-connected electricity generation from a 1 MWp multi-Si PV system, whose lifespan is 30 years of a 10 MWp power station has been taken as the research object and the functional unit
LCI method principle: Attributional
LCI method approaches: Allocation
Generated by: Jinfeng Yang, yjfzfshn@163.com
Owner: Tiangong LCI Data Working Group
Review: Dependent internal review by Tiangong LCI Data Working Group
Amounts: no units in this file; such an amount is in the reference unit of its flow, which a separate flow dataset defines
copyright: false
licenseType: Free of charge for all users and uses

## General comment
Multi-Si

## Geography
The power station is located in the central region of Ningxia, China, where the average annual solar radiation is approximately 5955.80 MJ m2 a-1, and the annual average number of peak sunshine hours are 1718 h.

## Time period
Available online

## Technical purpose
The photovoltaic (PV) cells produced by this process are utilized in medium-scale power stations for the conversion of solar energy into electrical energy. Specifically, the production process involves the cleaning of silicon wafers with mixed acids, adding p-n junctions, and covering them with a deposition film. The resulting multi-crystalline silicon PV cells are designed for grid-connected electricity generation systems and can be used within the solar power station located in the central region of Ningxia, China, which benefits from high solar radiation and peak sunshine hours.

## Reference product
- Multi-Si solar cell,Multi-Si solar cell,Multi-Si solar cell: 1; measured
  PV cell

## Inputs
All rows: measured
- Electricity: 1.98
- Multi-Si wafer,Multi-Si wafer,Multi-Si wafer: 1
  SoG-Si wafer
- freshwater: 1.1
  Fresh water
- silver: 0.00043
  Silver paste
- aluminium: 0.00139
  Aluminum paste
- Ammonia: 0.00137
- Silane: 0.00053
- Phosphorus Oxychloride: 4e-5
  Phosphorus oxychloride
- Potassium hydroxide: 0.00137
  Potassium hydroxide (21%)
- Sodium hydroxide: 0.00099
  Caustic soda (30%)
- Hydrochloric acid: 0.00141
  Hydrochloric acid (37%)
- Hydrofluoric acid: 0.00191
  Hydrofluoric acid (40%)
- Nitric acid: 0.00495
  Nitric acid (70%)
- Sulfuric acid: 1e-5
  Sulfuric acid (98%)
- phosphoric acid: 4e-6
  Phosphoric acid (85%)
- oxygen: 0.00062
  Oxygen
- nitrogen: 0.0433
  Nitrogen
- Ethanol: 0.0001
- Carbon tetrafluoride: 0.00016
- Terpineol: 2e-7

## Outputs
All rows: measured
- chlorine: 8e-5
  Chlorine
- Nitrogen oxides: 0.00012
- ammonia: 4e-5
  Ammonia
- volatile organic compound: 7e-5
  Volatile organic compound
- hydrogen chloride: 1e-5
  Hydrogen chloride
- chloride: 0.00017
  Chloride
- fluoride: 0.00204
  Fluoride
- nitrogen, total (excluding N2): 5e-5
  TN
- hydrogen fluoride: 4e-6
  Hydrogen fluoride
- Carbon tetrafluoride: 2e-5
- chemical oxygen demand: 0.00012
  Chemical oxygen demand(COD)
- waste water - untreated: 0.67
  Waste water
- Sludge: 0.12
- municipal solid waste deposition: 0.00026
  Solid waste
- hazardous waste (unspecified),hazardous waste (unspecified): 1e-6
  Solid waste (Hazardouswaste)

## Deviations from the LCI method approaches
A life cycle assessment (LCA) has been performed for the grid-connected electricity generation from a metallurgical route multi-crystalline silicon (multi-Si) photovoltaic (PV) system in China.

## Data selection and combination
Survery of factories in Yunnan and Ningxia

## Use advice
When utilizing this data set for life cycle assessment (LCA) of the multi-crystalline silicon PV system, consider the specific environmental conditions of the Ningxia region to estimate the energy production accurately. Take into account the system's expected lifespan of 30 years for a 10 MWp power station and the geographic specificity in terms of solar radiation and peak sunshine hours. Ensure to include any regional differences in environmental impact when applying the LCA data to other locations. Consider the technological specificity of the PV cell production process, particularly the use of mixed acids and the deposition film application.

## Review details
Inventory: The internal review was done by several iteration steps concerning raw data validation, raw data documentation, representativity, completeness and consistency of modelling with regard to ISO 14040 and 14044.

## Data sources
- Yu, Z. et al. Life cycle assessment of grid-connected power generation from metallurgical route multi-crystalline silicon photovoltaic system in China. Applied Energy 185, 68–81 (2017).
