# Building boards (rough boards, rough glossy boards, specification boards) ; Barren material (marble, etc.) ; Sawing, gluing, grinding and polishing, cutting (with gluing) ; less than0.4 million m2/a; NESPS2 / 建筑板材（毛板、毛光板、规格板） ; 荒料（大理石等） ; 锯解、涂胶、磨抛、裁切（有涂胶） ; 小于40万平方米/年 ; 全国第二次污染普查数据

Dataset: ILCD process, Unit process, single operation
Geography: CN
Reference year: 2019
Classification: Reference Parameters / Materials production / Other mineralic materials
Generated by: The data was created by the Office of the Second National Pollution Source Census of the Ministry of Ecology and Environment, and the data was organized by the TianGong Plan team for ILCD format / 生态环境部第二次全国污染源普查工作办公室创建数据，天工计划团队常慧敏整理数据为ILCD格式
Owner: Tiangong LCI Data Working Group / 天工LCI数据工作小组
Review: Dependent internal review by Tiangong LCI Data Working Group / 天工LCI数据工作小组
Amounts: no units in this file; such an amount is in the reference unit of its flow, which a separate flow dataset defines
copyright: false
licenseType: Free of charge for all users and uses

## General comment
the Technical of end-of-pipe management technology for pollution Exhaust gasis/

## Technical purpose
该工业过程用于生产各种建筑板材，包括毛板、毛光板和由贫瘠材料（如大理石）制成的规格板。这些板材经过锯解、涂胶、磨抛和裁切（含涂胶），用于建筑装饰如内外墙装饰、地板和墙面饰面。该工艺设计年产量不足40万平方米。此外，工厂采用多种尾气处理技术处理污染，包括废气、颗粒物（PM2.5 - PM10）、挥发性有机化合物（VOC）和废水，通过湿式处理、燃烧法、光解加光催化、等离子法、吸附和沉淀分离加回收等方法。

## Reference product
- waste incineration of wood products (OSB, particle board): 1; calculated
  源文件中描述为为建筑板材（毛板、毛光板、规格板），此处对其进行了匹配工作，将其匹配到LCAflow库里面相最符合的流，污染物指标备注为工业废气量（有涂胶工艺）

## Outputs
All rows: calculated
- volatile organic compound: 4.1e-5
  the Technical of end-of-pipe management technology for pollution volatile organic compoundisCombustion method，Its Technical efficiency of end-of-pipe management99
  污染物指标挥发性有机物（有涂胶工艺）的末端治理技术是燃烧法，其效率为99，末端治理设施实际运行率（k值）计算公式为k=处理设施耗电量（千瓦时/年）/（设备额定功率（千瓦）×设备运行时间（小时/年））。原文件中描述污染物类别为废气，污染物指标为挥发性有机物（有涂胶工艺），此处对其进行了匹配工作，将其匹配到LCAflow库里面相最符合的流，污染物指标备注为挥发性有机物（有涂胶工艺）
- volatile organic compound: 0.00041
  the Technical of end-of-pipe management technology for pollution volatile organic compoundisPhotolysis + photocatalysis，Its Technical efficiency of end-of-pipe management90
  污染物指标挥发性有机物（有涂胶工艺）的末端治理技术是光解+光催化，其效率为90，末端治理设施实际运行率（k值）计算公式为k=处理设施耗电量（千瓦时/年）/（设备额定功率（千瓦）×设备运行时间（小时/年））。原文件中描述污染物类别为废气，污染物指标为挥发性有机物（有涂胶工艺），此处对其进行了匹配工作，将其匹配到LCAflow库里面相最符合的流，污染物指标备注为挥发性有机物（有涂胶工艺）
- volatile organic compound: 0.000615
  the Technical of end-of-pipe management technology for pollution volatile organic compoundisPlasma method，Its Technical efficiency of end-of-pipe management85
  污染物指标挥发性有机物（有涂胶工艺）的末端治理技术是等离子法，其效率为85，末端治理设施实际运行率（k值）计算公式为k=处理设施耗电量（千瓦时/年）/（设备额定功率（千瓦）×设备运行时间（小时/年））。原文件中描述污染物类别为废气，污染物指标为挥发性有机物（有涂胶工艺），此处对其进行了匹配工作，将其匹配到LCAflow库里面相最符合的流，污染物指标备注为挥发性有机物（有涂胶工艺）
- volatile organic compound: 0.00082
  the Technical of end-of-pipe management technology for pollution volatile organic compoundisAdsorption，Its Technical efficiency of end-of-pipe management80
  污染物指标挥发性有机物（有涂胶工艺）的末端治理技术是吸附法，其效率为80，末端治理设施实际运行率（k值）计算公式为k=处理设施耗电量（千瓦时/年）/（设备额定功率（千瓦）×设备运行时间（小时/年））。原文件中描述污染物类别为废气，污染物指标为挥发性有机物（有涂胶工艺），此处对其进行了匹配工作，将其匹配到LCAflow库里面相最符合的流，污染物指标备注为挥发性有机物（有涂胶工艺）
- particles (PM2.5 - PM10): 0.0037
  the Technical of end-of-pipe management technology for pollution particles (PM2.5 - PM10)isWet process，Its Technical efficiency of end-of-pipe management90
  污染物指标颗粒物（有涂胶工艺）的末端治理技术是湿法，其效率为90，末端治理设施实际运行率（k值）计算公式为k=处理设施耗电量（千瓦时/年）/（设备额定功率（千瓦）×设备运行时间（小时/年））。原文件中描述污染物类别为废气，污染物指标为颗粒物（有涂胶工艺），此处对其进行了匹配工作，将其匹配到LCAflow库里面相最符合的流，污染物指标备注为颗粒物（有涂胶工艺）
- volatile organic compound: 0.0041
  the Technical of end-of-pipe management technology for pollution volatile organic compoundis/，Its Technical efficiency of end-of-pipe management0
  污染物指标挥发性有机物（有涂胶工艺）的末端治理技术是/，其效率为0。原文件中描述污染物类别为废气，污染物指标为挥发性有机物（有涂胶工艺），此处对其进行了匹配工作，将其匹配到LCAflow库里面相最符合的流，污染物指标备注为挥发性有机物（有涂胶工艺）
- particles (PM2.5 - PM10): 0.0074
  the Technical of end-of-pipe management technology for pollution particles (PM2.5 - PM10)isOthers①，Its Technical efficiency of end-of-pipe management80
  污染物指标颗粒物（有涂胶工艺）的末端治理技术是其他①，其效率为80，末端治理设施实际运行率（k值）计算公式为k=处理设施耗电量（千瓦时/年）/（设备额定功率（千瓦）×设备运行时间（小时/年）），①其他包括机械除尘、喷雾降尘等。。原文件中描述污染物类别为废气，污染物指标为颗粒物（有涂胶工艺），此处对其进行了匹配工作，将其匹配到LCAflow库里面相最符合的流，污染物指标备注为颗粒物（有涂胶工艺）
- particles (PM2.5 - PM10): 0.037
  the Technical of end-of-pipe management technology for pollution particles (PM2.5 - PM10)is/，Its Technical efficiency of end-of-pipe management0
  污染物指标颗粒物（有涂胶工艺）的末端治理技术是/，其效率为0。原文件中描述污染物类别为废气，污染物指标为颗粒物（有涂胶工艺），此处对其进行了匹配工作，将其匹配到LCAflow库里面相最符合的流，污染物指标备注为颗粒物（有涂胶工艺）
- Petroleum-related waste: 6e-5
  the Technical of end-of-pipe management technology for pollution Petroleum-related wasteisPressure filtration (filtration) + recycling①，Its Technical efficiency of end-of-pipe management40
  污染物指标石油类的末端治理技术是压滤（过滤）+循环利用①，其效率为40，末端治理设施实际运行率（k值）计算公式为k=处理设施耗电量（千瓦时/年）/（设备额定功率（千瓦）×设备运行时间（小时/年）），①末端治理技术效率为沉淀分离效率，循环利用效率按废水回用公式计算。
  。原文件中描述污染物类别为废水，污染物指标为石油类，此处对其进行了匹配工作，将其匹配到LCAflow库里面相最符合的流，污染物指标备注为石油类
- Petroleum-related waste: 7e-5
  the Technical of end-of-pipe management technology for pollution Petroleum-related wasteisPrecipitation separation + recycling①，Its Technical efficiency of end-of-pipe management30
  污染物指标石油类的末端治理技术是沉淀分离+循环利用①，其效率为30，末端治理设施实际运行率（k值）计算公式为k=处理设施耗电量（千瓦时/年）/（设备额定功率（千瓦）×设备运行时间（小时/年）），①末端治理技术效率为沉淀分离效率，循环利用效率按废水回用公式计算。
  。原文件中描述污染物类别为废水，污染物指标为石油类，此处对其进行了匹配工作，将其匹配到LCAflow库里面相最符合的流，污染物指标备注为石油类
- Petroleum-related waste: 0.0001
  the Technical of end-of-pipe management technology for pollution Petroleum-related wasteis/，Its Technical efficiency of end-of-pipe management0
  污染物指标石油类的末端治理技术是/，其效率为0。原文件中描述污染物类别为废水，污染物指标为石油类，此处对其进行了匹配工作，将其匹配到LCAflow库里面相最符合的流，污染物指标备注为石油类
- Waste water: 394
  the Technical of end-of-pipe management technology for pollution Waste wateris/
  污染物指标工业废水量的末端治理技术是/。原文件中描述污染物类别为废水，污染物指标为工业废水量，此处对其进行了匹配工作，将其匹配到LCAflow库里面相最符合的流，污染物指标备注为工业废水量
- chemical oxygen demand: 0.01967
  the Technical of end-of-pipe management technology for pollution chemical oxygen demandisPrecipitation separation + recycling①，Its Technical efficiency of end-of-pipe management30
  污染物指标化学需氧量的末端治理技术是沉淀分离+循环利用①，其效率为30，末端治理设施实际运行率（k值）计算公式为k=处理设施耗电量（千瓦时/年）/（设备额定功率（千瓦）×设备运行时间（小时/年）），①末端治理技术效率为沉淀分离效率，循环利用效率按废水回用公式计算。
  。原文件中描述污染物类别为废水，污染物指标为化学需氧量，此处对其进行了匹配工作，将其匹配到LCAflow库里面相最符合的流，污染物指标备注为化学需氧量
- chemical oxygen demand: 0.02248
  the Technical of end-of-pipe management technology for pollution chemical oxygen demandisPressure filtration (filtration) + recycling①，Its Technical efficiency of end-of-pipe management20
  污染物指标化学需氧量的末端治理技术是压滤（过滤）+循环利用①，其效率为20，末端治理设施实际运行率（k值）计算公式为k=处理设施耗电量（千瓦时/年）/（设备额定功率（千瓦）×设备运行时间（小时/年）），①末端治理技术效率为沉淀分离效率，循环利用效率按废水回用公式计算。
  。原文件中描述污染物类别为废水，污染物指标为化学需氧量，此处对其进行了匹配工作，将其匹配到LCAflow库里面相最符合的流，污染物指标备注为化学需氧量
- chemical oxygen demand: 0.0281
  the Technical of end-of-pipe management technology for pollution chemical oxygen demandis/
  污染物指标化学需氧量的末端治理技术是/。原文件中描述污染物类别为废水，污染物指标为化学需氧量，此处对其进行了匹配工作，将其匹配到LCAflow库里面相最符合的流，污染物指标备注为化学需氧量
- Exhaust gas: 256
  the Technical of end-of-pipe management technology for pollution Exhaust gasis/
  污染物指标工业废气量（有涂胶工艺）的末端治理技术是/。原文件中描述污染物类别为废气，污染物指标为工业废气量（有涂胶工艺），此处对其进行了匹配工作，将其匹配到LCAflow库里面相最符合的流，污染物指标备注为工业废气量（有涂胶工艺）

## Use advice
This dataset is derived from the Pollution Source Census Report and contains information on pollution emissions and related products. However, it does not include data on energy or chemical consumption, nor does it provide information on waste or co-product generation. When utilizing this dataset, please supplement the missing data based on actual conditions before use
该数据集来源于污染源普查报告，包含污染物排放及相关产品信息，但不包含能源或化学品消耗数据，也不提供废弃物或共生产物产生信息。在使用该数据集时，请根据实际情况补充缺失数据后再使用。

## Review details
Inventory: The internal review was done by several iteration steps concerning raw data validation, raw data documentation, representativity, completeness and consistency of modelling with regard to ISO 14040 and 14044.
清单： 内部审查通过几个迭代步骤完成，涉及原始数据验证、原始数据记录、代表性、完整性、与 ISO 14040 和 14044 有关的建模的一致性。

## Data sources
- 第二次全国污染源普查产排污核算系数手册（试用版）,二级代码30,四级代码3032文件，在完整版文件中第3368页
