# Iron ore production;Iron ore;Iron ore mining(D01)

Dataset: ILCD process, Unit process, single operation
Geography: CN
Reference year: 1998
Classification: Unit processes / Materials production / Non-energetic raw materials
Generated by: Fuxiang, 1162850692@qq.com
Owner: Tiangong LCI Data Working Group
Review: Dependent internal review by Tiangong LCI Data Working Group
Amounts: no units in this file; such an amount is in the reference unit of its flow, which a separate flow dataset defines
copyright: false
licenseType: Free of charge for all users and uses

## General comment
来自表 4-17 D01 钢厂生产吨材环境负荷编目表

## Time period
论文提到钢铁企业环境总体数据为1998年的吨钢环境基础数据。

## Technical purpose
This dataset represents iron ore which is extracted through the mining process and is primarily used for the production of steel. The iron ore serves as a raw material for steel manufacturing facilities, contributing to industrial processes such as blast furnace operations and steel refining.

## Reference product
- Iron ore: 1873; measured
  iron ore

## Inputs
- Energy, geothermal, converted: 1541.4; measured
- water: 20603; measured

## Use advice
Users of this dataset should consider the technological applicability in relation to the year of the data (1998) and apply it cautiously to current processes as technological advances may have occurred since then, impacting the environmental loading factors. The dataset provides fundamental environmental impact data per tonne of steel produced and is focused on single-unit processes at steel production facilities. When integrating data into life cycle assessments, attention should be given to system boundaries and whether or not to include potential recycling of the steel being modelled. It is also important to consider geographical specificity as it may significantly influence environmental impact outcomes.

## Review details
Inventory: The internal review was done by several iteration steps concerning raw data validation, raw data documentation, representativity, completeness and consistency of modelling with regard to ISO 14040 and 14044.

## Data sources
- 周和敏. 钢铁材料生产过程环境协调性评价研究. (北京工业大学, 2001).
