# Oxygen Production ; Oxygen ; Air Separation Routes ; Air

Dataset: ILCD process, Unit process, black box
Geography: ZJ-GD-CN
Reference year: 2018
Classification: Unit processes / Materials production / Inorganic chemicals
Functional unit: A functional unit is defined as 4.69 ton of oxygen product
LCI method principle: Attributional
LCI method approaches: Allocation - mass
Generated by: Yanan Ren, renyn15@tsinghua.org.cn
Owner: Tiangong LCI Data Working Group
Review: Dependent internal review by Tiangong LCI Data Working Group
Amounts: no units in this file; such an amount is in the reference unit of its flow, which a separate flow dataset defines
copyright: false
licenseType: Free of charge for all users and uses

## General comment
ID14 Propylene Production ; Propylene ; Coal to Olefins Route ; Coal ; Subordinate Process 1

## Geography
The case plant of the catalytic cracking route comes from Sinopec Zhanjiang Dongxing Petrochemical Co., Ltd. The company is located in Zhanjiang City, Guangdong Province. Its catalytic cracking olefins process was built in 2018, with an annual production capacity of 116,000 tons of propylene.

## Time period
Craft built in 2018

## Technical purpose
Oxygen produced by air separation routes is typically employed for various industrial processes such as steelmaking, wastewater treatment, and medical applications. Propylene produced via the coal to olefins route is mainly utilized for manufacturing a wide range of plastic products and as an intermediate in the production of other chemicals. The case plant's capacity for producing propylene through catalytic cracking stands as a significant contribution to the commodity chemical industry.

## Model description
The consumption of raw materials, energy, electricity, steam, water and auxiliary chemicals involved in each sub-stage is considered, and the output considers propylene and by-products (such as C4 products produced by the propane dehydrogenation process. The mass distribution method is used to quantify the products The environmental load between propylene and by-products. In addition, this model also considers the waste discharge of each process. This study focuses on the environmental impact analysis of different propylene production processes. Therefore, the utilization of propylene hydrocarbons and the end-of-life treatment of their products, as well as infrastructure Construction and equipment maintenance are outside the scope of this assessment.

## Reference product
- oxygen: 4690; measured

## Inputs
- air: 21450; measured
  Air
- process steam: 590; measured
  low pressure steam
- Cooling water: 230; measured
  circulating cooling water
- Electricity: 4342.39; measured
  electricity

## Outputs
- nitrogen: 6040; measured
  Dirty nitrogen

## Data selection and combination
The detailed input-output data of the propylene production process comes from the company's public environmental impact assessment report, including the input of raw materials and auxiliary materials, energy and resource consumption, and discharge of waste gas, wastewater and solid waste.

## Use advice
When using the dataset for Lifecycle Assessment, ensure that the system boundaries are consistent with the scope of the provided data, which includes only raw material and auxiliary inputs, energy and resource consumption, and waste emissions. The environmental impact of the end-of-life phase, infrastructure construction, and maintenance of equipment are not included in this model. Users should apply the mass allocation method accurately to apportion environmental burdens between propylene and its co-products, considering all relevant consumptions from sub-stages and waste emissions as outlined in the dataset.

## Review details
Inventory: The internal review was done by several iteration steps concerning raw data validation, raw data documentation, representativity, completeness and consistency of modelling with regard to ISO 14040 and 14044.

## Data sources
- 吕琳. 丙烯产品环境负荷及温室气体减排的碳税政策. (大连理工大学, 2022).
