# Brick production ; sintered bricks ; sintering process

Dataset: ILCD process, Unit process, single operation
Geography: ZG-SC-CN
Reference year: 2020
Classification: Unit processes / Materials production / Other mineralic materials
Functional unit: 1t WDC were chosen as the functional unit
Generated by: Wang xiangjin, r99rt4@163.com
Owner: Tiangong LCI Data Working Group
Review: Dependent internal review by Tiangong LCI Data Working Group
Amounts: no units in this file; such an amount is in the reference unit of its flow, which a separate flow dataset defines
copyright: false
licenseType: Free of charge for all users and uses

## General comment
Using shale ore, coal, and water-based drilling chips as raw materials

## Technology and included processes
WDC（water-based drilling cuttings） were used as a replacement for natural clay to prepare sintered bricks. The water content of the WDC can be reduced from 80% to 20% through press filter pretreatment, which can meet the requirements of external delivery for recycling. The remaining water in the WDC can be used directly to make bricks (240 mm × 115 mm × 53 mm) to reduce the consumption of water resources. The entire production process includes raw material preparation, mixing, pressing, drying and sintering (temperature of 800–1000 °C; time for 1-4 h)

## Technical purpose
The described industrial process is for the production of sintered bricks, utilizing Water-Based Drilling Cuttings (WDC) as a substitute for natural clay. The sintered bricks produced are suitable for construction purposes, offering an environmentally friendly alternative by recycling industrial waste and reducing the consumption of water and natural clay resources.

## Reference product
- green brick: 5123; input; measured

## Inputs
- freshwater: 4160; measured
- Electricity: 752.94; measured

## Outputs
All rows: measured
- sintered brick: 4600
  Finished fired bricks
- sulfur dioxide: 0.11117
- nitrogen monoxide: 0.1015
  The original text is NOX
- hydrogen fluoride: 0.00204
- particles (> PM10): 0.0686
  Monitoring analysis
- carbon dioxide (fossil): 89.2

## Deviations from the LCI method approaches
The eFootprint online analysis platform developed by IKE Environmental Technology Co. was used to perform quantitative analysis of the full life cycle process, as part of the LCA

## Data selection and combination
The foreground data of raw materials, energy input, and exhaust emissions were obtained from a case study enterprise in Zigong (Sichuan, China), Chuangqi Environmental Protection Building Materials Co., Ltd., which has undertaken the utilization project of WDC used as a raw material for sintered bricks, with an annual output of 30 million bricks.

## Sampling procedure
Besides, 1t WDC were chosen as the functional unit and all the input parameters of raw materials, auxiliary materials, energy consumption, transportation, and direct emissions were calculated in accordance with the functional unit.

## Use advice
When utilizing the dataset for Life Cycle Assessment (LCA), adopt the functional unit of 1 ton of WDC to quantify inputs such as raw materials, auxiliary materials, energy, transportation, and emissions in accordance with this unit. Apply the cut-off rule as per Zhao et al., 2020, disregarding upstream materials of less than 1% weight of the final product, like fly ash, from the inventory. Integrate these data into the eFootprint platform for a comprehensive analysis of the environmental impact during the brick's life cycle.

## Review details
Inventory: The internal review was done by several iteration steps concerning raw data validation, raw data documentation, representativity, completeness and consistency of modelling with regard to ISO 14040 and 14044.

## Data sources
- Liu, W. et al. Comparative life cycle assessment of cement, sintered bricks and non-sintered bricks manufacturing using water-based drilling cuttings from shale gas production in the Sichuan Basin, China. J. Environ. Manage. 314, 115135 (2022).
