# Polymer Aluminum Electrolytic Capacitors (PAEC) Scrap ; Aluminum Powder ; Used Capacitors

Dataset: ILCD process, Unit process, single operation
Geography: CN
Reference year: 2022
Classification: Unit processes / End-of-life treatment / Material recycling
Generated by: Huimin Chang, huiminchang@tsinghua.edu.cn
Owner: Tiangong LCI Data Working Group
Review: Dependent internal review by Tiangong LCI Data Working Group
Amounts: no units in this file; such an amount is in the reference unit of its flow, which a separate flow dataset defines
copyright: false
licenseType: Free of charge for all users and uses

## General comment
Polymer Aluminum Electrolytic Capacitors (PAEC) represented by this data set are commonly used for energy storage in a variety of electronic equipment, ranging from consumer electronics to industrial applications where high capacitance and compactness are required. The aluminum powder derived from the scrap of these capacitors is recycled and utilized in various metallurgical processes or as a material for manufacturing new capacitors.

## Time period
Literature published on 2022-11-15 in the literature The reference year of the elementary data (alumminum ingots, separator paper, tansport, electricity, and water) is around 2016 and qcruired from the Gabi database (Version: 10.6.1.35)

## Reference product
- used capacitor: 1e6; input; measured
  Capacitors (waste)

## Outputs
All rows: measured
- electricity, high voltage, aluminium industry: 351.72
  Electricity
- Mixture of plastic and paper with electrolyte: 98.92
- iron, powder: 1.96
  Iron powder
- Aluminum powder: 754.6
- Rubber Powder: 121.52
  Rubber powder
- Dust: 0.0977

## Data selection and combination
The material information and performance parameters of the three types of AECs are from the investigated manufacturer. Moreover, through the field research of several factories in the AEC industry, the original data on aluminum blank foil fabrication (made from aluminum ingots), anode/cathode foil fabrication (made from aluminum blank foil), and capacitor fabrication were obtained. Due to technical confidentiality, the LCI data of the fabrication of the cathode foil for PHAECs cannot be obtained directly from the supplier. Therefore, the manufacturing LCI of aluminum cathode foil in PHAECs is adjusted according to the coating process data of cathode foil of PAECs, considering their similarity. In the transportation stage, the data of the main raw materials from the material origin to the capacitor manufacturer and the data of the manufactured capacitor products from the manufacturer to the customers are from the supply chain system of the manufacturer. The energy consumption in the use stage is calculated based on the physical equations and the electrical parameters of the AECs. To ensure the completeness of the analysis, the data of the end-of-life stage is obtained based on the analysis and calculation.The reference year of the elementary data is around 2016. The elementary data (i.e., aluminum ingots, separator paper, transport, electricity, and water) are acquired from the Gabi database (Version: 10.6.1.35). In addition, some background data, including 3, 4-ethylene dioxythiophene (EDOT), ammonium adipate, ammonium citrate, etc., are not available in the Gabi database. They are estimated based on the chemical reactions with the material preparation process from the existing raw materials in the Gabi database. The data on the preparation process of the dispersive solution (PEDOT:PSS, 1%wt) for PHAECs' fabrication are scaled from the lab data. The detailed LCI data of the three types of AEC and unit impact of the substance flow is provided in Sheets 5–7 and Sheet 2 of Supporting Info B.

## Use advice
This LCA data set should be applied with the understanding that the reference year of the elementary data is around 2016, and it was acquired from the Gabi database (Version: 10.6.1.35). When using this data, attention should be paid to the technological relevance of the raw materials, and the transportation data should reflect the supply chain from source to end user. For those substances not found in the Gabi database, estimations based on chemically similar reactions from existing raw materials should be applied cautiously. The LCA data, especially regarding the preparation process of dispersive solutions and cathode foil fabrication for PHAECs, should be scaled from lab data judiciously due to the adjustments made from similar processes in PAECs.

## Review details
Inventory: The internal review was done by several iteration steps concerning raw data validation, raw data documentation, representativity, completeness and consistency of modelling with regard to ISO 14040 and 14044.

## Data sources
- Zhang, C., Zheng, Y., Jing, J., Liu, Y. & Huang, H. A comparative LCA study on aluminum electrolytic capacitors: From liquid-state electrolyte, solid-state polymer to their hybrid. J. Clean. Prod. 375, (2022).
