# Aluminum ingot casting ; Primary aluminum ingot ; Liquid primary aluminum ; 2010

Dataset: ILCD process, Unit process, single operation
Geography: CN
Reference year: 2021
Classification: Unit processes / Materials production / Metals and semimetals
Generated by: Zimeng Cai, caizm6178@163.com
Owner: Tiangong LCI Data Working Group
Review: Dependent internal review by Tiangong LCI Data Working Group
Amounts: no units in this file; such an amount is in the reference unit of its flow, which a separate flow dataset defines
copyright: false
licenseType: Free of charge for all users and uses

## General comment
The primary aluminum ingot produced through the aluminum ingot casting process using liquid primary aluminum as described in this dataset is primarily designed for applications that require high purity aluminum. Such applications may include construction materials, transportation components including automotive parts, aircraft parts, consumer electronics, foils, and packaging materials. The data set indicates usage in scenarios where aluminum's properties like low density, high conductivity, and resistance to corrosion are particularly valued.

## Time period
Date of publication

## Reference product
- aluminium, primary, ingot: 1000; software or database

## Inputs
- aluminium, primary, liquid: 1042.51; software or database

## Data selection and combination
The data in this study refers to the LCA data of PA, SA, electricity, and other background data. The PA data were obtained from statistical data sources, and the SA data were mainly obtained from the literatures. The background data were mainly derived from the Chinese localization LCA database CAS RCEES 2018, which was established by the Research Center for Eco-Environmental Sciences, Chinese Academy of Sciences and covers LCA data for energy, materials, transportation, waste management etc.

## Use advice
When utilising this LCA data set for evaluating the environmental impact of products involving primary aluminum ingots, users are advised to take into account the specific year of data publication, which is 2010, as technology and environmental standards may have evolved since then, potentially affecting the accuracy of the data for present-day assessments. Users should integrate this data with up-to-date information and adjust for technological improvements or changes in energy sourcing. It is also essential for users to consider the geographical relevance of the data, as the background data is primarily derived from the Chinese localisation LCA database. When considering recycling in the life cycle assessment, users need to follow specific methodological guidelines relevant to aluminum recycling processes.

## Review details
Inventory: The internal review was done by several iteration steps concerning raw data validation, raw data documentation, representativity, completeness and consistency of modelling with regard to ISO 14040 and 14044.

## Data sources
- Ding, N., Liu, N., Lu, B. & Yang, J. Life cycle greenhouse gas emissions of aluminum based on regional industrial transfer in China. J. Ind. Ecol. 25, 1657–1672 (2021).
