# Production of perovskite photovoltaic module;TiO2 module 1m2;spin coating method;TiO2

Dataset: ILCD process, Unit process, single operation
Geography: US
Classification: Unit processes / Energy carriers and technologies / Electricity
Functional unit: 1 square meter perovskite photovoltaic module
Generated by: Xijing Yao, 15898832265@163.com
Owner: Tiangong LCI Data Working Group
Review: Dependent internal review by Tiangong LCI Data Working Group
Amounts: no units in this file; such an amount is in the reference unit of its flow, which a separate flow dataset defines
copyright: false
licenseType: Free of charge for all users and uses

## General comment
The main process steps include substrate glass production, deposition of perovskite layers, deposition of electron transport layers, and packaging.

## Technology and included processes
Spin-coating method: The spin-coating process is relatively simple, and it is the mainstream preparation method of perovskite light-absorbing layer. Firstly, PbX2 was dissolved in solvent and spun on the substrate to form a film; Then PbX2 is soaked in solution or spun on the substrate again to react with PbX2 film to produce perovskite.

## Technical purpose
The TiO2 module refers to a 1 square meter perovskite photovoltaic module used for the conversion of solar energy into electrical energy. It is primarily utilized in solar panels across various applications, including residential, commercial, and industrial power generation systems.

## Reference product
- Solar Module,Solar Module,Solar Module: 1; log-normal

## Inputs
All rows: log-normal
- ethanol: 0.0271579, 0.0271579 (2 entries)
  Substrate cleaning solvent
- Water: 0.0327
  Substrate cleaning solvent
- silver: 0.00881
  Metallic mask
- hydrogen chloride: 0.00695
  Metallic mask cleaning solvent
- Titanium dioxide, chloride and sulphate processes, >80% TiO2, production mix, at plant: 0.0183; calculated
  Layer thickness 100 nm
- water: 0.0327
  Substrate cleaning solvent
- Titanium dioxide, chloride and sulphate processes, >80% TiO2, production mix, at plant: 0.00494; calculated
  Layer thickness 250 nm
- dimethyl formamide: 0.00283; calculated
  Solvent of PbI2
- isopropanol: 0.0112; calculated
  Solvent of CH3NH3I
- chlorobenzene: 0.0118; calculated
  Solvent of spiro-OMeTAD
- gold: 0.00165
  Layer thickness 100 nm
- polyethylene terephthalate fibres (PET): 0.0617
  Applied on 2 sides
- Adhesives: 0.0202
  3 M 467 MPF
- Electricity: 28.008; calculated
- Fluorine Doped Tin Oxide Coated Glass: 5.04; calculated
  Substrate
- Lead iodide: 0.00138; calculated
  Layer thickness 96 nm
- methylammounium iodide: 0.000143; calculated
  Layer thickness 204 nm
- Spiro-OMeTAD: 0.00085; calculated
  Layer thickness 200 nm

## Outputs
All rows: log-normal
- ethanol: 0.0681
  Substrate cleaning solvent
- silver: 0.00617
  Silver paste
- hydrogen chloride: 0.00264
  Silver paste thinner
- hydrogen chloride: 0.00208
  Metallic mask cleaning solvent
- isopropanol: 0.0123; calculated
  Solvent of BL-TiO2 ink and CH3NH3I
- acetone: 0.000538
  Solvent of BL-TiO2 ink
- dimethyl formamide: 0.00283; calculated
  Solvent of PbI2
- chlorobenzene: 0.0118; calculated
  Solvent of spiro-OMeTAD
- gold: 0.000297
- acetic anhydride: 0.000946
  Solvent of BL-TiO2 ink
- landfill of glas/inert waste: 5.13
  Landfill
- Titanium tetrachloride: 0.000176; calculated
  Wasted concentrate of BL-TiO2 ink
- Terpineol: 0.0042; calculated
  Solvent of nc-TiO2 ink
- Lead iodide: 0.000966; calculated
  Wasted PbI2
- Spiro-OMeTAD: 0.000595; calculated
  Wasted Spiro-OMeTAD

## Use advice
When utilizing this TiO2 module dataset, ensure to account for the specific efficiency and degradation rates of the perovskite photovoltaic technology. Pay attention to the inclusion of the energy used in the production process and end-of-life treatment in your life cycle assessment. Moreover, consider regional solar irradiation data to more accurately predict the module's performance in the intended location.

## Review details
Inventory: The internal review was done by several iteration steps concerning raw data validation, raw data documentation, representativity, completeness and consistency of modelling with regard to ISO 14040 and 14044.
