# cement production|cement, portland cement, 52.5MPa|new dry process, 2000 t/d|fly ash

Dataset: ILCD process, LCI结果
Geography: CN
Classification: Materials production / Other mineralic materials
Generated by: Siqi Yang
Amounts: no units in this file; such an amount is in the reference unit of its flow, which a separate flow dataset defines
copyright: false

## General comment
The new dry process produces portland cement with materials that contain fly ash.

## Model description
The functional unit is 1 ton of cement. The system boundary is the cement production process.

## Reference product
- cement, portland cement, 52.5MPa: 1000
  P.I.52.5

## Inputs
All rows: measured
- limestone, crushed, for mill: 1230.3
  Limestone
- sandstone: 79.94
  Sandstone
- iron, powder: 32.76
  Iron powder
- ash: 112.3
  Fly ash
- gypsum (desulphurized): 52.04
  Gupsum
- hard coal, run-of-mine: 149.2
  Coal. The original text also provided the heat consumption (i.e. coal consumption) as 3,146,042 kJ. The low calorific value of coal is calculated at 23,301 kJ/kg for the air-dried basis. The coal consumption for each ton of clinker produced is 139.7 kg for burning and 2.5 kg for drying (here coal is assumed to be dried). Since the coal for drying accounts for only 1.76% of the total coal consumption, for the sake of calculation, it is assumed that all the coal is used for clinker burning process.
- electricity, medium voltage: 475.229
  Power consumption

## Outputs
All rows: missing unimportant
- carbon dioxide: 835.55
  CO2
- sulfur dioxide: 0.076
  SO2
- Nitrogen oxides: 0.902
  NOx
- Carbon monoxide, non-fossil: 0.00294
  CO
- chemical oxygen demand: 0.0296
  COD
- Suspended solids, unspecified: 0.0225
  SS
- Oils, unspecified: 9.5e-5
  Oil
- particles (> PM10): 0.922
  Dust, with an unspecified particle size, is treated as PM > 10 micrometers in diameter.

## Sampling procedure
A certain cement plant has two new dry production lines with a capacity of 2000 tons per day each.

## Data sources
- 龚志起 & 张智慧. (2004). 水泥生命周期中物化环境状况的研究. 土木工程学报, 5, 86–91.
