# Soil remediation ; ex-situ remediation ; thermal desorption remediation ; engineering implementation ; soil transportation

Dataset: ILCD process, Unit process, single operation
Geography: SH-CN
Classification: Other Services / Repair and maintenance
Generated by: Wang Feng, wangfeng@caep.org.cn
Owner: Tiangong LCI Data Working Group
Review: Dependent internal review by Tiangong LCI Data Working Group
Amounts: no units in this file; such an amount is in the reference unit of its flow, which a separate flow dataset defines
copyright: false
licenseType: Free of charge for all users and uses

## General comment
Remediation of 1 cubic meter of contaminated soil by ectopic thermal desorption, using transport vehicles, the process of transporting contaminated soil from contaminated land to pretreatment greenhouses, pretreatment greenhouses are generally set up

## Geography
我国华东区域5 个污染土壤异位热脱附修复工程案例

## Technology and included processes
Transport vehicles are used to transport contaminated soil from contaminated sites to pre-treatment greenhouses.

## Technical purpose
The described process is utilized in the environmental remediation field for soil decontamination. Ex-situ thermal desorption is involved in treating contaminated soil by transporting it from the contaminated site to a pretreatment shed, usually located within or close to the site. This method is typically applied in the Eastern China region for remediating polluted soil over short distances not exceeding 2 kilometers. The data set represents practices from five case studies of ex-situ thermal desorption soil remediation projects.

## Reference product
- Transported soil: 1; measured

## Inputs
- Oils, unspecified: 0.00013; measured

## Use advice
When using this dataset, attention should be paid to the scale and contextual applicability of the process. The data is specifically tailored for short-distance transport scenarios of contaminated soil for thermal desorption. Users must ensure that the conditions of their project align with the cases from which this data was derived. Consideration should be given to variables like transport distance, contamination levels, and regional factors that are consistent with the Eastern China region. Any discrepancies must be adjusted for in the model.

## Review details
Inventory: The internal review was done by several iteration steps concerning raw data validation, raw data documentation, representativity, completeness and consistency of modelling with regard to ISO 14040 and 14044.

## Data sources
- 刘爽,陈盼,宋慧敏等.我国华东地区污染土壤异位热脱附修复碳排放及减排策略[J].环境工程学报,2022,16(08):2663-2671.
