# Soil remediation ; Ex-situ remediation ; Collaborative disposal of cement kilns ; Preparation stage ; Raw material mining and transportation ; Carbon dioxide

Dataset: ILCD process, Unit process, single operation
Geography: CN
Reference year: 2015
Classification: Unit processes / Other Services / Repair and maintenance
Generated by: Cao Jiameng, 2979480760@qq.com
Owner: Tiangong LCI Data Working Group
Review: Dependent internal review by Tiangong LCI Data Working Group
Amounts: no units in this file; such an amount is in the reference unit of its flow, which a separate flow dataset defines
copyright: false
licenseType: Free of charge for all users and uses

## General comment
The cement plant has a modern dry process production line with a scale of 4000t/d, producing 1.9 million tons of cement and 1.5 million tons of clinker annually. The company's own mining area is 0.448km2, and the annual production capacity of limestone is 2 million tons. The production process adopts advanced RSP level five kiln external decomposition technology. Hazardous waste is transported by vehicles, equipped with hazardous goods special vehicles, and the driving route is a truck dedicated line. The transportation distance from the mine to the factory area is about 1.5km, The transportation distance of waste is about 50km. The production process of conventional cement mainly includes stages such as the extraction and transportation of raw and auxiliary materials, raw material preparation, coal powder preparation, clinker calcination, and cement grinding. After adding waste disposal links, waste (polluted soil, digested sludge, waste oil sludge, etc.) can be used as alternative raw materials and fuels to save raw materials such as limestone and coal. Collaborative disposal of cement kilns, preparation stage, raw material extraction and transportation, mainly mining and transporting raw materials such as limestone, shale, fly ash, etc., with a transportation distance of 1.5km. And industrial waste (polluted soil, waste oil sludge, waste catalysts, etc.), with a transportation distance of 50km. Industrial waste does not include mining input, only transportation consumption is counted.

## Technology and included processes
Raw material mining and transportation mainly involve the extraction and transportation of limestone, shale, fly ash, etc., with a transportation distance of 1.5km. And industrial waste (polluted soil, waste oil sludge, waste catalysts, etc.), with a transportation distance of 50km. Industrial waste does not include mining input, only transportation consumption is counted.

## Technical purpose
This detailed LCA data set pertains to the collaborative disposal process of cement kilns, specifically within the soil remediation sector involving ex-situ techniques. It characterizes the preparatory phase, including the mining and transportation of raw materials, namely limestone, shale, fly ash, and includes the transportation of industrial waste like contaminated soil, waste oil sludge, and waste catalysts. These materials can be used as alternative resources for both production and fuels within the cement industry, thereby conserving traditional raw materials such as limestone and coal. This process is integral for cement plants with modern dry process production lines aiming to incorporate waste management into the cement production lifecycle to reduce environmental impact and resource consumption.

## Reference product
- carbon dioxide (fossil): 37.88; measured

## Inputs
- Diesel: 4.18; measured
- Electricity: 47.664; measured

## Outputs
All rows: measured
- calcium carbonate: 1125.43
- shale: 1.23
- diatomite: 17.75
- Iron powder: 27.25
- gypsum: 52.15
- Fly ash,Fly ash: 124.24
- Slag: 203.78
- clay: 1.05
- Coating residue: 0.16
- oil sludge: 5.26
- Spent catalyst: 2.11
- contaminated soil: 5.26
- Digested Sludge,Digester sludge: 15.79
- Coal,Coal,Coal: 98.28

## Use advice
When utilizing this LCA data set, users must consider the relevance of these specific processes to the system they are assessing. The transportation distances for raw materials and industrial waste should be adapted if they differ from the 1.5 km and 50 km described. It is also important to note that the consumption of raw materials for industrial waste management is excluded from mining input and focuses solely on transportation energy and emissions. Additionally, users should exclude the minor quantities of exhaust gas, wastewater, or solid waste from their assessment as these are not accounted for in the input and output streams of this data set.

## Review details
Inventory: The internal review was done by several iteration steps concerning raw data validation, raw data documentation, representativity, completeness and consistency of modelling with regard to ISO 14040 and 14044.

## Data sources
- 侯星宇,张芸,戚昱等.水泥窑协同处置工业废弃物的生命周期评价[J].环境科学学报,2015,35(12):4112-4119.
