# Egg production ; feed processing

Dataset: ILCD process, Unit process, single operation
Geography: HLJ-CN
Reference year: 2009
Classification: Unit processes / Materials production / Agricultural production means
Functional unit: The main output product of laying hens is eggs, so the functional unit defined in this study is "1kg egg".
Generated by: Rui Yang, 1632707028@qq.com
Owner: Tiangong LCI Data Working Group
Review: Dependent internal review by Tiangong LCI Data Working Group
Amounts: no units in this file; such an amount is in the reference unit of its flow, which a separate flow dataset defines
copyright: false
licenseType: Free of charge for all users and uses

## General comment
In the process of word processing, the main consumption of electric energy is mainly in the process of word processing

## Geography
Life cycle evaluation of intensive egg farm in Heilongjiang Province

## Technology and included processes
Quantitative method was used in this study. This evaluation includes a re-examination or revision of the objectives and scope of the research to determine how the objectives of the research can be met. According to the actual situation of layer production, the technical framework of life cycle impact assessment (FIG. Impact assessment includes four steps: classification, characterization, standardization and weighted assessment. (1) Classification: The input and output data in the life cycle inventory analysis were classified into different types of environmental impact. Based on the analysis results of the life cycle inventory of laying hens, the following four types of environmental impact were evaluated: global warming, environmental acidification, eutrophication and photochemical ozone synthesis. (2) Characterization: Quantitative inventory analysis of data to determine the degree of impact of four types of environmental impact. This makes the amount of environmental pollution that would otherwise not be comparable comparable. (3) Standardization: First of all, standardization benchmarks should be established to provide comparable standards for the relative sizes of the four environmental impact types of global warming, environmental acidification, eutrophication, and photochemical ozone synthesis. (4) Weighted assessment: is the process of grouping environmental impact into a unified indicator - environmental load size, so as to directly compare different production systems.

## Technical purpose
This data set pertains to the life cycle of egg production at an intensive poultry farm in Heilongjiang Province, China. It includes the energy consumption, specifically electricity use, during the feed processing stage. The main output product of this process is eggs, and thus, the material represented by this data set is used for the production of eggs.

## Reference product
- egg: 1; measured

## Inputs
- Electricity: 0.239263; calculated
  根据电能消耗系数和所需的饲料量计算
- maize grain: 1.721; measured
- bean pulp: 0.611; measured

## Outputs
- carbon monoxide (fossil): 3.4676e-5; measured
- nitrogen, total (excluding N2): 0.00019973; measured
- sulfur oxides: 0.000120478; measured
- carbon dioxide (fossil),carbon dioxide (fossil): 0.0679472; measured

## Data selection and combination
饲料在加工过程中的能源（电）在生产过程中的污染物排放系数来自 胡志远根据所要研究的目标，

## Use advice
When using this data set for Life Cycle Assessment (LCA), the user should consider the energy (electricity) consumption specific to the feed processing stage. The functional unit for the study is defined as '1kg of eggs'. Users should ensure that this functional unit is consistent with the scope of their assessment. Additionally, users should take into account the pollutant emission factors as provided in the data, which originate from Hu Zhiyuan's research, to accurately reflect the environmental impact during the stated life cycle stage.

## Review details
Inventory: The internal review was done by several iteration steps concerning raw data validation, raw data documentation, representativity, completeness and consistency of modelling with regard to ISO 14040 and 14044.

## Data sources
- 高雪. 黑龙江省集约化蛋鸡场的生命周期评价. (东北农业大学, 2012).
