# Incineration Municipal of solid waste ;Shanghai average,CN

Dataset: ILCD process
Geography: SH-CN
Classification: Unit processes / End-of-life treatment / Energy recycling
Generated by: Jiaqi Lu, wilsherelu@foxmail.com
Owner: Tiangong LCI Data Working Group
Review: Dependent internal review by Tiangong LCI Data Working Group
Amounts: no units in this file; such an amount is in the reference unit of its flow, which a separate flow dataset defines
copyright: true
licenseType: Free of charge for all users and uses

## General comment
The data set describes the process of incinerating municipal solid waste in Shanghai, China, which is a waste management method used to reduce the volume of waste for disposal and to recover energy. This process is relevant for assessing the environmental impact of waste treatment facilities that manage urban waste through incineration.

## Reference product
- waste incineration of municipal solid waste (MSW): 1000; input; measured
  Incineration of 1 ton of municipal solid waste

## Inputs
All rows: measured
- waste paper (unspecified): 420
  paper/cardboard
- Plastic (unspecified): 289
  plastic
- Wood: 8.4
  wood
- Textile: 35
  textile
- Food Debris: 170
  food residue
- Metal: 5.7
- Glass (formed & finished): 61
  Glass
- Inert waste: 8.7
  Other, inert waste
- Electricity: 10.512
  Preprocessing power consumption
- Leachate: 0.117
  Leachate volume
- Diesel: 0.24
  Diesel (combustion aid)
- natural gas,natural gas: 0.14
  Natural gas (combustion accelerant)
- Electricity: 185.904
  power consumption
- water: 0.59
  Water Consumption
- Electricity: 0.936
  One year emergency maintenance power grid electricity
- Urea: 0.16
- Quicklime: 3.3
  quicklime
- hydrated lime dry slaked: 1.03
  slaked lime
- Active carbon: 0.11
  activated carbon
- Sodium bicarbonate: 0.21
  sodium bicarbonate
- Fume Treatment Chelating Agent: 53.85
  Flue gas treatment chelating agent
- Fly ash treatment chelating agent: 35.3
- cement, unspecified: 26
  cement

## Outputs
- Slag: 1.18719e8; measured
  Slag (annual production volume)
- Fly ash solidification body: 9.14556e7; measured
  Fly ash solidified body (annual production volume)
- waste incineration of municipal solid waste (MSW): 835.2; measured
  waste incineration
- electricity from waste incineration: 893.7; measured
  Internet power

## Use advice
When using this data set for Life Cycle Assessment, it is important to: 1. Consider the specific characteristics of waste composition in Shanghai for accurate representation of the incineration process. 2. Assess the energy recovery efficiency specific to the Shanghai waste-to-energy plants. 3. Include any treatment of emissions and the disposal of ash in the life cycle impact assessment. 4. Account for any transportation of solid waste to the incineration facility. Note that the technology and operating practices described may be specific to Shanghai and may not be representative of other regions or countries.

## Review details
Inventory: The internal review was done by several iteration steps concerning raw data validation, raw data documentation, representativity, completeness and consistency of modelling with regard to ISO 14040 and 14044.

## Data sources
- 上海市市政固废调研结果
