# Hot rolled steel production;Hot rolled steel;Hot rolling(Coal-DR)

Dataset: ILCD process, Unit process, single operation
Geography: CN
Classification: Unit processes / Materials production / Metals and semimetals
Generated by: Fuxiang, 1162850692@qq.com
Owner: Tiangong LCI Data Working Group
Review: Dependent internal review by Tiangong LCI Data Working Group
Amounts: no units in this file; such an amount is in the reference unit of its flow, which a separate flow dataset defines
copyright: false
licenseType: Free of charge for all users and uses

## General comment
Hot rolled steel produced via the Coal-based Direct Reduction (Coal-DR) process is primarily utilized in the construction industry for structural components, in the automotive industry for vehicle frameworks, and in the production of various steel products such as rails, rods, and beams.

## Geography
The LCI of Coal-DR is obtained, as shown in Table 9, based on the statistics of the demonstration project in China.

## Reference product
- Hot rolled steel: 986.5; calculated

## Inputs
All rows: calculated
- Crude Steel: 1000
  Crude steel
- freshwater,freshwater: 600
- Circulating water: 10000
- Baling wire: 2.1
- Raw gas: 42.4
- Reducing gas: 72.8
- Top gas: 25.8
- Electricity: 316.8

## Data treatment and extrapolations
LCI of COG-DR and H-DR routes, which is not scaled-up in China are estimated based on Coal-DR routes combined with literature data from simulations, laboratory tests, and process modeling in Table 9 [49,50]. The LCI of Coal-DR is obtai

## Use advice
The Life Cycle Inventory (LCI) of hot rolled steel via the Coal-DR route should be applied cautiously, considering the specific context of China's demonstration project statistics. When applying the data set for scenarios outside China or to other DR methods, appropriate adjustments based on simulations, laboratory tests, and process modeling data are necessary. Attention should be given to the potential need for scaling-up data and adjusting for technological and methodological differences.

## Review details
Inventory: The internal review was done by several iteration steps concerning raw data validation, raw data documentation, representativity, completeness and consistency of modelling with regard to ISO 14040 and 14044.

## Data sources
- The carbon reduction potential of hydrogen in the low carbon transition of the iron and steel industry: The case of China
