# Prepared site ; Site Preparation ; Soil remediation ; In Situ Thermal Desorption ; Site Preparation

Dataset: ILCD process, Unit process, black box
Geography: CN
Reference year: 2022
Classification: Unit processes / Other Services / Repair and maintenance
Generated by: Zhang Jinying, zhangjy@caep.org.cn
Owner: Tiangong LCI Data Working Group
Review: Dependent internal review by Tiangong LCI Data Working Group
Amounts: no units in this file; such an amount is in the reference unit of its flow, which a separate flow dataset defines
copyright: false
licenseType: Free of charge for all users and uses

## General comment
The coking plant is located in the mid latitudes of northern China. The area with benzene content higher than 40 mg/kg and benzo [a] pyrene content higher than 15 mg/kg is defined as a high-risk area, and in-situ thermal desorption repair is carried out. Restoration area of 7567 square meters, earthwork volume of 30413 meters ³， The construction preparation phase takes about 50 days, including personnel and material preparation, site cleaning, and temporary facility construction.

## Technical purpose
The data set describes an industrial soil remediation process where in-situ thermal desorption (ISTD) is used. ISTD is applied to high-risk polluted sites where benzene concentration exceeds 40 mg/kg and benzo[a]pyrene exceeds 15 mg/kg. Specifically, the process applies to areas such as coking plants in mid-latitude regions of Northern China. The soil remediation project covers an area of 7567 m², with a volume of earthwork of 30413 m³, and the preparation phase for construction lasts approximately 50 days. Activities during this phase include preparing personnel and materials, site cleaning, and construction of temporary facilities.

## Reference product
- Prepared site: 1; measured

## Inputs
All rows: measured
- Electricity: 172800
- Diesel: 9.629
- Tap Water: 640
- Steel: 27868
- Concrete: 2097
- cement, unspecified: 300
- Polyethylene,Polyethylene: 35
- Diesel,Diesel: 4

## Outputs
- Equipment and Materials Arriving on Site: 1; measured
  文章中水泥、混凝土的量使用的是体积单位，且运输到场的设备没有列出，所以这里以项目为计量单位。

## Use advice
When using this LCA data set, users should include all inputs and outputs related to the construction preparation phase of the ISTD process, ensuring the assessment covers personnel and material preparation, site cleaning, temporary facility construction, and all related energy and material consumption. This includes the use of mechanical equipment fuel, electricity, and other energy sources such as natural gas, as well as materials like concrete and steel. Transportation of materials and equipment to the site should also be included. It is advised to pay special attention to local conditions such as geographic location and technological applicability that could affect the site preparation phase and overall remediation effectiveness.

## Review details
Inventory: The internal review was done by several iteration steps concerning raw data validation, raw data documentation, representativity, completeness and consistency of modelling with regard to ISO 14040 and 14044.

## Data sources
- 刘文晓等.基于修复效果的污染土壤修复工程环境足迹分析[J].环境科学研究 35,2367-2377（2022）.
