# Chemical Pharmaceutical Ingredients ; Fermentation medium (corn, protein powder (slurry), starch, glucose, etc.) ; Fermentation ; greater than or equal to1000 t/a; NESPS2 / 化学药品原料药 ; 发酵培养基（玉米、蛋白粉（浆）、淀粉、葡萄糖等） ; 发酵 ; 大于等于1000吨/年 ; 全国第二次污染普查数据

Dataset: ILCD process, Unit process, single operation
Geography: CN
Reference year: 2019
Classification: Reference Parameters / Materials production / Organic chemicals
Generated by: The data was created by the Office of the Second National Pollution Source Census of the Ministry of Ecology and Environment, and the data was organized by the TianGong Plan team for ILCD format / 生态环境部第二次全国污染源普查工作办公室创建数据，天工计划团队常慧敏整理数据为ILCD格式
Owner: Tiangong LCI Data Working Group / 天工LCI数据工作小组
Review: Dependent internal review by Tiangong LCI Data Working Group / 天工LCI数据工作小组
Amounts: no units in this file; such an amount is in the reference unit of its flow, which a separate flow dataset defines
copyright: false
licenseType: Free of charge for all users and uses

## General comment
the Technical of end-of-pipe management technology for pollution Exhaust gasis/

## Technical purpose
本工业过程涉及化学药品成分的发酵培养基生产。这些培养基包含玉米、蛋白粉（浆）、淀粉、葡萄糖等成分，通过发酵工艺培养，年产量等于或超过1000吨。数据集还包含有关废水污染末端处理技术的信息，包括降低化学需氧量、氨氮、总磷和有机结合氮的处理技术，以及控制废气和挥发性有机化合物的技术。这些处理技术在效率各异，对于减少制造过程的环境影响至关重要。

## Reference product
- Chemical Drug Raw Materials: 1000; calculated
  源文件中描述为为化学药品原料药，此处对其进行了匹配工作，将其匹配到LCAflow库里面相最符合的流，污染物指标备注为废水量，产污系数备注为发酵工艺中采用树脂提取工艺

## Outputs
All rows: calculated
- volatile organic compound: 0.04703
  the Technical of end-of-pipe management technology for pollution volatile organic compoundisRegenerative catalytic combustion method，Its Technical efficiency of end-of-pipe management99
  污染物指标挥发性有机物的末端治理技术是蓄热式催化燃烧法，其效率为99，末端治理设施实际运行率（k值）计算公式为k=治理设施运行时间(小时)/正常生产时间（小时）。原文件中描述污染物类别为废气，污染物指标为挥发性有机物，此处对其进行了匹配工作，将其匹配到LCAflow库里面相最符合的流，污染物指标备注为挥发性有机物，产污系数备注为发酵工艺中采用树脂提取工艺
- volatile organic compound: 0.056436
  the Technical of end-of-pipe management technology for pollution volatile organic compoundisAdsorption + steam desorption，Its Technical efficiency of end-of-pipe management98.8
  污染物指标挥发性有机物的末端治理技术是吸附+蒸气解析，其效率为98.8，末端治理设施实际运行率（k值）计算公式为k=治理设施运行时间(小时)/正常生产时间（小时）。原文件中描述污染物类别为废气，污染物指标为挥发性有机物，此处对其进行了匹配工作，将其匹配到LCAflow库里面相最符合的流，污染物指标备注为挥发性有机物，产污系数备注为发酵工艺中采用树脂提取工艺
- volatile organic compound: 0.06673
  the Technical of end-of-pipe management technology for pollution volatile organic compoundisRegenerative catalytic combustion method，Its Technical efficiency of end-of-pipe management99，The formula for calculating the actual operation rate (k-value) of the end-of-pipe treatment facility is k = opreating time of treatment facilities (hours) / normal production time (hours)
  污染物指标挥发性有机物的末端治理技术是蓄热式催化燃烧法，其效率为99，末端治理设施实际运行率（k值）计算公式为k=治理设施运行时间(小时)/正常生产时间（小时）。原文件中描述污染物类别为废气，污染物指标为挥发性有机物，此处对其进行了匹配工作，将其匹配到LCAflow库里面相最符合的流，污染物指标备注为挥发性有机物，产污系数备注为发酵工艺中采用非树脂提取工艺
- volatile organic compound: 0.080076
  the Technical of end-of-pipe management technology for pollution volatile organic compoundisAdsorption + steam desorption，Its Technical efficiency of end-of-pipe management98.8，The formula for calculating the actual operation rate (k-value) of the end-of-pipe treatment facility is k = opreating time of treatment facilities (hours) / normal production time (hours)
  污染物指标挥发性有机物的末端治理技术是吸附+蒸气解析，其效率为98.8，末端治理设施实际运行率（k值）计算公式为k=治理设施运行时间(小时)/正常生产时间（小时）。原文件中描述污染物类别为废气，污染物指标为挥发性有机物，此处对其进行了匹配工作，将其匹配到LCAflow库里面相最符合的流，污染物指标备注为挥发性有机物，产污系数备注为发酵工艺中采用非树脂提取工艺
- phosphorus, total: 0.095438
  the Technical of end-of-pipe management technology for pollution phosphorus, totalisPhysicochemical treatment + anaerobic/aerobic biological combined treatment + physicochemical treatment，Its Technical efficiency of end-of-pipe management98.6
  污染物指标总磷的末端治理技术是物理化学处理法+厌/好氧生物组合处理+物理化学处理法，其效率为98.6，末端治理设施实际运行率（k值）计算公式为k=治理设施运行时间(天)/正常生产时间（天）。原文件中描述污染物类别为废水，污染物指标为总磷，此处对其进行了匹配工作，将其匹配到LCAflow库里面相最符合的流，污染物指标备注为总磷，产污系数备注为发酵工艺中采用非树脂提取工艺
- phosphorus, total: 0.131082
  the Technical of end-of-pipe management technology for pollution phosphorus, totalisPhysicochemical treatment + anaerobic/aerobic biological combined treatment + physicochemical treatment，Its Technical efficiency of end-of-pipe management98.6
  污染物指标总磷的末端治理技术是物理化学处理法+厌/好氧生物组合处理+物理化学处理法，其效率为98.6，末端治理设施实际运行率（k值）计算公式为k=治理设施运行时间(天)/正常生产时间（天）。原文件中描述污染物类别为废水，污染物指标为总磷，此处对其进行了匹配工作，将其匹配到LCAflow库里面相最符合的流，污染物指标备注为总磷，产污系数备注为发酵工艺中采用树脂提取工艺
- phosphorus, total: 0.579445
  the Technical of end-of-pipe management technology for pollution phosphorus, totalisPhysicochemical treatment + anaerobic biological treatment + aerobic biological treatment，Its Technical efficiency of end-of-pipe management91.5
  污染物指标总磷的末端治理技术是物理化学处理法+厌氧生物处理+好氧生物处理，其效率为91.5，末端治理设施实际运行率（k值）计算公式为k=治理设施运行时间(天)/正常生产时间（天）。原文件中描述污染物类别为废水，污染物指标为总磷，此处对其进行了匹配工作，将其匹配到LCAflow库里面相最符合的流，污染物指标备注为总磷，产污系数备注为发酵工艺中采用非树脂提取工艺
- phosphorus, total: 0.795855
  the Technical of end-of-pipe management technology for pollution phosphorus, totalisPhysicochemical treatment + anaerobic biological treatment + aerobic biological treatment，Its Technical efficiency of end-of-pipe management91.5，The formula for calculating the actual operation rate (k-value) of the end-of-pipe treatment facility is k = annual normal operating hours of wastewater treatment equipment (hours) / annual operating hours of production system (hours)
  污染物指标总磷的末端治理技术是物理化学处理法+厌氧生物处理+好氧生物处理，其效率为91.5，末端治理设施实际运行率（k值）计算公式为k=治理设施运行时间(天)/正常生产时间（天）。原文件中描述污染物类别为废水，污染物指标为总磷，此处对其进行了匹配工作，将其匹配到LCAflow库里面相最符合的流，污染物指标备注为总磷，产污系数备注为发酵工艺中采用树脂提取工艺
- phosphorus, total: 0.920295
  the Technical of end-of-pipe management technology for pollution phosphorus, totalisPhysicochemical treatment + aerobic biological treatment，Its Technical efficiency of end-of-pipe management86.5，The formula for calculating the actual operation rate (k-value) of the end-of-pipe treatment facility is k = annual normal operating hours of wastewater treatment equipment (hours) / annual operating hours of production system (hours)
  污染物指标总磷的末端治理技术是物理化学处理法+好氧生物处理法，其效率为86.5，末端治理设施实际运行率（k值）计算公式为k=治理设施运行时间(天)/正常生产时间（天）。原文件中描述污染物类别为废水，污染物指标为总磷，此处对其进行了匹配工作，将其匹配到LCAflow库里面相最符合的流，污染物指标备注为总磷，产污系数备注为发酵工艺中采用非树脂提取工艺
- volatile organic compound: 1.17575
  the Technical of end-of-pipe management technology for pollution volatile organic compoundisCondensation，Its Technical efficiency of end-of-pipe management75，The formula for calculating the actual operation rate (k-value) of the end-of-pipe treatment facility is k = opreating time of treatment facilities (hours) / normal production time (hours)
  污染物指标挥发性有机物的末端治理技术是冷凝法，其效率为75，末端治理设施实际运行率（k值）计算公式为k=治理设施运行时间(小时)/正常生产时间（小时）。原文件中描述污染物类别为废气，污染物指标为挥发性有机物，此处对其进行了匹配工作，将其匹配到LCAflow库里面相最符合的流，污染物指标备注为挥发性有机物，产污系数备注为发酵工艺中采用树脂提取工艺
- phosphorus, total: 1.26401
  the Technical of end-of-pipe management technology for pollution phosphorus, totalisPhysicochemical treatment + aerobic biological treatment，Its Technical efficiency of end-of-pipe management86.5，The formula for calculating the actual operation rate (k-value) of the end-of-pipe treatment facility is k = annual normal operating hours of wastewater treatment equipment (hours) / annual operating hours of production system (hours)
  污染物指标总磷的末端治理技术是物理化学处理法+好氧生物处理法，其效率为86.5，末端治理设施实际运行率（k值）计算公式为k=治理设施运行时间(天)/正常生产时间（天）。原文件中描述污染物类别为废水，污染物指标为总磷，此处对其进行了匹配工作，将其匹配到LCAflow库里面相最符合的流，污染物指标备注为总磷，产污系数备注为发酵工艺中采用树脂提取工艺
- volatile organic compound: 1.66825
  the Technical of end-of-pipe management technology for pollution volatile organic compoundisCondensation，Its Technical efficiency of end-of-pipe management75，The formula for calculating the actual operation rate (k-value) of the end-of-pipe treatment facility is k = opreating time of treatment facilities (hours) / normal production time (hours)
  污染物指标挥发性有机物的末端治理技术是冷凝法，其效率为75，末端治理设施实际运行率（k值）计算公式为k=治理设施运行时间(小时)/正常生产时间（小时）。原文件中描述污染物类别为废气，污染物指标为挥发性有机物，此处对其进行了匹配工作，将其匹配到LCAflow库里面相最符合的流，污染物指标备注为挥发性有机物，产污系数备注为发酵工艺中采用非树脂提取工艺
- volatile organic compound: 3.2921
  the Technical of end-of-pipe management technology for pollution volatile organic compoundisLow temperature plasma，Its Technical efficiency of end-of-pipe management30，The formula for calculating the actual operation rate (k-value) of the end-of-pipe treatment facility is k = opreating time of treatment facilities (hours) / normal production time (hours)
  污染物指标挥发性有机物的末端治理技术是低温等离子体，其效率为30，末端治理设施实际运行率（k值）计算公式为k=治理设施运行时间(小时)/正常生产时间（小时）。原文件中描述污染物类别为废气，污染物指标为挥发性有机物，此处对其进行了匹配工作，将其匹配到LCAflow库里面相最符合的流，污染物指标备注为挥发性有机物，产污系数备注为发酵工艺中采用树脂提取工艺
- volatile organic compound: 4.6711
  the Technical of end-of-pipe management technology for pollution volatile organic compoundisLow temperature plasma，Its Technical efficiency of end-of-pipe management30
  污染物指标挥发性有机物的末端治理技术是低温等离子体，其效率为30，末端治理设施实际运行率（k值）计算公式为k=治理设施运行时间(小时)/正常生产时间（小时）。原文件中描述污染物类别为废气，污染物指标为挥发性有机物，此处对其进行了匹配工作，将其匹配到LCAflow库里面相最符合的流，污染物指标备注为挥发性有机物，产污系数备注为发酵工艺中采用非树脂提取工艺
- volatile organic compound: 4.703
  the Technical of end-of-pipe management technology for pollution volatile organic compoundisWithout terminal treatment facility，Its Technical efficiency of end-of-pipe management0，The formula for calculating the actual operation rate (k-value) of the end-of-pipe treatment facility is k = opreating time of treatment facilities (hours) / normal production time (hours)
  污染物指标挥发性有机物的末端治理技术是无末端处理设施，其效率为0，末端治理设施实际运行率（k值）计算公式为/。原文件中描述污染物类别为废气，污染物指标为挥发性有机物，此处对其进行了匹配工作，将其匹配到LCAflow库里面相最符合的流，污染物指标备注为挥发性有机物，产污系数备注为发酵工艺中采用树脂提取工艺
- Ammonia Nitrogen: 4.84356
  the Technical of end-of-pipe management technology for pollution Ammonia NitrogenisPhysicochemical treatment + anaerobic/aerobic biological combined treatment + physicochemical treatment，Its Technical efficiency of end-of-pipe management94
  污染物指标氨氮的末端治理技术是物理化学处理法+厌/好氧生物组合处理+物理化学处理法，其效率为94，末端治理设施实际运行率（k值）计算公式为k=治理设施运行时间(天)/正常生产时间（天）。原文件中描述污染物类别为废水，污染物指标为氨氮，此处对其进行了匹配工作，将其匹配到LCAflow库里面相最符合的流，污染物指标备注为氨氮，产污系数备注为发酵工艺中采用非树脂提取工艺
- Nitrogen, organic bound: 5.0967
  the Technical of end-of-pipe management technology for pollution Nitrogen, organic boundisPhysicochemical treatment + anaerobic/aerobic biological combined treatment + physicochemical treatment，Its Technical efficiency of end-of-pipe management95.8
  污染物指标总氮的末端治理技术是物理化学处理法+厌/好氧生物组合处理+物理化学处理法，其效率为95.8，末端治理设施实际运行率（k值）计算公式为k=治理设施运行时间(天)/正常生产时间（天）。原文件中描述污染物类别为废水，污染物指标为总氮，此处对其进行了匹配工作，将其匹配到LCAflow库里面相最符合的流，污染物指标备注为总氮，产污系数备注为发酵工艺中采用非树脂提取工艺
- volatile organic compound: 6.673
  the Technical of end-of-pipe management technology for pollution volatile organic compoundisWithout terminal treatment facility，Its Technical efficiency of end-of-pipe management0，The formula for calculating the actual operation rate (k-value) of the end-of-pipe treatment facility is k = opreating time of treatment facilities (hours) / normal production time (hours)
  污染物指标挥发性有机物的末端治理技术是无末端处理设施，其效率为0，末端治理设施实际运行率（k值）计算公式为/。原文件中描述污染物类别为废气，污染物指标为挥发性有机物，此处对其进行了匹配工作，将其匹配到LCAflow库里面相最符合的流，污染物指标备注为挥发性有机物，产污系数备注为发酵工艺中采用非树脂提取工艺
- phosphorus, total: 6.817
  the Technical of end-of-pipe management technology for pollution phosphorus, totalisWithout terminal treatment facility，Its Technical efficiency of end-of-pipe management0，The formula for calculating the actual operation rate (k-value) of the end-of-pipe treatment facility is k = annual normal operating hours of wastewater treatment equipment (hours) / annual operating hours of production system (hours)
  污染物指标总磷的末端治理技术是无末端处理设施，其效率为0，末端治理设施实际运行率（k值）计算公式为/。原文件中描述污染物类别为废水，污染物指标为总磷，此处对其进行了匹配工作，将其匹配到LCAflow库里面相最符合的流，污染物指标备注为总磷，产污系数备注为发酵工艺中采用非树脂提取工艺
- Ammonia Nitrogen: 7.26534
  the Technical of end-of-pipe management technology for pollution Ammonia NitrogenisPhysicochemical treatment + anaerobic biological treatment + aerobic biological treatment，Its Technical efficiency of end-of-pipe management91，The formula for calculating the actual operation rate (k-value) of the end-of-pipe treatment facility is k = annual normal operating hours of wastewater treatment equipment (hours) / annual operating hours of production system (hours)
  污染物指标氨氮的末端治理技术是物理化学处理法+厌氧生物处理+好氧生物处理，其效率为91，末端治理设施实际运行率（k值）计算公式为k=治理设施运行时间(天)/正常生产时间（天）。原文件中描述污染物类别为废水，污染物指标为氨氮，此处对其进行了匹配工作，将其匹配到LCAflow库里面相最符合的流，污染物指标备注为氨氮，产污系数备注为发酵工艺中采用非树脂提取工艺
- Ammonia Nitrogen: 7.66897
  the Technical of end-of-pipe management technology for pollution Ammonia NitrogenisPhysicochemical treatment + aerobic biological treatment，Its Technical efficiency of end-of-pipe management90.5，The formula for calculating the actual operation rate (k-value) of the end-of-pipe treatment facility is k = annual normal operating hours of wastewater treatment equipment (hours) / annual operating hours of production system (hours)
  污染物指标氨氮的末端治理技术是物理化学处理法+好氧生物处理法，其效率为90.5，末端治理设施实际运行率（k值）计算公式为k=治理设施运行时间(天)/正常生产时间（天）。原文件中描述污染物类别为废水，污染物指标为氨氮，此处对其进行了匹配工作，将其匹配到LCAflow库里面相最符合的流，污染物指标备注为氨氮，产污系数备注为发酵工艺中采用非树脂提取工艺
- phosphorus, total: 9.363
  the Technical of end-of-pipe management technology for pollution phosphorus, totalisWithout terminal treatment facility，Its Technical efficiency of end-of-pipe management0
  污染物指标总磷的末端治理技术是无末端处理设施，其效率为0，末端治理设施实际运行率（k值）计算公式为/。原文件中描述污染物类别为废水，污染物指标为总磷，此处对其进行了匹配工作，将其匹配到LCAflow库里面相最符合的流，污染物指标备注为总磷，产污系数备注为发酵工艺中采用树脂提取工艺
- Nitrogen, organic bound: 13.3779
  the Technical of end-of-pipe management technology for pollution Nitrogen, organic boundisPhysicochemical treatment + anaerobic/aerobic biological combined treatment + physicochemical treatment，Its Technical efficiency of end-of-pipe management95.8
  污染物指标总氮的末端治理技术是物理化学处理法+厌/好氧生物组合处理+物理化学处理法，其效率为95.8，末端治理设施实际运行率（k值）计算公式为k=治理设施运行时间(天)/正常生产时间（天）。原文件中描述污染物类别为废水，污染物指标为总氮，此处对其进行了匹配工作，将其匹配到LCAflow库里面相最符合的流，污染物指标备注为总氮，产污系数备注为发酵工艺中采用树脂提取工艺
- Ammonia Nitrogen: 14.743
  the Technical of end-of-pipe management technology for pollution Ammonia NitrogenisPhysicochemical treatment + anaerobic/aerobic biological combined treatment + physicochemical treatment，Its Technical efficiency of end-of-pipe management94
  污染物指标氨氮的末端治理技术是物理化学处理法+厌/好氧生物组合处理+物理化学处理法，其效率为94，末端治理设施实际运行率（k值）计算公式为k=治理设施运行时间(天)/正常生产时间（天）。原文件中描述污染物类别为废水，污染物指标为氨氮，此处对其进行了匹配工作，将其匹配到LCAflow库里面相最符合的流，污染物指标备注为氨氮，产污系数备注为发酵工艺中采用树脂提取工艺
- Ammonia Nitrogen: 22.1144
  the Technical of end-of-pipe management technology for pollution Ammonia NitrogenisPhysicochemical treatment + anaerobic biological treatment + aerobic biological treatment，Its Technical efficiency of end-of-pipe management91，The formula for calculating the actual operation rate (k-value) of the end-of-pipe treatment facility is k = annual normal operating hours of wastewater treatment equipment (hours) / annual operating hours of production system (hours)
  污染物指标氨氮的末端治理技术是物理化学处理法+厌氧生物处理+好氧生物处理，其效率为91，末端治理设施实际运行率（k值）计算公式为k=治理设施运行时间(天)/正常生产时间（天）。原文件中描述污染物类别为废水，污染物指标为氨氮，此处对其进行了匹配工作，将其匹配到LCAflow库里面相最符合的流，污染物指标备注为氨氮，产污系数备注为发酵工艺中采用树脂提取工艺
- Ammonia Nitrogen: 23.343
  the Technical of end-of-pipe management technology for pollution Ammonia NitrogenisPhysicochemical treatment + aerobic biological treatment，Its Technical efficiency of end-of-pipe management90.5，The formula for calculating the actual operation rate (k-value) of the end-of-pipe treatment facility is k = annual normal operating hours of wastewater treatment equipment (hours) / annual operating hours of production system (hours)
  污染物指标氨氮的末端治理技术是物理化学处理法+好氧生物处理法，其效率为90.5，末端治理设施实际运行率（k值）计算公式为k=治理设施运行时间(天)/正常生产时间（天）。原文件中描述污染物类别为废水，污染物指标为氨氮，此处对其进行了匹配工作，将其匹配到LCAflow库里面相最符合的流，污染物指标备注为氨氮，产污系数备注为发酵工艺中采用树脂提取工艺
- Nitrogen, organic bound: 28.2745
  the Technical of end-of-pipe management technology for pollution Nitrogen, organic boundisPhysicochemical treatment + anaerobic biological treatment + aerobic biological treatment，Its Technical efficiency of end-of-pipe management76.7
  污染物指标总氮的末端治理技术是物理化学处理法+厌氧生物处理+好氧生物处理，其效率为76.7，末端治理设施实际运行率（k值）计算公式为k=治理设施运行时间(天)/正常生产时间（天）。原文件中描述污染物类别为废水，污染物指标为总氮，此处对其进行了匹配工作，将其匹配到LCAflow库里面相最符合的流，污染物指标备注为总氮，产污系数备注为发酵工艺中采用非树脂提取工艺
- chemical oxygen demand: 34.5419
  the Technical of end-of-pipe management technology for pollution chemical oxygen demandisPhysicochemical treatment + anaerobic/aerobic biological combined treatment + physicochemical treatment，Its Technical efficiency of end-of-pipe management96.5，The formula for calculating the actual operation rate (k-value) of the end-of-pipe treatment facility is k = opreating time of treatment facilities (hours) / normal production time (hours)
  污染物指标化学需氧量的末端治理技术是物理化学处理法+厌/好氧生物组合处理+物理化学处理法，其效率为96.5，末端治理设施实际运行率（k值）计算公式为k=治理设施运行时间(小时)/正常生产时间（小时）。原文件中描述污染物类别为废水，污染物指标为化学需氧量，此处对其进行了匹配工作，将其匹配到LCAflow库里面相最符合的流，污染物指标备注为化学需氧量，产污系数备注为发酵工艺中采用非树脂提取工艺
- Nitrogen, organic bound: 36.2837
  the Technical of end-of-pipe management technology for pollution Nitrogen, organic boundisPhysicochemical treatment + aerobic biological treatment，Its Technical efficiency of end-of-pipe management70.1
  污染物指标总氮的末端治理技术是物理化学处理法+好氧生物处理法，其效率为70.1，末端治理设施实际运行率（k值）计算公式为k=治理设施运行时间(天)/正常生产时间（天）。原文件中描述污染物类别为废水，污染物指标为总氮，此处对其进行了匹配工作，将其匹配到LCAflow库里面相最符合的流，污染物指标备注为总氮，产污系数备注为发酵工艺中采用非树脂提取工艺
- chemical oxygen demand: 54.2801
  the Technical of end-of-pipe management technology for pollution chemical oxygen demandisPhysicochemical treatment + anaerobic biological treatment + aerobic biological treatment，Its Technical efficiency of end-of-pipe management94.5，The formula for calculating the actual operation rate (k-value) of the end-of-pipe treatment facility is k = opreating time of treatment facilities (hours) / normal production time (hours)
  污染物指标化学需氧量的末端治理技术是物理化学处理法+厌氧生物处理+好氧生物处理，其效率为94.5，末端治理设施实际运行率（k值）计算公式为k=治理设施运行时间(小时)/正常生产时间（小时）。原文件中描述污染物类别为废水，污染物指标为化学需氧量，此处对其进行了匹配工作，将其匹配到LCAflow库里面相最符合的流，污染物指标备注为化学需氧量，产污系数备注为发酵工艺中采用非树脂提取工艺
- Nitrogen, organic bound: 74.2154
  the Technical of end-of-pipe management technology for pollution Nitrogen, organic boundisPhysicochemical treatment + anaerobic biological treatment + aerobic biological treatment，Its Technical efficiency of end-of-pipe management76.7
  污染物指标总氮的末端治理技术是物理化学处理法+厌氧生物处理+好氧生物处理，其效率为76.7，末端治理设施实际运行率（k值）计算公式为k=治理设施运行时间(天)/正常生产时间（天）。原文件中描述污染物类别为废水，污染物指标为总氮，此处对其进行了匹配工作，将其匹配到LCAflow库里面相最符合的流，污染物指标备注为总氮，产污系数备注为发酵工艺中采用树脂提取工艺
- Ammonia Nitrogen: 80.726
  the Technical of end-of-pipe management technology for pollution Ammonia NitrogenisWithout terminal treatment facility，Its Technical efficiency of end-of-pipe management0
  污染物指标氨氮的末端治理技术是无末端处理设施，其效率为0，末端治理设施实际运行率（k值）计算公式为/。原文件中描述污染物类别为废水，污染物指标为氨氮，此处对其进行了匹配工作，将其匹配到LCAflow库里面相最符合的流，污染物指标备注为氨氮，产污系数备注为发酵工艺中采用非树脂提取工艺
- Nitrogen, organic bound: 95.2378
  the Technical of end-of-pipe management technology for pollution Nitrogen, organic boundisPhysicochemical treatment + aerobic biological treatment，Its Technical efficiency of end-of-pipe management70.1
  污染物指标总氮的末端治理技术是物理化学处理法+好氧生物处理法，其效率为70.1，末端治理设施实际运行率（k值）计算公式为k=治理设施运行时间(天)/正常生产时间（天）。原文件中描述污染物类别为废水，污染物指标为总氮，此处对其进行了匹配工作，将其匹配到LCAflow库里面相最符合的流，污染物指标备注为总氮，产污系数备注为发酵工艺中采用树脂提取工艺
- chemical oxygen demand: 95.7304
  the Technical of end-of-pipe management technology for pollution chemical oxygen demandisPhysicochemical treatment + aerobic biological treatment，Its Technical efficiency of end-of-pipe management90.3，The formula for calculating the actual operation rate (k-value) of the end-of-pipe treatment facility is k = opreating time of treatment facilities (hours) / normal production time (hours)
  污染物指标化学需氧量的末端治理技术是物理化学处理法+好氧生物处理法，其效率为90.3，末端治理设施实际运行率（k值）计算公式为k=治理设施运行时间(小时)/正常生产时间（小时）。原文件中描述污染物类别为废水，污染物指标为化学需氧量，此处对其进行了匹配工作，将其匹配到LCAflow库里面相最符合的流，污染物指标备注为化学需氧量，产污系数备注为发酵工艺中采用非树脂提取工艺
- Nitrogen, organic bound: 121.35
  the Technical of end-of-pipe management technology for pollution Nitrogen, organic boundisWithout terminal treatment facility，Its Technical efficiency of end-of-pipe management0
  污染物指标总氮的末端治理技术是无末端处理设施，其效率为0，末端治理设施实际运行率（k值）计算公式为/。原文件中描述污染物类别为废水，污染物指标为总氮，此处对其进行了匹配工作，将其匹配到LCAflow库里面相最符合的流，污染物指标备注为总氮，产污系数备注为发酵工艺中采用非树脂提取工艺
- chemical oxygen demand: 126.725
  the Technical of end-of-pipe management technology for pollution chemical oxygen demandisPhysicochemical treatment + anaerobic/aerobic biological combined treatment + physicochemical treatment，Its Technical efficiency of end-of-pipe management96.5
  污染物指标化学需氧量的末端治理技术是物理化学处理法+厌/好氧生物组合处理+物理化学处理法，其效率为96.5，末端治理设施实际运行率（k值）计算公式为k=治理设施运行时间(小时)/正常生产时间（小时）。原文件中描述污染物类别为废水，污染物指标为化学需氧量，此处对其进行了匹配工作，将其匹配到LCAflow库里面相最符合的流，污染物指标备注为化学需氧量，产污系数备注为发酵工艺中采用树脂提取工艺
- chemical oxygen demand: 199.139
  the Technical of end-of-pipe management technology for pollution chemical oxygen demandisPhysicochemical treatment + anaerobic biological treatment + aerobic biological treatment，Its Technical efficiency of end-of-pipe management94.5，The formula for calculating the actual operation rate (k-value) of the end-of-pipe treatment facility is k = opreating time of treatment facilities (hours) / normal production time (hours)
  污染物指标化学需氧量的末端治理技术是物理化学处理法+厌氧生物处理+好氧生物处理，其效率为94.5，末端治理设施实际运行率（k值）计算公式为k=治理设施运行时间(小时)/正常生产时间（小时）。原文件中描述污染物类别为废水，污染物指标为化学需氧量，此处对其进行了匹配工作，将其匹配到LCAflow库里面相最符合的流，污染物指标备注为化学需氧量，产污系数备注为发酵工艺中采用树脂提取工艺
- Waste water: 235.823
  the Technical of end-of-pipe management technology for pollution Waste wateris/，The formula for calculating the actual operation rate (k-value) of the end-of-pipe treatment facility is k = opreating time of treatment facilities (hours) / normal production time (hours)
  污染物指标废水量的末端治理技术是/，末端治理设施实际运行率（k值）计算公式为/。原文件中描述污染物类别为废水，污染物指标为废水量，此处对其进行了匹配工作，将其匹配到LCAflow库里面相最符合的流，污染物指标备注为废水量，产污系数备注为发酵工艺中采用非树脂提取工艺
- Ammonia Nitrogen: 245.716
  the Technical of end-of-pipe management technology for pollution Ammonia NitrogenisWithout terminal treatment facility，Its Technical efficiency of end-of-pipe management0
  污染物指标氨氮的末端治理技术是无末端处理设施，其效率为0，末端治理设施实际运行率（k值）计算公式为/。原文件中描述污染物类别为废水，污染物指标为氨氮，此处对其进行了匹配工作，将其匹配到LCAflow库里面相最符合的流，污染物指标备注为氨氮，产污系数备注为发酵工艺中采用树脂提取工艺
- Nitrogen, organic bound: 318.521
  the Technical of end-of-pipe management technology for pollution Nitrogen, organic boundisWithout terminal treatment facility，Its Technical efficiency of end-of-pipe management0
  污染物指标总氮的末端治理技术是无末端处理设施，其效率为0，末端治理设施实际运行率（k值）计算公式为/。原文件中描述污染物类别为废水，污染物指标为总氮，此处对其进行了匹配工作，将其匹配到LCAflow库里面相最符合的流，污染物指标备注为总氮，产污系数备注为发酵工艺中采用树脂提取工艺
- chemical oxygen demand: 351.209
  the Technical of end-of-pipe management technology for pollution chemical oxygen demandisPhysicochemical treatment + aerobic biological treatment，Its Technical efficiency of end-of-pipe management90.3
  污染物指标化学需氧量的末端治理技术是物理化学处理法+好氧生物处理法，其效率为90.3，末端治理设施实际运行率（k值）计算公式为k=治理设施运行时间(小时)/正常生产时间（小时）。原文件中描述污染物类别为废水，污染物指标为化学需氧量，此处对其进行了匹配工作，将其匹配到LCAflow库里面相最符合的流，污染物指标备注为化学需氧量，产污系数备注为发酵工艺中采用树脂提取工艺
- chemical oxygen demand: 986.911
  the Technical of end-of-pipe management technology for pollution chemical oxygen demandisWithout terminal treatment facility，Its Technical efficiency of end-of-pipe management0
  污染物指标化学需氧量的末端治理技术是无末端处理设施，其效率为0，末端治理设施实际运行率（k值）计算公式为/。原文件中描述污染物类别为废水，污染物指标为化学需氧量，此处对其进行了匹配工作，将其匹配到LCAflow库里面相最符合的流，污染物指标备注为化学需氧量，产污系数备注为发酵工艺中采用非树脂提取工艺
- Waste water: 1157.31
  the Technical of end-of-pipe management technology for pollution Waste wateris/，The formula for calculating the actual operation rate (k-value) of the end-of-pipe treatment facility is k = opreating time of treatment facilities (hours) / normal production time (hours)
  污染物指标废水量的末端治理技术是/，末端治理设施实际运行率（k值）计算公式为/。原文件中描述污染物类别为废水，污染物指标为废水量，此处对其进行了匹配工作，将其匹配到LCAflow库里面相最符合的流，污染物指标备注为废水量，产污系数备注为发酵工艺中采用树脂提取工艺
- chemical oxygen demand: 3620.71
  the Technical of end-of-pipe management technology for pollution chemical oxygen demandisWithout terminal treatment facility，Its Technical efficiency of end-of-pipe management0
  污染物指标化学需氧量的末端治理技术是无末端处理设施，其效率为0，末端治理设施实际运行率（k值）计算公式为/。原文件中描述污染物类别为废水，污染物指标为化学需氧量，此处对其进行了匹配工作，将其匹配到LCAflow库里面相最符合的流，污染物指标备注为化学需氧量，产污系数备注为发酵工艺中采用树脂提取工艺
- Exhaust gas: 300169
  the Technical of end-of-pipe management technology for pollution Exhaust gasis/
  污染物指标废气量的末端治理技术是/，末端治理设施实际运行率（k值）计算公式为/。原文件中描述污染物类别为废气，污染物指标为废气量，此处对其进行了匹配工作，将其匹配到LCAflow库里面相最符合的流，污染物指标备注为废气量，产污系数备注为发酵工艺中采用非树脂提取工艺
- Exhaust gas: 427553
  the Technical of end-of-pipe management technology for pollution Exhaust gasis/
  污染物指标废气量的末端治理技术是/，末端治理设施实际运行率（k值）计算公式为/。原文件中描述污染物类别为废气，污染物指标为废气量，此处对其进行了匹配工作，将其匹配到LCAflow库里面相最符合的流，污染物指标备注为废气量，产污系数备注为发酵工艺中采用树脂提取工艺

## Use advice
This dataset is derived from the Pollution Source Census Report and contains information on pollution emissions and related products. However, it does not include data on energy or chemical consumption, nor does it provide information on waste or co-product generation. When utilizing this dataset, please supplement the missing data based on actual conditions before use
该数据集来源于污染源普查报告，包含污染物排放及相关产品信息，但不包含能源或化学品消耗数据，也不提供废弃物或共生产物产生信息。在使用该数据集时，请根据实际情况补充缺失数据后再使用。

## Review details
Inventory: The internal review was done by several iteration steps concerning raw data validation, raw data documentation, representativity, completeness and consistency of modelling with regard to ISO 14040 and 14044.
清单： 内部审查通过几个迭代步骤完成，涉及原始数据验证、原始数据记录、代表性、完整性、与 ISO 14040 和 14044 有关的建模的一致性。

## Data sources
- 第二次全国污染源普查产排污核算系数手册（试用版）,二级代码27,三级代码271.0文件，在完整版文件中第3027页
