# Fracturing and completion Stage-Well perforation & fracturing

Dataset: ILCD process
Geography: SC-CN
Reference year: 2014
Valid until: 2016
Classification: Materials production / Other mineralic materials
Generated by: Pu Hong, 15695258655@163.com
Review: Dependent internal review by Tiangong LCI Data Working Group
Amounts: no units in this file; such an amount is in the reference unit of its flow, which a separate flow dataset defines

## Geography
China's shale gas extraction work is currently concentrated in the Sichuan and Chongqing areas, and the data from Sichuan and Chongqing are selected for LCA calculations.

## Time period
Raw data dates between 2014-2016

## Inputs
- freshwater: 2.6071e7; min 4.0237e7; max 1.0253e7; uniform; article inperiodical
  Fracturing fluid composition
- sand: 1.253e6; min 1.91e6; max 304000; uniform; article inperiodical
  Fracturing fluid composition
- Diesel: 6470; min 9920; max 2025; uniform; article inperiodical
  Material, water and wastewater transportation
- Diesel: 209794; min 323791; max 82508; uniform; article inperiodical
  Use of field equipment

## Outputs
- waste water - untreated: 209000; min 322000; max 82000; uniform; article inperiodical
  wastewater produced

## Review details
Inventory: The internal review was done by several iteration steps concerning raw data validation, raw data documentation, representativity, completeness and consistency of modelling with regard to ISO 14040 and 14044.

## Data sources
- Wang, J., Liu, M., McLellan, B. C., Tang, X. & Feng, L. Environmental impacts of shale gas development in China: A hybrid life cycle analysis. Resources, Conservation and Recycling 120, 38–45 (2017).
