# Electricity production ; Thermal power ; Heilongjiang

Dataset: ILCD process, Unit process, single operation
Geography: HLJ-CN
Reference year: 2019
Classification: Unit processes / Energy carriers and technologies / Electricity
Generated by: Ruoxi Xiong, xiongrx0126@163.com
Owner: Tiangong LCI Data Working Group
Review: Dependent internal review by Tiangong LCI Data Working Group
Amounts: no units in this file; such an amount is in the reference unit of its flow, which a separate flow dataset defines
copyright: false
licenseType: Free of charge for all users and uses

## General comment
Thermal power generation includes seventeen fossil fuels such as raw coal, washed coal, oil and natural gas. The process only considers the direct power generation process, not the upstream raw material extraction and processing and the downstream power consumption

## Time period
Calculated based on data from the 2019 Energy Statistics Yearbook

## Technical purpose
The thermal power generation process described is used for the production of electricity from seventeen different fossil fuels which include raw coal, washed coal, oil, and natural gas in Heilongjiang province. This electricity generated is typically used for residential, commercial, and industrial applications within the region.

## Reference product
- electricity for thermal power: 3.6; calculated

## Inputs
All rows: calculated
- Raw coal: 0.324397
- Coke oven gas: 0.000887
- blast furnace gas: 0.106057
- Converter gas: 0.003103
- Diesel: 0.00035344
- Petroleum Coke: 0.00207507
- refinery gas: 1.847e-5
- natural gas: 0.031994

## Outputs
- carbon dioxide (fossil): 0.943597; calculated
- sulfur dioxide: 0.000173428; calculated
- Nitrogen oxides: 0.000272165; calculated
- particles (> PM10): 3.33236e-5; calculated

## Data treatment and extrapolations
For the accounting method, please refer to the "Enterprise Greenhouse Gas Emissions Accounting Methods and Reporting Guidelines for Power Generation Facilities". Different forms of power generation and fuel consumption come from Chapter 3 (Energy Production) and Chapter 6 (Regional Energy Balance Sheet) in the "China Energy Statistical Yearbook 2020". The fuel parameters such as low calorific value and carbon content per unit calorific value used to calculate the carbon dioxide emission factor come from the "2019 China Regional Power Grid Carbon Dioxide Baseline Emission Factor Calculation Instructions OM" and the "Enterprise Greenhouse Gas Emission Accounting Method and Reporting Guide for Power Generation Facilities" 》

## Use advice
Users of this LCA data should note that only the direct power generation phase is considered. Upstream processes such as raw material extraction and processing, as well as downstream processes such as power consumption, are excluded. Data is calculated based on the 2019 Energy Statistics Yearbook and users should reference the specified greenhouse gas accounting guidelines for power generation facilities when utilizing this data. It is also important to consider regional variations in energy production and fuel consumption as detailed in the China Energy Statistical Yearbook 2020, Chapters 3 and 6. Parameters used for the calculation, including low calorific value and carbon content per unit calorific value, are sourced from the 2019 China Regional Power Grid Baseline Carbon Dioxide Emission Factor OM and the greenhouse gas reporting guide for power generation facilities.

## Review details
Inventory: The internal review was done by several iteration steps concerning raw data validation, raw data documentation, representativity, completeness and consistency of modelling with regard to ISO 14040 and 14044.

## Data sources
- 熊若熙. 中国电力生产和消费二氧化碳与污染物排放因子核算. (清华大学, 2023).
