# Waste water - treated ; Soil ex-situ remediation ; Ex-situ thermal desorption ; Soil excavation ; Foundation pit dewatering

Dataset: ILCD process, Unit process, single operation
Geography: WH-HUB-CN
Reference year: 2022
Classification: Unit processes / Other Services / Repair and maintenance
Functional unit: The functional unit of LCA was defined as the treatment of 1000 m3 of contaminated soil to meet the risk-based remediation targets.
Generated by: Yang Xintong, yangxt@caep.org.cn
Owner: Tiangong LCI Data Working Group
Review: Dependent internal review by Tiangong LCI Data Working Group
Amounts: no units in this file; such an amount is in the reference unit of its flow, which a separate flow dataset defines
copyright: false
licenseType: Free of charge for all users and uses

## General comment
Excavated and transport the soil to the ectopic thermal desorption equipment, where thermal desorption is carried out to achieve the removal of pollutants.

## Geography
A contaminated site located in Wuhan, China was selected as the case study. Approximately 1.25 million m3 of soil was found contaminated, and forty types of VOCs, SVOCs, and heavy metal contaminants were measured in the soil.

## Technology and included processes
Contaminated soil is excavated and transferred into a rotatory thermal reactor for treatment under vacuumed and low oxygen conditions. The reactor is heated using flame, steam, or hot oil to remove organic contaminants (> 99%) and moisture from the soil. The vaporized contaminants enter a combustion chamber as gases or fine particles and are destroyed by incineration. The exhaust gas is emitted after proper treatment.

## Technical purpose
The soil ex-situ remediation process using ex-situ thermal desorption is designed for the treatment of contaminated soil primarily from industrial sites. This process is applicable for the removal of a wide range of soil contaminants, including volatile organic compounds (VOCs), semi-volatile organic compounds (SVOCs), and heavy metals. The treated soil is meant for sites where risk-based remediation targets are set to manage environmental hazards effectively.

## Reference product
- waste water - treated: 1; measured

## Inputs
All rows: measured
- waste water - untreated: 1
- Activated Carbon: 28.62
- quartz sand: 87.2
- Electricity: 939.888
- Polyaluminium Chloride,Polyaluminium Chloride: 5.57

## Use advice
When utilizing this dataset for Life Cycle Assessment (LCA) of soil remediation, users should note that only the impacts from the operational phase of on-site remediation have been assessed. Hence, exclusion of the manufacturing of equipment impacts needs to be consistently applied in comparative studies. It is essential to apply the functional unit of the treatment of 1000 m3 of contaminated soil when gauging and comparing the efficacy of this process to others. Additionally, users need to ensure that the dataset is suitable for their specific regional context, especially if used in a different geographical location than Wuhan, China.

## Review details
Inventory: The internal review was done by several iteration steps concerning raw data validation, raw data documentation, representativity, completeness and consistency of modelling with regard to ISO 14040 and 14044.

## Data sources
- Guangji H ,Huan L ,Chang C , et al. Selection of green remediation alternatives for chemical industrial sites: An integrated life cycle assessment and fuzzy synthetic evaluation approach. Science of the Total Environment, 2022, 845 157211-157211.
