# Polymer production ; General polypropylene carbonate ; Catalytic polymerization process

Dataset: ILCD process
Geography: CN
Reference year: 2010
Classification: Unit processes / Materials production / Organic chemicals
Functional unit: 1kg polymer production
Generated by: Xiaohua Liu, lxh01311@163.com
Owner: Tiangong LCI Data Working Group
Review: Dependent internal review by Tiangong LCI Data Working Group
Amounts: no units in this file; such an amount is in the reference unit of its flow, which a separate flow dataset defines
copyright: false
licenseType: Free of charge for all users and uses

## General comment
This data set describes the process of producing polypropylene carbonate (PPC), which is a thermoplastic polymer typically used in the manufacture of packaging, films, adhesives, coatings, and as a substitute for non-biodegradable plastics in certain applications. Its features, such as biodegradability and compatibility with various materials, make it suitable for the green materials market and for applications where environmental friendliness is a concern.

## Inputs
- carbon dioxide (fossil): 400
  carbon dioxide The original text did not distinguish between bio and fossil，according to expert judgment, this is carbon dioxide (fossil)

## Outputs
- Electricity: 504
  electricity
- Steam: 6
  steam

## Use advice
When using this data set, users must consider the scope of the LCA to include any upstream processes for raw materials and energy used in the catalytic polymerization process for producing PPC. The dataset should be applied in scenarios consistent with the described technological applicability, such as manufacturing settings where PPC is produced on a commercial scale. Attention should be paid to the geographical and technological relevance when extrapolating this data for use in other regions or for different production capacities. If the life cycle of the PPC is assessed, end-of-life processes, such as recycling or biodegradation, should be included, and any assumptions made in these stages must be clearly documented.

## Review details
Inventory: The internal review was done by several iteration steps concerning raw data validation, raw data documentation, representativity, completeness and consistency of modelling with regard to ISO 14040 and 14044.

## Data sources
- 聚碳酸酯和聚乳酸的生命周期评价
