# Grout curtains ; Jet grouting ; Groundwater ex-situ remediation ; Pump and treatment

Dataset: ILCD process, Unit process, single operation
Geography: JS-CN
Reference year: 2022
Classification: Unit processes / Other Services / Repair and maintenance
Generated by: Wang Ning, wang_ning@caep.org.cn
Owner: Tiangong LCI Data Working Group
Review: Dependent internal review by Tiangong LCI Data Working Group
Amounts: no units in this file; such an amount is in the reference unit of its flow, which a separate flow dataset defines
copyright: false
licenseType: Free of charge for all users and uses

## General comment
Construction of a 90-pile grout curtain using cement, tap water and steel

## Geography
a closed pesticide manufacturing plant located in Jiangsu Province, China.

## Technical purpose
The grout curtain constructed using cement, tap water, and steel with 90 piles is primarily used for water seepage prevention in underground structures and remediation processes. It is commonly applied in construction to create barriers that prevent water infiltration in the vicinity of closed pesticide manufacturing plants, such as the one located in Jiangsu Province, China. The structure specifically supports projects involving jet grouting for soil stabilization and groundwater ex-situ remediation, including pump and treatment techniques.

## Reference product
- Grout curtains: 25; measured
  A is the cross-sectional area of 0.5 m2 for a pile, L is the pile length of 25 m (Φ850@600 mm), C is the cement content of 325 kg cement per m3 soil, and N is the pile numbers of 90.

## Inputs
- Electricity: 212616; measured
  使用电力建造灌浆帷幕
- Steel: 500; measured
  使用混凝土建造灌浆帷幕
- cement, unspecified: 365630; measured
  使用水建造灌浆帷幕
- Tap Water: 548440; measured
  使用碎石建造灌浆帷幕
- transport in t*km: 36613; calculated

## Use advice
When utilizing the data set for the construction of a grout curtain, it is essential to consider the geological characteristics of the site to ensure appropriate application of jet grouting and pump treatment within the Lifespan Assessment data. For accurate environmental impact analysis, users should include all inputs such as cement, tap water, concrete, and steel, and consider the outputs in terms of physical grout curtains when calculating resource use and emissions. Methodological considerations must also include the specific use phase behavior, particularly for sites with similar issues as the closed pesticide plant in Jiangsu Province. The technological applicability field should guide the context of use, ensuring proper alignment with the remediation objectives.

## Review details
Inventory: The internal review was done by several iteration steps concerning raw data validation, raw data documentation, representativity, completeness and consistency of modelling with regard to ISO 14040 and 14044.

## Data sources
- Ding, D. et al. Assessing the environmental impacts and costs of biochar and monitored natural attenuation for groundwater heavily contaminated with volatile organic compounds. Science of The Total Environment 846, 157316 (2022).
