# Leaching of Rare Earth Elements (REE)s;Rare Earth Elements (REE);bastnaesite route;Rare Earth Elements (REE) containing ore

Dataset: ILCD process, Unit process, single operation
Geography: NMG-CN
Reference year: 2014
Classification: Materials production / Non-energetic raw materials
Functional unit: The functional unit of this study is the production of 1 kg of the basket REO from each corresponding mineralogical and processing route.
LCI method principle: Attributional
LCI method approaches: Allocation - market value
Generated by: Tao Wang, twang@iue.ac.cn
Owner: Tiangong LCI Data Working Group
Review: Dependent internal review by Tiangong LCI Data Working Group
Amounts: no units in this file; such an amount is in the reference unit of its flow, which a separate flow dataset defines
copyright: false
licenseType: Free of charge for all users and uses

## General comment
The described industrial process involves the leaching of rare earth elements (REEs) from ore using the bastnaesite route. This process is a part of the REE production system, which typically serves the extraction and refining of REEs for manufacturing a variety of high-tech products. These products include permanent magnets for electric motors, batteries, electronics, luminescent materials for display devices, and catalysts for chemical reactions.

## Technology and included processes
In this study, the REE production system was analyzed from mining up to and including solvent extraction which contains product finishing processes such as precipitation and calcination

## Reference product
- Rare Earth chloride solution: 1; calculated
  RE chloride solution

## Inputs
All rows: calculated
- Sodium carbonate: 1
  Soda ash
- transport in t*km,transport in t*km: 0.53, 9.54 (2 entries)
- Hydrochloric acid: 1
- Rare Earth Element sulfate: 1.77
  RE sulfate solution
- water: 0.00756

## Outputs
- Water (sea water from technosphere, waste water): 7.56; calculated

## Deviations from the LCI method approaches
In this study, the REE production system was analyzed from mining up to and including solvent extraction which contains product finishing processes such as precipitation and calcination (Fig. 1). The other categories assessed in the literature review were mineral type, radioactivity, waste treatment, and co-mining. For mineral type, it was noted that the mineralogy accounted for in each study was different, which makes comparison difficult. For radioactivity, we marked with an X those studies which exemplified radioactivity flows in the LCI (if provided). For waste, we distinguished those LCIs which quantified waste treatment flows. For co-mining, since all REE are co-products of each other, this column is meant to highlight the co-products in addition to REE.

## Use advice
Users should note that the life cycle assessment (LCA) data set is tailored for the bastnaesite route of REE production, which includes mining, solvent extraction, precipitation and calcination. When using this data, it is essential to account for the specific mineralogy of the studied route, as different minerals might impact the comparability of results. Attention should be paid to included radioactivity flows, quantification of waste treatment, and co-mining aspects. Users must model use-phase behavior based on the specific applications of the REEs and consider technological applicability inclusively.

## Review details
Inventory: The internal review was done by several iteration steps concerning raw data validation, raw data documentation, representativity, completeness and consistency of modelling with regard to ISO 14040 and 14044.

## Data sources
- Bailey, G. et al. Review and new life cycle assessment for rare earth production from bastnäsite, ion adsorption clays and lateritic monazite. Resources, Conservation and Recycling 155, 104675 (2020).
