# Painting ; Metal Furniture ; Coating ; Powder spraying ; All sizes; NESPS2 / 涂饰 ; 金属家具 ; 涂料 ; 喷粉 ; 所有规模 ; 全国第二次污染普查数据

Dataset: ILCD process, Unit process, single operation
Geography: CN
Reference year: 2019
Classification: Reference Parameters / Systems / Textiles, furnitures and other interiors
Generated by: The data was created by the Office of the Second National Pollution Source Census of the Ministry of Ecology and Environment, and the data was organized by the TianGong Plan team for ILCD format / 生态环境部第二次全国污染源普查工作办公室创建数据，天工计划团队常慧敏整理数据为ILCD格式
Owner: Tiangong LCI Data Working Group / 天工LCI数据工作小组
Review: Dependent internal review by Tiangong LCI Data Working Group / 天工LCI数据工作小组
Amounts: no units in this file; such an amount is in the reference unit of its flow, which a separate flow dataset defines
copyright: false
licenseType: Free of charge for all users and uses

## General comment
the treatment technology for the pollution of Exhaust gasdidn't offered，The formula for calculating the actual operation rate (k-value) of the end-of-pipe treatment facility is /

## Technical purpose
所描述的工艺用于金属家具的涂装和喷涂操作。无论工厂规模大小，均采用粉末喷涂技术。该过程涉及尾气治理技术来控制污染颗粒物（PM2.5 - PM10），例如袋式过滤器，滤芯结合旋风过滤器以及单个或多个并行旋风过滤器。这些用于确保颗粒管理的高技术效率，某些技术可达到90%的效率。还提到了无颗粒控制的直排，即没有任何颗粒过滤技术。没有提供针对排气污染的具体治理技术。

## Reference product
- Paint: 1; input; calculated
  源文件中描述为为涂料，此处对其进行了匹配工作，将其匹配到LCAflow库里面相最符合的流

## Outputs
All rows: calculated
- particles (PM2.5 - PM10): 0.039
  the Technical of end-of-pipe management technology for pollution particles (PM2.5 - PM10)isBag filter，Its Technical efficiency of end-of-pipe management90，The formula for calculating the actual operation rate (k-value) of the end-of-pipe treatment facility is /
  污染物指标颗粒物的末端治理技术是袋式除尘，其效率为90，末端治理设施实际运行率（k值）计算公式为k=处理设施耗电量（千瓦时/年）/[设备额定功率（千瓦）×运行时间（小时/年）]。原文件中描述污染物类别为废气，污染物指标为颗粒物，此处对其进行了匹配工作，将其匹配到LCAflow库里面相最符合的流
- particles (PM2.5 - PM10): 0.039
  the Technical of end-of-pipe management technology for pollution particles (PM2.5 - PM10)isOthers (filter element + cyclone)，Its Technical efficiency of end-of-pipe management90，The formula for calculating the actual operation rate (k-value) of the end-of-pipe treatment facility is /
  污染物指标颗粒物的末端治理技术是其他（滤芯+旋风），其效率为90，末端治理设施实际运行率（k值）计算公式为k=处理设施耗电量（千瓦时/年）/[设备额定功率（千瓦）×运行时间（小时/年）]。原文件中描述污染物类别为废气，污染物指标为颗粒物，此处对其进行了匹配工作，将其匹配到LCAflow库里面相最符合的流
- particles (PM2.5 - PM10): 0.078
  the Technical of end-of-pipe management technology for pollution particles (PM2.5 - PM10)isSingle cylinder (multiple cylinders in parallel) cyclone，Its Technical efficiency of end-of-pipe management80，The formula for calculating the actual operation rate (k-value) of the end-of-pipe treatment facility is /
  污染物指标颗粒物的末端治理技术是单筒（多筒并联）旋风，其效率为80，末端治理设施实际运行率（k值）计算公式为k=处理设施耗电量（千瓦时/年）/[设备额定功率（千瓦）×运行时间（小时/年）]。原文件中描述污染物类别为废气，污染物指标为颗粒物，此处对其进行了匹配工作，将其匹配到LCAflow库里面相最符合的流
- particles (PM2.5 - PM10): 0.39
  the Technical of end-of-pipe management technology for pollution particles (PM2.5 - PM10)isDirect discharge，The formula for calculating the actual operation rate (k-value) of the end-of-pipe treatment facility is /
  污染物指标颗粒物的末端治理技术是直接排放，末端治理设施实际运行率（k值）计算公式为k=处理设施耗电量（千瓦时/年）/[设备额定功率（千瓦）×运行时间（小时/年）]。原文件中描述污染物类别为废气，污染物指标为颗粒物，此处对其进行了匹配工作，将其匹配到LCAflow库里面相最符合的流
- Exhaust gas: 2380
  the treatment technology for the pollution of Exhaust gasdidn't offered，The formula for calculating the actual operation rate (k-value) of the end-of-pipe treatment facility is /
  污染物指标工业废气量的末端治理技术未说明。原文件中描述污染物类别为废气，污染物指标为工业废气量，此处对其进行了匹配工作，将其匹配到LCAflow库里面相最符合的流

## Use advice
This dataset is derived from the Pollution Source Census Report and contains information on pollution emissions and related products. However, it does not include data on energy or chemical consumption, nor does it provide information on waste or co-product generation. When utilizing this dataset, please supplement the missing data based on actual conditions before use
该数据集来源于污染源普查报告，包含污染物排放及相关产品信息，但不包含能源或化学品消耗数据，也不提供废弃物或共生产物产生信息。在使用该数据集时，请根据实际情况补充缺失数据后再使用。

## Review details
Inventory: The internal review was done by several iteration steps concerning raw data validation, raw data documentation, representativity, completeness and consistency of modelling with regard to ISO 14040 and 14044.
清单： 内部审查通过几个迭代步骤完成，涉及原始数据验证、原始数据记录、代表性、完整性、与 ISO 14040 和 14044 有关的建模的一致性。

## Data sources
- 第二次全国污染源普查产排污核算系数手册（试用版）,二级代码21,三级代码213.0文件，在完整版文件中第443页
