# Excavated soil ; Soil ex-situ remediation ; Ex-situ thermal desorption ; Soil excavation

Dataset: ILCD process, Unit process, single operation
Geography: WH-HUB-CN
Reference year: 2022
Classification: Unit processes / Other Services / Repair and maintenance
Functional unit: The functional unit of life cycle assessment is defined as the excavation and transportation of 1000m3 contaminated soil to achieve subsequent ectopic heat desorption.
Generated by: Yang Xintong, yangxt@caep.org.cn
Owner: Tiangong LCI Data Working Group
Review: Dependent internal review by Tiangong LCI Data Working Group
Amounts: no units in this file; such an amount is in the reference unit of its flow, which a separate flow dataset defines
copyright: false
licenseType: Free of charge for all users and uses

## General comment
Contaminated soil is excavated and transferred into a rotatory thermal reactor

## Geography
A contaminated site located in Wuhan, China was selected as the case study. Approximately 1.25 million m3 of soil was found contaminated, and forty types of VOCs, SVOCs, and heavy metal contaminants were measured in the soil.

## Technology and included processes
Use an excavator to excavate along the boundaries of contaminated soil. The polluted soil generated during the excavation process is transported to the outside of the site for disposal, and the wastewater generated during the excavation process is discharged after being disposed of in situ to meet the standards.

## Technical purpose
This process is utilized for environmental remediation of sites with soil contamination. It's specifically applied to excavate and treat soil that has an amalgam of VOCs, SVOCs, and heavy metal pollutants. The ex-situ thermal desorption technique is targeted at large-scale decontamination projects, like the one in Wuhan, China, treating approximately 1.25 million m3 of polluted soil.

## Reference product
- Excavated soil,Excavated soil: 1000; measured

## Inputs
- Diesel,Diesel: 699.58; measured
- Tap Water: 323.21; measured
- Gasoline (regular): 13.82; measured
- Electricity: 6015.49; measured

## Outputs
- waste water - untreated: 1; measured

## Use advice
When using this dataset for Life Cycle Assessment, attention should be given to the fact that it only includes the operational phase of site remediation. Data users should note that impacts from manufacturing of equipment are excluded and may need to be considered separately if the full scope of environmental impacts is to be assessed. The functional unit is defined as 1000m3 of soil excavation and transportation. Data users should ensure that their study boundaries align with these parameters and scale their analyses accordingly to achieve accurate results.

## Review details
Inventory: The internal review was done by several iteration steps concerning raw data validation, raw data documentation, representativity, completeness and consistency of modelling with regard to ISO 14040 and 14044.

## Data sources
- Guangji H ,Huan L ,Chang C , et al. Selection of green remediation alternatives for chemical industrial sites: An integrated life cycle assessment and fuzzy synthetic evaluation approach. Science of the Total Environment, 2022, 845 157211-157211.
