# Sulfur Recovery Unit ; Synthetic gas ; Raw material coal ; WSA Sulfur Recovery ; All sizes; NESPS2 / 硫回收单元 ; 合成气 ; 原料煤 ; WSA硫回收 ; 所有规模 ; 全国第二次污染普查数据

Dataset: ILCD process, Unit process, single operation
Geography: CN
Reference year: 2019
Classification: Reference Parameters / Energy carriers and technologies / Energetic raw materials
Generated by: The data was created by the Office of the Second National Pollution Source Census of the Ministry of Ecology and Environment, and the data was organized by the TianGong Plan team for ILCD format / 生态环境部第二次全国污染源普查工作办公室创建数据，天工计划团队常慧敏整理数据为ILCD格式
Owner: Tiangong LCI Data Working Group / 天工LCI数据工作小组
Review: Dependent internal review by Tiangong LCI Data Working Group / 天工LCI数据工作小组
Amounts: no units in this file; such an amount is in the reference unit of its flow, which a separate flow dataset defines
copyright: false
licenseType: Free of charge for all users and uses

## General comment
the treatment technology for the pollution of Crude coaldidn't offered，The formula for calculating the actual operation rate (k-value) of the end-of-pipe treatment facility is /

## Technical purpose
所述工艺包括使用WSA（湿法硫酸气体）工艺的硫回收单元（SRU），旨在从原料煤产生的合成气中回收硫。该SRU适用于各种规模的操作。此系统对于处理含硫化合物气流的行业至关重要，使他们能将气态硫排放转化为硫酸，既减少污染又创造了有价值的副产品。常见应用可能包括煤气化厂和其他处理高硫原料的设施。

## Reference product
- Crude coal: 1000; input; calculated
  源文件中描述为为原料煤，此处对其进行了匹配工作，将其匹配到LCAflow库里面相最符合的流，污染物指标备注为工业废气量

## Outputs
- Nitrogen oxides: 0.012; calculated
  the Technical of end-of-pipe management technology for pollution Nitrogen oxidesisDirect discharge，Its Technical efficiency of end-of-pipe management0
  污染物指标氮氧化物的末端治理技术是直排，其效率为0，末端治理设施实际运行率（k值）计算公式为-。原文件中描述污染物类别为废气，污染物指标为氮氧化物，此处对其进行了匹配工作，将其匹配到LCAflow库里面相最符合的流，污染物指标备注为氮氧化物
- Exhaust gas: 210; calculated
  the treatment technology for the pollution of Exhaust gasdidn't offered，The formula for calculating the actual operation rate (k-value) of the end-of-pipe treatment facility is k = annual power consumption of wastewater treatment facilities (kWh) / (total rated power (kW) × annual operating time (hours))
  污染物指标工业废气量的末端治理技术是-，末端治理设施实际运行率（k值）计算公式为-。原文件中描述污染物类别为废气，污染物指标为工业废气量，此处对其进行了匹配工作，将其匹配到LCAflow库里面相最符合的流，污染物指标备注为工业废气量
- sulfur dioxide: 0.1; calculated
  the Technical of end-of-pipe management technology for pollution sulfur dioxideisDirect discharge，Its Technical efficiency of end-of-pipe management0，The formula for calculating the actual operation rate (k-value) of the end-of-pipe treatment facility is k = annual power consumption of wastewater treatment facilities (kWh) / (total rated power (kW) × annual operating time (hours))
  污染物指标二氧化硫的末端治理技术是直排，其效率为0，末端治理设施实际运行率（k值）计算公式为-。原文件中描述污染物类别为废气，污染物指标为二氧化硫，此处对其进行了匹配工作，将其匹配到LCAflow库里面相最符合的流，污染物指标备注为二氧化硫

## Use advice
This dataset is derived from the Pollution Source Census Report and contains information on pollution emissions and related products. However, it does not include data on energy or chemical consumption, nor does it provide information on waste or co-product generation. When utilizing this dataset, please supplement the missing data based on actual conditions before use
该数据集来源于污染源普查报告，包含污染物排放及相关产品信息，但不包含能源或化学品消耗数据，也不提供废弃物或共生产物产生信息。在使用该数据集时，请根据实际情况补充缺失数据后再使用。

## Review details
Inventory: The internal review was done by several iteration steps concerning raw data validation, raw data documentation, representativity, completeness and consistency of modelling with regard to ISO 14040 and 14044.
清单： 内部审查通过几个迭代步骤完成，涉及原始数据验证、原始数据记录、代表性、完整性、与 ISO 14040 和 14044 有关的建模的一致性。

## Data sources
- 第二次全国污染源普查产排污核算系数手册（试用版）,二级代码25,四级代码2522文件，在完整版文件中第2905页
