# cement production;cement, common portland cement;China average

Dataset: ILCD process, Unit process, black box
Geography: CN
Reference year: 2010
Classification: Materials production / Other mineralic materials
Generated by: Siqi Yang, ysqsophia@gmail.com
Owner: Tiangong LCI Data Working Group
Review: Dependent internal review by Tiangong LCI Data Working Group
Amounts: no units in this file; such an amount is in the reference unit of its flow, which a separate flow dataset defines
copyright: false
licenseType: Free of charge for all users and uses

## General comment
The average data for China are based on market shares for each cement production process technology and size, and the respective raw material consumption. Market shares of cement production process technologies and sizes: large new dry process (>4000 t-clinker/day), 29.32%; medium new dry process (2000-4000 t-clinker/day), 23.21%; small new dry process (<2000 t-clinker/day), 9.29%; shaft kiln (<2000 t-clinker/day), 38.18%.

## Technology and included processes
Market share of cement production process technology and scale: large-scale new dry process (>4000 tons-clinker/day), 29.32%; medium-sized new dry process (2000~4000 tons-clinker/day), 23.21%; small-scale new dry process Method (<2000 tons-clinker/day), 9.29%; vertical kiln (<2000 tons-clinker/day), 38.18%.

## Technical purpose
The described data set is intended for representing the environmental impacts of average cement production processes in China, specifically for general Portland cement. The information is relevant for studies on the construction industry, where cement is a fundamental material for building infrastructure, commercial and residential buildings, and for creating concrete by mixing with aggregates and water.

## Model description
Take 1 ton of general cement produced in China with a clinker content of 70% as the functional unit. Cement production includes raw meal preparation, clinker calcination and cement grinding.

## Reference product
- cement, common portland cement: 1000
  General cement with a clinker content of 70%.

## Inputs
- limestone, crushed, for mill: 920
  Limestone
- clay: 130
  Clay
- gypsum stone (CaSO4-dihydrate): 50
  Gypsum
- hard coal; 26.3 MJ/kg: 126.49
  Coal consumption during clinker burning. The coal consumption during burning is calculated based on the standard coal consumption per ton of clinker of different production processes and scales.
- hard coal; 26.3 MJ/kg: 3.5
  Coal consumption during raw material drying. The research takes the coal consumption for drying as 3.50kg/t-cement.
- electricity, medium voltage: 187.272
  Electricity consumption during clinker burning. The electricity consumption is calculated based on the comprehensive electricity consumption for different production processes and scales.
- electricity, medium voltage: 153.36
  Other electricity consumption. Electricity is mainly used for the drive of raw material crushing, raw mill, cement mill, dust removal equipment and other machinery. Electricity consumption is calculated according to the comprehensive electricity consumption of different production processes and scales.

## Outputs
- carbon dioxide: 597.48
  The CO2 emissions are calculated theoretically and consist of two aspects: on the one hand from the use of coal for calcining clinker and on the other hand from the decomposition of carbonates during the calcination of raw materials such as limestone (CaCO3) to produce lime (CaO).
- sulfur dioxide: 0.28
  SO2. SO2, NOX, and COD emissions were obtained from the results of the recent China Cement Industry Pollution Source Survey.
- Nitrogen oxides: 0.78
  NOX. SO2, NOX, and COD emissions were obtained from the results of the recent China Cement Industry Pollution Source Survey.
- particles (PM2.5): 0.3995
  <PM2.5. The graded emissions of particulate matter from cement products in functional units were calculated based on the investigation of particulate matter production coefficients of different cement production processes and scales by the pollution source census, as well as the proportion of particulate matter generated by different cement production equipment and the share of dust removal technology application and graded dust removal efficiency.
- particles (PM2.5 - PM10): 0.1392
  PM2.5-10. The graded emissions of particulate matter from cement products in functional units were calculated based on the investigation of particulate matter production coefficients of different cement production processes and scales by the pollution source census, as well as the proportion of particulate matter generated by different cement production equipment and the share of dust removal technology application and graded dust removal efficiency.
- particles (> PM10): 0.0582
  >PM10. The graded emissions of particulate matter from cement products in functional units were calculated based on the investigation of particulate matter production coefficients of different cement production processes and scales by the pollution source census, as well as the proportion of particulate matter generated by different cement production equipment and the share of dust removal technology application and graded dust removal efficiency.
- chemical oxygen demand: 0.000158
  COD. SO2, NOX, and COD emissions were obtained from the results of the recent China Cement Industry Pollution Source Survey.

## Use advice
This LCA data set is based on market shares of different cement production technologies and their scale of operation. Users should note that the average data reflects the weighted consumption of raw materials across various production scales and technologies, including large, medium, and small new dry process facilities, as well as shaft kilns. The methodological consideration must be the use of this data in the context of cement with a 70% clinker content. The data assumes China-specific technology mix and should only be used as such without extrapolation to other regions without appropriate adjustments. Furthermore, users looking to study specific types or qualities of cement production should acquire more detailed data rather than relying on this average.

## Review details
Inventory: The internal review was done by several iteration steps concerning raw data validation, raw data documentation, representativity, completeness and consistency of modelling with regard to ISO 14040 and 14044.

## Data sources
- 姜睿 & 王洪涛. (2010). 中国水泥工业的生命周期评价. 化学工程与装备, 4, 183–187.
