# Rare Earth extraction;Rare Earth;Molten Salt Electrolysis;NdFeB Magnet Scrap

Dataset: ILCD process, Unit process, single operation
Geography: CN
Reference year: 2013
Valid until: 2016
Classification: Unit processes / Materials production / Metals and semimetals
Functional unit: The functional unit of this analysis was chosen as the production of one kg Nd–Pr alloy through extraction from NdFeB magnet scrap
LCI method principle: Attributional
LCI method approaches: Allocation - market value
Generated by: Tao Wang, twang@iue.ac.cn
Owner: Tiangong LCI Data Working Group
Review: Dependent internal review by Tiangong LCI Data Working Group
Amounts: no units in this file; such an amount is in the reference unit of its flow, which a separate flow dataset defines
copyright: false
licenseType: Free of charge for all users and uses

## General comment
The process is designed for the recovery of rare earth metals, specifically neodymium (Nd) and praseodymium (Pr), from NdFeB magnet scrap. This process is applicable in the recycling sector, targeting the extraction and production of Nd-Pr alloy, which is critical in manufacturing high-strength permanent magnets used in various advanced technological applications, such as electric motors, wind turbine generators, and hard disk drives.

## Technology and included processes
The one-step recycling process to extract rare earth metals from scrap magnets is being developed on a laboratory scale at TU Delft. Nonmagnetized, uncoated magnet samples were used in the experiment. The magnets were ball milled under inert atmosphere to increase the surface area to facilitate the electrochemical reactions, and the powder was inserted into the salt bath.

## Reference product
- End-of-Life Magnet Weight in Compound: 1.055; input; min 1.1; max 1.01; uniform; calculated
  Pre-treatment steps: EOL magnet weight in compound

## Inputs
- Electricity: 0.00324; min 0.00324; max 0.00324; uniform; calculated
  Pre-treatment steps: Extraction of magnet from compound

## Deviations from the LCI method approaches
The allocation of environmental flows to Nd and Pr was updated. Value allocation was used to share the process impacts from both multi-output stages, reflecting prices from recent years (2013–2016). There are two stages in the primary production of rare earths for which assumptions regarding coproductions are necessary: the beneficiation stage, where concentrated iron ore and rare earth concentrate are separated, and the solvent extraction stage undertaken to separate individual rare earths.

## Use advice
When utilizing this data, users should consider the experimental nature of the process, currently developed at a laboratory scale. Applicability for scaling up to industrial levels may require consideration of technological adaptations and efficiency changes. The updated allocation of environmental flows to Nd and Pr based on value allocation reflects the economic considerations given to byproducts during the beneficiation and solvent extraction stages. The instructions also highlight the necessity of separately modelling the allocation for multi-output stages accurately based on recent data (2013–2016). Users should ensure the functional unit—production of 1 kg Nd-Pr alloy from NdFeB magnet scrap—is consistent with the goal and scope of their assessment.

## Review details
Inventory: The internal review was done by several iteration steps concerning raw data validation, raw data documentation, representativity, completeness and consistency of modelling with regard to ISO 14040 and 14044.

## Data sources
- Schulze, R., Abbasalizadeh, A., Bulach, W., Schebek, L. & Buchert, M. An Ex-ante LCA Study of Rare Earth Extraction from NdFeB Magnet Scrap Using Molten Salt Electrolysis. J. Sustain. Metall. 4, 493–505 (2018).
