# Sediment restoration ; in-situ capping ; activated carbon ;Capping operation

Dataset: ILCD process, Unit process, black box
Geography: NO
Reference year: 2011
Classification: Other Services / Repair and maintenance
Generated by: Sang Chunhui, sangch@mail.bnu.edu.cn
Owner: Tiangong LCI Data Working Group
Review: Dependent internal review by Tiangong LCI Data Working Group
Amounts: no units in this file; such an amount is in the reference unit of its flow, which a separate flow dataset defines
licenseType: Free of charge for all users and uses

## General comment
Use of capping vessel to cap the AC on the sediment.

## Geography
After investigation, no relevant domestic research literature has been found yet.

## Time period
There is no clear start time for data collection in the literature, and the start time of the validity period is based on the publication time of the literature

## Technology and included processes
capping material was used of 2 kg /m2. Density is 0.5 tonnes / m3.

## Technical purpose
The industrial process described pertains to the restoration of sediment using in-situ capping with activated carbon (AC). This process is designed for environmental remediation activities, particularly for in-situ treatment of contaminated sediment. Activated carbon is used to cap and isolate contaminants within the sediment, effectively reducing their bioavailability and environmental impact. This method is applicable in water bodies where sediment contamination poses ecological or health risks and is suitable for large-scale applications in bodies of water in Southern China.

## Reference product
- materials,rhamnolipid,air,seedling,soil sample,Affected area: 2.38e7
  这里指的是采用活性炭覆盖的底泥沉积物影响区域，用面积表示

## Inputs
- (unnamed flow): 46700

## Data selection and combination
. The life cycle inventories, i.e. the aggregated environmental data collected for the modeled system, are derived from three sources. The main source used for the majority of processes is the Ecoinvent 2.2 database.

## Use advice
When utilizing this LCA dataset for sediment restoration projects, it is important to ensure that the methodological framework aligns with ISO 14040 standards. The primary data are gathered from pot experiments, pilot-scale studies, and supplier information, representing conditions in Southern China. Secondary data are sourced from Ecoinvent database version 2.3, with selections made based on geographic and technological similarity. Users should validate the temporal relevance of the data, considering that the start of the validity period is the publication time of the source literature. Use caution with geographic and technological applicability when extrapolating data to different contexts. The use of capping material is quantified at 2 kg/m2 with a density of 0.5 tonnes/m3, and this should be factored into the inventory calculations according to the specific site conditions and coverage requirements.

## Review details
Inventory: The internal review was done by several iteration steps concerning raw data validation, raw data documentation, representativity, completeness and consistency of modelling with regard to ISO 14040 and 14044.

## Data sources
- Sparrevik et al. Use of Life Cycle Assessments To Evaluate the Environmental Footprint of Contaminated Sediment Remediation. Environ. Sci. Technol. 2011, 45, 10, 4235–4241
