# Electricity production ; Thermal power ; Inner Mongolia

Dataset: ILCD process, Unit process, single operation
Geography: NMG-CN
Reference year: 2019
Classification: Unit processes / Energy carriers and technologies / Electricity
Generated by: Ruoxi Xiong, xiongrx0126@163.com
Owner: Tiangong LCI Data Working Group
Review: Dependent internal review by Tiangong LCI Data Working Group
Amounts: no units in this file; such an amount is in the reference unit of its flow, which a separate flow dataset defines
copyright: false
licenseType: Free of charge for all users and uses

## General comment
Thermal power generation includes seventeen fossil fuels such as raw coal, washed coal, oil and natural gas. The process only considers the direct power generation process, not the upstream raw material extraction and processing and the downstream power consumption

## Time period
Calculated based on data from the 2019 Energy Statistics Yearbook

## Technical purpose
The data set describes the usage of a range of fossil fuels, such as raw coal, washed coal, oil, and natural gas, in the electricity production process at a thermal power plant in the Inner Mongolia Autonomous Region. This thermal power generation facility is intended for the production and supply of electricity to the regional power grid. The data is specifically focused on direct electricity generation and does not cover upstream raw material extraction and processing or downstream electricity consumption.

## Reference product
- electricity for thermal power: 3.6; calculated

## Inputs
All rows: calculated
- Raw coal: 0.576436
- Gangue, in ground: 0.00859646
- Coke oven gas: 0.001165
- blast furnace gas: 0.019443
- Converter gas: 0.001133
- Diesel: 2.365e-5
- fuel oil, unspecified: 2.17e-6
- natural gas: 4.34e-6
- Natural gas, liquefied: 4.34e-7

## Outputs
- carbon dioxide (fossil): 1.08583; calculated
- sulfur dioxide: 0.000188211; calculated
- Nitrogen oxides: 0.000296868; calculated
- particles (> PM10): 3.60223e-5; calculated

## Data treatment and extrapolations
For the accounting method, please refer to the "Enterprise Greenhouse Gas Emissions Accounting Methods and Reporting Guidelines for Power Generation Facilities". Different forms of power generation and fuel consumption come from Chapter 3 (Energy Production) and Chapter 6 (Regional Energy Balance Sheet) in the "China Energy Statistical Yearbook 2020". The fuel parameters such as low calorific value and carbon content per unit calorific value used to calculate the carbon dioxide emission factor come from the "2019 China Regional Power Grid Carbon Dioxide Baseline Emission Factor Calculation Instructions OM" and the "Enterprise Greenhouse Gas Emission Accounting Method and Reporting Guide for Power Generation Facilities" 》

## Use advice
When using this data set for Life Cycle Assessment purposes, it is critical to note that the scope is limited to the direct generation of electricity with considerations only for the in-plant generation processes. Upstream and downstream activities, such as raw material extraction, processing, and the end-use consumption of electricity are excluded. Users should refer to the methodologies outlined in the 'Enterprise Greenhouse Gas Emissions Accounting Methods and Reporting Guidelines for Power Generation Facilities' and the '2019 China Regional Power Grid Carbon Dioxide Baseline Emission Factor Calculation Instructions OM' when applying the data. Additionally, the fuel consumption data and carbon dioxide emission factors should be sourced from the relevant chapters of the 'China Energy Statistical Yearbook 2020'. The dataset is based on the energy statistics of 2019 and should be used accordingly.

## Review details
Inventory: The internal review was done by several iteration steps concerning raw data validation, raw data documentation, representativity, completeness and consistency of modelling with regard to ISO 14040 and 14044.

## Data sources
- 熊若熙. 中国电力生产和消费二氧化碳与污染物排放因子核算. (清华大学, 2023).
