# Bauxite Mining ; Bauxite ; Cradle ; 2007

Dataset: ILCD process, Unit process, single operation
Geography: CN
Reference year: 2021
Classification: Unit processes / Materials production / Non-energetic raw materials
Generated by: Zimeng Cai, caizm6178@163.com
Owner: Tiangong LCI Data Working Group
Review: Dependent internal review by Tiangong LCI Data Working Group
Amounts: no units in this file; such an amount is in the reference unit of its flow, which a separate flow dataset defines
copyright: false
licenseType: Free of charge for all users and uses

## General comment
氧化铝生产2017

## Time period
Date of publication

## Technical purpose
The bauxite mining process described is used for the extraction of bauxite, which is a primary raw material in the production of alumina and subsequently used for manufacturing aluminum metal. This data set specifically pertains to the bauxite mining operations as they were conducted in the year 2007, serving as a starting point (cradle) in the life cycle assessment of the material.

## Reference product
- bauxite: 2.39622e10; software or database

## Inputs
All rows: software or database
- electricity, high voltage, aluminium industry: 4.00378e7
  electricity
- other fuels: 1.16257e9
  electricity
- Coal, brown, in ground: 2.46643e7
  coal
- natural gas, high pressure: 272700
  coal
- Gasoline: 1.1285e6
  gasoline
- Diesel oil: 6.1101e6
  diesel

## Data selection and combination
The data in this study refers to the LCA data of PA, SA, electricity, and other background data. The PA data were obtained from statistical data sources, and the SA data were mainly obtained from the literatures. The background data were mainly derived from the Chinese localization LCA database CAS RCEES 2018, which was established by the Research Center for Eco-Environmental Sciences, Chinese Academy of Sciences and covers LCA data for energy, materials, transportation, waste management etc.

## Use advice
The LCA data regarding PA (Production Allocation), SA (System Allocation), electricity, and other background data should be carefully interpreted within the context of its year of publication and the geographical location it represents. Users should note that technology and environmental standards evolve, and thus, the data might not reflect current practices accurately. Also, attention should be paid to integrating the data set with the Chinese localized LCA database CAS RCEES 2018 for more comprehensive results, and cross-reference the publication dates and sources especially when using the SA data, which is mainly derived from literature.

## Review details
Inventory: The internal review was done by several iteration steps concerning raw data validation, raw data documentation, representativity, completeness and consistency of modelling with regard to ISO 14040 and 14044.

## Data sources
- Ding, N., Liu, N., Lu, B. & Yang, J. Life cycle greenhouse gas emissions of aluminum based on regional industrial transfer in China. J. Ind. Ecol. 25, 1657–1672 (2021).
