# Goosemeat|LiveGeese|Semi-mechanizedslaughtering/mechanizedslaughtering|All sizes / /|鹅肉|活鹅|半机械化屠宰/机械化屠宰|所有规模

Dataset: ILCD process, Partly terminated system
Geography: CN
Reference year: 2019
Classification: Materials production / Other mineralic materials
Generated by: The data was created by the Office of the Second National Pollution Source Census of the Ministry of Ecology and Environment, and the data was organized by the TianGong Plan team for ILCD format / 生态环境部第二次全国污染源普查工作办公室创建数据，天工计划团队常慧敏整理数据为ILCD格式
Amounts: no units in this file; such an amount is in the reference unit of its flow, which a separate flow dataset defines
copyright: false

## Technology and included processes
the Technical of end-of-pipe management technology for pollution phosphorus, totalisPrecipitation separation + SBR，Its Technical efficiency of end-of-pipe management40，The formula for calculating the actual operation rate (k-value) of the end-of-pipe treatment facility is k = annual power consumption of wastewater treatment facilities (kWh/year) / (rated power of all power-consuming equipment of wastewater treatment facilities (kW) × annual operating time of wastewater treatment facilities (hours/year))
污染物指标总磷的末端治理技术是沉淀分离+SBR类，其效率为40，末端治理设施实际运行率（k值）计算公式为k=污水治理设施耗电量（千瓦时/年）/污水治理设施运行时间（小时/年）/污水治理设施总功率（千瓦）

## Reference product
- Domestic Goose: 100; input; calculated
  原文件中描述污染物类别为Product，污染物指标为活鹅，此处对其进行了匹配工作，将其匹配到LCAflow库里面相最符合的流

## Outputs
All rows: calculated
- Waste water: 2570
  原文件中描述污染物类别为废水，污染物指标为工业废水量，此处对其进行了匹配工作，将其匹配到LCAflow库里面相最符合的流
- chemical oxygen demand: 3.965, 3.172, 3.172, 2.379, 0.99125, 1.9825, 0.1586 (7 entries)
  原文件中描述污染物类别为废水，污染物指标为化学需氧量，此处对其进行了匹配工作，将其匹配到LCAflow库里面相最符合的流
- Ammonia Nitrogen: 0.133, 0.1197, 0.1197, 0.1064, 0.0133, 0.0399, 0.1064 (7 entries)
  原文件中描述污染物类别为废水，污染物指标为氨氮，此处对其进行了匹配工作，将其匹配到LCAflow库里面相最符合的流
- Nitrogen, organic bound: 0.428, 0.3852, 0.3852, 0.3424, 0.2568, 0.3424, 0.0642 (7 entries)
  原文件中描述污染物类别为废水，污染物指标为总氮，此处对其进行了匹配工作，将其匹配到LCAflow库里面相最符合的流
- phosphorus, total: 0.061, 0.0549, 0.0549, 0.0366, 0.01525, 0.0488, 0.0366 (7 entries)
  原文件中描述污染物类别为废水，污染物指标为总磷，此处对其进行了匹配工作，将其匹配到LCAflow库里面相最符合的流

## Data sources
- 第二次全国污染源普查产排污核算系数手册（试用版）,四级代码1352文件，在完整版文件中第2554页
