# Eggplant production in solar greenhouse ; Agricultural Inputs Production (Conventional)

Dataset: ILCD process, Unit process, single operation
Geography: HD-HEB-CN
Reference year: 2002
Valid until: 2017
Classification: Materials production / Agricultural production means
Functional unit: 1T eggplant
Generated by: Rui Yang, 1632707028@qq.com
Owner: Tiangong LCI Data Working Group
Review: Dependent internal review by Tiangong LCI Data Working Group
Amounts: no units in this file; such an amount is in the reference unit of its flow, which a separate flow dataset defines
copyright: false
licenseType: Free of charge for all users and uses

## General comment
The solar greenhouse used in the experiment is an arch type with a length of 60 m and a width of 7 m. In the greenhouse, a variety of vegetables were rotated (two crops a year). In this study, eggplant seeds grew from March to August every year, and the experiment was carried out for the period of 4 years (2013 to 2016). Three treatment modes were set up in the experiment: (1) Conventional mode: the traditional greenhouse management mode of local farmers was adopted, mainly chemical fertilizer was applied, and a small amount of organic fertilizer was applied. ② Comprehensive mode: the amount of organic fertilizer and chemical fertilizer applied is 50% of the amount applied in organic and conventional mode, respectively. The biological control method is mainly used for disease and pest control, and low-toxicity and low-residue chemical pesticides are used for treatment in severe cases. (3) Organic mode: According to the production standards of organic vegetables, only organic fertilizers (compost and chicken manure) are applied, and chemical fertilizers and pesticides are not used. Agricultural measures and physical control of pests and diseases are mainly used (such as using yellow board to lure and kill, insect control nets, etc.). The nitrogen application amount of the integrated and organic models was the same as that of the normal scale model, and the irrigation conditions of each treatment were consistent. The irrigation method was large flood irrigation (Table 1).

## Geography
Qu Zhou

## Time period
The long-term positioning experiment for greenhouse vegetables started in March 2002.

## Technology and included processes
The experiment used a 60 m long and 7 m wide arched greenhouse for the cultivation of various vegetables in rotation (two crops per year). The study focused on the growth of eggplants from March to August each year, conducting a 4-year experiment from 2013 to 2016. Three treatments were applied: conventional, integrated, and organic.

## Technical purpose
The dataset describes the use of a conventional arched greenhouse for the long-term cultivation of various vegetables, with a specific focus on eggplant production. The experiment investigates three cultivation treatments: conventional, integrated, and organic. This information is pertinent to agricultural research and can be applied in the study and improvement of vegetable production processes, particularly for eggplants within a controlled greenhouse environment. Additionally, the dataset could be of interest to producers and researchers looking to optimize greenhouse crop rotation and management techniques, or those focusing on the environmental impact of agricultural practices.

## Reference product
- eggplant: 1000; calculated
  conventional

## Inputs
- Electricity: 983.75; calculated
  conventional
- water: 1.7618; calculated
  conventional

## Outputs
All rows: calculated
- Hydrocarbons, aliphatic, alkanes, unspecified: 0.0084
  conventional
- carbon monoxide: 0.0407
  conventional
- carbon dioxide (fossil): 88.14
  conventional
- ammonium: 0.0374
  conventional
- nitrous oxide: 0.0015
  conventional
- Nitrogen oxides: 0.3197
  conventional
- sulfide: 0.2798
  conventional
- methane: 0.0146
  conventional
- phosphorus, total: 0.0121
  conventional
- Ammonia (NH4+, NH3, as N): 0.1417
  conventional
- chemical oxygen demand: 0.7517
  conventional
- cadmium: 8.28e-8
  conventional
- lead-210: 1.29e-6
  conventional
- copper: 6.47e-7
  conventional
- zinc: 3.24e-6
  conventional

## Deviations from the LCI method approaches
Life cycle assessment includes the following 4 steps: goal definition and scope delineation, inventory analysis, impact assessment, and result interpretation. Brief descriptions of the main steps are given below.

## Data selection and combination
The inventory analysis includes the collection of data and quantitative processing of the data. In the agricultural input production subsystem, the pollutants produced by fertilizers, organic fertilizers, insecticides, mulching films, and diesel, etc., (including CO, CO2, NOx, SO2, CH4, N2O, and COD, etc.) and energy consumption are calculated referring to the research results of Liang Long [22].

## Data treatment and extrapolations
Nitrous oxide collection uses the static chamber method [19], and the measurement is conducted using the Agilent 7890A gas chromatograph. Soil nitrate nitrogen (NO3-N) and total phosphorus leaching are collected using a free-flow underground leaching collection device in agricultural fields, and after each irrigation, leachate is extracted using a pump within 3 to 5 days, and measured with a flow analyzer (TRAACS2000). The extraction of heavy metals (mainly considering Cu, Zn, Pb, and Cd) in organic fertilizers uses the nitric acid-hydrochloric acid-hydrofluoric acid digestion method, and the test liquid is measured by ICP-MS. When the crops are harvested, each harvest is weighed and recorded, taking the average of three times. Detailed measurement processes for each indicator are referenced in the literature [19].

## Use advice
When utilizing this LCA dataset for research or optimization purposes, users should take into account the specific methodology used for data collection and measurement, including the static chamber method for nitrous oxide, the use of an Agilent 7890A gas chromatograph, and a TRAACS2000 flow analyzer for soil nitrate nitrogen and total phosphorus leaching. Heavy metal contents in organic fertilizers were determined using ICP-MS with appropriate digestion methods. The system boundary for the LCA is from cradle to farm gate, excluding infrastructure construction, agricultural machinery production, vegetable consumption, and waste emissions. Researchers should reference the detailed methods outlined in the provided literature when interpreting data and ensure that their applications are consistent with the experimental parameters and scope of the LCA.

## Review details
Inventory: The internal review was done by several iteration steps concerning raw data validation, raw data documentation, representativity, completeness and consistency of modelling with regard to ISO 14040 and 14044.

## Data sources
- 徐强,胡克林,李季等.华北平原不同生产模式设施蔬菜生命周期环境影响评价[J].环境科学,2018,39(05):2480-2488.
