# Municipal sludge treatment and disposal;wet sludge moisture content 80%;650℃ pyrolysis

Dataset: ILCD process, Unit process, single operation
Geography: CN
Classification: Unit processes / End-of-life treatment / Wastewater treatment
Functional unit: 1 t of sludge is selected as the functional unit, the moisture content of wet sludge is 80%.
Generated by: Jin Sitian, 2331276@tongji.edu.cn
Owner: Tiangong LCI Data Working Group
Review: Dependent internal review by Tiangong LCI Data Working Group
Amounts: no units in this file; such an amount is in the reference unit of its flow, which a separate flow dataset defines
copyright: ['opt4ROkqig']
licenseType: Free of charge for all users and uses

## General comment
Through experiments, the relevant data of the sludge pyrolysis treatment process under different working conditions are collected and distributed, and the input and output of materials and energy in each process are quantified, and the environmental pollutant emissions are quantified.

## Technology and included processes
The rated power of the tube furnace in the pyrolysis link is 4 kW, the no-load power is 1.4 kW, nitrogen is introduced for 2~3 minutes before the reaction to ensure an oxygen-free environment, the nitrogen flow rate is 30 ml/min, the heating rate of the tube furnace is 80 °C/min, and the final temperature of pyrolysis is maintained for 10min.

## Technical purpose
The described process is used for the treatment and disposal of municipal wet sludge with 80% moisture content through pyrolysis at a temperature of 650℃. The process applies to the conversion of 1 ton of high-moisture sludge into usable byproducts or for waste reduction purposes, potentially suitable for urban waste management facilities.

## Reference product
- Sludge: 1000; input; estimated
  The moisture content of 1t of wet sludge is 80%

## Inputs
- Electricity: 1680.01; calculated
- nitrogen: 5.63; calculated

## Outputs
All rows: calculated
- hydrogen: 0.47
- carbon monoxide (biogenic): 3.99
  The original text does not distinguish between biogenic and fossil, and according to experts, it is biogenic here.
- methane (biogenic),methane (biogenic): 3.29
  (same comment as for carbon monoxide (biogenic))
- non-methane volatile organic compounds: 2.8
- carbon dioxide (biogenic): 26.4
  (same comment as for carbon monoxide (biogenic))
- Heat treatment oil: 81.66
- Semi-coke: 81.82

## Use advice
When using this data set for Life Cycle Assessment, users should account for any emissions or energy consumption associated with the pyrolysis process. Consideration should also be given to any possible byproducts and their respective treatment or utilization. Ensure that all calculations are based on the functional unit of 1 ton of sludge with 80% moisture content. It is recommended to also consider the technological applicability of the given process in terms of scale, geographical location, and regulatory compliance.

## Review details
Inventory: The internal review was done by several iteration steps concerning raw data validation, raw data documentation, representativity, completeness and consistency of modelling with regard to ISO 14040 and 14044.

## Data sources
- 王久兵. 污泥热解反应机制及其能源化工艺的全生命周期评价研究[D].浙江工业大学,2017.
