# Utilization of high alumina fly ash ; Mullite ceramics (main product) and silica fume (by-product) ; High alumina fly ash (HAFA)

Dataset: ILCD process, Unit process, single operation
Geography: NMG-CN
Reference year: 2017
Classification: Unit processes / Materials production / Glass and ceramics
Generated by: Changqing Xu, xcq@bit.edu.cn
Owner: Tiangong LCI Data Working Group
Review: Dependent internal review by Tiangong LCI Data Working Group
Amounts: no units in this file; such an amount is in the reference unit of its flow, which a separate flow dataset defines
copyright: false
licenseType: Free of charge for all users and uses

## General comment
高铝飞灰（HAFA）的利用;主要产品莫来石陶瓷;副产品硅灰

## Time period
Year of publication

## Technical purpose
The high alumina fly ash (HAFA) is utilized in the production of mullite ceramics, which are primarily used for structural, refractory, and thermal insulating applications due to their high mechanical strength and thermal shock resistance. Mullite ceramics serve various industries such as aerospace, electronics, and metallurgy. The silica fume by-product is often used as a supplementary cementitious material in concrete and cement products, enhancing their mechanical properties and durability.

## Reference product
- ash: 1000; input; measured
  功能单位是应用1000kg高铝粉煤灰

## Inputs
- electricity, high voltage, aluminium industry: 295.884; software or database
- hydrogen chloride: 506.85; measured
- carbon dioxide, in chemical industry: 165.07; measured
- quicklime, in pieces, loose: 210.96; measured
  CaO,生石灰
- freshwater: 2786.99; measured
  fresh water
- Sodium hydroxide: 190.41; measured
- hard coal: 360.27; software or database

## Outputs
All rows: measured
- sanitary ceramics: 684.93
  主要产品Mullite ceramics
- Calcium silicate: 0
  副产品硅酸钙CaSiO3，无条目
- silica fume, densified: 205.48
  副产品fume silica
- aluminium hydroxide: 0
  副产品high-white aluminum hydroxide (HWAH)
- chemical oxygen demand: 0.0219
- carbon dioxide (fossil),carbon dioxide (fossil): 821.92
- sulfur dioxide: 0.08
- Nitrogen oxides: 0.08
- municipal solid waste: 821.92

## Use advice
When using this dataset in a Life Cycle Assessment, attention should be paid to the allocation of environmental impacts between the main product (mullite ceramics) and the by-product (silica fume). It's important to consider the scenario in which the dataset is applied, specifically whether the utilization of the by-product in a given application is included or excluded. The technological applicability of the data set is limited to the defined use scenario (Scenario 2), and the year of publication should be taken into account when considering the relevance and technological advancement of the data.

## Review details
Inventory: The internal review was done by several iteration steps concerning raw data validation, raw data documentation, representativity, completeness and consistency of modelling with regard to ISO 14040 and 14044.

## Data sources
- Yang, S. et al. Assessment and comparison of three high-aluminum fly ash utilization scenarios in Inner Mongolia, China using an eco-efficiency indicator. Waste Manag. Res. 35, 515–524 (2017).
