# Waste tire treatment ; Waste tires ; Thermal cracking waste tires 100000t/a ; Steel wire products

Dataset: ILCD process
Geography: XJ-CN
Reference year: 2023
Classification: Unit processes / End-of-life treatment / Energy recycling
Functional unit: 1 ton waste tire recycling
Generated by: Xiaohua Liu, lxh01311@163.com
Owner: Tiangong LCI Data Working Group
Review: Dependent internal review by Tiangong LCI Data Working Group
Amounts: no units in this file; such an amount is in the reference unit of its flow, which a separate flow dataset defines
copyright: false
licenseType: Free of charge for all users and uses

## General comment
The thermal cracking process for waste tires is intended for the treatment and recycling of waste tires at a scale of 100000 tons per annum. This process results in the recovery of valuable materials such as steel wire, which can be repurposed or used in the manufacturing of new products. The steel wire recovered through this process is suitable for use in various industries that require high-quality steel input, such as automotive, construction, and manufacturing.

## Reference product
- Waste Tire: 1000; input

## Inputs
- Denitration Agent: 0.878333
  Denitration agent
- Electricity: 276.71
- water: 735.9
- natural gas,natural gas: 0.136183
  nature gas

## Outputs
- Steel Wire: 118.8
- Fuel Oil: 408.85
- Carbon Black: 342.596
- Rubber powder: 880
  rubber powder

## Use advice
Users of this data set should take into consideration the specific technological applicability of the process when integrating it into Life Cycle Assessment models. Attention should be given to the accuracy of the data concerning the amount of waste tires treated and the yield of steel wire products. It is also crucial to account for the energy consumption and emissions associated with the thermal cracking process. Methodological advice includes ensuring that the end-of-life phase for waste tires is appropriately modeled, considering potential environmental impacts of the steel wire production process and factoring in the possibility of secondary applications of the steel wire.

## Review details
Inventory: The internal review was done by several iteration steps concerning raw data validation, raw data documentation, representativity, completeness and consistency of modelling with regard to ISO 14040 and 14044.

## Data sources
- 废旧轮胎回收综合利用项目环评报告
