# Injection well backfilling ; Din=0.15m,L=50m ; Soil in-situ remediation ; Enhanced bioremediation

Dataset: ILCD process, Unit process, single operation
Geography: SH-CN
Reference year: 2020
Classification: Unit processes / Other Services / Repair and maintenance
Generated by: Xiao Meng, xiaomeng@mail
Owner: Tiangong LCI Data Working Group
Review: Dependent internal review by Tiangong LCI Data Working Group
Amounts: no units in this file; such an amount is in the reference unit of its flow, which a separate flow dataset defines
copyright: false
licenseType: Free of charge for all users and uses

## General comment
The newly built injection wells during the repair process will be backfilled after the repair project is completed.

## Geography
The aquifer in a certain area in Shanghai, China, is uniformly contaminated with chlorinated volatile organic compounds (CVOCs), with a surface area of 20,000 m2 and a depth of 50 m, with the water table located at a depth of 30 m.

## Technical purpose
This industrial process refers to the backfilling of injection wells that were created for the purpose of soil in-situ remediation. It is specifically used in the context of enhanced bioremediation to treat aquifers uniformly contaminated with chlorinated volatile organic compounds (CVOCs). The dimension specifications Din=0.15m and L=50m suggest the size and depth of the wells to be backfilled. This process is applicable in cases where contaminated subterranean water reserves need to be cleaned, especially in regions like the described area in Shanghai, China, which has a considerable spread of CVOCs across a 20,000 m2 surface area and at a depth of 50 m. The technical application of this process is critical for soil and aquifer restoration projects aimed at reducing environmental and health impacts of groundwater pollution.

## Reference product
- Well backfilling: 272
  文中仅给出监测井和注入井一共544口，没有给出单独的监测井和注入井数量，这里填报人简单估计两种监测井数量各半。

## Inputs
- injection well: 272
  文中仅给出监测井和注入井一共544口，没有给出单独的监测井和注入井数量，这里填报人简单估计两种监测井数量各半。
- Concrete: 4069.88; calculated
- Gravel Sand: 38155.1; calculated
- clay: 18047.4; calculated
- Tap Water: 6865.28; calculated

## Use advice
When utilizing this data set for Life Cycle Assessment (LCA) purposes, ensure that the scope of the environmental impact assessment includes the specific process of injection well backfilling. Account for the materials used for backfilling and their environmental impact. Be aware that the geographic specificity (Shanghai, China) may necessitate adjusting impact factors according to local environmental conditions and regulations. Consider including long-term monitoring impacts post-remediation and potential alterations in groundwater flow and quality. Assess the technology applicability for scenarios with comparable types and distributions of contaminants. Ensure that the data used reflects the most updated technology and methodologies for in-situ soil remediation through enhanced bioremediation.

## Review details
Inventory: The internal review was done by several iteration steps concerning raw data validation, raw data documentation, representativity, completeness and consistency of modelling with regard to ISO 14040 and 14044.

## Data sources
- Ni, Z. et al. Comparative Life-Cycle Assessment of Aquifer Thermal Energy Storage Integrated with in Situ Bioremediation of Chlorinated Volatile Organic Compounds. Environ. Sci. Technol. 54, 3039–3049 (2020).
