# Backfilled foundation pit ; Soil ex situ remediation ; Thermal desorption ; Final disposal ; Foundation pit backfilling

Dataset: ILCD process, Unit process, single operation
Geography: CN
Reference year: 2022
Classification: Unit processes / Other Services / Repair and maintenance
Generated by: Wang Feng, wangfeng@caep.org.cn
Owner: Tiangong LCI Data Working Group
Review: Dependent internal review by Tiangong LCI Data Working Group
Amounts: no units in this file; such an amount is in the reference unit of its flow, which a separate flow dataset defines
copyright: false
licenseType: Free of charge for all users and uses

## General comment
Ectopic thermal desorption repairs 1 cubic meter of contaminated soil. After thermal desorption, the soil will temporarily exist in the repair site waiting for the acceptance of the effect evaluation unit.

## Geography
我国华东区域5 个污染土壤异位热脱附修复工程案例

## Technology and included processes
The soil after thermal desorption will temporarily exist in the repair site waiting for the acceptance of the effect evaluation unit, and after the acceptance is qualified. Backfilled into the site or transported to the outside of the site for disposal

## Technical purpose
The industrial process described is used for the remediation of contaminated soil through a method known as thermal desorption. This process is applicable in scenarios where soil has been polluted and requires cleaning before it can be considered safe for reuse. The treated soil is used for backfilling foundation pits either on the same site or is transported off-site following a successful quality assessment, ensuring that it meets environmental safety standards.

## Reference product
- Backfilled foundation pit: 1; measured

## Inputs
- Diesel: 0.00021; measured
- Remediated soil: 1; missing unimportant

## Use advice
When using this dataset for Life Cycle Assessment, ensure that the boundaries of the LCA study include the thermal desorption process and the transport of soil if applicable. Consider the environmental impacts of both the remediation process and the subsequent handling of the treated soil. It is important to verify that the quality assessment of the remediated soil aligns with the local regulations and intended use of the backfilled area. The dataset should not be used for soil that is to be disposed of without this treatment process or for other forms of soil remediation.

## Review details
Inventory: The internal review was done by several iteration steps concerning raw data validation, raw data documentation, representativity, completeness and consistency of modelling with regard to ISO 14040 and 14044.

## Data sources
- 刘爽,陈盼,宋慧敏等.我国华东地区污染土壤异位热脱附修复碳排放及减排策略[J].环境工程学报,2022,16(08):2663-2671.
