# Cathodically etched foil production ; Aluminum coils from 0.05 mm etched aluminum foil ; Aluminum ingots

Dataset: ILCD process, Unit process, single operation
Geography: JS-CN
Reference year: 2020
Classification: Unit processes / Materials production / Metals and semimetals
Generated by: Huimin Chang, huiminchang@tsinghua.edu.cn
Owner: Tiangong LCI Data Working Group
Review: Dependent internal review by Tiangong LCI Data Working Group
Amounts: no units in this file; such an amount is in the reference unit of its flow, which a separate flow dataset defines
copyright: false
licenseType: Free of charge for all users and uses

## General comment
阴极蚀刻箔生产 ; 铝电解电容器 (AEC) 生产 ; 420V 680uf

## Time period
The investigated manufacturer produced about 1.183 billion AECs of all kinds in 2020.

## Technical purpose
The cathodically etched foil production process generates 0.05 mm etched aluminum foil that is primarily used in the manufacturing of aluminum electrolytic capacitors (AECs), specifically rated at 420V and 680uf. These AECs serve as critical components in a wide array of electronic devices, modulating current flow, and providing temporary energy storage. This data covers the scope of AEC production for various applications, as demonstrated by the investigated manufacturer's production of approximately 1.183 billion AECs in 2020.

## Reference product
- Al coil of 0.05mm etched foil: 369.431; measured
  Al coil of 0.05mm etched foil [kg] ; Production of cathode etched foil

## Inputs
All rows: measured
- electricity, high voltage, aluminium industry: 1037.21
  Electricity [kWh] ; Production of cathode etched foil
- 0.05mm Al blank coil: 518
  0.05mm Al blank coil[kg] ; Preparation of sulfuric acid (cathode)
- water, deionised: 14337.5
  Deionized water [kg] ; Preparation of sulfuric acid (cathode)
- tap water: 1099.38
  Tap water [kg] ; Waste gas treatment
- sulfuric acid: 1129.71
  Sulfur acid（98%）[kg] ; Corrosion reaction (cathode)
- nitric acid, without water, in 50% solution state: 56.865
  Nitric acid（98%）[kg] ; Corrosion reaction (cathode)
- hydrochloric acid, without water, in 30% solution state: 189.549
  Hydrochloric acid（31%）[kg] ; Corrosion reaction (cathode)
- sodium hydroxide, without water, in 50% solution state: 189.549
  NaOH solution (30%) [kg] ; Corrosion reaction (cathode)

## Outputs
All rows: measured
- wastewater, average: 18687.3
  Wastewater [kg] ; Production of cathode etched foil
- hydrogen chloride: 0.931
  HCl gas [kg] ; Production of cathode etched foil
- Sulfuric acid: 0.101
  H2SO4 gas [kg] ; Production of cathode etched foil
- Nitrogen oxides: 0.115
  NOx [kg] ; Production of cathode etched foil
- ammonia: 0.105
  NH3 gas [kg] ; Sewage treatment
- Chemical Oxygen Demand (COD): 2.273
  COD [kg] ; Production of cathode etched foil
- Suspended solids, unspecified: 1.488
  SS [kg] ; Production of cathode etched foil
- ammonia: 0.048
  NH3-N [kg] ; Production of cathode etched foil
- Nitrogen: 0.19
  TN [kg] ; Production of cathode etched foil

## Data selection and combination
The inventory data of capacitor production come from the AECs’ production factory in Jiangsu Province, China. The cut-off criteria of LCI data collection for each process is coverage of at least 95% of the mass and energy of the input and output flows. The inventory data of anode foil production and cathode foil production is obtained based on the analysis of the manufacturing processes and corresponding process parameters. The upstream data (i.e., aluminum ingots, separator paper, transport, electricity, and water) are acquired from the Gabi software (Version: 10.6.1.35). In detail, the profile of Chineses electricity grid from the China Electric Power Yearbook adopts the reference year 2016. The reference year of aluminum ingot production is 2015. The inaccessible data about ammonium citrate, ammonium pentaborate, NH4H2PO4, and HBO3 are estimated based on chemical equations using the existing materials (reactants) in the Gabi software. The use and end-of-life stage inventory data are obtained based on analysis and calculation.

## Use advice
Life Cycle Inventory (LCI) data users should ensure that their assessments capture at least 95% of the mass and energy flows when utilizing this data set on AEC production. It is critical to incorporate the upstream data provided (aluminum ingots, separator paper, transport, electricity, and water) for comprehensive environmental impact analysis. The inventory data sourced from the Gabi software should reflect the corresponding regional electricity profile and aluminum ingot production's reference years (2016 for electricity, 2015 for aluminum). Data gaps for materials such as ammonium citrate, ammonium pentaborate, NH4H2PO4, and HBO3 should be addressed through estimations based upon chemical equations using reactants available in the software. Users must include use and end-of-life stage calculations in their assessments to ensure a complete life cycle evaluation.

## Review details
Inventory: The internal review was done by several iteration steps concerning raw data validation, raw data documentation, representativity, completeness and consistency of modelling with regard to ISO 14040 and 14044.

## Data sources
- Zhang, C., Jing, J., Yun, L., Zheng, Y. & Huang, H. A cradle-to-grave life cycle assessment of high-voltage aluminum electrolytic capacitors in China. J. Clean. Prod. 370, (2022).
