# Soil Remediation;In-situ Remediation;Thermal Desorption;Case 1;Operation;Remediated Soil

Dataset: ILCD process, Unit process, single operation
Geography: JS-CN
Reference year: 2017
Classification: Unit processes / Other Services / Repair and maintenance
Generated by: Wang Ning, wang_ning@caep.org.cn
Owner: Tiangong LCI Data Working Group
Review: Dependent internal review by Tiangong LCI Data Working Group
Amounts: no units in this file; such an amount is in the reference unit of its flow, which a separate flow dataset defines
copyright: false
licenseType: Free of charge for all users and uses

## General comment
Contaminated soil from excavation is fed into thermal desorption equipment while water is treated with chemicals

## Technology and included processes
The volume of uncontaminated soil excavated was 61,135 m3, and the power consumption of the thermal desorption equipment was 657 kw/ h. It operated for 21 h per day for a total of 172 d, with a large amount of chemicals consumed.

## Technical purpose
The described thermal desorption process is intended for the remediation of excavated contaminated soil. It is an in-situ treatment where high energy consumption thermal desorption equipment is used to volatilize and remove contaminants from the soil, which is later gathered as remediated soil, suitable for reuse or safe disposal. This process is applicable in environmental engineering, particularly for soil restoration projects where pollutants need to be eliminated without transferring them to a different location.

## Reference product
- Remediated soil: 61135; measured

## Inputs
All rows: measured
- Excavated soil,Excavated soil: 61135
- Electricity: 8.5431e6
- Polyaluminium Chloride,Polyaluminium Chloride: 19914.2
- Polyacrylamide,Polyacrylamide: 27967.2
- Tap Water: 43127.3
- sodium hydroxide: 2867.24
- LPG - liquefied petroleum gas: 3.05675e6

## Use advice
Users of this data set should consider the specific conditions under which the thermal desorption equipment operates, including the volume of soil treated, the power consumption of the equipment, and the chemical usage for water treatment. When applying this data in LCA models, it is crucial to account for the direct emissions produced during the process, the potential recovery and recycling of remediated materials, and the background processes associated with the production of used chemicals. It is advised to monitor the composition of the treated soil to ensure the removal of contaminants and adjust the equipment operation according to the pollution load of the excavated soil.

## Review details
Inventory: The internal review was done by several iteration steps concerning raw data validation, raw data documentation, representativity, completeness and consistency of modelling with regard to ISO 14040 and 14044.

## Data sources
- Song, Y. et al. Environmental and socio-economic sustainability appraisal of contaminated land remediation strategies: A case study at a mega-site in China. Science of The Total Environment 610–611, 391–401 (2018).
