# Municipal sludge treatment and disposal;dry sludge;Press filtering

Dataset: ILCD process, Unit process, single operation
Geography: CN
Classification: Unit processes / End-of-life treatment / Waste water treatment
Functional unit: The functional unit used for GHGs in this LCA is one dry ton (DT) of sludge.
Generated by: Jin Sitian, 2331276@tongji.edu.cn
Owner: Tiangong LCI Data Working Group
Review: Dependent internal review by Tiangong LCI Data Working Group
Amounts: no units in this file; such an amount is in the reference unit of its flow, which a separate flow dataset defines
copyright: ['opt4ROkqig']
licenseType: Free of charge for all users and uses

## General comment
The main data sources used in our study are as follows: 1) Energy consumption and material inputs are obtained from investigations in Tai Lake Watershed; 2) The energy use emission factor is obtained from our own calculation, IPCC, and the literature.3) The fugitive emissions during landfilling, incineration, and composting are mainly determined by the model given in the other study as well as by the IPCC factors (2006), except for the CH4 emission in landfilling, which is obtained from study.4) Data from theoretical calculations (see Incineration section).

## Geography
Tai Lake Watershed

## Technology and included processes
According to the operating data, about 12.7 tons of cement is produced per ton of the dried sludge considering the combustion loss in the kiln

## Technical purpose
The municipal sludge treatment and disposal process with press filtering, as captured by this dataset, pertains to the management of waste sludge derived from municipal wastewater treatment facilities. This process yields dry sludge, suitable for various environmental management applications such as land application, incineration, or landfilling, focusing on the Tai Lake Watershed region.

## Reference product
- Sludge: 1000; input; estimated
  one dry ton (DT) of sludge

## Inputs
- Polymer: 5; measured
- Electricity: 360; measured

## Use advice
This LCA data should be utilized carefully considering the regional specificity of the sludge treatment process. The functional unit here is one dry ton (DT) of sludge, which should be consistently applied when assessing greenhouse gas (GHG) emissions related to various handling stages of municipal sludge. Users should ensure that methodological approaches are compatible with the regional practices and regulations relevant to the Tai Lake Watershed. Inclusions or exclusions of processes such as recycling or energy recovery should align with the goal and scope of the study.

## Review details
Inventory: The internal review was done by several iteration steps concerning raw data validation, raw data documentation, representativity, completeness and consistency of modelling with regard to ISO 14040 and 14044.

## Data sources
- Liu, B., Wei, Q., Zhang, B. & Bi, J. Life cycle GHG emissions of sewage sludge treatment and disposal options in Tai Lake Watershed, China. Science of The Total Environment 447, 361–369 (2013).
