# Livestock and poultry breeding ; feed crop planting stage ; layer individual investors

Dataset: ILCD process, Unit process, single operation
Geography: CN
Reference year: 2014
Classification: Unit processes / Materials production / Agricultural production means
Functional unit: 1kg eggs
Generated by: Rui Yang, 1632707028@qq.com
Owner: Tiangong LCI Data Working Group
Review: Dependent internal review by Tiangong LCI Data Working Group
Amounts: no units in this file; such an amount is in the reference unit of its flow, which a separate flow dataset defines
copyright: false
licenseType: Free of charge for all users and uses

## General comment
The feed described in this paper is mainly energy feed, including: corn, wheat, soybean, sorghum, rice. In fact, in the process of livestock breeding, livestock feed is mainly composed of corn, wheat and soybeans. Feed crop planting stage mainly includes fertilizer production stage, corn, soybean, wheat planting stage.

## Geography
This study was conducted from 2014 to 2015, aiming at livestock and poultry feeding cycle, meat ratio, feed formula, feed consumption, coal and electricity consumption, etc. Has been to Shandong Gaomi Zhengda pig farm, Laixi City Zhishuang dairy farm, Jimo city Duan Bolan town Jiangjiapo village pig farm, Jimo City Liujiazhuang town livestock farm, Rizhao City Changling town Guanzhuang village, Juxian County Zhailihe town Dongxing Agriculture and animal husbandry company, Juxian Qiaoshan town east Chen dairy farm, Juxian Qiaoshan town Liu Jiayi water pig farm, Zhucheng Foreign Trade Co., LTD. Phoenix parents breeding duck farm, Xinjiang Fukang Hongfa Breeding professional cooperative, Jiuyun Street Town Xuhong laying Chicken cooperative, Jiuyun Street Town Liuyun Village self-contained breeding farm, China Australia Holding Group Co., LTD., Dezhou City Qingyun County Wayu Village, Shandong Province Qingyun County four Liu community beef cattle breeding base, Dezhou City Qingyun Qingnian chicken breeding base, Qingyun County Yongli Poultry layer breeding company, Qingyun County Xingchen youth chicken breeding Field research was carried out by professional breeding cooperatives, Qingyun Dongtai broiler breeding cooperatives, Hebei Yanshan Boyuan Feed Co., LTD., Yanshan Da Chinese Feed Co., LTD., Wudi Liuhe Feed Co., LTD., and China-Australia Oriental Hope Feed Co., LTD.

## Technology and included processes
In this paper, the life cycle of livestock and poultry farming is divided into six stages: feed crop planting, feed processing, livestock and poultry raising, manure treatment, slaughter and transportation. The specific life cycle process of livestock and poultry breeding is shown in Figure 2-1. Due to the lack of some data and the limitations of basic conditions, the production, transportation and use of pesticides, mulch and feed additives have not been analyzed, and the environmental impact caused by other related infrastructure construction, transport production and labor costs is no longer considered.

## Technical purpose
The described process represents the life cycle stage of feed crop planting for energy feed used in livestock and poultry breeding, specifically for layer hens producing eggs. The energy feed primarily consists of corn, wheat, soybean, sorghum, and rice. These components are crucial for formulating the diet of layer hens to ensure high-quality egg production. This stage encompasses the production of fertilizers and the cultivation of the aforementioned crops. The data set is relevant for farmers, agricultural sectors, and industries involved in producing and analyzing the impact of feed crops on layer hen nutrition and egg production.

## Reference product
- egg: 1; measured
  作为参考定量，非实际输出

## Inputs
- Fertilizer: 0.140823; calculated
- hard coal: 0.0244592; calculated

## Outputs
All rows: measured
- nitrous oxide: 0.0044048
  Laying hen retail investors
- nitrogen, total (excluding N2): 0.0119591
  Laying hen retail investors
- Nitrogen trioxide: 0.00493
  Laying hen retail investors
- ammonia: 0.014475
  Laying hen retail investors
- hydrocarbons (unspecified): 7.36e-5
  Laying hen retail investors
- carbon monoxide (fossil): 0.0005466
  Laying hen retail investors
- sulfur dioxide: 0.0006627
  Laying hen retail investors
- carbon dioxide (fossil),carbon dioxide (fossil): 1.32107
  Laying hen retail investors

## Use advice
Users of this LCA data should ensure they account for regional differences in agricultural practices, such as the use of specific fertilizers, feed compositions, and energy sources (coal and electricity) as mentioned in the field surveys. It is also important to update the data based on temporal changes, as the surveys were conducted from 2014 to 2015. When using this data for assessments or decision-making, one must consider the technological advancement and changes in feed crop production methods that may have occurred since the data was collected.

## Review details
Inventory: The internal review was done by several iteration steps concerning raw data validation, raw data documentation, representativity, completeness and consistency of modelling with regard to ISO 14040 and 14044.

## Data sources
- 周景月. 基于生命周期评价的畜禽养殖环境影响分析. (青岛科技大学, 2017).
