# cement production;cement, ordinary portland cement, 32.5MPa;mixed solid wastes

Dataset: ILCD process, Unit process, black box
Geography: GD-CN
Classification: Materials production / Other mineralic materials
Generated by: Siqi Yang, ysqsophia@gmail.com
Owner: Tiangong LCI Data Working Group
Review: Dependent internal review by Tiangong LCI Data Working Group
Amounts: no units in this file; such an amount is in the reference unit of its flow, which a separate flow dataset defines
copyright: false
licenseType: Free of charge for all users and uses

## General comment
Solid waste blending: slag, fly ash, phosphogypsum, ceramic polishing waste.

## Geography
Guangzhou Shijing Cement Plant

## Technical purpose
The ordinary Portland cement (32.5 MPa) produced in this process is intended for general construction purposes. It can be used in construction projects that require a moderate level of mechanical strength. The inclusion of mixed solid wastes, such as slag, fly ash, phosphogypsum, and ceramic polishing waste, characterizes this cement process for enhanced environmental sustainability within the cement industry.

## Model description
1kg P·O 32.5 ordinary Portland cement was used as the functional unit for evaluation. The research scope ranges from cement raw material mining, energy production, raw meal preparation, clinker calcination and cement grinding to cement storage.

## Reference product
- cement, ordinary portland cement, 32.5MPa: 1000
  P.O32.5 Ordinary silicate cement

## Inputs
- calcium carbonate: 1110
  limestone. The primary resources consume the data of my country's resources and energy production cycle emission data calculated by Di Xianghua.
- clay: 110
  clay. The primary resources consume the data of my country's resources and energy production cycle emission data calculated by Di Xianghua.
- iron, powder: 37
  Iron powder. The primary resources consume the data of my country's resources and energy production cycle emission data calculated by Di Xianghua.
- gypsum stone (CaSO4-dihydrate): 25
  gupsum. The primary resources consume the data of my country's resources and energy production cycle emission data calculated by Di Xianghua.
- fluorspar: 6
  Fluorspar. The primary resources consume the data of my country's resources and energy production cycle emission data calculated by Di Xianghua.
- blast furnace slag: 89
  blast furnace slag. The primary resources consume the data of my country's resources and energy production cycle emission data calculated by Di Xianghua.
- phosphogypsum: 29
  phosphogypsum. Experimental data.
- ash: 50
  Fly ash. Experimental data.
- waste building wood, chrome preserved: 40
  Ceramic polishing waste. Experimental data.
- hard coal: 199.115
  Standard coal. The original data is 0.185kg standard coal, here converted to hard coal, the conversion formula is 1kg hard coal = 0.929kg standard coal.
- electricity, medium voltage: 352.8
  Electricity

## Outputs
- carbon dioxide: 988
  CO2. The primary resources consume the data of my country's resources and energy production cycle emission data calculated by Di Xianghua. CO2 emissions calculation: The generation of CO2 is mainly produced in the combustion of fossil energy such as coal and the decomposition of limestone in the production of cement clinkers.
- sulfur dioxide: 4.205
  SO2. SO2 emission: 0.25 % of the quality of mature materials according to the literature and test conditions.
- Nitrogen oxides: 2.77
  NOx. NO emissions estimated formulas are: e = 0.001Fa (1-RF). In the formula: E is the emissions of NOX, kg; F is the consumption of fuel, kg; A is the NOX emissions factor when the fuel is burned; R is the coverage of the nitrogen dehydration equipment; At present, there are fewer domestic nitrogen dehydration equipment. The emission factors of raw coal and crude oil are 9.95kg/T and 0.24kg/T, respectively, and natural gas is 4.10g/m³.
- particles (> PM10): 7.89
  particulates, with an unspecified particle size, is treated as PM > 10 micrometers in diameter. Granularity emissions: According to the statistics of the 2004 Chinese Environment Yearbook and the annual yearbook of China's architectural materials industry, the total amount of emissions for each ton of cement dust and smoke is produced by about 5.84kg.
- hydrogen fluoride: 0.01474
  HF. HF emission: 0.03 % of the quality of mature materials according to the literature and test conditions.

## Data selection and combination
It is based on the resource and energy consumption data of the shaft kiln production process of the pilot manufacturer Guangzhou Shijing Cement Factory.Primary resource consumption adopts the life cycle emission data of my country's resources and energy production calculated by Di Xianghua.

## Use advice
When using this data set for Life Cycle Assessment, it is essential to ensure the functional unit is consistently applied as 1kg of P·O 32.5 ordinary Portland cement. The scope of the study must cover from cement raw material extraction to cement storage, including energy production and usage at the shaft kiln. Do not account for industrial waste residues used as raw materials in emissions calculations, since they are not considered a primary resource consumption. For methodological consistency, refer to the life cycle emission data provided by Di Xianghua for primary resource consumption.

## Review details
Inventory: The internal review was done by several iteration steps concerning raw data validation, raw data documentation, representativity, completeness and consistency of modelling with regard to ISO 14040 and 14044.

## Data sources
- 吴清仁, 孙创奇, & 陈光. (2010). 磷石膏和陶瓷抛光废料配料制备普通水泥对环境负荷的影响. 水泥技术, 2, 28–32.
