# cement production;cement, ordinary portland cement, 42.5RMPa;modern dry process, rotary kiln, 5000 t/d

Dataset: ILCD process, Unit process, black box
Geography: DL-LN-CN
Classification: Materials production / Other mineralic materials
Generated by: Siqi Yang, ysqsophia@gmail.com
Owner: Tiangong LCI Data Working Group
Review: Dependent internal review by Tiangong LCI Data Working Group
Amounts: no units in this file; such an amount is in the reference unit of its flow, which a separate flow dataset defines
copyright: false
licenseType: Free of charge for all users and uses

## General comment
The company currently has a modern dry process production line with a capacity of 5000t/d. The raw material mill adopts an advanced vertical four-roller mill from Germany's Loesche, with specifications of LM60.4. Advanced new technology is employed for the clinker calcination using an external decomposition kiln.

## Geography
Dalian Cement Company

## Technology and included processes
The company currently has a modern dry production line with a capacity of 5000t/d, as shown in Figure 6.5. The raw material mill adopts the advanced vertical four-roller mill of Loesche Company of Germany, with specification of LM60.4, as shown in Figure 6.6. Clinker burning adopts advanced new kiln decomposition technology.

## Technical purpose
The ordinary Portland cement 42.5R, produced via the modern dry process on a 5000 t/d production line, is designated for general construction purposes including residential, commercial, and infrastructure projects. It is suitable for concrete, mortars, and grouts where moderate strength and durability are required. Additionally, the company provides specialized cement types for use in applications such as oil well cementing and dam construction.

## Model description
LCA method was not used for modeling.

## Reference product
- cement, ordinary portland cement, 42.5RMPa: 1000
  Cement, PO 42.5R

## Inputs
- limestone, crushed, for mill: 1033
  Limestone
- clay: 193
  Clay
- iron, powder: 40.3
  Iron powder
- gypsum stone (CaSO4-dihydrate): 30
  Gupsum
- electricity, medium voltage: 338.436
  Electricity
- hard coal: 119.2
  Coal

## Outputs
- sulfur dioxide: 0.4222
  SO2. The main source of SO2 emissions in the production of building materials is from sulfides contained in fuels and raw materials.
- Nitrogen oxides: 0.259
  NOX. The emissions of NOx in the production of building materials come from two main sources. The first is the combination of N and O2 in the air at high temperatures, which is directly related to the temperature. The second is the low-temperature combination of N and O2 in the fuel, which is related to the concentration of O2.
- carbon dioxide: 652.006
  CO2. The main sources of CO2 emissions in the building materials industry are from fuel combustion and raw material decomposition.
- particles (> PM10): 0.5645
  Dust, with an unspecified particle size, is treated as PM > 10 micrometers in diameter. The production of dust in the production of building materials is related to the content of powdered materials in the raw materials.
- chemical oxygen demand: 3.8111e-5
  COD (chemical oxygen demand) (mg/l). Chemical oxygen demand (COD) refers to the amount of oxidant consumed when treating wastewater with a strong oxidant. It is used to measure the degree of organic pollution in wastewater. The larger the COD value, the more severe the wastewater pollution.
- Suspended solids, unspecified: 1.326e-5
  SS (suspended solids) (mg/l). The suspended solids in the wastewater discharged from the building materials industry mainly refer to inorganic substances, organic substances, sediment, clay, microorganisms, and other substances that are insoluble in water.
- Oils, unspecified: 1.96e-8
  Petroleum (mg/l). Oil pollution in wastewater mainly comes from production enterprises such as steel, coking, and petrochemicals. According to the size of the oil droplet diameter, there are three forms of oil substances in wastewater: floating oil, dispersed oil, and emulsified oil, and the difficulty of separation from wastewater increases in that order.
- particles (> PM10): 70.4732
  Solid waste refers to the solid waste generated during the production process, such as dust (with an unspecified particle size, is treated as PM > 10 micrometers in diameter).

## Data selection and combination
Cement product evaluation index data is obtained through on-site surveys at cement production enterprises, and the index data comes from enterprise production process data.Due to the lack of specific industrial pollutant emission statistics, the data collection process is very difficult, and some data cannot be obtained directly, so it is obtained by converting related energy and raw materials.

## Sampling procedure
DCGC was founded in 1907 and is one of the key national cement enterprises. The production line has a designed production capacity of 5,500 tons of clinker per day and an annual output of more than 2 million tons of cement. The main products include "Seagull Brand" PO32.5R type, PO42.5R type ordinary Portland cement, A-grade oil well cement, G-grade medium and high sulfur-resistant oil well cement, and dam cement. "Wuyang Brand" Portland cement: "Ocean Brand" PO32.5R type, PO42.5R type ordinary Portland cement, PS32.5R type cement. DCGC has a registered capital of RMB 4.89 billion and a factory area of ​​370,000 square meters. The company currently has 434 employees. The annual output of clinker is 155 tons and the annual output of cement is 1.82 million tons.

## Use advice
Due to the challenges in collecting specific emissions data within the cement production industry, caution should be exercised when using this data for environmental impact studies. The data is based on on-site surveys and production process information, with indirect calculation methods employed for some emissions. Users should be aware that the data set does not include life cycle assessment (LCA), and further modeling using LCA methodology may be necessary for comprehensive environmental impact analysis. The technological applicability, such as the kiln technology and milling process, should be taken into account when using this data.

## Review details
Inventory: The internal review was done by several iteration steps concerning raw data validation, raw data documentation, representativity, completeness and consistency of modelling with regard to ISO 14040 and 14044.

## Data sources
- 李礼. (2012). 建筑材料绿色性的6E综合评价体系研究 [博士, 大连理工大学].
