# Coke production ; coke ; coking

Dataset: ILCD process, Unit process, single operation
Geography: CN
Reference year: 2018
Classification: Energy carriers and technologies / Hard coal based fuels
Generated by: Wanghuanyu, wanghuanyu00@126.com
Owner: Tiangong LCI Data Working Group
Review: Dependent internal review by Tiangong LCI Data Working Group
Amounts: no units in this file; such an amount is in the reference unit of its flow, which a separate flow dataset defines
licenseType: Free of charge for all users and uses

## General comment
Table 3-3 Example 1 System

## Technical purpose
The coke produced in this industrial process is primarily used as a fuel and a reducing agent in blast furnaces during the production of iron and steel. It may also serve as a source of carbon for various chemical synthesis processes.

## Reference product
- hard coal: 0; measured
  Coke oven gas - unit Nm3

## Inputs
All rows: measured
- hard coal: 1330
  Clean coal
- Electricity: 234.864
  electricity
- hard coal: 176.3
  Heating gas - unit Nm3
- freshwater: 670
  fresh water
- process steam: 436.9
  steam
- Kerosene: 60.4
  Washing oil
- sulphuric acid: 8.73
  Sulfuric acid aq99%
- Sodium hydroxide: 1000
  sodium hydroxide
- compressed air: 43
  Compressed air - unit Nm3

## Outputs
- coke: 11; measured
  Coke
- Kerosene: 12; measured
  tar
- benzene: 427.4; measured
  clumsy
- sulfide: 1.5; measured
  ammonium sulfate
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
## Use advice
Users of this data set should account for the energy and emissions associated with the coking process when conducting a Life Cycle Assessment for products where coke is used as a raw material. It is important to consider the specific chemistry and efficiency of the coking operation represented in this data set. Additional attention should be given to potential environmental impacts from by-products such as coal tar, ammonia, and sulfur compounds. Users should also ensure that the geographical relevance and technological applicability align with the scope of their assessment.

## Review details
Inventory: The internal review was done by several iteration steps concerning raw data validation, raw data documentation, representativity, completeness and consistency of modelling with regard to ISO 14040 and 14044.

## Data sources
- 李晶莹. 焦化多联产系统的生命周期评价与系统分析. (西北大学, 2018).
