# Alumina production ; Alumina for metallurgy ; Bauxite

Dataset: ILCD process, Unit process, single operation
Geography: HEN-CN
Reference year: 2018
Classification: Unit processes / Materials production / Non-energetic raw materials
Generated by: Changqing Xu, xcq@bit.edu.cn
Owner: Tiangong LCI Data Working Group
Review: Dependent internal review by Tiangong LCI Data Working Group
Amounts: no units in this file; such an amount is in the reference unit of its flow, which a separate flow dataset defines
copyright: false
licenseType: Free of charge for all users and uses

## General comment
无流程图

## Time period
Year of Dissertation Publication

## Technical purpose
The alumina produced in this process is intended for use in metallurgical applications. It is typically utilized as a primary feedstock for the production of aluminum metal through the Hall-Héroult electrolytic process. The high-grade alumina ensures efficient aluminum smelting operations.

## Reference product
- aluminium oxide, metallurgical: 1000; missing unimportant

## Inputs
All rows: missing unimportant
- electricity, high voltage, aluminium industry: 1287
- light fuel oil: 33.2
- hard coal: 276
- Petroleum Coke: 31.4
- calcium carbonate: 145
- Sodium bicarbonate: 155
  纯碱碳酸钠-Sodium Carbonate-无条目
- bauxite: 2243
- freshwater: 2520
  river water
- natural gas, high pressure: 55200
- coal gas: 150800

## Outputs
All rows: missing unimportant
- carbon dioxide (fossil),carbon dioxide (fossil): 1280
- carbon monoxide (fossil),carbon monoxide (fossil): 1.52
- sulfur dioxide: 1.43
- Nitrogen oxides: 2.6
- methane (fossil): 0.89
- particles (> PM10): 0.43
- particles (PM2.5): 0.26

## Use advice
When using this dataset for Life Cycle Assessment, consider the following: 1. This data represents a cradle-to-gate evaluation of alumina for metallurgy produced from bauxite without detailing individual process units. 2. If the alumina is further processed or recycled post-production, subsequent life cycle stages should be considered separately. 3. Users should ensure alignment with the technology and practices of the assessed period, indicated by the year of dissertation publication.

## Review details
Inventory: The internal review was done by several iteration steps concerning raw data validation, raw data documentation, representativity, completeness and consistency of modelling with regard to ISO 14040 and 14044.

## Data sources
- 王姗姗, 刘赛男, 王灿, & 张瑞芹. 基于生命周期评价的河南省原铝生产环境影响分析. 轻金属 1-7+16 (2018)
