# Impermeable funnel ; In-situ groundwater remediation ; PRB ; Funnel-and-gate construction

Dataset: ILCD process, Unit process, single operation
Geography: US
Reference year: 2011
Classification: Unit processes / Other Services / Repair and maintenance
Generated by: Zhang Jianbin, zhangjb@caep.org.cn
Owner: Tiangong LCI Data Working Group
Review: Dependent internal review by Tiangong LCI Data Working Group
Amounts: no units in this file; such an amount is in the reference unit of its flow, which a separate flow dataset defines
copyright: false
licenseType: Free of charge for all users and uses

## General comment
Construct impermeable funnel, which is composed of closed sheet piles or mud walls and embedded in the water barrier to guide or collect groundwater flow into the water gate, and is treated with active materials.

## Geography
PRB is assumed to be installed at a simulated site

## Technical purpose
This industrial process is designed for in-situ groundwater remediation. The impermeable funnel, constructed of closed sheet piles or mud walls, is embedded within a groundwater barrier layer. It is specifically used to direct or funnel contaminated groundwater flow through a permeable reactive barrier (PRB), where it is treated with active materials to remove or neutralize pollutants.

## Reference product
- Impermeable funnel: 1; estimated

## Inputs
- Steel: 1306; estimated
  Funnel (sheet pile) steel 1306 kg/m length of funnel
- cement, unspecified: 281.4; estimated
  Funnel cement 281.4 kg/m length of funnel
- transport in t*km: 253.984; estimated
  Transport distance of the materials to the site is assumed to be 160 km (100 mile)
- Electricity: 6585; estimated
  Funnel construction energy 6.585 GJ/m length of funnel

## Use advice
When utilizing this LCA data set for the impermeable funnel and PRB system in groundwater remediation, ensure the inclusion of all major raw materials and essential energy consumption in the assessment. Users should consider the system's technological applicability for the specific contamination scenario at the site in question. Accurately include system boundaries and operational data such as longevity, replacement frequency of active materials, and specific site conditions. Recycling of materials within the reactive barrier should be modeled according to the protocol for environmental impact analysis applicable to the specific context.

## Review details
Inventory: The internal review was done by several iteration steps concerning raw data validation, raw data documentation, representativity, completeness and consistency of modelling with regard to ISO 14040 and 14044.

## Data sources
- Mark S. H. Mak and Irene M. C. Lo.Environmental Life Cycle Assessment of Permeable Reactive Barriers: Effects of Construction Methods, Reactive Materials and Groundwater Constituents[J].Environmental Science & Technology 2011, 45, 23, 10148-10154
