# cathode copper production;cathode copper;Hydrometallurgy;copper ore

Dataset: ILCD process, Unit process, single operation
Geography: CN
Reference year: 2009
Valid until: 2013
Classification: Unit processes / Materials production / Metals and semimetals
Functional unit: the functional unit was defined as the production of 1 ton of cathode copper.
LCI method principle: Attributional
LCI method approaches: Allocation - mass
Generated by: Peng Wang, 2867919560@qq.com
Owner: Tiangong LCI Data Working Group
Review: Dependent internal review by Tiangong LCI Data Working Group
Amounts: no units in this file; such an amount is in the reference unit of its flow, which a separate flow dataset defines
copyright: false
licenseType: Free of charge for all users and uses

## General comment
Cathode copper produced through a hydrometallurgical process is utilized in various industrial applications due to its high purity and electrical conductivity. It serves as a fundamental component in the production of electronic goods, wiring, and plumbing materials. Specifically, it can be found within electrical circuits, motor manufacturing, and renewable energy systems such as solar panels and wind turbines.

## Geography
South of China

## Time period
The ore grade of fire refining process is the average level of the Chinese underground and open-pit mining from 2009 to 2013,

## Technology and included processes
Mining-Transportation- Heap leaching- Extraction-Electrolytic Refining

## Reference product
- Refined copper: 1000; software or database

## Inputs
All rows: software or database
- hard coal,hard coal,hard coal: 1790
  Coal
- crude oil; 42.3 MJ/kg: 91.2
  Crude oil
- natural gas; 44.1 MJ/kg: 12
  Natural gas
- Anode Plate: 15
  Anode Plate needs to be supplemented
- bauxite: 0.00596
  Bauxite
- Copper ore: 307000
- Extraction agent: 0.277
  Extraction agent needs to be supplemented
- water: 295
  Fresh water
- gravel: 0.784
  Gravel
- Limestone: 51.6
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
## Deviations from the LCI method approaches
The characterization factors related to pollution emission were derived from CML methodology

## Data selection and combination
The ore grade of fire refining process is the average level of the Chinese underground and open-pit mining from 2009 to 2013, and what was more, the real situation of ore grade in hydrometallurgical methods is taken into account[14]. Other data that were not available from the actual plant were sourced frompublished literature or calculated by mass balance, for instance,

## Data treatment and extrapolations
n this article, eleven indictors were selected to evaluate the effect of cathode copper production on environment and calculated through Simapro7.0.

## Use advice
This dataset, based on the production process of cathode copper from copper ore using hydrometallurgy in Southern China, reflects the average ore grade from 2009 to 2013. To properly apply this data, users must consider the system boundaries that encompass mining, transportation, heap leaching, extraction, and electrolytic refining. The data should only be applied in contexts that are consistent with the technological and temporal scope of the dataset. For environmental impact assessment, the functional unit is defined as the production of 1 ton of cathode copper, and appropriate indicators selected and evaluated using Simapro7.0 with CML methodology should be used.

## Review details
Inventory: The internal review was done by several iteration steps concerning raw data validation, raw data documentation, representativity, completeness and consistency of modelling with regard to ISO 14040 and 14044.

## Data sources
- Li, H., Gong, X. Z., Wang, Z. H. & Li, Y. Life Cycle Assessment of Cathode Copper Production. MSF 898, 2422–2431 (2017).
