# Molten steel production;Molten steel;EAF

Dataset: ILCD process, Unit process, single operation
Geography: CN
Classification: Unit processes / Materials production / Metals and semimetals
Generated by: Fuxiang, 1162850692@qq.com
Owner: Tiangong LCI Data Working Group
Review: Dependent internal review by Tiangong LCI Data Working Group
Amounts: no units in this file; such an amount is in the reference unit of its flow, which a separate flow dataset defines
copyright: false
licenseType: Free of charge for all users and uses

## General comment
This dataset represents the life cycle inventory (LCI) information for molten steel production via the Electric Arc Furnace (EAF) method. It is applicable in the context of assessing the environmental impacts of molten steel as a material used in the construction industry, automotive manufacturing, infrastructure projects, and other industrial applications that require high-strength structural materials.

## Geography
The LCI of Coal-DR is obtained, as shown in Table 9, based on the statistics of the demonstration project in China.

## Reference product
- Molten steel: 1023.4; calculated

## Inputs
All rows: calculated
- Coke breeze: 13.8
- Direct Reduced Iron: 1027.1
  DRI
- Iron scrap: 112.6
  Scrap steel/iron
- dolomite: 3.7
- quicklime: 44.9
  Quicklime
- Circulating water: 50600
- electrode: 2
  Electrode
- Electricity: 1764.36

## Outputs
- Slag: 187.5; calculated
- EAF Dust: 0.5; calculated

## Data treatment and extrapolations
LCI of COG-DR and H-DR routes, which is not scaled-up in China are estimated based on Coal-DR routes combined with literature data from simulations, laboratory tests, and process modeling in Table 9 [49,50]. The LCI of Coal-DR is obtai

## Use advice
Users of this dataset should take into account that the LCI data for molten steel production is specific to the EAF process and obtained from a demonstration project in China. When extrapolating data for Coal-Direct Reduction (Coal-DR) routes to obtain the LCI for Coke Oven Gas-Direct Reduction (COG-DR) and Hydrogen-Direct Reduction (H-DR) routes, users should be cautious and consider combining this dataset with additional data from literature, simulations, laboratory tests, and process modeling as indicated in Table 9. Care should also be taken when applying this data to contexts outside of China due to potential regional variations in technology and practice.

## Review details
Inventory: The internal review was done by several iteration steps concerning raw data validation, raw data documentation, representativity, completeness and consistency of modelling with regard to ISO 14040 and 14044.

## Data sources
- The carbon reduction potential of hydrogen in the low carbon transition of the iron and steel industry: The case of China
