# Foundation constriction ; Tower foundation constriction of 5 MW Turbine

Dataset: ILCD process, Unit process, single operation
Geography: SH-CN
Reference year: 2009
Classification: Unit processes / Systems / Construction
Functional unit: The functional unit is 1 kWh on-grid electricity provision.
LCI method principle: Attributional
LCI method approaches: Allocation
Generated by: Yunzhi Zhao, ll10088@163.com
Owner: Tiangong LCI Data Working Group
Review: Dependent internal review by Tiangong LCI Data Working Group
Amounts: no units in this file; such an amount is in the reference unit of its flow, which a separate flow dataset defines
copyright: false
licenseType: Free of charge for all users and uses

## General comment
The data set represents the construction process of the tower foundation for a 5 MW turbine at the Donghai Bridge Offshore Wind Farm (DBOWF), which is crucial for the establishment and operation of offshore wind energy generation. This process is applicable within the context of the wind farm's life cycle, which includes the phases of design, material procurement, construction, and maintenance of the wind farm infrastructure. The foundation serves as a critical component to ensure the stability and longevity of wind turbines that are to generate electricity for the grid.

## Geography
The studied wind farm, the Donghai Bridge Offshore Wind Farm (DBOWF), is China's first offshore wind farm within the jurisdiction of Shanghai, as well as the first offshore wind farm outside Europe. The project has two-phases of construction, located on each side of the Donghai bridge (Fig. 1).

## Reference product
- Wind tower foundation: 1000; measured

## Inputs
- Concrete: 3122.3
  Marine/Core concrete
- steel rebar: 375400
- Steel,Steel: 226000
  Steel
- Pile foundation steel pipe column: 1.4961e6
  Steel pipe column
- aluminium: 4900
  Al alloy

## Deviations from the LCI method approaches
The present study employed the PLCA modeling approach to calculate the energy and environmental emissions of a typical offshore wind farm in China. The cradle-to-grave process includes four stages, materials and equipment manufacturing, transportation and installation, operation and maintenance, and dismantling and recycling (Fig. 2).

## Data selection and combination
The technical parameters of wind turbines, foundations and cables are obtained from the design documents of the DBOWF (Table 2). The energy and emissions factors (i.e., the energy consumption and environmental emissions of per unit material and component production) are derived from the Ecoinvent 2.2 dataset (Ecoinvent Centre, 2009), and the coefficients of China's practices were preferentially referred. For key materials and equipment, their sea transportation energy is calculated from the transportation load and shipping energy intensity. The facility installation energy and emissions were estimated based on the construction plan. The wind farm's operation and maintenance data, such as the frequency and working time of maintenance, were obtained from site investigations with engineers and technicians. The uncertainties associated with model parameters and input data are illustrated in the sensitivity analysis section of this paper.

## Use advice
When using this data set, attention must be paid to the methodological fit for the intended application. Users should ensure that the technological context of the data (offshore wind farm environment in Shanghai's jurisdiction) corresponds to their application's setting. Allocation of environmental impacts should reflect the proportionate share of the foundation construction in the overall life cycle emissions of the wind turbine. Methodological considerations such as the inclusion of sea transportation energy must be accurately applied when assessing the environmental footprint of similar processes. Uncertainty and sensitivity analysis should be reviewed to understand the data's limitations and enable valid comparisons.

## Review details
Inventory: The internal review was done by several iteration steps concerning raw data validation, raw data documentation, representativity, completeness and consistency of modelling with regard to ISO 14040 and 14044.

## Data sources
- Yang, J. et al. The life-cycle energy and environmental emissions of a typical offshore wind farm in China. Journal of Cleaner Production 180, 316–324 (2018).
