# Hydrometallurgical recovery technology of Guangdong Bangpu Recycling Technology Co.

Dataset: ILCD process, Unit process, single operation
Geography: CN
Reference year: 2022
Classification: End-of-life treatment / Material recycling
Functional unit: Functional unit is a 12.717g used lithium battery
Generated by: Pengfei, pengfei24@email.ncu.edu.cn
Owner: Tiangong LCI Data Working Group
Review: Dependent internal review by Tiangong LCI Data Working Group
Amounts: no units in this file; such an amount is in the reference unit of its flow, which a separate flow dataset defines
copyright: false
licenseType: Free of charge for all users and uses

## General comment
The waste battery undergoes disassembly, dry pyrolysis, crushing and mechanical sorting, acid leaching, copper removal, iron and aluminum removal, rough extraction, fine extraction, and alkali aging to obtain a ternary precursor.

## Technology and included processes
In this process, the waste battery undergoes disassembly, dry pyrolysis, crushing and mechanical sorting, acid leaching, copper removal, iron and aluminum removal, rough extraction, fine extraction, and alkali aging to obtain a ternary precursor.

## Technical purpose
The hydrometallurgical recovery process detailed in this data set is employed for the recycling of used lithium batteries. During the process, the batteries are disassembled and go through dry pyrolysis, crushing, and mechanical sorting, followed by acid leaching, and the removal of copper, iron, and aluminum. The subsequent rough and fine extraction stages, along with alkali aging, result in the production of a ternary precursor. This precursor is commonly used in the manufacture of new lithium batteries, serving as a valuable resource in the battery supply chain.

## Reference product
- spent LIBs: 0.012717; input; measured
  Spent LIBs

## Inputs
All rows: measured
- sodium chloride: 0.00326
- process water: 14.6
- Sulfuric acid(98%): 2.22
  Sulfuric acid
- Hydrogen peroxide (30%): 0.0859
  Hydrogen peroxide
- Pulverized Iron: 0.0257
  Iron powder
- sodium hydroxide: 1.96
- Disooctyl Phosphate (P204): 69
  P2O4
- Sulfonated kerosene: 163
- Sodium sulfide: 0.0265
- Tributyl phosphate: 14.2
  TBP
- Manganese Sulfate Monohydrate: 0.198
  Manganese sulfate
- Ammonia (25%): 0.0011
  Ammonia
- process steam: 3.03
- Electricity: 0.33912

## Outputs
All rows: measured
- Dust (unspecified, from stack),Dust (unspecified, from stack): 6.77e-5
- sulphuric acid: 6.47e-5
- ammonium: 0.000667
- chemical oxygen demand: 0.00228
- nickel: 8.37e-7
- manganese: 1.15e-6
- zinc: 1.15e-6
- copper: 1.15e-6
- Ammonia Nitrogen: 0.00034
  Ammonia nitrogen
- Ternary precursor: 1.18

## Use advice
Users of this data set should note that the recovery process is specific to used lithium batteries and the functional unit reflects the output based on a 12.717g used lithium battery as input. The life cycle assessment should take into consideration the regional technological applicability and potential technological advancements in recycling. It is critical to address the allocation of environmental burdens in the case of multifunctional processes. Users must ensure that their system boundaries and assumptions align with these methodological considerations when utilizing the data for environmental impact studies or for developing eco-design strategies.

## Review details
Inventory: The internal review was done by several iteration steps concerning raw data validation, raw data documentation, representativity, completeness and consistency of modelling with regard to ISO 14040 and 14044.

## Data sources
- Lai, X. et al. Critical review of life cycle assessment of lithium-ion batteries for electric vehicles: A lifespan perspective. eTransportation 12, 100169 (2022).
