# Dried cephalopod products ; Fresh cephalopods ; Fresh dried/boil drying, dried with salt, dried with seasoning ; All sizes; NESPS2 / 头足类干制品 ; 鲜头足类 ; 生干/煮干、盐干、调味干 ; 所有规模所有规模 ; 全国第二次污染普查数据

Dataset: ILCD process, Unit process, single operation
Geography: CN
Reference year: 2019
Classification: Reference Parameters / Materials production / Food and renewable raw materials
Generated by: The data was created by the Office of the Second National Pollution Source Census of the Ministry of Ecology and Environment, and the data was organized by the TianGong Plan team for ILCD format / 生态环境部第二次全国污染源普查工作办公室创建数据，天工计划团队常慧敏整理数据为ILCD格式
Owner: Tiangong LCI Data Working Group / 天工LCI数据工作小组
Review: Dependent internal review by Tiangong LCI Data Working Group / 天工LCI数据工作小组
Amounts: no units in this file; such an amount is in the reference unit of its flow, which a separate flow dataset defines
copyright: false
licenseType: Free of charge for all users and uses

## General comment
the Technical of end-of-pipe management technology for pollution chemical oxygen demandis/，The formula for calculating the actual operation rate (k-value) of the end-of-pipe treatment facility is k = opreating time of treatment facilities (hours/year) / normal production time (hours/year)

## Technical purpose
该数据集涉及来自各种干燥方法的干制头足类产品，包括鲜干/煮干、盐干、调味干，适用于所有规模的生产。这种产品通常用于烹饪用途，例如小吃、烹饪原料或作为腌制的海产品。数据还包括处理头足类过程中水污染控制的尾端管理技术，即解决化学需氧量、氨氮、有机结合氮和总磷污染的技术。涉及的技术包括化学混凝、A2/O工艺（厌氧/缺氧/好氧）、SBR（序列批次反应器）、生物接触氧化、沉淀分离以及它们的组合。

## Reference product
- Cephalopod: 1000; calculated
  源文件中描述为为头足类干制品，此处对其进行了匹配工作，将其匹配到LCAflow库里面相最符合的流

## Outputs
All rows: calculated
- Waste water: 30000
  the Technical of end-of-pipe management technology for pollution Waste wateris/，The formula for calculating the actual operation rate (k-value) of the end-of-pipe treatment facility is /
  污染物指标工业废水量的末端治理技术是/，末端治理设施实际运行率（k值）计算公式为/。原文件中描述污染物类别为废水，污染物指标为工业废水量，此处对其进行了匹配工作，将其匹配到LCAflow库里面相最符合的流
- Ammonia Nitrogen: 0.10098
  the Technical of end-of-pipe management technology for pollution Ammonia NitrogenisChemical coagulation + A2/O process，Its Technical efficiency of end-of-pipe management98，The formula for calculating the actual operation rate (k-value) of the end-of-pipe treatment facility is /
  污染物指标氨氮的末端治理技术是化学混凝法+A2/O工艺，其效率为98，末端治理设施实际运行率（k值）计算公式为k=污水治理设施耗电量（千瓦时/年）/污水治理设施运行时间（小时/年）/污水治理设施总功率（千瓦）。原文件中描述污染物类别为废水，污染物指标为氨氮，此处对其进行了匹配工作，将其匹配到LCAflow库里面相最符合的流
- phosphorus, total: 0.2556
  the Technical of end-of-pipe management technology for pollution phosphorus, totalisChemical coagulation + A2/O process，Its Technical efficiency of end-of-pipe management85，The formula for calculating the actual operation rate (k-value) of the end-of-pipe treatment facility is /
  污染物指标总磷的末端治理技术是化学混凝法+A2/O工艺，其效率为85，末端治理设施实际运行率（k值）计算公式为k=污水治理设施耗电量（千瓦时/年）/污水治理设施运行时间（小时/年）/污水治理设施总功率（千瓦）。原文件中描述污染物类别为废水，污染物指标为总磷，此处对其进行了匹配工作，将其匹配到LCAflow库里面相最符合的流
- phosphorus, total: 0.852
  the Technical of end-of-pipe management technology for pollution phosphorus, totalisBio-contact oxidation process，Its Technical efficiency of end-of-pipe management50，The formula for calculating the actual operation rate (k-value) of the end-of-pipe treatment facility is /
  污染物指标总磷的末端治理技术是生物接触氧化法，其效率为50，末端治理设施实际运行率（k值）计算公式为k=污水治理设施耗电量（千瓦时/年）/污水治理设施运行时间（小时/年）/污水治理设施总功率（千瓦）。原文件中描述污染物类别为废水，污染物指标为总磷，此处对其进行了匹配工作，将其匹配到LCAflow库里面相最符合的流
- phosphorus, total: 0.852
  the Technical of end-of-pipe management technology for pollution phosphorus, totalisFloating separation + aerobic biological treatment，Its Technical efficiency of end-of-pipe management50，The formula for calculating the actual operation rate (k-value) of the end-of-pipe treatment facility is /
  污染物指标总磷的末端治理技术是上浮分离+好氧生物处理法，其效率为50，末端治理设施实际运行率（k值）计算公式为k=污水治理设施耗电量（千瓦时/年）/污水治理设施运行时间（小时/年）/污水治理设施总功率（千瓦）。原文件中描述污染物类别为废水，污染物指标为总磷，此处对其进行了匹配工作，将其匹配到LCAflow库里面相最符合的流
- phosphorus, total: 0.852
  the Technical of end-of-pipe management technology for pollution phosphorus, totalisFloating separation + SBR，Its Technical efficiency of end-of-pipe management50，The formula for calculating the actual operation rate (k-value) of the end-of-pipe treatment facility is /
  污染物指标总磷的末端治理技术是上浮分离+SBR类，其效率为50，末端治理设施实际运行率（k值）计算公式为k=污水治理设施耗电量（千瓦时/年）/污水治理设施运行时间（小时/年）/污水治理设施总功率（千瓦）。原文件中描述污染物类别为废水，污染物指标为总磷，此处对其进行了匹配工作，将其匹配到LCAflow库里面相最符合的流
- Ammonia Nitrogen: 1.0098
  the Technical of end-of-pipe management technology for pollution Ammonia NitrogenisFloating separation + aerobic biological treatment，Its Technical efficiency of end-of-pipe management80
  污染物指标氨氮的末端治理技术是上浮分离+好氧生物处理法，其效率为80，末端治理设施实际运行率（k值）计算公式为k=污水治理设施耗电量（千瓦时/年）/污水治理设施运行时间（小时/年）/污水治理设施总功率（千瓦）。原文件中描述污染物类别为废水，污染物指标为氨氮，此处对其进行了匹配工作，将其匹配到LCAflow库里面相最符合的流
- Ammonia Nitrogen: 1.0098
  the Technical of end-of-pipe management technology for pollution Ammonia NitrogenisFloating separation + SBR，Its Technical efficiency of end-of-pipe management80，The formula for calculating the actual operation rate (k-value) of the end-of-pipe treatment facility is /
  污染物指标氨氮的末端治理技术是上浮分离+SBR类，其效率为80，末端治理设施实际运行率（k值）计算公式为k=污水治理设施耗电量（千瓦时/年）/污水治理设施运行时间（小时/年）/污水治理设施总功率（千瓦）。原文件中描述污染物类别为废水，污染物指标为氨氮，此处对其进行了匹配工作，将其匹配到LCAflow库里面相最符合的流
- phosphorus, total: 1.0224
  the Technical of end-of-pipe management technology for pollution phosphorus, totalisChemical coagulation，Its Technical efficiency of end-of-pipe management40，The formula for calculating the actual operation rate (k-value) of the end-of-pipe treatment facility is /
  污染物指标总磷的末端治理技术是化学混凝法，其效率为40，末端治理设施实际运行率（k值）计算公式为k=污水治理设施耗电量（千瓦时/年）/污水治理设施运行时间（小时/年）/污水治理设施总功率（千瓦）。原文件中描述污染物类别为废水，污染物指标为总磷，此处对其进行了匹配工作，将其匹配到LCAflow库里面相最符合的流
- Ammonia Nitrogen: 1.26225
  the Technical of end-of-pipe management technology for pollution Ammonia NitrogenisBio-contact oxidation process，Its Technical efficiency of end-of-pipe management75，The formula for calculating the actual operation rate (k-value) of the end-of-pipe treatment facility is /
  污染物指标氨氮的末端治理技术是生物接触氧化法，其效率为75，末端治理设施实际运行率（k值）计算公式为k=污水治理设施耗电量（千瓦时/年）/污水治理设施运行时间（小时/年）/污水治理设施总功率（千瓦）。原文件中描述污染物类别为废水，污染物指标为氨氮，此处对其进行了匹配工作，将其匹配到LCAflow库里面相最符合的流
- phosphorus, total: 1.5336
  the Technical of end-of-pipe management technology for pollution phosphorus, totalisPrecipitation separation，Its Technical efficiency of end-of-pipe management10，The formula for calculating the actual operation rate (k-value) of the end-of-pipe treatment facility is /
  污染物指标总磷的末端治理技术是沉淀分离，其效率为10，末端治理设施实际运行率（k值）计算公式为k=1。原文件中描述污染物类别为废水，污染物指标为总磷，此处对其进行了匹配工作，将其匹配到LCAflow库里面相最符合的流
- phosphorus, total: 1.704
  the Technical of end-of-pipe management technology for pollution phosphorus, totalis/，The formula for calculating the actual operation rate (k-value) of the end-of-pipe treatment facility is /
  污染物指标总磷的末端治理技术是/，末端治理设施实际运行率（k值）计算公式为/。原文件中描述污染物类别为废水，污染物指标为总磷，此处对其进行了匹配工作，将其匹配到LCAflow库里面相最符合的流
- Ammonia Nitrogen: 4.0392
  the Technical of end-of-pipe management technology for pollution Ammonia NitrogenisChemical coagulation，Its Technical efficiency of end-of-pipe management20，The formula for calculating the actual operation rate (k-value) of the end-of-pipe treatment facility is /
  污染物指标氨氮的末端治理技术是化学混凝法，其效率为20，末端治理设施实际运行率（k值）计算公式为k=污水治理设施耗电量（千瓦时/年）/污水治理设施运行时间（小时/年）/污水治理设施总功率（千瓦）。原文件中描述污染物类别为废水，污染物指标为氨氮，此处对其进行了匹配工作，将其匹配到LCAflow库里面相最符合的流
- Ammonia Nitrogen: 4.5441
  the Technical of end-of-pipe management technology for pollution Ammonia NitrogenisPrecipitation separation，Its Technical efficiency of end-of-pipe management10，The formula for calculating the actual operation rate (k-value) of the end-of-pipe treatment facility is /
  污染物指标氨氮的末端治理技术是沉淀分离，其效率为10，末端治理设施实际运行率（k值）计算公式为k=1。原文件中描述污染物类别为废水，污染物指标为氨氮，此处对其进行了匹配工作，将其匹配到LCAflow库里面相最符合的流
- Ammonia Nitrogen: 5.049
  the Technical of end-of-pipe management technology for pollution Ammonia Nitrogenis/，The formula for calculating the actual operation rate (k-value) of the end-of-pipe treatment facility is /
  污染物指标氨氮的末端治理技术是/，末端治理设施实际运行率（k值）计算公式为/。原文件中描述污染物类别为废水，污染物指标为氨氮，此处对其进行了匹配工作，将其匹配到LCAflow库里面相最符合的流
- Nitrogen, organic bound: 5.4717
  the Technical of end-of-pipe management technology for pollution Nitrogen, organic boundisChemical coagulation + A2/O process，Its Technical efficiency of end-of-pipe management77，The formula for calculating the actual operation rate (k-value) of the end-of-pipe treatment facility is /
  污染物指标总氮的末端治理技术是化学混凝法+A2/O工艺，其效率为77，末端治理设施实际运行率（k值）计算公式为k=污水治理设施耗电量（千瓦时/年）/污水治理设施运行时间（小时/年）/污水治理设施总功率（千瓦）。原文件中描述污染物类别为废水，污染物指标为总氮，此处对其进行了匹配工作，将其匹配到LCAflow库里面相最符合的流
- Nitrogen, organic bound: 7.137
  the Technical of end-of-pipe management technology for pollution Nitrogen, organic boundisBio-contact oxidation process，Its Technical efficiency of end-of-pipe management70，The formula for calculating the actual operation rate (k-value) of the end-of-pipe treatment facility is /
  污染物指标总氮的末端治理技术是生物接触氧化法，其效率为70，末端治理设施实际运行率（k值）计算公式为k=污水治理设施耗电量（千瓦时/年）/污水治理设施运行时间（小时/年）/污水治理设施总功率（千瓦）。原文件中描述污染物类别为废水，污染物指标为总氮，此处对其进行了匹配工作，将其匹配到LCAflow库里面相最符合的流
- chemical oxygen demand: 7.41312
  the Technical of end-of-pipe management technology for pollution chemical oxygen demandisChemical coagulation + A2/O process，Its Technical efficiency of end-of-pipe management98，The formula for calculating the actual operation rate (k-value) of the end-of-pipe treatment facility is /
  污染物指标化学需氧量的末端治理技术是化学混凝法+A2/O工艺，其效率为98，末端治理设施实际运行率（k值）计算公式为k=污水治理设施耗电量（千瓦时/年）/污水治理设施运行时间（小时/年）/污水治理设施总功率（千瓦）。原文件中描述污染物类别为废水，污染物指标为化学需氧量，此处对其进行了匹配工作，将其匹配到LCAflow库里面相最符合的流
- Nitrogen, organic bound: 9.516
  the Technical of end-of-pipe management technology for pollution Nitrogen, organic boundisFloating separation + aerobic biological treatment，Its Technical efficiency of end-of-pipe management60，The formula for calculating the actual operation rate (k-value) of the end-of-pipe treatment facility is /
  污染物指标总氮的末端治理技术是上浮分离+好氧生物处理法，其效率为60，末端治理设施实际运行率（k值）计算公式为k=污水治理设施耗电量（千瓦时/年）/污水治理设施运行时间（小时/年）/污水治理设施总功率（千瓦）。原文件中描述污染物类别为废水，污染物指标为总氮，此处对其进行了匹配工作，将其匹配到LCAflow库里面相最符合的流
- Nitrogen, organic bound: 9.516
  the Technical of end-of-pipe management technology for pollution Nitrogen, organic boundisFloating separation + SBR，Its Technical efficiency of end-of-pipe management60，The formula for calculating the actual operation rate (k-value) of the end-of-pipe treatment facility is /
  污染物指标总氮的末端治理技术是上浮分离+SBR类，其效率为60，末端治理设施实际运行率（k值）计算公式为k=污水治理设施耗电量（千瓦时/年）/污水治理设施运行时间（小时/年）/污水治理设施总功率（千瓦）。原文件中描述污染物类别为废水，污染物指标为总氮，此处对其进行了匹配工作，将其匹配到LCAflow库里面相最符合的流
- Nitrogen, organic bound: 19.032
  the Technical of end-of-pipe management technology for pollution Nitrogen, organic boundisChemical coagulation，Its Technical efficiency of end-of-pipe management20，The formula for calculating the actual operation rate (k-value) of the end-of-pipe treatment facility is /
  污染物指标总氮的末端治理技术是化学混凝法，其效率为20，末端治理设施实际运行率（k值）计算公式为k=污水治理设施耗电量（千瓦时/年）/污水治理设施运行时间（小时/年）/污水治理设施总功率（千瓦）。原文件中描述污染物类别为废水，污染物指标为总氮，此处对其进行了匹配工作，将其匹配到LCAflow库里面相最符合的流
- Nitrogen, organic bound: 21.411
  the Technical of end-of-pipe management technology for pollution Nitrogen, organic boundisPrecipitation separation，Its Technical efficiency of end-of-pipe management10，The formula for calculating the actual operation rate (k-value) of the end-of-pipe treatment facility is k = opreating time of treatment facilities (hours/year) / normal production time (hours/year)
  污染物指标总氮的末端治理技术是沉淀分离，其效率为10，末端治理设施实际运行率（k值）计算公式为k=1。原文件中描述污染物类别为废水，污染物指标为总氮，此处对其进行了匹配工作，将其匹配到LCAflow库里面相最符合的流
- Nitrogen, organic bound: 23.79
  the Technical of end-of-pipe management technology for pollution Nitrogen, organic boundis/
  污染物指标总氮的末端治理技术是/，末端治理设施实际运行率（k值）计算公式为/。原文件中描述污染物类别为废水，污染物指标为总氮，此处对其进行了匹配工作，将其匹配到LCAflow库里面相最符合的流
- chemical oxygen demand: 55.5984
  the Technical of end-of-pipe management technology for pollution chemical oxygen demandisBio-contact oxidation process，Its Technical efficiency of end-of-pipe management85，The formula for calculating the actual operation rate (k-value) of the end-of-pipe treatment facility is k = opreating time of treatment facilities (hours/year) / normal production time (hours/year)
  污染物指标化学需氧量的末端治理技术是生物接触氧化法，其效率为85，末端治理设施实际运行率（k值）计算公式为k=污水治理设施耗电量（千瓦时/年）/污水治理设施运行时间（小时/年）/污水治理设施总功率（千瓦）。原文件中描述污染物类别为废水，污染物指标为化学需氧量，此处对其进行了匹配工作，将其匹配到LCAflow库里面相最符合的流
- chemical oxygen demand: 55.5984
  the Technical of end-of-pipe management technology for pollution chemical oxygen demandisFloating separation + aerobic biological treatment，Its Technical efficiency of end-of-pipe management85，The formula for calculating the actual operation rate (k-value) of the end-of-pipe treatment facility is /
  污染物指标化学需氧量的末端治理技术是上浮分离+好氧生物处理法，其效率为85，末端治理设施实际运行率（k值）计算公式为k=污水治理设施耗电量（千瓦时/年）/污水治理设施运行时间（小时/年）/污水治理设施总功率（千瓦）。原文件中描述污染物类别为废水，污染物指标为化学需氧量，此处对其进行了匹配工作，将其匹配到LCAflow库里面相最符合的流
- chemical oxygen demand: 55.5984
  the Technical of end-of-pipe management technology for pollution chemical oxygen demandisFloating separation + SBR，Its Technical efficiency of end-of-pipe management85，The formula for calculating the actual operation rate (k-value) of the end-of-pipe treatment facility is /
  污染物指标化学需氧量的末端治理技术是上浮分离+SBR类，其效率为85，末端治理设施实际运行率（k值）计算公式为k=污水治理设施耗电量（千瓦时/年）/污水治理设施运行时间（小时/年）/污水治理设施总功率（千瓦）。原文件中描述污染物类别为废水，污染物指标为化学需氧量，此处对其进行了匹配工作，将其匹配到LCAflow库里面相最符合的流
- chemical oxygen demand: 222.394
  the Technical of end-of-pipe management technology for pollution chemical oxygen demandisChemical coagulation，Its Technical efficiency of end-of-pipe management40，The formula for calculating the actual operation rate (k-value) of the end-of-pipe treatment facility is k = opreating time of treatment facilities (hours/year) / normal production time (hours/year)
  污染物指标化学需氧量的末端治理技术是化学混凝法，其效率为40，末端治理设施实际运行率（k值）计算公式为k=污水治理设施耗电量（千瓦时/年）/污水治理设施运行时间（小时/年）/污水治理设施总功率（千瓦）。原文件中描述污染物类别为废水，污染物指标为化学需氧量，此处对其进行了匹配工作，将其匹配到LCAflow库里面相最符合的流
- chemical oxygen demand: 296.525
  the Technical of end-of-pipe management technology for pollution chemical oxygen demandisPrecipitation separation，Its Technical efficiency of end-of-pipe management20，The formula for calculating the actual operation rate (k-value) of the end-of-pipe treatment facility is k = opreating time of treatment facilities (hours/year) / normal production time (hours/year)
  污染物指标化学需氧量的末端治理技术是沉淀分离，其效率为20，末端治理设施实际运行率（k值）计算公式为k=1。原文件中描述污染物类别为废水，污染物指标为化学需氧量，此处对其进行了匹配工作，将其匹配到LCAflow库里面相最符合的流
- chemical oxygen demand: 370.656
  the Technical of end-of-pipe management technology for pollution chemical oxygen demandis/，The formula for calculating the actual operation rate (k-value) of the end-of-pipe treatment facility is k = opreating time of treatment facilities (hours/year) / normal production time (hours/year)
  污染物指标化学需氧量的末端治理技术是/，末端治理设施实际运行率（k值）计算公式为/。原文件中描述污染物类别为废水，污染物指标为化学需氧量，此处对其进行了匹配工作，将其匹配到LCAflow库里面相最符合的流

## Use advice
This dataset is derived from the Pollution Source Census Report and contains information on pollution emissions and related products. However, it does not include data on energy or chemical consumption, nor does it provide information on waste or co-product generation. When utilizing this dataset, please supplement the missing data based on actual conditions before use
该数据集来源于污染源普查报告，包含污染物排放及相关产品信息，但不包含能源或化学品消耗数据，也不提供废弃物或共生产物产生信息。在使用该数据集时，请根据实际情况补充缺失数据后再使用。

## Review details
Inventory: The internal review was done by several iteration steps concerning raw data validation, raw data documentation, representativity, completeness and consistency of modelling with regard to ISO 14040 and 14044.
清单： 内部审查通过几个迭代步骤完成，涉及原始数据验证、原始数据记录、代表性、完整性、与 ISO 14040 和 14044 有关的建模的一致性。

## Data sources
- 第二次全国污染源普查产排污核算系数手册（试用版）,四级代码1362文件，在完整版文件中第2595页
