# Bauxite Mining ; Bauxite ; Cradle ; 2011

Dataset: ILCD process, Unit process, single operation
Geography: CN
Reference year: 2021
Classification: Unit processes / Materials production / Non-energetic raw materials
Generated by: Zimeng Cai, caizm6178@163.com
Owner: Tiangong LCI Data Working Group
Review: Dependent internal review by Tiangong LCI Data Working Group
Amounts: no units in this file; such an amount is in the reference unit of its flow, which a separate flow dataset defines
copyright: false
licenseType: Free of charge for all users and uses

## General comment
氧化铝生产2017

## Time period
Date of publication

## Technical purpose
The LCA data for bauxite mining and alumina production processes described are intended for use in environmental impact assessments of aluminum production chains. The primary application of this data is to model the environmental implications of extracting bauxite and converting it into alumina, which is a key intermediate in the production of aluminum metal. The data set can be used by industries and researchers focusing on the aluminum industry to understand and improve the sustainability of their production processes.

## Reference product
- bauxite: 4.30266e10; software or database

## Inputs
All rows: software or database
- electricity, high voltage, aluminium industry: 8.44992e7
  electricity
- other fuels: 2.08008e9
  electricity
- Coal, brown, in ground: 3.236e7
  coal
- natural gas, high pressure: 603000
  coal
- Gasoline: 1.3e6
  gasoline
- Diesel oil: 9.673e6
  diesel

## Data selection and combination
The data in this study refers to the LCA data of PA, SA, electricity, and other background data. The PA data were obtained from statistical data sources, and the SA data were mainly obtained from the literatures. The background data were mainly derived from the Chinese localization LCA database CAS RCEES 2018, which was established by the Research Center for Eco-Environmental Sciences, Chinese Academy of Sciences and covers LCA data for energy, materials, transportation, waste management etc.

## Use advice
When using this LCA data set, users should ensure the temporal and geographical relevance of the data to their specific project or assessment. Since the PA data originates from statistical sources and SA data from literature, users should consider their applicability and update them as necessary for present conditions. The background data from the CAS RCEES 2018 LCA database requires careful consideration regarding its alignment with the modeled system, especially in terms of energy, materials, transportation, and waste management. Users should also reference the publication date to evaluate the current relevance of the data and consider whether newer data sources are necessary for accurate impact modeling.

## Review details
Inventory: The internal review was done by several iteration steps concerning raw data validation, raw data documentation, representativity, completeness and consistency of modelling with regard to ISO 14040 and 14044.

## Data sources
- Ding, N., Liu, N., Lu, B. & Yang, J. Life cycle greenhouse gas emissions of aluminum based on regional industrial transfer in China. J. Ind. Ecol. 25, 1657–1672 (2021).
