# Aluminum blank foil (cathode) production ; 0.05 mm aluminum billet coil ; Aluminum ingot

Dataset: ILCD process, Unit process, single operation
Geography: JS-CN
Reference year: 2020
Classification: Unit processes / Materials production / Metals and semimetals
Generated by: Huimin Chang, huiminchang@tsinghua.edu.cn
Owner: Tiangong LCI Data Working Group
Review: Dependent internal review by Tiangong LCI Data Working Group
Amounts: no units in this file; such an amount is in the reference unit of its flow, which a separate flow dataset defines
copyright: false
licenseType: Free of charge for all users and uses

## General comment
铝空白箔（阴极）生产 ; 铝电解电容器（AEC）生产 ; 420V 680uf

## Time period
The investigated manufacturer produced about 1.183 billion AECs of all kinds in 2020.

## Technical purpose
The aluminum blank foil (cathode) produced in this process is used in the manufacture of aluminum electrolytic capacitors (AECs), which are components typically utilized in electronic circuits for smoothing, filtering, and energy storage purposes. The capacitors produced, rated at 420V, 680uf, can be deployed in various electronic devices for single unit processes that require high voltage and capacity.

## Reference product
- 0.05mm Al blank coil: 1000; measured
  0.05mm Al blank coil [kg] ; Production of Al blank foil (cathode)

## Inputs
All rows: measured
- electricity, high voltage, aluminium industry: 2204.08
  Electricity [kWh] ; Al smelting preparation (cathode)
- electricity, high voltage, aluminium industry: 111.046
  Electricity [kWh] ; Casting rolling (cathode)
- electricity, high voltage, aluminium industry: 186.804
  Electricity [kWh] ; Cold rolling 1 (cathode)
- electricity, high voltage, aluminium industry: 504.72
  Electricity [kWh] ; Intermediate annealing 1 (cathode)
- electricity, high voltage, aluminium industry: 1698.2
  Electricity [kWh] ; Cold rolling 2 (cathode)
- electricity, high voltage, aluminium industry: 180.36
  Electricity [kWh] ; Intermediate annealing 2 (cathode)
- electricity, high voltage, aluminium industry: 4310.82
  Electricity [kWh] ; Foil rolling (cathode)
- electricity, high voltage, aluminium industry: 467.64
  Electricity [kWh] ; Final annealing (cathode)
- aluminium, primary, ingot: 1020.41
  Al ingots (99.9%) [kg] ; Al smelting preparation (cathode)
- argon, liquid: 0.184
  Ar gas [kg] ; Al smelting preparation (cathode) 戳啦
- Graphitic lubricant: 0.032
  Graphitic lubricant [kg] ; Casting rolling (cathode)
- water, deionised: 2.56
  Deionized water [kg] ; Casting rolling (cathode)
- tap water: 1326.53
  Tap water [kg] ; Casting rolling (cathode)
- water, deionised: 12.092
  Deionized water [kg] ; Cold rolling 1 (cathode)
- heavy fuel oil: 0.387
  Rolling oil [kg} ; Cold rolling 1 (cathode)
- water, deionised: 362.747
  Deionized water [kg] ; Cold rolling 2 (cathode)
- heavy fuel oil: 11.608
  Rolling oil [kg} ; Cold rolling 2 (cathode)
- water, deionised: 725.494
  Deionized water [kg] ; Foil rolling (cathode)
- heavy fuel oil: 23.216
  Rolling oil [kg} ; Foil rolling (cathode)
- sodium hydroxide, without water, in 50% solution state: 31.8
  NaOH solution (30%) [kg] ; Final annealing (cathode)
- nitrogen, liquid: 1.29
  N2 gas[kg] ; Final annealing (cathode) flow错啦

## Outputs
All rows: measured
- aluminium scrap, new: 20.03
  Al scraps [kg] ; Al smelting preparation (cathode)
- Dust: 0.378
  Dust[kg] ; Al smelting preparation (cathode)
- wastewater, average: 2620.92
  Wastewater [kg] ; Production of Al blank foil (cathode)
- Chemical Oxygen Demand (COD): 0.183
  COD [kg] ; Production of Al blank foil (cathode)
- Suspended solids, unspecified: 0.183
  SS [kg] ; Production of Al blank foil (cathode)
- BOD5, Biological Oxygen Demand: 1.153
  BOD [kg] ; Production of Al blank foil (cathode)
- ammonia: 0.052
  NH3-N [kg] ; Production of Al blank foil (cathode)

## Data selection and combination
The inventory data of capacitor production come from the AECs’ production factory in Jiangsu Province, China. The cut-off criteria of LCI data collection for each process is coverage of at least 95% of the mass and energy of the input and output flows. The inventory data of anode foil production and cathode foil production is obtained based on the analysis of the manufacturing processes and corresponding process parameters. The upstream data (i.e., aluminum ingots, separator paper, transport, electricity, and water) are acquired from the Gabi software (Version: 10.6.1.35). In detail, the profile of Chineses electricity grid from the China Electric Power Yearbook adopts the reference year 2016. The reference year of aluminum ingot production is 2015. The inaccessible data about ammonium citrate, ammonium pentaborate, NH4H2PO4, and HBO3 are estimated based on chemical equations using the existing materials (reactants) in the Gabi software. The use and end-of-life stage inventory data are obtained based on analysis and calculation.

## Use advice
When using this LCA dataset, it is important to ensure that the conditions of the processes align with those detailed: the use of 0.05 mm aluminum billet coil and aluminum ingots in the production of AECs. The reference data for inputs like electricity should correspond to the profile of the Chinese grid for the year 2016, and aluminum ingot production should be based on the 2015 data. Exclude data not covering at least 95% of mass and energy inputs/outputs in the life cycle inventory (LCI). Estimations for inaccessible data on certain chemicals must be derived from related chemical equations via the Gabi software. For assessments of the use phase and end-of-life stages, analyses and respective calculations need to be performed to accurately reflect these stages in the life cycle of the product.

## Review details
Inventory: The internal review was done by several iteration steps concerning raw data validation, raw data documentation, representativity, completeness and consistency of modelling with regard to ISO 14040 and 14044.

## Data sources
- Zhang, C., Jing, J., Yun, L., Zheng, Y. & Huang, H. A cradle-to-grave life cycle assessment of high-voltage aluminum electrolytic capacitors in China. J. Clean. Prod. 370, (2022).
