# Aqueous phase catalytic reforming of biomass aviation fuel

Dataset: ILCD process, Unit process, black box
Geography: LN-CN
Classification: Energy carriers and technologies / Renewable fuels
Functional unit: 1 MJ aviation fuel
LCI method principle: Attributional
LCI method approaches: Allocation - gross calorific value
Generated by: Zhang Jingjing, 22110740027@m.fudan.edu.cn
Owner: Tiangong LCI Data Working Group
Review: Dependent internal review by Tiangong LCI Data Working Group
Amounts: no units in this file; such an amount is in the reference unit of its flow, which a separate flow dataset defines
licenseType: Free of charge for all users and uses

## General comment
The technology of catalytic aqueous reforming to prepare aviation oil mainly includes the following stages: 1 Biomass raw materials are processed through hydrolysis, stripping, and hydrogenation to obtain sugar platform compounds, mainly composed of sugar dehydration products such as furfural, levulinic acid, and 5-hydroxymethylfurfural. 2. These platform compounds obtain long-chain oxygen-containing compounds of C8-C16 through technologies such as acid catalyzed alkylation, alkali catalyzed condensation, and dehydration polymerization. The acid catalyzed condensation reaction utilizes acid catalysts, such as solid acids and zeolites, to convert alcohols, ketones, aldehydes, and acids into alkanes and isomers; Alkali condensation is the conversion of alcohols, ketones, and aldehydes into alkanes through direct catalytic condensation; Dehydration polymerization can be used to convert alcohols into long carbon chain alkanes. 3. The obtained oxygen-containing compounds contain a large amount of oxygen, which needs to be processed through processes such as hydrogenation decarboxylation, hydrogenation deoxygenation, and hydrocracking to further achieve oil quality improvement

## Geography
The research case of biomass catalyzed aqueous phase reforming to produce bio aviation oil mainly comes from relevant research conducted by Guangzhou Energy Research Institute. Guangzhou Energy Research Institute has completed experiments on catalytic water phase conversion of raw materials such as corn straw, sorghum, and cassava. A biomass catalytic water phase reforming experimental platform with an annual output of 100 tons has been built in Liaoning, and unit debugging and overall operation testing of the production system have been carried out

## Technical purpose
The technology described is employed in the production of biomass-based aviation fuel. The process transforms biomass raw materials, such as corn straw, sorghum, and cassava, into sugar platform compounds which are further processed to form long-chain oxygen-containing hydrocarbons suitable for aviation fuel through catalytic aqueous phase reforming. This biomass aviation fuel can be used as a sustainable alternative to traditional fossil-fuel-based aviation fuels when refined to meet the required quality standards.

## Reference product
- Electricity: 0.02664; input; calculated
  Preprocessing consumption

## Inputs
All rows: calculated
- sodium sulfate: 0.012
- water: 0.16
- Electricity: 0.02052
  Production process consumption
- sodium hydroxide: 0.00058
- sodium sulfate: 0.00081
  Condensation process consumption
- Electricity: 0.00576
  Condensation process consumption
- Electricity: 0.01548
  hydrocracking

## Outputs
- waste water - untreated: 0.012; calculated
  Production process output
- waste water - untreated: 0.0022; calculated
  Condensation stage output
- carbon monoxide: 6.6e-5; calculated
  Jet fuel combustion output
- hydrocarbons (unspecified): 6.8e-6; calculated

## Deviations from the LCI method approaches
Allocate environmental impact values according to energy allocation, that is, during the emission allocation process, allocate the energy of aviation fuel and other fuels to each MJ of aviation fuel production

## Use advice
When using the provided LCA data for this biomass aviation fuel process, allocate environmental impacts based on the energy content distribution between the bio aviation fuel and other fuels. Consider also the technology's scalability and the potential difference in environmental impacts when transitioning from the experimental platform to larger scale production. Factor this into any assessments or decisions made using this data, ensuring the LCA reflects both direct and indirect environmental aspects as accurately as possible.

## Review details
Inventory: The internal review was done by several iteration steps concerning raw data validation, raw data documentation, representativity, completeness and consistency of modelling with regard to ISO 14040 and 14044.

## Data sources
- 朱啸南. 基于生命周期评价的生物航油制备及利用对环境的影响研究. (浙江大学, 2022).
