# Pistachio production

Dataset: ILCD process, Unit process, black box
Geography: GR
Reference year: 2017
Valid until: 2018
Classification: Unit processes / Materials production / Food and renewable raw materials
Functional unit: 1 ha
Generated by: zhu xian, zzhu0918@163.com
Owner: Tiangong LCI Data Working Group
Review: Dependent internal review by Tiangong LCI Data Working Group
Amounts: no units in this file; such an amount is in the reference unit of its flow, which a separate flow dataset defines
copyright: false
licenseType: Free of charge for all users and uses

## General comment
cultivate pistachio seedlings and harvest pistachios by artificial or mechanical means, transplanting and applying fertilizers or pesticides

## Geography
Aegina is located approximately 16.5 miles south of Athens and is the second largest island of the Saronic Gulf (after Salamis) with a total surface area of 87 km2 .

## Technical purpose
The technical usage of data described is for pistachio production from cultivated pistachio seedlings. It includes artificial or mechanical transplanting, fertilization, and pesticide application processes on the Aegina Island, which is a significant area for pistachio farming due to its geographical features and climatic conditions suitable for pistachio growth.

## Reference product
- Pistachio: 2500; measured

## Inputs
All rows: measured
- Nitrogenous fertilizer: 230
- Phosphate fertilizer: 70
- Potassium fertilizer: 200
- water: 4450
- Electricity: 2600
- Diesel: 0.435

## Use advice
When utilizing this pistachio production data set, users should consider the local agricultural practices and conditions reflected in the dataset, such as the specific method of cultivation, transplanting techniques, fertilization, and pesticide application unique to the Aegina Island's environment. The data set represents a 'black box' unit process and may not account for variations in environmental impacts from transportation or different agricultural practices not specific to the Aegina Island. Users are advised to account for such factors if extrapolating data for use in other geographical contexts.

## Review details
Inventory: The internal review was done by several iteration steps concerning raw data validation, raw data documentation, representativity, completeness and consistency of modelling with regard to ISO 14040 and 14044.
