# Electricity production ; Thermal power ; Hubei

Dataset: ILCD process, Unit process, single operation
Geography: HUB-CN
Reference year: 2019
Classification: Unit processes / Energy carriers and technologies / Electricity
Generated by: Ruoxi Xiong, xiongrx0126@163.com
Owner: Tiangong LCI Data Working Group
Review: Dependent internal review by Tiangong LCI Data Working Group
Amounts: no units in this file; such an amount is in the reference unit of its flow, which a separate flow dataset defines
copyright: false
licenseType: Free of charge for all users and uses

## General comment
Thermal power generation includes seventeen fossil fuels such as raw coal, washed coal, oil and natural gas. The process only considers the direct power generation process, not the upstream raw material extraction and processing and the downstream power consumption

## Time period
Calculated based on data from the 2019 Energy Statistics Yearbook

## Technical purpose
This thermal power generation process uses seventeen types of fossil fuels including raw coal, washed coal, oil, and natural gas to produce electricity. It is intended for the direct generation of electricity within the Hubei region's power grid. This process is applicable mainly to power sectors requiring a consistent and high demand of energy generation.

## Reference product
- electricity for thermal power: 3.6; calculated

## Inputs
All rows: calculated
- Raw coal: 0.364364
- Coke oven gas: 0.00015
- blast furnace gas: 0.073057
- Diesel: 5.306e-5
- fuel oil, unspecified: 6.8e-6
- Petroleum Coke: 7.687e-5
- refinery gas: 1.565e-5
- natural gas: 0.004551

## Outputs
- carbon dioxide (fossil): 0.742687; calculated
- sulfur dioxide: 0.000123665; calculated
- Nitrogen oxides: 0.000197861; calculated
- particles (> PM10): 2.50717e-5; calculated

## Data treatment and extrapolations
For the accounting method, please refer to the "Enterprise Greenhouse Gas Emissions Accounting Methods and Reporting Guidelines for Power Generation Facilities". Different forms of power generation and fuel consumption come from Chapter 3 (Energy Production) and Chapter 6 (Regional Energy Balance Sheet) in the "China Energy Statistical Yearbook 2020". The fuel parameters such as low calorific value and carbon content per unit calorific value used to calculate the carbon dioxide emission factor come from the "2019 China Regional Power Grid Carbon Dioxide Baseline Emission Factor Calculation Instructions OM" and the "Enterprise Greenhouse Gas Emission Accounting Method and Reporting Guide for Power Generation Facilities" 》

## Use advice
When utilizing this data set, consideration must be given to its scope which includes only the direct electricity generation using fossil fuels. This data excludes the upstream processes of raw material extraction and processing, as well as the downstream electricity consumption. For accurate life cycle assessment and carbon footprint calculations, refer to the 'Enterprise Greenhouse Gas Emissions Accounting Methods and Reporting Guidelines for Power Generation Facilities' for methodology. Users should base their analysis on energy consumption and carbon emissions within the context of the year 2019 using the values from '2019 China Regional Power Grid Carbon Dioxide Baseline Emission Factor Calculation Instructions OM' and energy production data from 'China Energy Statistical Yearbook 2020'.

## Review details
Inventory: The internal review was done by several iteration steps concerning raw data validation, raw data documentation, representativity, completeness and consistency of modelling with regard to ISO 14040 and 14044.

## Data sources
- 熊若熙. 中国电力生产和消费二氧化碳与污染物排放因子核算. (清华大学, 2023).
