# Treated borehole waste soil ; Groundwater in-situ remediation ; Enhanced bioremediation; Well construction

Dataset: ILCD process, Unit process, single operation
Geography: SH-CN
Reference year: 2020
Classification: Unit processes / Other Services / Repair and maintenance
Generated by: Xiao Meng, xiaomeng@mail
Owner: Tiangong LCI Data Working Group
Review: Dependent internal review by Tiangong LCI Data Working Group
Amounts: no units in this file; such an amount is in the reference unit of its flow, which a separate flow dataset defines
copyright: false
licenseType: Free of charge for all users and uses

## General comment
CHC+ISB is used for site remediation, and during the construction preparation phase, the drilling waste soil is disposed of.

## Geography
The aquifer in a certain area in Shanghai, China, is uniformly contaminated with chlorinated volatile organic compounds (CVOCs), with a surface area of 20,000 m2 and a depth of 50 m, with the water table located at a depth of 30 m.

## Technical purpose
The industrial process detailed here involves the treatment of borehole waste soil, groundwater in-situ remediation, and enhanced bioremediation with well construction for site clean-up. CHC+ISB (Combined Hydrocarbon and In Situ Bioremediation) is specifically used during the construction preparation phase to dispose of drilling waste soil. This process is applicable for remediating aquifers contaminated with chlorinated volatile organic compounds (CVOCs), particularly in regions where the pollution encompasses a significant area, such as the specified 20,000 m2 surface area and 50 m depth in Shanghai, China.

## Reference product
- Treated borehole waste soil: 490270; calculated
  处理完成的钻井废弃土

## Inputs
- Concrete: 2206.25; software or database
- Steel: 147.08; software or database
- Polyethylene,Polyethylene: 11.28; software or database
- polyvinylchloride resin (B-PVC): 1.47; software or database
- gravel: 10786.1; software or database
- Electricity: 2117.99; software or database
- Diesel: 524.6; software or database
- Waste (solid): 490270; calculated
  544口井产生的钻孔废土

## Use advice
Users of this dataset should note the specific conditions under which the data was collected, relating to the contaminated area in Shanghai, China. Applicability to other sites will depend on similar contamination profiles and geophysical characteristics. It is critical to consider the depth of the water table and the spread of CVOCs when modeling the use phase behavior. Methodologically, users must ensure that similar on-site conditions are present if applying this data to other locations. Additionally, the scope of this process should consider local regulations regarding drilling waste disposal and environmental protection standards.

## Review details
Inventory: The internal review was done by several iteration steps concerning raw data validation, raw data documentation, representativity, completeness and consistency of modelling with regard to ISO 14040 and 14044.

## Data sources
- Ni, Z. et al. Comparative Life-Cycle Assessment of Aquifer Thermal Energy Storage Integrated with in Situ Bioremediation of Chlorinated Volatile Organic Compounds. Environ. Sci. Technol. 54, 3039–3049 (2020).
