# Iron ore mining ; iron ore ; Beneficiation/ore

Dataset: ILCD process, Unit process, single operation
Geography: CN
Reference year: 2006
Classification: Materials production / Non-energetic raw materials
Generated by: Wanghuanyu, wanghuanyu00@126.com
Owner: Tiangong LCI Data Working Group
Review: Dependent internal review by Tiangong LCI Data Working Group
Amounts: no units in this file; such an amount is in the reference unit of its flow, which a separate flow dataset defines
licenseType: Free of charge for all users and uses

## General comment
This dataset pertains to the process of iron ore mining and beneficiation at a Z3 facility, which involves the extraction and processing of iron ores for use in various stages of the steel manufacturing industry. The beneficiated ore is primarily intended for use in large-scale steel production processes that serve as fundamental components for construction, automotive, electrical, and various heavy industries.

## Geography
Z3工厂同一名称的工艺过程

## Reference product
- iron: 0.26; measured
  z08

## Inputs
- iron: 2811; measured
  t/t z08
- Water (fresh water): 4170; measured
  t/t z08
- Electricity: 87.804; measured
  kwh/t z08

## Outputs
- Radioactive tailings: 3087, 1541 (2 entries); measured
  t/t z08
- Flue dust: 1.588; measured
  kg/t z08
- Tailings (deposited, hibernating in ground, non elementary flow): 1541; measured
  t/t z08

## Use advice
Users of this dataset should account for regional variations in iron ore mining practices and technologies when applying the data to specific situations. It is important to consider the energy consumption and emissions related to the beneficiation process as well and to include those in the assessment. The dataset does not automatically account for end-of-life recycling and should therefore be accompanied by proper modelling of steel recyclability where appropriate. It is assumed that the data is representative of the technological applicability of current Z3 facility practices, and users should verify its relevance to future-oriented assessments.

## Review details
Inventory: The internal review was done by several iteration steps concerning raw data validation, raw data documentation, representativity, completeness and consistency of modelling with regard to ISO 14040 and 14044.

## Data sources
- 刘微. LCI数据质量体系中的分析方法研究. (北京工业大学, 2006).
