# The production of MDF ; Medium-density fiberboard (MDF) ; Hybrid-modified ammonium lignosulfonate (HMAL) as the binder

Dataset: ILCD process, Unit process, single operation
Geography: HRB-HLJ-CN
Reference year: 2017
Classification: Materials production / Other materials
LCI method principle: Attributional
LCI method approaches: Allocation
Generated by: Wanyue Tan, wytan9@student.ubc.ca
Owner: Tiangong LCI Data Working Group
Review: Dependent internal review by Tiangong LCI Data Working Group
Amounts: no units in this file; such an amount is in the reference unit of its flow, which a separate flow dataset defines
copyright: false
licenseType: Free of charge for all users and uses

## General comment
In this paper, the functional unit is 1 m3 of finished MDF, which has an average density of 0.86 g/cm3 , with nominal width of 1220 mm. The board thickness is 5 mm and a moisture content of ~8%. However, an alternative MDF, manufactured using a novel lignin-based binder, namely MDF, made from hybrid-modified industrial lignin and wood fiber (HMAL/WF), is evaluated in this study.

## Geography
The stage for the supply of raw materials includes the manufacturing of wood fibers and ammonium lignosulfonate (AL) and the use of energy, water, and other materials during the processing of the fibers. The main sources of biomass are wood fibers consisting of a blend of softwood and hardwood fibers from different species. The wood fibers are transported by a truck from the Greater Khingan Range Hengyou Furniture Co., Ltd. All auxiliary materials used are commercial and purchased from different suppliers. In the production of HMAL/WF, the main material for the HMAL production is AL, which is purchased from Shenyang Xingzhenghe Chemical Co., Ltd. For the conventional MDF process, only fossil-based UF resin that is used is different than that of HMAL/WF production. The inventory data for the resin manufacturing stage consist of a primary average data, obtained from a chemical company in China. The northeast region is abundant in wood resources. According to a Chinese Forestry Administration report (2014), the production in the northeast forest industry reached 18% of the total production (~75 billion dollars) in China. For the preliminary research, Harbin, an urban region in the Northeast, is set as a representative. In board manufacturing stage, a representative factory with an approximate production capacity of 150,000 m3 /year is selected for a detailed study of the process.

## Technology and included processes
The general steps in the production of HMAL/WF are similar to the conventional MDF process. The wood fibers are mixed with different proportions of HMAL binder and pre-pressed to form a mat at a moisture content of ~20%, which promotes a good natural fiber to fiber inter-felting and bonding with the lignin-based binder. Then, the fiber mat is hot-pressed at 170 °C for 420 s using a mechanically controlled oil-heated press for the final board formation.

## Technical purpose
This dataset applies to the production of medium-density fiberboard (MDF) utilizing hybrid-modified ammonium lignosulfonate (HMAL) as a binder. It can be beneficial for entities focused on eco-friendly construction and furniture manufacturing industries. This material can be applied to products that require a sustainable wood composite, such as home furnishings, office furniture, and flooring products, as it presents an alternative to traditional MDF using fossil-based UF resin binders.

## Reference product
- medium density fiberboard: 817; measured
  This is the output flow called "HMAL/WF finished (8% moisture)" in the paper.

## Inputs
- Wood, primary forest, standing: 1316; measured
  The "wood, primary forest, standing" is selected here, which substitutes for the "green chips (50% water content)" in the paper.
- lignosulfonic acid, ammonium salt: 154.2; article inperiodical
- hydrogen peroxide: 98.7; software or database
  In the paper, the hydrogen peroxide belongs to the input flow, but here, it only could be selected as "Emissions".
- Paraffins: 5.24; article inperiodical
  The "Paraffins" is selected here, which substitutes for the "Paraffin emulsion" in the paper.
- electricity: 912.5; software or database
- Energy, gross calorific value, in biomass, primary forest: 3450; software or database
  The "Energy, gross calorific value, in biomass, primary forest" is selected here, which substitutes for the "Energy from biomass" in the paper.
- transport in t*km: 58; article inperiodical
  This is the input flow called the 4–5-t truck in the paper.
- transport in t*km: 146; software or database
  This is the input flow called the 12–14-t truck in the paper.

## Outputs
- carbon dioxide: 105.2
- carbon monoxide: 0.43
- Nitrogen oxides: 3.2
- sulfur dioxide: 0.16
- non-methane volatile organic compounds: 0.03
- Dust (unspecified, from stack): 104.9
  The "Dust (unspecified, from stack)" is selected here, which substitutes for "Sand down dust" in the paper. This output flow in the paper belongs to the emission to the soil, but the database only has the "Emissions to air" flow.
- soft wood (dry matter): 0.47
  The "soft wood (dry matter)" is selected here, which substitutes for the "Filterable matter" in the paper.

## Data selection and combination
The inventory data for the foreground (the production of HMAL/WF and conventional MDF), including the material consumption involved in board manufacture, were mainly collected from companies that represent the current domain fiberboard technologies in China. The environmental emission sources were dryers, pressess, mat formers, the biomass boilers, and finishing operations. All emission data were field data corresponding to board manufacturing subsystem, which were estimated according to the emission factors reported by the Ministry of Environmental Protection (MEP) of China (MEP of China 2006). For material transportation, the average distance between the country of origin of the raw materials and the country for the special product is taken from references (Chen et al. 2015). The production process of AL and average data for the representative process from a Chinese chemical company are taken from the reference (Ma et al. 2004). Auxiliary processes include electricity, thermal energy, hydrogen peroxide (H2O2) production (aqueous 50 wt%), paraffin production, and diesel were taken from the Ecoinvent database using China-specific data.

## Use advice
When utilizing this dataset for life cycle assessment (LCA) calculations, users should take note that the inventory data provided only covers the industrial manufacturing phase, excluding the use and end-of-life stages due to lack of data. Consequently, for comprehensive LCA studies, additional data on the application and disposal phases would need to be acquired separately. Moreover, material transport specifics and auxiliary process energy requirements sourced from the Ecoinvent database should be accurately applied within the regional context. The inclusion of the production and maintenance of capital goods is not covered in this dataset and should be considered minimal in comparison to operational emissions.

## Review details
Inventory: The internal review was done by several iteration steps concerning raw data validation, raw data documentation, representativity, completeness and consistency of modelling with regard to ISO 14040 and 14044.

## Data sources
- Yuan, Y. & Guo, M. Do green wooden composites using lignin-based binder have environmentally benign alternatives? A preliminary LCA case study in China. Int J Life Cycle Assess 22, 1318–1326 (2017).
