# Chemical treatment for Al (including remelting phase), Ag and Si;Al (including remelting phase), Ag and Si;Chemical treatment

Dataset: ILCD process, Unit process, single operation
Geography: CN
Classification: Unit processes / Materials production / Inorganic chemicals
Generated by: Nan Wang, 1209824595@qq.com
Owner: Tiangong LCI Data Working Group
Review: Dependent internal review by Tiangong LCI Data Working Group
Amounts: no units in this file; such an amount is in the reference unit of its flow, which a separate flow dataset defines
copyright: false
licenseType: Free of charge for all users and uses

## General comment
The remaining silicon metal and the other dissolved metals in theacid solution are successively treated.The recycling framework is shown in Fig. 5. Glass need to be remelted, EVA (Ethylene Vinyl Acetat) need thermal treatment, and aluminum need remetling and chemical treatment before they may substitute virgin materials in the module assembling process. Meanwhile, chemical treatment is necessary for silicon and silver before recycling in polysilicon production and multi-Si PV cell respectively.

## Technical purpose
The described process involves the chemical treatment of aluminum (Al), silver (Ag), and silicon (Si) for recycling purposes. The aluminum undergoes remelting and chemical treatment to enable its use as a substitute for virgin materials during the module assembling process in photovoltaic (PV) production. Similarly, chemical treatment is essential for the recycling of silicon in polysilicon production and for silver in the manufacturing of multi-Si PV cells. This process is specifically geared towards PV industry applications, supplying recycled high-purity materials for use in solar module manufacturing.

## Reference product
- aluminium: 10.3; software or database

## Inputs
All rows: software or database
- Al 12.7kg；Si 2.5kg；Ag 0.027kg: 15.227
  Al, Si, Ag（Al 12.7kg；Si 2.5kg；Ag 0.027kg）
- sodium nitrate: 0.0223; uniform
- sodium hydroxide: 5.5; uniform
- Standard coal: 5.1
- Hydrofluoric acid: 1.2; uniform

## Outputs
All rows: software or database
- Silicon: 2
- silver: 0.024
- Nitric oxide: 0.0121
  NO
- Sodium silicate: 5.83
  NaSiO2 Sodium silicate
- sulfur dioxide: 2.02
- Nitrogen oxides: 2.54
- carbon dioxide: 2.59
- hydrogen: 0.97
- ammonium: 0.97

## Data selection and combination
The inventory data of the multi-Si PV modules are collectedfrom several sources: (1) Literatures including Fu (2013), whichcontain material inventory of several photovoltaic enterprises inJiangsu province; Diao and Shi (2011), which contain materialinventory of two photovoltaic enterprises in Beijing; He (2013),which contain material inventory of four photovoltaic enterprisesin Gansu and Sichuan province. (2) Environment Impact Assessment Statements (EIAS) of multi-Si PV production companies fromSichuan (EIAS-Sichuan, 2008), Henan (EIAS-Henan, 2009) andChongqing (EIAS-Chongqing, 2008). (3) Industry report of marketforesight and investment prospect for China’s photovoltaicdevelopment (2014) and Industrial report of market foresightand investment prospect for China’s polysilicon development(2014). The mean value is applied when there are different datasources for specific materials.

## Use advice
When using the LCA data for the described chemical treatment process, ensure that it is applied to scenarios involving the recycling of Al, Ag, and Si in the context of PV module manufacturing. Use the data in line with environmental impact assessments and industry reports for the polysilicon and PV sectors in China. If multiple data sources provide inventory information for the same material, utilize the average values to align with the methodological framework outlined in the described process. The inventory data sets should be regularly updated to reflect the latest industry practices and input from multiple photovoltaic enterprises.

## Review details
Inventory: The internal review was done by several iteration steps concerning raw data validation, raw data documentation, representativity, completeness and consistency of modelling with regard to ISO 14040 and 14044.

## Data sources
- Huang, B. et al. Environmental influence assessment of China’s multi-crystalline silicon (multi-Si) photovoltaic modules considering recycling process. Solar Energy 143, 132–141 (2017).
