# waste NCM111 cell hydrometallurgical recycling process

Dataset: ILCD process, Unit process, single operation
Geography: CN
Reference year: 2021
Classification: Unit processes / End-of-life treatment / Material recycling
Functional unit: In this research, we presume the average weight of EVs’ LiBs is 300 kg.
Generated by: maqingyuan, m1120498928@163.com
Owner: Tiangong LCI Data Working Group
Review: Dependent internal review by Tiangong LCI Data Working Group
Amounts: no units in this file; such an amount is in the reference unit of its flow, which a separate flow dataset defines
copyright: false
licenseType: Free of charge for all users and uses

## General comment
Waste LiB recycling operators will discharge the LiBs first (under 2.75 V) and will dismantle the battery packs to battery cells. Dismantled LiB cells will be soaked in NaOH solution to separate copper foil from cathodes and anodes. After that, the LiB cells will be put into HAc solution to separate cathodes and anodes. The cathodes will be soaked in acetone solution, then the mixture of cathodes and acetone solution will be filtered and dried, and battery materials will be recycled in this process.

## Technical purpose
This hydrometallurgical recycling process is intended for the recovery of materials from spent NCM111 lithium-ion batteries (LiBs) specifically designed for electric vehicle (EV) applications. The recycled materials, such as lithium, nickel, cobalt, and manganese, are typically used to manufacture new battery cells or for other applications that require high purity chemicals.

## Reference product
- Cathode Material: 218; input; missing unimportant

## Inputs
- Sodium Hydroxide solution（1mol/L）: 20; missing unimportant
- Acetic acid solution(3mol/L): 294; missing unimportant
- Acetone solution(5mol/L): 125; missing unimportant

## Outputs
All rows: missing unimportant
- nickel: 20
- cobalt: 20
- lithium: 12
- manganese: 20
- aluminium: 17
- copper: 33
- Anodes (used): 47
- industrial waste (unspecified): 471
- Waste (solid): 10.5
- packaging waste (plastic): 6.5

## Use advice
When utilizing data from this wet recycling process of waste NCM111 cells, ensure that the focus is on the intended application of EV battery recycling. Data users should consider the average weight of EV LiBs as indicated (300 kg) for assessments and extrapolations. Attention should be paid to the chemical purity and the completeness of separation during the recycling phases. Exclusion or inclusion of upstream impacts, such as emissions associated with chemical reagent production used in the process, should be carefully considered in the analysis.

## Review details
Inventory: The internal review was done by several iteration steps concerning raw data validation, raw data documentation, representativity, completeness and consistency of modelling with regard to ISO 14040 and 14044.

## Data sources
- Wang, S. & Yu, J. A comparative life cycle assessment on lithium-ion battery: Case study on electric vehicle battery in China considering battery evolution. WASTE MANAGEMENT & RESEARCH 39, 156–164 (2021).
