# Electricity production ; Thermal power ; Jiangsu

Dataset: ILCD process, Unit process, single operation
Geography: JS-CN
Reference year: 2019
Classification: Unit processes / Energy carriers and technologies / Electricity
Generated by: Ruoxi Xiong, xiongrx0126@163.com
Owner: Tiangong LCI Data Working Group
Review: Dependent internal review by Tiangong LCI Data Working Group
Amounts: no units in this file; such an amount is in the reference unit of its flow, which a separate flow dataset defines
copyright: false
licenseType: Free of charge for all users and uses

## General comment
Thermal power generation includes seventeen fossil fuels such as raw coal, washed coal, oil and natural gas. The process only considers the direct power generation process, not the upstream raw material extraction and processing and the downstream power consumption

## Time period
Calculated based on data from the 2019 Energy Statistics Yearbook

## Technical purpose
The data represents the electricity production process in Jiangsu province using thermal power techniques, which involve the direct generation of electricity from an array of seventeen different fossil fuels, including raw coal, washed coal, oil, and natural gas. This process is applicable in scenarios where there's a need for regional energy production baselines, specifically when considering the direct phase of electricity generation without accounting for the lifecycle emissions from raw material extraction and processing or the emissions related to power consumption.

## Reference product
- electricity for thermal power: 3.6; calculated

## Inputs
All rows: calculated
- Raw coal: 0.337569
- Other Washed Coal: 6.677e-5
- Coke oven gas: 0.000156
- blast furnace gas: 0.007469
- Converter gas: 0.002471
- Diesel: 3.479e-5
- fuel oil, unspecified: 2.8e-6
- Petroleum Coke: 0.00153501
- natural gas: 0.011672
- Natural gas, liquefied: 1.6e-6

## Outputs
- carbon dioxide (fossil): 0.784229; calculated
- sulfur dioxide: 0.000122558; calculated
- Nitrogen oxides: 0.000199315; calculated
- particles (> PM10): 2.61889e-5; calculated

## Data treatment and extrapolations
For the accounting method, please refer to the "Enterprise Greenhouse Gas Emissions Accounting Methods and Reporting Guidelines for Power Generation Facilities". Different forms of power generation and fuel consumption come from Chapter 3 (Energy Production) and Chapter 6 (Regional Energy Balance Sheet) in the "China Energy Statistical Yearbook 2020". The fuel parameters such as low calorific value and carbon content per unit calorific value used to calculate the carbon dioxide emission factor come from the "2019 China Regional Power Grid Carbon Dioxide Baseline Emission Factor Calculation Instructions OM" and the "Enterprise Greenhouse Gas Emission Accounting Method and Reporting Guide for Power Generation Facilities" 》

## Use advice
Users of this data set should reference the 'Enterprise Greenhouse Gas Emissions Accounting Methods and Reporting Guidelines for Power Generation Facilities' when considering the emission factors and methodology for accounting. It is important to use data specifically from Chapter 3 (Energy Production) and Chapter 6 (Regional Energy Balance Sheet) of the 'China Energy Statistical Yearbook 2020', and apply the parameters such as low calorific value and carbon content per unit calorific value for CO2 emission factor calculations. Note that this data set does not include emissions associated with upstream raw material extraction and processing or downstream power consumption, and should not be used for lifecycle assessments that require these elements.

## Review details
Inventory: The internal review was done by several iteration steps concerning raw data validation, raw data documentation, representativity, completeness and consistency of modelling with regard to ISO 14040 and 14044.

## Data sources
- 熊若熙. 中国电力生产和消费二氧化碳与污染物排放因子核算. (清华大学, 2023).
