# Blade manufacture ; Rotors blade (Three) of a 1.5 MW wind turbine

Dataset: ILCD process, Unit process, single operation
Geography: NMG-CN
Reference year: 2017
Classification: Unit processes / Materials production / Other materials
Functional unit: The functional unit is 1.5 MW wind turbine
LCI method principle: Attributional
LCI method approaches: Allocation
Generated by: Yunzhi Zhao, ll10088@163.com
Owner: Tiangong LCI Data Working Group
Review: Dependent internal review by Tiangong LCI Data Working Group
Amounts: no units in this file; such an amount is in the reference unit of its flow, which a separate flow dataset defines
copyright: false
licenseType: Free of charge for all users and uses

## General comment
The rotor blades manufactured for a 1.5 MW wind turbine are primarily designed for use in large-scale wind energy generation facilities. These blades enable the wind turbine to convert kinetic wind energy into electrical energy effectively. The process is applicable specifically to wind farms similar to the one located in Northeast Inner Mongolia, which significantly contributes to the renewable energy infrastructure.

## Geography
The data regarding the parameters of wind power has been collected from Wang (2012). A wind farm equipped with 33 domestic 1.5 megawatts (MW) wind turbines is regarded as a case study to analyze the environmental impact and its substitution effects. The wind farm is located in the northeast of Inner Mongolia, the province in which most of China’s wind power is installed (Xia and Song, 2017).

## Reference product
- Rotors blade hub of wind turbine: 3; estimated
  Rotors blade

## Inputs
- Fiber glass: 19200; calculated
  fiber glass

## Deviations from the LCI method approaches
The life cycle inventory for wind power is illustrated as follows. The production and manufacturing stage include the production of wind turbines, substations, and cables, which consume a large amount of energy and emit pollutants (Xue et al., 2015).

## Use advice
When utilizing this data set, users should note that the environmental impact assessment pertains to the specific case of a 1.5 MW wind turbine installation. Any extrapolation to other scenarios should be conducted with caution, considering the site-specific characteristics and local ecological sensitivity. Users should account for methodological limitations when generalizing to other wind farm projects. For assessing the full life cycle impact, include considerations of the production and manufacturing stage of wind turbines, substations, and cables, as energy consumption and pollutant emissions during this stage play a crucial role in the overall assessment.

## Review details
Inventory: The internal review was done by several iteration steps concerning raw data validation, raw data documentation, representativity, completeness and consistency of modelling with regard to ISO 14040 and 14044.

## Data sources
- Li, H., Jiang, H.-D., Dong, K.-Y., Wei, Y.-M. & Liao, H. A comparative analysis of the life cycle environmental emissions from wind and coal power: Evidence from China. Journal of Cleaner Production 248, 119192 (2020).
