# Sintered bricks and building blocks ; Clay, shale, fly ash, sludge, etc. ; greater than or equal to50 million standard bricks/a; NESPS2 / 烧结类砖瓦及建筑砌块 ; 粘土、页岩、粉煤灰、污泥等 ; 砖瓦工业焙烧窑炉(单条)（燃煤等） ; 大于等于5008万块标砖/年） ; 全国第二次污染普查数据

Dataset: ILCD process, Unit process, single operation
Geography: CN
Reference year: 2019
Classification: Reference Parameters / Materials production / Other mineralic materials
Generated by: The data was created by the Office of the Second National Pollution Source Census of the Ministry of Ecology and Environment, and the data was organized by the TianGong Plan team for ILCD format / 生态环境部第二次全国污染源普查工作办公室创建数据，天工计划团队常慧敏整理数据为ILCD格式
Owner: Tiangong LCI Data Working Group / 天工LCI数据工作小组
Review: Dependent internal review by Tiangong LCI Data Working Group / 天工LCI数据工作小组
Amounts: no units in this file; such an amount is in the reference unit of its flow, which a separate flow dataset defines
copyright: false
licenseType: Free of charge for all users and uses

## General comment
the Technical of end-of-pipe management technology for pollution sulfur dioxideisOthers①，Its Technical efficiency of end-of-pipe management85

## Technical purpose
所述工业过程涉及生产烧结砖和建筑砌块，这些产品主要由粘土、页岩、粉煤灰、污泥等材料组成。该过程在砖瓦工业使用的窑炉中进行，产量规模大于或等于每年5000万标准砖。这个数量表明它适用于商业建筑项目、基础设施开发，以及潜在地用于需要烧结砖和砌块的特殊建材制造。

## Reference product
- Sintered Brick: 10000; calculated
  源文件中描述为为烧结类砖瓦及建筑砌块，此处对其进行了匹配工作，将其匹配到LCAflow库里面相最符合的流，污染物指标备注为二氧化硫（窑炉）（燃煤等）

## Outputs
- sulfur dioxide: 2.22; calculated
  the Technical of end-of-pipe management technology for pollution sulfur dioxideisOthers①，Its Technical efficiency of end-of-pipe management85
  污染物指标二氧化硫（窑炉）（燃煤等）的末端治理技术是其他①，其效率为85，末端治理设施实际运行率（k值）计算公式为k=处理设施耗电量（千瓦时/年）/（设备额定功率（千瓦）×设备运行时间（小时/年）），①其他包括机械除尘、喷雾降尘等。。原文件中描述污染物类别为废气，污染物指标为二氧化硫（窑炉）（燃煤等），此处对其进行了匹配工作，将其匹配到LCAflow库里面相最符合的流，污染物指标备注为二氧化硫（窑炉）（燃煤等）

## Use advice
This dataset is derived from the Pollution Source Census Report and contains information on pollution emissions and related products. However, it does not include data on energy or chemical consumption, nor does it provide information on waste or co-product generation. When utilizing this dataset, please supplement the missing data based on actual conditions before use
该数据集来源于污染源普查报告，包含污染物排放及相关产品信息，但不包含能源或化学品消耗数据，也不提供废弃物或共生产物产生信息。在使用该数据集时，请根据实际情况补充缺失数据后再使用。

## Review details
Inventory: The internal review was done by several iteration steps concerning raw data validation, raw data documentation, representativity, completeness and consistency of modelling with regard to ISO 14040 and 14044.
清单： 内部审查通过几个迭代步骤完成，涉及原始数据验证、原始数据记录、代表性、完整性、与 ISO 14040 和 14044 有关的建模的一致性。

## Data sources
- 第二次全国污染源普查产排污核算系数手册（试用版）,二级代码30,四级代码3031文件，在完整版文件中第3368页
