# 污泥处理与处置|与稻秸混燃发电

Dataset: ILCD process, Unit process, single operation
Geography: SZ-JS-CN
Classification: Materials production / Other mineralic materials
Generated by: Jin Sitian, JSTian0302@163.com
Review: Dependent internal review by Tiangong LCI Data Working Group
Amounts: no units in this file; such an amount is in the reference unit of its flow, which a separate flow dataset defines

## Geography
昆山某污泥混燃协同发电公司

## Reference product
- Sludge: 1000; input; estimated

## Inputs
- Electricity: 226.656; measured
  该工艺生产上游包括污泥运输及干化、水稻种植、稻秸预处理以及稻秸运输过程。
- Diesel: 10.2; measured
  该工艺生产上游包括污泥运输及干化、水稻种植、稻秸预处理以及稻秸运输过程。
- water: 6223; measured
  生产过程环境影响主要考虑气体污染物、水体污染物以及固体废弃物的直接或间接排放。
- Diesel: 0.11; article inperiodical
  生产下游主要涉及焚烧后可利用固体废弃物。

## Outputs
- carbon dioxide: -1703; article inperiodical
  该工艺生产上游包括污泥运输及干化、水稻种植、稻秸预处理以及稻秸运输过程。
- methane: 8.27; article inperiodical
  该工艺生产上游包括污泥运输及干化、水稻种植、稻秸预处理以及稻秸运输过程。
- nitrous oxide: 0.076; article inperiodical
  该工艺生产上游包括污泥运输及干化、水稻种植、稻秸预处理以及稻秸运输过程。
- Nitrogen oxides: 0.44; article inperiodical
  该工艺生产上游包括污泥运输及干化、水稻种植、稻秸预处理以及稻秸运输过程。
- sulfur dioxide: 0.3; article inperiodical
  该工艺生产上游包括污泥运输及干化、水稻种植、稻秸预处理以及稻秸运输过程。
- carbon monoxide: 0.6; article inperiodical
  该工艺生产上游包括污泥运输及干化、水稻种植、稻秸预处理以及稻秸运输过程。
- hydrocarbons (unspecified): 0.023; article inperiodical
  该工艺生产上游包括污泥运输及干化、水稻种植、稻秸预处理以及稻秸运输过程。
- particles (PM10): 0.05; article inperiodical
  该工艺生产上游包括污泥运输及干化、水稻种植、稻秸预处理以及稻秸运输过程。
- carbon dioxide: 2632; estimated
  生产过程环境影响主要考虑气体污染物、水体污染物以及固体废弃物的直接或间接排放。
- Nitrogen oxides: 1.89; measured
  生产过程环境影响主要考虑气体污染物、水体污染物以及固体废弃物的直接或间接排放。
- sulfur dioxide: 0.25; measured
  生产过程环境影响主要考虑气体污染物、水体污染物以及固体废弃物的直接或间接排放。
- carbon monoxide: 0.13; measured
  生产过程环境影响主要考虑气体污染物、水体污染物以及固体废弃物的直接或间接排放。
- particles (PM10): 0.048; measured
  生产过程环境影响主要考虑气体污染物、水体污染物以及固体废弃物的直接或间接排放。
- chemical oxygen demand: 0.024; measured
  生产过程环境影响主要考虑气体污染物、水体污染物以及固体废弃物的直接或间接排放。
- ammonia: 0.001; measured
  生产过程环境影响主要考虑气体污染物、水体污染物以及固体废弃物的直接或间接排放。
- Suspended solids, unspecified: 0.011; measured
  生产过程环境影响主要考虑气体污染物、水体污染物以及固体废弃物的直接或间接排放。
- nitrogen, total (excluding N2): 0.002; measured
  生产过程环境影响主要考虑气体污染物、水体污染物以及固体废弃物的直接或间接排放。
- phosphorus, total; measured
  生产过程环境影响主要考虑气体污染物、水体污染物以及固体废弃物的直接或间接排放。
- Waste (solid): 169.5; measured
  生产过程环境影响主要考虑气体污染物、水体污染物以及固体废弃物的直接或间接排放。
- carbon dioxide: 0.34; article inperiodical
  生产下游主要涉及焚烧后可利用固体废弃物。
- methane; article inperiodical
  生产下游主要涉及焚烧后可利用固体废弃物。
- nitrous oxide; article inperiodical
  生产下游主要涉及焚烧后可利用固体废弃物。
- Nitrogen oxides: 0.001; article inperiodical
  生产下游主要涉及焚烧后可利用固体废弃物。
- sulfur dioxide; article inperiodical
  生产下游主要涉及焚烧后可利用固体废弃物。
- carbon monoxide: 0.001; article inperiodical
  生产下游主要涉及焚烧后可利用固体废弃物。
- hydrocarbons (unspecified); article inperiodical
  生产下游主要涉及焚烧后可利用固体废弃物。
- particles (PM10); article inperiodical
  生产下游主要涉及焚烧后可利用固体废弃物。

## Review details
Inventory: The internal review was done by several iteration steps concerning raw data validation, raw data documentation, representativity, completeness and consistency of modelling with regard to ISO 14040 and 14044.; Documentation: The review of the documentation was performed by Ecobilan and is in compliance with ISO 14040 and 14044. The data set documentation is correct in view of the appropriateness of the information provided. It includes all relevant information in view of data quality and scope of application of the respective LCI result.

## Data sources
- 不同污泥混燃发电工艺生命周期评价
