# Groundwater ex-situ remediation ; Pump and treat ; Construction ; Extraction well

Dataset: ILCD process, Unit process, single operation
Geography: CA
Reference year: 2007
Classification: Unit processes / Other Services / Repair and maintenance
Generated by: Wang Ning, wang_ning@caep.org.cn
Owner: Tiangong LCI Data Working Group
Review: Dependent internal review by Tiangong LCI Data Working Group
Amounts: no units in this file; such an amount is in the reference unit of its flow, which a separate flow dataset defines
copyright: false
licenseType: Free of charge for all users and uses

## General comment
Construction of 3 pumping wells using polyvinyl chloride, quartz sand, bentonite and concrete

## Geography
The contaminated area was located 600 m from a river shore in the northern part of the prov-ince of Quebec， Canada.

## Technology and included processes
Construction of 3 pumping wells using diesel, polyvinyl chloride, quartz sand, bentonite and concrete

## Technical purpose
The constructed pumping wells utilizing polyvinyl chloride (PVC), quartz sand, bentonite, and concrete are designed for groundwater ex-situ remediation. This process is particularly applied to treat contaminated groundwater through extraction, followed by treatment. Such installations are typically used in environmental engineering projects aimed at the restoration of groundwater quality, often required in areas impacted by industrial pollution.

## Reference product
- Extraction wel: 3; estimated
  在现场建造三个抽提井

## Inputs
All rows: estimated
- Polyvinyl chloride: 459.1
  成井过程消耗的PVC管
- Diesel: 2.5
  钻孔过程钻机所消耗的柴油
- quartz sand: 1036
  成井过程消耗的石英砂
- bentonite: 843.4
  成井过程消耗的石膨润土
- cement, unspecified: 210.1
  成井过程消耗的水泥

## Use advice
When utilizing this life cycle assessment data, the user should consider the geospatial relevance of the process to ensure applicability to the specific site being studied. It is important to pay attention to the details of the construction method and the materials used as they impact the assessment's results. Furthermore, the user should account for any additional infrastructure required for the pump and treat system and should also consider the operational lifetime of the wells in relation to the technological feasibility and intended duration of groundwater remediation projects.

## Review details
Inventory: The internal review was done by several iteration steps concerning raw data validation, raw data documentation, representativity, completeness and consistency of modelling with regard to ISO 14040 and 14044.

## Data sources
- Cadotte, M., Deschênes, L. & Samson, R. Selection of a remediation scenario for a diesel-contaminated site using LCA. Int J Life Cycle Assess 12, 239–251 (2007).
