# Calcination of Rare Earth Oxides (REO) Rare earth oxide;Rare earth oxide process;Bayan Obo

Dataset: ILCD process, Unit process, single operation
Geography: NMG-CN
Reference year: 2014
Classification: Unit processes / Materials production / Inorganic chemicals
Functional unit: The scope of the LCA is cradle-to-gate and the functional unit was chosen as 1 kg of REO.
LCI method principle: Attributional
LCI method approaches: Allocation - market value; Allocation - exergetic content
Generated by: Tao Wang, twang@iue.ac.cn
Owner: Tiangong LCI Data Working Group
Review: Dependent internal review by Tiangong LCI Data Working Group
Amounts: no units in this file; such an amount is in the reference unit of its flow, which a separate flow dataset defines
copyright: false
licenseType: Free of charge for all users and uses

## General comment
Rare earth oxides (REOs) produced through this process are utilized in various applications including electronics, renewable energy technologies, and manufacturing of advanced materials. Specifically, they are integral in the production of powerful magnets used in wind turbines and electric vehicles, as well as in catalysts, glass additives, and metallurgy.

## Geography
Bayan Obo (China)

## Technology and included processes
The process chain for REO production includes mining followed by beneficiation, calcination, extraction, and roasting stages, see Figure 2. The first step in REO production is mining, wherein crude ore is blasted and transported for further refining. Crude ore abstracted from the Bayan Obo mine is composed of both monazite and bastnasite.

## Reference product
- Rare Earth Element sulfate: 1; measured

## Inputs
- water: 17.216; calculated
- heat: 6.621; calculated
- sulphuric acid: 3.214; calculated
- Oxidant (FeCl3): 0.906; software or database
- electricity from hydroelectric power plant: 0.012; software or database
- fluoride: 0.003; measured
- Sulphur oxides (as SO2): 0.529; software or database

## Outputs
- carbon dioxide (fossil): 0.083; software or database
  原文未区分bio和fossil，根据专家判断此处为fossil
- hydrogen fluoride: 0.068; software or database
- sulphuric acid: 0.18; software or database
- fluoride: 0.0005; measured
- Suspended solids, unspecified,Suspended solids, unspecified: 0.011; measured

## Deviations from the LCI method approaches
Life cycle data was obtained from the Ecoinvent database, and mass-based-allocation was performed to partition the environmental impacts among crude ore and REO, as well as allocate the environmental impact among light, medium, heavy, and neodymium REOs. Two alternative allocations schemes, (I) market-based and (II) exegetic-based allocation, were considered as a means to partition the environmental impacts among REOs. The results for market- as well as exergetic-based allocation are provided in the Supporting Information. It is important to note that allocation based on market-value is the preferred method of the metals industry.23 When possible, Chinese-specificlifecycledatawas considered in the analysis; otherwise, European life cycle inventory (LCI) databases were used. The LCA results for REO production presented in this study provide a conservative benchmark for the environmental profile of REE. Furthermore, the LCI and LCA results can be extended/applied to evaluate the production of individual REE and REE-based technologies and products.

## Use advice
Users of this LCA data should follow the market-value based allocation method to estimate the environmental impacts of REO production unless there is a specific reason to use an alternative allocation scheme. It is important to apply this data with the understanding that it represents a conservative benchmark of the environmental profile of REEs. Additionally, when extending or applying the data to evaluate the production of individual REE or REE-based technologies and products, ensure that geographical relevance is considered, i.e., Chinese-specific data is used for China, and European LCI data is used when applicable to other regions.

## Review details
Inventory: The internal review was done by several iteration steps concerning raw data validation, raw data documentation, representativity, completeness and consistency of modelling with regard to ISO 14040 and 14044.

## Data sources
- Zaimes, G. G., Hubler, B. J., Wang, S. & Khanna, V. Environmental Life Cycle Perspective on Rare Earth Oxide Production. ACS Sustainable Chem. Eng. 3, 237–244 (2015).
