# clinker production;clinker, portland cement clinker;new dry process, >4000 t/d;secondary solid waste, dust recovery

Dataset: ILCD process, Unit process, single operation
Geography: CN
Reference year: 2020
Classification: Materials production / Inorganic chemicals
Generated by: Siqi Yang, ysqsophia@gmail.com
Owner: Tiangong LCI Data Working Group
Review: Dependent internal review by Tiangong LCI Data Working Group
Amounts: no units in this file; such an amount is in the reference unit of its flow, which a separate flow dataset defines
copyright: false
licenseType: Free of charge for all users and uses

## General comment
The new dry process has a relatively large market share in the cement industry process. Secondary solid waste composite cement raw material.

## Technical purpose
The Portland cement clinker represented by this dataset is primarily produced through the new dry process with a production capacity of more than 4000 tons per day. This clinker serves as a fundamental component for the production of Type P·O 42.5 Portland cement. The dataset also includes the integration of secondary solid waste and dust recovery within the clinker production process, highlighting its application in large-scale cement manufacturing with a focus on utilizing waste and enhancing material efficiency.

## Model description
Taking P·O 42.5 type cement clinker as the research object, the functional unit and base flow are the production of 1.00 tons of cement clinker, the system boundary is the unit process of clinker calcination (including pulverized coal preparation), and the base year is 2020.

## Reference product
- clinker, portland cement clinker: 1000
  clinker, PO42.5

## Inputs
- raw meal: 1440.64
  Raw materials, including secondary solid waste, i.e. dust recovery.
- electricity, medium voltage: 108
  Electricity. Electricity is supplied from power plants.
- tap water: 220
  Tap water
- coal, powder: 137.03
  Coal powder

## Outputs
- Water (groundwater from technosphere, waste water): 5.88
  Wastewater. The wastewater is discharged from the circulating cooling water system, and the water quality is basically free from other pollutants except for an increase in water temperature and turbidity.
- particles (> PM10): 0.04935
  Particulate matter, with an unspecified particle size, is treated as PM > 10 micrometers in diameter. The particulate matter collected by the bag filter is returned to the raw material homogenization stage through the recycling system, and the solid waste generated during the process can be effectively recycled and reused.
- sulfur dioxide: 0.07854
  Sulfur dioxide
- Nitrogen oxides: 0.21
- mercury: 2.026e-5
  Mercury
- fluorene: 0.0063
  Fluoride
- ammonia: 0.00251
  Ammonia
- carbon dioxide: 791.59
  Carbon dioxide. The cement industry usually does not monitor the CO2 emissions, which mainly come from two processes: the decomposition of limestone and the combustion of coal. The amount of CO2 produced can be calculated using chemical equilibrium formulas.

## Data selection and combination
In addition to CO2, other data come from corporate reports such as Gaoan Red Lion and Jiangxi De'an Evergreen, the cement industry's cleaner production evaluation index system, and cement clinker research papers.

## Use advice
This lifecycle dataset is developed by Yike Environmental Technology Co., Ltd. and adheres to the CLCD trade-off principle. Users should note the following: (1) Upstream production data for raw materials may be omitted if their weight is less than 1% of the product weight and for materials containing rare/high purity substances if their weight is less than 0.1% of the product weight, with an overall omission of materials not exceeding 5% of the total weight. (2) Upstream production processes for waste or low-value waste materials do not require tracing. (3) Production equipment, plant buildings, and living facilities are generally not considered unless they significantly affect the lifecycle assessment. (4) Known emissions data relevant to selected environmental impact categories should not be omitted. Use this dataset carefully for LCA modeling, incorporating it only after evaluating its relevance and updating it to reflect technology and practices as of the base year, which is 2020.

## Review details
Inventory: The internal review was done by several iteration steps concerning raw data validation, raw data documentation, representativity, completeness and consistency of modelling with regard to ISO 14040 and 14044.

## Data sources
- 陆柳鲜. (2022). 江西省多源有色冶炼固废资源化过程生命周期评价研究 [硕士, 江西理工大学].
