# Hot rolled steel production;Hot rolled steel;Hot rolling(D01)

Dataset: ILCD process, Unit process, single operation
Geography: CN
Reference year: 1998
Classification: Materials production / Metals and semimetals
Generated by: Fuxiang, 1162850692@qq.com
Owner: Tiangong LCI Data Working Group
Review: Dependent internal review by Tiangong LCI Data Working Group
Amounts: no units in this file; such an amount is in the reference unit of its flow, which a separate flow dataset defines
copyright: false
licenseType: Free of charge for all users and uses

## General comment
来自表 4-17 D01 钢厂生产吨材环境负荷编目表

## Time period
论文提到钢铁企业环境总体数据为1998年的吨钢环境基础数据。

## Technical purpose
The hot rolled steel produced in the described industrial process is typically used for construction and manufacturing purposes, including but not limited to infrastructure projects, building frameworks, automotive bodies, railway tracks, and various machinery and tools.

## Reference product
- Steel sections: 1000; measured

## Inputs
- Energy, geothermal, converted: 2858.66; measured
- water: 28360; measured
- Crude Steel: 1078; measured
  crude steel

## Outputs
All rows: measured
- Dust (unspecified, from stack): 0.028
  soot
- Dust (unspecified, from stack): 0.262
- sulfur dioxide: 0.564
- Hydrocarbons, aliphatic, alkanes, unspecified: 0.024793
  Petro
- Suspended solids, unspecified: 0.29681
- chemical oxygen demand: 0.1759
- Dust (unspecified, from stack): 25.7
  dust collection
- Spoil (deposited, hibernating in ground, non elementary flow): 14

## Use advice
The environmental load data provided for hot rolled steel production should be used with an understanding that it reflects the technological and energy consumption standards of 1998. It may not represent current technologies and efficiencies in steel production. Users need to pay attention to the evolution of steelmaking technology when applying this data to current life cycle assessments. Additionally, considerations for end-of-life recycling and potential environmental mitigation should be factored into the use phase modeling.

## Review details
Inventory: The internal review was done by several iteration steps concerning raw data validation, raw data documentation, representativity, completeness and consistency of modelling with regard to ISO 14040 and 14044.

## Data sources
- 周和敏. 钢铁材料生产过程环境协调性评价研究. (北京工业大学, 2001).
