# Lithium Hydroxide Production ; Battery Grade Lithium Hydroxide Monohydrate ; Causticization ; Lithium Carbonate Extracted from Concentrated Brine of Atacama Salt Lake, Chile

Dataset: ILCD process, Unit process, single operation
Geography: CL
Reference year: 2018
Classification: Unit processes / Materials production / Inorganic chemicals
Generated by: Sun Xin, xs389@cornell.edu
Owner: Tiangong LCI Data Working Group
Review: Dependent internal review by Tiangong LCI Data Working Group
Amounts: no units in this file; such an amount is in the reference unit of its flow, which a separate flow dataset defines
licenseType: Free of charge for all users and uses

## General comment
Lithium has historically been produced from subterranean brines in the Andean mountain region of Chile in the area known as the “Lithium Triangle,” which also includes parts of Bolivia and Argentina. There are also several other lithium-rich brine locations throughout the world, and each brine has a unique chemical composition, which necessitates different processes for isolating the desired end products (Wietelmann and Steinbild, 2014). This LCA considers the brines in the Atacama Desert of Chile, known as the Salar de Atacama. The brines are concentrated, processed into battery grade Li2CO3 and LiOH•H2O, and shipped worldwide for processing into battery cathode materials and, eventually, batteries.

## Technology and included processes
Li2CO3 is reacted in a series of stages with a mixture of CaO and water to produce LiOH•H2O. Again, since LiOH•H2O is the only product from the facility, process-level analysis is not needed; we analyzed data at the facility level and were able to determine the requisite energy and material inputs for LiOH•H2O production. Note that for the provided data there are two facilities at the same plant for Li2CO3 and LiOH•H2O production, respectively, but the facilities are separated, and the process data provided for each is unique. Using producer data, we determined the total facility-level material, energy, and water demand to produce LiOH•H2O. Emissions data provided were used to calculate non-combustion process emissions. The material and energy flows for LiOH•H2O production from lithium brine are summarized in Table 3. Water is consumed in this process. Again, since only LiOH•H2O is produced, there is no need to allocate to products.

## Technical purpose
The battery-grade lithium hydroxide monohydrate produced via the causticization process is specifically used for the manufacturing of lithium-ion batteries. It is a critical component in the production of cathode materials for rechargeable batteries, which are commonly used in electric vehicles, portable electronics, and large-scale energy storage systems.

## Reference product
- Lithium Hydroxide Monohydrate: 1000; measured

## Inputs
All rows: measured
- Lithium carbonate,Lithium carbonate: 1050
- Calcium Oxide: 1150
- freshwater,freshwater: 0.5
- Electricity: 5000
- Diesel: 3000
- Natural gas, at consumer EU-27: 21000

## Outputs
- particles (PM10): 0.1; measured
- particles (PM2.5): 0.05; measured

## Use advice
When applying this LCA data set, users should consider the exclusion of production processes for raw materials and energy flows representing less than 1% of the total. It is important to ensure that these minor exclusions do not significantly impact the overall assessment conclusions. Additionally, practitioners should be aware of the technological applicability and regional specificity of data since it is derived from the Atacama Salt Lake, Chile, which may influence the environmental profile due to local conditions and technologies used.

## Review details
Inventory: The internal review was done by several iteration steps concerning raw data validation, raw data documentation, representativity, completeness and consistency of modelling with regard to ISO 14040 and 14044.

## Data sources
- Kelly, J. C., Wang, M., Dai, Q. & Winjobi, O. Energy, greenhouse gas, and water life cycle analysis of lithium carbonate and lithium hydroxide monohydrate from brine and ore resources and their use in lithium ion battery cathodes and lithium ion batteries. Resources, Conservation and Recycling 174, 105762 (2021).
