# Soil Remediation;Isotopic Remediation;Bioreactor;Operation;Remediated Soil

Dataset: ILCD process, Unit process, single operation
Geography: IT
Reference year: 2018
Classification: Unit processes / Other Services / Repair and maintenance
Generated by: Wang Ning, wang_ning@caep.org.cn
Owner: Tiangong LCI Data Working Group
Review: Dependent internal review by Tiangong LCI Data Working Group
Amounts: no units in this file; such an amount is in the reference unit of its flow, which a separate flow dataset defines
copyright: false
licenseType: Free of charge for all users and uses

## General comment
Running biopiles to remediate contaminated soil

## Technical purpose
This biopile operation is employed for the ex-situ remediation of contaminated soil. The process is specifically used to biologically treat soil that has been polluted by organic contaminants such as petroleum hydrocarbons.

## Reference product
- Remediated soil: 600000; measured

## Inputs
All rows: measured
- Microorganism: 0.001
- Excavated soil,Excavated soil: 600000
- biopile facility: 1
- Electricity: 37800
- air: 720000
- Tap Water: 1500
- Rice husk: 30
- urea: 180
- Phosphate fertilizer: 36
- slurry: 45000

## Use advice
When utilizing this Life Cycle Assessment data, ensure to account for the entire environmental impact of the bioreactor operation, including all primary raw material use and energy consumption required. Consider the transport of contaminated soil to the biopile site and subsequent disposal or reuse of remediated soil in the assessment scope. Be aware of the specific type and concentration of organic contaminants in the soil, as this may influence the efficiency and environmental impact of the remediation process.

## Review details
Inventory: The internal review was done by several iteration steps concerning raw data validation, raw data documentation, representativity, completeness and consistency of modelling with regard to ISO 14040 and 14044.

## Data sources
- D’Imporzano, G. et al. OPTIMIZING BIOREMEDIATION OF HYDROCARBON POLLUTED SOIL BY LIFE CYCLE ASSESSMENT (LCA) APPROACH. Environmental Engineering and Management Journal (2019).
