# Municipal sludge treatment and disposal;wet sludge moisture content 80%;anaerobic digestion

Dataset: ILCD process, Unit process, single operation
Geography: DL-LN-CN
Classification: Unit processes / End-of-life treatment / Waste water treatment
Functional unit: The functional unit of sludge treatment is sludge 45t (water content 80%).
Generated by: Jin Sitian, 2331276@tongji.edu.cn
Owner: Tiangong LCI Data Working Group
Review: Dependent internal review by Tiangong LCI Data Working Group
Amounts: no units in this file; such an amount is in the reference unit of its flow, which a separate flow dataset defines
copyright: ['opt4ROkqig']
licenseType: Free of charge for all users and uses

## General comment
Anaerobic digestion efficiency, biogas production and power generation are derived from the plant's design data, electricity consumption is calculated by counting the use of electrical appliances, and the emissions of gaseous pollutants during reactions in the plant are known from literature review.

## Geography
A sludge treatment plant in Dalian

## Technology and included processes
Each digestion unit is equipped with 3 anaerobic fermentation tanks, and a mixing equipment and a feed pump are set up in each LIPP tank, which is open for 24 hours, the upper end of the LIPP tank is a biogas collection device, 3 fans, open for 24 hours, and 1 air compressor for 1 hour.

## Technical purpose
This data set is intended for the assessment of municipal sludge treatment and disposal processes where the wet sludge has a moisture content of 80%. It applies to the anaerobic digestion phase within a single unit operation at a sludge treatment facility in Dalian. The material, represented by this data set, is typically used for the treatment of municipal sludge in urban wastewater management systems.

## Reference product
- Sludge: 20500; input; measured

## Inputs
- Electricity: 12793.7; calculated
  The calculation is based on the power consumed by a set of equipment with a processing capacity of 150t/d.
- Polymer: 40; measured

## Outputs
- Electricity: 14400; missing unimportant
- nitrous oxide: 60; measured
- methane (biogenic),methane (biogenic): 90; measured
  The original text does not distinguish between biogenic and fossil, and according to experts, it is biogenic here.
- Biogas: 5; measured

## Use advice
When using this data set, it is important to consider the specific context of municipal sludge treatment and disposal with a moisture content of 80%. The anaerobic digestion process should be modeled in alignment with the operational conditions of the facility in Dalian. Users should also consider the implications of sludge disposal and potential energy recovery in the form of biogas. The functional unit of 45 tonnes of wet sludge with 80% moisture content must be maintained when applying this data in life cycle assessments or other comparative analyses.

## Review details
Inventory: The internal review was done by several iteration steps concerning raw data validation, raw data documentation, representativity, completeness and consistency of modelling with regard to ISO 14040 and 14044.

## Data sources
- 张倩芸. 基于LCA的污水处理系统的环境影响评价研究[D].大连理工大学,2017.
