# Groundwater ex-situ remediation ; Pump and treat ; Equipment and Materials Arriving on Site

Dataset: ILCD process, Unit process, single operation
Geography: CA
Reference year: 2007
Classification: Unit processes / Other Services / Repair and maintenance
Generated by: Wang Ning, wang_ning@caep.org.cn
Owner: Tiangong LCI Data Working Group
Review: Dependent internal review by Tiangong LCI Data Working Group
Amounts: no units in this file; such an amount is in the reference unit of its flow, which a separate flow dataset defines
copyright: false
licenseType: Free of charge for all users and uses

## General comment
Transportation of required materials and equipment to the site

## Geography
The contaminated area was located 600 m from a river shore in the northern part of the prov-ince of Quebec， Canada.

## Technology and included processes
Consumption of diesel for transportation of equipment and materials to project sites

## Technical purpose
The data describes the utilization of groundwater ex-situ remediation technology through a pump and treat process. It encompasses the transportation of necessary materials and equipment to the contaminated site for remediation purposes. This process is commonly applied to sites with groundwater contamination that require intervention to prevent further environmental impact, usually in the vicinity of sensitive ecosystems such as river shores.

## Reference product
- Equipment and Materials Arriving on Site: 1; estimated
  到达现场的设备和材料

## Inputs
- Diesel: 79.8; estimated
  将所需材料和设备运至现场所需要的柴油

## Use advice
When utilizing this data set, ensure proper calculation of the diesel fuel consumption for the transportation of materials and equipment to the site for the accuracy of LCA. It is important to consider the distance from source to site (600 m from the river shore) as it directly influences fuel consumption. Users should verify that the technological conditions of the data (geographical and technical applicability) match the specific conditions of their intended application. Special attention should be paid to methodological consistency in terms of transportation mode, vehicle type, and distance.

## Review details
Inventory: The internal review was done by several iteration steps concerning raw data validation, raw data documentation, representativity, completeness and consistency of modelling with regard to ISO 14040 and 14044.

## Data sources
- Cadotte, M., Deschênes, L. & Samson, R. Selection of a remediation scenario for a diesel-contaminated site using LCA. Int J Life Cycle Assess 12, 239–251 (2007).
