# Aluminum ingot casting ; Primary aluminum ingot ; Liquid primary aluminum ; 2015

Dataset: ILCD process, Unit process, single operation
Geography: CN
Reference year: 2021
Classification: Unit processes / Materials production / Metals and semimetals
Generated by: Zimeng Cai, caizm6178@163.com
Owner: Tiangong LCI Data Working Group
Review: Dependent internal review by Tiangong LCI Data Working Group
Amounts: no units in this file; such an amount is in the reference unit of its flow, which a separate flow dataset defines
copyright: false
licenseType: Free of charge for all users and uses

## General comment
Primary aluminum ingot casting is an industrial process used for producing pure aluminum ingots. These ingots serve as a key raw material for a wide range of applications in industries such as automotive, aerospace, construction, and electronics. The aluminum is typically cast from its liquid state into standardized shapes for further processing or direct use in product manufacturing.

## Time period
Date of publication

## Reference product
- aluminium, primary, ingot: 1000; software or database

## Inputs
- aluminium, primary, liquid: 1025.99; software or database

## Data selection and combination
The data in this study refers to the LCA data of PA, SA, electricity, and other background data. The PA data were obtained from statistical data sources, and the SA data were mainly obtained from the literatures. The background data were mainly derived from the Chinese localization LCA database CAS RCEES 2018, which was established by the Research Center for Eco-Environmental Sciences, Chinese Academy of Sciences and covers LCA data for energy, materials, transportation, waste management etc.

## Use advice
The data set referring to the LCA data of primary aluminum ingot casting from 2015 should be used with consideration of its temporal relevance and geographical specificity. Users should note that the primary aluminum (PA) data were obtained from statistical sources, while the secondary aluminum (SA) data were derived from literature. When applying this data, attention should be given to the background data's source, the Chinese localization LCA database CAS RCEES 2018 by the Research Center for Eco-Environmental Sciences, Chinese Academy of Sciences. Adjustments may be required for LCA studies focusing on different regions or time periods. Methodological considerations, such as the inclusion or exclusion of recycling processes, should align with the goal and scope of the assessment.

## Review details
Inventory: The internal review was done by several iteration steps concerning raw data validation, raw data documentation, representativity, completeness and consistency of modelling with regard to ISO 14040 and 14044.

## Data sources
- Ding, N., Liu, N., Lu, B. & Yang, J. Life cycle greenhouse gas emissions of aluminum based on regional industrial transfer in China. J. Ind. Ecol. 25, 1657–1672 (2021).
