# East China Rice ; Shanghai Rice Production ; Fertilization

Dataset: ILCD process, Unit process, single operation
Geography: SH-CN
Reference year: 2012
Valid until: 2014
Classification: Unit processes / Materials production / Agricultural production means
Functional unit: 1 t
LCI method principle: Attributional
LCI method approaches: Consequential
Generated by: Haoran Zhang, hrzhang@whu.edu.cn
Owner: Tiangong LCI Data Working Group
Review: Dependent internal review by Tiangong LCI Data Working Group
Amounts: no units in this file; such an amount is in the reference unit of its flow, which a separate flow dataset defines
copyright: false
licenseType: Free of charge for all users and uses

## General comment
Referring to the PAS2050 standard and using life cycle assessment methods, the carbon footprint of rice production in Shanghai was assessed.

## Geography
Chongming

## Technology and included processes
The carbon footprint of rice production was calculated with reference to PAS2050 specification and LCA method. PAS2050 stands for "Publicly Available Specification" (PAS), compiled by the British Standard Institution (BSI). It aims to make clear requirements for the evaluation of greenhouse gas emissions during the life cycle of products and services

## Technical purpose
The LCA data for East China Rice, specifically Shanghai Rice Production with a focus on Fertilization, is applicable for assessing the carbon footprint of rice cultivation in Shanghai. It can be used by agricultural researchers, environmental scientists, or policymakers to determine the greenhouse gas (GHG) impacts of rice production. The primary materials considered include seeds, chemical fertilizers, and pesticides and cover activities like field operations, rice processing, GHG emission measurements, machinery use, and storage but exclude commercial selling, consumer usage, and the end-of-life phase.

## Reference product
- rice: 1000; measured

## Outputs
- nitrogen: 0.1159; calculated
- Phosphorus: 0.0298; calculated
- potassium: 0.0587; calculated

## Deviations from the LCI method approaches
The carbon footprint calculation of rice production mainly refers to the PAS2050 specification and combines LCA methods. PAS2050, the full name Publicly Available Specification (PAS), the system boundary starts from the production of fertilizers and electricity, and the terminal boundary is the output of agricultural products and pollutants in the crop planting process, that is, there are two production systems, namely, agricultural production system and crop production system.

## Data selection and combination
Regarding the carbon footprint of rice, primary activity-level data were collected, which encompassed various field operations, processing and storage activities, further processing and product packaging, as well as greenhouse gas emissions in the field.

## Data treatment and extrapolations
Including field operations, rice processing, and greenhouse gas emission detection.

## Use advice
When using this LCA data set for Shanghai Rice Production, it is crucial to adhere to the PAS2050 standard and the specified LCA methods. Users should take into account that the system boundary begins with the production of fertilizers and electricity and ends with the output of agricultural products and pollutants during the planting process. This dataset does not include downstream processes such as sales, consumer use, or waste disposal and recycling. Thus, for complete life cycle analyses, additional data covering these stages should be sourced and integrated accordingly.

## Review details
Inventory: The internal review was done by several iteration steps concerning raw data validation, raw data documentation, representativity, completeness and consistency of modelling with regard to ISO 14040 and 14044.

## Data sources
- 曹黎明,李茂柏,王新其,赵志鹏,潘晓华.基于生命周期评价的上海市水稻生产的碳足迹[J].生态学报,2014,34(02):491-499.
