# Soil restoration ; ex-situ capping ; soil landfill ;soil transportation;contaminated soil

Dataset: ILCD process, Unit process, single operation
Geography: ES
Reference year: 2022
Classification: Unit processes / Other Services / Repair and maintenance
Generated by: Sang Chunhui, sangch@mail.bnu.edu.cn
Owner: Tiangong LCI Data Working Group
Review: Dependent internal review by Tiangong LCI Data Working Group
Amounts: no units in this file; such an amount is in the reference unit of its flow, which a separate flow dataset defines
copyright: false
licenseType: Free of charge for all users and uses

## General comment
Transport 3000 tons of lead contaminated soil to a landfill 15 km away

## Technical purpose
The data set describes the process of ex-situ soil restoration, specifically for the scenario where lead-contaminated soil is transported to a designated landfill. This process is applied in environmental engineering and waste management fields, where it is used to prevent the spread of contaminants by isolating hazardous materials away from original locations where they pose a threat to human health and the environment.

## Reference product
- Landfilled contaminated soil: 3e6; software or database

## Inputs
- transport in t*km: 45000; software or database
- Excavated soil,Excavated soil: 3e6; software or database

## Use advice
Users of this data set should take into account that the dataset exclusively refers to the transport and landfilling of lead-contaminated soil for the quantity specified (3000 tons) over a distance of 15 km. When using this data for life cycle assessments or similar studies, it is important to ensure that the case-specific details match the criteria of the data set, that assumptions made for the landfilling process are consistent with actual practices and local regulations, and that the selected disposal site is properly licensed for hazardous waste handling. Furthermore, users should include considerations for potential leaching and post-closure care of the landfill.

## Review details
Inventory: The internal review was done by several iteration steps concerning raw data validation, raw data documentation, representativity, completeness and consistency of modelling with regard to ISO 14040 and 14044.

## Data sources
- Espada, J. J., Rodríguez, R., Gari, V., Salcedo-Abraira, P. & Bautista, L. F. Coupling phytoremediation of Pb-contaminated soil and biomass energy production: A comparative Life Cycle Assessment. Science of The Total Environment 840, 156675 (2022)
