# Pellet production ; pellets ; pellets

Dataset: ILCD process, Unit process, single operation
Geography: CN
Reference year: 2016
Classification: Materials production / Non-energetic raw materials
Generated by: Wanghuanyu, wanghuanyu00@126.com
Owner: Tiangong LCI Data Working Group
Review: Dependent internal review by Tiangong LCI Data Working Group
Amounts: no units in this file; such an amount is in the reference unit of its flow, which a separate flow dataset defines
licenseType: Free of charge for all users and uses

## General comment
The pellets produced in this process are primarily used as a raw material for the manufacture of steel. The pellets are a type of iron ore that has been processed into a spherical shape, making them suitable for use in blast furnaces and direct reduction processes.

## Reference product
- Pellet: 1000; article inperiodical

## Inputs
All rows: article inperiodical
- bentonite: 7
- Electricity: 136.8
- Concentrate powder: 950
- Pulverized coal: 28
- dolomite: 20
- Limestone: 55

## Outputs
- Flue dust: 1.8e-5; article inperiodical
- nitrous oxide: 9.5e-5; article inperiodical
- sulfur dioxide: 0.0002; article inperiodical
- freshwater: 35; article inperiodical

## Use advice
When utilizing this dataset for Life Cycle Assessment (LCA), users should consider the specific technological process in question, ensuring that their LCA model reflects the energy and emissions associated with the production of pellets. Consideration should also be given to any transportation of raw materials or the final pellets. If this dataset includes upstream processes (like mining or transportation), these should be included in the boundary of the LCA. If downstream processes like steel manufacturing are not included, they should be accounted for separately in the LCA.

## Review details
Inventory: The internal review was done by several iteration steps concerning raw data validation, raw data documentation, representativity, completeness and consistency of modelling with regard to ISO 14040 and 14044.

## Data sources
- 王倩, 张玲玲, & 苍大强. 基于GaBi软件的钢铁工业球团工艺LCA生命周期评价. 冶金能源 36, 3-6+32 (2017).
