# Production of scandium oxide;scandium oxide;General process;Rare Earth Elements (REE) containing ore

Dataset: ILCD process, Unit process, single operation
Geography: CN
Reference year: 2010
Valid until: 2019
Classification: Unit processes / Materials production / Inorganic chemicals
Functional unit: The cradle-to-gate production of 1 kg of scandium oxide.
LCI method principle: Attributional
LCI method approaches: Allocation - mass
Generated by: Tao Wang, twang@iue.ac.cn
Owner: Tiangong LCI Data Working Group
Review: Dependent internal review by Tiangong LCI Data Working Group
Amounts: no units in this file; such an amount is in the reference unit of its flow, which a separate flow dataset defines
copyright: false
licenseType: Free of charge for all users and uses

## General comment
Scandium oxide produced by this process is utilized mainly in the manufacturing of solid oxide fuel cells, high-intensity metal halide lamps, and in the aerospace industry due to its high melting point and strength enhancement properties. Additionally, it is employed in electronic ceramics and glass compositions for its unique optical qualities.

## Geography
China

## Technology and included processes
We apply the LCA method to quantify the potential environmental impacts of scandium oxide production according to the ISO 14040 (ISO, 2006a) and ISO 14044 (ISO, 2006b) guidelines, and our assessment is performed and assessed with the support of GaBi 9.0 software and Ecoinvent 3.3 database.

## Reference product
- arsenic trioxide: 1; measured

## Inputs
All rows: measured
- tailings (unspecified): 64363.3
- water: 753955
- Electricity: 3138.41
- process steam: 60500
- tributylphosphorotrithioate: 6.5
  tributyl phosphate (TBP)
- P0507: 5.33
  P507, 2-Ethylhexylphosphonic acid mono-2-ethylhexyl ester
- Kerosene: 6.5
- Sodium silicate: 650.01
  Water glass
- Polyglycerol fatty acid esters (PGFEs): 7.67
  Carrier (fatty ester of polyglycolether and modified polyalcohol)
- Spray mold: 5.33
  Activating reagent , Ammonium chloride (Salmiac, Solvay process)
- phenanthrene: 388.02
  Collector, DE: Phthalic anhydride
- oxalic acid: 50.17
- sulphuric acid: 1767.83
- Hydrochloric acid: 77.06
- sodium hydroxide: 77.06
- hydrogen peroxide: 21.5

## Outputs
All rows: measured
- Concentrate: 11068.3
  Fe concentrate
- Rare Earth concentrate: 2455
  RE concentrate
- Concentrate: 1020
  S concentrate
- Concentrate: 32478.3
  Fluorite coarse ore
- Concentrate: 796.67
  Nb concentrate
- Non-methane volatile organic compounds: 0.69
  NMVOC
- methane (fossil): 3.14
  原文未区分bio和fossil，根据专家判断此处为fossil
- ammonia: 0.26
- particles (PM2.5 - PM10): 0.44
- Radioactive dust, waste: 0.000651
  RS (Th, U) , Radioactive dust, waste
- sulfur dioxide: 7.38
- Nitrogen oxides: 5.24
  Nitrogen oxide
- carbon monoxide,carbon monoxide (fossil): 3.32
  原文未区分bio和fossil，根据专家判断此处为fossil
- carbon dioxide (fossil): 853.11
  原文未区分bio和fossil，根据专家判断此处为fossil
- water: 678107
- waste water - untreated: 3226.23
- Oils, unspecified: 0.01
- Sulfidic tailing: 10546.7
  Sc tailings
- Waste (solid): 6502.66

## Deviations from the LCI method approaches
Therefore, the mass-based-allocation, a fair allocation method based on material natural attributes, was performed to partition the environmental impacts among by-products in this study, and all the inputs and outputs considered during the entire process are considered. In the whole production processes, we apply the mass-based allocation principle to our assessment by considering the scandium oxide as the main product, while Fe concentrate, REs concentrate, S concentrate, Fluorite coarse ore and Nb concentrate are considered as by-products, and the detail is shown in Supporting Information (

## Use advice
When incorporating this LCA data into environmental impact assessments, ensure that the mass-based allocation method is appropriately applied as described. The allocation has delineated the burden between scandium oxide and its by-products based on their natural material attributes. Users must take into account the entire production process from cradle to gate and refer to the details specified in the Supporting Information, particularly when considering dependencies between by-products. This dataset is in accordance with ISO 14040 and ISO 14044 guidelines, and it is analyzed using GaBi 9.0 software and the Ecoinvent 3.3 database. Data users should ensure that modeling and assessments are compatible with these methodologies.

## Review details
Inventory: The internal review was done by several iteration steps concerning raw data validation, raw data documentation, representativity, completeness and consistency of modelling with regard to ISO 14040 and 14044.

## Data sources
- Wang, L., Wang, P., Chen, W.-Q., Wang, Q.-Q. & Lu, H.-S. Environmental impacts of scandium oxide production from rare earths tailings of Bayan Obo Mine. Journal of Cleaner Production 270, 122464 (2020).
