# Indoor scented and deodorant products ; Charcoal powder, binder, spice, etc. ; Mixing, blending and forming ; All sizes; NESPS2 / 室内散香及除臭制品 ; 炭粉、粘合剂、香料等① ; 混合调配及成型 ; 所有规模 ; 全国第二次污染普查数据

Dataset: ILCD process, Unit process, single operation
Geography: CN
Reference year: 2019
Classification: Reference Parameters / Materials production / Organic chemicals
Generated by: The data was created by the Office of the Second National Pollution Source Census of the Ministry of Ecology and Environment, and the data was organized by the TianGong Plan team for ILCD format / 生态环境部第二次全国污染源普查工作办公室创建数据，天工计划团队常慧敏整理数据为ILCD格式
Owner: Tiangong LCI Data Working Group / 天工LCI数据工作小组
Review: Dependent internal review by Tiangong LCI Data Working Group / 天工LCI数据工作小组
Amounts: no units in this file; such an amount is in the reference unit of its flow, which a separate flow dataset defines
copyright: false
licenseType: Free of charge for all users and uses

## General comment
the Technical of end-of-pipe management technology for pollution Exhaust gasis/

## Technical purpose
该工业过程涉及使用炭粉、粘合剂和香料等材料混合调配及成型，生产所有规模的室内散香及除臭制品。另外，该过程采用末端污染控制技术处理排放气体和挥发性有机化合物(VOCs)。结合低温等离子体与光解和光催化氧化两种末端控制技术，分别对VOCs的技术效率为51％和68％。

## Reference product
- Indoor Fragrance and Deodorant Products: 1000; calculated
  源文件中描述为为室内散香及除臭制品，此处对其进行了匹配工作，将其匹配到LCAflow库里面相最符合的流，污染物指标备注为工业废气量

## Outputs
- volatile organic compound: 0.00128; calculated
  the Technical of end-of-pipe management technology for pollution volatile organic compoundisPhotocatalytic oxidation，Its Technical efficiency of end-of-pipe management68
  污染物指标挥发性有机物的末端治理技术是光催化氧化，其效率为68，末端治理设施实际运行率（k值）计算公式为k=1.0，①由于生产不同产品使用的原料各不相同且原料品种繁多，系数表单中仅列举了几种常用原料，实际生产时并不局限于此。。原文件中描述污染物类别为废气，污染物指标为挥发性有机物，此处对其进行了匹配工作，将其匹配到LCAflow库里面相最符合的流，污染物指标备注为挥发性有机物
- volatile organic compound: 0.00196; calculated
  the Technical of end-of-pipe management technology for pollution volatile organic compoundisLow temperature plasma + photolysis，Its Technical efficiency of end-of-pipe management51
  污染物指标挥发性有机物的末端治理技术是低温等离子体+光解，其效率为51，末端治理设施实际运行率（k值）计算公式为k=1.0，①由于生产不同产品使用的原料各不相同且原料品种繁多，系数表单中仅列举了几种常用原料，实际生产时并不局限于此。。原文件中描述污染物类别为废气，污染物指标为挥发性有机物，此处对其进行了匹配工作，将其匹配到LCAflow库里面相最符合的流，污染物指标备注为挥发性有机物
- Exhaust gas: 2700; calculated
  the Technical of end-of-pipe management technology for pollution Exhaust gasis/
  污染物指标工业废气量的末端治理技术是/，末端治理设施实际运行率（k值）计算公式为/，①由于生产不同产品使用的原料各不相同且原料品种繁多，系数表单中仅列举了几种常用原料，实际生产时并不局限于此。。原文件中描述污染物类别为废气，污染物指标为工业废气量，此处对其进行了匹配工作，将其匹配到LCAflow库里面相最符合的流，污染物指标备注为工业废气量

## Use advice
This dataset is derived from the Pollution Source Census Report and contains information on pollution emissions and related products. However, it does not include data on energy or chemical consumption, nor does it provide information on waste or co-product generation. When utilizing this dataset, please supplement the missing data based on actual conditions before use
该数据集来源于污染源普查报告，包含污染物排放及相关产品信息，但不包含能源或化学品消耗数据，也不提供废弃物或共生产物产生信息。在使用该数据集时，请根据实际情况补充缺失数据后再使用。

## Review details
Inventory: The internal review was done by several iteration steps concerning raw data validation, raw data documentation, representativity, completeness and consistency of modelling with regard to ISO 14040 and 14044.
清单： 内部审查通过几个迭代步骤完成，涉及原始数据验证、原始数据记录、代表性、完整性、与 ISO 14040 和 14044 有关的建模的一致性。

## Data sources
- 第二次全国污染源普查产排污核算系数手册（试用版）,二级代码26,四级代码2689文件，在完整版文件中第3009页
