# cement production;cement, common portland cement;new dry process kiln

Dataset: ILCD process, Unit process, black box
Geography: SD-CN
Reference year: 2012
Classification: Unit processes / Materials production / Other mineralic materials
Generated by: #REF!, ysqsophia@gmail.com
Owner: Tiangong LCI Data Working Group
Review: Dependent internal review by Tiangong LCI Data Working Group
Amounts: no units in this file; such an amount is in the reference unit of its flow, which a separate flow dataset defines
copyright: false
licenseType: Free of charge for all users and uses

## General comment
The native cement is produced under the new dry kiln.

## Geography
The typical cement enterprise of the average production level of Shandong Province

## Technical purpose
This data represents common portland cement produced using the new dry process kiln technique. The cement is used across various construction applications, including concrete production for buildings, bridges, and roads, as well as for masonry, mortars, and grouts. The quality of the cement meets technical specifications suitable for general construction purposes.

## Model description
1 ton of virgin cement is the functional unit; the geographical scope of the study is Shandong, and the system boundary is all direct processes involved in cement production, including all auxiliary links such as raw material mining, processing, energy production, production equipment, transportation, sales and use stages. resources, energy consumption and environmental emissions are not considered for the time being.

## Reference product
- cement, common portland cement: 1000
  Universal cement is a research object

## Inputs
- limestone, crushed, for mill: 1130
  Limestone
- clay: 220
  Clay
- iron, powder: 27
  Iron correction raw material
- gypsum stone (CaSO4-dihydrate): 60
  Gupsum
- mixed materials, mineral: 200
  Mixed material
- hard coal: 120.398
  Raw coal (standard coal). Coal consumption is converted into standard coal consumption according to the low heating value. Coal consumption in the literature is converted to standard coal consumption (0.086t) according to the low level heating value, the conversion formula is 1kg raw coal = 0.7143kg standard coal. Here the conversion is made into raw coal for entry.
- Electricity: 0.296316
  Electricity. The power is mainly from thermal power. The electricity consumption in the literature is converted to standard coal (0.067t). The conversion formula used here is 1 kWh = 0.814 kg of standard coal. This conversion is used for inputting electricity data.

## Outputs
- sulfur dioxide: 0.5
  SO2
- particles (> PM10): 3
  Dust, with an unspecified particle size, is treated as PM > 10 micrometers in diameter.
- particles (> PM10): 0.35
  Smoke, with an unspecified particle size, is treated as PM > 10 micrometers in diameter.
- Nitrogen oxides: 1.45
  NOx
- carbon dioxide (fossil): 658
  CO2

## Data selection and combination
The cement industry in Shandong Province occupies an important position in the country, ranking first in the country for more than ten years in a row. Every year, cement products account for 11% to 13% of the country's total, making it a veritable cement province. Therefore, the data mainly comes from the production data of typical cement companies representing the average production level in Shandong Province and the monitoring data of the local environmental protection department.

## Use advice
Users of this LCA data set should note that it exclusively covers the production phase of virgin cement at an average production level from a typical Shandong Province cement enterprise. All direct processes involved in cement production are considered within the system boundary. However, auxiliary processes such as raw material extraction, processing, energy production, and equipment manufacture, transportation, sales, and usage phase energy consumption and environmental emissions, are excluded at this stage. For accurate Life Cycle Assessment, users should integrate this data with additional LCA data covering these external processes. Furthermore, it should be acknowledged that the geographical scope is confined to Shandong and may not be representative of production processes in other regions.

## Review details
Inventory: The internal review was done by several iteration steps concerning raw data validation, raw data documentation, representativity, completeness and consistency of modelling with regard to ISO 14040 and 14044.

## Data sources
- 邓琪 & 陈吉宁. (2012). 钢铁工业固废应用于水泥生产的降耗与减排. 生态环境学报, 21(2), 298–302.
