# Aluminum electrolytic capacitor production ; Aluminum electrolytic capacitor (25V 100uf)

Dataset: ILCD process, Unit process, black box
Geography: NT-JS-CN
Reference year: 2020
Classification: Unit processes / Materials production / Metals and semimetals
Generated by: Jinliang Xie, jinliang.research@gmail.com
Owner: Tiangong LCI Data Working Group
Review: Dependent internal review by Tiangong LCI Data Working Group
Amounts: no units in this file; such an amount is in the reference unit of its flow, which a separate flow dataset defines
copyright: false
licenseType: Free of charge for all users and uses

## General comment
The aluminum electrolytic capacitors (25V 100uf) produced in this industrial process are primarily used in electronic circuits for energy storage and filtering. These capacitors are essential components in a wide range of electronic devices, including power supplies, consumer electronics, and automotive electronics due to their ability to withstand high voltages and large capacitance values.

## Time period
Data from research conducted in 2020

## Reference product
- Aluminum Electrolytic Capacitors: 10000; measured
  aluminum electrolytic capacitors (qualified) (10000 pcs)

## Inputs
All rows: measured
- electricity, high voltage, aluminium industry: 1266.48
- aluminium, primary, ingot: 7.22
  Al ingots (anode) ; Al smelting preparation (anode)
- aluminium, primary, ingot: 4.77
  Al ingots (cathode)
- case from assembly (including sleeving): 69.75
- Lead, in ground: 2.8
  Lead from assembly (including sleeving)
- polysulfide, sealing compound: 6.11
  Sealing cover from assembly (including sleeving)
- Sleeve: 4.23
  sleeve from assembly (including sleeving)
- Armature Winding: 2.8
  tab from winding ; 绕组接线片
- sealing tape, aluminium/PE, 50 mm wide: 0.47
  tape from winding
- Separator Paper Coil,Separator Paper Coil: 4.49
  Separator paper coil
- water, deionised: 1880.57
  deionized water
- tap water: 1043.35
  tape water
- electrolyte, KOH, LiOH additive: 13.59
  Electrolyte (soak); The complete composition of electrolyte is 69% main solvent (1,4-butyrolactone), 26% auxiliary solvent (ammonium tetramethylsuccinate), and 5% solute (water). The electrolyte here is assumed to consist of 95% the main solvent and 5% solutes to simplify the analysis of environmental impacts.
- phosphoric acid, industrial grade, without water, in 85% solution state: 1.95
- Perboric acid: 0.35
  perboric acid; HBO3; 过硼酸
- hydrochloric acid, without water, in 30% solution state: 3
  HCl (31%)
- Nitrogen: 0.01
  N2 gas (final annealing)
- sodium hydroxide, without water, in 50% solution state: 3.37
  NaOH (30%)
- ammonium nitrate: 0.03
  硝酸氢铵; 硝酸铵；NH4NO3
- nitric acid, without water, in 50% solution state: 0.9
  HNO3 (98%)
- Cold Rolling Oil: 0.3
  rolling oil (cold rolling)
- Ammonium Citrate: 0.68
  Ammonium citrate (formation process); 柠檬酸铵
- Ammonium Pentaborate: 0.19
  Ammonium pentaborate (formation process); 五硼酸铵
- Argon-40: 0.002
  Ar gas (Al smelting preparation)

## Outputs
All rows: measured
- Aluminium Phosphate: 0.25
  Aluminium phosphate (AlPO4) (production of anode formed foil); The environmental impacts from the production stage are all allocated to the capacitors. The by-product AlPO4 in production of anode formed foil is taken as an economical treatment method to address the production waste because of the limited amount and the simplified analysis.
- aluminium scrap, new: 0.73
  Al scraps; The environmental impacts on the specialized recycling processing of the flows are ignored.
- Scraps of Separator Paper: 0.029
  Scraps of separator paper; The environmental impacts on the specialized recycling processing of the flows are ignored.
- Sludge (Sewage Treatment): 0.236
  sludge (Sewage treatment); The environmental impacts on the specialized landfill of the sludge are ignored.
- wastewater, average: 1617.84
  wastewater
- Total Phosphorus (TP): 0.001
  total phosphorous (TP) (production of anode formed foil); 总磷 (污染物);
- total nitrogen: 0.003
  total nitrogen (TN); 总氮 (污染物)
- Suspended solids, unspecified: 0.025
- chemical oxygen demand: 0.072
- Biochemical Oxygen Demand: 0.01
  Biochemical Oxygen Demand (BOD) (Production of Al blank foil); 生化需氧量 (水体污染物)
- ammonia: 0.007
  Ammonia nitrogen (NH3-N)
- Dust: 0.004
  dust (Al smelting preparation)
- Hydrochloric acid: 0.015
- Sulfuric acid: 0.002
- Nitrogen oxides: 0.002
- ammonia: 0.002
- Aluminum Electrolytic Capacitors (Waste): 6281.67
  aluminum electrolytic capacitors (waste) ; The environmental impacts on the specialized recycling processing of the flows are ignored.

## Data selection and combination
The foreground data are from an AECs’ manufacturer and its supplier. The data about the product family and manufacturing processes of capacitor fabrication are from the AECs’ manufacturer in Nantong, Jiangsu, China. The reference year of capacitor fabrication is 2021. Furthermore, through the investigation of the manufacturer’s upstream supplier, the original data of manufacturing processes of blank foil fabrication (anode and cathode), formed foil fabrication, and cathode etched foil fabrication are obtained. The reference year of blank foil fabrication, formed foil fabrication, and cathode etched foil fabrication is 2020. The background data of the substance flows (i.e., aluminum ingots, separator paper, electricity, water) from the primary industries are acquired from the Gabi software (version 10.0.0.71). The LCI data about specialized treating processes of production waste, including capacitors (waste), aluminum scraps, paper scraps, and sludge, are ignored. In the electrolyte, the complete composition of the electrolyte is 69% main solvent (1,4-butyrolactone), 26% auxiliary solvent (ammonium tetramethyl succinate), and 5% solute (water). The electrolyte here is assumed to consist of 95% of the main solvent and 5% solutes to simplify the analysis of environmental impacts due to the missing LCI data. The inaccessible LCI data about 1,4-butyrolactone, ammonium citrate, ammonium pentaborate, NH4H2PO4, and HBO3 are estimated according to chemical equations of the existing substance flows (reactants) in Gabi software. This will underestimate the environmental impact of these substances in actual industrial production to a certain extent. Besides, many chemical reactions need to satisfy various reaction conditions such as pressure, temperature, and catalyst, which will lead to the extra input of energy and raw materials and increase the risk of environmental pollution. If there are side reactions for the desired chemical reaction, it will not only affect the yield of the targeted product of the reaction but also need a suitable subsequent treatment process to separate and purify the product. Due to the limited consumption of these five materials, their influence on the final assessment result is not significant.

## Use advice
When utilizing the provided Life Cycle Assessment data for these aluminum electrolytic capacitors, it is important to note that certain specialized treating processes of production waste are excluded. Users should be aware that environmental impacts of 1,4-butyrolactone and other chemicals are underestimated due to the lack of complete LCI data and simplified analysis. This should be considered in the assessment, especially if these substances are of particular environmental concern. Additionally, the potential influence of side reactions and the need for subsequent treatment processes should be acknowledged when evaluating the manufacturing processes and their environmental implications.

## Review details
Inventory: The internal review was done by several iteration steps concerning raw data validation, raw data documentation, representativity, completeness and consistency of modelling with regard to ISO 14040 and 14044.

## Data sources
- Zhang, C., Zheng, Y., Huang, H., Liu, Z. & Jing, J. Environmental impact assessment of aluminum electrolytic capacitors in a product family from the manufacturer’s perspective. Int. J. Life Cycle Assess. (2022)
