# Vegetable Production ; Cultivation (Greenhouse)

Dataset: ILCD process, Unit process, single operation
Geography: XA-SAX-CN
Reference year: 2012
Valid until: 2013
Classification: Materials production / Agricultural production means
Functional unit: 1000 kg tomatoes
Generated by: Haoran Zhang, hrzhang@whu.edu.cn
Owner: Tiangong LCI Data Working Group
Review: Dependent internal review by Tiangong LCI Data Working Group
Amounts: no units in this file; such an amount is in the reference unit of its flow, which a separate flow dataset defines
copyright: false
licenseType: Free of charge for all users and uses

## General comment
The solar and plastic greenhouses described are designed for the cultivation of vegetables, specifically tomatoes and watermelons. These structures optimize plant growth by providing a controlled environment, and they facilitate certain agricultural practices year-round.

## Technology and included processes
The data were obtained as averages from 10 solar greenhouses and 5 plastic greenhouses. Based on the typical service life of construction materials, the consumption of building materials and energy for constructing solar greenhouses and plastic greenhouses were calculated as the equivalent of one year of usage. The service life was assumed to be 15 years for general building materials, 5 years for PVC water pipes, 1 year for greenhouse films (3 years for plastic greenhouses), and 3 years for the anti-cold films (skirt films of plastic greenhouses). The annual consumption of building materials for plastic greenhouses was evenly allocated to tomatoes and watermelons.

## Reference product
- tomato: 1000
  solar greenhouse

## Inputs
- water: 50.388
  solar greenhouse
- Electricity: 315.33
  solar greenhouse

## Outputs
- carbon dioxide (fossil): 23.638
  solar greenhouse
- carbon monoxide: 0.032
  solar greenhouse
- methane (fossil): 0.067
  solar greenhouse
- non-methane volatile organic compounds: 0.001
  solar greenhouse
- sulfur dioxide: 0.205
  solar greenhouse
- Nitrogen oxides: 0.162
  solar greenhouse
- ammonia: 0.083
  solar greenhouse
- nitrous oxide: 0.247
  solar greenhouse
- nitrate: 0.308
  solar greenhouse
- cadmium: 0.000208
  solar greenhouse
- lead: 0.006835
  solar greenhouse
- calcium: 0.027577
  solar greenhouse
- zinc: 0.228139
  solar greenhouse
- arsenic: 0.00443
  solar greenhouse
- nickel: 0.007847
  solar greenhouse
- Rice Seeds: 1.3e-5
  solar greenhouse air
- Rice Seeds: 6e-6
  solar greenhouse water

## Deviations from the LCI method approaches
The system boundary defined in this study includes the construction of facilities and their routine operation (hereinafter referred to as "facility infrastructure"), and the production of materials required for them (cement, steel, bricks, and shed films, etc.), the production of agricultural inputs (chemical fertilizers, mulch films, fungicides, and insecticides), the cultivation of tomatoes (nursery, plowing, transplanting, mulching, fertilizing, spraying, irrigation, and harvesting) as well as the production and consumption of energy used in each process. It does not include the production of agricultural machinery, the transportation of tomatoes to the market for sale, or the process of consumer consumption.

## Data selection and combination
The environmental impact data of energy production and usage processes are sourced from literature (Di et al., 2007; Hu Zhiyuan et al., 2006). The resource, energy, and environmental emission data of the production of steel, cement, bricks, mulching films, frost protection films, plastic films, PVC water pipes, and fertilizers are taken from literature and the 'Clean Production Indicator System of the Phosphate Fertilizer Industry' and 'Clean Production Indicator System of the Nitrogen Fertilizer Industry'. Due to the lack of detailed research data, only energy consumption and CO2 emission volumes are considered in the production processes of insecticides and fungicides, represented in terms of the quality of effective ingredients, and data are adopted from the research results of West et al. (2002).

## Sampling procedure
In this study, 10 sunlight greenhouses (each with an area of 6 m×90 m) and 5 plastic greenhouses (each with an area of 9 m×110 m) were selected as research objects, and the material consumption of the construction and daily operation of the sunlight greenhouses and plastic greenhouses were investigated.

## Use advice
When using data related to this LCA, consider the allocation of construction materials and energy over their respective lifespans: 15 years for general building materials, 5 years for PVC water pipes, 1 year for greenhouse films (3 years for plastic greenhouses), and 3 years for anti-cold films. Note that only energy consumption and CO2 emissions are considered for the production processes of insecticides and fungicides. Excluded are the production of agricultural machinery, transportation of crops to the market, and the consumption phase by end consumers.

## Review details
Inventory: The internal review was done by several iteration steps concerning raw data validation, raw data documentation, representativity, completeness and consistency of modelling with regard to ISO 14040 and 14044.

## Data sources
- 王效琴,吴庆强,周建斌,陈妍,吴发启.设施番茄生产系统的环境影响生命周期评价[J].环境科学学报,2014,34(11):2940-2947.
