# Impermeable funnel ; Total length in 36.6 m ; In-situ groundwater remediation ; PRB ; Funnel-and-gate construction

Dataset: ILCD process, Unit process, single operation
Geography: UM
Reference year: 2009
Classification: Unit processes / Other Services / Repair and maintenance
Generated by: Yang Xintong, yangxt@caep.org.cn
Owner: Tiangong LCI Data Working Group
Review: Dependent internal review by Tiangong LCI Data Working Group
Amounts: no units in this file; such an amount is in the reference unit of its flow, which a separate flow dataset defines
copyright: false
licenseType: Free of charge for all users and uses

## General comment
PRBs are installed in situ, allowing groundwater to flow under the natural gradient through a reactive cell where a reactive medium degrades or captures contaminants.

## Geography
The case study was conducted using publicly available design documents for two remediation strategies designed by Battelle for Dover Air Force Base (AFB) in Dover, DE

## Technology and included processes
The funnel was to be constructed from prefabricated steel sheet piling sealed together with cementitious grout.

## Technical purpose
The impermeable funnel construction is intended for use as part of an in-situ groundwater remediation system. Specifically, this process involving a funnel-and-gate style Permeable Reactive Barrier (PRB) is applied to treat contaminated groundwater within Dover Air Force Base. It is used to allow the natural flow of groundwater to pass through a reactive cell that degrades or captures contaminants, which makes it a targeted solution for environmental restoration efforts and pollution control at contaminated sites.

## Reference product
- Impermeable funnel: 36.6; measured

## Inputs
- Steel: 47800; measured
- Concrete: 10300; measured

## Use advice
Users of this data set should note that the parameters of the impermeable funnel and PRB are designed specifically for the case study at Dover Air Force Base. Adaptation to other sites requires careful consideration of the local hydrogeological conditions, contaminant types, and concentration levels. It is recommended to verify the suitability of the PRB design for other locations, and necessary adjustments may need to be estimated using modeling. Inputs or emissions that were not included in the databases need to be calculated based on site-specific data when adapting this process. Any such adjustments should be based upon available literature or fundamental principles.

## Review details
Inventory: The internal review was done by several iteration steps concerning raw data validation, raw data documentation, representativity, completeness and consistency of modelling with regard to ISO 14040 and 14044.

## Data sources
- Life-Cycle Case Study Comparison of Permeable Reactive Barrier versus Pump-and-Treat Remediation
