# Aluminum ingot casting ; Primary aluminum ingot ; Liquid primary aluminum

Dataset: ILCD process, Unit process, single operation
Geography: CN
Reference year: 2015
Classification: Unit processes / Materials production / Metals and semimetals
Generated by: Huimin Chang, huiminchang@tsinghua.edu.cn
Owner: Tiangong LCI Data Working Group
Review: Dependent internal review by Tiangong LCI Data Working Group
Amounts: no units in this file; such an amount is in the reference unit of its flow, which a separate flow dataset defines
copyright: false
licenseType: Free of charge for all users and uses

## General comment
This primary aluminum ingot casting process is utilized for the production of high-purity primary aluminum ingots. These ingots are typically used as a raw material in various industries, including automotive, aerospace, electronics, and construction. Depending on the final product specifications, the ingots may be further processed through rolling, extrusion, or other metallurgical techniques to produce components or products such as frames, structural panels, conductor wiring, and other aluminum-based parts.

## Time period
IAI 2015 (Gabi dataset）

## Reference product
- aluminium, primary, ingot: 1000; software or database
  Aluminium ingot [kg]

## Inputs
- electricity, high voltage, aluminium industry: 190.285; software or database
  Electricity [kWh]
- aluminium, primary, liquid: 1000; software or database
  Aluminium (liquid) [kg]
- chlorine, liquid: 0.00989; estimated
  Chlorine [kg] ; EU-28 used as no specific data for CN and NO available
- heavy fuel oil: 48.9605; software or database
  Heavy oil [MJ]
- Diesel oil: 17.5417; software or database
  Diesel oil [MJ]
- heat, district or industrial, natural gas: 783.614; software or database
  Natural gas [MJ]
- freshwater: 2.19833; software or database
  Fresh water [m3]

## Outputs
- particles (> PM10): 0.03899; software or database
  Particulates [kg] ; PM10
- sulfur dioxide: 0.03343; software or database
  Sulfur dioxide [kg]
- Nitrogen oxides: 0.07545; estimated
  Nitrous oxides (as NO2) [kg] ; GLO used as no specific data for CN available
- hydrogen chloride: 0.02037; software or database
  Hydrogen chloride [kg]
- 2,3,7,8-tetrachlorodibenzo-p-dioxin: 7.005e-10; software or database
  Dioxin/furans [kg]
- water vapour: 1.22359e8; software or database
  Water vapour [kg]
- Suspended solids, unspecified: 0.26637; software or database
  Suspended solids [kg]
- Oils, unspecified: 0.03401; software or database
  Oil and grease/total hydrocarbons [kg]
- freshwater: 1.88745; software or database
  Fresh water [m3]

## Data selection and combination
For reliable findings, the most recent and representative data were considered. Regional or country-specific data were used when provided in the GaBi© “professional and extension” database (SP 39) or in the literature. If location-specific data were not found, either comparable data for the country or global data were used. For consistency, data from the same source and year were used if available. Due to data availability, the study did not consider some inputs and background processes if they contributed less than 1% to the total input mass. For primary aluminium production, this study used the most recent LCI data from 2015 provided by the International Aluminium Institute (IAI) (International Aluminium Institute, 2017b). IAI data were used because the IAI is an established institute that considers primary aluminium production worldwide and the data were used in studies e.g. from the Aluminium Association and from the European Aluminium Association (Aluminum Association, 2013; European Aluminium Association, 2018). In terms of the LCA data of standardized primary aluminium production, only few uncertainties occurred. Generally, the composition of these data could be fully explained and reconstructed.

## Use advice
When using this LCA dataset, ensure that the regional or country-specific data align with the geographical context of the intended study. If specific location data are not available, use the provided global or comparable country data. Recognize that certain minimal inputs and background processes are omitted from this study if they account for less than 1% of the total input mass. Therefore, these data should be used with the understanding that they represent a simplification. When modeling the use phase of primary aluminum, consider applying data consistently from the same source and year—for instance, the IAI 2015 dataset—to ensure accuracy and comparability. For transparency and methodological robustness, be aware that only a few uncertainties are associated with this standardized primary aluminum production data, which can be explained and reconstructed with the detailed information provided.

## Review details
Inventory: The internal review was done by several iteration steps concerning raw data validation, raw data documentation, representativity, completeness and consistency of modelling with regard to ISO 14040 and 14044.

## Data sources
- Luthin, A., Backes, J. G. & Traverso, M. A framework to identify environmental-economic trade-offs by combining life cycle assessment and life cycle costing – A case study of aluminium production. Journal of Cleaner Production 321, 128902 (2021).
