# Acid roasting of Rare Earth Elements (REE)s;Rare Earth Elements (REE);bastnaesite route;Rare Earth Elements (REE) containing ore

Dataset: ILCD process, Unit process, single operation
Geography: NMG-CN
Reference year: 2014
Classification: Unit processes / Materials production / Inorganic chemicals
Functional unit: The functional unit of this study is the production of 1 kg of the basket REO from each corresponding mineralogical and processing route.
LCI method principle: Attributional
LCI method approaches: Allocation - market value
Generated by: Tao Wang, twang@iue.ac.cn
Owner: Tiangong LCI Data Working Group
Review: Dependent internal review by Tiangong LCI Data Working Group
Amounts: no units in this file; such an amount is in the reference unit of its flow, which a separate flow dataset defines
copyright: false
licenseType: Free of charge for all users and uses

## General comment
The acid roasting process of rare earth elements (REEs) described in this data set, specifically employing the bastnaesite route with REE containing ore, is typically utilized in the extraction and refining phase of REE production systems. The resulting product is intended for various applications across high-tech industries, including electronics, renewable energy technologies, and as key components in advanced manufacturing processes.

## Technology and included processes
In this study, the REE production system was analyzed from mining up to and including solvent extraction which contains product finishing processes such as precipitation and calcination

## Reference product
- Rare Earth Element sulfate: 1; calculated
  REE sulfate

## Inputs
All rows: calculated
- transport in t*km,transport in t*km: 0.171, 3.08 (2 entries)
- sulphuric acid: 1.55
- Rare Earth Oxides: 1.1
  LANGUAGE
- heavy fuel oil: 6.59
- Sulfidic tailing: 0.505

## Outputs
- carbon dioxide (fossil): 0.154; calculated
  原文未区分bio和fossil，根据专家判断此处为fossil
- sulfur oxides: 0.00911; calculated
- hydrogen fluoride: 0.0245; calculated

## Deviations from the LCI method approaches
In this study, the REE production system was analyzed from mining up to and including solvent extraction which contains product finishing processes such as precipitation and calcination (Fig. 1). The other categories assessed in the literature review were mineral type, radioactivity, waste treatment, and co-mining. For mineral type, it was noted that the mineralogy accounted for in each study was different, which makes comparison difficult. For radioactivity, we marked with an X those studies which exemplified radioactivity flows in the LCI (if provided). For waste, we distinguished those LCIs which quantified waste treatment flows. For co-mining, since all REE are co-products of each other, this column is meant to highlight the co-products in addition to REE.

## Use advice
When utilizing this data set for Life Cycle Assessment (LCA) studies, users should consider the specific mineralogy of the bastnaesite route and ensure that comparative analyses account for variations in mineral types. It is important to include radioactivity flows if provided in the Life Cycle Inventory (LCI) and to consider waste treatment measures. The co-mining aspect also necessitates the careful consideration of co-products beyond REE. The functional unit for this study is set to the production of 1 kg of a basket of REO (Rare Earth Oxides) from the specified mineralogical and processing route.

## Review details
Inventory: The internal review was done by several iteration steps concerning raw data validation, raw data documentation, representativity, completeness and consistency of modelling with regard to ISO 14040 and 14044.

## Data sources
- Bailey, G. et al. Review and new life cycle assessment for rare earth production from bastnäsite, ion adsorption clays and lateritic monazite. Resources, Conservation and Recycling 155, 104675 (2020).
