# o/P-dichlorobenzene ; Liquid chlorine, pure benzene, catalyst ; Liquid chlorine, pure benzene, catalyst ; All sizes; NESPS2 / 邻/对二氯苯 ; 液氯、纯苯、催化剂 ; 液氯、纯苯、催化剂 ; 所有规模 ; 全国第二次污染普查数据

Dataset: ILCD process, Unit process, single operation
Geography: CN
Reference year: 2019
Classification: Reference Parameters / Materials production / Organic chemicals
Generated by: The data was created by the Office of the Second National Pollution Source Census of the Ministry of Ecology and Environment, and the data was organized by the TianGong Plan team for ILCD format / 生态环境部第二次全国污染源普查工作办公室创建数据，天工计划团队常慧敏整理数据为ILCD格式
Owner: Tiangong LCI Data Working Group / 天工LCI数据工作小组
Review: Dependent internal review by Tiangong LCI Data Working Group / 天工LCI数据工作小组
Amounts: no units in this file; such an amount is in the reference unit of its flow, which a separate flow dataset defines
copyright: false
licenseType: Free of charge for all users and uses

## General comment
the Technical of end-of-pipe management technology for pollution chemical oxygen demandisAdsorption，Its Technical efficiency of end-of-pipe management90.3

## Technical purpose
邻/对二氯苯的生产过程使用液氯、纯苯和催化剂，适用于化工行业的所有规模。它主要用于有机化合物的合成，尤其是用于生产聚苯硫醚、除草剂、染料、颜料及药品。此外，该过程包括一个末端处理技术—吸附法，用于处理化学需氧量(COD)污染物，确保更干净的排放水。

## Reference product
- 1,2-dichlorobenzene: 1000; calculated
  源文件中描述为为邻/对二氯苯，此处对其进行了匹配工作，将其匹配到LCAflow库里面相最符合的流，污染物指标备注为工业废水量

## Outputs
- Waste water: 395; calculated
  the Technical of end-of-pipe management technology for pollution Waste wateris/，Its Technical efficiency of end-of-pipe management0
  污染物指标工业废水量的末端治理技术是/，其效率为0。原文件中描述污染物类别为废水，污染物指标为工业废水量，此处对其进行了匹配工作，将其匹配到LCAflow库里面相最符合的流，污染物指标备注为工业废水量
- chemical oxygen demand: 0.0039576; calculated
  the Technical of end-of-pipe management technology for pollution chemical oxygen demandisAdsorption，Its Technical efficiency of end-of-pipe management90.3
  污染物指标化学需氧量的末端治理技术是吸附，其效率为90.3，末端治理设施实际运行率（k值）计算公式为k=处理设施运行时间(小时/年)/正常生产时间(小时/年)。原文件中描述污染物类别为废水，污染物指标为化学需氧量，此处对其进行了匹配工作，将其匹配到LCAflow库里面相最符合的流，污染物指标备注为化学需氧量

## Use advice
This dataset is derived from the Pollution Source Census Report and contains information on pollution emissions and related products. However, it does not include data on energy or chemical consumption, nor does it provide information on waste or co-product generation. When utilizing this dataset, please supplement the missing data based on actual conditions before use
该数据集来源于污染源普查报告，包含污染物排放及相关产品信息，但不包含能源或化学品消耗数据，也不提供废弃物或共生产物产生信息。在使用该数据集时，请根据实际情况补充缺失数据后再使用。

## Review details
Inventory: The internal review was done by several iteration steps concerning raw data validation, raw data documentation, representativity, completeness and consistency of modelling with regard to ISO 14040 and 14044.
清单： 内部审查通过几个迭代步骤完成，涉及原始数据验证、原始数据记录、代表性、完整性、与 ISO 14040 和 14044 有关的建模的一致性。

## Data sources
- 第二次全国污染源普查产排污核算系数手册（试用版）,二级代码26,四级代码2614文件，在完整版文件中第4111页
