# 2,4-Dinitro-6-chloroaniline ; Organic chemical raw materials ; Organic chemical synthesis ; All sizes; NESPS2 / 2,4-二硝基-6-氯苯胺 ; 有机化工原料 ; 有机化工合成 ; 所有规模 ; 全国第二次污染普查数据

Dataset: ILCD process, Unit process, single operation
Geography: CN
Reference year: 2019
Classification: Reference Parameters / Materials production / Organic chemicals
Generated by: The data was created by the Office of the Second National Pollution Source Census of the Ministry of Ecology and Environment, and the data was organized by the TianGong Plan team for ILCD format / 生态环境部第二次全国污染源普查工作办公室创建数据，天工计划团队常慧敏整理数据为ILCD格式
Owner: Tiangong LCI Data Working Group / 天工LCI数据工作小组
Review: Dependent internal review by Tiangong LCI Data Working Group / 天工LCI数据工作小组
Amounts: no units in this file; such an amount is in the reference unit of its flow, which a separate flow dataset defines
copyright: false
licenseType: Free of charge for all users and uses

## General comment
the Technical of end-of-pipe management technology for pollution Exhaust gasis/，Its Technical efficiency of end-of-pipe management0

## Technical purpose
2,4-二硝基-6-氯苯胺是一种用于化工行业合成各种有机化合物的有机化工原料。这种化合物适用于从小规模实验室设置到大体积商业规模生产的所有规模的工业生产中。它还可以用于染料、药品、农药和其他工业产品的制造。

## Reference product
- 2,4-Dichloronitrobenzene: 1000; calculated
  源文件中描述为为2,4-二硝基-6-氯苯胺，此处对其进行了匹配工作，将其匹配到LCAflow库里面相最符合的流，污染物指标备注为工业废水量

## Outputs
All rows: calculated
- sulfur dioxide: 0.01275
  the Technical of end-of-pipe management technology for pollution sulfur dioxideisLimestone/gypsum method，Its Technical efficiency of end-of-pipe management75
  污染物指标二氧化硫的末端治理技术是石灰石/石膏法，其效率为75，末端治理设施实际运行率（k值）计算公式为k=治理设施运行时间（小时）/正常生产时间（小时）。原文件中描述污染物类别为废气，污染物指标为二氧化硫，此处对其进行了匹配工作，将其匹配到LCAflow库里面相最符合的流，污染物指标备注为二氧化硫
- particles (PM2.5 - PM10): 0.4315
  the Technical of end-of-pipe management technology for pollution particles (PM2.5 - PM10)isCyclone dust removal + bag filter + wet precipitation，Its Technical efficiency of end-of-pipe management95
  污染物指标颗粒物的末端治理技术是旋风除尘+袋式除尘+湿法除尘，其效率为95，末端治理设施实际运行率（k值）计算公式为k=治理设施运行时间（小时）/正常生产时间（小时）。原文件中描述污染物类别为废气，污染物指标为颗粒物，此处对其进行了匹配工作，将其匹配到LCAflow库里面相最符合的流，污染物指标备注为颗粒物
- volatile organic compound: 18.26
  the Technical of end-of-pipe management technology for pollution volatile organic compoundisAbsorption + diversion + direct combustion，Its Technical efficiency of end-of-pipe management78
  污染物指标挥发性有机物的末端治理技术是吸收+分流+直接燃烧法，其效率为78，末端治理设施实际运行率（k值）计算公式为k=治理设施运行时间（小时）/正常生产时间（小时）。原文件中描述污染物类别为废气，污染物指标为挥发性有机物，此处对其进行了匹配工作，将其匹配到LCAflow库里面相最符合的流，污染物指标备注为挥发性有机物
- Waste water: 42000
  the Technical of end-of-pipe management technology for pollution Waste wateris/，Its Technical efficiency of end-of-pipe management0
  污染物指标工业废水量的末端治理技术是/，其效率为0。原文件中描述污染物类别为废水，污染物指标为工业废水量，此处对其进行了匹配工作，将其匹配到LCAflow库里面相最符合的流，污染物指标备注为工业废水量
- chemical oxygen demand: 8
  the Technical of end-of-pipe management technology for pollution chemical oxygen demandisPhysical treatment + chemical treatment + aerobic biological treatment + anaerobic biological treatment，Its Technical efficiency of end-of-pipe management90
  污染物指标化学需氧量的末端治理技术是物理处理法+化学处理法+好氧生物处理法+厌氧生物处理法，其效率为90，末端治理设施实际运行率（k值）计算公式为k=治理设施运行时间（小时）/正常生产时间（小时）。原文件中描述污染物类别为废水，污染物指标为化学需氧量，此处对其进行了匹配工作，将其匹配到LCAflow库里面相最符合的流，污染物指标备注为化学需氧量
- Ammonia Nitrogen: 48
  the Technical of end-of-pipe management technology for pollution Ammonia NitrogenisPhysical treatment + chemical treatment + aerobic biological treatment + anaerobic biological treatment，Its Technical efficiency of end-of-pipe management70
  污染物指标氨氮的末端治理技术是物理处理法+化学处理法+好氧生物处理法+厌氧生物处理法，其效率为70，末端治理设施实际运行率（k值）计算公式为k=治理设施运行时间（小时）/正常生产时间（小时）。原文件中描述污染物类别为废水，污染物指标为氨氮，此处对其进行了匹配工作，将其匹配到LCAflow库里面相最符合的流，污染物指标备注为氨氮
- Nitrogen, organic bound: 57.4
  the Technical of end-of-pipe management technology for pollution Nitrogen, organic boundisAerobic biological treatment + anaerobic biological treatment，Its Technical efficiency of end-of-pipe management65
  污染物指标总氮的末端治理技术是好氧生物处理法+厌氧生物处理法，其效率为65，末端治理设施实际运行率（k值）计算公式为k=治理设施运行时间（小时）/正常生产时间（小时）。原文件中描述污染物类别为废水，污染物指标为总氮，此处对其进行了匹配工作，将其匹配到LCAflow库里面相最符合的流，污染物指标备注为总氮
- Exhaust gas: 85000
  the Technical of end-of-pipe management technology for pollution Exhaust gasis/，Its Technical efficiency of end-of-pipe management0
  污染物指标工业废气量的末端治理技术是/，其效率为0。原文件中描述污染物类别为废气，污染物指标为工业废气量，此处对其进行了匹配工作，将其匹配到LCAflow库里面相最符合的流，污染物指标备注为工业废气量

## Use advice
This dataset is derived from the Pollution Source Census Report and contains information on pollution emissions and related products. However, it does not include data on energy or chemical consumption, nor does it provide information on waste or co-product generation. When utilizing this dataset, please supplement the missing data based on actual conditions before use
该数据集来源于污染源普查报告，包含污染物排放及相关产品信息，但不包含能源或化学品消耗数据，也不提供废弃物或共生产物产生信息。在使用该数据集时，请根据实际情况补充缺失数据后再使用。

## Review details
Inventory: The internal review was done by several iteration steps concerning raw data validation, raw data documentation, representativity, completeness and consistency of modelling with regard to ISO 14040 and 14044.
清单： 内部审查通过几个迭代步骤完成，涉及原始数据验证、原始数据记录、代表性、完整性、与 ISO 14040 和 14044 有关的建模的一致性。

## Data sources
- 第二次全国污染源普查产排污核算系数手册（试用版）,二级代码26,四级代码2645文件，在完整版文件中第4111页
