# Product Drying ; Artificial board furniture (ecological board combination furniture and powder coated furniture) ; Coating (powder) ; Drying / Drying ; All sizes; NESPS2 / 产品干燥 ; 人造板家具（生态板组合家具及喷粉家具） ; 涂料（粉末） ; 烘干/晾干 ; 所有规模 ; 全国第二次污染普查数据

Dataset: ILCD process, Unit process, single operation
Geography: CN
Reference year: 2019
Classification: Reference Parameters / Energy carriers and technologies / Heat and steam
Generated by: The data was created by the Office of the Second National Pollution Source Census of the Ministry of Ecology and Environment, and the data was organized by the TianGong Plan team for ILCD format / 生态环境部第二次全国污染源普查工作办公室创建数据，天工计划团队常慧敏整理数据为ILCD格式
Owner: Tiangong LCI Data Working Group / 天工LCI数据工作小组
Review: Dependent internal review by Tiangong LCI Data Working Group / 天工LCI数据工作小组
Amounts: no units in this file; such an amount is in the reference unit of its flow, which a separate flow dataset defines
copyright: false
licenseType: Free of charge for all users and uses

## General comment
the Technical of end-of-pipe management technology for pollution Powder CoatingisAdsorption + steam desorption，Its Technical efficiency of end-of-pipe management50，The formula for calculating the actual operation rate (k-value) of the end-of-pipe treatment facility is k = power consumption of process waste gas purification device (kWh) / (rated power of process waste gas purification device (kW) × process waste gas purification device operating time (hours))

## Technical purpose
所述工业过程用于干燥各种尺寸的人造板家具，包括生态板组合家具和喷粉家具。使用的涂料是粉末型的，干燥技术包括烘箱干燥和自然风干方法。此外，还采用了污染挥发性有机物(VOCs)的末端处理技术。这些技术包括蒸汽解吸的吸附，活性炭吸附/解吸与催化燃烧，其他吸附剂（如活性炭纤维或沸石）的解吸/催化氧化，一次性活性炭吸附，低温等离子体治理，光解，及直接排放方式。这些技术的效率各不相同，具体的k值用于监测废气净化设备的运行率。

## Reference product
- Powder Coating: 1; input; calculated
  源文件中描述为为涂料（粉末），此处对其进行了匹配工作，将其匹配到LCAflow库里面相最符合的流

## Outputs
All rows: calculated
- volatile organic compound: 0
  the Technical of end-of-pipe management technology for pollution volatile organic compoundisActivated carbon adsorption/desorption catalytic combustion method，Its Technical efficiency of end-of-pipe management80，The formula for calculating the actual operation rate (k-value) of the end-of-pipe treatment facility is k = power consumption of dust removal equipment (kWh) / (rated power of dust removal equipment (kW) × dust removal equipment operating time (hours))
  污染物指标挥发性有机物的末端治理技术是活性炭吸附/脱附催化燃烧法，其效率为80，末端治理设施实际运行率（k值）计算公式为k=处理设施耗电量（千瓦时/年）/[设备额定功率（千瓦）×运行时间（小时/年）]。原文件中描述污染物类别为废气，污染物指标为挥发性有机物，此处对其进行了匹配工作，将其匹配到LCAflow库里面相最符合的流
- volatile organic compound: 0
  the Technical of end-of-pipe management technology for pollution volatile organic compoundisAdsorption + steam desorption，Its Technical efficiency of end-of-pipe management50，The formula for calculating the actual operation rate (k-value) of the end-of-pipe treatment facility is k = power consumption of dust removal equipment (kWh) / (rated power of dust removal equipment (kW) × dust removal equipment operating time (hours))
  污染物指标挥发性有机物的末端治理技术是吸附/蒸汽解吸，其效率为50，末端治理设施实际运行率（k值）计算公式为k=处理设施耗电量（千瓦时/年）/[设备额定功率（千瓦）×运行时间（小时/年）]。原文件中描述污染物类别为废气，污染物指标为挥发性有机物，此处对其进行了匹配工作，将其匹配到LCAflow库里面相最符合的流
- volatile organic compound: 0
  the Technical of end-of-pipe management technology for pollution volatile organic compoundisDirect discharge，The formula for calculating the actual operation rate (k-value) of the end-of-pipe treatment facility is k = power consumption of process waste gas purification device (kWh) / (rated power of process waste gas purification device (kW) × process waste gas purification device operating time (hours))
  污染物指标挥发性有机物的末端治理技术是直接排放，末端治理设施实际运行率（k值）计算公式为k=处理设施耗电量（千瓦时/年）/[设备额定功率（千瓦）×运行时间（小时/年）]。原文件中描述污染物类别为废气，污染物指标为挥发性有机物，此处对其进行了匹配工作，将其匹配到LCAflow库里面相最符合的流
- volatile organic compound: 0
  the Technical of end-of-pipe management technology for pollution volatile organic compoundisLow temperature plasma，Its Technical efficiency of end-of-pipe management30，The formula for calculating the actual operation rate (k-value) of the end-of-pipe treatment facility is k = power consumption of process waste gas purification device (kWh) / (rated power of process waste gas purification device (kW) × process waste gas purification device operating time (hours))
  污染物指标挥发性有机物的末端治理技术是低温等离子体，其效率为30，末端治理设施实际运行率（k值）计算公式为k=处理设施耗电量（千瓦时/年）/[设备额定功率（千瓦）×运行时间（小时/年）]。原文件中描述污染物类别为废气，污染物指标为挥发性有机物，此处对其进行了匹配工作，将其匹配到LCAflow库里面相最符合的流
- volatile organic compound: 0
  the Technical of end-of-pipe management technology for pollution volatile organic compoundisOthers (activated carbon fiber or zeolite adsorption/desorption/catalytic oxidation)，Its Technical efficiency of end-of-pipe management85，The formula for calculating the actual operation rate (k-value) of the end-of-pipe treatment facility is k = power consumption of process waste gas purification device (kWh) / (rated power of process waste gas purification device (kW) × process waste gas purification device operating time (hours))
  污染物指标挥发性有机物的末端治理技术是其他（活性炭纤维或沸石吸附/脱附/催化氧化），其效率为85，末端治理设施实际运行率（k值）计算公式为k=处理设施耗电量（千瓦时/年）/[设备额定功率（千瓦）×运行时间（小时/年）]。原文件中描述污染物类别为废气，污染物指标为挥发性有机物，此处对其进行了匹配工作，将其匹配到LCAflow库里面相最符合的流
- volatile organic compound: 0
  the Technical of end-of-pipe management technology for pollution volatile organic compoundisOthers (disposable activated carbon adsorption)，Its Technical efficiency of end-of-pipe management6，The formula for calculating the actual operation rate (k-value) of the end-of-pipe treatment facility is k = power consumption of process waste gas purification device (kWh) / (rated power of process waste gas purification device (kW) × process waste gas purification device operating time (hours))
  污染物指标挥发性有机物的末端治理技术是其他（抛弃式活性炭吸附），其效率为6，末端治理设施实际运行率（k值）计算公式为k=处理设施耗电量（千瓦时/年）/[设备额定功率（千瓦）×运行时间（小时/年）]。原文件中描述污染物类别为废气，污染物指标为挥发性有机物，此处对其进行了匹配工作，将其匹配到LCAflow库里面相最符合的流
- volatile organic compound: 0
  the Technical of end-of-pipe management technology for pollution volatile organic compoundisPhotolysis，Its Technical efficiency of end-of-pipe management20，The formula for calculating the actual operation rate (k-value) of the end-of-pipe treatment facility is k = power consumption of process waste gas purification device (kWh) / (rated power of process waste gas purification device (kW) × process waste gas purification device operating time (hours))
  污染物指标挥发性有机物的末端治理技术是光解，其效率为20，末端治理设施实际运行率（k值）计算公式为k=处理设施耗电量（千瓦时/年）/[设备额定功率（千瓦）×运行时间（小时/年）]。原文件中描述污染物类别为废气，污染物指标为挥发性有机物，此处对其进行了匹配工作，将其匹配到LCAflow库里面相最符合的流

## Use advice
This dataset is derived from the Pollution Source Census Report and contains information on pollution emissions and related products. However, it does not include data on energy or chemical consumption, nor does it provide information on waste or co-product generation. When utilizing this dataset, please supplement the missing data based on actual conditions before use
该数据集来源于污染源普查报告，包含污染物排放及相关产品信息，但不包含能源或化学品消耗数据，也不提供废弃物或共生产物产生信息。在使用该数据集时，请根据实际情况补充缺失数据后再使用。

## Review details
Inventory: The internal review was done by several iteration steps concerning raw data validation, raw data documentation, representativity, completeness and consistency of modelling with regard to ISO 14040 and 14044.
清单： 内部审查通过几个迭代步骤完成，涉及原始数据验证、原始数据记录、代表性、完整性、与 ISO 14040 和 14044 有关的建模的一致性。

## Data sources
- 第二次全国污染源普查产排污核算系数手册（试用版）,二级代码21,三级代码211.0文件，在完整版文件中第412页
