# Repaired groundwater ; Groundwater In situ remediation ; Phytoremediation ; Willow planting ; 4.6 m x 4.6 m grid pattern ; Solar-powered irrigation system

Dataset: ILCD process, Unit process, black box
Geography: UM
Reference year: 2019
Classification: Unit processes / Other Services / Repair and maintenance
Functional unit: The functional unit was the treatment of a 9000 2 area of (= 9000 m3 volumn of) a PCE-contaminated aquifer. The timeframe for the LCA was 100 years.
Generated by: Yang Xintong, yangxt@caep.org.cn
Owner: Tiangong LCI Data Working Group
Review: Dependent internal review by Tiangong LCI Data Working Group
Amounts: no units in this file; such an amount is in the reference unit of its flow, which a separate flow dataset defines
copyright: false
licenseType: Free of charge for all users and uses

## General comment
Phytoremediation is the use of green plants to transfer, accommodate, or transform pollutants to make them harmless to the environment. The object of phytoremediation is soil and water contaminated with heavy metals, organic matter, or radioactive elements.

## Geography
This study was conducted in the context of the SF Bay area, a major metropolitan area (~18,000 km2 ) in California, USA.

## Technology and included processes
Willow were selected for the phytoremediation system. The trees were planted following a 4.6 m by 4.6 m grid pattern. A solar powered irrigation system was used to extract groundwater for irrigating the newly planted trees.

## Technical purpose
The industrial process described pertains to the use of phytoremediation for groundwater remediation. Specifically, this involves the plantation of willow trees in a grid pattern as a biological system for treating water bodies and soil contaminated by heavy metals, organic contaminants, or radioactive substances. It is intended for environmental rehabilitation, particularly in the treatment of PCE-contaminated aquifers. The use of a solar-powered irrigation system for this purpose represents an environmentally friendly technology that leverages renewable energy for environmental remediation processes.

## Reference product
- Remediated groundwater: 9000; measured
  含水层厚度1m，体积9000m3

## Inputs
All rows: measured
- polyvinylchloride resin (S-PVC): 1008
  太阳能灌溉系统安装材料
- Polyethylene,Polyethylene: 405, 177 (2 entries)
  太阳能灌溉系统安装材料
- Steel: 365
  太阳能灌溉系统安装材料
- Copper sheet: 47
  太阳能灌溉系统安装材料
- Textile: 84
  太阳能灌溉系统安装材料
- Compound Fertilizer,Compound Fertilizer: 4517
- aluminium sheet: 59
  太阳能灌溉系统安装材料
- Diesel,Diesel: 2206
- transport in t*km: 5600
  Material transport – by truck (tkm)
- Road Transport,Road Transport: 4.2e6
  Passenger transport (km)
- contaminated groundwater: 9000
  含水层厚度1m，体积9000m3

## Use advice
When utilizing this data set in Life Cycle Assessments, users should include the entire life cycle from cradle to grave, which encompasses raw material and energy acquisition, equipment procurement and use, transportation, construction, and waste disposal. Users should also note the technological specificity of the willow plantation grid pattern and the solar-powered irrigation system. For modeling purposes, the functional unit should be defined as the treatment of 9000 m2 (volume of 9000 m3) of PCE-contaminated aquifer within a 100-year timeframe. Any deviation from these specific conditions should be cautiously considered in the LCA, as it might affect the accuracy and relevance of the analysis.

## Review details
Inventory: The internal review was done by several iteration steps concerning raw data validation, raw data documentation, representativity, completeness and consistency of modelling with regard to ISO 14040 and 14044.

## Data sources
- O'Connor D ,Zheng X ,Hou D , et al. Phytoremediation: Climate change resilience and sustainability assessment at a coastal brownfield redevelopment [J]. Environment International, 2019, 130 104945.
