# recycling LFP battery by hydrometallurgy

Dataset: ILCD process, Unit process, single operation
Geography: CN
Reference year: 2022
Classification: End-of-life treatment / Material recycling
Functional unit: 1 item retired LFP battery of 48V,12Ah
Generated by: Chen, Lipeng, lpchen07@163.com
Owner: Tiangong LCI Data Working Group
Review: Dependent internal review by Tiangong LCI Data Working Group
Amounts: no units in this file; such an amount is in the reference unit of its flow, which a separate flow dataset defines
copyright: false
licenseType: Free of charge for all users and uses

## General comment
The mainstream recovery process of LFP batteries is to recover lithium carbonate and iron phosphate through a hydrometallurgical process (hydrochloric acid leaching-hydrogen peroxide oxidation-soda ash adjustment of pH)

## Technical purpose
The recovered materials from the LFP battery recycling process, including lithium carbonate and iron phosphate, are used for the manufacturing of new batteries and other related products where high purity of materials is essential.

## Reference product
- EoL LFP battery: 1; input; article inperiodical

## Inputs
All rows: article inperiodical
- Hydrochloric acid (30%): 2.214
- Sodium hydroxide（30%）: 1.626
- Hydrogen peroxide (30%): 0.366
- sodium carbonate: 0.336
- magnesium chloride: 0.00222
- potassium chloride: 0.0002376
- sodium chloride: 0.0002766
- Coke powder: 0.00138
- carbon: 5.58e-5
- Heavy oil: 0.01116
- silicon: 0.0117
- Light gas oil: 0.00696
- process steam: 0.03996
- Water: 0.612
- Electricity: 0.02682

## Outputs
All rows: article inperiodical
- Lithium carbonate: 0.144
- Ferric pyrophosphate: 1.98
- aluminium: 0.256
- copper: 0.228
- hydrogen chloride: 0.0003696
- Total particulate matter: 0.000114
- Sulphur oxides (as SO2): 6e-6
- nitrous oxide: 2.28e-5
- chemical oxygen demand: 0.00294

## Use advice
Users of this LCA data must take into account the specific conditions of the hydrometallurgical recycling process, including temperature, pressure, and chemical reagent concentrations. Additionally, it's critical to consider the purity level of the recovered materials and the efficiency of the recovery process when applying this data to environmental impact assessments. The exclusion of the energy consumption and emissions associated with the pre-treatment and transportation of retired batteries should also be noted.

## Review details
Inventory: The internal review was done by several iteration steps concerning raw data validation, raw data documentation, representativity, completeness and consistency of modelling with regard to ISO 14040 and 14044.

## Data sources
- Liu, M. et al. Life cycle environmental and economic assessment of electric bicycles with different batteries in China. Journal of Cleaner Production 385, 135715 (2023).
