# Electricity production ; Electricity mix ; Inner Mongolia

Dataset: ILCD process, Unit process, single operation
Geography: NMG-CN
Reference year: 2019
Classification: Unit processes / Energy carriers and technologies / Electricity
Generated by: Ruoxi Xiong, xiongrx0126@163.com
Owner: Tiangong LCI Data Working Group
Review: Dependent internal review by Tiangong LCI Data Working Group
Amounts: no units in this file; such an amount is in the reference unit of its flow, which a separate flow dataset defines
copyright: false
licenseType: Free of charge for all users and uses

## General comment
Electricity mix includes thermal, hydro, wind, nuclear and solar generation

## Technical purpose
The electricity produced from the mix in Inner Mongolia is applied across various consumer and industrial sectors, ranging from domestic usage in households to powering large industrial facilities. It supports local infrastructure, commercial establishments, and can also be used for electric transportation systems. The diversified generation methods ensure a more stable and potentially less carbon-intensive supply.

## Reference product
- Electricity: 3.6; missing unimportant
  [{'text': '能量', 'type': 'text'}]

## Inputs
All rows: missing unimportant
- electricity for thermal power: 3.01893
  [{'text': '能量', 'type': 'text'}]
- electricity from hydroelectric power plant: 0.0379944
  [{'text': '能量', 'type': 'text'}]
- electricity for nuclear power: 0
  [{'text': '能量', 'type': 'text'}]
- electricity from wind power: 0.436291
  [{'text': '能量', 'type': 'text'}]
- electricity for solar power: 0.10678
  [{'text': '能量', 'type': 'text'}]

## Use advice
When using this data set for Life Cycle Assessment, consider regional electrical grid mix, technological advancement, and temporal factors impacting the electricity generation. Include considerations for the potential upstream impacts from manufacturing and maintenance of power generation facilities. Evaluate the proportion of renewable energy sources within the mix to properly account for variations in carbon intensity across the different generation methods.

## Review details
Inventory: The internal review was done by several iteration steps concerning raw data validation, raw data documentation, representativity, completeness and consistency of modelling with regard to ISO 14040 and 14044.

## Data sources
- 能源统计年鉴2020
