# Recycling and processing of waste polyvinyl chloride (PVC) ; PVC ; Hot melt method 6000t/a ; (plastic particles)

Dataset: ILCD process
Geography: JX-CN
Reference year: 2020
Classification: Unit processes / Materials production / Plastics
Functional unit: 1 ton waste polyvinyl chloride recycling
Generated by: Xiaohua Liu, lxh01311@163.com
Owner: Tiangong LCI Data Working Group
Review: Dependent internal review by Tiangong LCI Data Working Group
Amounts: no units in this file; such an amount is in the reference unit of its flow, which a separate flow dataset defines
copyright: false
licenseType: Free of charge for all users and uses

## General comment
The recycled polyvinyl chloride (PVC) obtained through the hot melt process is intended for the production of plastic particles. This recycled PVC material is commonly used in the manufacture of various plastic products, which can range from pipes and fittings, construction materials, to less demanding applications where the high purity of the raw material is not critical.

## Reference product
- Waste Polyvinyl Chloride: 1000; input

## Inputs
- Electricity: 93.6
- water: 70

## Outputs
- ABS: 100
- polyethylene high density granulate (PE-HD): 200
  Recycled polyethylene high density granulate (PE-HD)
- Recycled Polyethylene: 270
- Recycled Polypropylene: 170
- Recycled Polystyrene granules: 70
  Recycled Polystyrene
- Recycled Polyvinyl Chloride: 200

## Use advice
When utilizing this data set for life cycle assessment of products made from recycled PVC, it is essential to account for the quality of the input waste material and the efficiency of the recycling process. Users should consider the potential contaminants and the degradation of material properties during the recycling cycle. Also, it is important to appropriately allocate the environmental burdens between the original PVC product and the recycled product based on the principle of shared responsibility. It may also be necessary to include considerations for the end-of-life phase of the recycled PVC products.

## Review details
Inventory: The internal review was done by several iteration steps concerning raw data validation, raw data documentation, representativity, completeness and consistency of modelling with regard to ISO 14040 and 14044.

## Data sources
- 废旧塑料回收利用项目环境影响评价报告
