# Plastic manufacturing products for sports ground ; Natural Rubber, Synthetic Rubber, Reclaimed Rubber ; Mixing, vulcanizing ; All sizes; NESPS2 / 运动场地用塑胶制造产品 ; 天然橡胶，合成橡胶，再生橡胶 ; 混炼，硫化 ; 所有规模 ; 全国第二次污染普查数据

Dataset: ILCD process, Unit process, single operation
Geography: CN
Reference year: 2019
Classification: Reference Parameters / Materials production / Plastics
Generated by: The data was created by the Office of the Second National Pollution Source Census of the Ministry of Ecology and Environment, and the data was organized by the TianGong Plan team for ILCD format / 生态环境部第二次全国污染源普查工作办公室创建数据，天工计划团队常慧敏整理数据为ILCD格式
Owner: Tiangong LCI Data Working Group / 天工LCI数据工作小组
Review: Dependent internal review by Tiangong LCI Data Working Group / 天工LCI数据工作小组
Amounts: no units in this file; such an amount is in the reference unit of its flow, which a separate flow dataset defines
copyright: false
licenseType: Free of charge for all users and uses

## General comment
the Technical of end-of-pipe management technology for pollution chemical oxygen demandisOil Separation - air flotation - precipitation，Its Technical efficiency of end-of-pipe management65，The formula for calculating the actual operation rate (k-value) of the end-of-pipe treatment facility is Annual actual operating hours of desulfurization facilities / annual actual operating hours of units

## Technical purpose
该技术过程用于生产专为运动场地设计的塑料产品，包括自然橡胶、合成橡胶和回收橡胶的混炼和硫化，适用于各种规模的生产。此外，数据还涉及生产过程中使用的各种末端污染管理技术。这些技术旨在通过油水分离、气浮和沉淀方法来处理废水、化学需氧量(COD)、氨氮、有机结合氮、总磷和石油相关废物，且具有不同程度的技术效率。

## Reference product
- Natural Rubber: 1000; input; calculated
  源文件中描述为为天然橡胶，合成橡胶，再生橡胶，此处对其进行了匹配工作，将其匹配到LCAflow库里面相最符合的流，污染物指标备注为工业废水量

## Outputs
All rows: calculated
- phosphorus, total: 0.0004
  the Technical of end-of-pipe management technology for pollution phosphorus, totalisOil Separation - air flotation - precipitation，Its Technical efficiency of end-of-pipe management60，The formula for calculating the actual operation rate (k-value) of the end-of-pipe treatment facility is Annual actual operating hours of the dust removal facilities / annual actual operating hours of units
  污染物指标总磷的末端治理技术是隔油-气浮-沉淀，其效率为60，末端治理设施实际运行率（k值）计算公式为k=污水治理设施运行时间（小时/年）/正常生产时间（小时/年）。原文件中描述污染物类别为废水，污染物指标为总磷，此处对其进行了匹配工作，将其匹配到LCAflow库里面相最符合的流，污染物指标备注为总磷
- Ammonia Nitrogen: 0.0009
  the Technical of end-of-pipe management technology for pollution Ammonia NitrogenisOil Separation - air flotation - precipitation，Its Technical efficiency of end-of-pipe management85，The formula for calculating the actual operation rate (k-value) of the end-of-pipe treatment facility is Annual actual operating hours of denitrification facilities / annual actual operating hours of units
  污染物指标氨氮的末端治理技术是隔油-气浮-沉淀，其效率为85，末端治理设施实际运行率（k值）计算公式为k=污水治理设施运行时间（小时/年）/正常生产时间（小时/年）。原文件中描述污染物类别为废水，污染物指标为氨氮，此处对其进行了匹配工作，将其匹配到LCAflow库里面相最符合的流，污染物指标备注为氨氮
- Petroleum-related waste: 0.0018
  the Technical of end-of-pipe management technology for pollution Petroleum-related wasteisOil Separation - air flotation - precipitation，Its Technical efficiency of end-of-pipe management80，The formula for calculating the actual operation rate (k-value) of the end-of-pipe treatment facility is Annual actual operating hours of the dust removal facilities / annual actual operating hours of units
  污染物指标石油类的末端治理技术是隔油-气浮-沉淀，其效率为80，末端治理设施实际运行率（k值）计算公式为k=污水治理设施运行时间（小时/年）/正常生产时间（小时/年）。原文件中描述污染物类别为废水，污染物指标为石油类，此处对其进行了匹配工作，将其匹配到LCAflow库里面相最符合的流，污染物指标备注为石油类
- Waste water: 2370
  the Technical of end-of-pipe management technology for pollution Waste wateris/，The formula for calculating the actual operation rate (k-value) of the end-of-pipe treatment facility is Annual actual operating hours of desulfurization facilities / annual actual operating hours of units
  污染物指标工业废水量的末端治理技术是/。原文件中描述污染物类别为废水，污染物指标为工业废水量，此处对其进行了匹配工作，将其匹配到LCAflow库里面相最符合的流，污染物指标备注为工业废水量
- Nitrogen, organic bound: 0.01265
  the Technical of end-of-pipe management technology for pollution Nitrogen, organic boundisOil Separation - air flotation - precipitation，Its Technical efficiency of end-of-pipe management45，The formula for calculating the actual operation rate (k-value) of the end-of-pipe treatment facility is Annual actual operating hours of denitrification facilities / annual actual operating hours of units
  污染物指标总氮的末端治理技术是隔油-气浮-沉淀，其效率为45，末端治理设施实际运行率（k值）计算公式为k=污水治理设施运行时间（小时/年）/正常生产时间（小时/年）。原文件中描述污染物类别为废水，污染物指标为总氮，此处对其进行了匹配工作，将其匹配到LCAflow库里面相最符合的流，污染物指标备注为总氮
- chemical oxygen demand: 0.08995
  the Technical of end-of-pipe management technology for pollution chemical oxygen demandisOil Separation - air flotation - precipitation，Its Technical efficiency of end-of-pipe management65，The formula for calculating the actual operation rate (k-value) of the end-of-pipe treatment facility is Annual actual operating hours of desulfurization facilities / annual actual operating hours of units
  污染物指标化学需氧量的末端治理技术是隔油-气浮-沉淀，其效率为65，末端治理设施实际运行率（k值）计算公式为k=污水治理设施运行时间（小时/年）/正常生产时间（小时/年）。原文件中描述污染物类别为废水，污染物指标为化学需氧量，此处对其进行了匹配工作，将其匹配到LCAflow库里面相最符合的流，污染物指标备注为化学需氧量

## Use advice
This dataset is derived from the Pollution Source Census Report and contains information on pollution emissions and related products. However, it does not include data on energy or chemical consumption, nor does it provide information on waste or co-product generation. When utilizing this dataset, please supplement the missing data based on actual conditions before use
该数据集来源于污染源普查报告，包含污染物排放及相关产品信息，但不包含能源或化学品消耗数据，也不提供废弃物或共生产物产生信息。在使用该数据集时，请根据实际情况补充缺失数据后再使用。

## Review details
Inventory: The internal review was done by several iteration steps concerning raw data validation, raw data documentation, representativity, completeness and consistency of modelling with regard to ISO 14040 and 14044.
清单： 内部审查通过几个迭代步骤完成，涉及原始数据验证、原始数据记录、代表性、完整性、与 ISO 14040 和 14044 有关的建模的一致性。

## Data sources
- 第二次全国污染源普查产排污核算系数手册（试用版）,二级代码29,四级代码2916文件，在完整版文件中第3277页
