# Bristle preparation ; Paint brushes and similar brushes made of pig bristles, pig bristles ; Pig bristles ; Whipping-washing-boiling-bristling ; All sizes; NESPS2 / 鬃毛制备 ; 猪鬃制漆刷及类似刷，猪鬃 ; 猪鬃 ; 打毛-水洗-水煮-搓鬃 ; 所有规模 ; 全国第二次污染普查数据

Dataset: ILCD process, Unit process, single operation
Geography: CN
Reference year: 2019
Classification: Reference Parameters / Materials production / Other materials
Generated by: The data was created by the Office of the Second National Pollution Source Census of the Ministry of Ecology and Environment, and the data was organized by the TianGong Plan team for ILCD format / 生态环境部第二次全国污染源普查工作办公室创建数据，天工计划团队常慧敏整理数据为ILCD格式
Owner: Tiangong LCI Data Working Group / 天工LCI数据工作小组
Review: Dependent internal review by Tiangong LCI Data Working Group / 天工LCI数据工作小组
Amounts: no units in this file; such an amount is in the reference unit of its flow, which a separate flow dataset defines
copyright: false
licenseType: Free of charge for all users and uses

## General comment
the Technical of end-of-pipe management technology for pollution Waste wateris/，The formula for calculating the actual operation rate (k-value) of the end-of-pipe treatment facility is /

## Technical purpose
本工业流程用于制备用于生产油漆刷和类似刷子的猪鬃。该过程包括搅打、水洗、水煮和搓鬃等步骤来处理所有大小的刷子用猪鬃。末端控制管理技术——好氧生物处理——被应用于处理来自流程的废水中的污染物，例如磷、氨氮、有机结合氮和化学需氧量。

## Reference product
- Bristle: 1000; input; calculated
  源文件中描述为为猪鬃，此处对其进行了匹配工作，将其匹配到LCAflow库里面相最符合的流

## Outputs
All rows: calculated
- phosphorus, total: 0.0253
  the Technical of end-of-pipe management technology for pollution phosphorus, totalisAerobic biological treatment，Its Technical efficiency of end-of-pipe management45，The formula for calculating the actual operation rate (k-value) of the end-of-pipe treatment facility is k = power consumption of wastewater treatment facilities (kWh/year) / operating time of wastewater treatment facilities (hours/year) / total power of wastewater treatment facilities (kW)
  污染物指标总磷的末端治理技术是好氧生物处理法，其效率为45，末端治理设施实际运行率（k值）计算公式为k=污水治理设施运行时间（小时/年）/正常生产时间（小时/年）。原文件中描述污染物类别为废水，污染物指标为总磷，此处对其进行了匹配工作，将其匹配到LCAflow库里面相最符合的流
- Ammonia Nitrogen: 0.0576
  the Technical of end-of-pipe management technology for pollution Ammonia NitrogenisAerobic biological treatment，Its Technical efficiency of end-of-pipe management70，The formula for calculating the actual operation rate (k-value) of the end-of-pipe treatment facility is k = 1
  污染物指标氨氮的末端治理技术是好氧生物处理法，其效率为70，末端治理设施实际运行率（k值）计算公式为k=污水治理设施运行时间（小时/年）/正常生产时间（小时/年）。原文件中描述污染物类别为废水，污染物指标为氨氮，此处对其进行了匹配工作，将其匹配到LCAflow库里面相最符合的流
- Nitrogen, organic bound: 0.2835
  the Technical of end-of-pipe management technology for pollution Nitrogen, organic boundisAerobic biological treatment，Its Technical efficiency of end-of-pipe management50，The formula for calculating the actual operation rate (k-value) of the end-of-pipe treatment facility is k = power consumption of wastewater treatment facilities (kWh/year) / operating time of wastewater treatment facilities (hours/year) / total power of wastewater treatment facilities (kW)
  污染物指标总氮的末端治理技术是好氧生物处理法，其效率为50，末端治理设施实际运行率（k值）计算公式为k=污水治理设施运行时间（小时/年）/正常生产时间（小时/年）。原文件中描述污染物类别为废水，污染物指标为总氮，此处对其进行了匹配工作，将其匹配到LCAflow库里面相最符合的流
- chemical oxygen demand: 0.28995
  the Technical of end-of-pipe management technology for pollution chemical oxygen demandisAerobic biological treatment，Its Technical efficiency of end-of-pipe management85，The formula for calculating the actual operation rate (k-value) of the end-of-pipe treatment facility is k = 1
  污染物指标化学需氧量的末端治理技术是好氧生物处理法，其效率为85，末端治理设施实际运行率（k值）计算公式为k=污水治理设施运行时间（小时/年）/正常生产时间（小时/年）。原文件中描述污染物类别为废水，污染物指标为化学需氧量，此处对其进行了匹配工作，将其匹配到LCAflow库里面相最符合的流
- Waste water: 8300
  the Technical of end-of-pipe management technology for pollution Waste wateris/，The formula for calculating the actual operation rate (k-value) of the end-of-pipe treatment facility is /
  污染物指标工业废水量的末端治理技术是/。原文件中描述污染物类别为废水，污染物指标为工业废水量，此处对其进行了匹配工作，将其匹配到LCAflow库里面相最符合的流

## Use advice
This dataset is derived from the Pollution Source Census Report and contains information on pollution emissions and related products. However, it does not include data on energy or chemical consumption, nor does it provide information on waste or co-product generation. When utilizing this dataset, please supplement the missing data based on actual conditions before use
该数据集来源于污染源普查报告，包含污染物排放及相关产品信息，但不包含能源或化学品消耗数据，也不提供废弃物或共生产物产生信息。在使用该数据集时，请根据实际情况补充缺失数据后再使用。

## Review details
Inventory: The internal review was done by several iteration steps concerning raw data validation, raw data documentation, representativity, completeness and consistency of modelling with regard to ISO 14040 and 14044.
清单： 内部审查通过几个迭代步骤完成，涉及原始数据验证、原始数据记录、代表性、完整性、与 ISO 14040 和 14044 有关的建模的一致性。

## Data sources
- 第二次全国污染源普查产排污核算系数手册（试用版）,二级代码41,四级代码4111文件，在完整版文件中第2439页
