# Milk production ; feed processing stage

Dataset: ILCD process, Unit process, single operation
Geography: HLJ-CN
Reference year: 2012
Classification: Unit processes / Materials production / Agricultural production means
Functional unit: In this study, the functional unit was set to 1 ton FPCM (fat-protein corrected milk).
Generated by: Rui Yang, 1632707028@qq.com
Owner: Tiangong LCI Data Working Group
Review: Dependent internal review by Tiangong LCI Data Working Group
Amounts: no units in this file; such an amount is in the reference unit of its flow, which a separate flow dataset defines
copyright: false
licenseType: Free of charge for all users and uses

## General comment
According to the actual investigation, the average power consumption in the production stage of word processing is 33.85kwh·/t.

## Geography
In this paper, LCA method was used to assess the environmental impact of dairy farm production system in Heilongjiang Province.

## Technology and included processes
The word feed of dairy cow is composed of two parts: full price feed and coarse word feed. In the full price feed of dairy cow word feed, rice, soybean meal and wheat bran are the main components, so other components are not considered. The production stage of feed raw materials mainly includes fertilizer production stage, crop planting stage and soybean and wheat bran processing stage.

## Technical purpose
This dataset pertains to milk production, specifically during the feed processing stage. It is utilized to calculate the energy consumption required to produce feed for dairy cows, which ultimately contributes to the production of fat-protein corrected milk (FPCM). The data can be applied in environmental impact assessments of dairy farm production systems to assist in optimizing energy usage and reducing the eco-footprint of milk production.

## Reference product
- feed: 732.51; measured

## Inputs
- Electricity: 89.2637; calculated

## Outputs
- carbon monoxide (fossil): 0.01294; measured
- nitrogen, total (excluding N2): 0.07455; measured
  1 NOx
- carbon dioxide (fossil),carbon dioxide (fossil): 25.3615; measured
- sulfur oxides: 0.04496; measured
  1Sulfur oxides

## Use advice
When using this dataset in a Life Cycle Assessment (LCA) for dairy farm production systems, ensure the functional unit is consistently set to 1 ton FPCM. Integrate this data carefully with other life cycle stages to maintain accuracy across the assessment. Pay attention to regional specificity as this data is based on dairy farm systems in Heilongjiang Province and may differ in other locations. Adjustments may be necessary when applying to different geographical contexts.

## Review details
Inventory: The internal review was done by several iteration steps concerning raw data validation, raw data documentation, representativity, completeness and consistency of modelling with regard to ISO 14040 and 14044.

## Data sources
- 曹正纲. 黑龙江省奶牛场生命周期评价. (东北农业大学, 2012).
