# Logging engineering ; Natural gas hydrate ; Saturation logging method

Dataset: ILCD process, Unit process, single operation
Geography: GD-CN
Reference year: 1989
Classification: Other Services / Engineering and consulting
LCI method principle: Attributional
LCI method approaches: Consequential
Generated by: Shikang Kang, 908798159@qq.com
Owner: Tiangong LCI Data Working Group
Review: Dependent internal review by Tiangong LCI Data Working Group
Amounts: no units in this file; such an amount is in the reference unit of its flow, which a separate flow dataset defines
copyright: false
licenseType: Free of charge for all users and uses

## General comment
Based on the analysis of experimental data of hydrate resistivity and the general relationship between resistivity and oil (gas) saturation, the optimum formula for calculating hydrate saturation is derived, and the physical meanings of three items in the formula are defined, which respectively represent the increase rate of resistivity when hydrate particles are completely distributed in the pores of formation rocks, supported by particles and existed in layers, and the corresponding quantitative evaluation method of hydrate saturation is established

## Geography
South China Sea

## Time period
The author proposed for the first time

## Technology and included processes
The percentage of heterogeneous anisotropic pore volume is put forward. When the hydrate saturation increases from small to small, the experimental law of the measured resistivity changes is generally shown in the figure, that is, the resistivity increases monotonously with the increase of hydrate saturation in double logarithmic coordinates

## Technical purpose
The saturation logging method described is used for the quantitative evaluation of hydrate saturation in natural gas hydrate exploration within geological formations, specifically in the South China Sea region. The method involves analyzing resistivity measurements to calculate the percentage of natural gas hydrates within porous rock formations. This process is crucial for determining the scale of natural gas reserves and can be applied during well-logging phases to assess potential extraction volumes.

## Model description
Comparing several different truncated forms of the general form of resistance increase rate-oil (gas) saturation given above, it can be seen that equation (5) is the result of taking two terms from the right denominator of the general form, that is, Indonesia formula is a special case of the general form saturation equation with high shale content

## Reference product
- process steam from natural gas: 1e7; log-normal; article inperiodical
  The corresponding hydrate reserve when the saturation differs by 10%

## Outputs
- process steam from natural gas: 1e7; log-normal; article inperiodical
  Favorable exploration area
- process steam from natural gas: 0.5; log-normal; article inperiodical
  Porosity
- process steam from natural gas: 20; log-normal; article inperiodical
  Effective thickness

## Data selection and combination
Oil and gas saturation, which is the percentage of oil and gas in pore volume, directly determines the scale of oil and gas reserves and is one of the core parameters of logging evaluation.

## Data treatment and extrapolations
After the core is completely saturated with formation water, it is driven by oil and gas under pressure, and the increase rate of resistance increases with the increase of oil and gas saturation. The actual interpretation and evaluation of saturation is its inverse process, that is, the saturation is calculated according to the increase rate of formation resistance obtained from logging

## Use advice
When using the data set for assessing natural gas hydrate saturation, it is important to note that the derived formulas and saturation calculations are based on specific conditions such as rock porosity, hydrate distribution, and the presence of oil and gas within the pores. Users must consider the geological context and ensure that the experimental conditions used to derive the resistivity-saturation relationship are applicable to their assessment scenario. Careful interpretation of resistivity logs in line with the given methodology is required, and users should be aware of the implications of heterogeneous anisotropic pore volumes on the resistivity measurements.

## Review details
Inventory: The internal review was done by several iteration steps concerning raw data validation, raw data documentation, representativity, completeness and consistency of modelling with regard to ISO 14040 and 14044.

## Data sources
- 李宁;孙文杰;李心童;冯周;武宏亮;王克文; 天然气水合物饱和度测井解释模型及方程. 石油勘探与开发 1073–1079 (2022).
