# SoG-Si ingot casting ; SoG-Si ingot ; Melt, solidification and anneal

Dataset: ILCD process, Unit process, single operation
Geography: NX-CN
Reference year: 2016
Classification: Unit processes / Materials production / Metals and semimetals
Functional unit: Grid-connected electricity generation from a 1 MWp multi-Si PV system, whose lifespan is 30 years of a 10 MWp power station has been taken as the research object and the functional unit
LCI method principle: Attributional
LCI method approaches: Allocation
Generated by: Jinfeng Yang, yjfzfshn@163.com
Owner: Tiangong LCI Data Working Group
Review: Dependent internal review by Tiangong LCI Data Working Group
Amounts: no units in this file; such an amount is in the reference unit of its flow, which a separate flow dataset defines
copyright: false
licenseType: Free of charge for all users and uses

## General comment
Multi-Si

## Geography
The power station is located in the central region of Ningxia, China, where the average annual solar radiation is approximately 5955.80 MJ m2 a-1, and the annual average number of peak sunshine hours are 1718 h.

## Time period
Available online

## Technical purpose
The SoG-Si ingot casting process manufactures solar-grade multi-crystalline silicon ingots that are primarily used as raw materials for the production of multi-crystalline silicon photovoltaic (PV) cells. These PV cells are essential components in solar panels for converting solar energy into electricity. The data set is particularly relevant for the solar power industry, especially for companies involved in manufacturing and assessing the environmental impact of solar panels in grid-connected electricity generation systems.

## Reference product
- Multi-Si ingot: 1000; measured
  SoG- Si ingot

## Inputs
All rows: measured
- Electricity: 42778.8
- Solar grade multi-Si: 1010
  SoG-Si
- Quartz Crucible,Quartz Crucible: 180
  Quartz crucible
- Silicon nitride: 1
- Cooling water: 4200
  Circulating water

## Outputs
- Waste (solid): 182.01; measured
  Waste quartz crucible

## Deviations from the LCI method approaches
A life cycle assessment (LCA) has been performed for the grid-connected electricity generation from a metallurgical route multi-crystalline silicon (multi-Si) photovoltaic (PV) system in China.

## Data selection and combination
Survery of factories in Yunnan and Ningxia

## Use advice
Users should consider the regional solar radiation data and operating conditions specific to the central region of Ningxia, China when using this dataset. It is important to note that the data is designed for a multi-Si PV system with a specified lifespan of 30 years, serving as a study subject with a 10 MWp capacity. When integrating this data into LCA models, users must account for the functional lifespan and region-specific solar irradiance to accurately assess the environmental impacts of the PV system. Attention should be given to the methodological consistency with other datasets in the LCA and to the alignment with the goal and scope of the study concerning the use of metallurgical route multi-crystalline silicon.

## Review details
Inventory: The internal review was done by several iteration steps concerning raw data validation, raw data documentation, representativity, completeness and consistency of modelling with regard to ISO 14040 and 14044.

## Data sources
- Yu, Z. et al. Life cycle assessment of grid-connected power generation from metallurgical route multi-crystalline silicon photovoltaic system in China. Applied Energy 185, 68–81 (2017).
