# municipal wastewater treatment ; wastewater ; membrane bioreactor (MBR) technology

Dataset: ILCD process, Unit process, black box
Geography: GR
Classification: Unit processes / End-of-life treatment / Waste water treatment
Generated by: Xu Qianrong, 2331391@tongji.edu.cn
Owner: Tiangong LCI Data Working Group
Review: Dependent internal review by Tiangong LCI Data Working Group
Amounts: no units in this file; such an amount is in the reference unit of its flow, which a separate flow dataset defines
copyright: ['opt4ROkqig']
licenseType: Free of charge for all users and uses

## General comment
The gas pollutants that can be released directly from the wastewater treatment processes were not considered in the LCIA study. Gas pollutants are produced during the biological wastewater degradation process and are calculated based on the load of influent and effluent wastewater (defined by COD, TN, and SS concentrations) as well as the inflow and outflow rates.

## Technology and included processes
After that, the wastewater passed into a membrane tank of active volume 1050 m³ that contained 3 hydrophilic flat sheet ultrafiltration membrane modules (Microdyn) with nominal pore size 0.04 μm.

## Technical purpose
This dataset represents a municipal wastewater treatment process utilizing membrane bioreactor (MBR) technology. The treated water can be used for various non-potable applications such as irrigation, industrial cooling systems, and toilet flushing. This technology is suitable for urban areas requiring advanced wastewater treatment solutions.

## Reference product
- Wastewater: 514; measured
  Treated

## Inputs
All rows: measured
- Wastewater: 528
- Electricity: 202.68
  Influent Pump
- Electricity: 103.68
  Denitrification Mixer
- Electricity: 864
  Aeration Blower
- Electricity: 1036.8
  Membrane Blower
- Membranes: 0.25
  Polyethylene instead of Polyethersulfone (PES),5 years lifetime
- Electricity: 345.6
  Sludge Circulation Pump
- Electricity: 5.4
  Sludge Removal Pump
- Electricity: 51.84
  Diffuse Pump
- transportation: 4.55
  Sludge Transportation，Lorry EURO610 tons

## Outputs
- Sludge: 130; measured
  To landfill

## Use advice
When using this dataset for LCA, ensure that the system boundaries include the upstream production of the membrane and other consumables as well as potential end-of-life treatments. Take into account the energy consumption and chemical use during the MBR process. For accurate results, the data should be adjusted based on the local context and specific operational conditions of the MBR system. The functional unit for comparison should be clearly defined, such as per cubic meter of treated wastewater.

## Review details
Inventory: The internal review was done by several iteration steps concerning raw data validation, raw data documentation, representativity, completeness and consistency of modelling with regard to ISO 14040 and 14044.

## Data sources
- Banti，D.C.、Tsangas，M.、Samaras，P.和Zorpas，A.膜生物反应器与活性污泥系统在城市污水处理中的LCA比较。膜10（2020）
