# Antimony white ; Antimony ingot ; Melting - oxidative volatilization ; All sizes; NESPS2 / 锑白 ; 锑锭 ; 熔化-氧化挥发法 ; 所有规模 ; 全国第二次污染普查数据

Dataset: ILCD process, Unit process, single operation
Geography: CN
Reference year: 2019
Classification: Reference Parameters / Materials production / Metals and semimetals
Generated by: The data was created by the Office of the Second National Pollution Source Census of the Ministry of Ecology and Environment, and the data was organized by the TianGong Plan team for ILCD format / 生态环境部第二次全国污染源普查工作办公室创建数据，天工计划团队常慧敏整理数据为ILCD格式
Owner: Tiangong LCI Data Working Group / 天工LCI数据工作小组
Review: Dependent internal review by Tiangong LCI Data Working Group / 天工LCI数据工作小组
Amounts: no units in this file; such an amount is in the reference unit of its flow, which a separate flow dataset defines
copyright: false
licenseType: Free of charge for all users and uses

## General comment
the Technical of end-of-pipe management technology for pollution Exhaust gasis/

## Technical purpose
该数据集代表了使用氧化挥发法熔化白锑锭的工艺，适用于白锑生产的所有规模。这个过程适用于需要锑化合物作为生产阻燃剂、铅酸电池和各种合金等产品的组成部分的行业。

## Reference product
- antimony: 1000; calculated
  源文件中描述为为锑白，此处对其进行了匹配工作，将其匹配到LCAflow库里面相最符合的流，污染物指标备注为工业废水量

## Outputs
All rows: calculated
- sulfur dioxide: 0.0549
  the Technical of end-of-pipe management technology for pollution sulfur dioxideisDS multiple reactor desulfurization，Its Technical efficiency of end-of-pipe management97
  污染物指标二氧化硫的末端治理技术是DS多项反应器脱硫，其效率为97，末端治理设施实际运行率（k值）计算公式为k=废气治理设施年运行时间（小时）/企业年正常生产时间（小时）。原文件中描述污染物类别为废气，污染物指标为二氧化硫，此处对其进行了匹配工作，将其匹配到LCAflow库里面相最符合的流，污染物指标备注为二氧化硫
- sulfur dioxide: 0.1098
  the Technical of end-of-pipe management technology for pollution sulfur dioxideisDouble alkali process，Its Technical efficiency of end-of-pipe management94
  污染物指标二氧化硫的末端治理技术是双碱法，其效率为94，末端治理设施实际运行率（k值）计算公式为k=废气治理设施年运行时间（小时）/企业年正常生产时间（小时）。原文件中描述污染物类别为废气，污染物指标为二氧化硫，此处对其进行了匹配工作，将其匹配到LCAflow库里面相最符合的流，污染物指标备注为二氧化硫
- particles (PM2.5 - PM10): 0.1168
  the Technical of end-of-pipe management technology for pollution particles (PM2.5 - PM10)isBag filter，Its Technical efficiency of end-of-pipe management99
  污染物指标颗粒物的末端治理技术是袋式除尘，其效率为99，末端治理设施实际运行率（k值）计算公式为k=废气治理设施年运行时间（小时）/企业年正常生产时间（小时）。原文件中描述污染物类别为废气，污染物指标为颗粒物，此处对其进行了匹配工作，将其匹配到LCAflow库里面相最符合的流，污染物指标备注为颗粒物
- sulfur dioxide: 0.183
  the Technical of end-of-pipe management technology for pollution sulfur dioxideisLime/gypsum desulfurization，Its Technical efficiency of end-of-pipe management90
  污染物指标二氧化硫的末端治理技术是石灰/石膏法脱硫，其效率为90，末端治理设施实际运行率（k值）计算公式为k=废气治理设施年运行时间（小时）/企业年正常生产时间（小时）。原文件中描述污染物类别为废气，污染物指标为二氧化硫，此处对其进行了匹配工作，将其匹配到LCAflow库里面相最符合的流，污染物指标备注为二氧化硫
- particles (PM2.5 - PM10): 0.2336
  the Technical of end-of-pipe management technology for pollution particles (PM2.5 - PM10)isElectrostatic precipitation，Its Technical efficiency of end-of-pipe management98
  污染物指标颗粒物的末端治理技术是静电除尘，其效率为98，末端治理设施实际运行率（k值）计算公式为k=废气治理设施年运行时间（小时）/企业年正常生产时间（小时）。原文件中描述污染物类别为废气，污染物指标为颗粒物，此处对其进行了匹配工作，将其匹配到LCAflow库里面相最符合的流，污染物指标备注为颗粒物
- Waste water: 240
  the Technical of end-of-pipe management technology for pollution Waste wateris/
  污染物指标工业废水量的末端治理技术是/，末端治理设施实际运行率（k值）计算公式为k=废水治理设施年运行时间（小时）/企业年正常生产时间（小时）。原文件中描述污染物类别为废水，污染物指标为工业废水量，此处对其进行了匹配工作，将其匹配到LCAflow库里面相最符合的流，污染物指标备注为工业废水量
- Nitrogen oxides: 0.88
  the Technical of end-of-pipe management technology for pollution Nitrogen oxidesis/
  污染物指标氮氧化物的末端治理技术是/，末端治理设施实际运行率（k值）计算公式为k=废气治理设施年运行时间（小时）/企业年正常生产时间（小时）。原文件中描述污染物类别为废气，污染物指标为氮氧化物，此处对其进行了匹配工作，将其匹配到LCAflow库里面相最符合的流，污染物指标备注为氮氧化物
- particles (PM2.5 - PM10): 5.84
  the Technical of end-of-pipe management technology for pollution particles (PM2.5 - PM10)isCyclone dust removal，Its Technical efficiency of end-of-pipe management50
  污染物指标颗粒物的末端治理技术是旋风除尘，其效率为50，末端治理设施实际运行率（k值）计算公式为k=废气治理设施年运行时间（小时）/企业年正常生产时间（小时）。原文件中描述污染物类别为废气，污染物指标为颗粒物，此处对其进行了匹配工作，将其匹配到LCAflow库里面相最符合的流，污染物指标备注为颗粒物
- chemical oxygen demand: 0.0067698
  the Technical of end-of-pipe management technology for pollution chemical oxygen demandisChemical precipitation + chemical coagulation method，Its Technical efficiency of end-of-pipe management82
  污染物指标化学需氧量的末端治理技术是化学沉淀+化学混凝法，其效率为82，末端治理设施实际运行率（k值）计算公式为k=废水治理设施年运行时间（小时）/企业年正常生产时间（小时）。原文件中描述污染物类别为废水，污染物指标为化学需氧量，此处对其进行了匹配工作，将其匹配到LCAflow库里面相最符合的流，污染物指标备注为化学需氧量
- chemical oxygen demand: 0.011283
  the Technical of end-of-pipe management technology for pollution chemical oxygen demandisChemical coagulation，Its Technical efficiency of end-of-pipe management70
  污染物指标化学需氧量的末端治理技术是化学混凝法，其效率为70，末端治理设施实际运行率（k值）计算公式为k=废水治理设施年运行时间（小时）/企业年正常生产时间（小时）。原文件中描述污染物类别为废水，污染物指标为化学需氧量，此处对其进行了匹配工作，将其匹配到LCAflow库里面相最符合的流，污染物指标备注为化学需氧量
- chemical oxygen demand: 0.018805
  the Technical of end-of-pipe management technology for pollution chemical oxygen demandisElectrochemical treatment，Its Technical efficiency of end-of-pipe management50
  污染物指标化学需氧量的末端治理技术是电化学法处理法，其效率为50，末端治理设施实际运行率（k值）计算公式为k=废水治理设施年运行时间（小时）/企业年正常生产时间（小时）。原文件中描述污染物类别为废水，污染物指标为化学需氧量，此处对其进行了匹配工作，将其匹配到LCAflow库里面相最符合的流，污染物指标备注为化学需氧量
- chemical oxygen demand: 0.022566
  the Technical of end-of-pipe management technology for pollution chemical oxygen demandisChemical precipitation，Its Technical efficiency of end-of-pipe management40
  污染物指标化学需氧量的末端治理技术是化学沉淀法，其效率为40，末端治理设施实际运行率（k值）计算公式为k=废水治理设施年运行时间（小时）/企业年正常生产时间（小时）。原文件中描述污染物类别为废水，污染物指标为化学需氧量，此处对其进行了匹配工作，将其匹配到LCAflow库里面相最符合的流，污染物指标备注为化学需氧量
- Exhaust gas: 5499
  the Technical of end-of-pipe management technology for pollution Exhaust gasis/
  污染物指标工业废气量的末端治理技术是/，末端治理设施实际运行率（k值）计算公式为k=废气治理设施年运行时间（小时）/企业年正常生产时间（小时）。原文件中描述污染物类别为废气，污染物指标为工业废气量，此处对其进行了匹配工作，将其匹配到LCAflow库里面相最符合的流，污染物指标备注为工业废气量

## Use advice
This dataset is derived from the Pollution Source Census Report and contains information on pollution emissions and related products. However, it does not include data on energy or chemical consumption, nor does it provide information on waste or co-product generation. When utilizing this dataset, please supplement the missing data based on actual conditions before use
该数据集来源于污染源普查报告，包含污染物排放及相关产品信息，但不包含能源或化学品消耗数据，也不提供废弃物或共生产物产生信息。在使用该数据集时，请根据实际情况补充缺失数据后再使用。

## Review details
Inventory: The internal review was done by several iteration steps concerning raw data validation, raw data documentation, representativity, completeness and consistency of modelling with regard to ISO 14040 and 14044.
清单： 内部审查通过几个迭代步骤完成，涉及原始数据验证、原始数据记录、代表性、完整性、与 ISO 14040 和 14044 有关的建模的一致性。

## Data sources
- 第二次全国污染源普查产排污核算系数手册（试用版）,四级代码3215文件，在完整版文件中第5023页
