# Blue ; Fermented Blue Products ; Sodium hydroxide, sodium nitrite, others ; High-temperature bluing (barrel plating) ; All sizes; NESPS2 / 发蓝 ; 发蓝产品 ; 氢氧化钠、亚硝酸钠、其他 ; 高温发蓝（滚镀） ; 所有规模 ; 全国第二次污染普查数据

Dataset: ILCD process, Unit process, single operation
Geography: CN
Reference year: 2019
Classification: Reference Parameters / Materials production / Inorganic chemicals
Generated by: The data was created by the Office of the Second National Pollution Source Census of the Ministry of Ecology and Environment, and the data was organized by the TianGong Plan team for ILCD format / 生态环境部第二次全国污染源普查工作办公室创建数据，天工计划团队常慧敏整理数据为ILCD格式
Owner: Tiangong LCI Data Working Group / 天工LCI数据工作小组
Review: Dependent internal review by Tiangong LCI Data Working Group / 天工LCI数据工作小组
Amounts: no units in this file; such an amount is in the reference unit of its flow, which a separate flow dataset defines
copyright: false
licenseType: Free of charge for all users and uses

## General comment
the Technical of end-of-pipe management technology for pollution Exhaust gasis/

## Technical purpose
本工业流程包括生产发蓝发蓝产品如氢氧化钠、亚硝酸钠以及其他在高温发蓝（滚镀）过程中使用的化学品，适用于各种规模的操作。所产生的化学品通常应用于制造业的表面处理和精加工过程。此外，该过程还结合了管道末端管理技术来减轻废水和废气污染，特别是针对化学需氧量、有机结合氮和总磷，使用化学混凝等方法，单独或与生物处理相结合。

## Reference product
- Bluing: 1; calculated
  源文件中描述为为发蓝产品，此处对其进行了匹配工作，将其匹配到LCAflow库里面相最符合的流，污染物指标备注为工业废水量

## Outputs
All rows: calculated
- phosphorus, total: 4e-7
  the Technical of end-of-pipe management technology for pollution phosphorus, totalisChemical coagulation + biological treatment，Its Technical efficiency of end-of-pipe management98
  污染物指标总磷的末端治理技术是化学混凝+生物法，其效率为98，末端治理设施实际运行率（k值）计算公式为k=废水治理设施运行时间（小时/年）/正常生产时间（小时/年）。原文件中描述污染物类别为废水，污染物指标为总磷，此处对其进行了匹配工作，将其匹配到LCAflow库里面相最符合的流，污染物指标备注为总磷
- phosphorus, total: 8e-7
  the Technical of end-of-pipe management technology for pollution phosphorus, totalisChemical coagulation，Its Technical efficiency of end-of-pipe management96
  污染物指标总磷的末端治理技术是化学混凝法，其效率为96，末端治理设施实际运行率（k值）计算公式为k=废水治理设施运行时间（小时/年）/正常生产时间（小时/年）。原文件中描述污染物类别为废水，污染物指标为总磷，此处对其进行了匹配工作，将其匹配到LCAflow库里面相最符合的流，污染物指标备注为总磷
- Nitrogen, organic bound: 1.4e-5
  the Technical of end-of-pipe management technology for pollution Nitrogen, organic boundisChemical coagulation + biological treatment，Its Technical efficiency of end-of-pipe management93
  污染物指标总氮的末端治理技术是化学混凝+生物法，其效率为93，末端治理设施实际运行率（k值）计算公式为k=废水治理设施运行时间（小时/年）/正常生产时间（小时/年）。原文件中描述污染物类别为废水，污染物指标为总氮，此处对其进行了匹配工作，将其匹配到LCAflow库里面相最符合的流，污染物指标备注为总氮
- Nitrogen, organic bound: 2.6e-5
  the Technical of end-of-pipe management technology for pollution Nitrogen, organic boundisChemical coagulation，Its Technical efficiency of end-of-pipe management87
  污染物指标总氮的末端治理技术是化学混凝法，其效率为87，末端治理设施实际运行率（k值）计算公式为k=废水治理设施运行时间（小时/年）/正常生产时间（小时/年）。原文件中描述污染物类别为废水，污染物指标为总氮，此处对其进行了匹配工作，将其匹配到LCAflow库里面相最符合的流，污染物指标备注为总氮
- chemical oxygen demand: 4.48e-5
  the Technical of end-of-pipe management technology for pollution chemical oxygen demandisChemical coagulation + biological treatment，Its Technical efficiency of end-of-pipe management86
  污染物指标化学需氧量的末端治理技术是化学混凝+生物法，其效率为86，末端治理设施实际运行率（k值）计算公式为k=废水治理设施运行时间（小时/年）/正常生产时间（小时/年）。原文件中描述污染物类别为废水，污染物指标为化学需氧量，此处对其进行了匹配工作，将其匹配到LCAflow库里面相最符合的流，污染物指标备注为化学需氧量
- chemical oxygen demand: 4.8e-5
  the Technical of end-of-pipe management technology for pollution chemical oxygen demandisChemical coagulation，Its Technical efficiency of end-of-pipe management85
  污染物指标化学需氧量的末端治理技术是化学混凝法，其效率为85，末端治理设施实际运行率（k值）计算公式为k=废水治理设施运行时间（小时/年）/正常生产时间（小时/年）。原文件中描述污染物类别为废水，污染物指标为化学需氧量，此处对其进行了匹配工作，将其匹配到LCAflow库里面相最符合的流，污染物指标备注为化学需氧量
- Waste water: 13.1
  the Technical of end-of-pipe management technology for pollution Waste wateris/
  污染物指标工业废水量的末端治理技术是/，末端治理设施实际运行率（k值）计算公式为/。原文件中描述污染物类别为废水，污染物指标为工业废水量，此处对其进行了匹配工作，将其匹配到LCAflow库里面相最符合的流，污染物指标备注为工业废水量
- Exhaust gas: 17000
  the Technical of end-of-pipe management technology for pollution Exhaust gasis/
  污染物指标工业废气量的末端治理技术是/，末端治理设施实际运行率（k值）计算公式为/。原文件中描述污染物类别为废气，污染物指标为工业废气量，此处对其进行了匹配工作，将其匹配到LCAflow库里面相最符合的流，污染物指标备注为工业废气量

## Use advice
This dataset is derived from the Pollution Source Census Report and contains information on pollution emissions and related products. However, it does not include data on energy or chemical consumption, nor does it provide information on waste or co-product generation. When utilizing this dataset, please supplement the missing data based on actual conditions before use
该数据集来源于污染源普查报告，包含污染物排放及相关产品信息，但不包含能源或化学品消耗数据，也不提供废弃物或共生产物产生信息。在使用该数据集时，请根据实际情况补充缺失数据后再使用。

## Review details
Inventory: The internal review was done by several iteration steps concerning raw data validation, raw data documentation, representativity, completeness and consistency of modelling with regard to ISO 14040 and 14044.
清单： 内部审查通过几个迭代步骤完成，涉及原始数据验证、原始数据记录、代表性、完整性、与 ISO 14040 和 14044 有关的建模的一致性。

## Data sources
- 第二次全国污染源普查产排污核算系数手册（试用版）,二级代码33-37、431-434文件，在完整版文件中第5513页
