# Drilling engineering ; Natural gas hydrate ; Logging while drilling

Dataset: ILCD process, Unit process, single operation
Geography: ZH-GD-CN
Reference year: 2020
Classification: Unit processes / Energy carriers and technologies / Natural gas based fuels
LCI method principle: Attributional
LCI method approaches: Consequential
Generated by: Shikang Kang, 908798159@qq.com
Owner: Tiangong LCI Data Working Group
Review: Dependent internal review by Tiangong LCI Data Working Group
Amounts: no units in this file; such an amount is in the reference unit of its flow, which a separate flow dataset defines
copyright: false
licenseType: Free of charge for all users and uses

## General comment
It is very necessary to carry out sensitive drilling without damage to gas hydrate reservoir. Logging-while drilling (LWD) has become an important means to identify gas hydrate occurrence and test gas hydrate reservoir properties in-situ during drilling

## Geography
South China Sea Shenhu Sea Area

## Time period
Publication time of literature

## Technology and included processes
Drilling is the most direct means for gas hydrate exploration and discovery, and it is also a necessary link for gas hydrate development.

## Technical purpose
This data set pertains to the drilling engineering process for the exploration and in-situ testing of natural gas hydrate occurrences through logging-while-drilling (LWD) technology. The drilling process is designed to avoid damage to the gas hydrate reservoirs, particularly in sensitive drilling operations. The process is applicable within the South China Sea Shenhu area, which has significant volumes of marine sediment-hosted gas hydrates, especially in sand-rich sedimentary deposits that are relatively easier to exploit. This data can inform drilling practices within such geological settings, providing guidance for both exploration and potential extraction phases of natural gas hydrate development.

## Reference product
- methane (fossil): 1.4986e6; log-normal; calculated
  The original text did not distinguish between Bio and Fossil. According to experts, this is Fossil. Accumulated total gas production

## Inputs
- Well pad: 35; min 30; max 40; uniform; missing unimportant
  Drilling rate
- natural gas: 1.4986e6; log-normal
  There is no natural gas input in the literature, assuming that the input and output during natural gas extraction process are 1:1

## Outputs
- methane (fossil): 42; max 42; uniform; calculated
  The original text did not distinguish between Bio and Fossil. According to experts, this is Fossil. Continuous gas production through trial production
- methane (fossil): 35700; log-normal; missing unimportant
  The original text did not distinguish between Bio and Fossil. According to experts, this is Fossil. Daily average gas production

## Data selection and combination
Natural gas hydrate resources are huge, and more than 98% of them occur in marine sediments, among which the median amount of natural gas hydrate resources in sand-rich sediments which are relatively easy to exploit is about 1,226.4 × 10 m.

## Data treatment and extrapolations
The first gas hydrate field to realize commercial development is the Messoyakha gas field in Russia, which was discovered in 1967. The gas hydrate coexists with conventional natural gas in an upper-lower structure. The commercial development began in 1969, and the intermittent production reached the end of 2011. The cumulative gas production of gas hydrate is about 54 × 10m, accounting for 41.8% of the total gas production.

## Use advice
The information provided is critical for industrial actors engaging in the exploration and exploitation of gas hydrate fields, particularly in sensitive and potentially environmentally fragile marine environments. Users should account for technological advancements in the field of LWD and adapt the data in accordance with the latest safety and efficiency protocols. This data should also be interpreted while considering the unique geological features of the target site and current regulatory frameworks governing marine drilling activities. Environmental impact assessments should be integrated into the planning phase to ensure sustainable operations. Commercial viability, historical performance, and energy market conditions should be factored in when drawing conclusions from the data set.

## Review details
Inventory: The internal review was done by several iteration steps concerning raw data validation, raw data documentation, representativity, completeness and consistency of modelling with regard to ISO 14040 and 14044.

## Data sources
- 张金华, 樊波 & 刘瑞江. 天然气水合物钻探现状与钻井技术. 科学技术与工程 20, 14343–14351 (2020).
