# Wastepaper pulp to make paper;newsprint

Dataset: ILCD process, Unit process, black box
Geography: CN
Classification: Unit processes / Materials production / Paper and cardboards
Functional unit: 1t of newsprint product as a functional unit.
LCI method principle: Attributional
Generated by: Yixiang Gao, 22210740040@m.fudan.edu.cn
Owner: Tiangong LCI Data Working Group
Review: Dependent internal review by Tiangong LCI Data Working Group
Amounts: no units in this file; such an amount is in the reference unit of its flow, which a separate flow dataset defines
copyright: false
licenseType: Free of charge for all users and uses

## General comment
Based on the system boundary dividing newsprint products into pulping, paper copying, chemical production, energy production, transport, and waste water treatment, collect raw data on resources, energy, raw material consumption, and environmental emissions at each stage.

## Technical purpose
The newsprint production process from recycled paper is used to create newsprint paper that is employed in the mass production of newspapers, circulars, advertising material, and other printed media. The process encompasses stages such as pulping, papermaking, chemical production, energy production, transportation, and wastewater treatment.

## Reference product
- Newsprint: 1000; measured
  newsprint(papermaking stage)

## Inputs
All rows: measured
- Hydrogen peroxide: 79
  hydrogen peroxide(pulping stage)
- Sodium silicate: 33
  sodium silicate(pulping stage)
- sodium hydroxide: 48
  caustic soda(pulping stage)
- Saponifier: 3
  saponifier(pulping stage)
- Waste paper: 1325
  waste paper(pulping stage)
- Filler Material: 6
  filler(papermaking stage)
- Starch: 3
  starch(papermaking stage)
- Optical Brightening Agent: 1
  Whitening agent(papermaking stage)
- Papermaking Retention Aid: 0.8
  Papermaking retention aid(papermaking stage)

## Outputs
All rows: measured
- carbon dioxide (fossil): 548.3
  CO2(pulping stage)
- Nitrogen oxides: 3.4
  NOx(pulping stage)
- sulfur dioxide: 2.8
  SO2(pulping stage)
- methane (fossil): 0.0052
  CH4(pulping stage)
- non-methane volatile organic compounds: 0.2
  NMVOC(pulping stage)
- Total Suspended Particulate: 0.8
  TSP(pulping stage)
- chemical oxygen demand: 0.7
  COD(pulping stage)
- biological oxygen demand: 0.038
  BOD5(pulping stage)
- Suspended solids, unspecified,Suspended solids, unspecified: 0.3
  TSS(pulping stage)
- Waste (solid): 99
  waste(pulping stage)
- carbon dioxide (fossil): 907.3
  CO2(papermaking stage)
- Nitrogen oxides: 5.5
  NOx(papermaking stage)
- sulfur dioxide: 2.5
  SO2(papermaking stage)
- methane (fossil): 0.0087
  CH4(papermaking stage)
- non-methane volatile organic compounds: 0.4
  NMVOC(papermaking stage)
- Total Suspended Particulate: 0.7
  TSP(papermaking stage)
- chemical oxygen demand: 0.027
  COD(papermaking stage)
- biological oxygen demand: 0.002
  BOD5(papermaking stage)
- Suspended solids, unspecified,Suspended solids, unspecified: 0.016
  TSS(papermaking stage)
- carbon dioxide (fossil): 76.9
  CO2(transportation stage)
- Nitrogen oxides: 0.6
  NOx(transportation stage)
- sulfur dioxide: 0.3
  SO2(transportation stage)
- methane (fossil): 0.2
  CH4(transportation stage)
- particles (PM10): 0.022
  PM10(transportation stage)
- non-methane volatile organic compounds: 0.06
  NMVOC(transportation stage)
- carbon dioxide (fossil): 124.8
  CO2(Chemical production stage)
- Nitrogen oxides: 0.2
  NOx(Chemical production stage)
- sulfur dioxide: 0.3
  SO2(Chemical production stage)
- methane (fossil): 0.2
  CH4(Chemical production stage)
- particles (PM10): 0.011
  PM10(Chemical production stage)
- non-methane volatile organic compounds: 0.082
  NMVOC(Chemical production stage)
- Total Suspended Particulate: 0.091
  TSP(Chemical production stage)
- chemical oxygen demand: 0.2
  COD(Chemical production stage)
- biological oxygen demand: 0.2
  BOD5(Chemical production stage)
- nitrogen, total (excluding N2): 0.0088
  TN(Chemical production stage)
- nitrate: 0.037
  nitrate root(Chemical production stage)
- phosphate: 0.004
  Phosphate(Chemical production stage)
- Suspended solids, unspecified,Suspended solids, unspecified: 0.063
  TSS(Chemical production stage)
- carbon dioxide (fossil): 10.2
  CO2(Sewage treatment stage)
- Nitrogen oxides: 0.061
  NOx(Sewage treatment stage)
- sulfur dioxide: 0.057
  SO2(Sewage treatment stage)
- methane (fossil): 9.6e-5
  CH4(Sewage treatment stage)
- non-methane volatile organic compounds: 0.0041
  NMVOC(Sewage treatment stage)
- Total Suspended Particulate: 0.016
  TSP(Sewage treatment stage)
- nitrogen, total (excluding N2): 0.024
  TN(Sewage treatment stage)
- phosphorus, total: 0.079
  TP(Sewage treatment stage)
- Waste (solid): 35.7
  waste(Sewage treatment stage)

## Use advice
Users of this LCA dataset should primarily rely on actual data obtained from enterprise surveys, suppliers, sampling monitoring, and diversified collection methods. When primary data is not available, substitution from the Ecoinvent database related datasets is permissible. Unit processes are supplemented using a black-box approach in the Chinese lifecycle assessment database. Lifecycle impact considerations in this study exclude economic-environmental impacts from the recycling or reuse processes of recyclable solid waste, like coal slag, polyester resins, and cotton fibers. The functional unit is defined as 1 ton of newsprint. Selection of chemical production processes is based on a cutoff criterion of over 1% of ton paper usage or when environmental impacts exceed 1% of the total impact of the newsprint product.

## Review details
Inventory: The internal review was done by several iteration steps concerning raw data validation, raw data documentation, representativity, completeness and consistency of modelling with regard to ISO 14040 and 14044.

## Data sources
- 许远. 典型再循环纸产品的生命周期影响全评价. 造纸科学与技术 38, 58-61+86 (2019).
