# polyvinyl chloride production ; recycled polyvinyl chloride; waste plastics

Dataset: ILCD process, Unit process, black box
Geography: AH-CN
Reference year: 2015
Valid until: 2015
Classification: Unit processes / Materials production / Plastics
Functional unit: a ton of recycled PVC plastic production
Generated by: Xiaoyu Cheng, xiaoyucheng@email.ncu.edu.cn
Owner: Tiangong LCI Data Working Group
Review: Dependent internal review by Tiangong LCI Data Working Group
Amounts: no units in this file; such an amount is in the reference unit of its flow, which a separate flow dataset defines
copyright: false
licenseType: Free of charge for all users and uses

## General comment
The recycled PVC scenario contains two main processes- recycled PVC particles and recycled PVC productions.

## Time period
The recycled PVC data referred to the 2015 factory data.

## Technical purpose
The recycled polyvinyl chloride (PVC) industrial process is intended for the production of recycled PVC particles and the subsequent production of recycled PVC products. These materials are typically used in a variety of markets, including construction for pipes and fittings, in the automotive industry for interiors, and for various consumer goods such as packaging materials. Recycled PVC is valued for its sustainability aspect as it reduces the reliance on virgin raw materials and minimizes environmental impact.

## Reference product
- Recycled Polyvinyl Chloride: 1000

## Inputs
All rows: measured
- Waste Plastic: 1100
- water: 2.91
- Electricity: 984.636
- natural gas; 44.1 MJ/kg: 44.63
- unspecified: 2.11

## Outputs
All rows: measured
- sulfur dioxide: 0.04
- Nitrogen oxides: 0.14
- particles (>PM10): 0.16
- xylene (all isomers): 7e-5
- non-methane volatile organic compounds: 0.25
- Suspended solids, unspecified,Suspended solids, unspecified: 0.01517
- biological oxygen demand: 0.01234
- chemical oxygen demand: 0.10759
- Oils, unspecified: 0.00257
- ammonia: 0.00332
- Industrial Hazardous Waste: 0.24013
- landfill of plastic waste: 2.41
- waste water - untreated: 360

## Use advice
When utilizing the data set for Life Cycle Assessment (LCA), data users should carefully consider the technological applicability of the recycled PVC process data, including the year of data collection (2015). Since technological advancements and environmental regulations can influence the production process, the data set's relevance should be evaluated against current standards. Users should also account for end-of-life scenarios and possible recycling pathways. Additionally, users should apply the data in consistency with the functional unit defined, ensuring accurate representation of raw material input, energy use, transport, technology flows, waste treatment, and direct emissions in a cradle-to-gate assessment.

## Review details
Inventory: The internal review was done by several iteration steps concerning raw data validation, raw data documentation, representativity, completeness and consistency of modelling with regard to ISO 14040 and 14044.

## Data sources
- Ye, L., Qi, C., Hong, J. & Ma, X. Life cycle assessment of polyvinyl chloride production and its recyclability in China. Journal of Cleaner Production 142, 2965–2972 (2016).
