# Municipal sludge treatment and disposal;thickened sludge total solid concentration of 5%;anaerobic digestion

Dataset: ILCD process, Unit process, single operation
Geography: CN
Classification: Unit processes / End-of-life treatment / Waste water treatment
Functional unit: The functional unit was 1 t TS of thickened sludge, and all the input and output data were adapted to per unit (t TS)， total solid concentration of 5%.
Generated by: Jin Sitian, 2331276@tongji.edu.cn
Owner: Tiangong LCI Data Working Group
Review: Dependent internal review by Tiangong LCI Data Working Group
Amounts: no units in this file; such an amount is in the reference unit of its flow, which a separate flow dataset defines
copyright: ['opt4ROkqig']
licenseType: Free of charge for all users and uses

## General comment
The VS/TS of the feedstock was set at four levels including 40%, 50%, 60%, and 70%. The four types of feedstock were assumed to have the same elementary composition (C: 45.1%; H: 7.6%; O: 38.8%; N: 6.8%; S: 1.4%; based on VS).

## Technology and included processes
The heat generated from the combined heat and power (CHP) system of the biogas is first supplied to anaerobic digestion, and the residual heat (only when treating high organic content sludge) is used for thermal drying.

## Technical purpose
The data set represents the treatment and disposal of municipal sludge through a process which includes thickening the sludge to a total solid concentration of 5% followed by anaerobic digestion. This data is applicable primarily to waste management facilities involved in processing and stabilizing municipal sludge for either further use or final disposal.

## Reference product
- Sludge: 1000; input; estimated
  The functional unit was 1 t TS of thickened sludge, and all the input andoutput data were adapted to per unit (t TS)， total solid concentration of 5%.

## Inputs
- heat: 2800
- Electricity: 180; measured

## Use advice
Users of this data should ensure its application within the context of municipal sludge management and should note the specific parameters of the process, including the total solid concentration level of 5%. It’s important to consider the technological applicability of this data to similar waste treatment setups and to adhere to any local regulations or standards when utilizing it. Additionally, if adapting this data beyond the scope of municipal sludge, users must carefully consider the changes in efficiencies or outputs within different treatment contexts.

## Review details
Inventory: The internal review was done by several iteration steps concerning raw data validation, raw data documentation, representativity, completeness and consistency of modelling with regard to ISO 14040 and 14044.

## Data sources
- Li, H. & Feng, K. Life cycle assessment of the environmental impacts and energy efficiency of an integration of sludge anaerobic digestion and pyrolysis. Journal of Cleaner Production 195, 476–485 (2018).
