# Municipal sludge treatment and disposal;dry sludge;thickening

Dataset: ILCD process, Unit process, single operation
Geography: CN
Classification: Unit processes / End-of-life treatment / Waste water treatment
Functional unit: One ton of sludge on a dry basis (1 t-DS) is defined as the functional unit.
Generated by: Jin Sitian, 2331276@tongji.edu.cn
Owner: Tiangong LCI Data Working Group
Review: Dependent internal review by Tiangong LCI Data Working Group
Amounts: no units in this file; such an amount is in the reference unit of its flow, which a separate flow dataset defines
copyright: ['opt4ROkqig']
licenseType: Free of charge for all users and uses

## General comment
Several typical sludge treatment facilities in China, representing anaerobic digestion, composting, co-combustion, thermal drying-incineration, and cement production, respectively, are selected to carry out the inventory. Data are mainly taken from the site-specific measurement, either by field survey or by operation report. Sludge characteristics are based on the average values of the sites investigated.

## Technology and included processes
Sludge needs to be thickened and dewatered before treatment. The sludge moisture content after thickening is about 97%.

## Technical purpose
This data set describes the process of municipal sludge treatment and disposal, specifically focusing on the thickening of dry sludge. This process is applicable in municipal waste management systems where the reduction of sludge volume is necessary before further treatment or final disposal. The material, represented by this data set, is commonly used in the management of sewage systems and wastewater treatment plants.

## Reference product
- Sludge: 1000; input; estimated
  a dry basis (1 t-DS)

## Inputs
- Electricity: 47.52; measured

## Use advice
When using this data set, ensure that it is applied within the context of municipal wastewater treatment and sludge management processes. The functional unit of one ton of dry sludge (1 t-DS) must be considered in the life cycle assessment to maintain consistency and comparability. Attention should be given to methodological considerations such as system boundaries, especially regarding the inclusion or exclusion of subsequent sludge treatment or disposal options. Users should also consider the technological applicability specific to their geographic or operational context.

## Review details
Inventory: The internal review was done by several iteration steps concerning raw data validation, raw data documentation, representativity, completeness and consistency of modelling with regard to ISO 14040 and 14044.

## Data sources
- Dong, J., Chi, Y., Tang, Y., Wang, F. & Huang, Q. Combined Life Cycle Environmental and Exergetic Assessment of Four Typical Sewage Sludge Treatment Techniques in China. Energy Fuels 28, 2114–2122 (2014).
