# Generator manufacture ; Generator of a 1.5 MW wind turbine

Dataset: ILCD process, Unit process, single operation
Geography: NMG-CN
Reference year: 2017
Classification: Energy carriers and technologies / Mechanical energy
Functional unit: The functional unit is 1.5 MW wind turbine
LCI method principle: Attributional
LCI method approaches: Allocation
Generated by: Yunzhi Zhao, ll10088@163.com
Owner: Tiangong LCI Data Working Group
Review: Dependent internal review by Tiangong LCI Data Working Group
Amounts: no units in this file; such an amount is in the reference unit of its flow, which a separate flow dataset defines
copyright: false
licenseType: Free of charge for all users and uses

## General comment
The generator of the 1.5 MW wind turbine is designed for integration into wind energy conversion systems. Specifically, it is used in wind farms for the production of renewable electricity. The 1.5 MW capacity makes it suitable for large-scale energy production at wind farms, such as the one located in the northeast of Inner Mongolia, which features 33 domestic wind turbines.

## Geography
The data regarding the parameters of wind power has been collected from Wang (2012). A wind farm equipped with 33 domestic 1.5 megawatts (MW) wind turbines is regarded as a case study to analyze the environmental impact and its substitution effects. The wind farm is located in the northeast of Inner Mongolia, the province in which most of China’s wind power is installed (Xia and Song, 2017).

## Reference product
- Generator: 1; article inperiodical

## Inputs
- iron: 3960; article inperiodical
  Steel and iron
- silicon,silicon: 180; article inperiodical

## Deviations from the LCI method approaches
The life cycle inventory for wind power is illustrated as follows. The production and manufacturing stage include the production of wind turbines, substations, and cables, which consume a large amount of energy and emit pollutants (Xue et al., 2015).

## Use advice
Users utilizing this LCA data should apply it for environmental impact assessments of 1.5 MW wind turbine generators within the context of renewable energy production. Attention must be paid to the data source, as parameters come from a case study specific to wind turbines located in Inner Mongolia. When modeling the use phase or considering substitution effects, local conditions and technological applicability, such as the regional wind profile and maintenance practices, must also be factored into analyses. The life cycle inventory includes the production of wind turbines, substations, and cables, and thus calculations should account for upstream energy consumption and pollutant emissions, cited from Xue et al. (2015).

## Review details
Inventory: The internal review was done by several iteration steps concerning raw data validation, raw data documentation, representativity, completeness and consistency of modelling with regard to ISO 14040 and 14044.

## Data sources
- Li, H., Jiang, H.-D., Dong, K.-Y., Wei, Y.-M. & Liao, H. A comparative analysis of the life cycle environmental emissions from wind and coal power: Evidence from China. Journal of Cleaner Production 248, 119192 (2020).
