# Groundwater remediation ; In-situ remediation ; Adsorption ; Engineering implementation ; Treatment of contaminated water

Dataset: ILCD process, Unit process, single operation
Geography: ID
Reference year: 2022
Classification: Unit processes / Other Services / Repair and maintenance
Generated by: Xiao Meng, xiaomeng@mail.bnu.edu.cn
Owner: Tiangong LCI Data Working Group
Review: Dependent internal review by Tiangong LCI Data Working Group
Amounts: no units in this file; such an amount is in the reference unit of its flow, which a separate flow dataset defines
copyright: false
licenseType: Free of charge for all users and uses

## General comment
Treatment of contaminated water using calcined adsorbents.

## Technical purpose
This data set describes the utilization of calcined adsorbents for the in-situ treatment of contaminated groundwater. It is applicable in environmental engineering projects aimed at groundwater remediation, specifically involving adsorption processes to remove pollutants.

## Reference product
- contaminated groundwater: 0.72; input; measured
  contaminated water

## Inputs
- Aluminium hydroxide/oxide nanoparticles adsorption (Calcined; final product): 3.06; measured
  Calcined Adsorbent

## Outputs
- Remediated groundwater: 0.72; measured
  Treated water

## Use advice
Users of this data set should ensure the appropriate application of the calcined adsorbent based on the specific contaminants in the groundwater. Methodological consideration must be given to the adsorption capacity, the flow rate of water through the adsorbent media, and the regeneration or disposal of spent adsorbents. Additionally, the system boundary for LCA should include the production of adsorbents, the in-situ remediation process, and end-of-life treatment.

## Review details
Inventory: The internal review was done by several iteration steps concerning raw data validation, raw data documentation, representativity, completeness and consistency of modelling with regard to ISO 14040 and 14044.

## Data sources
- Goyal, H. & Mondal, P. Life cycle assessment (LCA) of the arsenic and fluoride removal from groundwater through adsorption and electrocoagulation: A comparative study. Chemosphere 304, 135243 (2022).
