# Remediated soil ; Mercury contaminated agricultural soil ; Stabilization/solidification with coal-based powdered activated carbon

Dataset: ILCD process, Unit process, black box
Geography: GZ-CN
Reference year: 2016
Classification: Unit processes / Other Services / Repair and maintenance
Functional unit: The functional unit in this study is the treatment of 1 tonne of mercury contaminated top soil in agricultural land to meet regulatory standards. The average initial mercury concentration is 134 mg/kg.
Generated by: Yang Xintong, yangxt@caep.org.cn
Owner: Tiangong LCI Data Working Group
Review: Dependent internal review by Tiangong LCI Data Working Group
Amounts: no units in this file; such an amount is in the reference unit of its flow, which a separate flow dataset defines
copyright: false
licenseType: Free of charge for all users and uses

## General comment
The S/S treatment of mercury contaminated soil using sulfur-impregnated activated carbon has been demonstrated to be effective in achieving leaching thresholds.

## Geography
The study site is agricultural land contaminated by mercury, located in Guizhou Province in Southern China.This particular case is representative of the typical scale and scenario where agricultural land is contaminated by nearby mining and smelting operations.

## Technology and included processes
In S/S, a stabilizing reagent is mixed with contaminated soil, leading to reduced leachability of mercury in the soil matrix, either due to the physical binding/enclosure (solidification) or chemical reaction (stabilization). Because S/S does not reduce the total mercury content, the stabilized material still requires disposal in a landfill. Powder reactivated carbon (PAC) modified by sulfur is used for stabilization. The production of powder reactivated carbon are from fossil anthracite coal-based PAC that is produced in a regional plant. A cement dosage ratio of 6% is used based on data from a full scale cement-based S/S project.

## Technical purpose
This remediated soil process is specifically applied to mercury-contaminated agricultural land. The stabilization/solidification (S/S) using sulfur-impregnated powdered activated carbon from coal efficiently reduces the leachability of mercury, meeting regulatory leaching thresholds for safe disposal.

## Reference product
- Remediated soil: 1000; missing unimportant

## Inputs
All rows: missing unimportant
- cement, unspecified: 60
- coal-based powdered activated carbon: 20
- Plastic (unspecified): 0.24
- Steel: 0.01
- Tap Water: 0.04
- transport in t*km: 313
- Waste (solid): 1120
  Waste for landilling (kg)
- contaminated soil: 1000

## Use advice
When using this dataset for LCA, include the application of sulfur-impregnated powdered activated carbon in the ratio of 6% cement dosage for effective S/S treatment of mercury-contaminated soil. Note that the total mercury content remains unchanged and only leachability is reduced, requiring landfill disposal after treatment. Energy consumption and material inputs for the production of powdered activated carbon from regional anthracite-derived PAC plants should also be accounted for.

## Review details
Inventory: The internal review was done by several iteration steps concerning raw data validation, raw data documentation, representativity, completeness and consistency of modelling with regard to ISO 14040 and 14044.

## Data sources
- Hou D ,Gu Q ,Ma F , et al. Life cycle assessment comparison of thermal desorption and stabilization/solidification of mercury contaminated soil on agricultural land [J]. Journal of Cleaner Production, 2016, 139 949-956.
