# copper-based mixed waste recycling;gold, silver, selenium, nickel carbonate, and other byproducts;gold and silver recovery process;copper electrolysis waste (anode mud)

Dataset: ILCD process, Unit process, single operation
Geography: JX-CN
Reference year: 2020
Classification: Unit processes / Materials production / Metals and semimetals
Functional unit: We consider the functional unit of the recycling of copper-based mixed waste to be 1000 kg electrolytic copper.
LCI method principle: Attributional
LCI method approaches: Allocation - market value
Generated by: Peng Wang, 2867919560@qq.com
Owner: Tiangong LCI Data Working Group
Review: Dependent internal review by Tiangong LCI Data Working Group
Amounts: no units in this file; such an amount is in the reference unit of its flow, which a separate flow dataset defines
copyright: false
licenseType: Free of charge for all users and uses

## General comment
This copper-based mixed waste recycling process is intended for the extraction and recovery of valuable metals such as gold, silver, selenium, and nickel carbonate from copper electrolysis waste, also known as anode mud. This process is typically applied within the metal recycling industry, particularly for extracting precious metals from industrial waste products.

## Geography
The typical case is a metal recycling enterprise located in Jiangxi Province, China,

## Technology and included processes
In the gold and silver recovery process, gold, silver, selenium, nickel carbonate, and other byproducts are extracted from copper electrolysis waste (anode mud) with liquid ammonia, hydrazine, hydrochloric acid, sulfuric acid, iron powder, oxalic acid, ash, and other auxiliary materials. Electricity is the primary energy source, and wastewater, waste gas, and waste residue are emitted.

## Reference product
- silver: 0.9; measured
  Silver

## Inputs
All rows: measured
- ammonia,ammonia: 3.5
  Ammonia
- Anode sludge: 15
  Anode sludge needs to be supplemented
- Electricity: 72
- hard coal,hard coal,hard coal: 11.2
  Hard coal
- Hydrochloric acid: 0.3
  Hydrochloric acid (32%) needs to be supplemented
- Quicklime: 7.5
  Quicklime needs to be supplemented
- natural gas,natural gas,natural gas: 1.8
  Natural gas
- Oxalic acid: 0.2
  Oxalic acid needs to be supplemented with resourse
- iron: 21
  Cast iron
- Sodium chlorate: 6
  Sodium carbonate needs to be supplemented
- Sodium chlorate: 6
  Sodium chlorate needs to be supplemented
- sodium chloride: 3
  Sodium chloride
- sodium hydroxide: 1.5
  Sodium hydroxide
- Sodium sulfite: 3
  Sodium sulfite needs to be supplemented
- Sulfuric acid(98%): 18
  Sulfuric acid (98%) needs to be supplemented with resourse
- transport in t*km,transport in t*km: 1.8981
  Transport
- water: 4.2
  Water
- Zinc dust: 0.3

## Outputs
All rows: measured
- carbon dioxide (fossil): 15
  原文未区分bio和fossil，根据专家判断此处为fossil
- carbon monoxide,carbon monoxide (fossil): 70.7
  Flue gas
- mineral treatment residue (unspecified): 8
  Treatment residue
- Waste (unspecified): 3.4
  Waste (deposited)
- Nickel carbonate: 1.4
  Nickel carbonate needs to be supplemented
- selenium: 0.5
  Selenium

## Deviations from the LCI method approaches
Using the LCA-ReCiPe 2016 (Heijungs et al., 2017) characterization and normalization method (the midpoint and endpoint method), the life cycle inventory is converted into impact scores in multiple fields.

## Data selection and combination
foreground data and background data.

## Data treatment and extrapolations
GaBi 9.0 software is adopted to calculate the inventory, resource consumption, and waste emissions of the various copper-based mixed-waste recovery processes per unit mass.

## Use advice
Users should employ GaBi 9.0 software for calculating the inventory, resource consumption, and waste emissions of the copper-based mixed-waste recovery processes per unit mass. It is crucial to use the life cycle inventory data with the LCA-ReCiPe 2016 (Heijungs et al., 2017) characterization and normalization method, utilizing both midpoint and endpoint approaches, to convert inventory data into impact scores across multiple fields. Be mindful to model the functional unit as 1000 kg of electrolytic copper to ensure consistency and comparability in the lifecycle assessment.

## Review details
Inventory: The internal review was done by several iteration steps concerning raw data validation, raw data documentation, representativity, completeness and consistency of modelling with regard to ISO 14040 and 14044.

## Data sources
- Zhang, W. et al. Analyzing the environmental impact of copper-based mixed waste recycling-a LCA case study in China. Journal of Cleaner Production 284, 125256 (2021).
