# Iron ore production;Iron ore;Iron ore mining(Z08)

Dataset: ILCD process, Unit process, single operation
Geography: CN
Reference year: 1998
Classification: Unit processes / Materials production / Non-energetic raw materials
Generated by: Fuxiang, 1162850692@qq.com
Owner: Tiangong LCI Data Working Group
Review: Dependent internal review by Tiangong LCI Data Working Group
Amounts: no units in this file; such an amount is in the reference unit of its flow, which a separate flow dataset defines
copyright: false
licenseType: Free of charge for all users and uses

## General comment
来自表 4-16 Z08 钢厂生产吨材环境负荷编目表

## Time period
论文提到钢铁企业环境总体数据为1998年的吨钢环境基础数据。

## Technical purpose
This dataset represents the iron ore produced for use in iron and steel manufacturing industries. It pertains to the environmental load for the production of a ton of material at steelmaking facilities, drawn from iron ore mining processes (Z08).

## Reference product
- Iron ore: 5369; measured
  iron ore

## Inputs
- Energy, geothermal, converted: 1971.64; measured

## Outputs
- particles (> PM10): 0.102; measured
  soot
- sulfur dioxide: 0.169; measured
- Suspended solids, unspecified: 0.423077; measured

## Use advice
When utilizing this dataset for Life Cycle Assessment, it is crucial to consider that the environmental load data is based on the tonnage of steel production from the year 1998. Ensure that the dataset aligns with the geographical and technological scope of your assessment. Due to the historical nature of the data, users may need to adjust parameters to reflect current practices if significant technological advancements have occurred since 1998.

## Review details
Inventory: The internal review was done by several iteration steps concerning raw data validation, raw data documentation, representativity, completeness and consistency of modelling with regard to ISO 14040 and 14044.

## Data sources
- 周和敏. 钢铁材料生产过程环境协调性评价研究. (北京工业大学, 2001).
