# Electricity/electrical energy + heat energy ; Coal ; Circulating fluidized bed boiler ; 20~34 MW; NESPS2 / 电能/电能+热能 ; 煤炭 ; 循环流化床锅炉 ; 20～34兆瓦 ; 全国第二次污染普查数据

Dataset: ILCD process, Unit process, single operation
Geography: CN
Reference year: 2019
Classification: Reference Parameters / Energy carriers and technologies / Electricity
Generated by: The data was created by the Office of the Second National Pollution Source Census of the Ministry of Ecology and Environment, and the data was organized by the TianGong Plan team for ILCD format / 生态环境部第二次全国污染源普查工作办公室创建数据，天工计划团队常慧敏整理数据为ILCD格式
Owner: Tiangong LCI Data Working Group / 天工LCI数据工作小组
Review: Dependent internal review by Tiangong LCI Data Working Group / 天工LCI数据工作小组
Amounts: no units in this file; such an amount is in the reference unit of its flow, which a separate flow dataset defines
copyright: false
licenseType: Free of charge for all users and uses

## General comment
the Technical of end-of-pipe management technology for pollution sulfur dioxideisOthers (sodium alkali method)，Its Technical efficiency of end-of-pipe management1.8571Sar+90

## Technical purpose
本流程描述的是一种燃煤循环流化床锅炉系统，容量为20至34兆瓦，可产生电能和热能。数据集关联不同的末端污染物管理技术，旨在减少颗粒物(PM2.5 - PM10)、二氧化硫、氮氧化物和汞的排放。可用于评估以控制排放和减少污染为重点的燃煤电厂和工业锅炉的环境性能。这些技术包括静电沉降、电袋复合沉降器、布袋过滤器、这些系统的高效变体，以及与湿法脱硫和湿式静电沉降器相结合的进一步减排措施。适用范围扩展到需要可靠污染控制措施的系统，如大型发电设施和具有严格环境标准的工业制造工厂。

## Reference product
- Coal: 1000; input; calculated
  源文件中描述为为煤炭，此处对其进行了匹配工作，将其匹配到LCAflow库里面相最符合的流，污染物指标备注为颗粒物

## Outputs
All rows: calculated
- volatile organic compound: 0
  the Technical of end-of-pipe management technology for pollution volatile organic compoundis/
  污染物指标挥发性有机物的末端治理技术是/。原文件中描述污染物类别为废气，污染物指标为挥发性有机物，此处对其进行了匹配工作，将其匹配到LCAflow库里面相最符合的流，污染物指标备注为挥发性有机物
- Nitrogen oxides: 0.324
  the Technical of end-of-pipe management technology for pollution Nitrogen oxidesisHigh-efficiency SCR③，Its Technical efficiency of end-of-pipe management70
  污染物指标氮氧化物（SNCR，煤炭干燥无灰基挥发分小于等于10%）的末端治理技术是高效选择性催化还原法（SCR）③，其效率为70，末端治理设施实际运行率（k值）计算公式为脱硝设施年实际运行小时数/机组年实际运行小时数，③高效氮氧化物末端治理技术：采取高效低氮燃烧技术、增设脱硝催化剂层数等措施，满足《燃煤电厂超低排放烟气治理工程技术规范》（HJ2053-2082）相关
  要求。。原文件中描述污染物类别为废气，污染物指标为氮氧化物（SNCR，煤炭干燥无灰基挥发分小于等于10%），此处对其进行了匹配工作，将其匹配到LCAflow库里面相最符合的流，污染物指标备注为氮氧化物（SNCR，煤炭干燥无灰基挥发分小于等于10%）
- Nitrogen oxides: 0.324
  the Technical of end-of-pipe management technology for pollution Nitrogen oxidesisHigh-efficiency SCR③，Its Technical efficiency of end-of-pipe management70
  污染物指标氮氧化物（SNCR，10%小于煤炭干燥无灰基挥发分小于等于20%）的末端治理技术是高效选择性催化还原法（SCR）③，其效率为70，末端治理设施实际运行率（k值）计算公式为脱硝设施年实际运行小时数/机组年实际运行小时数，③高效氮氧化物末端治理技术：采取高效低氮燃烧技术、增设脱硝催化剂层数等措施，满足《燃煤电厂超低排放烟气治理工程技术规范》（HJ2053-2083）相关
  要求。。原文件中描述污染物类别为废气，污染物指标为氮氧化物（SNCR，10%小于煤炭干燥无灰基挥发分小于等于20%），此处对其进行了匹配工作，将其匹配到LCAflow库里面相最符合的流，污染物指标备注为氮氧化物（SNCR，10%小于煤炭干燥无灰基挥发分小于等于20%）
- Nitrogen oxides: 0.36
  the Technical of end-of-pipe management technology for pollution Nitrogen oxidesisHigh-efficiency SCR③，Its Technical efficiency of end-of-pipe management70
  污染物指标氮氧化物（SNCR，20%小于煤炭干燥无灰基挥发分小于等于37%）的末端治理技术是高效选择性催化还原法（SCR）③，其效率为70，末端治理设施实际运行率（k值）计算公式为脱硝设施年实际运行小时数/机组年实际运行小时数，③高效氮氧化物末端治理技术：采取高效低氮燃烧技术、增设脱硝催化剂层数等措施，满足《燃煤电厂超低排放烟气治理工程技术规范》（HJ2053-2084）相关
  要求。。原文件中描述污染物类别为废气，污染物指标为氮氧化物（SNCR，20%小于煤炭干燥无灰基挥发分小于等于37%），此处对其进行了匹配工作，将其匹配到LCAflow库里面相最符合的流，污染物指标备注为氮氧化物（SNCR，20%小于煤炭干燥无灰基挥发分小于等于37%）
- Nitrogen oxides: 0.36
  the Technical of end-of-pipe management technology for pollution Nitrogen oxidesisHigh-efficiency SCR③，Its Technical efficiency of end-of-pipe management70
  污染物指标氮氧化物（SNCR，煤炭干燥无灰基挥发分>37%）的末端治理技术是高效选择性催化还原法（SCR）③，其效率为70，末端治理设施实际运行率（k值）计算公式为脱硝设施年实际运行小时数/机组年实际运行小时数，③高效氮氧化物末端治理技术：采取高效低氮燃烧技术、增设脱硝催化剂层数等措施，满足《燃煤电厂超低排放烟气治理工程技术规范》（HJ2053-2085）相关
  要求。。原文件中描述污染物类别为废气，污染物指标为氮氧化物（SNCR，煤炭干燥无灰基挥发分>37%），此处对其进行了匹配工作，将其匹配到LCAflow库里面相最符合的流，污染物指标备注为氮氧化物（SNCR，煤炭干燥无灰基挥发分>37%）
- Nitrogen oxides: 0.4752
  the Technical of end-of-pipe management technology for pollution Nitrogen oxidesisHigh-efficiency SCR③，Its Technical efficiency of end-of-pipe management78
  污染物指标氮氧化物，煤炭干燥无灰基挥发分小于等于10%的末端治理技术是高效选择性催化还原法（SCR）③，其效率为78，末端治理设施实际运行率（k值）计算公式为脱硝设施年实际运行小时数/机组年实际运行小时数，③高效氮氧化物末端治理技术：采取高效低氮燃烧技术、增设脱硝催化剂层数等措施，满足《燃煤电厂超低排放烟气治理工程技术规范》（HJ2053-2078）相关
  要求。。原文件中描述污染物类别为废气，污染物指标为氮氧化物，煤炭干燥无灰基挥发分小于等于10%，此处对其进行了匹配工作，将其匹配到LCAflow库里面相最符合的流，污染物指标备注为氮氧化物，煤炭干燥无灰基挥发分小于等于10%
- Nitrogen oxides: 0.4752
  the Technical of end-of-pipe management technology for pollution Nitrogen oxidesisHigh-efficiency SCR③，Its Technical efficiency of end-of-pipe management78
  污染物指标氮氧化物，10%小于煤炭干燥无灰基挥发分小于等于20%的末端治理技术是高效选择性催化还原法（SCR）③，其效率为78，末端治理设施实际运行率（k值）计算公式为脱硝设施年实际运行小时数/机组年实际运行小时数，③高效氮氧化物末端治理技术：采取高效低氮燃烧技术、增设脱硝催化剂层数等措施，满足《燃煤电厂超低排放烟气治理工程技术规范》（HJ2053-2079）相关
  要求。。原文件中描述污染物类别为废气，污染物指标为氮氧化物，10%小于煤炭干燥无灰基挥发分小于等于20%，此处对其进行了匹配工作，将其匹配到LCAflow库里面相最符合的流，污染物指标备注为氮氧化物，10%小于煤炭干燥无灰基挥发分小于等于20%
- Nitrogen oxides: 0.5258
  the Technical of end-of-pipe management technology for pollution Nitrogen oxidesisHigh-efficiency SCR③，Its Technical efficiency of end-of-pipe management78
  污染物指标氮氧化物，20%小于煤炭干燥无灰基挥发分小于等于37%的末端治理技术是高效选择性催化还原法（SCR）③，其效率为78，末端治理设施实际运行率（k值）计算公式为脱硝设施年实际运行小时数/机组年实际运行小时数，③高效氮氧化物末端治理技术：采取高效低氮燃烧技术、增设脱硝催化剂层数等措施，满足《燃煤电厂超低排放烟气治理工程技术规范》（HJ2053-2080）相关
  要求。。原文件中描述污染物类别为废气，污染物指标为氮氧化物，20%小于煤炭干燥无灰基挥发分小于等于37%，此处对其进行了匹配工作，将其匹配到LCAflow库里面相最符合的流，污染物指标备注为氮氧化物，20%小于煤炭干燥无灰基挥发分小于等于37%
- Nitrogen oxides: 0.5258
  the Technical of end-of-pipe management technology for pollution Nitrogen oxidesisHigh-efficiency SCR③，Its Technical efficiency of end-of-pipe management78
  污染物指标氮氧化物，煤炭干燥无灰基挥发分>37%的末端治理技术是高效选择性催化还原法（SCR）③，其效率为78，末端治理设施实际运行率（k值）计算公式为脱硝设施年实际运行小时数/机组年实际运行小时数，③高效氮氧化物末端治理技术：采取高效低氮燃烧技术、增设脱硝催化剂层数等措施，满足《燃煤电厂超低排放烟气治理工程技术规范》（HJ2053-2081）相关
  要求。。原文件中描述污染物类别为废气，污染物指标为氮氧化物，煤炭干燥无灰基挥发分>37%，此处对其进行了匹配工作，将其匹配到LCAflow库里面相最符合的流，污染物指标备注为氮氧化物，煤炭干燥无灰基挥发分>37%
- Nitrogen oxides: 0.54
  the Technical of end-of-pipe management technology for pollution Nitrogen oxidesisSCR，Its Technical efficiency of end-of-pipe management50
  污染物指标氮氧化物（SNCR，煤炭干燥无灰基挥发分小于等于10%）的末端治理技术是选择性催化还原法（SCR），其效率为50，末端治理设施实际运行率（k值）计算公式为脱硝设施年实际运行小时数/机组年实际运行小时数。原文件中描述污染物类别为废气，污染物指标为氮氧化物（SNCR，煤炭干燥无灰基挥发分小于等于10%），此处对其进行了匹配工作，将其匹配到LCAflow库里面相最符合的流，污染物指标备注为氮氧化物（SNCR，煤炭干燥无灰基挥发分小于等于10%）
- Nitrogen oxides: 0.54
  the Technical of end-of-pipe management technology for pollution Nitrogen oxidesisSCR，Its Technical efficiency of end-of-pipe management50
  污染物指标氮氧化物（SNCR，10%小于煤炭干燥无灰基挥发分小于等于20%）的末端治理技术是选择性催化还原法（SCR），其效率为50，末端治理设施实际运行率（k值）计算公式为脱硝设施年实际运行小时数/机组年实际运行小时数。原文件中描述污染物类别为废气，污染物指标为氮氧化物（SNCR，10%小于煤炭干燥无灰基挥发分小于等于20%），此处对其进行了匹配工作，将其匹配到LCAflow库里面相最符合的流，污染物指标备注为氮氧化物（SNCR，10%小于煤炭干燥无灰基挥发分小于等于20%）
- Nitrogen oxides: 0.6
  the Technical of end-of-pipe management technology for pollution Nitrogen oxidesisSCR，Its Technical efficiency of end-of-pipe management50
  污染物指标氮氧化物（SNCR，20%小于煤炭干燥无灰基挥发分小于等于37%）的末端治理技术是选择性催化还原法（SCR），其效率为50，末端治理设施实际运行率（k值）计算公式为脱硝设施年实际运行小时数/机组年实际运行小时数。原文件中描述污染物类别为废气，污染物指标为氮氧化物（SNCR，20%小于煤炭干燥无灰基挥发分小于等于37%），此处对其进行了匹配工作，将其匹配到LCAflow库里面相最符合的流，污染物指标备注为氮氧化物（SNCR，20%小于煤炭干燥无灰基挥发分小于等于37%）
- Nitrogen oxides: 0.6
  the Technical of end-of-pipe management technology for pollution Nitrogen oxidesisSCR，Its Technical efficiency of end-of-pipe management50
  污染物指标氮氧化物（SNCR，煤炭干燥无灰基挥发分>37%）的末端治理技术是选择性催化还原法（SCR），其效率为50，末端治理设施实际运行率（k值）计算公式为脱硝设施年实际运行小时数/机组年实际运行小时数。原文件中描述污染物类别为废气，污染物指标为氮氧化物（SNCR，煤炭干燥无灰基挥发分>37%），此处对其进行了匹配工作，将其匹配到LCAflow库里面相最符合的流，污染物指标备注为氮氧化物（SNCR，煤炭干燥无灰基挥发分>37%）
- Nitrogen oxides: 0.756
  the Technical of end-of-pipe management technology for pollution Nitrogen oxidesisSCR，Its Technical efficiency of end-of-pipe management65
  污染物指标氮氧化物，煤炭干燥无灰基挥发分小于等于10%的末端治理技术是选择性催化还原法（SCR），其效率为65，末端治理设施实际运行率（k值）计算公式为脱硝设施年实际运行小时数/机组年实际运行小时数。原文件中描述污染物类别为废气，污染物指标为氮氧化物，煤炭干燥无灰基挥发分小于等于10%，此处对其进行了匹配工作，将其匹配到LCAflow库里面相最符合的流，污染物指标备注为氮氧化物，煤炭干燥无灰基挥发分小于等于10%
- Nitrogen oxides: 0.756
  the Technical of end-of-pipe management technology for pollution Nitrogen oxidesisSCR，Its Technical efficiency of end-of-pipe management65
  污染物指标氮氧化物，10%小于煤炭干燥无灰基挥发分小于等于20%的末端治理技术是选择性催化还原法（SCR），其效率为65，末端治理设施实际运行率（k值）计算公式为脱硝设施年实际运行小时数/机组年实际运行小时数。原文件中描述污染物类别为废气，污染物指标为氮氧化物，10%小于煤炭干燥无灰基挥发分小于等于20%，此处对其进行了匹配工作，将其匹配到LCAflow库里面相最符合的流，污染物指标备注为氮氧化物，10%小于煤炭干燥无灰基挥发分小于等于20%
- Nitrogen oxides: 0.8365
  the Technical of end-of-pipe management technology for pollution Nitrogen oxidesisSCR，Its Technical efficiency of end-of-pipe management65
  污染物指标氮氧化物，20%小于煤炭干燥无灰基挥发分小于等于37%的末端治理技术是选择性催化还原法（SCR），其效率为65，末端治理设施实际运行率（k值）计算公式为脱硝设施年实际运行小时数/机组年实际运行小时数。原文件中描述污染物类别为废气，污染物指标为氮氧化物，20%小于煤炭干燥无灰基挥发分小于等于37%，此处对其进行了匹配工作，将其匹配到LCAflow库里面相最符合的流，污染物指标备注为氮氧化物，20%小于煤炭干燥无灰基挥发分小于等于37%
- Nitrogen oxides: 0.8365
  the Technical of end-of-pipe management technology for pollution Nitrogen oxidesisSCR，Its Technical efficiency of end-of-pipe management65
  污染物指标氮氧化物，煤炭干燥无灰基挥发分>37%的末端治理技术是选择性催化还原法（SCR），其效率为65，末端治理设施实际运行率（k值）计算公式为脱硝设施年实际运行小时数/机组年实际运行小时数。原文件中描述污染物类别为废气，污染物指标为氮氧化物，煤炭干燥无灰基挥发分>37%，此处对其进行了匹配工作，将其匹配到LCAflow库里面相最符合的流，污染物指标备注为氮氧化物，煤炭干燥无灰基挥发分>37%
- Nitrogen oxides: 1.08
  the Technical of end-of-pipe management technology for pollution Nitrogen oxidesisOthers (direct discharge)
  污染物指标氮氧化物（SNCR，煤炭干燥无灰基挥发分小于等于10%）的末端治理技术是其他（直排），末端治理设施实际运行率（k值）计算公式为脱硝设施年实际运行小时数/机组年实际运行小时数。原文件中描述污染物类别为废气，污染物指标为氮氧化物（SNCR，煤炭干燥无灰基挥发分小于等于10%），此处对其进行了匹配工作，将其匹配到LCAflow库里面相最符合的流，污染物指标备注为氮氧化物（SNCR，煤炭干燥无灰基挥发分小于等于10%）
- Nitrogen oxides: 1.08
  the Technical of end-of-pipe management technology for pollution Nitrogen oxidesisOthers (direct discharge)
  污染物指标氮氧化物（SNCR，10%小于煤炭干燥无灰基挥发分小于等于20%）的末端治理技术是其他（直排），末端治理设施实际运行率（k值）计算公式为脱硝设施年实际运行小时数/机组年实际运行小时数。原文件中描述污染物类别为废气，污染物指标为氮氧化物（SNCR，10%小于煤炭干燥无灰基挥发分小于等于20%），此处对其进行了匹配工作，将其匹配到LCAflow库里面相最符合的流，污染物指标备注为氮氧化物（SNCR，10%小于煤炭干燥无灰基挥发分小于等于20%）
- Nitrogen oxides: 1.2
  the Technical of end-of-pipe management technology for pollution Nitrogen oxidesisOthers (direct discharge)
  污染物指标氮氧化物（SNCR，20%小于煤炭干燥无灰基挥发分小于等于37%）的末端治理技术是其他（直排），末端治理设施实际运行率（k值）计算公式为脱硝设施年实际运行小时数/机组年实际运行小时数。原文件中描述污染物类别为废气，污染物指标为氮氧化物（SNCR，20%小于煤炭干燥无灰基挥发分小于等于37%），此处对其进行了匹配工作，将其匹配到LCAflow库里面相最符合的流，污染物指标备注为氮氧化物（SNCR，20%小于煤炭干燥无灰基挥发分小于等于37%）
- Nitrogen oxides: 1.2
  the Technical of end-of-pipe management technology for pollution Nitrogen oxidesisOthers (direct discharge)
  污染物指标氮氧化物（SNCR，煤炭干燥无灰基挥发分>37%）的末端治理技术是其他（直排），末端治理设施实际运行率（k值）计算公式为脱硝设施年实际运行小时数/机组年实际运行小时数。原文件中描述污染物类别为废气，污染物指标为氮氧化物（SNCR，煤炭干燥无灰基挥发分>37%），此处对其进行了匹配工作，将其匹配到LCAflow库里面相最符合的流，污染物指标备注为氮氧化物（SNCR，煤炭干燥无灰基挥发分>37%）
- Nitrogen oxides: 2.16
  the Technical of end-of-pipe management technology for pollution Nitrogen oxidesisOthers (direct discharge)
  污染物指标氮氧化物，煤炭干燥无灰基挥发分小于等于10%的末端治理技术是其他（直排），末端治理设施实际运行率（k值）计算公式为脱硝设施年实际运行小时数/机组年实际运行小时数。原文件中描述污染物类别为废气，污染物指标为氮氧化物，煤炭干燥无灰基挥发分小于等于10%，此处对其进行了匹配工作，将其匹配到LCAflow库里面相最符合的流，污染物指标备注为氮氧化物，煤炭干燥无灰基挥发分小于等于10%
- Nitrogen oxides: 2.16
  the Technical of end-of-pipe management technology for pollution Nitrogen oxidesisOthers (direct discharge)
  污染物指标氮氧化物，10%小于煤炭干燥无灰基挥发分小于等于20%的末端治理技术是其他（直排），末端治理设施实际运行率（k值）计算公式为脱硝设施年实际运行小时数/机组年实际运行小时数。原文件中描述污染物类别为废气，污染物指标为氮氧化物，10%小于煤炭干燥无灰基挥发分小于等于20%，此处对其进行了匹配工作，将其匹配到LCAflow库里面相最符合的流，污染物指标备注为氮氧化物，10%小于煤炭干燥无灰基挥发分小于等于20%
- Nitrogen oxides: 2.39
  the Technical of end-of-pipe management technology for pollution Nitrogen oxidesisOthers (direct discharge)
  污染物指标氮氧化物，20%小于煤炭干燥无灰基挥发分小于等于37%的末端治理技术是其他（直排），末端治理设施实际运行率（k值）计算公式为脱硝设施年实际运行小时数/机组年实际运行小时数。原文件中描述污染物类别为废气，污染物指标为氮氧化物，20%小于煤炭干燥无灰基挥发分小于等于37%，此处对其进行了匹配工作，将其匹配到LCAflow库里面相最符合的流，污染物指标备注为氮氧化物，20%小于煤炭干燥无灰基挥发分小于等于37%
- Nitrogen oxides: 2.39
  the Technical of end-of-pipe management technology for pollution Nitrogen oxidesisOthers (direct discharge)
  污染物指标氮氧化物，煤炭干燥无灰基挥发分>37%的末端治理技术是其他（直排），末端治理设施实际运行率（k值）计算公式为脱硝设施年实际运行小时数/机组年实际运行小时数。原文件中描述污染物类别为废气，污染物指标为氮氧化物，煤炭干燥无灰基挥发分>37%，此处对其进行了匹配工作，将其匹配到LCAflow库里面相最符合的流，污染物指标备注为氮氧化物，煤炭干燥无灰基挥发分>37%
- mercury: 0
  the Technical of end-of-pipe management technology for pollution mercuryisSynergistic mercury removal，Its Technical efficiency of end-of-pipe management25.73MHgar+84.12.The original article describes the pollution production coefficients as 0.000995MHgar。Please revise the corresponding emissions after accounting for them according to the notes.。.The original article describes the pollution production coefficients as 0.000995MHgar. Please revise the corresponding emissions after accounting for them according to the notes.
  污染物指标汞及其化合物的末端治理技术是协同脱汞，其效率为25.73MHgar+84.12，末端治理设施实际运行率（k值）计算公式为取该机组除尘、脱硝脱硫K的最小值。原文件中描述污染物类别为废气，污染物指标为汞及其化合物，此处对其进行了匹配工作，将其匹配到LCAflow库里面相最符合的流，污染物指标备注为汞及其化合物原文描述的产污系数为 0.000995MHgar。请根据备注自行核算后修改对应的排放量。
- particles (PM2.5 - PM10): 0
  the Technical of end-of-pipe management technology for pollution particles (PM2.5 - PM10)isBag filter + others (wet desulfurization synergy) + others (wet electrostatic precipitator)，Its Technical efficiency of end-of-pipe management0.00024Aar+0.00192Sar+99.983.The original article describes the pollution production coefficients as 6.3Aar+7.79+61.94Sar。Please revise the corresponding emissions after accounting for them according to the notes.。.The original article describes the pollution production coefficients as 6.3Aar+7.79+61.94Sar. Please revise the corresponding emissions after accounting for them according to the notes.
  污染物指标颗粒物的末端治理技术是袋式除尘+其他（湿法脱硫协同）+其他（湿式电除尘），其效率为0.00024Aar+0.00192Sar+99.983，末端治理设施实际运行率（k值）计算公式为除尘设施年实际运行小时数/机组年实际运行小时数。原文件中描述污染物类别为废气，污染物指标为颗粒物，此处对其进行了匹配工作，将其匹配到LCAflow库里面相最符合的流，污染物指标备注为颗粒物原文描述的产污系数为 6.3Aar+7.79+61.94Sar。请根据备注自行核算后修改对应的排放量。
- particles (PM2.5 - PM10): 0
  the Technical of end-of-pipe management technology for pollution particles (PM2.5 - PM10)isBag filter + others (wet desulfurization synergy)，Its Technical efficiency of end-of-pipe management0.0012Aar+0.0096Sar+99.916.The original article describes the pollution production coefficients as 6.3Aar+7.79+61.94Sar。Please revise the corresponding emissions after accounting for them according to the notes.。.The original article describes the pollution production coefficients as 6.3Aar+7.79+61.94Sar. Please revise the corresponding emissions after accounting for them according to the notes.
  污染物指标颗粒物的末端治理技术是袋式除尘+其他（湿法脱硫协同），其效率为0.0012Aar+0.0096Sar+99.916，末端治理设施实际运行率（k值）计算公式为除尘设施年实际运行小时数/机组年实际运行小时数。原文件中描述污染物类别为废气，污染物指标为颗粒物，此处对其进行了匹配工作，将其匹配到LCAflow库里面相最符合的流，污染物指标备注为颗粒物原文描述的产污系数为 6.3Aar+7.79+61.94Sar。请根据备注自行核算后修改对应的排放量。
- particles (PM2.5 - PM10): 0
  the Technical of end-of-pipe management technology for pollution particles (PM2.5 - PM10)isBag filter + others (wet electrostatic precipitator)，Its Technical efficiency of end-of-pipe management0.0006Aar+0.0048Sar+99.958.The original article describes the pollution production coefficients as 6.3Aar+7.79+61.94Sar。Please revise the corresponding emissions after accounting for them according to the notes.。.The original article describes the pollution production coefficients as 6.3Aar+7.79+61.94Sar. Please revise the corresponding emissions after accounting for them according to the notes.
  污染物指标颗粒物的末端治理技术是袋式除尘+其他（湿式电除尘），其效率为0.0006Aar+0.0048Sar+99.958，末端治理设施实际运行率（k值）计算公式为除尘设施年实际运行小时数/机组年实际运行小时数。原文件中描述污染物类别为废气，污染物指标为颗粒物，此处对其进行了匹配工作，将其匹配到LCAflow库里面相最符合的流，污染物指标备注为颗粒物原文描述的产污系数为 6.3Aar+7.79+61.94Sar。请根据备注自行核算后修改对应的排放量。
- particles (PM2.5 - PM10): 0
  the Technical of end-of-pipe management technology for pollution particles (PM2.5 - PM10)isBag filter，Its Technical efficiency of end-of-pipe management0.003Aar+0.024Sar+99.79.The original article describes the pollution production coefficients as 6.3Aar+7.79+61.94Sar。Please revise the corresponding emissions after accounting for them according to the notes.。.The original article describes the pollution production coefficients as 6.3Aar+7.79+61.94Sar. Please revise the corresponding emissions after accounting for them according to the notes.
  污染物指标颗粒物的末端治理技术是袋式除尘，其效率为0.003Aar+0.024Sar+99.79，末端治理设施实际运行率（k值）计算公式为除尘设施年实际运行小时数/机组年实际运行小时数。原文件中描述污染物类别为废气，污染物指标为颗粒物，此处对其进行了匹配工作，将其匹配到LCAflow库里面相最符合的流，污染物指标备注为颗粒物原文描述的产污系数为 6.3Aar+7.79+61.94Sar。请根据备注自行核算后修改对应的排放量。
- particles (PM2.5 - PM10): 0
  the Technical of end-of-pipe management technology for pollution particles (PM2.5 - PM10)isElectric-bag composite precipitator + others (wet desulfurization synergy) + others (wet electrostatic precipitator)，Its Technical efficiency of end-of-pipe management0.00024Aar+0.00202Sar+99.983.The original article describes the pollution production coefficients as 6.3Aar+7.79+61.94Sar。Please revise the corresponding emissions after accounting for them according to the notes.。.The original article describes the pollution production coefficients as 6.3Aar+7.79+61.94Sar. Please revise the corresponding emissions after accounting for them according to the notes.
  污染物指标颗粒物的末端治理技术是电袋组合+其他（湿法脱硫协同）+其他（湿式电除尘），其效率为0.00024Aar+0.00202Sar+99.983，末端治理设施实际运行率（k值）计算公式为除尘设施年实际运行小时数/机组年实际运行小时数。原文件中描述污染物类别为废气，污染物指标为颗粒物，此处对其进行了匹配工作，将其匹配到LCAflow库里面相最符合的流，污染物指标备注为颗粒物原文描述的产污系数为 6.3Aar+7.79+61.94Sar。请根据备注自行核算后修改对应的排放量。
- particles (PM2.5 - PM10): 0
  the Technical of end-of-pipe management technology for pollution particles (PM2.5 - PM10)isElectric-bag composite precipitator + others (wet desulfurization synergy)，Its Technical efficiency of end-of-pipe management0.0012Aar+0.01008Sar+99.914.The original article describes the pollution production coefficients as 6.3Aar+7.79+61.94Sar。Please revise the corresponding emissions after accounting for them according to the notes.。.The original article describes the pollution production coefficients as 6.3Aar+7.79+61.94Sar. Please revise the corresponding emissions after accounting for them according to the notes.
  污染物指标颗粒物的末端治理技术是电袋组合+其他（湿法脱硫协同），其效率为0.0012Aar+0.01008Sar+99.914，末端治理设施实际运行率（k值）计算公式为除尘设施年实际运行小时数/机组年实际运行小时数。原文件中描述污染物类别为废气，污染物指标为颗粒物，此处对其进行了匹配工作，将其匹配到LCAflow库里面相最符合的流，污染物指标备注为颗粒物原文描述的产污系数为 6.3Aar+7.79+61.94Sar。请根据备注自行核算后修改对应的排放量。
- particles (PM2.5 - PM10): 0
  the Technical of end-of-pipe management technology for pollution particles (PM2.5 - PM10)isElectric-bag composite precipitator + others (wet electrostatic precipitator)，Its Technical efficiency of end-of-pipe management0.0006Aar+0.00504Sar+99.957.The original article describes the pollution production coefficients as 6.3Aar+7.79+61.94Sar。Please revise the corresponding emissions after accounting for them according to the notes.。.The original article describes the pollution production coefficients as 6.3Aar+7.79+61.94Sar. Please revise the corresponding emissions after accounting for them according to the notes.
  污染物指标颗粒物的末端治理技术是电袋组合+其他（湿式电除尘），其效率为0.0006Aar+0.00504Sar+99.957，末端治理设施实际运行率（k值）计算公式为除尘设施年实际运行小时数/机组年实际运行小时数。原文件中描述污染物类别为废气，污染物指标为颗粒物，此处对其进行了匹配工作，将其匹配到LCAflow库里面相最符合的流，污染物指标备注为颗粒物原文描述的产污系数为 6.3Aar+7.79+61.94Sar。请根据备注自行核算后修改对应的排放量。
- particles (PM2.5 - PM10): 0
  the Technical of end-of-pipe management technology for pollution particles (PM2.5 - PM10)isElectric-bag composite precipitator，Its Technical efficiency of end-of-pipe management0.003Aar+0.0252Sar+99.78.The original article describes the pollution production coefficients as 6.3Aar+7.79+61.94Sar。Please revise the corresponding emissions after accounting for them according to the notes.。.The original article describes the pollution production coefficients as 6.3Aar+7.79+61.94Sar. Please revise the corresponding emissions after accounting for them according to the notes.
  污染物指标颗粒物的末端治理技术是电袋组合，其效率为0.003Aar+0.0252Sar+99.78，末端治理设施实际运行率（k值）计算公式为除尘设施年实际运行小时数/机组年实际运行小时数。原文件中描述污染物类别为废气，污染物指标为颗粒物，此处对其进行了匹配工作，将其匹配到LCAflow库里面相最符合的流，污染物指标备注为颗粒物原文描述的产污系数为 6.3Aar+7.79+61.94Sar。请根据备注自行核算后修改对应的排放量。
- particles (PM2.5 - PM10): 0
  the Technical of end-of-pipe management technology for pollution particles (PM2.5 - PM10)isElectrostatic precipitation + others (wet desulfurization synergy) + others (wet electrostatic precipitator)，Its Technical efficiency of end-of-pipe management0.00024Aar+0.00216Sar+99.981.The original article describes the pollution production coefficients as 6.3Aar+7.79+61.94Sar。Please revise the corresponding emissions after accounting for them according to the notes.。.The original article describes the pollution production coefficients as 6.3Aar+7.79+61.94Sar. Please revise the corresponding emissions after accounting for them according to the notes.
  污染物指标颗粒物的末端治理技术是静电除尘+其他（湿法脱硫协同）+其他（湿式电除尘），其效率为0.00024Aar+0.00216Sar+99.981，末端治理设施实际运行率（k值）计算公式为除尘设施年实际运行小时数/机组年实际运行小时数。原文件中描述污染物类别为废气，污染物指标为颗粒物，此处对其进行了匹配工作，将其匹配到LCAflow库里面相最符合的流，污染物指标备注为颗粒物原文描述的产污系数为 6.3Aar+7.79+61.94Sar。请根据备注自行核算后修改对应的排放量。
- particles (PM2.5 - PM10): 0
  the Technical of end-of-pipe management technology for pollution particles (PM2.5 - PM10)isElectrostatic precipitation + others (wet desulfurization synergy)，Its Technical efficiency of end-of-pipe management0.0012Aar+0.0108Sar+99.908.The original article describes the pollution production coefficients as 6.3Aar+7.79+61.94Sar。Please revise the corresponding emissions after accounting for them according to the notes.。.The original article describes the pollution production coefficients as 6.3Aar+7.79+61.94Sar. Please revise the corresponding emissions after accounting for them according to the notes.
  污染物指标颗粒物的末端治理技术是静电除尘+其他（湿法脱硫协同），其效率为0.0012Aar+0.0108Sar+99.908，末端治理设施实际运行率（k值）计算公式为除尘设施年实际运行小时数/机组年实际运行小时数。原文件中描述污染物类别为废气，污染物指标为颗粒物，此处对其进行了匹配工作，将其匹配到LCAflow库里面相最符合的流，污染物指标备注为颗粒物原文描述的产污系数为 6.3Aar+7.79+61.94Sar。请根据备注自行核算后修改对应的排放量。
- particles (PM2.5 - PM10): 0
  the Technical of end-of-pipe management technology for pollution particles (PM2.5 - PM10)isElectrostatic precipitation + others (wet electrostatic precipitator)，Its Technical efficiency of end-of-pipe management0.0006Aar+0.0054Sar+99.954.The original article describes the pollution production coefficients as 6.3Aar+7.79+61.94Sar。Please revise the corresponding emissions after accounting for them according to the notes.。.The original article describes the pollution production coefficients as 6.3Aar+7.79+61.94Sar. Please revise the corresponding emissions after accounting for them according to the notes.
  污染物指标颗粒物的末端治理技术是静电除尘+其他（湿式电除尘），其效率为0.0006Aar+0.0054Sar+99.954，末端治理设施实际运行率（k值）计算公式为除尘设施年实际运行小时数/机组年实际运行小时数。原文件中描述污染物类别为废气，污染物指标为颗粒物，此处对其进行了匹配工作，将其匹配到LCAflow库里面相最符合的流，污染物指标备注为颗粒物原文描述的产污系数为 6.3Aar+7.79+61.94Sar。请根据备注自行核算后修改对应的排放量。
- particles (PM2.5 - PM10): 0
  the Technical of end-of-pipe management technology for pollution particles (PM2.5 - PM10)isElectrostatic precipitation，Its Technical efficiency of end-of-pipe management0.003Aar+0.027Sar+99.77.The original article describes the pollution production coefficients as 6.3Aar+7.79+61.94Sar。Please revise the corresponding emissions after accounting for them according to the notes.。.The original article describes the pollution production coefficients as 6.3Aar+7.79+61.94Sar. Please revise the corresponding emissions after accounting for them according to the notes.
  污染物指标颗粒物的末端治理技术是静电除尘，其效率为0.003Aar+0.027Sar+99.77，末端治理设施实际运行率（k值）计算公式为除尘设施年实际运行小时数/机组年实际运行小时数。原文件中描述污染物类别为废气，污染物指标为颗粒物，此处对其进行了匹配工作，将其匹配到LCAflow库里面相最符合的流，污染物指标备注为颗粒物原文描述的产污系数为 6.3Aar+7.79+61.94Sar。请根据备注自行核算后修改对应的排放量。
- particles (PM2.5 - PM10): 0
  the Technical of end-of-pipe management technology for pollution particles (PM2.5 - PM10)isHigh-efficiency bag filter + others (wet desulfurization synergy) +，Its Technical efficiency of end-of-pipe management0.00008Aar+0.00064Sar+99.9944.The original article describes the pollution production coefficients as 6.3Aar+7.79+61.94Sar。Please revise the corresponding emissions after accounting for them according to the notes.。.The original article describes the pollution production coefficients as 6.3Aar+7.79+61.94Sar. Please revise the corresponding emissions after accounting for them according to the notes.
  污染物指标颗粒物的末端治理技术是高效袋式除尘+其他（湿法脱硫协同）+，其效率为0.00008Aar+0.00064Sar+99.9944，末端治理设施实际运行率（k值）计算公式为除尘设施年实际运行小时数/机组年实际运行小时数。原文件中描述污染物类别为废气，污染物指标为颗粒物，此处对其进行了匹配工作，将其匹配到LCAflow库里面相最符合的流，污染物指标备注为颗粒物原文描述的产污系数为 6.3Aar+7.79+61.94Sar。请根据备注自行核算后修改对应的排放量。
- particles (PM2.5 - PM10): 0
  the Technical of end-of-pipe management technology for pollution particles (PM2.5 - PM10)isHigh-efficiency bag filter + others (wet desulfurization synergy)①，Its Technical efficiency of end-of-pipe management0.0004Aar+0.0032Sar+99.972.The original article describes the pollution production coefficients as 6.3Aar+7.79+61.94Sar。Please revise the corresponding emissions after accounting for them according to the notes.。.The original article describes the pollution production coefficients as 6.3Aar+7.79+61.94Sar. Please revise the corresponding emissions after accounting for them according to the notes.
  污染物指标颗粒物的末端治理技术是高效袋式除尘+其他（湿法脱硫协同）①，其效率为0.0004Aar+0.0032Sar+99.972，末端治理设施实际运行率（k值）计算公式为除尘设施年实际运行小时数/机组年实际运行小时数，①高效颗粒物末端治理技术：采取高效电源供电、低低温电除尘、超净电袋、高效袋式除尘、湿法脱硫协同、湿式电除尘等技术，满足《燃煤电厂超低排放烟气
  治理工程技术规范》（HJ2053-2129）相关要求。
  。原文件中描述污染物类别为废气，污染物指标为颗粒物，此处对其进行了匹配工作，将其匹配到LCAflow库里面相最符合的流，污染物指标备注为颗粒物原文描述的产污系数为 6.3Aar+7.79+61.94Sar。请根据备注自行核算后修改对应的排放量。
- particles (PM2.5 - PM10): 0
  the Technical of end-of-pipe management technology for pollution particles (PM2.5 - PM10)isHigh-efficiency bag filter + others (wet electrostatic precipitator)①，Its Technical efficiency of end-of-pipe management0.0002Aar+0.0016Sar+99.986.The original article describes the pollution production coefficients as 6.3Aar+7.79+61.94Sar。Please revise the corresponding emissions after accounting for them according to the notes.。.The original article describes the pollution production coefficients as 6.3Aar+7.79+61.94Sar. Please revise the corresponding emissions after accounting for them according to the notes.
  污染物指标颗粒物的末端治理技术是高效袋式除尘+其他（湿式电除尘）①，其效率为0.0002Aar+0.0016Sar+99.986，末端治理设施实际运行率（k值）计算公式为除尘设施年实际运行小时数/机组年实际运行小时数，①高效颗粒物末端治理技术：采取高效电源供电、低低温电除尘、超净电袋、高效袋式除尘、湿法脱硫协同、湿式电除尘等技术，满足《燃煤电厂超低排放烟气
  治理工程技术规范》（HJ2053-2132）相关要求。
  。原文件中描述污染物类别为废气，污染物指标为颗粒物，此处对其进行了匹配工作，将其匹配到LCAflow库里面相最符合的流，污染物指标备注为颗粒物原文描述的产污系数为 6.3Aar+7.79+61.94Sar。请根据备注自行核算后修改对应的排放量。
- particles (PM2.5 - PM10): 0
  the Technical of end-of-pipe management technology for pollution particles (PM2.5 - PM10)isHigh-efficiency bag filter①，Its Technical efficiency of end-of-pipe management0.001Aar+0.008Sar+99.93.The original article describes the pollution production coefficients as 6.3Aar+7.79+61.94Sar。Please revise the corresponding emissions after accounting for them according to the notes.。.The original article describes the pollution production coefficients as 6.3Aar+7.79+61.94Sar. Please revise the corresponding emissions after accounting for them according to the notes.
  污染物指标颗粒物的末端治理技术是高效袋式除尘①，其效率为0.001Aar+0.008Sar+99.93，末端治理设施实际运行率（k值）计算公式为除尘设施年实际运行小时数/机组年实际运行小时数，①高效颗粒物末端治理技术：采取高效电源供电、低低温电除尘、超净电袋、高效袋式除尘、湿法脱硫协同、湿式电除尘等技术，满足《燃煤电厂超低排放烟气
  治理工程技术规范》（HJ2053-2126）相关要求。
  。原文件中描述污染物类别为废气，污染物指标为颗粒物，此处对其进行了匹配工作，将其匹配到LCAflow库里面相最符合的流，污染物指标备注为颗粒物原文描述的产污系数为 6.3Aar+7.79+61.94Sar。请根据备注自行核算后修改对应的排放量。
- particles (PM2.5 - PM10): 0
  the Technical of end-of-pipe management technology for pollution particles (PM2.5 - PM10)isHigh-efficiency electric-bag composite precipitator + others (wet desulfurization synergy) + others (wet electrostatic precipitator)①，Its Technical efficiency of end-of-pipe management0.00008Aar+0.000672Sar+99.9942.The original article describes the pollution production coefficients as 6.3Aar+7.79+61.94Sar。Please revise the corresponding emissions after accounting for them according to the notes.。.The original article describes the pollution production coefficients as 6.3Aar+7.79+61.94Sar. Please revise the corresponding emissions after accounting for them according to the notes.
  污染物指标颗粒物的末端治理技术是高效电袋组合+其他（湿法脱硫协同）+其他（湿式电除尘）①，其效率为0.00008Aar+0.000672Sar+99.9942，末端治理设施实际运行率（k值）计算公式为除尘设施年实际运行小时数/机组年实际运行小时数，①高效颗粒物末端治理技术：采取高效电源供电、低低温电除尘、超净电袋、高效袋式除尘、湿法脱硫协同、湿式电除尘等技术，满足《燃煤电厂超低排放烟气
  治理工程技术规范》（HJ2053-2134）相关要求。
  。原文件中描述污染物类别为废气，污染物指标为颗粒物，此处对其进行了匹配工作，将其匹配到LCAflow库里面相最符合的流，污染物指标备注为颗粒物原文描述的产污系数为 6.3Aar+7.79+61.94Sar。请根据备注自行核算后修改对应的排放量。
- particles (PM2.5 - PM10): 0
  the Technical of end-of-pipe management technology for pollution particles (PM2.5 - PM10)isHigh-efficiency electric-bag composite precipitator + others (wet desulfurization synergy)①，Its Technical efficiency of end-of-pipe management0.0004Aar+0.00336Sar+99.9712.The original article describes the pollution production coefficients as 6.3Aar+7.79+61.94Sar。Please revise the corresponding emissions after accounting for them according to the notes.。.The original article describes the pollution production coefficients as 6.3Aar+7.79+61.94Sar. Please revise the corresponding emissions after accounting for them according to the notes.
  污染物指标颗粒物的末端治理技术是高效电袋组合+其他（湿法脱硫协同）①，其效率为0.0004Aar+0.00336Sar+99.9712，末端治理设施实际运行率（k值）计算公式为除尘设施年实际运行小时数/机组年实际运行小时数，①高效颗粒物末端治理技术：采取高效电源供电、低低温电除尘、超净电袋、高效袋式除尘、湿法脱硫协同、湿式电除尘等技术，满足《燃煤电厂超低排放烟气
  治理工程技术规范》（HJ2053-2128）相关要求。
  。原文件中描述污染物类别为废气，污染物指标为颗粒物，此处对其进行了匹配工作，将其匹配到LCAflow库里面相最符合的流，污染物指标备注为颗粒物原文描述的产污系数为 6.3Aar+7.79+61.94Sar。请根据备注自行核算后修改对应的排放量。
- particles (PM2.5 - PM10): 0
  the Technical of end-of-pipe management technology for pollution particles (PM2.5 - PM10)isHigh-efficiency electric-bag composite precipitator + others (wet electrostatic precipitator)①，Its Technical efficiency of end-of-pipe management0.0002Aar+0.00168Sar+99.9856.The original article describes the pollution production coefficients as 6.3Aar+7.79+61.94Sar。Please revise the corresponding emissions after accounting for them according to the notes.。.The original article describes the pollution production coefficients as 6.3Aar+7.79+61.94Sar. Please revise the corresponding emissions after accounting for them according to the notes.
  污染物指标颗粒物的末端治理技术是高效电袋组合+其他（湿式电除尘）①，其效率为0.0002Aar+0.00168Sar+99.9856，末端治理设施实际运行率（k值）计算公式为除尘设施年实际运行小时数/机组年实际运行小时数，①高效颗粒物末端治理技术：采取高效电源供电、低低温电除尘、超净电袋、高效袋式除尘、湿法脱硫协同、湿式电除尘等技术，满足《燃煤电厂超低排放烟气
  治理工程技术规范》（HJ2053-2131）相关要求。
  。原文件中描述污染物类别为废气，污染物指标为颗粒物，此处对其进行了匹配工作，将其匹配到LCAflow库里面相最符合的流，污染物指标备注为颗粒物原文描述的产污系数为 6.3Aar+7.79+61.94Sar。请根据备注自行核算后修改对应的排放量。
- particles (PM2.5 - PM10): 0
  the Technical of end-of-pipe management technology for pollution particles (PM2.5 - PM10)isHigh-efficiency electric-bag composite precipitator①，Its Technical efficiency of end-of-pipe management0.001Aar+0.0084Sar+99.928.The original article describes the pollution production coefficients as 6.3Aar+7.79+61.94Sar。Please revise the corresponding emissions after accounting for them according to the notes.。.The original article describes the pollution production coefficients as 6.3Aar+7.79+61.94Sar. Please revise the corresponding emissions after accounting for them according to the notes.
  污染物指标颗粒物的末端治理技术是高效电袋组合①，其效率为0.001Aar+0.0084Sar+99.928，末端治理设施实际运行率（k值）计算公式为除尘设施年实际运行小时数/机组年实际运行小时数，①高效颗粒物末端治理技术：采取高效电源供电、低低温电除尘、超净电袋、高效袋式除尘、湿法脱硫协同、湿式电除尘等技术，满足《燃煤电厂超低排放烟气
  治理工程技术规范》（HJ2053-2125）相关要求。
  。原文件中描述污染物类别为废气，污染物指标为颗粒物，此处对其进行了匹配工作，将其匹配到LCAflow库里面相最符合的流，污染物指标备注为颗粒物原文描述的产污系数为 6.3Aar+7.79+61.94Sar。请根据备注自行核算后修改对应的排放量。
- particles (PM2.5 - PM10): 0
  the Technical of end-of-pipe management technology for pollution particles (PM2.5 - PM10)isHigh-efficiency electrostatic precipitation + others (wet desulfurization synergy) + others (wet electrostatic precipitator)①，Its Technical efficiency of end-of-pipe management0.00008Aar+0.00072Sar+99.9938.The original article describes the pollution production coefficients as 6.3Aar+7.79+61.94Sar。Please revise the corresponding emissions after accounting for them according to the notes.。.The original article describes the pollution production coefficients as 6.3Aar+7.79+61.94Sar. Please revise the corresponding emissions after accounting for them according to the notes.
  污染物指标颗粒物的末端治理技术是高效静电除尘+其他（湿法脱硫协同）+其他（湿式电除尘）①，其效率为0.00008Aar+0.00072Sar+99.9938，末端治理设施实际运行率（k值）计算公式为除尘设施年实际运行小时数/机组年实际运行小时数，①高效颗粒物末端治理技术：采取高效电源供电、低低温电除尘、超净电袋、高效袋式除尘、湿法脱硫协同、湿式电除尘等技术，满足《燃煤电厂超低排放烟气
  治理工程技术规范》（HJ2053-2133）相关要求。
  。原文件中描述污染物类别为废气，污染物指标为颗粒物，此处对其进行了匹配工作，将其匹配到LCAflow库里面相最符合的流，污染物指标备注为颗粒物原文描述的产污系数为 6.3Aar+7.79+61.94Sar。请根据备注自行核算后修改对应的排放量。
- particles (PM2.5 - PM10): 0
  the Technical of end-of-pipe management technology for pollution particles (PM2.5 - PM10)isHigh-efficiency electrostatic precipitation + others (wet desulfurization synergy)①，Its Technical efficiency of end-of-pipe management0.0004Aar+0.0036Sar+99.9692.The original article describes the pollution production coefficients as 6.3Aar+7.79+61.94Sar。Please revise the corresponding emissions after accounting for them according to the notes.。.The original article describes the pollution production coefficients as 6.3Aar+7.79+61.94Sar. Please revise the corresponding emissions after accounting for them according to the notes.
  污染物指标颗粒物的末端治理技术是高效静电除尘+其他（湿法脱硫协同）①，其效率为0.0004Aar+0.0036Sar+99.9692，末端治理设施实际运行率（k值）计算公式为除尘设施年实际运行小时数/机组年实际运行小时数，①高效颗粒物末端治理技术：采取高效电源供电、低低温电除尘、超净电袋、高效袋式除尘、湿法脱硫协同、湿式电除尘等技术，满足《燃煤电厂超低排放烟气
  治理工程技术规范》（HJ2053-2127）相关要求。
  。原文件中描述污染物类别为废气，污染物指标为颗粒物，此处对其进行了匹配工作，将其匹配到LCAflow库里面相最符合的流，污染物指标备注为颗粒物原文描述的产污系数为 6.3Aar+7.79+61.94Sar。请根据备注自行核算后修改对应的排放量。
- particles (PM2.5 - PM10): 0
  the Technical of end-of-pipe management technology for pollution particles (PM2.5 - PM10)isHigh-efficiency electrostatic precipitation + others (wet electrostatic precipitator)①，Its Technical efficiency of end-of-pipe management0.0002Aar+0.0018Sar+99.9846.The original article describes the pollution production coefficients as 6.3Aar+7.79+61.94Sar。Please revise the corresponding emissions after accounting for them according to the notes.。.The original article describes the pollution production coefficients as 6.3Aar+7.79+61.94Sar. Please revise the corresponding emissions after accounting for them according to the notes.
  污染物指标颗粒物的末端治理技术是高效静电除尘+其他（湿式电除尘）①，其效率为0.0002Aar+0.0018Sar+99.9846，末端治理设施实际运行率（k值）计算公式为除尘设施年实际运行小时数/机组年实际运行小时数，①高效颗粒物末端治理技术：采取高效电源供电、低低温电除尘、超净电袋、高效袋式除尘、湿法脱硫协同、湿式电除尘等技术，满足《燃煤电厂超低排放烟气
  治理工程技术规范》（HJ2053-2130）相关要求。
  。原文件中描述污染物类别为废气，污染物指标为颗粒物，此处对其进行了匹配工作，将其匹配到LCAflow库里面相最符合的流，污染物指标备注为颗粒物原文描述的产污系数为 6.3Aar+7.79+61.94Sar。请根据备注自行核算后修改对应的排放量。
- particles (PM2.5 - PM10): 0
  the Technical of end-of-pipe management technology for pollution particles (PM2.5 - PM10)isHigh-efficiency electrostatic precipitation①，Its Technical efficiency of end-of-pipe management0.001Aar+0.009Sar+99.923.The original article describes the pollution production coefficients as 6.3Aar+7.79+61.94Sar。Please revise the corresponding emissions after accounting for them according to the notes.。.The original article describes the pollution production coefficients as 6.3Aar+7.79+61.94Sar. Please revise the corresponding emissions after accounting for them according to the notes.
  污染物指标颗粒物的末端治理技术是高效静电除尘①，其效率为0.001Aar+0.009Sar+99.923，末端治理设施实际运行率（k值）计算公式为除尘设施年实际运行小时数/机组年实际运行小时数，①高效颗粒物末端治理技术：采取高效电源供电、低低温电除尘、超净电袋、高效袋式除尘、湿法脱硫协同、湿式电除尘等技术，满足《燃煤电厂超低排放烟气
  治理工程技术规范》（HJ2053-2124）相关要求。
  。原文件中描述污染物类别为废气，污染物指标为颗粒物，此处对其进行了匹配工作，将其匹配到LCAflow库里面相最符合的流，污染物指标备注为颗粒物原文描述的产污系数为 6.3Aar+7.79+61.94Sar。请根据备注自行核算后修改对应的排放量。
- particles (PM2.5 - PM10): 0
  the Technical of end-of-pipe management technology for pollution particles (PM2.5 - PM10)isOthers (wet electrostatic precipitation)①.The original article describes the pollution production coefficients as 6.3Aar+7.79+61.94Sar。Please revise the corresponding emissions after accounting for them according to the notes.。.The original article describes the pollution production coefficients as 6.3Aar+7.79+61.94Sar. Please revise the corresponding emissions after accounting for them according to the notes.
  污染物指标颗粒物的末端治理技术是其他（湿式电除尘）①，末端治理设施实际运行率（k值）计算公式为除尘设施年实际运行小时数/机组年实际运行小时数，①高效颗粒物末端治理技术：采取高效电源供电、低低温电除尘、超净电袋、高效袋式除尘、湿法脱硫协同、湿式电除尘等技术，满足《燃煤电厂超低排放烟气
  治理工程技术规范》（HJ2053-2135）相关要求。
  。原文件中描述污染物类别为废气，污染物指标为颗粒物，此处对其进行了匹配工作，将其匹配到LCAflow库里面相最符合的流，污染物指标备注为颗粒物原文描述的产污系数为 6.3Aar+7.79+61.94Sar。请根据备注自行核算后修改对应的排放量。
- sulfur dioxide: 0
  the Technical of end-of-pipe management technology for pollution sulfur dioxideisAmmonia method，Its Technical efficiency of end-of-pipe management1.1429Sar+92.29.The original article describes the pollution production coefficients as 5.83Sar+0.083。Please revise the corresponding emissions after accounting for them according to the notes.。.The original article describes the pollution production coefficients as 5.83Sar+0.083. Please revise the corresponding emissions after accounting for them according to the notes.
  污染物指标二氧化硫的末端治理技术是氨法，其效率为1.1429Sar+92.29，末端治理设施实际运行率（k值）计算公式为脱硫设施年实际运行小时数/机组年实际运行小时数。原文件中描述污染物类别为废气，污染物指标为二氧化硫，此处对其进行了匹配工作，将其匹配到LCAflow库里面相最符合的流，污染物指标备注为二氧化硫原文描述的产污系数为 5.83Sar+0.083。请根据备注自行核算后修改对应的排放量。
- sulfur dioxide: 0
  the Technical of end-of-pipe management technology for pollution sulfur dioxideisDouble alkali process，Its Technical efficiency of end-of-pipe management1.8571Sar+90.The original article describes the pollution production coefficients as 5.83Sar+0.083。Please revise the corresponding emissions after accounting for them according to the notes.。.The original article describes the pollution production coefficients as 5.83Sar+0.083. Please revise the corresponding emissions after accounting for them according to the notes.
  污染物指标二氧化硫的末端治理技术是双碱法，其效率为1.8571Sar+90，末端治理设施实际运行率（k值）计算公式为脱硫设施年实际运行小时数/机组年实际运行小时数。原文件中描述污染物类别为废气，污染物指标为二氧化硫，此处对其进行了匹配工作，将其匹配到LCAflow库里面相最符合的流，污染物指标备注为二氧化硫原文描述的产污系数为 5.83Sar+0.083。请根据备注自行核算后修改对应的排放量。
- sulfur dioxide: 0
  the Technical of end-of-pipe management technology for pollution sulfur dioxideisFlue gas circulating fluidized bed method，Its Technical efficiency of end-of-pipe management2.4286Sar+88.57.The original article describes the pollution production coefficients as 5.83Sar+0.083。Please revise the corresponding emissions after accounting for them according to the notes.。.The original article describes the pollution production coefficients as 5.83Sar+0.083. Please revise the corresponding emissions after accounting for them according to the notes.
  污染物指标二氧化硫的末端治理技术是烟气循环流化床法，其效率为2.4286Sar+88.57，末端治理设施实际运行率（k值）计算公式为脱硫设施年实际运行小时数/机组年实际运行小时数。原文件中描述污染物类别为废气，污染物指标为二氧化硫，此处对其进行了匹配工作，将其匹配到LCAflow库里面相最符合的流，污染物指标备注为二氧化硫原文描述的产污系数为 5.83Sar+0.083。请根据备注自行核算后修改对应的排放量。
- sulfur dioxide: 0
  the Technical of end-of-pipe management technology for pollution sulfur dioxideisHigh-efficiency ammonia method②，Its Technical efficiency of end-of-pipe management0.4Sar+97.3.The original article describes the pollution production coefficients as 5.83Sar+0.083。Please revise the corresponding emissions after accounting for them according to the notes.。.The original article describes the pollution production coefficients as 5.83Sar+0.083. Please revise the corresponding emissions after accounting for them according to the notes.
  污染物指标二氧化硫的末端治理技术是高效氨法②，其效率为0.4Sar+97.3，末端治理设施实际运行率（k值）计算公式为脱硫设施年实际运行小时数/机组年实际运行小时数，②高效二氧化硫末端治理技术：采取空塔提效、强化气液传质、改善pH值分区等措施，满足《燃煤电厂超低排放烟气治理工程技术规范》（HJ2053-2083）相
  关要求。
  。原文件中描述污染物类别为废气，污染物指标为二氧化硫，此处对其进行了匹配工作，将其匹配到LCAflow库里面相最符合的流，污染物指标备注为二氧化硫原文描述的产污系数为 5.83Sar+0.083。请根据备注自行核算后修改对应的排放量。
- sulfur dioxide: 0
  the Technical of end-of-pipe management technology for pollution sulfur dioxideisHigh-efficiency double alkali process②，Its Technical efficiency of end-of-pipe management0.65Sar+96.5.The original article describes the pollution production coefficients as 5.83Sar+0.083。Please revise the corresponding emissions after accounting for them according to the notes.。.The original article describes the pollution production coefficients as 5.83Sar+0.083. Please revise the corresponding emissions after accounting for them according to the notes.
  污染物指标二氧化硫的末端治理技术是高效双碱法②，其效率为0.65Sar+96.5，末端治理设施实际运行率（k值）计算公式为脱硫设施年实际运行小时数/机组年实际运行小时数，②高效二氧化硫末端治理技术：采取空塔提效、强化气液传质、改善pH值分区等措施，满足《燃煤电厂超低排放烟气治理工程技术规范》（HJ2053-2086）相
  关要求。
  。原文件中描述污染物类别为废气，污染物指标为二氧化硫，此处对其进行了匹配工作，将其匹配到LCAflow库里面相最符合的流，污染物指标备注为二氧化硫原文描述的产污系数为 5.83Sar+0.083。请根据备注自行核算后修改对应的排放量。
- sulfur dioxide: 0
  the Technical of end-of-pipe management technology for pollution sulfur dioxideisHigh-efficiency flue gas circulating fluidized bed method②，Its Technical efficiency of end-of-pipe management0.85Sar+96.The original article describes the pollution production coefficients as 5.83Sar+0.083。Please revise the corresponding emissions after accounting for them according to the notes.。.The original article describes the pollution production coefficients as 5.83Sar+0.083. Please revise the corresponding emissions after accounting for them according to the notes.
  污染物指标二氧化硫的末端治理技术是高效烟气循环流化床法②，其效率为0.85Sar+96，末端治理设施实际运行率（k值）计算公式为脱硫设施年实际运行小时数/机组年实际运行小时数，②高效二氧化硫末端治理技术：采取空塔提效、强化气液传质、改善pH值分区等措施，满足《燃煤电厂超低排放烟气治理工程技术规范》（HJ2053-2088）相
  关要求。
  。原文件中描述污染物类别为废气，污染物指标为二氧化硫，此处对其进行了匹配工作，将其匹配到LCAflow库里面相最符合的流，污染物指标备注为二氧化硫原文描述的产污系数为 5.83Sar+0.083。请根据备注自行核算后修改对应的排放量。
- sulfur dioxide: 0
  the Technical of end-of-pipe management technology for pollution sulfur dioxideisHigh-efficiency lime/gypsum method②，Its Technical efficiency of end-of-pipe management0.5Sar+97.The original article describes the pollution production coefficients as 5.83Sar+0.083。Please revise the corresponding emissions after accounting for them according to the notes.。.The original article describes the pollution production coefficients as 5.83Sar+0.083. Please revise the corresponding emissions after accounting for them according to the notes.
  污染物指标二氧化硫的末端治理技术是高效石灰石/石膏法②，其效率为0.5Sar+97，末端治理设施实际运行率（k值）计算公式为脱硫设施年实际运行小时数/机组年实际运行小时数，②高效二氧化硫末端治理技术：采取空塔提效、强化气液传质、改善pH值分区等措施，满足《燃煤电厂超低排放烟气治理工程技术规范》（HJ2053-2081）相
  关要求。
  。原文件中描述污染物类别为废气，污染物指标为二氧化硫，此处对其进行了匹配工作，将其匹配到LCAflow库里面相最符合的流，污染物指标备注为二氧化硫原文描述的产污系数为 5.83Sar+0.083。请根据备注自行核算后修改对应的排放量。
- sulfur dioxide: 0
  the Technical of end-of-pipe management technology for pollution sulfur dioxideisHigh-efficiency lime/gypsum method②，Its Technical efficiency of end-of-pipe management0.5Sar+97.The original article describes the pollution production coefficients as 5.83Sar+0.083。Please revise the corresponding emissions after accounting for them according to the notes.。.The original article describes the pollution production coefficients as 5.83Sar+0.083. Please revise the corresponding emissions after accounting for them according to the notes.
  污染物指标二氧化硫的末端治理技术是高效石灰/石膏法②，其效率为0.5Sar+97，末端治理设施实际运行率（k值）计算公式为脱硫设施年实际运行小时数/机组年实际运行小时数，②高效二氧化硫末端治理技术：采取空塔提效、强化气液传质、改善pH值分区等措施，满足《燃煤电厂超低排放烟气治理工程技术规范》（HJ2053-2082）相
  关要求。
  。原文件中描述污染物类别为废气，污染物指标为二氧化硫，此处对其进行了匹配工作，将其匹配到LCAflow库里面相最符合的流，污染物指标备注为二氧化硫原文描述的产污系数为 5.83Sar+0.083。请根据备注自行核算后修改对应的排放量。
- sulfur dioxide: 0
  the Technical of end-of-pipe management technology for pollution sulfur dioxideisHigh-efficiency magnesium oxide method②，Its Technical efficiency of end-of-pipe management0.65Sar+96.6.The original article describes the pollution production coefficients as 5.83Sar+0.083。Please revise the corresponding emissions after accounting for them according to the notes.。.The original article describes the pollution production coefficients as 5.83Sar+0.083. Please revise the corresponding emissions after accounting for them according to the notes.
  污染物指标二氧化硫的末端治理技术是高效氧化镁法②，其效率为0.65Sar+96.6，末端治理设施实际运行率（k值）计算公式为脱硫设施年实际运行小时数/机组年实际运行小时数，②高效二氧化硫末端治理技术：采取空塔提效、强化气液传质、改善pH值分区等措施，满足《燃煤电厂超低排放烟气治理工程技术规范》（HJ2053-2087）相
  关要求。
  。原文件中描述污染物类别为废气，污染物指标为二氧化硫，此处对其进行了匹配工作，将其匹配到LCAflow库里面相最符合的流，污染物指标备注为二氧化硫原文描述的产污系数为 5.83Sar+0.083。请根据备注自行核算后修改对应的排放量。
- sulfur dioxide: 0
  the Technical of end-of-pipe management technology for pollution sulfur dioxideisLime/gypsum method，Its Technical efficiency of end-of-pipe management1.4286Sar+91.44.The original article describes the pollution production coefficients as 5.83Sar+0.083。Please revise the corresponding emissions after accounting for them according to the notes.。.The original article describes the pollution production coefficients as 5.83Sar+0.083. Please revise the corresponding emissions after accounting for them according to the notes.
  污染物指标二氧化硫的末端治理技术是石灰/石膏法，其效率为1.4286Sar+91.44，末端治理设施实际运行率（k值）计算公式为脱硫设施年实际运行小时数/机组年实际运行小时数。原文件中描述污染物类别为废气，污染物指标为二氧化硫，此处对其进行了匹配工作，将其匹配到LCAflow库里面相最符合的流，污染物指标备注为二氧化硫原文描述的产污系数为 5.83Sar+0.083。请根据备注自行核算后修改对应的排放量。
- sulfur dioxide: 0
  the Technical of end-of-pipe management technology for pollution sulfur dioxideisLimestone/gypsum method，Its Technical efficiency of end-of-pipe management1.4286Sar+91.43.The original article describes the pollution production coefficients as 5.83Sar+0.083。Please revise the corresponding emissions after accounting for them according to the notes.。.The original article describes the pollution production coefficients as 5.83Sar+0.083. Please revise the corresponding emissions after accounting for them according to the notes.
  污染物指标二氧化硫的末端治理技术是石灰石/石膏法，其效率为1.4286Sar+91.43，末端治理设施实际运行率（k值）计算公式为脱硫设施年实际运行小时数/机组年实际运行小时数。原文件中描述污染物类别为废气，污染物指标为二氧化硫，此处对其进行了匹配工作，将其匹配到LCAflow库里面相最符合的流，污染物指标备注为二氧化硫原文描述的产污系数为 5.83Sar+0.083。请根据备注自行核算后修改对应的排放量。
- sulfur dioxide: 0
  the Technical of end-of-pipe management technology for pollution sulfur dioxideisMagnesium oxide method，Its Technical efficiency of end-of-pipe management1.8571Sar+90.29.The original article describes the pollution production coefficients as 5.83Sar+0.083。Please revise the corresponding emissions after accounting for them according to the notes.。.The original article describes the pollution production coefficients as 5.83Sar+0.083. Please revise the corresponding emissions after accounting for them according to the notes.
  污染物指标二氧化硫的末端治理技术是氧化镁法，其效率为1.8571Sar+90.29，末端治理设施实际运行率（k值）计算公式为脱硫设施年实际运行小时数/机组年实际运行小时数。原文件中描述污染物类别为废气，污染物指标为二氧化硫，此处对其进行了匹配工作，将其匹配到LCAflow库里面相最符合的流，污染物指标备注为二氧化硫原文描述的产污系数为 5.83Sar+0.083。请根据备注自行核算后修改对应的排放量。
- sulfur dioxide: 0
  the Technical of end-of-pipe management technology for pollution sulfur dioxideisOthers (carbide slag method)，Its Technical efficiency of end-of-pipe management2.4286Sar+88.57.The original article describes the pollution production coefficients as 5.83Sar+0.083。Please revise the corresponding emissions after accounting for them according to the notes.。.The original article describes the pollution production coefficients as 5.83Sar+0.083. Please revise the corresponding emissions after accounting for them according to the notes.
  污染物指标二氧化硫的末端治理技术是其他（电石渣法），其效率为2.4286Sar+88.57，末端治理设施实际运行率（k值）计算公式为脱硫设施年实际运行小时数/机组年实际运行小时数。原文件中描述污染物类别为废气，污染物指标为二氧化硫，此处对其进行了匹配工作，将其匹配到LCAflow库里面相最符合的流，污染物指标备注为二氧化硫原文描述的产污系数为 5.83Sar+0.083。请根据备注自行核算后修改对应的排放量。
- sulfur dioxide: 0
  the Technical of end-of-pipe management technology for pollution sulfur dioxideisOthers (high-efficiency carbide slag method) ②，Its Technical efficiency of end-of-pipe management0.85Sar+96.The original article describes the pollution production coefficients as 5.83Sar+0.083。Please revise the corresponding emissions after accounting for them according to the notes.。.The original article describes the pollution production coefficients as 5.83Sar+0.083. Please revise the corresponding emissions after accounting for them according to the notes.
  污染物指标二氧化硫的末端治理技术是其他（高效电石渣法）②，其效率为0.85Sar+96，末端治理设施实际运行率（k值）计算公式为脱硫设施年实际运行小时数/机组年实际运行小时数，②高效二氧化硫末端治理技术：采取空塔提效、强化气液传质、改善pH值分区等措施，满足《燃煤电厂超低排放烟气治理工程技术规范》（HJ2053-2084）相
  关要求。
  。原文件中描述污染物类别为废气，污染物指标为二氧化硫，此处对其进行了匹配工作，将其匹配到LCAflow库里面相最符合的流，污染物指标备注为二氧化硫原文描述的产污系数为 5.83Sar+0.083。请根据备注自行核算后修改对应的排放量。
- sulfur dioxide: 0
  the Technical of end-of-pipe management technology for pollution sulfur dioxideisOthers (high-efficiency sodium alkali method) ②，Its Technical efficiency of end-of-pipe management0.65Sar+96.5.The original article describes the pollution production coefficients as 5.83Sar+0.083。Please revise the corresponding emissions after accounting for them according to the notes.。.The original article describes the pollution production coefficients as 5.83Sar+0.083. Please revise the corresponding emissions after accounting for them according to the notes.
  污染物指标二氧化硫的末端治理技术是其他（高效钠碱法）②，其效率为0.65Sar+96.5，末端治理设施实际运行率（k值）计算公式为脱硫设施年实际运行小时数/机组年实际运行小时数，②高效二氧化硫末端治理技术：采取空塔提效、强化气液传质、改善pH值分区等措施，满足《燃煤电厂超低排放烟气治理工程技术规范》（HJ2053-2085）相
  关要求。
  。原文件中描述污染物类别为废气，污染物指标为二氧化硫，此处对其进行了匹配工作，将其匹配到LCAflow库里面相最符合的流，污染物指标备注为二氧化硫原文描述的产污系数为 5.83Sar+0.083。请根据备注自行核算后修改对应的排放量。
- sulfur dioxide: 0
  the Technical of end-of-pipe management technology for pollution sulfur dioxideisOthers (sodium alkali method)，Its Technical efficiency of end-of-pipe management1.8571Sar+90.The original article describes the pollution production coefficients as 5.83Sar+0.083。Please revise the corresponding emissions after accounting for them according to the notes.。.The original article describes the pollution production coefficients as 5.83Sar+0.083. Please revise the corresponding emissions after accounting for them according to the notes.
  污染物指标二氧化硫的末端治理技术是其他（钠碱法），其效率为1.8571Sar+90，末端治理设施实际运行率（k值）计算公式为脱硫设施年实际运行小时数/机组年实际运行小时数。原文件中描述污染物类别为废气，污染物指标为二氧化硫，此处对其进行了匹配工作，将其匹配到LCAflow库里面相最符合的流，污染物指标备注为二氧化硫原文描述的产污系数为 5.83Sar+0.083。请根据备注自行核算后修改对应的排放量。

## Use advice
This dataset is derived from the Pollution Source Census Report and contains information on pollution emissions and related products. However, it does not include data on energy or chemical consumption, nor does it provide information on waste or co-product generation. When utilizing this dataset, please supplement the missing data based on actual conditions before use
该数据集来源于污染源普查报告，包含污染物排放及相关产品信息，但不包含能源或化学品消耗数据，也不提供废弃物或共生产物产生信息。在使用该数据集时，请根据实际情况补充缺失数据后再使用。

## Review details
Inventory: The internal review was done by several iteration steps concerning raw data validation, raw data documentation, representativity, completeness and consistency of modelling with regard to ISO 14040 and 14044.
清单： 内部审查通过几个迭代步骤完成，涉及原始数据验证、原始数据记录、代表性、完整性、与 ISO 14040 和 14044 有关的建模的一致性。

## Data sources
- 第二次全国污染源普查产排污核算系数手册（试用版）,四级代码4411、4412文件，在完整版文件中第5275页
