# Treated exhaust gas ; Soil ex situ remediation ; Thermal desorption ; Exhaust gas treatment

Dataset: ILCD process, Unit process, single operation
Geography: CN
Reference year: 2022
Classification: Unit processes / Other Services / Repair and maintenance
Generated by: Wang Feng, wangfeng@caep.org.cn
Owner: Tiangong LCI Data Working Group
Review: Dependent internal review by Tiangong LCI Data Working Group
Amounts: no units in this file; such an amount is in the reference unit of its flow, which a separate flow dataset defines
copyright: false
licenseType: Free of charge for all users and uses

## General comment
Remediation of 1 cubic meter of contaminated soil by ectopic thermal desorption. The waste gas after thermal desorption passes through cyclone dust collector, secondary combustion chamber, heat exchanger, quench tower and bag dust removal.

## Geography
我国华东区域5 个污染土壤异位热脱附修复工程案例

## Technology and included processes
The exhaust gas after thermal desorption is removed by cyclone dust collector, secondary combustion chamber, heat exchanger, quench tower and bag filter. The device and spray absorption washing tower are discharged after reaching the standard

## Technical purpose
This remediation process is designed to decontaminate soil through thermal desorption. The process is applicable to various contaminated sites where removal of pollutants from the soil is required before site reclamation or redevelopment. It is suitable for extracting volatile and semi-volatile organic compounds from soil. The treated exhaust gases are handled through several unit operations, including cyclone dust collectors, secondary combustion chambers, heat exchangers, quench towers, bag filters, and spray absorption scrubbers to ensure clean and safe release into the atmosphere. This process is typically used in environmental engineering and industrial remediation projects.

## Reference product
- Treated exhaust gas: 1; measured

## Inputs
- Electricity: 9; measured
- Activated Carbon: 0.98; measured
- sodium hydroxide: 50; measured
- Tap Water: 200; measured
- Exhaust gas: 1; missing unimportant

## Outputs
- waste water - untreated: 5000; measured

## Use advice
When utilizing this data set, users should consider the technological applicability and intended scope of the remediation process. It is crucial to match the pollutant types with the thermal desorption efficacy. Include considerations for the treatment of exhaust gases to meet local environmental standards. During system modeling, acknowledge the inputs of electricity, water, activated carbon, and sodium hydroxide (NaOH) for the absorption of exhaust gases. Be aware of the geographical differences in technology implementation by examining the presented case studies from the East China region and appropriately adapt for local regulations and conditions.

## Review details
Inventory: The internal review was done by several iteration steps concerning raw data validation, raw data documentation, representativity, completeness and consistency of modelling with regard to ISO 14040 and 14044.

## Data sources
- 刘爽,陈盼,宋慧敏等.我国华东地区污染土壤异位热脱附修复碳排放及减排策略[J].环境工程学报,2022,16(08):2663-2671.
