# Bioethanol ; Steam explosion

Dataset: ILCD process
Geography: GLO
Classification: Energy carriers and technologies / Renewable fuels
Generated by: Jiayi Yuan, jiayi_y@mail.bnu.edu.cn
Owner: Tiangong LCI Data Working Group
Review: Dependent internal review by Tiangong LCI Data Working Group
Amounts: no units in this file; such an amount is in the reference unit of its flow, which a separate flow dataset defines
licenseType: Free of charge for all users and uses

## General comment
Bioethanol generated through the steam explosion process is typically used as a renewable fuel alternative or fuel additive in transportation. It may also serve as a solvent or intermediate in chemical synthesis and pharmaceuticals.

## Inputs
All rows: uniform; missing unimportant
- Electricity: 0
- heat: 3000; min 843; max 8660
- Electricity: 882; min 17.136; max 6948
- heat: 2180; min 190; max 10400
- Electricity: 4752; min 48.96; max 42480

## Outputs
- heat: 0; uniform; missing unimportant

## Use advice
When incorporating data for bioethanol produced by steam explosion into a life cycle assessment, ensure that the system boundary includes energy consumption and emissions from the steam generation and explosion. If ethanol production interlinks with agriculture (e.g., using crop residues), consider the upstream impacts of agricultural processes. Exclude petrol displacement or credit if produced bioethanol is used purely as a chemical, not as a fuel.

## Review details
Inventory: The internal review was done by several iteration steps concerning raw data validation, raw data documentation, representativity, completeness and consistency of modelling with regard to ISO 14040 and 14044.
