# Hot rolled coil ; steel ; steel production

Dataset: ILCD process, Unit process, single operation
Geography: CN
Reference year: 2006
Classification: Unit processes / Materials production / Metals and semimetals
Generated by: Wanghuanyu, wanghuanyu00@126.com
Owner: Tiangong LCI Data Working Group
Review: Dependent internal review by Tiangong LCI Data Working Group
Amounts: no units in this file; such an amount is in the reference unit of its flow, which a separate flow dataset defines
copyright: false
licenseType: Free of charge for all users and uses

## General comment
The hot rolled coil is commonly used in the manufacturing of construction elements such as I-beams and rails, in automotive frames, and for producing pipes and tubing. It serves as a foundational material in heavy industry, specifically for large scale structural projects and manufacturing processes that require robust steel components.

## Reference product
- steel hot rolled coil: 1; measured

## Inputs
- iron: 1.349; measured
- freshwater,freshwater: 14.621; measured
- primary energy from solar energy: 21.64; measured

## Outputs
- carbon dioxide (fossil): 1.889; measured
  原文未区分bio和fossil，根据专家判断,钢铁生产过程中碳排放源此处为fossil）
- phenol,Sulphur oxides (as SO2): 0.002689; measured
- nitrous oxide: 0.002429; measured
- chemical oxygen demand: 0.000121; measured

## Use advice
When using this data set for Life Cycle Assessment, ensure to include the hot rolling phase as part of the gate-to-gate assessment. Consider the energy consumption and emissions during the heating and deformation process. If your assessment includes end-of-life modeling, account for the potential recyclability of the steel. Data users should also consider the regional differences in energy sources and technology levels which can affect the environmental impact of steel production.

## Review details
Inventory: The internal review was done by several iteration steps concerning raw data validation, raw data documentation, representativity, completeness and consistency of modelling with regard to ISO 14040 and 14044.
