# Cigarette manufacturing ; Cigarette Rolling ; Bituminous leaves, tobacco stalks, aromatic sugar materials, flakes ; Filament, coiling package, molding process ; greater than or equal to1 million cases/a; NESPS2 / 卷烟制造 ; 卷烟 ; 烟叶、烟梗、香糖料、薄片 ; 制丝、卷接包、成型工艺 ; 大于等于100万箱/年 ; 全国第二次污染普查数据

Dataset: ILCD process, Unit process, single operation
Geography: CN
Reference year: 2019
Classification: Reference Parameters / Materials production / Organic chemicals
Generated by: The data was created by the Office of the Second National Pollution Source Census of the Ministry of Ecology and Environment, and the data was organized by the TianGong Plan team for ILCD format / 生态环境部第二次全国污染源普查工作办公室创建数据，天工计划团队常慧敏整理数据为ILCD格式
Owner: Tiangong LCI Data Working Group / 天工LCI数据工作小组
Review: Dependent internal review by Tiangong LCI Data Working Group / 天工LCI数据工作小组
Amounts: no units in this file; such an amount is in the reference unit of its flow, which a separate flow dataset defines
copyright: false
licenseType: Free of charge for all users and uses

## General comment
the treatment technology for the pollution of Exhaust gasdidn't offered，The formula for calculating the actual operation rate (k-value) of the end-of-pipe treatment facility is k = actual operating hours of environmental protection facilities (hours) / hours that environmental protection facilities should operate (hours)

## Technical purpose
该数据集描述了大规模烟草制造的生产过程，特别是年产量大于或等于100万箱的操作。该过程包括处理诸如沥青叶、烟梗、香糖料和薄片等材料，并涉及丝束制造、卷接包装和成型工艺。此数据与评估香烟的工业生产及相应采取的污染控制措施有关，包括使用MBR（膜生物反应器）、A/O（缺氧/好氧）工艺、生物接触氧化工艺处理氨氮和化学需氧量（COD）污染，以及袋式滤器和旋风除尘+袋式滤器技术来管理颗粒物（PM2.5 - PM10）。

## Reference product
- Cigarette: 10000; calculated
  源文件中描述为为卷烟，此处对其进行了匹配工作，将其匹配到LCAflow库里面相最符合的流

## Outputs
All rows: calculated
- Ammonia Nitrogen: 4.0018e-5
  the Technical of end-of-pipe management technology for pollution Ammonia NitrogenisMBR，Its Technical efficiency of end-of-pipe management89.3，The formula for calculating the actual operation rate (k-value) of the end-of-pipe treatment facility is k = actual operating hours of environmental protection facilities (hours) / hours that environmental protection facilities should operate (hours)
  污染物指标氨氮的末端治理技术是MBR类，其效率为89.3，末端治理设施实际运行率（k值）计算公式为k=污水治理设施运行时间（小时/年）/正常生产时间（小时/年）。原文件中描述污染物类别为废水，污染物指标为氨氮，此处对其进行了匹配工作，将其匹配到LCAflow库里面相最符合的流
- Ammonia Nitrogen: 4.5628e-5
  the Technical of end-of-pipe management technology for pollution Ammonia NitrogenisA/O process，Its Technical efficiency of end-of-pipe management87.8，The formula for calculating the actual operation rate (k-value) of the end-of-pipe treatment facility is k = actual operating hours of environmental protection facilities (hours) / hours that environmental protection facilities should operate (hours)
  污染物指标氨氮的末端治理技术是A/O工艺，其效率为87.8，末端治理设施实际运行率（k值）计算公式为k=污水治理设施运行时间（小时/年）/正常生产时间（小时/年）。原文件中描述污染物类别为废水，污染物指标为氨氮，此处对其进行了匹配工作，将其匹配到LCAflow库里面相最符合的流
- Ammonia Nitrogen: 4.5628e-5
  the Technical of end-of-pipe management technology for pollution Ammonia NitrogenisBio-contact oxidation process，Its Technical efficiency of end-of-pipe management87.8，The formula for calculating the actual operation rate (k-value) of the end-of-pipe treatment facility is k = actual operating hours of environmental protection facilities (hours) / hours that environmental protection facilities should operate (hours)
  污染物指标氨氮的末端治理技术是生物接触氧化法，其效率为87.8，末端治理设施实际运行率（k值）计算公式为k=污水治理设施运行时间（小时/年）/正常生产时间（小时/年）。原文件中描述污染物类别为废水，污染物指标为氨氮，此处对其进行了匹配工作，将其匹配到LCAflow库里面相最符合的流
- chemical oxygen demand: 0.0009996
  the Technical of end-of-pipe management technology for pollution chemical oxygen demandisMBR，Its Technical efficiency of end-of-pipe management95.1，The formula for calculating the actual operation rate (k-value) of the end-of-pipe treatment facility is k = actual operating hours of environmental protection facilities (hours) / hours that environmental protection facilities should operate (hours)
  污染物指标化学需氧量的末端治理技术是MBR类，其效率为95.1，末端治理设施实际运行率（k值）计算公式为k=污水治理设施运行时间（小时/年）/正常生产时间（小时/年）。原文件中描述污染物类别为废水，污染物指标为化学需氧量，此处对其进行了匹配工作，将其匹配到LCAflow库里面相最符合的流
- chemical oxygen demand: 0.0037536
  the Technical of end-of-pipe management technology for pollution chemical oxygen demandisA/O process，Its Technical efficiency of end-of-pipe management81.6
  污染物指标化学需氧量的末端治理技术是A/O工艺，其效率为81.6，末端治理设施实际运行率（k值）计算公式为k=污水治理设施运行时间（小时/年）/正常生产时间（小时/年）。原文件中描述污染物类别为废水，污染物指标为化学需氧量，此处对其进行了匹配工作，将其匹配到LCAflow库里面相最符合的流
- chemical oxygen demand: 0.0037536
  the Technical of end-of-pipe management technology for pollution chemical oxygen demandisBio-contact oxidation process，Its Technical efficiency of end-of-pipe management81.6
  污染物指标化学需氧量的末端治理技术是生物接触氧化法，其效率为81.6，末端治理设施实际运行率（k值）计算公式为k=污水治理设施运行时间（小时/年）/正常生产时间（小时/年）。原文件中描述污染物类别为废水，污染物指标为化学需氧量，此处对其进行了匹配工作，将其匹配到LCAflow库里面相最符合的流
- particles (PM2.5 - PM10): 0.005775
  the Technical of end-of-pipe management technology for pollution particles (PM2.5 - PM10)isBag filter，Its Technical efficiency of end-of-pipe management98.5，The formula for calculating the actual operation rate (k-value) of the end-of-pipe treatment facility is k = actual operating hours of environmental protection facilities (hours) / hours that environmental protection facilities should operate (hours)
  污染物指标颗粒物的末端治理技术是袋式除尘，其效率为98.5，末端治理设施实际运行率（k值）计算公式为k=治理设施实际运行时间（小时/年）/正常生产时间（小时/年）。原文件中描述污染物类别为废气，污染物指标为颗粒物，此处对其进行了匹配工作，将其匹配到LCAflow库里面相最符合的流
- particles (PM2.5 - PM10): 0.005775
  the Technical of end-of-pipe management technology for pollution particles (PM2.5 - PM10)isCyclone dust removal + bag filter，Its Technical efficiency of end-of-pipe management98.5，The formula for calculating the actual operation rate (k-value) of the end-of-pipe treatment facility is k = actual operating hours of environmental protection facilities (hours) / hours that environmental protection facilities should operate (hours)
  污染物指标颗粒物的末端治理技术是旋风+布袋，其效率为98.5，末端治理设施实际运行率（k值）计算公式为k=治理设施实际运行时间（小时/年）/正常生产时间（小时/年）。原文件中描述污染物类别为废气，污染物指标为颗粒物，此处对其进行了匹配工作，将其匹配到LCAflow库里面相最符合的流
- Waste water: 43.3
  the treatment technology for the pollution of Waste waterdidn't offered
  污染物指标废水量的末端治理技术未说明。原文件中描述污染物类别为废水，污染物指标为废水量，此处对其进行了匹配工作，将其匹配到LCAflow库里面相最符合的流
- Exhaust gas: 225
  the treatment technology for the pollution of Exhaust gasdidn't offered，The formula for calculating the actual operation rate (k-value) of the end-of-pipe treatment facility is k = actual operating hours of environmental protection facilities (hours) / hours that environmental protection facilities should operate (hours)
  污染物指标工业废气量的末端治理技术未说明。原文件中描述污染物类别为废气，污染物指标为工业废气量，此处对其进行了匹配工作，将其匹配到LCAflow库里面相最符合的流

## Use advice
This dataset is derived from the Pollution Source Census Report and contains information on pollution emissions and related products. However, it does not include data on energy or chemical consumption, nor does it provide information on waste or co-product generation. When utilizing this dataset, please supplement the missing data based on actual conditions before use
该数据集来源于污染源普查报告，包含污染物排放及相关产品信息，但不包含能源或化学品消耗数据，也不提供废弃物或共生产物产生信息。在使用该数据集时，请根据实际情况补充缺失数据后再使用。

## Review details
Inventory: The internal review was done by several iteration steps concerning raw data validation, raw data documentation, representativity, completeness and consistency of modelling with regard to ISO 14040 and 14044.
清单： 内部审查通过几个迭代步骤完成，涉及原始数据验证、原始数据记录、代表性、完整性、与 ISO 14040 和 14044 有关的建模的一致性。

## Data sources
- 第二次全国污染源普查产排污核算系数手册（试用版）,二级代码16,三级代码162.0,四级代码1620文件，在完整版文件中第147页
