# Aluminum Electrolysis Carbon Anode Production ; Carbon Anode ; Petroleum Coke ; 2007

Dataset: ILCD process, Unit process, single operation
Geography: CN
Reference year: 2021
Classification: Unit processes / Materials production / Non-energetic raw materials
Generated by: Zimeng Cai, caizm6178@163.com
Owner: Tiangong LCI Data Working Group
Review: Dependent internal review by Tiangong LCI Data Working Group
Amounts: no units in this file; such an amount is in the reference unit of its flow, which a separate flow dataset defines
copyright: false
licenseType: Free of charge for all users and uses

## General comment
The carbon anodes produced through the aluminum electrolysis process using petroleum coke are primarily applied in the aluminum production industry. These anodes are essential components in the Hall-Héroult process for extracting aluminum from its oxide, alumina. The carbon anodes serve as conductors of electricity and help in the reduction of alumina to aluminum metal.

## Time period
Date of publication

## Reference product
- anode, for metal electrolysis: 1000; software or database
  anode

## Inputs
All rows: software or database
- electricity, high voltage, aluminium industry: 759.6
  electricty
- heavy fuel oil: 69
  fuel oil
- coal tar: 220
  coal tar pitch
- Petroleum Coke: 1140
  petroleum coak
- coal gas: 1290

## Data selection and combination
The data in this study refers to the LCA data of PA, SA, electricity, and other background data. The PA data were obtained from statistical data sources, and the SA data were mainly obtained from the literatures. The background data were mainly derived from the Chinese localization LCA database CAS RCEES 2018, which was established by the Research Center for Eco-Environmental Sciences, Chinese Academy of Sciences and covers LCA data for energy, materials, transportation, waste management etc.

## Use advice
When utilizing this LCA data for aluminum electrolysis carbon anode production associated with petroleum coke from 2007, acknowledge that PA (Production Allocation) data is sourced from statistical databases while SA (Site-specific Allocation) is mainly derived from existing literature. The background data, crucial for the assessment, are acquired from the CAS RCEES 2018 database localized for China, reflecting the specific energy, materials, transportation, and waste management practices. To ensure accurate LCA results, users should take into account the year of the data collection, technological variations since 2007, and the regional context of the data. It is also recommended to consult current literature and databases to verify the relevance and update any outdated information.

## Review details
Inventory: The internal review was done by several iteration steps concerning raw data validation, raw data documentation, representativity, completeness and consistency of modelling with regard to ISO 14040 and 14044.

## Data sources
- Ding, N., Liu, N., Lu, B. & Yang, J. Life cycle greenhouse gas emissions of aluminum based on regional industrial transfer in China. J. Ind. Ecol. 25, 1657–1672 (2021).
