# Electrolytic Nickel Production ; Battery Grade Primary Nickel (99.9% Ni) ; leaching Electrowinning ; Nickel-Copper-Cobalt Ore in Xinjiang Province

Dataset: ILCD process, Unit process, single operation
Geography: GS-CN
Reference year: 2018
Classification: Unit processes / Materials production / Metals and semimetals
Generated by: Sun Xin, xs389@cornell.edu
Owner: Tiangong LCI Data Working Group
Review: Dependent internal review by Tiangong LCI Data Working Group
Amounts: no units in this file; such an amount is in the reference unit of its flow, which a separate flow dataset defines
licenseType: Free of charge for all users and uses

## General comment
Data on resource consumption, raw material input, energy consumption, pollutant discharge and waste disposal during the pyrometallurgical and refining stages were referred to the enterprise operation data published by China’s largest nickel metal production base in Gansu, which contributed more 80% of China’s electrolytic nickel production. The metal emission data caused by the storage of waste rock, tailings and slags referred to the leaching experiment results. The Chinese process-based LCI database provided data support for the background inventory. The missing background inventories of chemicals (e.g., boric acid, barium carbonate, and sodium sulfide), including input and output flows, were supplemented by the Ecoinvent version 3 database.来自 GFEM（即铜精矿、二次合金和钴渣）和 LEM（即含铜和钴的浸出尾矿）镍精炼阶段的主要副产品也包括在分析中。通过计算上述副产品的质量来分配潜在的环境影响。这种分配方法目前用于镍金属的生命周期评估研究。

## Technology and included processes
In LEM, nickel and cobalt could be dissolved in a sulfate base in several atmospheric and pressure leaching tanks after the grinding process. The copper specimen in this study retained the leaching tailing as the by product. The leaching solution was subsequently placed in an electrodeposition tank to purify the nickel metal. The raw material production, energy generation and transportation of each unit process of the three stages were incorporated in the system boundary as background processes.

## Technical purpose
The electrolytic nickel production process described is intended for the creation of battery-grade primary nickel with a purity of 99.9% nickel content. This high-purity nickel is especially suited for the manufacturing of batteries, where material quality is critical for performance and longevity. The leaching electrowinning method ensures that the nickel extracted from the nickel-copper-cobalt ore in Xinjiang Province meets the stringent requirements necessary for use in advanced battery technology, such as lithium-ion batteries for electric vehicles and portable electronics.

## Reference product
- Nickel metal (＞99.9% Ni): 1000; measured

## Inputs
All rows: measured
- water: 2190
- Sodium dodecyl sulfate: 0.37
- unspecified: 0.00398
- Nickel matte: 1410
- sodium carbonate: 730
- Sulfuric acid: 230
- Extraction agent,extractant: 0.29
- Naphtha: 5.11
- Activated coke: 3.54
- sodium hydroxide: 50
- Chemicals (unspecified): 1.26
- transport in t*km: 123.9
- Electricity: 12720.8

## Outputs
All rows: measured
- sulphuric acid: 0.01895
- hydrogen sulfide: 0.00059
- chlorine: 3e-5
- chemical oxygen demand: 0.41
- Suspended solids, unspecified: 0.0463
- ammonia: 0.00752
- sulfide: 5.423e-5
- decane: 0.00077
- fluoride: 0.00231
- phosphorus, total: 0.00085
- nitrogen, total (excluding N2): 0.05024
- copper: 0.00154
- nickel: 0.00162
- lead: 0.00093
- cadmium: 0.00023
- waste water - untreated: 8890
- municipal solid waste deposition: 1.81
- hazardous waste (unspecified): 0.25

## Use advice
When utilizing this data for Life Cycle Assessment (LCA), attention should be directed towards the geographic specificity of the process, as this data pertains to nickel extraction from an ore located in Xinjiang Province, China. Therefore, the environmental impacts associated with this dataset should not be generalised to nickel production in other regions without proper regionalization consideration. Users should also note any assumptions made in the extraction and processing stages and ensure that these assumptions are consistent with the scope of their LCA study. Special attention should be given to the treatment of outputs, particularly with regard to recycling and waste management practices, to accurately reflect the potential environmental benefits and burdens.

## Review details
Inventory: The internal review was done by several iteration steps concerning raw data validation, raw data documentation, representativity, completeness and consistency of modelling with regard to ISO 14040 and 14044.

## Data sources
- Bai, Y. et al. Strategies for improving the environmental performance of nickel production in China: Insight into a life cycle assessment. Journal of Environmental Management 312, 114949 (2022).
