# Brick production ; permeable brick ; Cutting process

Dataset: ILCD process, Unit process, single operation
Geography: JNA-SD-CN
Reference year: 2018
Classification: Unit processes / Materials production / Other mineralic materials
Functional unit: The functional unit is the area of 1 m2 brick products.
Generated by: Wang xiangjin, r99rt4@163.com
Owner: Tiangong LCI Data Working Group
Review: Dependent internal review by Tiangong LCI Data Working Group
Amounts: no units in this file; such an amount is in the reference unit of its flow, which a separate flow dataset defines
copyright: false
licenseType: Free of charge for all users and uses

## General comment
Production process of permeable bricks in non sintered bricks

## Technical purpose
The permeable brick utilizing the cutting process from this data set is intended for applications in constructing pavements with considerations for water permeability and drainage. These bricks are suitable for creating eco-friendly, durable surfaces in urban landscapes, such as walkways, patios, and public squares.

## Reference product
- green brick: 94; measured
  Thin billet

## Inputs
- Clay Body: 106; measured
- Electricity: 0.49248; measured

## Outputs
- particles (PM10): 0.000294; measured

## Deviations from the LCI method approaches
ReCiPe midpoint (H) model is applied in this study.

## Data selection and combination
In this study, the production energy consumption of concrete pavement brick and permeable brick as well as the relevant data of all kinds of raw materials and energy input and exhaust emissions are collected from Jinan Shunde Cement Products Co. Ltd. Shandong Province.

## Sampling procedure
Most data of raw materials, energy input and waste discharge were collected from the site investigation of manufacturer. Water reducer is also called water reducing agent, whose chemical constituents is the sodium salt of the sulfonate formaldehyde condensation

## Use advice
Users of this data set should consider the specific conditions of the production environment in Jinan Shunde Cement Products Co. Ltd. when applying this data to other contexts. It is essential to adjust the data for different production scales, geographical locations, and technological variances. The functional unit of 1 m2 for brick products serves as the reference point for scaling. The data includes energy consumption, raw material use, and exhaust emissions, which should be used thoughtfully in the context of environmental performance. Sensitivity analysis based on 5% variation in key process inputs and outputs should be considered in the assessment.

## Review details
Inventory: The internal review was done by several iteration steps concerning raw data validation, raw data documentation, representativity, completeness and consistency of modelling with regard to ISO 14040 and 14044.

## Data sources
- Yuan, X. et al. Environmental and economic impacts assessment of concrete pavement brick and permeable brick production process - A case study in China. Journal of Cleaner Production 171, 198–208 (2018).
