# Iron ore production;Iron ore;Iron ore mining(Z11)

Dataset: ILCD process, Unit process, single operation
Geography: CN
Reference year: 1998
Classification: Unit processes / Materials production / Non-energetic raw materials
Generated by: Fuxiang, 1162850692@qq.com
Owner: Tiangong LCI Data Working Group
Review: Dependent internal review by Tiangong LCI Data Working Group
Amounts: no units in this file; such an amount is in the reference unit of its flow, which a separate flow dataset defines
copyright: false
licenseType: Free of charge for all users and uses

## General comment
来自表 4-15 Z11 钢厂生产吨材环境负荷编目表

## Time period
论文提到钢铁企业环境总体数据为1998年的吨钢环境基础数据。

## Technical purpose
The data set describes the process of iron ore production, which is used as a primary raw material in the steel industry. The iron ore extracted through this mining process is destined for steel manufacturing facilities where it serves as the key input for producing various steel products.

## Reference product
- Iron ore: 3383; measured
  iron ore

## Inputs
- Energy, geothermal, converted: 879.433; measured
- water: 5284; measured

## Outputs
All rows: measured
- sulfur dioxide: 0.064
- cyanide: 1e-5
- phenol: 6.8e-5
  Volatile phenol
- Hydrocarbons, aliphatic, alkanes, unspecified: 0.001915
  Petro
- Suspended solids, unspecified: 0.064277
- chemical oxygen demand: 0.023038

## Use advice
This data set represents environmental load inventories for steel production per metric ton based on data from 1998. Users should be aware that the dataset is specific to the Z11 iron ore mining process. This data is historical and should be used with caution for baselining and comparison with more recent data. Considerations for technological advancements and changes in industry practices over time should be taken into account. Furthermore, users incorporating this dataset into broader LCA studies should ensure that system boundaries are compatible and that recycling and reuse scenarios are appropriately reflected if applicable.

## Review details
Inventory: The internal review was done by several iteration steps concerning raw data validation, raw data documentation, representativity, completeness and consistency of modelling with regard to ISO 14040 and 14044.

## Data sources
- 周和敏. 钢铁材料生产过程环境协调性评价研究. (北京工业大学, 2001).
