# North China Wheat ; Hebei Wheat Production

Dataset: ILCD process, Unit process, single operation
Geography: HD-HEB-CN
Reference year: 2009
Valid until: 2011
Classification: Unit processes / Materials production / Food and renewable raw materials
Functional unit: 1t
LCI method principle: Attributional
LCI method approaches: Consequential
Generated by: Haoran Zhang, hrzhang@whu.edu.cn
Owner: Tiangong LCI Data Working Group
Review: Dependent internal review by Tiangong LCI Data Working Group
Amounts: no units in this file; such an amount is in the reference unit of its flow, which a separate flow dataset defines
copyright: false
licenseType: Free of charge for all users and uses

## General comment
Life cycle assessment (LCA) method was used to examine the environmental impact of wheat-maize rotation system emphasizing double high in Quzhou County. The LCA considered the entire system, from raw material extraction to grain production, in arable farming to produce 1 ton each of winter wheat and summer maize. Results indicated that double high agriculture could improve the yield of winter wheat and summer maize by 6.84% and 9.80% respectively, while decreasing the demand for non-renewable energy resources by 13.18% for winter wheat, and 17.45% for summer maize. In the double high production system, N and P fertilizer application was decreased by 5.23% and 7.79% for winter wheat production, and 2.37% and 56.54% for summer maize production. Less use of fertilizers in the winter wheat-summer maize production system decreased global warming, acidification, and aquatic eutrophication potentials. In the double high system, farmers decreased pesticide use by 10.64% for winter wheat and 19.57% for summer maize, thus reducing their potential evaporation, leaching, and surface run-off to environment. In addition, the double high agriculture decreased the heavy metal release to soil as a result of lower use of P fertilizers. In conclusion, the double high agriculture could decrease global warming, acidification, aquatic eutrophication, human toxicity, aquatic eco-toxicity, and soil eco-toxicity potentials as well as life cycle environmental impact index of winter wheat-summer maize production system. The practice in Quzhou County showed that double high system of winter wheat-summer maize production could increase food production while protecting environmental quality and conserving natural resources, and is thus applicable to North China Plain.

## Geography
Quzhou County

## Time period
The inventory analysis compiled all resources needed and all emissions that were released by the specific system under investigation and relates them to the deﬁned functional unit (ISO, 1998). Data on double high production system were collected in a survey of 105 farmers, and the data on conventional farming system were obtained through a survey of 90 farmers from 2009 to 2011

## Technology and included processes
The study was carried out according to the International Organization for Standardization (ISO 14040) and the Society for Environmental Toxicology and Chemistry (SETAC) (Consoli et al., 1993; ISO, 2006). The LCA tool is accomplished in four phases: (i) goal and scope definition, (ii) life cycle inventory analysis, (iii) life cycle impact assessment, and (iv) life cycle interpretation. The calculations were implemented by using Microsoft Excel.

## Technical purpose
The Hebei Wheat Production process under the double high agriculture system is designated for the production of winter wheat and summer maize, aiming to increase crop yields, conserve natural resources, and reduce the environmental impact of agricultural practices. This system is particularly developed for the North China Plain and is applicable to regions that would benefit from sustainable agricultural practices that promote higher yields and reduced reliance on non-renewable resources.

## Reference product
- wheat: 1000; measured

## Inputs
- Energy, gross calorific value, in biomass, primary forest: 6349.21; measured
- unspecified: 1554.24; measured
- water: 816.64; measured

## Outputs
All rows: measured
- carbon dioxide (fossil),carbon dioxide (fossil): 1120.43
- carbon monoxide (fossil): 0.2494
- methane (biogenic),methane (biogenic): 4.5275
- nitrous oxide: 0.8781
- ammonia: 11.0239
- Nitrogen trioxide: 6.6312
- ammonium: 0.9457
- chemical oxygen demand: 4.4633
- acephate: 0.0393
- chlorothalonil: 0.0117

## Deviations from the LCI method approaches
The goal and scope definition ofan LCA provides a description of the product system in terms of the system boundaries and a functional unit. The system boundaries of this LCA are from mineral and fossil fuel cradle to farm gate, analogously to the life cycle assessment study of Li et al. (2012).

## Data treatment and extrapolations
amount of fossil energy used in direct forms (e.g. diesel) was inferred from local experts and farmer interviews, while indirect forms (e.g. fossil energy consumed during fertilizer/pesticide production) were calculated from the consumption of primary energy factors in China (Wang et al., 2002). The emissions such as CO, NOx, SO2, CH4,N2O and CO2, due to energy consumption in the agriculture material production were calculated with SimaPro 7.1, which is the most widely used LCA software (Liang et al., 2009). In arable farming, ammonia volatilization was determined from nitrogen fertilizers using rates of 23% for winter wheat and 26% for summermaize. Nitrate leachingwas estimated as 14% nitrogen input for winter wheat and 16% for summer maize (Ju et al., 2009,Cheng et al. 2011). Direct N2O emissions come from the application of inorganic nitrogen, organic fertilizer, and incorporation of crop residues (1.25% of the N released as N2O). In addition to the direct emissions, induced emissions fromammonia and nitrate losses were considered. The respective factors were 1% for ammonia-N and 2.5% for nitrate-N (Nemecek et al., 2008). Three paths of P loss to water were included, namely run-off (as phosphate), erosion (as phosphorus) to rivers, and leaching to ground water (as phosphate). In this study, phosphorus loss was calculated as 0.2% of inputs for both inorganic and organic phosphorus sources (Wang et al., 2007). Heavy metal (Cu, Zn, Cd, Pb) losses were assessed from inpute output balance. Inputs of heavy metal were from fertilizers, irrigation and pesticides. The outputs were in the form of harvested grains, erosion and leaching, as returning ofcrop residues to field is a common practice in the North China plain (Cui et al., 2008). The inputs and outputs of heavy metal in the winter wheat-summer maize production system were estimated according to Xiao et al. (2004), Xiao et al. (2005) and Chen et al. (2006). Pesticide losses to air were determined using a standard residue rate of10% per unit weight of pesticides, 1% to freshwater, and 43% to soil (Wang et al., 2007).

## Use advice
When applying LCA data from the Hebei Wheat Production, users should consider the system boundaries from mineral and fossil fuel extraction to the farm gate. It is crucial to include the adjustments made in the double high production system, such as reduced fertilizer and pesticide use, and the consequent changes in yield and resource consumption. The data relating to energy and material flows, direct and indirect emissions, and heavy metal content should be handled with care considering the functional unit of 1 ton of winter wheat and 1 ton of summer maize production. External factors such as local climate and farmer practices may influence the results, so appropriate regional adjustments may be necessary when applying this data to different contexts.

## Review details
Inventory: The internal review was done by several iteration steps concerning raw data validation, raw data documentation, representativity, completeness and consistency of modelling with regard to ISO 14040 and 14044.

## Data sources
- Wang C, Li X, Gong T, et al. Life cycle assessment of wheat-maize rotation system emphasizing high crop yield and high resource use efficiency in Quzhou County[J]. Journal of Cleaner Production, 2014, 68: 56-63.
