# Other heterocyclic pesticides ; Nitrogen-containing raw materials ; Synthesis ; All sizes; NESPS2 / 其他杂环类农药① ; 含氮原料 ; 合成 ; 所有规模 ; 全国第二次污染普查数据

Dataset: ILCD process, Unit process, single operation
Geography: CN
Reference year: 2019
Classification: Reference Parameters / Materials production / Non-energetic raw materials
Generated by: The data was created by the Office of the Second National Pollution Source Census of the Ministry of Ecology and Environment, and the data was organized by the TianGong Plan team for ILCD format / 生态环境部第二次全国污染源普查工作办公室创建数据，天工计划团队常慧敏整理数据为ILCD格式
Owner: Tiangong LCI Data Working Group / 天工LCI数据工作小组
Review: Dependent internal review by Tiangong LCI Data Working Group / 天工LCI数据工作小组
Amounts: no units in this file; such an amount is in the reference unit of its flow, which a separate flow dataset defines
copyright: false
licenseType: Free of charge for all users and uses

## General comment
the Technical of end-of-pipe management technology for pollution chemical oxygen demandisRedox process + (1700 others) deamination tower + A2/O process，Its Technical efficiency of end-of-pipe management91，The formula for calculating the actual operation rate (k-value) of the end-of-pipe treatment facility is /

## Technical purpose
该数据代表了在工业各个规模中，使用含氮原料合成其他杂环类农药的工艺流程。所提及的末端处理技术包括处理化学需氧量、氨氮、有机结合氮、总磷、氰化物和挥发性有机化合物等污染物的废水和排气处理设施，对于减轻农药制造领域的环境影响至关重要。

## Reference product
- Heterocyclic Pesticides: 1000; calculated
  源文件中描述为为其他杂环类农药①，此处对其进行了匹配工作，将其匹配到LCAflow库里面相最符合的流，污染物指标备注为工业废水量

## Outputs
All rows: calculated
- cyanide: 5.6e-5
  the Technical of end-of-pipe management technology for pollution cyanideis(2500 others) Incineration，Its Technical efficiency of end-of-pipe management99.9，The formula for calculating the actual operation rate (k-value) of the end-of-pipe treatment facility is k = operating time of wastewater terminal treatment facilities (hours) / normal production time (hours)
  污染物指标氰化物的末端治理技术是（2500其他）焚烧，其效率为99.9，末端治理设施实际运行率（k值）计算公式为k=治理设施耗电量（千瓦时）/（治理设施运行时数（小时）*治理设施额定功率(千瓦)）。原文件中描述污染物类别为废水，污染物指标为氰化物，此处对其进行了匹配工作，将其匹配到LCAflow库里面相最符合的流，污染物指标备注为氰化物
- volatile organic compound: 0.146
  the Technical of end-of-pipe management technology for pollution volatile organic compoundisRTO，Its Technical efficiency of end-of-pipe management99.9，The formula for calculating the actual operation rate (k-value) of the end-of-pipe treatment facility is k = opreating time of treatment facilities (hours/year) / normal production time (hours/year)
  污染物指标挥发性有机物的末端治理技术是RTO，其效率为99.9，末端治理设施实际运行率（k值）计算公式为k=治理设施耗电量（千瓦时）/（治理设施运行时数（小时）*治理设施额定功率(千瓦)）。原文件中描述污染物类别为废气，污染物指标为挥发性有机物，此处对其进行了匹配工作，将其匹配到LCAflow库里面相最符合的流，污染物指标备注为挥发性有机物
- Ammonia Nitrogen: 0.000615
  the Technical of end-of-pipe management technology for pollution Ammonia Nitrogenis(2500 others) Incineration，Its Technical efficiency of end-of-pipe management99.9，The formula for calculating the actual operation rate (k-value) of the end-of-pipe treatment facility is k = annual power consumption of wastewater treatment facilities (kWh) / (total rated power (kW) × annual operating time (hours))
  污染物指标氨氮的末端治理技术是（2500其他）焚烧，其效率为99.9，末端治理设施实际运行率（k值）计算公式为k=治理设施耗电量（千瓦时）/（治理设施运行时数（小时）*治理设施额定功率(千瓦)）。原文件中描述污染物类别为废水，污染物指标为氨氮，此处对其进行了匹配工作，将其匹配到LCAflow库里面相最符合的流，污染物指标备注为氨氮
- phosphorus, total: 0.00226
  the Technical of end-of-pipe management technology for pollution phosphorus, totalis(2500 others) Incineration，Its Technical efficiency of end-of-pipe management99.9，The formula for calculating the actual operation rate (k-value) of the end-of-pipe treatment facility is /
  污染物指标总磷的末端治理技术是（2500其他）焚烧，其效率为99.9，末端治理设施实际运行率（k值）计算公式为k=治理设施耗电量（千瓦时）/（治理设施运行时数（小时）*治理设施额定功率(千瓦)）。原文件中描述污染物类别为废水，污染物指标为总磷，此处对其进行了匹配工作，将其匹配到LCAflow库里面相最符合的流，污染物指标备注为总磷
- volatile organic compound: 2.92
  the Technical of end-of-pipe management technology for pollution volatile organic compoundisPhotocatalysis，Its Technical efficiency of end-of-pipe management98，The formula for calculating the actual operation rate (k-value) of the end-of-pipe treatment facility is K = normal operation time of wastewater treatment facility (hours/year) / normal production time of enterprises (hours/year)
  污染物指标挥发性有机物的末端治理技术是光催化，其效率为98，末端治理设施实际运行率（k值）计算公式为k=治理设施耗电量（千瓦时）/（治理设施运行时数（小时）*治理设施额定功率(千瓦)）。原文件中描述污染物类别为废气，污染物指标为挥发性有机物，此处对其进行了匹配工作，将其匹配到LCAflow库里面相最符合的流，污染物指标备注为挥发性有机物
- volatile organic compound: 4.38
  the Technical of end-of-pipe management technology for pollution volatile organic compoundis(Absorption + diversion) + (adsorption + steam desorption)/(adsorption + nitrogen/air desorption)，Its Technical efficiency of end-of-pipe management97，The formula for calculating the actual operation rate (k-value) of the end-of-pipe treatment facility is k = opreating time of treatment facilities (hours/year) / normal production time (hours/year)
  污染物指标挥发性有机物的末端治理技术是（吸收+分流）+（吸附+蒸汽解析）/（吸附+氮气/空气解析），其效率为97，末端治理设施实际运行率（k值）计算公式为k=治理设施耗电量（千瓦时）/（治理设施运行时数（小时）*治理设施额定功率(千瓦)）。原文件中描述污染物类别为废气，污染物指标为挥发性有机物，此处对其进行了匹配工作，将其匹配到LCAflow库里面相最符合的流，污染物指标备注为挥发性有机物
- cyanide: 0.0056
  the Technical of end-of-pipe management technology for pollution cyanideisRedox process + (1700 others) deamination tower + A2/O process，Its Technical efficiency of end-of-pipe management90，The formula for calculating the actual operation rate (k-value) of the end-of-pipe treatment facility is k = operating time of wastewater terminal treatment facilities (hours) / normal production time (hours)
  污染物指标氰化物的末端治理技术是氧化还原法+（1700其他）脱氨塔+A2/O工艺，其效率为90，末端治理设施实际运行率（k值）计算公式为k=治理设施耗电量（千瓦时）/（治理设施运行时数（小时）*治理设施额定功率(千瓦)）。原文件中描述污染物类别为废水，污染物指标为氰化物，此处对其进行了匹配工作，将其匹配到LCAflow库里面相最符合的流，污染物指标备注为氰化物
- Waste water: 8000
  the Technical of end-of-pipe management technology for pollution Waste wateris/，Its Technical efficiency of end-of-pipe management0，The formula for calculating the actual operation rate (k-value) of the end-of-pipe treatment facility is /
  污染物指标工业废水量的末端治理技术是/，其效率为0。原文件中描述污染物类别为废水，污染物指标为工业废水量，此处对其进行了匹配工作，将其匹配到LCAflow库里面相最符合的流，污染物指标备注为工业废水量
- Nitrogen, organic bound: 0.0182
  the Technical of end-of-pipe management technology for pollution Nitrogen, organic boundis(2500 others) Incineration，Its Technical efficiency of end-of-pipe management99.9，The formula for calculating the actual operation rate (k-value) of the end-of-pipe treatment facility is /
  污染物指标总氮的末端治理技术是（2500其他）焚烧，其效率为99.9，末端治理设施实际运行率（k值）计算公式为k=治理设施耗电量（千瓦时）/（治理设施运行时数（小时）*治理设施额定功率(千瓦)）。原文件中描述污染物类别为废水，污染物指标为总氮，此处对其进行了匹配工作，将其匹配到LCAflow库里面相最符合的流，污染物指标备注为总氮
- Ammonia Nitrogen: 0.0246
  the Technical of end-of-pipe management technology for pollution Ammonia NitrogenisRedox process + (1700 others) deamination tower + A2/O process，Its Technical efficiency of end-of-pipe management96，The formula for calculating the actual operation rate (k-value) of the end-of-pipe treatment facility is k = annual power consumption of wastewater treatment facilities (kWh) / (total rated power (kW) × annual operating time (hours))
  污染物指标氨氮的末端治理技术是氧化还原法+（1700其他）脱氨塔+A2/O工艺，其效率为96，末端治理设施实际运行率（k值）计算公式为k=治理设施耗电量（千瓦时）/（治理设施运行时数（小时）*治理设施额定功率(千瓦)）。原文件中描述污染物类别为废水，污染物指标为氨氮，此处对其进行了匹配工作，将其匹配到LCAflow库里面相最符合的流，污染物指标备注为氨氮
- phosphorus, total: 0.339
  the Technical of end-of-pipe management technology for pollution phosphorus, totalisRedox process + (1700 others) deamination tower + A2/O process，Its Technical efficiency of end-of-pipe management85，The formula for calculating the actual operation rate (k-value) of the end-of-pipe treatment facility is /
  污染物指标总磷的末端治理技术是氧化还原法+（1700其他）脱氨塔+A2/O工艺，其效率为85，末端治理设施实际运行率（k值）计算公式为k=治理设施耗电量（千瓦时）/（治理设施运行时数（小时）*治理设施额定功率(千瓦)）。原文件中描述污染物类别为废水，污染物指标为总磷，此处对其进行了匹配工作，将其匹配到LCAflow库里面相最符合的流，污染物指标备注为总磷
- Exhaust gas: 1000
  the Technical of end-of-pipe management technology for pollution Exhaust gasis/，Its Technical efficiency of end-of-pipe management0
  污染物指标工业废气量的末端治理技术是/，其效率为0。原文件中描述污染物类别为废气，污染物指标为工业废气量，此处对其进行了匹配工作，将其匹配到LCAflow库里面相最符合的流，污染物指标备注为工业废气量
- Nitrogen, organic bound: 6.37
  the Technical of end-of-pipe management technology for pollution Nitrogen, organic boundisRedox process + (1700 others) deamination tower + A2/O process，Its Technical efficiency of end-of-pipe management65，The formula for calculating the actual operation rate (k-value) of the end-of-pipe treatment facility is k = annual power consumption of wastewater treatment facilities (kWh) / (total rated power (kW) × annual operating time (hours))
  污染物指标总氮的末端治理技术是氧化还原法+（1700其他）脱氨塔+A2/O工艺，其效率为65，末端治理设施实际运行率（k值）计算公式为k=治理设施耗电量（千瓦时）/（治理设施运行时数（小时）*治理设施额定功率(千瓦)）。原文件中描述污染物类别为废水，污染物指标为总氮，此处对其进行了匹配工作，将其匹配到LCAflow库里面相最符合的流，污染物指标备注为总氮
- chemical oxygen demand: 29.3
  the Technical of end-of-pipe management technology for pollution chemical oxygen demandis(2500 others) Incineration，Its Technical efficiency of end-of-pipe management95，The formula for calculating the actual operation rate (k-value) of the end-of-pipe treatment facility is /
  污染物指标化学需氧量的末端治理技术是（2500其他）焚烧，其效率为95，末端治理设施实际运行率（k值）计算公式为k=治理设施耗电量（千瓦时）/（治理设施运行时数（小时）*治理设施额定功率(千瓦)）。原文件中描述污染物类别为废水，污染物指标为化学需氧量，此处对其进行了匹配工作，将其匹配到LCAflow库里面相最符合的流，污染物指标备注为化学需氧量
- chemical oxygen demand: 52.74
  the Technical of end-of-pipe management technology for pollution chemical oxygen demandisRedox process + (1700 others) deamination tower + A2/O process，Its Technical efficiency of end-of-pipe management91，The formula for calculating the actual operation rate (k-value) of the end-of-pipe treatment facility is /
  污染物指标化学需氧量的末端治理技术是氧化还原法+（1700其他）脱氨塔+A2/O工艺，其效率为91，末端治理设施实际运行率（k值）计算公式为k=治理设施耗电量（千瓦时）/（治理设施运行时数（小时）*治理设施额定功率(千瓦)）。原文件中描述污染物类别为废水，污染物指标为化学需氧量，此处对其进行了匹配工作，将其匹配到LCAflow库里面相最符合的流，污染物指标备注为化学需氧量

## Use advice
This dataset is derived from the Pollution Source Census Report and contains information on pollution emissions and related products. However, it does not include data on energy or chemical consumption, nor does it provide information on waste or co-product generation. When utilizing this dataset, please supplement the missing data based on actual conditions before use
该数据集来源于污染源普查报告，包含污染物排放及相关产品信息，但不包含能源或化学品消耗数据，也不提供废弃物或共生产物产生信息。在使用该数据集时，请根据实际情况补充缺失数据后再使用。

## Review details
Inventory: The internal review was done by several iteration steps concerning raw data validation, raw data documentation, representativity, completeness and consistency of modelling with regard to ISO 14040 and 14044.
清单： 内部审查通过几个迭代步骤完成，涉及原始数据验证、原始数据记录、代表性、完整性、与 ISO 14040 和 14044 有关的建模的一致性。

## Data sources
- 第二次全国污染源普查产排污核算系数手册（试用版）,二级代码26,三级代码263.0文件，在完整版文件中第2936页
