# high-impact polystyrene production

Dataset: ILCD process
Geography: BR
Reference year: 2010
Valid until: 2011
Classification: Unit processes / Materials production / Plastics
Functional unit: 1 ton of HIPS
Generated by: Zhiwei Li,
Owner: Tiangong LCI Data Working Group
Review: Dependent internal review by Tiangong LCI Data Working Group
Amounts: no units in this file; such an amount is in the reference unit of its flow, which a separate flow dataset defines
licenseType: Free of charge for all users and uses

## General comment
The synthesis of HIPS starts by dissolving polybutadiene (C4H6) in a mixture of C8H8 and additives (diluents, chain-transfer agents, and initiators).

## Geography
Primary and secondary data were collected in plants in the South/Southeast regions of Brazil in 2010–2011.

## Technical purpose
The high-impact polystyrene (HIPS) produced via this industrial process is used for manufacturing products that require durability and impact resistance. It is commonly utilized to create items like home appliances, electronic casings, toys, and automotive parts. Additionally, the general-purpose polystyrene (GPPS) could be used for a wide range of applications including disposable cutlery, CD cases, and various packaging materials.

## Reference product
- high impact polystyrene granulate (HIPS): 1000

## Inputs
- benzene: 268
- ethylene: 777
- polybutadiene granulate (PB): 78.6
- light fuel oil: 88.3
- nitrogen: 6.58
- water: 9750
- Electricity: 982.8
- heat: 9310

## Outputs
- carbon dioxide (fossil): 0.428
  原文未区分bio和fossil，根据专家判断此处为fossil
- methane (fossil): 0.0017
  原文未区分bio和fossil，根据专家判断此处为fossil
- chemical oxygen demand: 0.004
- Suspended solids, unspecified,Suspended solids, unspecified: 7.38

## Use advice
Users of this data set should note that the information is specific to HIPS and GPPS synthesis in the South/Southeast regions of Brazil, reflecting regional production parameters and environmental impacts. This data should be applied only to scenarios relevant to these regions and production technologies for the years 2010–2011. Care should be taken when generalizing this data for other contexts or time frames. Include considerations for end-of-life treatment and recycling practices, as appropriate for polystyrene materials.

## Review details
Inventory: The internal review was done by several iteration steps concerning raw data validation, raw data documentation, representativity, completeness and consistency of modelling with regard to ISO 14040 and 14044.

## Data sources
- Hansen, A. P.; da Silva, G. A.; Kulay, L. Evaluation of the Environmental Performance of Alternatives for Polystyrene Production in Brazil. Science of The Total Environment 2015, 532, 655–668.
