# East China Wheat ; Shandong Wheat Production

Dataset: ILCD process, Unit process, single operation
Geography: ZB-SD-CN
Classification: Unit processes / Materials production / Food and renewable raw materials
Functional unit: 1 t
LCI method principle: Attributional
LCI method approaches: Consequential
Generated by: Haoran Zhang, hrzhang@whu.edu.cn
Owner: Tiangong LCI Data Working Group
Review: Dependent internal review by Tiangong LCI Data Working Group
Amounts: no units in this file; such an amount is in the reference unit of its flow, which a separate flow dataset defines
copyright: false
licenseType: Free of charge for all users and uses

## General comment
The main resources consumed during the life cycle of winter wheat include renewable resources such as land, water and biomass, as well as non-renewable sources such as fossil energy, phosphorus and potassium. This study only considers the impact of fossil energy depletion, including coal, heavy oil, gasoline, diesel and natural gas, as shown in Table 3. Coal is mainly used for the production of fertilizers, pesticides and electricity, heavy oil and natural gas are used for nitrogen fertilizer production, gasoline is mainly used for motor vehicle transportation, diesel is used for agricultural machinery tillage, and electricity is used for fertilizer, pesticide production and irrigation

## Geography
Huantai County

## Technology and included processes
According to the authoritative monograph [9] of the International Society of Environmental Toxicology and Chemistry (SETAC), LCA consists of four interrelated stages, namely: Goal and Scope Definition; Inventory analysis; Impact Assessment; Improvement Assessment

## Technical purpose
The data set represents the production process of winter wheat in Shandong, China, specifically from the Huantai County area. Winter wheat from this region is cultivated using both conventional management practices (CMP) and recommended management practices (RMP). The process includes the use of fertilizers such as urea, compound fertilizers, calcium superphosphate, diammonium phosphate, and potassium chloride, and the application of pesticides like oxydemeton-methyl and phorate. In the case of RMP, chemical pesticides are excluded, and fertilizers are applied based on targeted yield-formulated fertilization methods according to soil fertility conditions. This agricultural process is intended for producing wheat that may be utilized for food consumption, animal feed production, and other industrial applications where winter wheat is a raw material.

## Reference product
- maize grain: 1000; measured

## Inputs
All rows: measured
- hard coal,hard coal: 282.72
- heavy fuel oil: 12.15
- gasoline (regular): 1.8
- Diesel: 5.23
- natural gas; 44.1 MJ/kg: 27.1

## Outputs
All rows: measured
- carbon monoxide (fossil): 0.33
- Nitrogen oxides: 1.45
- sulfur dioxide: 2.52
- methane (fossil),methane (fossil): 1.87
- nitrous oxide: 0.04
- carbon dioxide (fossil),carbon dioxide (fossil): 611.75
- ammonium: 5.34
- Nitrogen trioxide: 2.43

## Deviations from the LCI method approaches
The winter wheat lifecycle mainly includes stages such as raw material extraction and transportation, as well as the production and transportation of fertilizers and pesticides, and crop planting.

## Data selection and combination
常规管理措施(conventional management practices, CMP)来自对桓台县10 个乡镇92 个农户近3 年投入产出的调查。化肥主要有尿素、复合肥、过磷酸钙、磷酸二铵和氯化钾。杀虫剂主要使用氧化乐果和辛硫磷，除草剂主要是2,4- 滴丁酯和莠去津等。推荐管理措施(recommended management practices, RMP)来自田方正等[8]的水肥管理模式优化研究结果，不使用化学农药，根据土壤肥力状况应用目标产量配方施肥法计算氮、磷、钾施用量。土肥、磷、钾和2/3 的氮肥作底肥，1/3的氮肥作拔节追肥。

## Use advice
This data should be used by stakeholders involved in the environmental management of agricultural production, particularly those focusing on life cycle assessments in the agricultural sector. The data is vital for modeling the resource utilization and environmental emissions of winter wheat production. Data users should consider the differences in emissions between CMP and RMP to accurately reflect the potential environmental impact when evaluating the entire lifecycle of winter wheat from raw material extraction to agricultural output. Furthermore, users should take into account the geographic specificity of the data to Shandong, China. This means extrapolation to other wheat-producing regions should be done with caution.

## Review details
Inventory: The internal review was done by several iteration steps concerning raw data validation, raw data documentation, representativity, completeness and consistency of modelling with regard to ISO 14040 and 14044.

## Data sources
- 王明新,包永红,吴文良等.华北平原冬小麦生命周期环境影响评价[J].农业环境科学学报,2006(05):1127-1132.
