# Methanol Production ; Methanol ; Syngas to Methanol Route ; Syngas

Dataset: ILCD process, Unit process, black box
Geography: ZJ-GD-CN
Reference year: 2018
Classification: Energy carriers and technologies / Other non-renewable fuels
Functional unit: A functional unit is defined as 4.48 ton of MTO methanol product
LCI method principle: Attributional
LCI method approaches: Allocation - mass
Generated by: Yanan Ren, renyn15@tsinghua.org.cn
Owner: Tiangong LCI Data Working Group
Review: Dependent internal review by Tiangong LCI Data Working Group
Amounts: no units in this file; such an amount is in the reference unit of its flow, which a separate flow dataset defines
copyright: false
licenseType: Free of charge for all users and uses

## General comment
ID14 Propylene Production ; Propylene ; Coal to Olefins Route ; Coal ; Subordinate Process 4

## Geography
The case plant of the catalytic cracking route comes from Sinopec Zhanjiang Dongxing Petrochemical Co., Ltd. The company is located in Zhanjiang City, Guangdong Province. Its catalytic cracking olefins process was built in 2018, with an annual production capacity of 116,000 tons of propylene.

## Time period
Craft built in 2018

## Technical purpose
Methanol produced through the syngas to methanol route using net synthesis gas, often referred to as 'Syngas', is predominantly utilized in the chemical industry for producing formaldehyde, acetic acid, and as a feedstock for MTO (Methanol-to-Olefins) processes. Additionally, methanol serves as a starting material for producing a variety of chemicals such as methylamines, methyl methacrylate (MMA), and can be used as a fuel or fuel additive. Propylene produced via the coal to olefins route, particularly through catalytic cracking techniques, is primarily employed in the production of polypropylene, propylene oxide, and acrylonitrile, among other chemicals.

## Model description
The consumption of raw materials, energy, electricity, steam, water and auxiliary chemicals involved in each sub-stage is considered, and the output considers propylene and by-products (such as C4 products produced by the propane dehydrogenation process. The mass distribution method is used to quantify the products The environmental load between propylene and by-products. In addition, this model also considers the waste discharge of each process. This study focuses on the environmental impact analysis of different propylene production processes. Therefore, the utilization of propylene hydrocarbons and the end-of-life treatment of their products, as well as infrastructure Construction and equipment maintenance are outside the scope of this assessment.

## Reference product
- Methanol: 4480; measured
  MTO grade methanol

## Inputs
All rows: measured
- Syngas: 4820
  Purifying gas
- Trisodium Phosphate: 90
  Trisodium phosphate
- nitrogen: 3.03
  low pressure nitrogen
- process steam: 5870
  steam
- Water (fresh water): 4420
  fresh water
- electricity mix: 121.212
  electricity

## Outputs
- total dissolved solids: 0.00605; measured
  TDS

## Data selection and combination
The detailed input-output data of the propylene production process comes from the company's public environmental impact assessment report, including the input of raw materials and auxiliary materials, energy and resource consumption, and discharge of waste gas, wastewater and solid waste.

## Use advice
When utilizing this data for LCA studies, users should meticulously account for raw material inputs, energy consumption, and emissions based on the provided information about methanol and propylene production processes. The environmental impacts must be allocated accordingly for propylene and its by-products using the mass distribution method. It is essential to consider waste discharges from the processes in the analysis. Data users must be aware that this dataset excludes the environmental impacts from the use phase of propylene hydrocarbons, their end-of-life treatment, and the associated infrastructure development and equipment maintenance.

## Review details
Inventory: The internal review was done by several iteration steps concerning raw data validation, raw data documentation, representativity, completeness and consistency of modelling with regard to ISO 14040 and 14044.

## Data sources
- 吕琳. 丙烯产品环境负荷及温室气体减排的碳税政策. (大连理工大学, 2022).
