# cement production;cement, portland cement, 42.5MPa;new suspension preheater;mixed solid wastes

Dataset: ILCD process, Unit process, black box
Geography: CN
Reference year: 2009
Classification: Materials production / Other mineralic materials
Generated by: Siqi Yang, ysqsophia@gmail.com
Owner: Tiangong LCI Data Working Group
Review: Dependent internal review by Tiangong LCI Data Working Group
Amounts: no units in this file; such an amount is in the reference unit of its flow, which a separate flow dataset defines
copyright: false
licenseType: Free of charge for all users and uses

## General comment
The Chinese LCI data are calculated with a sample of 18 cement plants with 30 production lines all over China (China Centre of National Material Life Cycle Assessment, 2012).There are three primary production processes .The pulverized coal and raw meal preparation process include the transferring, grinding, homogenizing, and storage of raw materials, and the grinding and storage of coal. In the burning process, the ground and mixed raw materials-raw meal are input to the preheater, and then to the calciner, decomposing with 60 % of coal at 950 °C. The limestone decomposes for about 95 % in the calciner and for 5 % in the kiln. The decomposed materials fall into the kiln and are incinerated to be clinker with 40 % of coal at a temperature of over 1,400 °C. In the finishing process, the cement is produced when clinker, mineral additions, and gypsum are granulated finely by grinding mill. The raw meal is suspended and heated by recycled hot air in preheater.

## Time period
Data collection year: 2009-2012

## Technology and included processes
There are three primary production processes (Fig. 1).Thepulverizedcoal and raw meal preparation process include the transferring, grinding, homogenizing, and storage of raw materials, and the grinding and storage of coal. In the burning process, the ground and mixed raw materials-raw meal are input to the preheater, and then to the calciner, decomposing with 60 % of coal at 950 °C. The limestone decomposes for about 95 % in the calciner and for 5 % in the kiln. The decomposed materials fall into the kiln and are incinerated to be clinker with 40 % of coal at a temperature of over 1,400 °C. In the finishing process, the cement is produced when clinker, mineral additions, and gypsum are granulated finely by grinding mill. The raw meal is suspended and heated by recycled hot air in preheater. That is why it is called NSP cement production technology.

## Technical purpose
The described process relates to the production of Portland cement with a compression strength of 42.5 MPa using the New Suspension Preheater (NSP) method, which is a predominant technology for cement manufacturing in China. This type of cement is typically used in construction for making concrete, mortar, and other building materials where high strength is required.

## Model description
"1 ton of Portland cement" and "1 ton of Portland cement with strength class 42.5 MPa" are both used as functional units.

## Reference product
- cement, portland cement, 42.5MPa: 1000
  portland cement 42.5 MPa

## Inputs
- hard coal: 103.325
  Coal (kg ce). The original data is 96 kg of standard coal, which is converted to hard coal. The conversion formula is 1 kg of hard coal = 0.929 kg of standard coal.The total coal consumption=coal for incineration(85) + coal for power generation by cement plant with waste heat recovery technology(11). ce, standard coal of consumed energy. The standard coal has the defined heat value of 29,308 kJ/kg ce or 7,000 kcal/kg. Thermal energy is 2814 MJ.
- electricity, medium voltage: 144
  Electricity. The electricity from power station=total electricity consumption electricity generated by cement plant with waste heat recovery technology.
- limestone, crushed, for mill: 1150
  Limestone
- sandstone: 41.1
  Sandstone
- Iron tailings: 17.5
  Ferrous tailings
- gypsum stone (CaSO4-dihydrate): 40
  Gypsum

## Outputs
- industrial waste (unspecified): 6
  Industry waste: Slag+fly ash
- carbon dioxide: 510
  CO2. CO2 from limestone decomposition
- carbon dioxide (fossil): 240
  CO2. CO2 from coal combustion
- particles (> PM10): 0.065
  PM. The particle size is not specified. Here we treat it as PM>10.
- electricity, medium voltage: 0.094
  SO2. the range is 0.048∼0.150. The SO2 emissions vary with the amount of sulfur in coal and raw materials. The amount of SO2 emissions is 0.048 kg/t portland cement on condition that less than 0.6 % of sulfur in coal. The amount of SO2 emissions is 0.150 kg/t portland cement on condition that more than 0.6 % mainly 3–10 % of sulfur in coal. The average value of SO2 emissions is 0.094 kg/t portland cement. The relative change rate is calculated by the average value.
- Nitrogen oxides: 1.6
  NOx. the range is 0.54∼2.11. The amount of NOx emissions varies with denitration (deNOx) technology applications. The amount of NOx emissions is 0.54 kg/t portland cement when multistage combustion (MSC) and selective noncatalytic reduction (SNCR) deNOx technologies are applied. The amount of NOx emissions is 2.11 kg/t portland cement when no deNOx technology is applied. The average value of NOx emissions is 1.6 kg/t portland cement. The relative change rate is calculated by the average value.

## Data selection and combination
Direct LCI (cement manufacturing) including inputs and outputs is calculated by three methods of Mass Flow Analysis (MFA): using on-site measurements with calciners and kilns in continuous operation 24 hours a day, Calculated by coefficients estimated from expert knowledge, and derived through mass and heat balance principles.

## Sampling procedure
data collection. Year: 2009~2012; Company group: 18; Factories/production lines: 30; Local production scale: Measurement method; Middle and high-level: On-site by non-stakeholder persons.

## Use advice
The Life Cycle Assessment (LCA) data for this process are to be used with an understanding of the full production line from raw material procurement to the production of cement. It is important to consider the specific energy consumption and emissions during each stage. The user must pay attention to the described incorporation of mixed solid wastes, which serves as a distinct factor in the eco-profile of the process. When applying the data set, ensure adherence to the technological boundaries (years 2009-2012) and the geographical scope (China) to maintain accuracy.

## Review details
Inventory: The internal review was done by several iteration steps concerning raw data validation, raw data documentation, representativity, completeness and consistency of modelling with regard to ISO 14040 and 14044.

## Data sources
- Chen Li, Suping Cui, Zuoren Nie, Xianzheng Gong, Zhihong Wang, & Norihiro Itsubo. (2015). The LCA of portland cement production in China. The International Journal of Life Cycle Assessment, 20(1), 117–127.
