# Pelleting;Pellet;Pelleting

Dataset: ILCD process, Unit process, single operation
Geography: CN
Classification: Unit processes / Materials production / Other materials
Generated by: Fuxiang, 1162850692@qq.com
Owner: Tiangong LCI Data Working Group
Review: Dependent internal review by Tiangong LCI Data Working Group
Amounts: no units in this file; such an amount is in the reference unit of its flow, which a separate flow dataset defines
copyright: false
licenseType: Free of charge for all users and uses

## General comment
The data set describes the pelleting process used to produce pelletized iron ore, a precursor to raw material for the steel manufacturing process. Such pelletized iron ore is commonly used in blast furnace-basic oxygen furnace (BF-BOF) pathways for steel production, especially in largescale integrated steel plants that may also include coking operations and electric arc furnace (EAF) facilities for steel recycling and manufacturing.

## Geography
The data of the BF-BOF pathway were obtained from the large-scale integrated steel plants in China with an attached coking plant and EAF plant.

## Reference product
- Pellet: 165.8; measured

## Inputs
All rows: measured
- Iron ore: 160.7
  Iron ore (Domestic)
- Iron ore: 1.6
  Iron ore (Import)
- dolomite: 1.8
- quicklime: 0.3
  Quicklime
- Circulating water: 100
- bentonite: 2.8
- Coke oven gas: 7.3
  COG
- Blast furnace gas: 2.9
  BFG
- Linz-Donawitz gas: 0.2
  LDG
- Raw coal: 5.2
- Electricity: 23.4

## Use advice
Users of this data set should consider the technological applicability specific to large-scale integrated steel plants within China when applying the data to their LCA models. Attention should be paid to the inclusion or exclusion of emissions from associated coking plant and EAF plant operations, as they are part of the BF-BOF pathway data. Ensure that assumptions regarding the geographical and technological context are coherent with the life cycle inventory being modeled, especially in scenarios where steel recycling or the use of alternative steelmaking technologies may be considered.

## Review details
Inventory: The internal review was done by several iteration steps concerning raw data validation, raw data documentation, representativity, completeness and consistency of modelling with regard to ISO 14040 and 14044.

## Data sources
- The carbon reduction potential of hydrogen in the low carbon transition of the iron and steel industry: The case of China
