# Flat glass ; Silica sand + oil (heavy oil, coal tar, petroleum coke) ; Flotation ; 600 t less thandaily melting capacityless than or equal to900 t; NESPS2 / 平板玻璃 ; 硅砂+油（重油、煤焦油、石油焦） ; 浮法 ; 600吨小于日熔量小于等于900吨 ; 全国第二次污染普查数据

Dataset: ILCD process, Unit process, single operation
Geography: CN
Reference year: 2019
Classification: Reference Parameters / Materials production / Glass and ceramics
Generated by: The data was created by the Office of the Second National Pollution Source Census of the Ministry of Ecology and Environment, and the data was organized by the TianGong Plan team for ILCD format / 生态环境部第二次全国污染源普查工作办公室创建数据，天工计划团队常慧敏整理数据为ILCD格式
Owner: Tiangong LCI Data Working Group / 天工LCI数据工作小组
Review: Dependent internal review by Tiangong LCI Data Working Group / 天工LCI数据工作小组
Amounts: no units in this file; such an amount is in the reference unit of its flow, which a separate flow dataset defines
copyright: false
licenseType: Free of charge for all users and uses

## General comment
the Technical of end-of-pipe management technology for pollution Exhaust gasis/，Its Technical efficiency of end-of-pipe management0

## Technical purpose
所描述的工业过程涉及使用浮法生产日熔量在600至900吨的平板玻璃，原材料为硅砂和油类衍生物，如重油、煤焦油和石油焦。这种类型的玻璃通常用于建筑和汽车行业的窗户和挡风玻璃。随附的末端处理技术显示了对减少废水、石油废物、废气、颗粒物（PM）、二氧化硫（SO2）和氮氧化物（NOx）相关污染的重视。

## Reference product
- Plate Glass: 1000; calculated
  源文件中描述为为平板玻璃，此处对其进行了匹配工作，将其匹配到LCAflow库里面相最符合的流，污染物指标备注为工业废水量

## Outputs
All rows: calculated
- particles (PM2.5 - PM10): 0.0264
  the Technical of end-of-pipe management technology for pollution particles (PM2.5 - PM10)isBag filter，Its Technical efficiency of end-of-pipe management99
  污染物指标颗粒物的末端治理技术是袋式除尘，其效率为99，末端治理设施实际运行率（k值）计算公式为k=处理设施耗电量（千瓦时/年）/（设备额定功率（千瓦）×设备运行时间（小时/年））。原文件中描述污染物类别为废气，污染物指标为颗粒物，此处对其进行了匹配工作，将其匹配到LCAflow库里面相最符合的流，污染物指标备注为颗粒物
- particles (PM2.5 - PM10): 0.0375
  the Technical of end-of-pipe management technology for pollution particles (PM2.5 - PM10)isElectric-bag composite precipitator，Its Technical efficiency of end-of-pipe management95
  污染物指标颗粒物的末端治理技术是电袋组合，其效率为95，末端治理设施实际运行率（k值）计算公式为k=处理设施耗电量（千瓦时/年）/（设备额定功率（千瓦）×设备运行时间（小时/年））。原文件中描述污染物类别为废气，污染物指标为颗粒物，此处对其进行了匹配工作，将其匹配到LCAflow库里面相最符合的流，污染物指标备注为颗粒物，产污系数备注为指采用重油、煤焦油为燃料；
- particles (PM2.5 - PM10): 0.041
  the Technical of end-of-pipe management technology for pollution particles (PM2.5 - PM10)isElectric-bag composite precipitator，Its Technical efficiency of end-of-pipe management95
  污染物指标颗粒物的末端治理技术是电袋组合，其效率为95，末端治理设施实际运行率（k值）计算公式为k=处理设施耗电量（千瓦时/年）/（设备额定功率（千瓦）×设备运行时间（小时/年））。原文件中描述污染物类别为废气，污染物指标为颗粒物，此处对其进行了匹配工作，将其匹配到LCAflow库里面相最符合的流，污染物指标备注为颗粒物，产污系数备注为指采用石油焦为燃料。
- particles (PM2.5 - PM10): 0.075
  the Technical of end-of-pipe management technology for pollution particles (PM2.5 - PM10)isElectrostatic precipitation，Its Technical efficiency of end-of-pipe management90
  污染物指标颗粒物的末端治理技术是静电除尘，其效率为90，末端治理设施实际运行率（k值）计算公式为k=处理设施耗电量（千瓦时/年）/（设备额定功率（千瓦）×设备运行时间（小时/年））。原文件中描述污染物类别为废气，污染物指标为颗粒物，此处对其进行了匹配工作，将其匹配到LCAflow库里面相最符合的流，污染物指标备注为颗粒物，产污系数备注为指采用重油、煤焦油为燃料；
- particles (PM2.5 - PM10): 0.082
  the Technical of end-of-pipe management technology for pollution particles (PM2.5 - PM10)isElectrostatic precipitation，Its Technical efficiency of end-of-pipe management90
  污染物指标颗粒物的末端治理技术是静电除尘，其效率为90，末端治理设施实际运行率（k值）计算公式为k=处理设施耗电量（千瓦时/年）/（设备额定功率（千瓦）×设备运行时间（小时/年））。原文件中描述污染物类别为废气，污染物指标为颗粒物，此处对其进行了匹配工作，将其匹配到LCAflow库里面相最符合的流，污染物指标备注为颗粒物，产污系数备注为指采用石油焦为燃料。
- Waste water: 260
  the Technical of end-of-pipe management technology for pollution Waste wateris/，Its Technical efficiency of end-of-pipe management0
  污染物指标工业废水量的末端治理技术是/，其效率为0。原文件中描述污染物类别为废水，污染物指标为工业废水量，此处对其进行了匹配工作，将其匹配到LCAflow库里面相最符合的流，污染物指标备注为工业废水量
- Petroleum-related waste: 0.000336
  the Technical of end-of-pipe management technology for pollution Petroleum-related wasteisFloating separation + precipitation separation，Its Technical efficiency of end-of-pipe management88
  污染物指标石油类的末端治理技术是上浮分离+沉淀分离，其效率为88，末端治理设施实际运行率（k值）计算公式为k=处理设施耗电量（千瓦时/年）/（设备额定功率（千瓦）×设备运行时间（小时/年））。原文件中描述污染物类别为废水，污染物指标为石油类，此处对其进行了匹配工作，将其匹配到LCAflow库里面相最符合的流，污染物指标备注为石油类
- sulfur dioxide: 0.3464, 0.433 (2 entries)
  the Technical of end-of-pipe management technology for pollution sulfur dioxideisLimestone/gypsum method, double alkali method, ammonia method，Its Technical efficiency of end-of-pipe management90①92②
  污染物指标二氧化硫的末端治理技术是石灰石/石膏法、双碱法、氨法，其效率为90①92②，末端治理设施实际运行率（k值）计算公式为k=处理设施耗电量（千瓦时/年）/（设备额定功率（千瓦）×设备运行时间（小时/年）），除非另外说明，本系数表中①指采用重油、煤焦油为燃料；②指采用石油焦为燃料。。原文件中描述污染物类别为废气，污染物指标为二氧化硫，此处对其进行了匹配工作，将其匹配到LCAflow库里面相最符合的流，污染物指标备注为二氧化硫，产污系数备注为指采用重油、煤焦油为燃料；
- sulfur dioxide: 0.5196, 0.6495 (2 entries)
  the Technical of end-of-pipe management technology for pollution sulfur dioxideisRotary spray drying method, flue gas circulating fluidized bed method, other，Its Technical efficiency of end-of-pipe management85①88②
  污染物指标二氧化硫的末端治理技术是旋转喷雾干燥法、烟气循环流化床法、其他，其效率为85①88②，末端治理设施实际运行率（k值）计算公式为k=处理设施耗电量（千瓦时/年）/（设备额定功率（千瓦）×设备运行时间（小时/年）），除非另外说明，本系数表中①指采用重油、煤焦油为燃料；②指采用石油焦为燃料。。原文件中描述污染物类别为废气，污染物指标为二氧化硫，此处对其进行了匹配工作，将其匹配到LCAflow库里面相最符合的流，污染物指标备注为二氧化硫，产污系数备注为指采用重油、煤焦油为燃料；
- sulfur dioxide: 0.7648, 0.956 (2 entries)
  the Technical of end-of-pipe management technology for pollution sulfur dioxideisLimestone/gypsum method, double alkali method, ammonia method，Its Technical efficiency of end-of-pipe management90①92②
  污染物指标二氧化硫的末端治理技术是石灰石/石膏法、双碱法、氨法，其效率为90①92②，末端治理设施实际运行率（k值）计算公式为k=处理设施耗电量（千瓦时/年）/（设备额定功率（千瓦）×设备运行时间（小时/年）），除非另外说明，本系数表中①指采用重油、煤焦油为燃料；②指采用石油焦为燃料。。原文件中描述污染物类别为废气，污染物指标为二氧化硫，此处对其进行了匹配工作，将其匹配到LCAflow库里面相最符合的流，污染物指标备注为二氧化硫，产污系数备注为指采用石油焦为燃料。
- Nitrogen oxides: 1.113
  the Technical of end-of-pipe management technology for pollution Nitrogen oxidesisSCR，Its Technical efficiency of end-of-pipe management85
  污染物指标氮氧化物的末端治理技术是选择性催化还原法，其效率为85，末端治理设施实际运行率（k值）计算公式为k=处理设施耗电量（千瓦时/年）/（设备额定功率（千瓦）×设备运行时间（小时/年））。原文件中描述污染物类别为废气，污染物指标为氮氧化物，此处对其进行了匹配工作，将其匹配到LCAflow库里面相最符合的流，污染物指标备注为氮氧化物
- sulfur dioxide: 1.1472, 1.434 (2 entries)
  the Technical of end-of-pipe management technology for pollution sulfur dioxideisRotary spray drying method, flue gas circulating fluidized bed method, other，Its Technical efficiency of end-of-pipe management85①88②
  污染物指标二氧化硫的末端治理技术是旋转喷雾干燥法、烟气循环流化床法、其他，其效率为85①88②，末端治理设施实际运行率（k值）计算公式为k=处理设施耗电量（千瓦时/年）/（设备额定功率（千瓦）×设备运行时间（小时/年）），除非另外说明，本系数表中①指采用重油、煤焦油为燃料；②指采用石油焦为燃料。。原文件中描述污染物类别为废气，污染物指标为二氧化硫，此处对其进行了匹配工作，将其匹配到LCAflow库里面相最符合的流，污染物指标备注为二氧化硫，产污系数备注为指采用石油焦为燃料。
- chemical oxygen demand: 0.009255
  the Technical of end-of-pipe management technology for pollution chemical oxygen demandisFloating separation + precipitation separation，Its Technical efficiency of end-of-pipe management85
  污染物指标化学需氧量的末端治理技术是上浮分离+沉淀分离，其效率为85，末端治理设施实际运行率（k值）计算公式为k=处理设施耗电量（千瓦时/年）/（设备额定功率（千瓦）×设备运行时间（小时/年））。原文件中描述污染物类别为废水，污染物指标为化学需氧量，此处对其进行了匹配工作，将其匹配到LCAflow库里面相最符合的流，污染物指标备注为化学需氧量
- Exhaust gas: 1255, 4250 (2 entries)
  the Technical of end-of-pipe management technology for pollution Exhaust gasis/，Its Technical efficiency of end-of-pipe management0
  污染物指标工业废气量的末端治理技术是/，其效率为0。原文件中描述污染物类别为废气，污染物指标为工业废气量，此处对其进行了匹配工作，将其匹配到LCAflow库里面相最符合的流，污染物指标备注为工业废气量

## Use advice
This dataset is derived from the Pollution Source Census Report and contains information on pollution emissions and related products. However, it does not include data on energy or chemical consumption, nor does it provide information on waste or co-product generation. When utilizing this dataset, please supplement the missing data based on actual conditions before use
该数据集来源于污染源普查报告，包含污染物排放及相关产品信息，但不包含能源或化学品消耗数据，也不提供废弃物或共生产物产生信息。在使用该数据集时，请根据实际情况补充缺失数据后再使用。

## Review details
Inventory: The internal review was done by several iteration steps concerning raw data validation, raw data documentation, representativity, completeness and consistency of modelling with regard to ISO 14040 and 14044.
清单： 内部审查通过几个迭代步骤完成，涉及原始数据验证、原始数据记录、代表性、完整性、与 ISO 14040 和 14044 有关的建模的一致性。

## Data sources
- 第二次全国污染源普查产排污核算系数手册（试用版）,二级代码30,四级代码3041文件，在完整版文件中第3413页
