# Cement clinker calcination;cement clinker;fluidized bed;phosphogypsum

Dataset: ILCD process, Unit process, single operation
Geography: YN-CN
Reference year: 2013
Classification: Unit processes / Materials production / Inorganic chemicals
Generated by: ZengAo, m202374287@hust.edu.cn
Owner: Tiangong LCI Data Working Group
Review: Dependent internal review by Tiangong LCI Data Working Group
Amounts: no units in this file; such an amount is in the reference unit of its flow, which a separate flow dataset defines
copyright: false
licenseType: Free of charge for all users and uses

## General comment
流化床工艺，先分解后煅烧的“二步法”

## Geography
数据来源于中试生产数据与理论计算

## Technology and included processes
循环流化床分解

## Technical purpose
This cement clinker calcination process utilizes a fluidized bed technique with a two-step approach - 'decomposition and then calcination' in a single unit operation. Its application is in the production of cement clinker using phosphogypsum as a raw material. The process encompasses the creation of cement clinker and is specifically designed for medium-scale production facilities where experimental production data and theoretical calculations are utilized to optimize material and energy consumption.

## Reference product
- portland cement (CEM I): 1; calculated
  The original data is cement clinker, and the selected flow is ordinary Portland cement.

## Inputs
- hard coal,hard coal: 0.175; calculated
- Phosphogypsum: 2.25; calculated
- industrial area: 0.0018; calculated

## Outputs
- carbon dioxide (fossil),carbon dioxide (fossil): 0.329; calculated
- sulfur dioxide: 0.916; calculated
- nitrous oxide: 0.007; calculated
- carbon monoxide,carbon monoxide (fossil): 0.164; calculated

## Data selection and combination
数据结合实测数据与理论计算

## Data treatment and extrapolations
从 物 耗、能 耗两部分入手，通过实 测 数 据 和 ＦａｃｔＳａｇｅ６．１ 软 件 计 算 得 出 的 热 力 学 数 据 ，得 出 清 单

## Use advice
Data for this dataset originates from medium-scale trial production and is combined with theoretical calculations for decomposition using a circulating fluidized bed. Users should note that the inventory for 1kg of cement clinker includes all major raw materials and all necessary energy, excluding the production process of the raw materials and very minor energy flows (less than 1%). Systematic exclusions apply to infrastructure, services, or auxiliary facilities. The dataset should be applied with FactSage 6.1 software for accurate thermodynamic data. Specific attention should be given to the methodological context of the raw material production processes and potential energy mix variations when utilizing this data for Life Cycle Assessment studies.

## Review details
Inventory: The internal review was done by several iteration steps concerning raw data validation, raw data documentation, representativity, completeness and consistency of modelling with regard to ISO 14040 and 14044.

## Data sources
- 张杭 et al. 不同分解工艺下磷石膏分解制水泥熟料的LCA研究. 材料导报 27, 302–305 (2013).
