# Liquid electrolysis ; Manganese Metal ; Manganese Ore Powder ; Electrolytic method - potassium dichromate passivation ; greater than or equal to30000 t; NESPS2 / 制液电解 ; 金属锰 ; 锰矿粉 ; 电解法-重铬酸钾钝化 ; 大于等于3万吨 ; 全国第二次污染普查数据

Dataset: ILCD process, Unit process, single operation
Geography: CN
Reference year: 2019
Classification: Reference Parameters / Materials production / Metals and semimetals
Generated by: The data was created by the Office of the Second National Pollution Source Census of the Ministry of Ecology and Environment, and the data was organized by the TianGong Plan team for ILCD format / 生态环境部第二次全国污染源普查工作办公室创建数据，天工计划团队常慧敏整理数据为ILCD格式
Owner: Tiangong LCI Data Working Group / 天工LCI数据工作小组
Review: Dependent internal review by Tiangong LCI Data Working Group / 天工LCI数据工作小组
Amounts: no units in this file; such an amount is in the reference unit of its flow, which a separate flow dataset defines
copyright: false
licenseType: Free of charge for all users and uses

## General comment
the Technical of end-of-pipe management technology for pollution Exhaust gasis/

## Technical purpose
该工业过程专用于使用锰矿粉生产电解金属锰，并采用重铬酸钾钝化步骤进行表面处理。该过程对于需要高纯度锰的制造应用非常重要，例如特种合金、电池制造和高档钢材生产。通过此过程生产的锰可能用于要求大量生产的行业，由运营规模大于或等于3万吨证明。此外，废水和废气处理采用了末端处理污染管理技术，结合了氧化还原过程、化学沉淀、物理处理（剥离）和膜分离，以高效率去除废水中的化学需氧量、氨氮、有机结合氮、总磷和铬等污染物。

## Reference product
- Manganese ore: 1000; calculated
  源文件中描述为为金属锰，此处对其进行了匹配工作，将其匹配到LCAflow库里面相最符合的流，污染物指标备注为工业废水量

## Outputs
All rows: calculated
- chemical oxygen demand: 0.00156
  the Technical of end-of-pipe management technology for pollution chemical oxygen demandisRedox process + membrane separation，Its Technical efficiency of end-of-pipe management99
  污染物指标化学需氧量的末端治理技术是氧化还原法+膜分离，其效率为99，末端治理设施实际运行率（k值）计算公式为k=1-T废水铬锰治理设施非正常运行时间（小时）/T废水铬锰治理设施运行时间（小时）。原文件中描述污染物类别为废水，污染物指标为化学需氧量，此处对其进行了匹配工作，将其匹配到LCAflow库里面相最符合的流，污染物指标备注为化学需氧量
- Nitrogen, organic bound: 0.00298
  the Technical of end-of-pipe management technology for pollution Nitrogen, organic boundisRedox process + membrane separation，Its Technical efficiency of end-of-pipe management99.9
  污染物指标总氮的末端治理技术是氧化还原法+膜分离，其效率为99.9，末端治理设施实际运行率（k值）计算公式为k=1-T废水铬锰治理设施非正常运行时间（小时）/T废水铬锰治理设施运行时间（小时）。原文件中描述污染物类别为废水，污染物指标为总氮，此处对其进行了匹配工作，将其匹配到LCAflow库里面相最符合的流，污染物指标备注为总氮
- Ammonia Nitrogen: 0.0062
  the Technical of end-of-pipe management technology for pollution Ammonia NitrogenisRedox process + membrane separation，Its Technical efficiency of end-of-pipe management99.6
  污染物指标氨氮的末端治理技术是氧化还原法+膜分离，其效率为99.6，末端治理设施实际运行率（k值）计算公式为k=1-T废水氨氮治理设施非正常运行时间（小时）/T废水氨氮治理设施运行时间（小时）。原文件中描述污染物类别为废水，污染物指标为氨氮，此处对其进行了匹配工作，将其匹配到LCAflow库里面相最符合的流，污染物指标备注为氨氮
- Ammonia Nitrogen: 0.0124
  the Technical of end-of-pipe management technology for pollution Ammonia NitrogenisRedox process + chemical precipitation + physical treatment (stripping)，Its Technical efficiency of end-of-pipe management99.2
  污染物指标氨氮的末端治理技术是氧化还原法+化学沉淀法+物理处理法(吹脱法)，其效率为99.2，末端治理设施实际运行率（k值）计算公式为k=1-T废水氨氮治理设施非正常运行时间（小时）/T废水氨氮治理设施运行时间（小时）。原文件中描述污染物类别为废水，污染物指标为氨氮，此处对其进行了匹配工作，将其匹配到LCAflow库里面相最符合的流，污染物指标备注为氨氮
- Chromium: 2.48e-5
  the Technical of end-of-pipe management technology for pollution ChromiumisRedox process + chemical precipitation + physical treatment (stripping)，Its Technical efficiency of end-of-pipe management99.9
  污染物指标六价铬的末端治理技术是氧化还原法+化学沉淀法+物理处理法(吹脱法)，其效率为99.9，末端治理设施实际运行率（k值）计算公式为k=1-T废水铬锰治理设施非正常运行时间（小时）/T废水铬锰治理设施运行时间（小时）。原文件中描述污染物类别为废气，污染物指标为六价铬，此处对其进行了匹配工作，将其匹配到LCAflow库里面相最符合的流，污染物指标备注为六价铬
- Chromium: 2.48e-5
  the Technical of end-of-pipe management technology for pollution ChromiumisRedox process + chemical precipitation，Its Technical efficiency of end-of-pipe management99.9
  污染物指标六价铬的末端治理技术是氧化还原法+化学沉淀法，其效率为99.9，末端治理设施实际运行率（k值）计算公式为k=1-T废水铬锰治理设施非正常运行时间（小时）/T废水铬锰治理设施运行时间（小时）。原文件中描述污染物类别为废气，污染物指标为六价铬，此处对其进行了匹配工作，将其匹配到LCAflow库里面相最符合的流，污染物指标备注为六价铬
- Chromium: 4.96e-5
  the Technical of end-of-pipe management technology for pollution ChromiumisRedox process + membrane separation，Its Technical efficiency of end-of-pipe management99.8
  污染物指标六价铬的末端治理技术是氧化还原法+膜分离，其效率为99.8，末端治理设施实际运行率（k值）计算公式为k=1-T废水铬锰治理设施非正常运行时间（小时）/T废水铬锰治理设施运行时间（小时）。原文件中描述污染物类别为废气，污染物指标为六价铬，此处对其进行了匹配工作，将其匹配到LCAflow库里面相最符合的流，污染物指标备注为六价铬
- chemical oxygen demand: 0.06552
  the Technical of end-of-pipe management technology for pollution chemical oxygen demandisRedox process + chemical precipitation + physical treatment (stripping)，Its Technical efficiency of end-of-pipe management58
  污染物指标化学需氧量的末端治理技术是氧化还原法+化学沉淀法+物理处理法(吹脱法)，其效率为58，末端治理设施实际运行率（k值）计算公式为k=1-T废水铬锰治理设施非正常运行时间（小时）/T废水铬锰治理设施运行时间（小时）。原文件中描述污染物类别为废水，污染物指标为化学需氧量，此处对其进行了匹配工作，将其匹配到LCAflow库里面相最符合的流，污染物指标备注为化学需氧量
- phosphorus, total: 6.72e-5
  the Technical of end-of-pipe management technology for pollution phosphorus, totalisRedox process + membrane separation，Its Technical efficiency of end-of-pipe management99.4
  污染物指标总磷的末端治理技术是氧化还原法+膜分离，其效率为99.4，末端治理设施实际运行率（k值）计算公式为k=1-T废水铬锰治理设施非正常运行时间（小时）/T废水铬锰治理设施运行时间（小时）。原文件中描述污染物类别为废水，污染物指标为总磷，此处对其进行了匹配工作，将其匹配到LCAflow库里面相最符合的流，污染物指标备注为总磷
- Chromium: 7.24e-5
  the Technical of end-of-pipe management technology for pollution ChromiumisRedox process + chemical precipitation + physical treatment (stripping)，Its Technical efficiency of end-of-pipe management99.8
  污染物指标总铬的末端治理技术是氧化还原法+化学沉淀法+物理处理法(吹脱法)，其效率为99.8，末端治理设施实际运行率（k值）计算公式为k=1-T废水铬锰治理设施非正常运行时间（小时）/T废水铬锰治理设施运行时间（小时）。原文件中描述污染物类别为废气，污染物指标为总铬，此处对其进行了匹配工作，将其匹配到LCAflow库里面相最符合的流，污染物指标备注为总铬
- chemical oxygen demand: 0.08736
  the Technical of end-of-pipe management technology for pollution chemical oxygen demandisRedox process + chemical precipitation，Its Technical efficiency of end-of-pipe management44
  污染物指标化学需氧量的末端治理技术是氧化还原法+化学沉淀法，其效率为44，末端治理设施实际运行率（k值）计算公式为k=1-T废水铬锰治理设施非正常运行时间（小时）/T废水铬锰治理设施运行时间（小时）。原文件中描述污染物类别为废水，污染物指标为化学需氧量，此处对其进行了匹配工作，将其匹配到LCAflow库里面相最符合的流，污染物指标备注为化学需氧量
- Nitrogen, organic bound: 0.1043
  the Technical of end-of-pipe management technology for pollution Nitrogen, organic boundisRedox process + chemical precipitation + physical treatment (stripping)，Its Technical efficiency of end-of-pipe management96.5
  污染物指标总氮的末端治理技术是氧化还原法+化学沉淀法+物理处理法(吹脱法)，其效率为96.5，末端治理设施实际运行率（k值）计算公式为k=1-T废水铬锰治理设施非正常运行时间（小时）/T废水铬锰治理设施运行时间（小时）。原文件中描述污染物类别为废水，污染物指标为总氮，此处对其进行了匹配工作，将其匹配到LCAflow库里面相最符合的流，污染物指标备注为总氮
- Nitrogen, organic bound: 0.13112
  the Technical of end-of-pipe management technology for pollution Nitrogen, organic boundisRedox process + chemical precipitation，Its Technical efficiency of end-of-pipe management95.6
  污染物指标总氮的末端治理技术是氧化还原法+化学沉淀法，其效率为95.6，末端治理设施实际运行率（k值）计算公式为k=1-T废水铬锰治理设施非正常运行时间（小时）/T废水铬锰治理设施运行时间（小时）。原文件中描述污染物类别为废水，污染物指标为总氮，此处对其进行了匹配工作，将其匹配到LCAflow库里面相最符合的流，污染物指标备注为总氮
- Chromium: 0.0002172
  the Technical of end-of-pipe management technology for pollution ChromiumisRedox process + membrane separation，Its Technical efficiency of end-of-pipe management99.4
  污染物指标总铬的末端治理技术是氧化还原法+膜分离，其效率为99.4，末端治理设施实际运行率（k值）计算公式为k=1-T废水铬锰治理设施非正常运行时间（小时）/T废水铬锰治理设施运行时间（小时）。原文件中描述污染物类别为废气，污染物指标为总铬，此处对其进行了匹配工作，将其匹配到LCAflow库里面相最符合的流，污染物指标备注为总铬
- Ammonia Nitrogen: 0.31
  the Technical of end-of-pipe management technology for pollution Ammonia NitrogenisRedox process + chemical precipitation，Its Technical efficiency of end-of-pipe management80
  污染物指标氨氮的末端治理技术是氧化还原法+化学沉淀法，其效率为80，末端治理设施实际运行率（k值）计算公式为k=1-T废水氨氮治理设施非正常运行时间（小时）/T废水氨氮治理设施运行时间（小时）。原文件中描述污染物类别为废水，污染物指标为氨氮，此处对其进行了匹配工作，将其匹配到LCAflow库里面相最符合的流，污染物指标备注为氨氮
- phosphorus, total: 0.0003136
  the Technical of end-of-pipe management technology for pollution phosphorus, totalisRedox process + chemical precipitation + physical treatment (stripping)，Its Technical efficiency of end-of-pipe management97.2
  污染物指标总磷的末端治理技术是氧化还原法+化学沉淀法+物理处理法(吹脱法)，其效率为97.2，末端治理设施实际运行率（k值）计算公式为k=1-T废水铬锰治理设施非正常运行时间（小时）/T废水铬锰治理设施运行时间（小时）。原文件中描述污染物类别为废水，污染物指标为总磷，此处对其进行了匹配工作，将其匹配到LCAflow库里面相最符合的流，污染物指标备注为总磷
- Chromium: 0.000362
  the Technical of end-of-pipe management technology for pollution ChromiumisRedox process + chemical precipitation，Its Technical efficiency of end-of-pipe management99
  污染物指标总铬的末端治理技术是氧化还原法+化学沉淀法，其效率为99，末端治理设施实际运行率（k值）计算公式为k=1-T废水铬锰治理设施非正常运行时间（小时）/T废水铬锰治理设施运行时间（小时）。原文件中描述污染物类别为废水，污染物指标为总铬，此处对其进行了匹配工作，将其匹配到LCAflow库里面相最符合的流，污染物指标备注为总铬
- Waste water: 1270
  the Technical of end-of-pipe management technology for pollution Waste wateris/
  污染物指标工业废水量的末端治理技术是/，末端治理设施实际运行率（k值）计算公式为/。原文件中描述污染物类别为废水，污染物指标为工业废水量，此处对其进行了匹配工作，将其匹配到LCAflow库里面相最符合的流，污染物指标备注为工业废水量
- phosphorus, total: 0.001904
  the Technical of end-of-pipe management technology for pollution phosphorus, totalisRedox process + chemical precipitation，Its Technical efficiency of end-of-pipe management83
  污染物指标总磷的末端治理技术是氧化还原法+化学沉淀法，其效率为83，末端治理设施实际运行率（k值）计算公式为k=1-T废水铬锰治理设施非正常运行时间（小时）/T废水铬锰治理设施运行时间（小时）。原文件中描述污染物类别为废水，污染物指标为总磷，此处对其进行了匹配工作，将其匹配到LCAflow库里面相最符合的流，污染物指标备注为总磷
- ammonia: 0.0473
  the Technical of end-of-pipe management technology for pollution ammoniaisUnorganized
  污染物指标氨的末端治理技术是无组织，末端治理设施实际运行率（k值）计算公式为/。原文件中描述污染物类别为废气，污染物指标为氨，此处对其进行了匹配工作，将其匹配到LCAflow库里面相最符合的流，污染物指标备注为氨
- Exhaust gas: 3477
  the Technical of end-of-pipe management technology for pollution Exhaust gasis/
  污染物指标工业废气量的末端治理技术是/，末端治理设施实际运行率（k值）计算公式为/。原文件中描述污染物类别为废气，污染物指标为工业废气量，此处对其进行了匹配工作，将其匹配到LCAflow库里面相最符合的流，污染物指标备注为工业废气量

## Use advice
This dataset is derived from the Pollution Source Census Report and contains information on pollution emissions and related products. However, it does not include data on energy or chemical consumption, nor does it provide information on waste or co-product generation. When utilizing this dataset, please supplement the missing data based on actual conditions before use
该数据集来源于污染源普查报告，包含污染物排放及相关产品信息，但不包含能源或化学品消耗数据，也不提供废弃物或共生产物产生信息。在使用该数据集时，请根据实际情况补充缺失数据后再使用。

## Review details
Inventory: The internal review was done by several iteration steps concerning raw data validation, raw data documentation, representativity, completeness and consistency of modelling with regard to ISO 14040 and 14044.
清单： 内部审查通过几个迭代步骤完成，涉及原始数据验证、原始数据记录、代表性、完整性、与 ISO 14040 和 14044 有关的建模的一致性。

## Data sources
- 第二次全国污染源普查产排污核算系数手册（试用版）,四级代码3140文件，在完整版文件中第4111页
