# Genetically engineered drugs and vaccines ; Microorganisms and microbial metabolites or animal serum ; Bioengineering process ; greater than or equal to10000 kg/a; NESPS2 / 基因工程药物和疫苗 ; 微生物及微生物代谢产物或动物血清 ; 生物工程工艺 ; 大于等于10000千克/年 ; 全国第二次污染普查数据

Dataset: ILCD process, Unit process, single operation
Geography: CN
Reference year: 2019
Classification: Reference Parameters / Other Services / Research and development
Generated by: The data was created by the Office of the Second National Pollution Source Census of the Ministry of Ecology and Environment, and the data was organized by the TianGong Plan team for ILCD format / 生态环境部第二次全国污染源普查工作办公室创建数据，天工计划团队常慧敏整理数据为ILCD格式
Owner: Tiangong LCI Data Working Group / 天工LCI数据工作小组
Review: Dependent internal review by Tiangong LCI Data Working Group / 天工LCI数据工作小组
Amounts: no units in this file; such an amount is in the reference unit of its flow, which a separate flow dataset defines
copyright: false
licenseType: Free of charge for all users and uses

## General comment
the Technical of end-of-pipe management technology for pollution Waste wateris/，The formula for calculating the actual operation rate (k-value) of the end-of-pipe treatment facility is k = annual operating time of wastewater treatment facilities (hours) / annual normal production time of enterprises (hours)

## Technical purpose
此技术应用涉及年产量大于或等于10000千克的基因工程药物和疫苗、微生物及其代谢产物或动物血清的生物工程工艺。 该工业过程产生的废水通过各种尾端处理技术进行管理，包括物理化学处理、好氧和缺氧生物处理以及厌氧水解。 这些技术的效率根据它们的组合和正在处理的特定污染物而变化，根据化学需氧量 (COD)、氨氮、有机结合氮、总磷和挥发性有机化合物 (VOCs) 来衡量。

## Reference product
- Genetic Engineering Drugs and Vaccines: 1; calculated
  源文件中描述为为基因工程药物和疫苗，此处对其进行了匹配工作，将其匹配到LCAflow库里面相最符合的流，污染物指标备注为废水量

## Outputs
All rows: calculated
- phosphorus, total: 6e-5
  the Technical of end-of-pipe management technology for pollution phosphorus, totalisPhysicochemical treatment + anaerobic biological treatment + anoxic/aerobic biological treatment，Its Technical efficiency of end-of-pipe management99，The formula for calculating the actual operation rate (k-value) of the end-of-pipe treatment facility is k = annual operating time of wastewater treatment facilities (hours) / annual normal production time of enterprises (hours)
  污染物指标总磷的末端治理技术是物化处理+厌氧生物处理+缺氧/好氧生物处理，其效率为99，末端治理设施实际运行率（k值）计算公式为k=治理设施运行时间（天）/正常生产时间（天。原文件中描述污染物类别为废水，污染物指标为总磷，此处对其进行了匹配工作，将其匹配到LCAflow库里面相最符合的流，污染物指标备注为总磷
- phosphorus, total: 9e-5
  the Technical of end-of-pipe management technology for pollution phosphorus, totalisPhysicochemical treatment + anoxic/aerobic biological treatment，Its Technical efficiency of end-of-pipe management98.5，The formula for calculating the actual operation rate (k-value) of the end-of-pipe treatment facility is k = annual operating time of wastewater treatment facilities (hours) / annual normal production time of enterprises (hours)
  污染物指标总磷的末端治理技术是物化处理+缺氧/好氧生物处理，其效率为98.5，末端治理设施实际运行率（k值）计算公式为k=治理设施运行时间（天）/正常生产时间（天。原文件中描述污染物类别为废水，污染物指标为总磷，此处对其进行了匹配工作，将其匹配到LCAflow库里面相最符合的流，污染物指标备注为总磷
- phosphorus, total: 0.000138
  the Technical of end-of-pipe management technology for pollution phosphorus, totalisPhysicochemical treatment + anaerobic hydrolysis + aerobic biological treatment，Its Technical efficiency of end-of-pipe management97.7，The formula for calculating the actual operation rate (k-value) of the end-of-pipe treatment facility is k = annual operating time of wastewater treatment facilities (hours) / annual normal production time of enterprises (hours)
  污染物指标总磷的末端治理技术是物化处理+厌氧水解+好氧生物处理，其效率为97.7，末端治理设施实际运行率（k值）计算公式为k=治理设施运行时间（天）/正常生产时间（天。原文件中描述污染物类别为废水，污染物指标为总磷，此处对其进行了匹配工作，将其匹配到LCAflow库里面相最符合的流，污染物指标备注为总磷
- phosphorus, total: 0.00021
  the Technical of end-of-pipe management technology for pollution phosphorus, totalisPhysicochemical treatment + aerobic biological treatment，Its Technical efficiency of end-of-pipe management96.5，The formula for calculating the actual operation rate (k-value) of the end-of-pipe treatment facility is k = annual operating time of wastewater treatment facilities (hours) / annual normal production time of enterprises (hours)
  污染物指标总磷的末端治理技术是物化处理法+好氧生物处理法，其效率为96.5，末端治理设施实际运行率（k值）计算公式为k=治理设施运行时间（天）/正常生产时间（天。原文件中描述污染物类别为废水，污染物指标为总磷，此处对其进行了匹配工作，将其匹配到LCAflow库里面相最符合的流，污染物指标备注为总磷
- phosphorus, total: 0.0006
  the Technical of end-of-pipe management technology for pollution phosphorus, totalisOther，Its Technical efficiency of end-of-pipe management90，The formula for calculating the actual operation rate (k-value) of the end-of-pipe treatment facility is k = annual operating time of wastewater treatment facilities (hours) / annual normal production time of enterprises (hours)
  污染物指标总磷的末端治理技术是其他，其效率为90，末端治理设施实际运行率（k值）计算公式为k=治理设施运行时间（天）/正常生产时间（天。原文件中描述污染物类别为废水，污染物指标为总磷，此处对其进行了匹配工作，将其匹配到LCAflow库里面相最符合的流，污染物指标备注为总磷
- volatile organic compound: 0.00161
  the Technical of end-of-pipe management technology for pollution volatile organic compoundisRegenerative catalytic combustion method，Its Technical efficiency of end-of-pipe management99，The formula for calculating the actual operation rate (k-value) of the end-of-pipe treatment facility is k = annual operating time of waste gas treatment facilities (hours) / annual normal production time of enterprises (hours)
  污染物指标挥发性有机物的末端治理技术是蓄热式催化燃烧法，其效率为99，末端治理设施实际运行率（k值）计算公式为k=治理设施运行时间（小时）/正常生产时间（小时）。原文件中描述污染物类别为废气，污染物指标为挥发性有机物，此处对其进行了匹配工作，将其匹配到LCAflow库里面相最符合的流，污染物指标备注为挥发性有机物
- volatile organic compound: 0.001932
  the Technical of end-of-pipe management technology for pollution volatile organic compoundisAdsorption + steam desorption，Its Technical efficiency of end-of-pipe management98.8，The formula for calculating the actual operation rate (k-value) of the end-of-pipe treatment facility is k = annual operating time of waste gas treatment facilities (hours) / annual normal production time of enterprises (hours)
  污染物指标挥发性有机物的末端治理技术是吸附+蒸气解析，其效率为98.8，末端治理设施实际运行率（k值）计算公式为k=治理设施运行时间（小时）/正常生产时间（小时）。原文件中描述污染物类别为废气，污染物指标为挥发性有机物，此处对其进行了匹配工作，将其匹配到LCAflow库里面相最符合的流，污染物指标备注为挥发性有机物
- Ammonia Nitrogen: 0.00305
  the Technical of end-of-pipe management technology for pollution Ammonia NitrogenisPhysicochemical treatment + anoxic/aerobic biological treatment，Its Technical efficiency of end-of-pipe management95，The formula for calculating the actual operation rate (k-value) of the end-of-pipe treatment facility is k = annual operating time of wastewater treatment facilities (hours) / annual normal production time of enterprises (hours)
  污染物指标氨氮的末端治理技术是物化处理+缺氧/好氧生物处理，其效率为95，末端治理设施实际运行率（k值）计算公式为k=治理设施运行时间（天）/正常生产时间（天。原文件中描述污染物类别为废水，污染物指标为氨氮，此处对其进行了匹配工作，将其匹配到LCAflow库里面相最符合的流，污染物指标备注为氨氮
- phosphorus, total: 0.006
  the Technical of end-of-pipe management technology for pollution phosphorus, totalisWithout terminal treatment technology，Its Technical efficiency of end-of-pipe management0，The formula for calculating the actual operation rate (k-value) of the end-of-pipe treatment facility is k = annual operating time of wastewater treatment facilities (hours) / annual normal production time of enterprises (hours)
  污染物指标总磷的末端治理技术是无末端治理技术，其效率为0，末端治理设施实际运行率（k值）计算公式为/。原文件中描述污染物类别为废水，污染物指标为总磷，此处对其进行了匹配工作，将其匹配到LCAflow库里面相最符合的流，污染物指标备注为总磷
- Ammonia Nitrogen: 0.0061
  the Technical of end-of-pipe management technology for pollution Ammonia NitrogenisOther，Its Technical efficiency of end-of-pipe management90，The formula for calculating the actual operation rate (k-value) of the end-of-pipe treatment facility is k = annual operating time of wastewater treatment facilities (hours) / annual normal production time of enterprises (hours)
  污染物指标氨氮的末端治理技术是其他，其效率为90，末端治理设施实际运行率（k值）计算公式为k=治理设施运行时间（天）/正常生产时间（天。原文件中描述污染物类别为废水，污染物指标为氨氮，此处对其进行了匹配工作，将其匹配到LCAflow库里面相最符合的流，污染物指标备注为氨氮
- Ammonia Nitrogen: 0.007747
  the Technical of end-of-pipe management technology for pollution Ammonia NitrogenisPhysicochemical treatment + anaerobic biological treatment + anoxic/aerobic biological treatment，Its Technical efficiency of end-of-pipe management87.3，The formula for calculating the actual operation rate (k-value) of the end-of-pipe treatment facility is k = annual operating time of wastewater treatment facilities (hours) / annual normal production time of enterprises (hours)
  污染物指标氨氮的末端治理技术是物化处理+厌氧生物处理+缺氧/好氧生物处理，其效率为87.3，末端治理设施实际运行率（k值）计算公式为k=治理设施运行时间（天）/正常生产时间（天。原文件中描述污染物类别为废水，污染物指标为氨氮，此处对其进行了匹配工作，将其匹配到LCAflow库里面相最符合的流，污染物指标备注为氨氮
- Ammonia Nitrogen: 0.011529
  the Technical of end-of-pipe management technology for pollution Ammonia NitrogenisPhysicochemical treatment + anaerobic hydrolysis + aerobic biological treatment，Its Technical efficiency of end-of-pipe management81.1，The formula for calculating the actual operation rate (k-value) of the end-of-pipe treatment facility is k = annual operating time of wastewater treatment facilities (hours) / annual normal production time of enterprises (hours)
  污染物指标氨氮的末端治理技术是物化处理+厌氧水解+好氧生物处理，其效率为81.1，末端治理设施实际运行率（k值）计算公式为k=治理设施运行时间（天）/正常生产时间（天。原文件中描述污染物类别为废水，污染物指标为氨氮，此处对其进行了匹配工作，将其匹配到LCAflow库里面相最符合的流，污染物指标备注为氨氮
- Ammonia Nitrogen: 0.011895
  the Technical of end-of-pipe management technology for pollution Ammonia NitrogenisPhysicochemical treatment + aerobic biological treatment，Its Technical efficiency of end-of-pipe management80.5，The formula for calculating the actual operation rate (k-value) of the end-of-pipe treatment facility is k = annual operating time of wastewater treatment facilities (hours) / annual normal production time of enterprises (hours)
  污染物指标氨氮的末端治理技术是物化处理法+好氧生物处理法，其效率为80.5，末端治理设施实际运行率（k值）计算公式为k=治理设施运行时间（天）/正常生产时间（天。原文件中描述污染物类别为废水，污染物指标为氨氮，此处对其进行了匹配工作，将其匹配到LCAflow库里面相最符合的流，污染物指标备注为氨氮
- chemical oxygen demand: 0.01344
  the Technical of end-of-pipe management technology for pollution chemical oxygen demandisPhysicochemical treatment + anaerobic biological treatment + anoxic/aerobic biological treatment，Its Technical efficiency of end-of-pipe management98.8，The formula for calculating the actual operation rate (k-value) of the end-of-pipe treatment facility is k = annual operating time of wastewater treatment facilities (hours) / annual normal production time of enterprises (hours)
  污染物指标化学需氧量的末端治理技术是物化处理+厌氧生物处理+缺氧/好氧生物处理，其效率为98.8，末端治理设施实际运行率（k值）计算公式为k=治理设施运行时间（天）/正常生产时间（天。原文件中描述污染物类别为废水，污染物指标为化学需氧量，此处对其进行了匹配工作，将其匹配到LCAflow库里面相最符合的流，污染物指标备注为化学需氧量
- Nitrogen, organic bound: 0.01365
  the Technical of end-of-pipe management technology for pollution Nitrogen, organic boundisPhysicochemical treatment + anaerobic biological treatment + anoxic/aerobic biological treatment，Its Technical efficiency of end-of-pipe management85，The formula for calculating the actual operation rate (k-value) of the end-of-pipe treatment facility is k = annual operating time of wastewater treatment facilities (hours) / annual normal production time of enterprises (hours)
  污染物指标总氮的末端治理技术是物化处理+厌氧生物处理+缺氧/好氧生物处理，其效率为85，末端治理设施实际运行率（k值）计算公式为k=治理设施运行时间（天）/正常生产时间（天。原文件中描述污染物类别为废水，污染物指标为总氮，此处对其进行了匹配工作，将其匹配到LCAflow库里面相最符合的流，污染物指标备注为总氮
- Nitrogen, organic bound: 0.015197
  the Technical of end-of-pipe management technology for pollution Nitrogen, organic boundisPhysicochemical treatment + anoxic/aerobic biological treatment，Its Technical efficiency of end-of-pipe management83.3，The formula for calculating the actual operation rate (k-value) of the end-of-pipe treatment facility is k = annual operating time of wastewater treatment facilities (hours) / annual normal production time of enterprises (hours)
  污染物指标总氮的末端治理技术是物化处理+缺氧/好氧生物处理，其效率为83.3，末端治理设施实际运行率（k值）计算公式为k=治理设施运行时间（天）/正常生产时间（天。原文件中描述污染物类别为废水，污染物指标为总氮，此处对其进行了匹配工作，将其匹配到LCAflow库里面相最符合的流，污染物指标备注为总氮
- volatile organic compound: 0.0161
  the Technical of end-of-pipe management technology for pollution volatile organic compoundisOther，Its Technical efficiency of end-of-pipe management90，The formula for calculating the actual operation rate (k-value) of the end-of-pipe treatment facility is k = annual operating time of waste gas treatment facilities (hours) / annual normal production time of enterprises (hours)
  污染物指标挥发性有机物的末端治理技术是其他，其效率为90，末端治理设施实际运行率（k值）计算公式为k=治理设施运行时间（小时）/正常生产时间（小时）。原文件中描述污染物类别为废气，污染物指标为挥发性有机物，此处对其进行了匹配工作，将其匹配到LCAflow库里面相最符合的流，污染物指标备注为挥发性有机物
- Nitrogen, organic bound: 0.0273
  the Technical of end-of-pipe management technology for pollution Nitrogen, organic boundisOther，Its Technical efficiency of end-of-pipe management70，The formula for calculating the actual operation rate (k-value) of the end-of-pipe treatment facility is k = annual operating time of wastewater treatment facilities (hours) / annual normal production time of enterprises (hours)
  污染物指标总氮的末端治理技术是其他，其效率为70，末端治理设施实际运行率（k值）计算公式为k=治理设施运行时间（天）/正常生产时间（天。原文件中描述污染物类别为废水，污染物指标为总氮，此处对其进行了匹配工作，将其匹配到LCAflow库里面相最符合的流，污染物指标备注为总氮
- Nitrogen, organic bound: 0.032487
  the Technical of end-of-pipe management technology for pollution Nitrogen, organic boundisPhysicochemical treatment + aerobic biological treatment，Its Technical efficiency of end-of-pipe management64.3，The formula for calculating the actual operation rate (k-value) of the end-of-pipe treatment facility is k = annual operating time of wastewater treatment facilities (hours) / annual normal production time of enterprises (hours)
  污染物指标总氮的末端治理技术是物化处理法+好氧生物处理法，其效率为64.3，末端治理设施实际运行率（k值）计算公式为k=治理设施运行时间（天）/正常生产时间（天。原文件中描述污染物类别为废水，污染物指标为总氮，此处对其进行了匹配工作，将其匹配到LCAflow库里面相最符合的流，污染物指标备注为总氮
- volatile organic compound: 0.04025
  the Technical of end-of-pipe management technology for pollution volatile organic compoundisCondensation，Its Technical efficiency of end-of-pipe management75，The formula for calculating the actual operation rate (k-value) of the end-of-pipe treatment facility is k = annual operating time of waste gas treatment facilities (hours) / annual normal production time of enterprises (hours)
  污染物指标挥发性有机物的末端治理技术是冷凝法，其效率为75，末端治理设施实际运行率（k值）计算公式为k=治理设施运行时间（小时）/正常生产时间（小时）。原文件中描述污染物类别为废气，污染物指标为挥发性有机物，此处对其进行了匹配工作，将其匹配到LCAflow库里面相最符合的流，污染物指标备注为挥发性有机物
- Nitrogen, organic bound: 0.04277
  the Technical of end-of-pipe management technology for pollution Nitrogen, organic boundisPhysicochemical treatment + anaerobic hydrolysis + aerobic biological treatment，Its Technical efficiency of end-of-pipe management53，The formula for calculating the actual operation rate (k-value) of the end-of-pipe treatment facility is k = annual operating time of wastewater treatment facilities (hours) / annual normal production time of enterprises (hours)
  污染物指标总氮的末端治理技术是物化处理+厌氧水解+好氧生物处理，其效率为53，末端治理设施实际运行率（k值）计算公式为k=治理设施运行时间（天）/正常生产时间（天。原文件中描述污染物类别为废水，污染物指标为总氮，此处对其进行了匹配工作，将其匹配到LCAflow库里面相最符合的流，污染物指标备注为总氮
- chemical oxygen demand: 0.05488
  the Technical of end-of-pipe management technology for pollution chemical oxygen demandisPhysicochemical treatment + anaerobic hydrolysis + aerobic biological treatment，Its Technical efficiency of end-of-pipe management95.1，The formula for calculating the actual operation rate (k-value) of the end-of-pipe treatment facility is k = annual operating time of wastewater treatment facilities (hours) / annual normal production time of enterprises (hours)
  污染物指标化学需氧量的末端治理技术是物化处理+厌氧水解+好氧生物处理，其效率为95.1，末端治理设施实际运行率（k值）计算公式为k=治理设施运行时间（天）/正常生产时间（天。原文件中描述污染物类别为废水，污染物指标为化学需氧量，此处对其进行了匹配工作，将其匹配到LCAflow库里面相最符合的流，污染物指标备注为化学需氧量
- Ammonia Nitrogen: 0.061
  the Technical of end-of-pipe management technology for pollution Ammonia NitrogenisWithout terminal treatment technology，Its Technical efficiency of end-of-pipe management0，The formula for calculating the actual operation rate (k-value) of the end-of-pipe treatment facility is k = annual operating time of wastewater treatment facilities (hours) / annual normal production time of enterprises (hours)
  污染物指标氨氮的末端治理技术是无末端治理技术，其效率为0，末端治理设施实际运行率（k值）计算公式为/。原文件中描述污染物类别为废水，污染物指标为氨氮，此处对其进行了匹配工作，将其匹配到LCAflow库里面相最符合的流，污染物指标备注为氨氮
- chemical oxygen demand: 0.07392
  the Technical of end-of-pipe management technology for pollution chemical oxygen demandisPhysicochemical treatment + anoxic/aerobic biological treatment，Its Technical efficiency of end-of-pipe management93.4，The formula for calculating the actual operation rate (k-value) of the end-of-pipe treatment facility is k = annual operating time of wastewater treatment facilities (hours) / annual normal production time of enterprises (hours)
  污染物指标化学需氧量的末端治理技术是物化处理+缺氧/好氧生物处理，其效率为93.4，末端治理设施实际运行率（k值）计算公式为k=治理设施运行时间（天）/正常生产时间（天。原文件中描述污染物类别为废水，污染物指标为化学需氧量，此处对其进行了匹配工作，将其匹配到LCAflow库里面相最符合的流，污染物指标备注为化学需氧量
- Nitrogen, organic bound: 0.091
  the Technical of end-of-pipe management technology for pollution Nitrogen, organic boundisWithout terminal treatment technology，Its Technical efficiency of end-of-pipe management0，The formula for calculating the actual operation rate (k-value) of the end-of-pipe treatment facility is k = annual operating time of wastewater treatment facilities (hours) / annual normal production time of enterprises (hours)
  污染物指标总氮的末端治理技术是无末端治理技术，其效率为0，末端治理设施实际运行率（k值）计算公式为/。原文件中描述污染物类别为废水，污染物指标为总氮，此处对其进行了匹配工作，将其匹配到LCAflow库里面相最符合的流，污染物指标备注为总氮
- chemical oxygen demand: 0.112
  the Technical of end-of-pipe management technology for pollution chemical oxygen demandisOther，Its Technical efficiency of end-of-pipe management90，The formula for calculating the actual operation rate (k-value) of the end-of-pipe treatment facility is k = annual operating time of wastewater treatment facilities (hours) / annual normal production time of enterprises (hours)
  污染物指标化学需氧量的末端治理技术是其他，其效率为90，末端治理设施实际运行率（k值）计算公式为k=治理设施运行时间（天）/正常生产时间（天。原文件中描述污染物类别为废水，污染物指标为化学需氧量，此处对其进行了匹配工作，将其匹配到LCAflow库里面相最符合的流，污染物指标备注为化学需氧量
- volatile organic compound: 0.1127
  the Technical of end-of-pipe management technology for pollution volatile organic compoundisLow temperature plasma，Its Technical efficiency of end-of-pipe management30，The formula for calculating the actual operation rate (k-value) of the end-of-pipe treatment facility is k = annual operating time of waste gas treatment facilities (hours) / annual normal production time of enterprises (hours)
  污染物指标挥发性有机物的末端治理技术是低温等离子体，其效率为30，末端治理设施实际运行率（k值）计算公式为k=治理设施运行时间（小时）/正常生产时间（小时）。原文件中描述污染物类别为废气，污染物指标为挥发性有机物，此处对其进行了匹配工作，将其匹配到LCAflow库里面相最符合的流，污染物指标备注为挥发性有机物
- chemical oxygen demand: 0.13552
  the Technical of end-of-pipe management technology for pollution chemical oxygen demandisPhysicochemical treatment + aerobic biological treatment，Its Technical efficiency of end-of-pipe management87.9，The formula for calculating the actual operation rate (k-value) of the end-of-pipe treatment facility is k = annual operating time of wastewater treatment facilities (hours) / annual normal production time of enterprises (hours)
  污染物指标化学需氧量的末端治理技术是物化处理法+好氧生物处理法，其效率为87.9，末端治理设施实际运行率（k值）计算公式为k=治理设施运行时间（天）/正常生产时间（天。原文件中描述污染物类别为废水，污染物指标为化学需氧量，此处对其进行了匹配工作，将其匹配到LCAflow库里面相最符合的流，污染物指标备注为化学需氧量
- volatile organic compound: 0.161
  the Technical of end-of-pipe management technology for pollution volatile organic compoundisWithout terminal treatment technology，Its Technical efficiency of end-of-pipe management0，The formula for calculating the actual operation rate (k-value) of the end-of-pipe treatment facility is k = annual operating time of waste gas treatment facilities (hours) / annual normal production time of enterprises (hours)
  污染物指标挥发性有机物的末端治理技术是无末端治理技术，其效率为0，末端治理设施实际运行率（k值）计算公式为/。原文件中描述污染物类别为废气，污染物指标为挥发性有机物，此处对其进行了匹配工作，将其匹配到LCAflow库里面相最符合的流，污染物指标备注为挥发性有机物
- chemical oxygen demand: 1.12
  the Technical of end-of-pipe management technology for pollution chemical oxygen demandisWithout terminal treatment technology，Its Technical efficiency of end-of-pipe management0，The formula for calculating the actual operation rate (k-value) of the end-of-pipe treatment facility is k = annual operating time of wastewater treatment facilities (hours) / annual normal production time of enterprises (hours)
  污染物指标化学需氧量的末端治理技术是无末端治理技术，其效率为0，末端治理设施实际运行率（k值）计算公式为/。原文件中描述污染物类别为废水，污染物指标为化学需氧量，此处对其进行了匹配工作，将其匹配到LCAflow库里面相最符合的流，污染物指标备注为化学需氧量
- Waste water: 7.18
  the Technical of end-of-pipe management technology for pollution Waste wateris/，The formula for calculating the actual operation rate (k-value) of the end-of-pipe treatment facility is k = annual operating time of wastewater treatment facilities (hours) / annual normal production time of enterprises (hours)
  污染物指标废水量的末端治理技术是/，末端治理设施实际运行率（k值）计算公式为/。原文件中描述污染物类别为废水，污染物指标为废水量，此处对其进行了匹配工作，将其匹配到LCAflow库里面相最符合的流，污染物指标备注为废水量

## Use advice
This dataset is derived from the Pollution Source Census Report and contains information on pollution emissions and related products. However, it does not include data on energy or chemical consumption, nor does it provide information on waste or co-product generation. When utilizing this dataset, please supplement the missing data based on actual conditions before use
该数据集来源于污染源普查报告，包含污染物排放及相关产品信息，但不包含能源或化学品消耗数据，也不提供废弃物或共生产物产生信息。在使用该数据集时，请根据实际情况补充缺失数据后再使用。

## Review details
Inventory: The internal review was done by several iteration steps concerning raw data validation, raw data documentation, representativity, completeness and consistency of modelling with regard to ISO 14040 and 14044.
清单： 内部审查通过几个迭代步骤完成，涉及原始数据验证、原始数据记录、代表性、完整性、与 ISO 14040 和 14044 有关的建模的一致性。

## Data sources
- 第二次全国污染源普查产排污核算系数手册（试用版）,二级代码27,三级代码276.0文件，在完整版文件中第3202页
