# Aluminum Recycling ; Recycled Aluminum Ingots ; Scrap Aluminum ; 2008

Dataset: ILCD process, Unit process, single operation
Geography: CN
Reference year: 2021
Classification: Unit processes / Materials production / Metals and semimetals
Generated by: Zimeng Cai, caizm6178@163.com
Owner: Tiangong LCI Data Working Group
Review: Dependent internal review by Tiangong LCI Data Working Group
Amounts: no units in this file; such an amount is in the reference unit of its flow, which a separate flow dataset defines
copyright: false
licenseType: Free of charge for all users and uses

## General comment
The recycled aluminum ingots produced from this process are typically used as raw material inputs for various manufacturing industries, such as automotive, construction, packaging, and electronics. The use of recycled aluminum instead of primary aluminum helps to reduce energy consumption and greenhouse gas emissions associated with the extraction and processing of virgin aluminum ore.

## Time period
Date of publication

## Reference product
- secondary aluminium ingot: 1000; missing unimportant
  ingot

## Inputs
- electricity, high voltage, aluminium industry: 925.2; missing unimportant
  electricity
- aluminium scrap, unspecified: 1350; missing unimportant
  aluminum scrap

## Data selection and combination
The data in this study refers to the LCA data of PA, SA, electricity, and other background data. The PA data were obtained from statistical data sources, and the SA data were mainly obtained from the literatures. The background data were mainly derived from the Chinese localization LCA database CAS RCEES 2018, which was established by the Research Center for Eco-Environmental Sciences, Chinese Academy of Sciences and covers LCA data for energy, materials, transportation, waste management etc.

## Use advice
When using this LCA data set, users should ensure that the temporal representativeness of the data (year 2008) aligns with their study period. The methodological consistency between the PA and SA data and the background datasets from the CAS RCEES 2018 database must be maintained. Attention should be given to the technological applicability specific to the region, as the background data may not be globally representative. Users should also consider the efficiency differences between the specific aluminum recycling process described and other available technologies, and apply appropriately in their LCA model.

## Review details
Inventory: The internal review was done by several iteration steps concerning raw data validation, raw data documentation, representativity, completeness and consistency of modelling with regard to ISO 14040 and 14044.

## Data sources
- Ding, N., Liu, N., Lu, B. & Yang, J. Life cycle greenhouse gas emissions of aluminum based on regional industrial transfer in China. J. Ind. Ecol. 25, 1657–1672 (2021).
