# Exhaust gases treated ; Soil ex-situ remediation ; Chemical Oxidation ; Secondary pollution disposal ; Treatment of wastewater and exhaust gas

Dataset: ILCD process, Unit process, black box
Geography: ZB-SD-CN
Reference year: 2024
Classification: Unit processes / Other Services / Repair and maintenance
Functional unit: Prevention and control of secondary pollution such as wastewater and exhaust gas generated during the ectopic chemical oxidation process of 59922m3 polluted soil.
Generated by: Yang Xintong, yangxt@caep.org.cn
Owner: Tiangong LCI Data Working Group
Review: Dependent internal review by Tiangong LCI Data Working Group
Amounts: no units in this file; such an amount is in the reference unit of its flow, which a separate flow dataset defines
copyright: false
licenseType: Free of charge for all users and uses

## General comment
Secondary pollution prevention and control includes the installation and operation of waste gas and wastewater pollution prevention and control facilities, as well as the disposal of hazardous waste

## Geography
The polluted site is located in Zibo City, Shandong Province, covering a total area of approximately 87800 m2.

## Technology and included processes
Construction enclosed shed with a size of 80m x 32m x 9m. The total area of the enclosed shed is 2560m2, and the thickness of the ground concrete is 20cm. The soil remediation process generates a total of 2481 m3 of wastewater, mainly from foundation pit wastewater and car washing pool wastewater. After being extracted and treated with chemical oxidation and coagulation sedimentation, it is discharged into the municipal sewage pipeline network. The chemical oxidation and coagulation agents are 2.5% sodium persulfate and 1 ‰ PAM+5% PAC, respectively; The restoration project generated a total of 4.19 tons of solid waste, all of which are hazardous waste, mainly activated carbon used for greenhouse exhaust gas adsorption and water treatment sludge, all of which are transported to qualified third-party units for disposal

## Technical purpose
The described industrial process is used for soil remediation at a polluted site through ex-situ chemical oxidation. The process involves constructing an enclosed shed to treat the polluted soil, managing wastewater and exhaust gases arising from the remediation, and ensuring secondary pollution control through the installation and operation of pollution prevention facilities. Additionally, the transportation and use of equipment, and disposal of hazardous waste such as used activated carbon and sludge, are integral parts of the process.

## Reference product
- waste water - treated: 2481; measured
  开挖过程产生的基坑废水，以及车辆冲洗过程产生的洗车池废水

## Inputs
All rows: measured
- Exhaust gas: 1
  没有单独计算棚内土壤修复过程中废气产生量，仅计算了用于尾气处置的材料消耗量，因此采用项为计量单位
- waste water - untreated: 2481
  开挖过程产生的基坑废水，以及车辆冲洗过程产生的洗车池废水
- Electricity: 810360
- Diesel,Diesel: 0.52704
  材料和设备运输柴油消耗
- Tap Water: 4
  尾气喷淋用水
- Concrete: 512
- Steel: 16000
- Activated Carbon: 1610
- Polyacrylamide,Polyacrylamide: 148.86
- Polyaluminium Chloride,Polyaluminium Chloride: 7443
- Sodium persulfate: 3721.5

## Outputs
- Exhaust gases treated: 1; measured
- enclosed shelter: 1; measured
  大棚尺寸80m×32m×9m，大棚总占地面积2560m2，地面混凝土浇筑厚度20cm

## Use advice
When using this dataset for Life Cycle Assessment, it is vital to ensure that contributions to secondary pollution are assessed, including emissions from waste treatment facilities. Users should model the use phase behavior, considering the energy and material flows within the remediation process, the construction of the shed, and the subsequent disposal of hazardous waste. The applicability of this data is specific to polluted soil sites that involve similar soil remediation practices, and geographical relevance must be considered due to local environmental regulations impacting waste disposal and treatment.

## Review details
Inventory: The internal review was done by several iteration steps concerning raw data validation, raw data documentation, representativity, completeness and consistency of modelling with regard to ISO 14040 and 14044.

## Data sources
- 桑春晖,杨欣桐,张红振等. 氰化物污染土壤修复工程环境足迹评估方法和案例研究 [J/OL]. 中国环境科学, 1-11[2024-02-11].
