# Hub manufacture ; Blade Hub of a 1.5 MW wind turbine

Dataset: ILCD process, Unit process, single operation
Geography: NMG-CN
Reference year: 2017
Classification: Unit processes / Systems / Other machines
Functional unit: The functional unit is 1.5 MW wind turbine
LCI method principle: Attributional
LCI method approaches: Allocation
Generated by: Yunzhi Zhao, ll10088@163.com
Owner: Tiangong LCI Data Working Group
Review: Dependent internal review by Tiangong LCI Data Working Group
Amounts: no units in this file; such an amount is in the reference unit of its flow, which a separate flow dataset defines
copyright: false
licenseType: Free of charge for all users and uses

## General comment
The manufacturing process described pertains to the production of blade hubs for 1.5 MW wind turbines. These hubs are integral components of wind turbines, designed to connect the blades to the rotor. Hubs of this nature are specifically used in the construction of wind turbines for generating renewable energy. Wind farms, such as the one referenced with 33 domestic turbines in Inner Mongolia, rely on these hubs for their wind power installations, contributing to the production of sustainable energy.

## Geography
The data regarding the parameters of wind power has been collected from Wang (2012). A wind farm equipped with 33 domestic 1.5 megawatts (MW) wind turbines is regarded as a case study to analyze the environmental impact and its substitution effects. The wind farm is located in the northeast of Inner Mongolia, the province in which most of China’s wind power is installed (Xia and Song, 2017).

## Reference product
- Rotors blade hub of wind turbine: 1; estimated

## Inputs
- iron: 10000; calculated
  Steel and iron

## Deviations from the LCI method approaches
The life cycle inventory for wind power is illustrated as follows. The production and manufacturing stage include the production of wind turbines, substations, and cables, which consume a large amount of energy and emit pollutants (Xue et al., 2015).

## Use advice
This life cycle assessment data should be used taking into account the technological specifics and environmental implications of manufacturing blade hubs for 1.5 MW wind turbines. When applying this data, users should consider the energy consumption and emissions associated with the production process, as detailed by Xue et al. (2015). It is also important to model the use phase behavior of the wind turbines to understand the overall environmental impact, including their substitution effects on traditional energy sources. This data is applicable primarily to regions with similar wind power infrastructure to the case study of Northeast Inner Mongolia.

## Review details
Inventory: The internal review was done by several iteration steps concerning raw data validation, raw data documentation, representativity, completeness and consistency of modelling with regard to ISO 14040 and 14044.

## Data sources
- Li, H., Jiang, H.-D., Dong, K.-Y., Wei, Y.-M. & Liao, H. A comparative analysis of the life cycle environmental emissions from wind and coal power: Evidence from China. Journal of Cleaner Production 248, 119192 (2020).
