# Natural gas liquefaction ;Qatari gas;CML method

Dataset: ILCD process, Unit process, single operation
Geography: QA
Reference year: 2017
Classification: Unit processes / Energy carriers and technologies / Natural gas based fuels
LCI method principle: Attributional
LCI method approaches: Consequential
Generated by: Shikang Kang, 908798159@qq.com
Owner: Tiangong LCI Data Working Group
Review: Dependent internal review by Tiangong LCI Data Working Group
Amounts: no units in this file; such an amount is in the reference unit of its flow, which a separate flow dataset defines
copyright: false
licenseType: Free of charge for all users and uses

## General comment
Liquefied natural gas (LNG) is expected to become an important part of the UK's energy supply as national hydrocarbon reserves on the continental shelf have begun to dwindle. However, the use of any carbon-based fuel runs counter to the reduction of greenhouse gas emissions (GHG). As a result, an extensive environmental assessment is needed to analyse LNG imports into the UK.

## Geography
LNG imported from Qatar to Britain

## Time period
Publication time of literature

## Technology and included processes
The analysis covers the supply chain, from gas extraction to distribution to end users, assuming state-of-the-art facilities and ships. Sensitivity analysis of key parameters, including energy requirements for liquefaction and vaporization processes, propulsion fuel, transport distance, tanker volume and feed gas composition, was also carried out

## Technical purpose
Liquefied natural gas (LNG) from Qatar is anticipated to play a crucial role in the energy supply for the United Kingdom, acting as an alternative to the diminishing hydrocarbon reserves from the continental shelf. Liquefied natural gas is utilized in various sectors, including residential heating, electricity generation, and as a fuel for transportation. The data set represents the environmental footprint of LNG imports from Qatar, covering the full supply chain from extraction to end-user delivery, and is relevant for stakeholders involved in energy planning, environmental impact assessment, and policy formulation in the context of UK's energy infrastructure.

## Reference product
- methane (fossil): 4.2e-5; log-normal; software or database
  The original text did not distinguish between Bio and Fossil. According to experts, this is Fossil. This process comes from carbon monoxide emissions during the liquefaction stage

## Inputs
- natural gas: 0.024; log-normal
  There is no input of much natural gas in the literature, assuming (1:1)

## Outputs
- carbon dioxide (fossil): 0.024; log-normal; software or database
  The original text did not distinguish between Bio and Fossil. According to experts, this is Fossil. This process comes from carbon dioxide emissions during the liquefaction stage
- hydrogen sulfide: 2.4e-8; log-normal; software or database
  This process comes from the emission of hydrogen sulfide during the liquefaction stage
- nitrous oxide: 2.2e-7; log-normal; software or database
  This process comes from the emission of nitrous oxide during the liquefaction stage

## Data selection and combination
The functional unit used in this study is 7 MJ of natural gas (total calorific value) delivered to end users under grid pressure (i.e. less than 1 bar). Because the purpose of this study is to calculate the environmental burden of natural gas production when it is delivered to end users, the use stage is not included.

## Data treatment and extrapolations
The distinction between foreground and background is used to identify direct, indirect and avoided emissions. Direct emissions come from the front end (LNG supply chain), while indirect emissions come from the back end. The assessment covers all these types of emissions.

## Use advice
Users of this data set should pay close attention to the following methodological advice: The environmental impact assessment for LNG imports should include the entire supply chain, from extraction through to distribution to the final user. It is critical to account for direct, indirect, and avoided emissions when evaluating the life cycle of LNG imports. The functional unit of '7 MJ of natural gas delivered under grid pressure' should be upheld. This data set excludes the usage phase of natural gas. Sensitivity analysis should be conducted considering key parameters such as energy requirements, propulsion fuel, transport distance, tanker volume, and feed gas composition. Limitations of the CML method used in the assessment should be acknowledged, and the data should be interpreted within the technological and temporal boundaries established by the study.

## Review details
Inventory: The internal review was done by several iteration steps concerning raw data validation, raw data documentation, representativity, completeness and consistency of modelling with regard to ISO 14040 and 14044.

## Data sources
- Tagliaferri, C., Clift, R., Lettieri, P. & Chapman, C. Liquefied natural gas for the UK: a life cycle assessment. Int J Life Cycle Assess 22, 1944–1956 (2017).
