# polyvinyl chloride production ; primary polyvinyl chloride; 150000t/a ; ethylene

Dataset: ILCD process, Unit process, black box
Geography: YN-CN
Reference year: 2013
Valid until: 2013
Classification: Unit processes / Materials production / Organic chemicals
Functional unit: a ton of primary PVC plastic
Generated by: Xiaoyu Cheng, xiaoyucheng@email.ncu.edu.cn
Owner: Tiangong LCI Data Working Group
Review: Dependent internal review by Tiangong LCI Data Working Group
Amounts: no units in this file; such an amount is in the reference unit of its flow, which a separate flow dataset defines
copyright: false
licenseType: Free of charge for all users and uses

## General comment
The production flow of the primary PVC scenario includes two main technological steps-first is vinyl chloride monomer (VCM) production and second is primary PVC production.

## Time period
The 2013 annual primary data of this enterprise is mentioned in this study.

## Technical purpose
Primary polyvinyl chloride (PVC) produced via this industrial process is intended for the manufacture of a wide range of products including construction materials, such as pipes and window frames, as well as for making clothing and upholstery, and electrical cable insulation. The high volume of production at 150000t/a indicates suitability for large-scale applications in various industries.

## Reference product
- Polyvinyl Chloride: 1000; measured

## Inputs
All rows: measured
- ethene (ethylene): 470
- Catalyst: 2.18
- chlorine: 600
- oxygen: 140
- Calcium Oxide: 0.02673
- Hydrogen: 0.29
- sodium hydroxide: 10.15
- water: 5840
- Water (desalinated; deionized): 210
- Electricity: 594
- natural gas; 44.1 MJ/kg: 29.61
- unspecified: 0.08
- process steam: 1270

## Outputs
All rows: measured
- sulfur dioxide: 0.43
- Nitrogen oxides: 0.43
- particles (>PM10): 0.21
- chlorine: 9.328e-5
- hydrogen chloride: 2.33e-6
- Vinyl Chloride Monomer: 6.02e-6
- Suspended solids, unspecified,Suspended solids, unspecified: 0.00913
- biological oxygen demand: 0.00935
- chemical oxygen demand: 0.04891
- mercury: 5.6e-7
- chloride: 3.887e-5
- landfill of plastic waste: 0.01943
- waste water - untreated: 1460

## Use advice
When utilizing this data set for Life Cycle Assessment, ensure to include all life stages of primary PVC, from the VCM production, PVC polymerization, to the end-of-life phase including waste treatment and recycling processes if applicable. For accurate LCA modeling, also consider technology-specific energy use, transportation requirements, and direct emissions associated with each stage of the process. The use of the 2013 annual primary data should reflect technology practices and efficiencies from that year.

## Review details
Inventory: The internal review was done by several iteration steps concerning raw data validation, raw data documentation, representativity, completeness and consistency of modelling with regard to ISO 14040 and 14044.

## Data sources
- Ye, L., Qi, C., Hong, J. & Ma, X. Life cycle assessment of polyvinyl chloride production and its recyclability in China. Journal of Cleaner Production 142, 2965–2972 (2016).
