# Collect waste photovoltaic modules ; Waste photovoltaic modules ; Transportation of waste photovoltaic modules ; Waste photovoltaic modules; Disposal of waste photovoltaic modules ; Waste photovoltaic modules ; Disassembly, glass separation, glass grinding, heat treatment, and chemical treatment

Dataset: ILCD process, Unit process, black box
Geography: CN
Classification: Unit processes / End-of-life treatment / Other end-of-life services
Generated by: Nan Wang, 1209824595@qq.com
Owner: Tiangong LCI Data Working Group
Review: Dependent internal review by Tiangong LCI Data Working Group
Amounts: no units in this file; such an amount is in the reference unit of its flow, which a separate flow dataset defines
licenseType: Free of charge for all users and uses

## General comment
Similar to ordinary waste, the recycling system of PV modulescan be divided into three stages: (1) the collection stage, in whichthe PV power station is dismantled and the modules are sold to theacquirer; (2) the transportation stage, which refers to these PVmodules being shipped to a treatment enterprise; (3) the treatment stage, in which the enterprise treats PV panels, including processes like disassembly, glass stripping, glass grinding and heattreatment & chemical treatment and some recycled materials willbe output.

## Technical purpose
The process described is used for the recycling of waste photovoltaic modules, comprising collection, transportation, and treatment stages. Recycled materials derived from this process can be used in manufacturing new photovoltaic panels or other products that require similar materials.

## Reference product
- municipal solid waste deposition: 56; software or database
  General solid waste

## Inputs
All rows: software or database
- Electricity: 56.8
- water: 20
- Standard coal: 132.5
- Oxidant: 192.2
- Nitric acid: 0.2
- sodium hydroxide: 20.8
- Hydrofluoric acid: 5
- nitrogen: 54

## Outputs
All rows: software or database
- Glass for recovery (shards): 665
- aluminium: 179
- Ethylene-vinyl acetate copolymer,Ethylene-vinyl acetate copolymer,Ethylene-vinyl acetate copolymer: 41
  EVA
- Solar grade multi-Si: 35.1
  Solar grade silicon
- copper: 4.4
- silver: 0.51
- Hazardous waste (unspec.): 7.2
  Hazardous solid waste
- Medium and low radioactive liquid waste: 18.6
  Liquid waste
- carbon dioxide: 144.5
- sulfur dioxide: 71.4
- Nitrogen oxides: 108

## Use advice
When using this dataset for Life Cycle Assessment (LCA), ensure to account for the energy and material inputs at each stage of the recycling process. Also, consider the environmental impacts of transport and the efficiency of the treatment process when assessing the overall sustainability. The end-of-life stage for the photovoltaic modules should also include potential benefits from material recovery and the avoided impacts from the production of virgin materials.

## Review details
Inventory: The internal review was done by several iteration steps concerning raw data validation, raw data documentation, representativity, completeness and consistency of modelling with regard to ISO 14040 and 14044.

## Data sources
- Liu, C., Zhang, Q. & Wang, H. Cost-benefit analysis of waste photovoltaic module recycling in China. Waste Management 118, 491–500 (2020).
