# Soil remediation ; Ex-situ remediation ; Chemical oxidation ; Construction preparation ; Infrastructure development ; enclosed shelter

Dataset: ILCD process, Unit process, black box
Geography: AH-CN
Reference year: 2023
Classification: Other Services / Repair and maintenance
Generated by: Sang Chunhui, sangch@mail.bnu.edu.cn
Owner: Tiangong LCI Data Working Group
Review: Dependent internal review by Tiangong LCI Data Working Group
Amounts: no units in this file; such an amount is in the reference unit of its flow, which a separate flow dataset defines
copyright: false
licenseType: Free of charge for all users and uses

## General comment
Construction of a steel membrane structure closed shed with dimensions of 5 m×20 m×50 m for temporary chemical oxidative remediation in the field.

## Geography
Iron and steel mill site contaminated with a combination of heavy metals and organic matter in Hefei, Anhui Province, China

## Technology and included processes
Construction and rehabilitation of essential infrastructure

## Technical purpose
This soil remediation process involves the construction and operation of a temporary steel membrane structure closed shed, measuring 5 m x 20 m x 50 m, for the ex-situ chemical oxidative treatment of polluted sites. The process is typically applied to industrial sites such as steel plants contaminated with heavy metals and organic compounds, like the described site in Hefei, Anhui Province. The remediation facility allows for controlled and efficient treatment of contaminated soils, isolated from the surrounding environment.

## Reference product
- enclosed shelter: 5000; estimated
  建成密闭大棚

## Inputs
- steel rebar: 4200; estimated
- Polyvinyl chloride: 1900; estimated
  PVC材料
- Polyethylene: 1000; estimated
  HDPE材料

## Use advice
Users of this data set should apply it exclusively for modeling the environmental impacts of ex-situ soil remediation projects that utilize temporary steel membrane structure closed sheds for chemical oxidative treatment of contaminants. Assumptions about the site context (industrial with heavy metal and organic pollutants) should align with the facility described. Methodological considerations must include the preparation phase, infrastructure development, and the unique application for steel plant sites. Geographic specificity (Hefei, Anhui Province) may influence transport-related impacts and should be accounted for if applicable.

## Review details
Inventory: The internal review was done by several iteration steps concerning raw data validation, raw data documentation, representativity, completeness and consistency of modelling with regard to ISO 14040 and 14044.

## Data sources
- 桑春晖,杨欣桐,李香兰等.基于SEFA方法的异位土壤修复环境足迹分析——以某钢铁厂为例[J].中国环境科学,2023,43(10):
