# Brick production ; Non sintered bricks ; curing process

Dataset: ILCD process, Unit process, single operation
Geography: MY-SC-CN
Reference year: 2020
Classification: Unit processes / Materials production / Other mineralic materials
Functional unit: 1t WDC were chosen as the functional unit
Generated by: Wang xiangjin, r99rt4@163.com
Owner: Tiangong LCI Data Working Group
Review: Dependent internal review by Tiangong LCI Data Working Group
Amounts: no units in this file; such an amount is in the reference unit of its flow, which a separate flow dataset defines
copyright: false
licenseType: Free of charge for all users and uses

## General comment
Using artificial sand, cement, and water-based drilling chips as raw materials

## Technology and included processes
Involves the preparation of non-fired bricks by adding an appropriate amount of aggregate (i.e., manufactured sand) after the WDC crushing pretreatment. The entire production process includes mixing (time of 2 min), pressing (pressure of 3 MPa; dimension of 240 × 115 × 53 mm), and maintenance steps

## Technical purpose
The non-sintered bricks produced using the curing process are commonly applied in the construction industry as an environmentally friendly alternative to traditional fired bricks. These bricks are suitable for a variety of building structures including residential, commercial, and industrial buildings.

## Reference product
- green brick: 4402; input; measured

## Inputs
- freshwater: 500; measured
- Electricity: 254.808; measured

## Outputs
- Non sintered brick: 3752; measured

## Deviations from the LCI method approaches
The eFootprint online analysis platform developed by IKE Environmental Technology Co. was used to perform quantitative analysis of the full life cycle process, as part of the LCA

## Data selection and combination
Information on the raw materials, energy inputs and pollutant emission data were obtained from Mianyang Building Materials Manufacturing Co., Ltd.

## Sampling procedure
Besides, 1t WDC were chosen as the functional unit and all the input parameters of raw materials, auxiliary materials, energy consumption, transportation, and direct emissions were calculated in accordance with the functional unit.

## Use advice
When using the data set for the non-fired brick production process, ensure to account for all inputs and outputs associated with 1 ton of WDC as the functional unit. Apply the cut-off rule for low-value materials from upstream processes, such as fly ash, which allows omitting substances amounting to less than 1% of the final product's weight from the inventory as per Zhao et al., 2020. Always refer to methodological guidelines for life cycle assessments to maintain consistency and accuracy in the analysis.

## Review details
Inventory: The internal review was done by several iteration steps concerning raw data validation, raw data documentation, representativity, completeness and consistency of modelling with regard to ISO 14040 and 14044.

## Data sources
- Liu, W. et al. Comparative life cycle assessment of cement, sintered bricks and non-sintered bricks manufacturing using water-based drilling cuttings from shale gas production in the Sichuan Basin, China. J. Environ. Manage. 314, 115135 (2022).
