# Shale gas production;Shale gas production full life cycle leakage

Dataset: ILCD process, Unit process, black box
Geography: CN
Classification: Unit processes / Energy carriers and technologies / Natural gas based fuels
Generated by: Pu Hong, 15695258655@163.com
Owner: Tiangong LCI Data Working Group
Review: Dependent internal review by Tiangong LCI Data Working Group
Amounts: no units in this file; such an amount is in the reference unit of its flow, which a separate flow dataset defines
copyright: false
licenseType: Free of charge for all users and uses

## General comment
This dataset pertains to the full life cycle leakage implications of shale gas production. Shale gas, extracted from shale formations, is primarily used as a source of natural gas which can be utilized for various applications including electricity generation, heating, and as a feedstock for the manufacturing of chemicals and fertilizers. The data may be relevant for energy providers, policymakers, and industries relying on shale gas for energy or raw materials.

## Time period
Raw data dates between 2014-2016

## Reference product
- methane (fossil): 8.085e7; calculated
  The leakage rate during Sichuan shale gas production is 0.089% according to literature.

## Outputs
- methane (fossil): 72000; calculated
  生产流程泄露的甲烷（四川页岩气生产过程中的泄露率依据文献为0.089%）

## Use advice
When utilizing this dataset, ensure that you incorporate the full life cycle leakage data of shale gas production into the environmental impact assessment model of the project. Special attention should be given to the specific stages of the life cycle where leakage is significant, and appropriate measures should be taken to mitigate the environmental effects within the usage context. Analysts must also factor in regional differences in shale gas extraction practices and technologies, and take into account any updates reflecting changes in industry regulations or standards.

## Review details
Inventory: The internal review was done by several iteration steps concerning raw data validation, raw data documentation, representativity, completeness and consistency of modelling with regard to ISO 14040 and 14044.

## Data sources
- 李琋, 毛红敏 & 王兵. 涪陵页岩气开发生命周期温室气体排放估算. 油气田环境保护 31, 1–7 (2021).
