# Combustion-Coal ; Potassium sulfate / potassium magnesium sulfate fertilizer ; Soft methyl magnesium alum/potassium mixed salt ; Mixing salt conversion method ; All sizes; NESPS2 / 燃烧-煤 ; 硫酸钾/硫酸钾镁肥 ; 软甲镁矾/钾混盐 ; 混盐转化法 ; 所有规模 ; 全国第二次污染普查数据

Dataset: ILCD process, Unit process, single operation
Geography: CN
Reference year: 2019
Classification: Reference Parameters / Energy carriers and technologies / Hard coal based fuels
Generated by: The data was created by the Office of the Second National Pollution Source Census of the Ministry of Ecology and Environment, and the data was organized by the TianGong Plan team for ILCD format / 生态环境部第二次全国污染源普查工作办公室创建数据，天工计划团队常慧敏整理数据为ILCD格式
Owner: Tiangong LCI Data Working Group / 天工LCI数据工作小组
Review: Dependent internal review by Tiangong LCI Data Working Group / 天工LCI数据工作小组
Amounts: no units in this file; such an amount is in the reference unit of its flow, which a separate flow dataset defines
copyright: false
licenseType: Free of charge for all users and uses

## General comment
the Technical of end-of-pipe management technology for pollution Potassium in potassium sulfateisLime/gypsum method，Its Technical efficiency of end-of-pipe management72

## Technical purpose
该工艺涉及燃烧煤炭以生产化学品，如硫酸钾和硫酸钾镁肥料，以及软甲镁矾和钾混盐。这是一个适用于生产多种硫酸盐基肥料的化学合成工艺，适合从事这些化合物生产的各种规模的设施，通过混盐转化方法。此外，采用了末端污染管理技术来解决二氧化硫排放问题，使用了石灰/石膏法，该技术的二氧化硫去除效率为72%。

## Reference product
- Potassium in potassium sulfate: 1000; calculated
  源文件中描述为为硫酸钾/硫酸钾镁肥，此处对其进行了匹配工作，将其匹配到LCAflow库里面相最符合的流，污染物指标备注为二氧化硫

## Outputs
- sulfur dioxide: 0.119; calculated
  the Technical of end-of-pipe management technology for pollution sulfur dioxideisLime/gypsum method，Its Technical efficiency of end-of-pipe management72
  污染物指标二氧化硫的末端治理技术是石灰/石膏法，其效率为72，末端治理设施实际运行率（k值）计算公式为k=处理设施运行时间(小时/年)/正常生产时间(小时/年)。原文件中描述污染物类别为废气，污染物指标为二氧化硫，此处对其进行了匹配工作，将其匹配到LCAflow库里面相最符合的流，污染物指标备注为二氧化硫

## Use advice
This dataset is derived from the Pollution Source Census Report and contains information on pollution emissions and related products. However, it does not include data on energy or chemical consumption, nor does it provide information on waste or co-product generation. When utilizing this dataset, please supplement the missing data based on actual conditions before use
该数据集来源于污染源普查报告，包含污染物排放及相关产品信息，但不包含能源或化学品消耗数据，也不提供废弃物或共生产物产生信息。在使用该数据集时，请根据实际情况补充缺失数据后再使用。

## Review details
Inventory: The internal review was done by several iteration steps concerning raw data validation, raw data documentation, representativity, completeness and consistency of modelling with regard to ISO 14040 and 14044.
清单： 内部审查通过几个迭代步骤完成，涉及原始数据验证、原始数据记录、代表性、完整性、与 ISO 14040 和 14044 有关的建模的一致性。

## Data sources
- 第二次全国污染源普查产排污核算系数手册（试用版）,二级代码26,四级代码2623文件，在完整版文件中第4111页
