# Optical discs ; Adhesive (UV) ; Lithographic printing, stencil printing (screen printing) ; All sizes; NESPS2 / 光盘 ; 胶粘剂（UV） ; 平版印刷、孔版印刷（丝网印刷） ; 所有规模 ; 全国第二次污染普查数据

Dataset: ILCD process, Unit process, single operation
Geography: CN
Reference year: 2019
Classification: Reference Parameters / Systems / Electrics and electronics
Generated by: The data was created by the Office of the Second National Pollution Source Census of the Ministry of Ecology and Environment, and the data was organized by the TianGong Plan team for ILCD format / 生态环境部第二次全国污染源普查工作办公室创建数据，天工计划团队常慧敏整理数据为ILCD格式
Owner: Tiangong LCI Data Working Group / 天工LCI数据工作小组
Review: Dependent internal review by Tiangong LCI Data Working Group / 天工LCI数据工作小组
Amounts: no units in this file; such an amount is in the reference unit of its flow, which a separate flow dataset defines
copyright: false
licenseType: Free of charge for all users and uses

## General comment
the Technical of end-of-pipe management technology for pollution volatile organic compoundisOthers (activated carbon method)，Its Technical efficiency of end-of-pipe management15，The formula for calculating the actual operation rate (k-value) of the end-of-pipe treatment facility is k = power consumption of wastewater treatment facilities (kWh/year) / operating time of wastewater treatment facilities (hours/year) / total power of wastewater treatment facilities (kW)

## Technical purpose
用于光盘生产的紫外线（UV）胶粘剂适用于平版印刷和孔版（丝网）印刷工艺，适合所有规模的生产。这种胶粘剂专门用于生产CD、DVD和Blu-ray等光学介质，其功能是在紫外光照射下将不同层次结合在一起。该工艺使用活性炭方法作为末端治理技术来限制生产过程中挥发性有机化合物（VOCs）的排放。假设这种污染控制方法的技术效率为15％。

## Reference product
- UV adhesive: 1000; input; calculated
  源文件中描述为为胶粘剂（UV），此处对其进行了匹配工作，将其匹配到LCAflow库里面相最符合的流

## Outputs
- volatile organic compound: 16.15; calculated
  the Technical of end-of-pipe management technology for pollution volatile organic compoundisOthers (activated carbon method)，Its Technical efficiency of end-of-pipe management15，The formula for calculating the actual operation rate (k-value) of the end-of-pipe treatment facility is k = power consumption of wastewater treatment facilities (kWh/year) / operating time of wastewater treatment facilities (hours/year) / total power of wastewater treatment facilities (kW)
  污染物指标挥发性有机物的末端治理技术是其他（活性炭法），其效率为15，末端治理设施实际运行率（k值）计算公式为k=治理设施正常运行时间（小时/年）/总生产时间（小时/年）。原文件中描述污染物类别为废气，污染物指标为挥发性有机物，此处对其进行了匹配工作，将其匹配到LCAflow库里面相最符合的流

## Use advice
This dataset is derived from the Pollution Source Census Report and contains information on pollution emissions and related products. However, it does not include data on energy or chemical consumption, nor does it provide information on waste or co-product generation. When utilizing this dataset, please supplement the missing data based on actual conditions before use
该数据集来源于污染源普查报告，包含污染物排放及相关产品信息，但不包含能源或化学品消耗数据，也不提供废弃物或共生产物产生信息。在使用该数据集时，请根据实际情况补充缺失数据后再使用。

## Review details
Inventory: The internal review was done by several iteration steps concerning raw data validation, raw data documentation, representativity, completeness and consistency of modelling with regard to ISO 14040 and 14044.
清单： 内部审查通过几个迭代步骤完成，涉及原始数据验证、原始数据记录、代表性、完整性、与 ISO 14040 和 14044 有关的建模的一致性。

## Data sources
- 第二次全国污染源普查产排污核算系数手册（试用版）,二级代码23,三级代码233.0,四级代码2330文件，在完整版文件中第524页
