# Groundwater in-situ remediation ; In-situ Chemical Oxidation ; Pharmaceutical preparation and dispensing equipment

Dataset: ILCD process, Unit process, single operation
Geography: CA
Reference year: 2007
Classification: Unit processes / Other Services / Repair and maintenance
Generated by: Wang Ning, wang_ning@caep.org.cn
Owner: Tiangong LCI Data Working Group
Review: Dependent internal review by Tiangong LCI Data Working Group
Amounts: no units in this file; such an amount is in the reference unit of its flow, which a separate flow dataset defines
copyright: false
licenseType: Free of charge for all users and uses

## General comment
Pharmaceutical installations, including pharmaceutical storage tanks, mixing units

## Geography
The contaminated area was located 600 m from a river shore in the northern part of the prov-ince of Quebec， Canada.

## Technology and included processes
Construction of pharmaceutical dispensers using steel, latex and glass

## Technical purpose
This process describes the use of a groundwater in-situ remediation system, particularly focusing on in-situ chemical oxidation techniques. The equipment developed is used for preparing and dispensing the chemicals necessary for the remediation process. The pharmaceutical installations, including storage tanks and mixing units, are specifically designed for treating contaminated groundwater near a river shore in the province of Quebec, Canada. These installations are expected to have applications in environmental management, particularly for groundwater decontamination projects.

## Reference product
- A device for configuring solid pharmaceuticals into liquid pharmaceuticals: 1; input; estimated
  地表制药系统

## Inputs
- Steel sections: 10534; estimated
  使用铁建造地表制药系统
- Latex: 1.7; estimated
  使用乳胶造地表制药系统
- Glass (formed & finished): 167; estimated
  使用玻璃造地表制药系统

## Use advice
When utilizing this data set, it is advised that the user takes into consideration the specific location and environmental conditions described. The geographic specificity (600 m from a river shore in Quebec) may influence the applicability and validity of the data for other locations. Users should also be aware that the construction materials (steel, latex, glass) indicated in the process may have specific recycling and disposal considerations. The energy consumption and emissions associated with the production and transportation of these materials should be accounted for in the overall environmental impact assessment. Furthermore, the end-of-life phase for the equipment should be included in the life cycle analysis.

## Review details
Inventory: The internal review was done by several iteration steps concerning raw data validation, raw data documentation, representativity, completeness and consistency of modelling with regard to ISO 14040 and 14044.

## Data sources
- Cadotte, M., Deschênes, L. & Samson, R. Selection of a remediation scenario for a diesel-contaminated site using LCA. Int J Life Cycle Assess 12, 239–251 (2007).
