# Primary aluminum production ; Primary aluminum ingots ; Bauxite ; 2010

Dataset: ILCD process, Unit process, single operation
Geography: CN
Reference year: 2014
Classification: Unit processes / Materials production / Metals and semimetals
Generated by: Zimeng Cai, caizm6178@163.com
Owner: Tiangong LCI Data Working Group
Review: Dependent internal review by Tiangong LCI Data Working Group
Amounts: no units in this file; such an amount is in the reference unit of its flow, which a separate flow dataset defines
copyright: false
licenseType: Free of charge for all users and uses

## General comment
Primary aluminum production, represented by this data set, involves processing bauxite to produce primary aluminum ingots. These ingots are utilized in various sectors, including automotive, construction, electronics, and packaging industries, where aluminum's properties such as lightweight, corrosion resistance, and high conductivity are essential. This material is commonly used in the production of parts and components like engine blocks, frames, consumer electronics casings, and beverage cans.

## Time period
Date of publication

## Reference product
- aluminium, primary, ingot: 1000; missing unimportant

## Inputs
All rows: missing unimportant
- electricity, high voltage, aluminium industry: 52268.4
  电力
- hard coal: 342, 1110 (2 entries)
  煤炭
- Petroleum Coke: 38.2, 87.7 (2 entries)
  焦炭
- drying, natural gas: 76, 42 (2 entries)
  天然气
- coal gas: 709, 1260 (2 entries)
  煤气
- light fuel oil: 74, 161 (2 entries)
  燃料油

## Data selection and combination
The resource and energy consumption data of primary aluminum production are based on the statistical data in Fig. 1 System boundary of primary aluminum production. For some non-statistical process data, they are obtained from the research of production process and technical indexes of typical enterprises and published literature.

## Use advice
When utilizing this LCA data set for primary aluminum production, users should ensure the inclusion of all upstream processes such as bauxite mining, alumina refining, and the Hall-Héroult smelting process. Attention should be paid to the year of data (2010) to assure the temporal relevance of the analysis. It is important to consider the geographical location as this impacts energy consumption and emissions profiles. For comprehensive results, include considerations for waste management and potential recycling at the end of life. Methodological updates and changes in technology since the date of publication should also be factored into new assessments.

## Review details
Inventory: The internal review was done by several iteration steps concerning raw data validation, raw data documentation, representativity, completeness and consistency of modelling with regard to ISO 14040 and 14044.

## Data sources
- 郭杰, 高峰, 王志宏, 刘宇, & 龚先政. 原铝生产流程温室气体排放主要影响因素的关联度分析. 环境工程学报 8, 4858–4863 (2014).
