# Polymyxin ; Lime nitrogen, methanol, o-phenylenediamine, phosgene ; Condensation ; All sizes; NESPS2 / 多菌灵 ; 石灰氮、甲醇、邻苯二胺、光气 ; 缩合 ; 所有规模 ; 全国第二次污染普查数据

Dataset: ILCD process, Unit process, single operation
Geography: CN
Reference year: 2019
Classification: Reference Parameters / Materials production / Organic chemicals
Generated by: The data was created by the Office of the Second National Pollution Source Census of the Ministry of Ecology and Environment, and the data was organized by the TianGong Plan team for ILCD format / 生态环境部第二次全国污染源普查工作办公室创建数据，天工计划团队常慧敏整理数据为ILCD格式
Owner: Tiangong LCI Data Working Group / 天工LCI数据工作小组
Review: Dependent internal review by Tiangong LCI Data Working Group / 天工LCI数据工作小组
Amounts: no units in this file; such an amount is in the reference unit of its flow, which a separate flow dataset defines
copyright: false
licenseType: Free of charge for all users and uses

## General comment
the Technical of end-of-pipe management technology for pollution chemical oxygen demandisRedox process + (1700 others) deamination tower + A2/O process，Its Technical efficiency of end-of-pipe management91

## Technical purpose
该数据集代表了一种涉及多菌灵、石灰氮、甲醇、邻苯二胺和光气的缩合过程，这种过程被应用于化学工业的所有规模。该缩合过程对特定药物或精细化学品的制造至关重要。详细描述的尾端处理技术用于处理工业废水和废气，特别是针对化学需氧量、氨氮、有机结合氮、氰化物和挥发性有机化合物（VOCs）等污染物。引用的技术包括氧化还原过程、脱氨塔、厌氧水解、A/O和A2/O生物处理过程、吸附脱附方法、光催化和再生热氧化（RTO）。

## Reference product
- Carbendazim: 1000; calculated
  源文件中描述为为多菌灵，此处对其进行了匹配工作，将其匹配到LCAflow库里面相最符合的流，污染物指标备注为工业废水量

## Outputs
All rows: calculated
- volatile organic compound: 0.576
  the Technical of end-of-pipe management technology for pollution volatile organic compoundisRTO，Its Technical efficiency of end-of-pipe management99.9
  污染物指标挥发性有机物的末端治理技术是RTO，其效率为99.9，末端治理设施实际运行率（k值）计算公式为k=治理设施耗电量（千瓦时）/（治理设施运行时数（小时）*治理设施额定功率(千瓦)）。原文件中描述污染物类别为废气，污染物指标为挥发性有机物，此处对其进行了匹配工作，将其匹配到LCAflow库里面相最符合的流，污染物指标备注为挥发性有机物
- cyanide: 0.00204
  the Technical of end-of-pipe management technology for pollution cyanideisRedox process + (1700 others) deamination tower + anaerobic hydrolysis + A/O process，Its Technical efficiency of end-of-pipe management96，The formula for calculating the actual operation rate (k-value) of the end-of-pipe treatment facility is k = opreating time of treatment facilities (hours/year) / normal production time (hours/year)
  污染物指标氰化物的末端治理技术是氧化还原法+（1700其他）脱氨塔+厌氧水解类+A/O工艺，其效率为96，末端治理设施实际运行率（k值）计算公式为k=治理设施耗电量（千瓦时）/（治理设施运行时数（小时）*治理设施额定功率(千瓦)）。原文件中描述污染物类别为废水，污染物指标为氰化物，此处对其进行了匹配工作，将其匹配到LCAflow库里面相最符合的流，污染物指标备注为氰化物
- cyanide: 0.0051
  the Technical of end-of-pipe management technology for pollution cyanideisRedox process + (1700 others) deamination tower + A2/O process，Its Technical efficiency of end-of-pipe management90
  污染物指标氰化物的末端治理技术是氧化还原法+（1700其他）脱氨塔+A2/O，其效率为90，末端治理设施实际运行率（k值）计算公式为k=治理设施耗电量（千瓦时）/（治理设施运行时数（小时）*治理设施额定功率(千瓦)）。原文件中描述污染物类别为废水，污染物指标为氰化物，此处对其进行了匹配工作，将其匹配到LCAflow库里面相最符合的流，污染物指标备注为氰化物
- Waste water: 8000
  the Technical of end-of-pipe management technology for pollution Waste wateris/，Its Technical efficiency of end-of-pipe management0
  污染物指标工业废水量的末端治理技术是/，其效率为0。原文件中描述污染物类别为废水，污染物指标为工业废水量，此处对其进行了匹配工作，将其匹配到LCAflow库里面相最符合的流，污染物指标备注为工业废水量
- volatile organic compound: 11.52
  the Technical of end-of-pipe management technology for pollution volatile organic compoundisPhotocatalysis，Its Technical efficiency of end-of-pipe management98，The formula for calculating the actual operation rate (k-value) of the end-of-pipe treatment facility is k = opreating time of treatment facilities (hours) / normal production time (hours)
  污染物指标挥发性有机物的末端治理技术是光催化，其效率为98，末端治理设施实际运行率（k值）计算公式为k=治理设施耗电量（千瓦时）/（治理设施运行时数（小时）*治理设施额定功率(千瓦)）。原文件中描述污染物类别为废气，污染物指标为挥发性有机物，此处对其进行了匹配工作，将其匹配到LCAflow库里面相最符合的流，污染物指标备注为挥发性有机物
- volatile organic compound: 17.28
  the Technical of end-of-pipe management technology for pollution volatile organic compoundis(Absorption + diversion) + (adsorption + steam desorption)/(adsorption + nitrogen/air desorption)，Its Technical efficiency of end-of-pipe management97，The formula for calculating the actual operation rate (k-value) of the end-of-pipe treatment facility is k = opreating time of treatment facilities (hours) / normal production time (hours)
  污染物指标挥发性有机物的末端治理技术是（吸收+分流）+（吸附+蒸汽解析）/（吸附+氮气/空气解析），其效率为97，末端治理设施实际运行率（k值）计算公式为k=治理设施耗电量（千瓦时）/（治理设施运行时数（小时）*治理设施额定功率(千瓦)）。原文件中描述污染物类别为废气，污染物指标为挥发性有机物，此处对其进行了匹配工作，将其匹配到LCAflow库里面相最符合的流，污染物指标备注为挥发性有机物
- Ammonia Nitrogen: 0.2096
  the Technical of end-of-pipe management technology for pollution Ammonia NitrogenisRedox process + (1700 others) deamination tower + A2/O process，Its Technical efficiency of end-of-pipe management96
  污染物指标氨氮的末端治理技术是氧化还原法+（1700其他）脱氨塔+A2/O工艺，其效率为96，末端治理设施实际运行率（k值）计算公式为k=治理设施耗电量（千瓦时）/（治理设施运行时数（小时）*治理设施额定功率(千瓦)）。原文件中描述污染物类别为废水，污染物指标为氨氮，此处对其进行了匹配工作，将其匹配到LCAflow库里面相最符合的流，污染物指标备注为氨氮
- Ammonia Nitrogen: 0.2096
  the Technical of end-of-pipe management technology for pollution Ammonia NitrogenisRedox process + (1700 others) deamination tower + anaerobic hydrolysis + A/O process，Its Technical efficiency of end-of-pipe management96，The formula for calculating the actual operation rate (k-value) of the end-of-pipe treatment facility is k = opreating time of treatment facilities (hours/year) / normal production time (hours/year)
  污染物指标氨氮的末端治理技术是氧化还原法+（1700其他）脱氨塔+厌氧水解类+A/O工艺，其效率为96，末端治理设施实际运行率（k值）计算公式为k=治理设施耗电量（千瓦时）/（治理设施运行时数（小时）*治理设施额定功率(千瓦)）。原文件中描述污染物类别为废水，污染物指标为氨氮，此处对其进行了匹配工作，将其匹配到LCAflow库里面相最符合的流，污染物指标备注为氨氮
- Exhaust gas: 344
  the Technical of end-of-pipe management technology for pollution Exhaust gasis/，Its Technical efficiency of end-of-pipe management0
  污染物指标工业废气量的末端治理技术是/，其效率为0。原文件中描述污染物类别为废气，污染物指标为工业废气量，此处对其进行了匹配工作，将其匹配到LCAflow库里面相最符合的流，污染物指标备注为工业废气量
- Nitrogen, organic bound: 4.38
  the Technical of end-of-pipe management technology for pollution Nitrogen, organic boundisRedox process + (1700 others) deamination tower + A2/O process，Its Technical efficiency of end-of-pipe management90，The formula for calculating the actual operation rate (k-value) of the end-of-pipe treatment facility is k = opreating time of treatment facilities (hours/year) / normal production time (hours/year)
  污染物指标总氮的末端治理技术是氧化还原法+（1700其他）脱氨塔+A2/O，其效率为90，末端治理设施实际运行率（k值）计算公式为k=治理设施耗电量（千瓦时）/（治理设施运行时数（小时）*治理设施额定功率(千瓦)）。原文件中描述污染物类别为废水，污染物指标为总氮，此处对其进行了匹配工作，将其匹配到LCAflow库里面相最符合的流，污染物指标备注为总氮
- Nitrogen, organic bound: 4.38
  the Technical of end-of-pipe management technology for pollution Nitrogen, organic boundisRedox process + (1700 others) deamination tower + anaerobic hydrolysis + A/O process，Its Technical efficiency of end-of-pipe management90，The formula for calculating the actual operation rate (k-value) of the end-of-pipe treatment facility is k = opreating time of treatment facilities (hours/year) / normal production time (hours/year)
  污染物指标总氮的末端治理技术是氧化还原法+（1700其他）脱氨塔+厌氧水解类+A/O工艺，其效率为90，末端治理设施实际运行率（k值）计算公式为k=治理设施耗电量（千瓦时）/（治理设施运行时数（小时）*治理设施额定功率(千瓦)）。原文件中描述污染物类别为废水，污染物指标为总氮，此处对其进行了匹配工作，将其匹配到LCAflow库里面相最符合的流，污染物指标备注为总氮
- chemical oxygen demand: 6.6
  the Technical of end-of-pipe management technology for pollution chemical oxygen demandisRedox process + (1700 others) deamination tower + anaerobic hydrolysis + A/O process，Its Technical efficiency of end-of-pipe management95
  污染物指标化学需氧量的末端治理技术是氧化还原法+（1700其他）脱氨塔+厌氧水解类+A/O工艺，其效率为95，末端治理设施实际运行率（k值）计算公式为k=治理设施耗电量（千瓦时）/（治理设施运行时数（小时）*治理设施额定功率(千瓦)）。原文件中描述污染物类别为废水，污染物指标为化学需氧量，此处对其进行了匹配工作，将其匹配到LCAflow库里面相最符合的流，污染物指标备注为化学需氧量
- chemical oxygen demand: 11.88
  the Technical of end-of-pipe management technology for pollution chemical oxygen demandisRedox process + (1700 others) deamination tower + A2/O process，Its Technical efficiency of end-of-pipe management91
  污染物指标化学需氧量的末端治理技术是氧化还原法+（1700其他）脱氨塔+A2/O，其效率为91，末端治理设施实际运行率（k值）计算公式为k=治理设施耗电量（千瓦时）/（治理设施运行时数（小时）*治理设施额定功率(千瓦)）。原文件中描述污染物类别为废水，污染物指标为化学需氧量，此处对其进行了匹配工作，将其匹配到LCAflow库里面相最符合的流，污染物指标备注为化学需氧量

## Use advice
This dataset is derived from the Pollution Source Census Report and contains information on pollution emissions and related products. However, it does not include data on energy or chemical consumption, nor does it provide information on waste or co-product generation. When utilizing this dataset, please supplement the missing data based on actual conditions before use
该数据集来源于污染源普查报告，包含污染物排放及相关产品信息，但不包含能源或化学品消耗数据，也不提供废弃物或共生产物产生信息。在使用该数据集时，请根据实际情况补充缺失数据后再使用。

## Review details
Inventory: The internal review was done by several iteration steps concerning raw data validation, raw data documentation, representativity, completeness and consistency of modelling with regard to ISO 14040 and 14044.
清单： 内部审查通过几个迭代步骤完成，涉及原始数据验证、原始数据记录、代表性、完整性、与 ISO 14040 和 14044 有关的建模的一致性。

## Data sources
- 第二次全国污染源普查产排污核算系数手册（试用版）,二级代码26,三级代码263.0文件，在完整版文件中第2936页
