# cement production;cement, alternative constituents 21-35%;mixed solid wastes

Dataset: ILCD process, Partly terminated system
Geography: CQ-CN
Classification: Materials production / Other mineralic materials
LCI method principle: Other
Generated by: Siqi Yang, ysqsophia@gmail.com
Owner: Tiangong LCI Data Working Group
Review: Dependent internal review by Tiangong LCI Data Working Group
Amounts: no units in this file; such an amount is in the reference unit of its flow, which a separate flow dataset defines
copyright: false
licenseType: Free of charge for all users and uses

## General comment
Solid waste includes slag, fly ash, gypsum powder, coal ash, blended stones, and boiler slag.There are nearly 170 cement enterprises in Chongqing, and the total cement production in 2014 was nearly 70 million tons. At present, the raw materials used for cement production in Chongqing are mainly limestone, natural gypsum, sandstone, and blended stone, accounting for about 90%, 5%, and 3%, respectively.

## Geography
A factory in Chongqing

## Technology and included processes
Solid waste includes slag, fly ash, gypsum powder, cinder, mixed gravel, and boiler slag.

## Technical purpose
The data set describes cement production incorporating 21-35% alternative constituents derived from mixed solid wastes, which include slag, fly ash, gypsum powder, coal ash, blended stones, and boiler slag. Suitable applications of this particular cement type might be in construction projects where such alternative compositions are permitted and may contribute to sustainable building practices due to the utilization of waste materials.

## Model description
The carbon footprint of production in Chongqing cement plants mainly includes the carbon footprint of direct combustion of fuel, the carbon footprint of electricity consumption, the physical and chemical reactions of raw materials and clinker calcination, etc.The main sources of carbon emissions in cement production are: first, clinker calcination; second, carbon emissions from direct and indirect combustion of fuel. More than 99% of the greenhouse gases emitted are CO2, so the "cement carbon footprint" only involves the CO2 carbon footprint and does not include other greenhouse gases.

## Reference product
- cement, alternative constituents 21-35%: 1000
  Cement

## Inputs
- limestone, crushed, for mill: 944.904
  Limestone
- sandstone: 125.083
  Sandstone
- Acid slag: 190.546
  Acid residue
- hard coal: 160.361
  Bituminous coal
- blast furnace slag: 102.833
  Blast furnace slag
- ash: 104.934
  Fly ash
- gypsum stone (CaSO4-dihydrate): 60.7457
  Gypsum powder
- coal, powder: 66.086
  Coal slag
- stone: 35.5168
  Mixed stone
- Boiler slag: 30.5777
- electricity, medium voltage: 0.0377892
  Fire power generation. Power supply mode: Jiangjin Power Supply Bureau or self-generation.
- diesel: 9.118e-6
  Gasoline, the original description was diesel.
- hard coal; 26.3 MJ/kg: 140.412
  Coal

## Outputs
- carbon dioxide: 667.466
  Carbon footprint (CO2). Carbon emissions from raw material extraction and transportation are not taken into account. The carbon footprint of Chongqing Cement Plant mainly includes carbon emissions from direct fuel combustion, carbon emissions from electricity consumption, physical and chemical reactions of raw materials, and clinker calcination.

## Use advice
Users of the data set should focus solely on the carbon footprint of cement production, specifically considering the emission factors corresponding to the CO2 emissions. It is important to note that the carbon footprint covered here does not include other greenhouse gases. Special attention must be paid to the factory's use of alternative constituents when calculating the carbon footprint because the emissions profile may differ from conventional cement production. Ensure consistent accounting for such emissions if comparing with other data sets or when integrating into larger life cycle assessments.

## Review details
Inventory: The internal review was done by several iteration steps concerning raw data validation, raw data documentation, representativity, completeness and consistency of modelling with regard to ISO 14040 and 14044.

## Data sources
- 杨李宁 & 付祥钊. (2016). 以重庆为案例的水泥碳足迹研究. 中国水泥, 8, 87–92.
