# Municipal wastewater treatment ; Wastewater ; Cyclic activated-sludge technology

Dataset: ILCD process, Unit process, black box
Geography: TH
Reference year: 2014
Valid until: 2014
Classification: Unit processes / End-of-life treatment / Waste water treatment
Generated by: YU Chenyang, yuchenyang0506@foxmail.com
Owner: Tiangong LCI Data Working Group
Review: Dependent internal review by Tiangong LCI Data Working Group
Amounts: no units in this file; such an amount is in the reference unit of its flow, which a separate flow dataset defines
copyright: ['opt4ROkqig']
licenseType: Free of charge for all users and uses

## General comment
Cyclic activated sludge process is a new type of wastewater biological treatment process developed on the basis of SBR technology, the application of this method is based on the combination of social development and advanced science and technology based on a comprehensive sewage treatment collection measures and treatment processes, and in its work there are good working advantages and a wide range of applications. Up to now, many of our country's sewage treatment plant in the work of this process will be incorporated as the primary work technology for application.

## Geography
Chongnonsi,Thailand

## Time period
2014年

## Technology and included processes
Cyclic activated sludge technology mainly includes the mixing and reaction of wastewater and activated sludge, microorganisms decompose organic matter under aerobic conditions, pollutants in wastewater are biodegraded, the sedimentation process separates solids in wastewater, and clear water is discharged through the discharge port to realize the treatment and purification of wastewater.

## Technical purpose
The specified industrial process relates to the treatment of municipal wastewater using cyclic activated-sludge technology. This process is an essential utility for urban sanitation and environmental protection. It is designed for use in municipal wastewater treatment plants to effectively remove contaminants from wastewater before releasing it back into the environment, ensuring water quality for downstream users and ecosystems.

## Reference product
- Wastewater: 1; input; measured

## Inputs
- Electricity: 1.12464; measured
- transport in t*km: 4.39e-14; measured
  transport by lorry
- Polyaluminium Chloride: 5e-5; measured
  polymer

## Outputs
All rows: measured
- Waste (solid): 0.0016
- nitrogen, total (excluding N2): 0.0077
- phosphorus, total: 0.0011
- Suspended solids, unspecified,Suspended solids, unspecified,Suspended solids, unspecified: 0.0092
- chemical oxygen demand: 0.0244
- biological oxygen demand: 0.0061
- nitrous oxide: 0.0001
- methane (biogenic),methane (biogenic): 0.00117
  The original text does not provide information on biogenic and fossil sources. According to experts, it is classified as fossil.
- carbon dioxide (biogenic): 0.0152
  (same comment as for methane (biogenic),methane (biogenic))
- Sludge: 0.0248

## Use advice
When using this dataset for life cycle assessment of municipal wastewater treatment, users should ensure that the temporal and technological context of the data (Chongnonsi, Thailand, 2014) matches their study scope. Users should also account for changes in regulation, technology, and wastewater composition that may have occurred since 2014. Furthermore, the dataset assumes a 'black box' unit process, and thus any extrapolation should be done with caution, considering the specific nature of the technology applied.

## Review details
Inventory: The internal review was done by several iteration steps concerning raw data validation, raw data documentation, representativity, completeness and consistency of modelling with regard to ISO 14040 and 14044.

## Data sources
- Polruang, S., Sirivithayapakorn, S. & Prateep Na Talang, R. A comparative life cycle assessment of municipal wastewater treatment plants in Thailand under variable power schemes and effluent management programs. Journal of Cleaner Production 172, 635–648 (2018).
