# Aluminum electrolytic capacitor production ; Capacitors, auxiliaries and energy use ; Assembly (including bushings)

Dataset: ILCD process, Unit process, single operation
Geography: JS-CN
Reference year: 2020
Classification: Unit processes / Materials production / Metals and semimetals
Generated by: Huimin Chang, huiminchang@tsinghua.edu.cn
Owner: Tiangong LCI Data Working Group
Review: Dependent internal review by Tiangong LCI Data Working Group
Amounts: no units in this file; such an amount is in the reference unit of its flow, which a separate flow dataset defines
copyright: false
licenseType: Free of charge for all users and uses

## General comment
组装（包括套管） ; 铝电解电容器 (AEC) 生产 ; 420V 680uf

## Time period
The investigated manufacturer produced about 1.183 billion AECs of all kinds in 2020.

## Technical purpose
Aluminum electrolytic capacitors produced in this process are used for a variety of electronic equipment due to their high voltage and capacitance properties. Typically, they are found in power supplies, inverters, and other devices requiring stable and long-lasting energy storage solutions. The capacitors, especially the 420V 680uf units, are designed for specific applications that demand reliable performance in energy regulation and circuit functionality.

## Reference product
- capacitor, auxilliaries and energy use: 980.1; measured
  Capacitors (before aging) [pcs]

## Inputs
All rows: measured
- electricity, high voltage, aluminium industry: 5.0004
  Electricity [kWh]
- Sealing cover ; Styrene-butadiene rubber: 2.37
  Sealing cover [kg] ; Styrene-butadiene rubber
- used beverage cans: 9.46
  Can [kg] ; CN: aluminium sheet in Gabi Database
- rivet: 0.06
  Rivet [kg] ; CN: aluminium sheet in Gabi Database
- air distribution terminal panel, steel, 120 m3/h: 0.15
  Terminal [kg]
- polyethylene terephthalate, granulate, bottle grade: 0.961
  Sleeve [kg] ; “EU-28: Polyethylene terephthalate fibres (PET)” in GDs
- elements before assembly (from soak): 1000
  Elements (before assembly) [pcs]

## Outputs
- waste capacitors: 19.9; measured
  Capacitors (waste) [pcs]

## Data selection and combination
The inventory data of capacitor production come from the AECs’ production factory in Jiangsu Province, China. The cut-off criteria of LCI data collection for each process is coverage of at least 95% of the mass and energy of the input and output flows. The inventory data of anode foil production and cathode foil production is obtained based on the analysis of the manufacturing processes and corresponding process parameters. The upstream data (i.e., aluminum ingots, separator paper, transport, electricity, and water) are acquired from the Gabi software (Version: 10.6.1.35). In detail, the profile of Chineses electricity grid from the China Electric Power Yearbook adopts the reference year 2016. The reference year of aluminum ingot production is 2015. The inaccessible data about ammonium citrate, ammonium pentaborate, NH4H2PO4, and HBO3 are estimated based on chemical equations using the existing materials (reactants) in the Gabi software. The use and end-of-life stage inventory data are obtained based on analysis and calculation.

## Use advice
Users of the LCA data for aluminum electrolytic capacitor production should note that the inventory data reflects operations at a specific factory in Jiangsu Province, China, and may not be representative of all production locations. It includes inputs such as raw material consumption, energy use, and outputs including potential emissions. The reference years for upstream data (aluminum ingots and Chinese electricity grid profiles) are 2015 and 2016 respectively; these should be considered when modeling the environmental impact over different time frames. Care should be taken when applying the data to ensure it aligns accordingly with the regional and temporal context of the product life cycle. Additionally, inaccessible data about certain chemicals was estimated; this should be taken into account when accurate emission data is critical.

## Review details
Inventory: The internal review was done by several iteration steps concerning raw data validation, raw data documentation, representativity, completeness and consistency of modelling with regard to ISO 14040 and 14044.

## Data sources
- Zhang, C., Jing, J., Yun, L., Zheng, Y. & Huang, H. A cradle-to-grave life cycle assessment of high-voltage aluminum electrolytic capacitors in China. J. Clean. Prod. 370, (2022).
