# Natural gas exploitation;Bongkot mine; Field mining

Dataset: ILCD process, Unit process, single operation
Geography: TH
Reference year: 2009
Classification: Unit processes / Energy carriers and technologies / Natural gas based fuels
LCI method principle: Attributional
LCI method approaches: Consequential
Generated by: Shikang Kang, 908798159@qq.com
Owner: Tiangong LCI Data Working Group
Review: Dependent internal review by Tiangong LCI Data Working Group
Amounts: no units in this file; such an amount is in the reference unit of its flow, which a separate flow dataset defines
copyright: false
licenseType: Free of charge for all users and uses

## General comment
Natural gas extraction: Natural gas used as feedstock for the Bang Pakong power plant is mainly extracted from the Bongkot mine in the Gulf of Thailand and controlled by PTT Exploration and Production Co. Ltd. (PTT Plc.). This study focuses on the main natural gas production at the Bongkot site

## Geography
Bongkot mining area in the Gulf of Thailand

## Time period
Publication time of literature

## Technology and included processes
The purpose of this LCA study is to determine the environmental emissions from each process of natural gas power generation from cradle to gate, and to compare the environmental impact of emissions released from the power generation process of two different power plant technologies (i.e. combined cycle and thermoelectric). The main scope of this study is to provide material balance and environmental information for all life cycle stages (natural gas extraction, crude oil extraction, natural gas separation plant, power plant and transportation). All processes of natural gas power plants are standardized to 1 MWh of power provided by the power plant.

## Technical purpose
The industrial process described pertains to the extraction of natural gas specifically for the feedstock of the Bang Pakong power plant. The gas is primarily sourced from the Bongkot field in the Gulf of Thailand, managed by PTT Exploration and Production Co. Ltd. The Bongkot site's primary natural gas production is a critical component in the generation of electricity, utilizing technologies such as combined cycle and thermoelectric power generation.

## Reference product
- methane (fossil): 1.7991e6; log-normal; software or database
  The original text did not distinguish between Bio and Fossil. According to experts, this is Fossil. This process comes from the total methane emissions during the mining stage of the mine

## Inputs
- natural gas: 2.4372e9; log-normal
  There is no input of much coal in the literature, assuming (1:1)

## Outputs
- carbon dioxide (fossil): 2.4372e9; log-normal; software or database
  The original text did not distinguish between Bio and Fossil. According to experts, this is Fossil. This process comes from natural gas power plants and upstream process emissions of natural gas and fuel oil
- carbon monoxide (fossil): 1.03507e6; log-normal; software or database
  The original text did not distinguish between Bio and Fossil. According to experts, this is Fossil. This process comes from the total carbon monoxide emissions during the mining stage of the mine

## Data selection and combination
The data obtained by LCA mainly comes from major sources, such as factory information; In the absence of raw data, use secondary data, such as existing literature data, calculations and measurements.

## Data treatment and extrapolations
This study only focuses on the environmental flow part of the main products of each process

## Use advice
This LCA study aims to evaluate the environmental emissions for each stage of the life cycle starting from natural gas extraction to the delivery of electricity, offering material balance and environmental data for the complete cycle including extraction, separation, power generation, and transportation. Users should ensure that data used reflects the actual process and technologies employed at the Bongkot site. Secondary data sources should be used with caution, ensuring they are relevant and up-to-date. The standardized environmental flow data is mapped against the production of 1 MWh of electricity to allow for comparative analysis and should be applied in that context.

## Review details
Inventory: The internal review was done by several iteration steps concerning raw data validation, raw data documentation, representativity, completeness and consistency of modelling with regard to ISO 14040 and 14044.

## Data sources
- Phumpradab, K., Gheewala, S. H. & Sagisaka, M. Life cycle assessment of natural gas power plants in Thailand. Int J Life Cycle Assess 14, 354–363 (2009).
