# Electricity production ; Electricity mix ; Chongqing

Dataset: ILCD process, Unit process, single operation
Geography: CQ-CN
Reference year: 2019
Classification: Unit processes / Energy carriers and technologies / Electricity
Generated by: Ruoxi Xiong, xiongrx0126@163.com
Owner: Tiangong LCI Data Working Group
Review: Dependent internal review by Tiangong LCI Data Working Group
Amounts: no units in this file; such an amount is in the reference unit of its flow, which a separate flow dataset defines
copyright: false
licenseType: Free of charge for all users and uses

## General comment
Electricity mix includes thermal, hydro, wind, nuclear and solar generation

## Technical purpose
The described industrial process pertains to mixed electricity production in Chongqing, which includes various forms such as thermal (likely coal or natural gas-fired power plants), hydroelectric, wind, nuclear, and solar power generation. This mixed electricity supply is used for residential, commercial, and industrial purposes within the region. The diversity of generations methods indicates application in grid energy supply, ensuring reliability and meeting the varying demand patterns of Chongqing's consumers and industries.

## Reference product
- Electricity: 3.6; missing unimportant
  [{'text': '能量', 'type': 'text'}]

## Inputs
All rows: missing unimportant
- electricity for thermal power: 2.46038
  [{'text': '能量', 'type': 'text'}]
- electricity from hydroelectric power plant: 1.07754
  [{'text': '能量', 'type': 'text'}]
- electricity for nuclear power: 0
  [{'text': '能量', 'type': 'text'}]
- electricity from wind power: 0.0487764
  [{'text': '能量', 'type': 'text'}]
- electricity for solar power: 0.013302
  [{'text': '能量', 'type': 'text'}]

## Use advice
For Life Cycle Assessment (LCA) practitioners, when modeling the environmental impacts of products or services relying on utilities from the Chongqing electricity mix, it is essential to consider the proportional contribution of each generation type (thermal, hydro, wind, nuclear, and solar) to the overall mix, as this influences the environmental impacts such as greenhouse gas emissions and resource depletion. Seasonal and time-of-use variations in energy sources should also be considered. Data users should align their impact assessment models according to the regional electricity consumption patterns and the technological applicability of the varied generation methods integrated within the Chongqing electricity grid.

## Review details
Inventory: The internal review was done by several iteration steps concerning raw data validation, raw data documentation, representativity, completeness and consistency of modelling with regard to ISO 14040 and 14044.

## Data sources
- 能源统计年鉴2020
