# Aluminum electrolysis ; liquid primary aluminum ; prebaked ; alumina for metallurgy

Dataset: ILCD process, Unit process, single operation
Geography: CN
Reference year: 2017
Classification: Materials production / Metals and semimetals
Generated by: Huimin Chang, huiminchang@tsinghua.edu.cn
Owner: Tiangong LCI Data Working Group
Review: Dependent internal review by Tiangong LCI Data Working Group
Amounts: no units in this file; such an amount is in the reference unit of its flow, which a separate flow dataset defines
copyright: false
licenseType: Free of charge for all users and uses

## General comment
This liquid primary aluminum produced via prebaked aluminum electrolysis is intended for use in metallurgical processes. It is typically utilized as a raw material for creating an array of aluminum-based products in various industries, from construction through automotive to packaging.

## Time period
IAI 2017 （GLO）

## Reference product
- aluminium, primary, liquid: 1000; software or database
  Aluminium (liquid) [kg]

## Inputs
- electricity, high voltage, aluminium industry: 50638.6; software or database
  Electricity [kWh]
- aluminium oxide, metallurgical: 1918.73; software or database
  Alumina [kg]
- steel, low-alloyed: 5.42894; software or database
  Steel [kg]
- anode, prebake, for aluminium electrolysis: 459.945; software or database
  Anodes [kg]
- aluminium fluoride: 16.4659; estimated
  Aluminium fluoride [kg] ; CN/NO: German dataset used as no specific data for CN and NO available
- fresh water: 4.45217; software or database
  Fresh water [m3]
- Water, salt, ocean: 41.591; software or database
  Sea water [m3]

## Outputs
All rows: software or database
- particles (> PM10): 1.31116
  Particulates [kg] ; >PM10
- particles (PM2.5): 0.94614
  Particulates <2.5 [kg]
- particles (PM2.5 - PM10): 0.53103
  Particulates 2.5-10 [kg]
- sulfur dioxide: 13.1823
  Sulfur dioxide [kg]
- Nitrogen oxides: 0.25268
  Nitrous oxides (as NO2)
- hydrogen fluoride: 0.59461
  Fluoride (as F) (to air) [kg]
- polycyclic aromatic hydrocarbons: 0.00417
  Total polycyclic aromatic hydrocarbons (to air) [kg]
- Methane, tetrafluoro-, R-14: 0.07008
  Tetrafluoromethane [kg]
- Ethane, hexafluoro-, HFC-116: 0.00406
  Hexafluoroethane [kg]
- Suspended solids, unspecified: 0.17718
  Suspended solids [kg]
- Fluoride: 0.07677
  Fluoride (as F) [kg]
- fresh water: 7.75991
  Fresh water [m3]
- Water, salt, ocean: 41.5894
  Sea water [m3]
- Oils, unspecified: 0.00246
  Oil and grease/total hydrocarbons [kg]
- Benzo(a)pyrene: 7.564e-5
  Benzo(a)pyrene [g]
- PAH, polycyclic aromatic hydrocarbons: 2.426e-5
  Polycyclic aromatic hydrocarbons [g]

## Data selection and combination
For reliable findings, the most recent and representative data were considered. Regional or country-specific data were used when provided in the GaBi© “professional and extension” database (SP 39) or in the literature. If location-specific data were not found, either comparable data for the country or global data were used. For consistency, data from the same source and year were used if available. Due to data availability, the study did not consider some inputs and background processes if they contributed less than 1% to the total input mass. For primary aluminium production, this study used the most recent LCI data from 2015 provided by the International Aluminium Institute (IAI) (International Aluminium Institute, 2017b). IAI data were used because the IAI is an established institute that considers primary aluminium production worldwide and the data were used in studies e.g. from the Aluminium Association and from the European Aluminium Association (Aluminum Association, 2013; European Aluminium Association, 2018). In terms of the LCA data of standardized primary aluminium production, only few uncertainties occurred. Generally, the composition of these data could be fully explained and reconstructed.

## Use advice
Users of this LCA data should note that the data set relies on the most recent and representative information from 2015, sourced from the International Aluminium Institute (IAI). When incorporating this data into assessments or models, consider the technological applicability as it pertains to global aluminum production standards. Be aware that inputs and background processes contributing less than 1% to the total input mass were not considered due to data availability. Users should ensure consistency by sourcing additional data from comparable years and institutions when necessary. Pay attention to the methodological advice provided and the consistent technological parameters that have been outlined for primary aluminum production.

## Review details
Inventory: The internal review was done by several iteration steps concerning raw data validation, raw data documentation, representativity, completeness and consistency of modelling with regard to ISO 14040 and 14044.

## Data sources
- Luthin, A., Backes, J. G. & Traverso, M. A framework to identify environmental-economic trade-offs by combining life cycle assessment and life cycle costing – A case study of aluminium production. Journal of Cleaner Production 321, 128902 (2021).
