# Aluminum alloy wheel manufacturing ; Aluminum alloy wheel hub ; Aluminum alloy wheel hub manufacturing process ; Primary aluminum ingot

Dataset: ILCD process, Unit process, single operation
Geography: CN
Reference year: 2018
Classification: Unit processes / Materials production / Metals and semimetals
Generated by: Chenling Fu, fu-chenling@tsinghua.edu.cn
Owner: Tiangong LCI Data Working Group
Review: Dependent internal review by Tiangong LCI Data Working Group
Amounts: no units in this file; such an amount is in the reference unit of its flow, which a separate flow dataset defines
copyright: false
licenseType: Free of charge for all users and uses

## General comment
The primary aluminum ingots are used in the manufacturing process of aluminum alloy wheel hubs. These wheel hubs are integral components in the automotive industry for a variety of vehicles, providing the structural support for the tires and being key to the vehicle's performance and safety.

## Time period
Date of publication

## Reference product
- aluminum alloy hub: 1; missing unimportant

## Inputs
- electricity, high voltage, aluminium industry: 172.008; missing unimportant
- heavy fuel oil: 1.58; missing unimportant
- Gas, mine, off-gas, process, coal mining: 22.18; missing unimportant
- natural gas, high pressure: 1.66; missing unimportant
  Natural gas

## Outputs
- carbon dioxide (fossil),carbon dioxide (fossil): 57.16; missing unimportant
- methane (fossil): 0.11; missing unimportant

## Use advice
Users of this data should ensure to model the aluminum alloy wheel hub manufacturing process accurately, considering the inputs and outputs specific to the use of primary aluminum ingots. Attention should be given to the end-of-life phase of the wheel hubs, particularly regarding the recyclability of aluminum and the allocation of environmental impacts due to recycling. The technological applicability and the relevance to the geographic technological context should also be taken into account.

## Review details
Inventory: The internal review was done by several iteration steps concerning raw data validation, raw data documentation, representativity, completeness and consistency of modelling with regard to ISO 14040 and 14044.

## Data sources
- Yi Qiu-ping & Tang Chang-ping. Environmental impact assessment of magnesium alloy automobile hub based on life cycle assessment. JOURNAL OF CENTRAL SOUTH UNIVERSITY 25, 1870–1878 (2018).
