# clinker production;clinker;ordinary shaft kiln

Dataset: ILCD process, Unit process, single operation
Geography: CN
Classification: Unit processes / Materials production / Other mineralic materials
Generated by: #REF!, ysqsophia@gmail.com
Owner: Tiangong LCI Data Working Group
Review: Dependent internal review by Tiangong LCI Data Working Group
Amounts: no units in this file; such an amount is in the reference unit of its flow, which a separate flow dataset defines
copyright: false
licenseType: Free of charge for all users and uses

## General comment
The ordinary shaft kiln is taken as the research object.

## Technical purpose
This data represents the production of 1 ton of cement clinker using an ordinary shaft kiln, a type of industrial kiln used in the cement industry. The clinker produced by this process serves as an intermediary product which is subsequently ground to produce cement. This is the most essential ingredient in concrete, which is widely used in construction for making buildings, bridges, roads, and various other forms of infrastructure.

## Model description
The functional unit is 1 ton of cement clinker. Research scope: cement calcination.

## Reference product
- clinker: 1000
  Clinker

## Inputs
- limestone, crushed, for mill: 1165.2
  Limestone
- clay: 173.4
  Clay
- iron, powder: 65.9
  Iron powder
- hard coal; 26.3 MJ/kg: 210
  Coal-fired. The energy consumption data comes from the literature. The coal -fired thermal value is calculated at 5500kcal/kg, and the fixed carbon is calculated at 50%.
- Electricity: 82.512
  Electric. The energy consumption data comes from the literature.

## Outputs
- carbon dioxide (fossil): 878.99
  CO2. Coal-generated CO2 is calculated based on fixed carbon, while raw material CO2 is calculated based on calcium carbonate (CaO) content at 50%.
- carbon monoxide (fossil): 65.672
  CO. Due to lack of sources, other pollution data is obtained by reference to coal-fired power plants converted by energy consumption.
- sulfur dioxide: 1.0258
  SO2. NOx and SO2 levels are calculated based on average emission factors in the building materials industry.
- Nitrogen oxides: 2.2589
  NOx. NOx and SO2 levels are calculated based on average emission factors in the building materials industry.
- hydrocarbons (unspecified): 0.0357
  CxHy. Due to lack of sources, other pollution data is obtained by reference to coal-fired power plants converted by energy consumption.

## Use advice
This data set should be applied when modeling the environmental impacts associated with the production of cement clinker in an ordinary shaft kiln. Users should note that technological advances and efficiency improvements may alter the impact, and as such the data should be critically reviewed if used for conducting a life cycle assessment of modern production facilities. When using this data, consider including the emissions and energy consumption associated with the raw material extraction and transportation, as these are critical aspects of the clinker production process.

## Review details
Inventory: The internal review was done by several iteration steps concerning raw data validation, raw data documentation, representativity, completeness and consistency of modelling with regard to ISO 14040 and 14044.

## Data sources
- 刘顺妮. (2003). 水泥-混凝土体系环境影响评价及其应用研究 [博士, 武汉理工大学].
