# underground coal mining ;coal mining

Dataset: ILCD process, Unit process, black box
Geography: SQ-HEN-CN
Reference year: 2015
Classification: Energy carriers and technologies / Energetic raw materials
Generated by: Linlin Yin, yinlinlin0623@163.com
Owner: Tiangong LCI Data Working Group
Review: Dependent internal review by Tiangong LCI Data Working Group
Amounts: no units in this file; such an amount is in the reference unit of its flow, which a separate flow dataset defines
licenseType: Free of charge for all users and uses

## General comment
The coal extracted from the Yongcheng mining area is primarily used for energy production due to its resource reserves and favorable mining conditions. The coal seams' stable occurrence and gentle dip angle facilitate mechanized mining approaches, making the coal suitable for use in power generation plants, industrial boilers, and various manufacturing processes requiring thermal energy.

## Geography
Compared with other mining areas in the province, Yongcheng mining area has higher advantages in resource reserves and reserve-mining ratio. It is now divided into 5 exploration coal mining areas and 2 coal prospecting prediction areas. The occurrence of coal seams in Yongcheng mining area is relatively stable, and the mining technical conditions are relatively simple. The dip angle of the mineable coal seam is relatively gentle, which is suitable for mechanized mining.

## Technology and included processes
The production process of coal mining includes mine field development, roadway excavation, support, mining and so on. The underground mining mainly mines the coal buried in the ground and transports it to the ground through the excavation of the roadway. The inventory analysis of this link mainly includes the consumption of fuel, raw materials, and the emission of waste gas.

## Reference product
- Hard coal, at consumer EU-27: 1.7196e9; uniform; measured
  This paper obtains various activity level data through field surveys of wells in the Yongcheng mining area. Now, the 2013 data of Xinqiao Coal Mine is used as an example to conduct pre-account analysis. Activity level data of “raw coal production” in Xinqiao Coal Mine in 2013.

## Inputs
All rows: uniform
- Hard coal, at consumer EU-27: 3.327e6; measured
  This paper obtains various activity level data through field surveys of wells in the Yongcheng mining area. Now, the 2013 data of Xinqiao Coal Mine is used as an example to conduct pre-account analysis. Data on “raw coal” consumption activity levels in Xinqiao Coal Mine mining in 2013.
- Gasoline (regular): 30650; measured
  This paper obtains various activity level data through field surveys of wells in the Yongcheng mining area. Now, the 2013 data of Xinqiao Coal Mine is used as an example to conduct pre-account analysis. Data on “gasoline” consumption activity levels in Xinqiao Coal Mine mining in 2013.
- Diesel: 35200; measured
  This paper obtains various activity level data through field surveys of wells in the Yongcheng mining area. Now, the 2013 data of Xinqiao Coal Mine is used as an example to conduct pre-account analysis. Data on "diesel" consumption activity levels in Xinqiao Coal Mine mining in 2013.
- water: 9.34928e8; measured
  This paper obtains various activity level data through field surveys of wells in the Yongcheng mining area. Now, the 2013 data of Xinqiao Coal Mine is used as an example to conduct pre-account analysis. Data on "water" consumption activity levels in Xinqiao Coal Mine mining in 2013.
- Electricity: 1.86595e8; measured
  This paper obtains various activity level data through field surveys of wells in the Yongcheng mining area. Now, the 2013 data of Xinqiao Coal Mine is used as an example to conduct pre-account analysis. Data on "electricity" consumption activity levels in Xinqiao Coal Mine mining in 2013.
- Hard coal, at consumer EU-27: 2.0197; software or database
  Corrected emission factors, "Raw Coal Corrected Emission Factors" for Xinqiao Coal Mine in 2013
- Diesel: 3.21; software or database
  Corrected emission factors, Xinqiao Coal Mine 2013 "Diesel Corrected Emission Factors" for Mine Mining
- Gasoline (regular): 3.24; software or database
  Corrected emission factors, "Gasoline Corrected Emission Factors" for Mine Mining in Xinqiao Coal Mine in 2013
- Electricity: 972.4; software or database
  Corrected emission factors, Xinqiao Coal Mine 2013 mine mining "Electricity Corrected Emission Factors"
- water: 0.000212; software or database
  Corrected emission factors, Xinqiao Coal Mine’s 2013 mine mining “Water Corrected Emission Factors”

## Use advice
When utilizing this LCA data set for the Yongcheng mining area, it is important to take into account the specific conditions such as the relatively simple mining technical conditions and the mechanization of the mining process. Inventory analysis should consider fuel and raw material consumption, as well as waste gas emissions from the mining process. This data set should be used in accordance with the regional geological characteristics, and it is recommended to update the data regularly to reflect any changes in mining technology or environmental regulations.

## Review details
Inventory: The internal review was done by several iteration steps concerning raw data validation, raw data documentation, representativity, completeness and consistency of modelling with regard to ISO 14040 and 14044.
