# Nickel Concentrate Production ; Nickel-Copper Mixed Concentrate (8.6% Nickel) ; Crushing ; Nickel-Copper-Cobalt Ore in Xinjiang Province

Dataset: ILCD process, Unit process, single operation
Geography: GS-CN
Reference year: 2018
Classification: Unit processes / Materials production / Non-energetic raw materials
Generated by: Sun Xin, xs389@cornell.edu
Owner: Tiangong LCI Data Working Group
Review: Dependent internal review by Tiangong LCI Data Working Group
Amounts: no units in this file; such an amount is in the reference unit of its flow, which a separate flow dataset defines
licenseType: Free of charge for all users and uses

## General comment
The inventory for the mining and beneficiation phases is from a typical nickel-copper sulphide mine in Gansu, China, with an average nickel content of 0.96%. The nickel reserves at the above mine represent approximately 79% of the total nickel resources in China.

## Technology and included processes
Given the complexity of geology and resource features, the cemented backfilling method was applied to extract nickel raw ore during mining, and the selected filling material and adhesive were tailings and cement, respectively. Underground construction machinery (e.g., rock drill, slag-raking machine, electric locomotive, and harvesters) and ground construction machinery (e.g., tower crane, electric welding machine, and truck) were used in the mining process. For the beneficiation process, nickel ore was processed by jaw crushers, a circular vibrating screen, ball mills, a flotation machine and a thickener to obtain the mixed nickel–copper concentrate with a nickel content of approximately 8.6%.

## Technical purpose
The nickel-copper mixed concentrate with 8.6% nickel composition produced by the crushing process is intended for use as a raw material in the production of nickel, copper, and cobalt-related products. This product is suitable for applications requiring high purity nickel such as in the manufacturing of stainless steel, alloys, plating, and rechargeable batteries.

## Reference product
- Nickel concentrate (8.6% Ni): 11794; measured

## Inputs
All rows: measured
- nickel: 126488
- Tire: 0.01
- Wood: 0.09
- water: 79060
- unspecified: 4.43
- Explosive: 42.05
- steel rebar: 112.44
- sodium carbonate: 22.19
- Calcium Oxide: 55.37
- transport in t*km: 1390
- Electricity: 14976
- Diesel: 1.61
- Gasoline (regular): 1.61
- Hard coal, at consumer EU-27: 500
- Detonator: 58
- Cement: 2470
- Lubricant: 2.9
- Copper sulphate: 10.87
- Xanthate: 18.12
- Nitrogenous Fertilizer: 15.85
- infrastructure: 0.13

## Outputs
All rows: measured
- particles (PM2.5 - PM10): 4.46
- sulfur dioxide: 0.6
- nitrous oxide: 1.51
- nickel: 0.03421, 0.01499 (2 entries)
- copper: 0.01319, 0.02932 (2 entries)
- cobalt: 0.00119
- arsenic: 0.00012
- zinc: 0.00012, 0.00741 (2 entries)
- lead: 0.00036
- chromium: 0.00238, 0.00405 (2 entries)
- cadmium: 0.002
- municipal solid waste deposition: 13.35
- waste water - untreated: 248750
- hazardous waste (unspecified): 1.01

## Use advice
When using this dataset for Life Cycle Assessment, include all emissions and energy consumption associated with the crushing process of the nickel concentrate production. Ensure that transportation of raw materials to the processing site and from the production site to downstream users is included if it falls within the system boundary. Model the use phase behavior considering the specific end applications of the nickel-copper-cobalt alloy products. Take methodological aspects, such as potential recycling benefits or cut-off rules, into account where applicable.

## Review details
Inventory: The internal review was done by several iteration steps concerning raw data validation, raw data documentation, representativity, completeness and consistency of modelling with regard to ISO 14040 and 14044.

## Data sources
- Bai, Y. et al. Strategies for improving the environmental performance of nickel production in China: Insight into a life cycle assessment. Journal of Environmental Management 312, 114949 (2022).
