# Natural gas development planning ; KLS tectonic belt ; Stochastic simulation

Dataset: ILCD process, Unit process, single operation
Geography: XJ-CN
Reference year: 2014
Classification: Unit processes / Energy carriers and technologies / Natural gas based fuels
LCI method principle: Attributional
LCI method approaches: Consequential
Generated by: Shikang Kang, 908798159@qq.com
Owner: Tiangong LCI Data Working Group
Review: Dependent internal review by Tiangong LCI Data Working Group
Amounts: no units in this file; such an amount is in the reference unit of its flow, which a separate flow dataset defines
copyright: false
licenseType: Free of charge for all users and uses

## General comment
Risk assessment of natural gas development planning scheme needs a lot of stochastic simulation, which must be realized by computer. Therefore, based on the risk assessment theory of natural gas development planning scheme, an evaluation software is developed, and its application research is carried out with the help of the software

## Geography
Crassus structural belt in Tarim basin, Xinjiang

## Time period
Data collection time

## Technology and included processes
The software also integrates common evaluation methods of reserves, production and benefit, mainly dynamic analysis method and numerical simulation method of production prediction, and forms a list of recommended methods for gas fields in different development stages

## Technical purpose
This industrial process is specifically designed for risk assessment in the development of natural gas fields. The evaluation software developed based on risk assessment theories for natural gas development planning is intended for use in stochastic simulation studies of the KLS structural belt in Tarim Basin, Xinjiang. It is suited for gas field A, which has been identified for its significant geological reserves and specific reservoir characteristics. The software integrates various methods for assessing reserves, production, and benefits, catering to dynamic analysis of production prediction and numerical simulation for effective planning and operation in different stages of gas field development.

## Reference product
- Shale gas well: 0.31; input; min 0.28; max 0.34; uniform; calculated
  The internal rate of return is concentrated at 28%-34%, and the risk of economic benefits throughout the life cycle is small.

## Inputs
- natural gas: 2.51e12; log-normal; missing unimportant
  There is no natural gas input in the literature, assuming that the input and output during natural gas extraction process are 1:1

## Outputs
- methane (fossil): 2.51e12; log-normal; missing unimportant
  By 2030, natural gas production will reach 2.15E12

## Data selection and combination
The proven developed gas field in KLS structural belt is only gas field A, with reported proven geological reserves of 2830 × 10 and recoverable reserves of 2130 × 10. The gas reservoir types belong to medium porosity and medium permeability, bottom water, abnormal high pressure and dry gas reservoir. It was put into production on November 19th, 2004, and all wells were drilled by the end of 2006, reaching the capacity scale of 107 × 10 designed by the scheme.

## Data treatment and extrapolations
The traps to be drilled are implemented, so the resource conversion rate method is used to predict the trend of new reserves. Historically, the conversion rate of resources in and around the tectonic zone is between 50% and 55%. Taking history as a reference, the reliability limit of resource quantity evaluation, that is, floating up and down by 30%, is taken as the probability interval, and the probability curve function adopts normal distribution

## Use advice
When using the provided LCA data, incorporate the stochastic simulation results from the evaluation software to assess risks associated with natural gas development planning. Ensure that the software's outputs, such as the dynamic analysis of production predictions and numerical simulations, are interpreted in the context of medium porosity and permeability, bottom water, abnormal high pressure, and dry gas reservoir characteristics of gas field A. Use historical conversion rates as a basis for probabilistic forecasting, adjusting for a 30% fluctuation. The normal distribution function should be applied for probability curve estimations. This data should be used within its technological applicability and data collection time frame.

## Review details
Inventory: The internal review was done by several iteration steps concerning raw data validation, raw data documentation, representativity, completeness and consistency of modelling with regard to ISO 14040 and 14044.

## Data sources
- 陆家亮. 天然气开发规划风险量化评价模型研究[D].中国地质大学(北京),2020.DOI:10.27493/d.cnki.gzdzy.2014.000149.
