# Electricity production ; Electricity mix ; Gansu

Dataset: ILCD process, Unit process, single operation
Geography: GS-CN
Reference year: 2019
Classification: Unit processes / Energy carriers and technologies / Electricity
Generated by: Ruoxi Xiong, xiongrx0126@163.com
Owner: Tiangong LCI Data Working Group
Review: Dependent internal review by Tiangong LCI Data Working Group
Amounts: no units in this file; such an amount is in the reference unit of its flow, which a separate flow dataset defines
copyright: false
licenseType: Free of charge for all users and uses

## General comment
Electricity mix includes thermal, hydro, wind, nuclear and solar generation

## Technical purpose
This data set represents the electricity mix of Gansu province generated from various sources including thermal, hydro, wind, nuclear, and solar power. It is intended for use in quantifying the environmental impact of electricity consumption in products and services that are sourced or manufactured within Gansu or are utilizing Gansu's electricity mix in their life cycle.

## Reference product
- Electricity: 3.6; missing unimportant
  [{'text': '能量', 'type': 'text'}]

## Inputs
All rows: missing unimportant
- electricity for thermal power: 1.78335
  [{'text': '能量', 'type': 'text'}]
- electricity from hydroelectric power plant: 1.07014
  [{'text': '能量', 'type': 'text'}]
- electricity for nuclear power: 0
  [{'text': '能量', 'type': 'text'}]
- electricity from wind power: 0.491918
  [{'text': '能量', 'type': 'text'}]
- electricity for solar power: 0.254588
  [{'text': '能量', 'type': 'text'}]

## Use advice
When applying this data set in Life Cycle Assessment, users should ensure inclusion of all electricity generation sources as detailed, reflecting the actual consumption mix. If the LCA concerns a specific period, users must verify if the mix corresponds to that period accurately. Attention must be paid to the methodological consistency, especially regarding system boundaries and potential electricity exports or imports not accounted for in this data. The technological applicability, in terms of advancement and efficiency of generation, should also be consistent with the studied system.

## Review details
Inventory: The internal review was done by several iteration steps concerning raw data validation, raw data documentation, representativity, completeness and consistency of modelling with regard to ISO 14040 and 14044.

## Data sources
- 能源统计年鉴2020
