# Solvent extraction;Rare Earth Elements (REE);bastnaesite route;ion adsorption clay deposits (IAD)

Dataset: ILCD process, Unit process, single operation
Geography: CN
Reference year: 2014
Classification: Materials production / Inorganic chemicals
Functional unit: The functional unit of this study is the production of 1 kg of the basket REO from each corresponding mineralogical and processing route.
LCI method principle: Attributional
LCI method approaches: Allocation - market value
Generated by: Tao Wang, twang@iue.ac.cn
Owner: Tiangong LCI Data Working Group
Review: Dependent internal review by Tiangong LCI Data Working Group
Amounts: no units in this file; such an amount is in the reference unit of its flow, which a separate flow dataset defines
copyright: false
licenseType: Free of charge for all users and uses

## General comment
The described process is utilized in the mining industry for the production of rare earth elements (REEs) via the bastnaesite route. This involves the use of solvent extraction techniques to refine the mined ore after preliminary processes like precipitation and calcination. The mined product is primarily used in various high-tech applications, including electronics, magnets, renewable energy technologies, and as catalysts in chemical synthesis.

## Geography
Seven Southern Provinces

## Technology and included processes
In this study, the REE production system was analyzed from mining up to and including solvent extraction which contains product finishing processes such as precipitation and calcination

## Reference product
- Rare Earth Oxides: 1; calculated
  LANGUAGE

## Inputs
All rows: calculated
- water: 0.0563
- Disooctyl Phosphate (P204): 0.0253
- Sodium hydroxide: 2.67
- Rare Earth Oxides: 1.17
  REO concentrate production from ion-adsorption deposits, in-situ leaching, 91% purity
- hydrogen chloride: 3.23
- Electricity: 0.954
- antimony: 0.791
  citric acid

## Outputs
All rows: calculated
- municipal solid waste deposition: 0.00531
- Water (groundwater from technosphere, waste water): 0.0538
- Low radioactive wastes: 0.108
- Hazardous waste (deposited, hibernating in ground, non elementary flow): 0.00268
- Sludge: 0.00215
- sodium: 0.00144
- hydrogen chloride: 0.0062
- water: 0.075
- chlorine: 0.0127

## Deviations from the LCI method approaches
In this study, the REE production system was analyzed from mining up to and including solvent extraction which contains product finishing processes such as precipitation and calcination (Fig. 1). The other categories assessed in the literature review were mineral type, radioactivity, waste treatment, and co-mining. For mineral type, it was noted that the mineralogy accounted for in each study was different, which makes comparison difficult. For radioactivity, we marked with an X those studies which exemplified radioactivity flows in the LCI (if provided). For waste, we distinguished those LCIs which quantified waste treatment flows. For co-mining, since all REE are co-products of each other, this column is meant to highlight the co-products in addition to REE.

## Use advice
The life cycle inventory (LCI) data set derived from this study is specific to the solvent extraction of REEs via the bastnaesite route in the Seven Southern Provinces. Care should be taken when comparing this LCI data set with others as variations in mineralogy, radioactivity, and waste treatment processes can lead to inconsistency. Studies exemplifying radioactivity and quantifying waste treatment flows should particularly note the methodology used for these assessments. When considering co-mining impacts, it is important to assess the co-products in addition to REEs. This LCI data represents the environmental inputs and outputs associated with the production of 1 kg of a basket of REO from the specified mineral and processing route.

## Review details
Inventory: The internal review was done by several iteration steps concerning raw data validation, raw data documentation, representativity, completeness and consistency of modelling with regard to ISO 14040 and 14044.

## Data sources
- Bailey, G. et al. Review and new life cycle assessment for rare earth production from bastnäsite, ion adsorption clays and lateritic monazite. Resources, Conservation and Recycling 155, 104675 (2020).
