# Cement clinker calcination;cement clinker;rotary kiln;phosphogypsum

Dataset: ILCD process, Unit process, single operation
Geography: SD-CN
Reference year: 2013
Classification: Unit processes / Materials production / Other mineralic materials
Generated by: ZengAo, m202374287@hust.edu.cn
Owner: Tiangong LCI Data Working Group
Review: Dependent internal review by Tiangong LCI Data Working Group
Amounts: no units in this file; such an amount is in the reference unit of its flow, which a separate flow dataset defines
copyright: false
licenseType: Free of charge for all users and uses

## General comment
鲁北化工传统回转窑工艺，分解煅烧衣服进行的“一步法”

## Geography
数据基于山东鲁北化工实际生产数据

## Technology and included processes
回转窑分解煅烧

## Technical purpose
The cement clinker produced in this traditional rotary kiln process by Luban Chemical Industry is used for the manufacture of various types of cement. The high-temperature calcination process employed, known as the 'one-step' process, is specific to the production of cement clinker which is a critical component in the construction industry for creating concrete.

## Reference product
- portland cement (CEM I): 1; measured
  The original data is cement clinker, and the selected flow is ordinary Portland cement.

## Inputs
- hard coal,hard coal: 0.519; measured
- industrial area: 0.0016; measured
- Phosphogypsum: 2.002; measured

## Outputs
- carbon dioxide (fossil),carbon dioxide (fossil): 1.34; measured
- sulfur dioxide: 0.975; measured
- nitrous oxide: 0.0009; measured
- Flue dust: 0.00076; measured

## Data selection and combination
来自调研及数据库

## Data treatment and extrapolations
参照实际生产添加量计算

## Use advice
This data set represents the actual production data of 1kg of cement clinker from Shandong Luban Chemical using a rotary kiln calcination process. The inventory includes all major raw materials and all required energy inputs. Exclusions are the production processes of raw materials and minor energy flows (less than 1%). Users should note that infrastructure, services, or auxiliary facilities have been systematically excluded. This data is intended for Life Cycle Assessment studies of cement products and should be used in accordance with standard LCA methodology, considering the technological applicability to the specific context of the LCA study.

## Review details
Inventory: The internal review was done by several iteration steps concerning raw data validation, raw data documentation, representativity, completeness and consistency of modelling with regard to ISO 14040 and 14044.

## Data sources
- 张杭 et al. 不同分解工艺下磷石膏分解制水泥熟料的LCA研究. 材料导报 27, 302–305 (2013).
