# Pork production ; pork raising

Dataset: ILCD process, Unit process, single operation
Geography: ZY-GS-CN
Reference year: 2012
Classification: Unit processes / Materials production / Food and renewable raw materials
Functional unit: 1kg pork as functional unit (FU)
Generated by: Rui Yang, 1632707028@qq.com
Owner: Tiangong LCI Data Working Group
Review: Dependent internal review by Tiangong LCI Data Working Group
Amounts: no units in this file; such an amount is in the reference unit of its flow, which a separate flow dataset defines
copyright: false
licenseType: Free of charge for all users and uses

## General comment
During the fattening period of live pigs, the feed of fattening pigs is all concentrate feed

## Geography
The average water consumption per cow was 70kg per day, according to the investigation of Shigangdun pasture of Qianjin Animal Husbandry in Zhangye City

## Time period
Pig feed ingredients (Liu Mingda et al., 2012)

## Technology and included processes
LCA was used to evaluate the four livestock products, and to evaluate the resource consumption, product input and environmental emissions in the whole process from raw material production to final product production. The four livestock products were evaluated in the same evaluation model, and the impact degree of a certain type of environmental impact and its comprehensive impact on the environment were qualitatively and quantitatively assessed. Finally, the environmental impact indicators of producing 1kg beef, 1kg milk, 1kg pork and 1kg chicken eggs were obtained respectively. Through analyzing and comparing the environmental load of the production of four kinds of livestock products, suggestions were provided for the adjustment of the breeding structure of China's livestock industry and the production structure of livestock products. And through the field research of advancing animal husbandry in Zhangye City, learning from the development model of advancing animal husbandry cooperative, the development model of grassland agriculture in China was discussed.

## Technical purpose
The described process relates specifically to pork production, with a focus on the fattening stage in pig raising where concentrate feed is used exclusively. This indicates the usage of the pigs primarily for meat production. These fattening pigs are likely part of a larger scale agricultural livestock farm or operation. The average final weight of these pigs at the time of sale, or 'offtake,' is 125kg. This set of data may be used to model the environmental impacts of pork production for comparison with other protein sources or to measure the efficiency and environmental footprint of a particular farming operation.

## Reference product
- pig: 1; measured
  pork

## Inputs
- maize grain: 2.1; measured
  corn
- wheat: 1.4; measured
- soybean: 0.32; measured
  soybeans
- water: 7; measured

## Data selection and combination
出栏时平均体重为 125kg（刘 鸣达等，2012），料肉比为 3：1（张颖等，2010）

## Use advice
When applying this LCA data for pork production, users should ensure they incorporate the specific feed regime mentioned (exclusive use of concentrate feed) as this significantly affects the environmental footprint. Attention should also be given to the allocated water consumption of 70kg per cow per day, which could be a consideration for water resource impact assessments. The functional unit of 1kg pork should be used for comparison and scaling within system boundaries. The data reflecting average weight and feed-to-meat ratio provide critical parameters for calculating inputs and outputs within the life cycle of pork production.

## Review details
Inventory: The internal review was done by several iteration steps concerning raw data validation, raw data documentation, representativity, completeness and consistency of modelling with regard to ISO 14040 and 14044.

## Data sources
- 魏云. 基于生命周期评价的禽畜产品环境影响评价及对策探讨. (兰州大学, 2016).
