# cement production;cement, ordinary portland cement, 42.5MPa

Dataset: ILCD process, Unit process, black box
Geography: BJ-CN
Classification: Unit processes / Materials production / Other mineralic materials
Generated by: #REF!, ysqsophia@gmail.com
Owner: Tiangong LCI Data Working Group
Review: Dependent internal review by Tiangong LCI Data Working Group
Amounts: no units in this file; such an amount is in the reference unit of its flow, which a separate flow dataset defines
copyright: false
licenseType: Free of charge for all users and uses

## General comment
The environmental loading of cement production under usual cement production.

## Technical purpose
This data set represents the environmental loading of the production of ordinary Portland cement with a strength grade of 42.5MPa. Such cement is widely used in general construction works, including commercial and residential buildings, bridges, and roads, providing the necessary structural integrity and durability for a range of construction projects.

## Model description
Functional unit definition: Take the performance of 1t 42.5 ordinary Portland cement as a functional unit. The system boundary is: from raw material entering the factory, raw material pretreatment, raw meal grinding, raw meal calcination, clinker grinding, until cement homogenization and storage, that is, the direct production process of cement in the entire cement plant, excluding raw material mining, Processing and transportation process. The geographical scope of the study is the Beijing area.

## Reference product
- cement, ordinary portland cement, 42.5MPa: 1000
  42.5 Ordinary silicate cement

## Inputs
- limestone, crushed, for mill: 1318.5
  Limestone
- clay: 94.5
  Clay-based raw materials
- iron, powder: 27
  Iron corrective raw materials
- gypsum stone (CaSO4-dihydrate): 60
  The proportion of gypsum is 5.5%
- mixed materials, mineral: 200
  Mixed material
- hard coal; 26.3 MJ/kg: 120
  Coal consumption kg
- Electricity: 363.6
  Power consumption

## Outputs
- Nitrogen oxides: 1.88
  NOx
- sulfur dioxide: 0.004
  SO2
- particles (> PM10): 12
  Dust, with an unspecified particle size, is treated as PM > 10 micrometers in diameter.
- carbon dioxide (fossil): 772
  CO2. Since the volume of CO2 is generally not detected, the emissions are calculated according to the following formulas. CO2 generates the combustion of fossil energy such as fuel, coal-fired and other fossils, as well as limestone decomposition in cement production raw materials. (1) CO2 emissions of fossil energy combustion are calculated as follows: e = 3.67fqka. E is the emissions of CO2, KG; F is the consumption of fuel, kg; Q is fuel thermal mass, mj/kg; K is the carbon emissions coefficient of fuel; A is the carbon oxidation rate of fuel. (2) During the production of cement, the chemical reactions of raw materials limestone generate a large number of CO2 chemical reactions: CACO3 → Cao+CO2 ↑. The percentage of 1kg of limestone CAO is calculated at 48%. In the end, the estimated formula for CO2 emissions is: CO2 emissions = limestone consumption*0.38+e = 271kg+501kg = 772kg.

## Use advice
When using this data set for Life Cycle Assessment, it is important to maintain the defined system boundaries, which include the direct production process within the cement plant from raw material entry, preparation, and grinding, to the homogenization and storage of cement. Exclude consideration of raw material extraction, processing, and transportation from the analysis unless these actions take place within the defined geographical scope of the study, which is the Beijing area. Additionally, for studies requiring geographical specificity, consider the relevance of the data strictly within the context of the Beijing area cement production practices.

## Review details
Inventory: The internal review was done by several iteration steps concerning raw data validation, raw data documentation, representativity, completeness and consistency of modelling with regard to ISO 14040 and 14044.

## Data sources
- 崔素萍, 吴红, 聂祚仁, & 王志宏. (2006). 水泥窑处理固体废弃物环境影响评价. 中国水泥, 7, 50–52.
