# Tire production;Blended compound;Compoundblending;natural rubber,Synthetic rubber, Carbon black, Silicon dioxide,Zinc oxide, Stearic acid, Lubricating oil, Processing agent,Active clay

Dataset: ILCD process, Unit process, single operation
Geography: CN
Reference year: 2014
Classification: Unit processes / Materials production / Non-energetic raw materials
Generated by: Cui, di, 2806553850@qq.com
Owner: Tiangong LCI Data Working Group
Review: Dependent internal review by Tiangong LCI Data Working Group
Amounts: no units in this file; such an amount is in the reference unit of its flow, which a separate flow dataset defines
copyright: false
licenseType: Free of charge for all users and uses

## General comment
the production stage is quite complex andincludes the processes of compound blending, rolling, extrusion, packet ring production, cutting and forming, vulcanizing, and testing. We combined closely related processes toavoid allocation. The following four main production processes were identified: compound blending, rolling and extrusion,cutting and forming, and vulcanizing and testin

## Time period
“Data collected onsite in 2014 by one of the largest Chinese tire companies were used in the assessment. ”The article has stated that the data is related to 2014, but there is no specific time, so the time is set on January 1, 2014.

## Technical purpose
The industrial process described is involved in the production of tires. It uses a blended compound composed of natural rubber, synthetic rubber, carbon black, silicon dioxide, zinc oxide, stearic acid, lubricating oil, processing agent, and active clay. This process is applicable in the fabrication of various types of tires, where compound blending, rolling, extrusion, packet ring production, cutting and forming, vulcanizing, and testing are critical stages. The described stages ensure the production of high-quality tires for automotive applications, including personal vehicles, commercial trucks, and other types of motorized transportation.

## Reference product
- Tire: 9.497; measured

## Inputs
All rows: measured
- Natural Rubber: 1.859
- synthetic rubber: 2.471
- Carbon Black: 2.515
- Silicon dioxide: 0.077
- Electricity: 14.44
- steam: 0.76
- Tap water: 6.96

## Outputs
- non-methane volatile organic compounds: 5e-6; measured
- chemical oxygen demand: 0.00173; measured
- Suspended solids, unspecified: 0.00019; measured
- Waste rubber,Waste fiber fabric: 0.001; measured

## Data selection and combination
The data on the raw materials used in the investigated tire product were sourced from on-site investigations of one of the largest Chinese tire companies. The data were collected in 2014 during the manufacture of the target tire product.Other materials, such as active clay, zinc oxide, stearic acid, processing agent, and lubricating oil, were also considered.Life cycle background data on these other materials were obtained from the global average LCI data of Ecoinvent 3.0

## Use advice
The data set users should specifically consider the production year when evaluating the LCA, as the data was collected on-site in 2014. The technological aspects described are relevant to that time, and users may need to account for technological advancements in tire production when applying this data to current assessments. Notably, the recycling of materials such as zinc oxide, stearic acid, and processing agents should be assessed in the context of their individual life cycles, which are provided by Ecoinvent 3.0 for global averages. Data users should integrate closely related processes to avoid allocation errors and should ensure data quality and relevance.

## Review details
Inventory: The internal review was done by several iteration steps concerning raw data validation, raw data documentation, representativity, completeness and consistency of modelling with regard to ISO 14040 and 14044.

## Data sources
- Sun X, Liu J, Hong J, et al. Life cycle assessment of Chinese radial passenger vehicle tire[J]. The International Journal of Life Cycle Assessment, 2016, 21: 1749-1758.
