# NCM battery hydrometallurgical recycling

Dataset: ILCD process, Unit process, single operation
Geography: CN
Reference year: 2022
Classification: End-of-life treatment / Material recycling
Functional unit: 1 kWh of the Eol NCM battery
Generated by: Chen, Lipeng, lpchen07@163.com
Owner: Tiangong LCI Data Working Group
Review: Dependent internal review by Tiangong LCI Data Working Group
Amounts: no units in this file; such an amount is in the reference unit of its flow, which a separate flow dataset defines
copyright: false
licenseType: Free of charge for all users and uses

## General comment
The hydrometallurgical recycling process involves acid leaching of precleaned with simplified disassembly of EOL batteries, which are extracted and purified, and classified to obtain the ternary precursor cathode material by recycling technology

## Technical purpose
The technical application of the described process concerns the recycling of end-of-life (EOL) nickel-cobalt-manganese (NCM) lithium-ion batteries through hydrometallurgical recovery. The obtained ternary precursor cathode materials are primarily utilized for the manufacturing of new lithium-ion batteries, catering to various sectors including consumer electronics, electric vehicles, and energy storage systems.

## Reference product
- EoL NCM battery: 0.0157; input; article inperiodical

## Inputs
All rows: article inperiodical
- Electricity: 66.96
- process steam: 12
- sodium chloride: 0.0675
- water,water: 83.1
- sulphuric acid: 1.27
- Disooctyl Phosphate (P204): 0.00394
- 2-ethylhexyl hydrogen -2-ethylhexylphosphonate: 0.00145
- Hydrochloric acid (32%): 24
- Sulfonated kerosene: 0.0137
- Sodium sulfide: 0.0133
- ammonia: 0.417
- Sodium hydroxide: 0.884

## Outputs
All rows: article inperiodical
- hydrogen fluoride: 0.000438
- Dust (unspecified, from stack),Dust (unspecified, from stack): 0.000438
- hydrogen sulfide: 2.29e-5
- ammonium: 8.59e-5
- Sulfuric acid mist: 3.75e-5
- chemical oxygen demand: 0.0103
- Suspended solids, unspecified: 0.124
- biological oxygen demand: 0.00364
- nickel: 4.75e-5
- cobalt: 4.38e-5
- manganese: 4.75e-5
- lithium: 0.00398
- Ammonia Nitrogen: 0.000596
- Cathode Material: 1.25

## Use advice
When utilizing this dataset for life cycle assessment (LCA) purposes, it is critical to ensure that the scope of the LCA includes the specific end-of-life recovery stages. Users must account for the efficiency of acid leaching and purification steps within the hydrometallurgical process. Environmental impacts associated with the use of chemicals for leaching and further processing should also be included in the analysis. Due consideration must be given to the potential inclusion of a portion of the recycled material based on the final purity and recovery rates.

## Review details
Inventory: The internal review was done by several iteration steps concerning raw data validation, raw data documentation, representativity, completeness and consistency of modelling with regard to ISO 14040 and 14044.

## Data sources
- Feng, T., Guo, W., Li, Q., Meng, Z. & Liang, W. Life cycle assessment of lithium nickel cobalt manganese oxide batteries and lithium iron phosphate batteries for electric vehicles in China. Journal of Energy Storage 52, 104767 (2022).
