# Plexiglass ; laminated glass ; cutting

Dataset: ILCD process, Unit process, single operation
Geography: SX-ZJ-CN
Reference year: 2004
Classification: Unit processes / Materials production / Glass and ceramics
Generated by: He xiaxia, 18616148319@163.com
Owner: Tiangong LCI Data Working Group
Review: Dependent internal review by Tiangong LCI Data Working Group
Amounts: no units in this file; such an amount is in the reference unit of its flow, which a separate flow dataset defines
copyright: false
licenseType: Free of charge for all users and uses

## General comment
This industrial process data set pertains to the production and cutting of laminated glass, incorporating PVB (Polyvinyl Butyral) film. It is typically applied in the manufacture of safety and security glass products, such as automobile windshields, architectural glass for buildings, and various types of protective glass for different industries.

## Reference product
- polyvinyl butyral PVB胶片: 19500; measured
  PVB film, polyvinyl butyral

## Inputs
- Electricity: 59760; measured
- polyvinyl butyral PVB胶片: 20000; measured
  PVB film, polyvinyl butyral

## Outputs
- Waste (solid): 500; measured

## Use advice
When utilizing this data set for Life Cycle Assessment (LCA), ensure that the scope of the LCA clearly defines the boundaries of the glass cutting process. Consider the energy consumption and waste generated during the cutting stage. Additionally, take into account the origin and recycling potential of the PVB film, as it might significantly impact the environmental assessment results.

## Review details
Inventory: The internal review was done by several iteration steps concerning raw data validation, raw data documentation, representativity, completeness and consistency of modelling with regard to ISO 14040 and 14044.

## Data sources
- 年产5600吨钢化玻璃及250吨夹层玻璃生产线建设项目环境影响报告
