# Electricity production ; Thermal power ; Guangxi

Dataset: ILCD process, Unit process, single operation
Geography: GX-CN
Reference year: 2019
Classification: Unit processes / Energy carriers and technologies / Electricity
Generated by: Ruoxi Xiong, xiongrx0126@163.com
Owner: Tiangong LCI Data Working Group
Review: Dependent internal review by Tiangong LCI Data Working Group
Amounts: no units in this file; such an amount is in the reference unit of its flow, which a separate flow dataset defines
copyright: false
licenseType: Free of charge for all users and uses

## General comment
Thermal power generation includes seventeen fossil fuels such as raw coal, washed coal, oil and natural gas. The process only considers the direct power generation process, not the upstream raw material extraction and processing and the downstream power consumption

## Time period
Calculated based on data from the 2019 Energy Statistics Yearbook

## Technical purpose
The thermal power generation process in Guangxi, referenced in this data set, is designed to transform energy using seventeen types of fossil fuels including raw coal, washed coal, oil, and natural gas. This process is primarily utilized to produce electricity directly for regional consumption without accounting for the upstream processes of raw material extraction and processing or the downstream electricity use by consumers.

## Reference product
- electricity for thermal power: 3.6; calculated

## Inputs
All rows: calculated
- Raw coal: 0.408746
- Coke oven gas: 0.007461
- blast furnace gas: 0.122026
- Converter gas: 0.010273
- Diesel: 4.372e-5
- Petroleum Coke: 0.00130948
- natural gas: 0.001202

## Outputs
- carbon dioxide (fossil): 0.883318; calculated
- sulfur dioxide: 0.000146361; calculated
- Nitrogen oxides: 0.00023433; calculated
- particles (> PM10): 3.1121e-5; calculated

## Data treatment and extrapolations
For the accounting method, please refer to the "Enterprise Greenhouse Gas Emissions Accounting Methods and Reporting Guidelines for Power Generation Facilities". Different forms of power generation and fuel consumption come from Chapter 3 (Energy Production) and Chapter 6 (Regional Energy Balance Sheet) in the "China Energy Statistical Yearbook 2020". The fuel parameters such as low calorific value and carbon content per unit calorific value used to calculate the carbon dioxide emission factor come from the "2019 China Regional Power Grid Carbon Dioxide Baseline Emission Factor Calculation Instructions OM" and the "Enterprise Greenhouse Gas Emission Accounting Method and Reporting Guide for Power Generation Facilities" 》

## Use advice
Users should refer to the 'Enterprise Greenhouse Gas Emissions Accounting Methods and Reporting Guidelines for Power Generation Facilities' for the accounting method of emissions. Furthermore, data regarding different forms of power generation and fuel consumption should be sourced from Chapter 3 (Energy Production) and Chapter 6 (Regional Energy Balance Sheet) of the 'China Energy Statistical Yearbook 2020'. Fuel parameters such as low calorific value and carbon content per unit calorific value necessary for calculating the carbon dioxide emission factor are to be taken from the '2019 China Regional Power Grid Carbon Dioxide Baseline Emission Factor Calculation Instructions OM' and reiterated guidelines. This data set strictly pertains to the direct generation of electricity and does not include life cycle considerations such as upstream extraction and processing of fuels or the end-use of electricity.

## Review details
Inventory: The internal review was done by several iteration steps concerning raw data validation, raw data documentation, representativity, completeness and consistency of modelling with regard to ISO 14040 and 14044.

## Data sources
- 熊若熙. 中国电力生产和消费二氧化碳与污染物排放因子核算. (清华大学, 2023).
