# Aluminum electrolysis and ingot casting ; Primary aluminum ingots ; Alumina for metallurgy

Dataset: ILCD process, Unit process, single operation
Geography: HEN-CN
Reference year: 2018
Classification: Materials production / Metals and semimetals
Generated by: Changqing Xu, xcq@bit.edu.cn
Owner: Tiangong LCI Data Working Group
Review: Dependent internal review by Tiangong LCI Data Working Group
Amounts: no units in this file; such an amount is in the reference unit of its flow, which a separate flow dataset defines
copyright: false
licenseType: Free of charge for all users and uses

## General comment
Primary aluminum ingots produced through aluminum electrolysis and ingot casting are utilized for a variety of applications in different industries. These ingots can be further processed into products such as aluminum sheets, foils, wires, and extruded profiles. They are used in sectors including but not limited to automotive, aerospace, construction, packaging, and electrical engineering due to aluminum's properties of high conductivity, malleability, and its light weight.

## Time period
Year of publication

## Reference product
- aluminium, primary, ingot: 1000; article inperiodical
  原铝产品

## Inputs
All rows: article inperiodical
- electricity, high voltage, aluminium industry: 52790.4
- bauxite: 4298
- pitch: 103
- aluminium oxide, metallurgical: 1916
- anode, for metal electrolysis: 469
- petroleum coke: 535, 60.3 (2 entries)
- Fluoride: 19
  氟化物在这里是作为输入，但是只有排放的elementary flow
- calcium carbonate: 277.8
  石灰石
- sodium bicarbonate: 297
  纯碱碳酸钠-Sodium Carbonate-无条目
- solvent, organic: 4
  溶剂
- fresh water: 4828
  river water
- hard coal: 606.7
- light fuel oil: 141
- coal gas: 1.205e6
- natural gas, high pressure: 147600

## Outputs
All rows: article inperiodical
- carbon dioxide (fossil): 15121
- Nitrogen oxides: 34.1
- methane: 33.7
- carbon monoxide: 850
- sulfur dioxide: 22
- particles (> PM10): 6.65
- particles (PM2.5): 3.84
- hydrogen fluoride: 17
- Ethane, hexafluoro-, HFC-116: 0.0034
- Methane, tetrafluoro-, R-14: 0.034
  四氟化碳-无条目
- polycyclic aromatic hydrocarbons: 0.013

## Use advice
When using dataset representing the production of primary aluminum ingots via electrolysis and casting, it is important to ensure that the system boundaries are clearly defined to include all relevant inputs and outputs associated with the process. Considerations should include the source of electricity for electrolysis, potential environmental emissions during production, and any by-products or waste generated. Data users should pay attention to the year of publication to ensure the data's temporal relevance and should consider regional differences that could affect the applicability of the data to their specific context.

## Review details
Inventory: The internal review was done by several iteration steps concerning raw data validation, raw data documentation, representativity, completeness and consistency of modelling with regard to ISO 14040 and 14044.

## Data sources
- 王姗姗, 刘赛男, 王灿, & 张瑞芹. 基于生命周期评价的河南省原铝生产环境影响分析. 轻金属 1-7+16 (2018)
