# Bioethanol ; Liquid hot water

Dataset: ILCD process
Geography: GLO
Classification: Energy carriers and technologies / Renewable fuels
Generated by: Jiayi Yuan, jiayi_y@mail.bnu.edu.cn
Owner: Tiangong LCI Data Working Group
Review: Dependent internal review by Tiangong LCI Data Working Group
Amounts: no units in this file; such an amount is in the reference unit of its flow, which a separate flow dataset defines
licenseType: Free of charge for all users and uses

## General comment
This bioethanol produced using liquid hot water pretreatment is used as a renewable fuel and a green chemical feedstock, applicable in transportation fuel blends, energy generation, and potentially in the production of biodegradable plastics and other bio-based materials.

## Inputs
All rows: uniform; missing unimportant
- Electricity: 0.4608; min 0.11232; max 84.24
- heat: 17400; min 8390; max 41000
- Electricity: 77.4; min 33.768; max 142.92
- heat: 6160; min 652; max 21600
- Electricity: 633.6; min 96.84; max 1947.6

## Outputs
- heat: 9340; min 4420; max 22100; uniform; missing unimportant

## Use advice
When using this data set, consider the efficiency of the liquid hot water process and its impact on overall bioethanol yield. Attention should be given to the geographical relevance of the data, energy inputs, and potential co-products or by-products considered in the system boundary. The data should be used in conjunction with current guidelines on the sustainability and environmental impact assessment of biofuels.

## Review details
Inventory: The internal review was done by several iteration steps concerning raw data validation, raw data documentation, representativity, completeness and consistency of modelling with regard to ISO 14040 and 14044.
