# Fuel ethanol ; Corn ; Fermentation method ; All sizes; NESPS2 / 燃料乙醇 ; 玉米 ; 发酵法 ; 所有规模 ; 全国第二次污染普查数据

Dataset: ILCD process, Unit process, single operation
Geography: CN
Reference year: 2019
Classification: Reference Parameters / Energy carriers and technologies / Renewable fuels
Generated by: The data was created by the Office of the Second National Pollution Source Census of the Ministry of Ecology and Environment, and the data was organized by the TianGong Plan team for ILCD format / 生态环境部第二次全国污染源普查工作办公室创建数据，天工计划团队常慧敏整理数据为ILCD格式
Owner: Tiangong LCI Data Working Group / 天工LCI数据工作小组
Review: Dependent internal review by Tiangong LCI Data Working Group / 天工LCI数据工作小组
Amounts: no units in this file; such an amount is in the reference unit of its flow, which a separate flow dataset defines
copyright: false
licenseType: Free of charge for all users and uses

## General comment
the Technical of end-of-pipe management technology for pollution chemical oxygen demandisPhysicochemical method + anaerobic/aerobic combined method + chemical method，Its Technical efficiency of end-of-pipe management82

## Technical purpose
该工业过程涉及通过发酵玉米生产燃料乙醇。此燃料乙醇可作为可再生能源，混入汽油中以减少对纯化石燃料的依赖。适用于各种规模的生产。提到的末端处理技术，包括物理化学方法结合厌氧和好氧处理，随后是化学过程，用于处理生产乙醇过程中产生的废水、化学需氧量(COD)、氨氮、磷和有机氮污染物。

## Reference product
- Ethanol Fuel: 1; calculated
  源文件中描述为为燃料乙醇，此处对其进行了匹配工作，将其匹配到LCAflow库里面相最符合的流，污染物指标备注为工业废水量

## Outputs
All rows: calculated
- Waste water: 9000
  the Technical of end-of-pipe management technology for pollution Waste wateris/，Its Technical efficiency of end-of-pipe management0
  污染物指标工业废水量的末端治理技术是/，其效率为0。原文件中描述污染物类别为废水，污染物指标为工业废水量，此处对其进行了匹配工作，将其匹配到LCAflow库里面相最符合的流，污染物指标备注为工业废水量
- phosphorus, total: 0.027
  the Technical of end-of-pipe management technology for pollution phosphorus, totalisPhysicochemical method + anaerobic/aerobic combined method + chemical method，Its Technical efficiency of end-of-pipe management85
  污染物指标总磷的末端治理技术是物化法+厌氧/好氧组合法+化学法，其效率为85，末端治理设施实际运行率（k值）计算公式为k=废水治理设施年耗电量（千瓦时/年）/(废水治理设施额定功率（千瓦）*废水治理设施年运行时间（小时/年））。原文件中描述污染物类别为废水，污染物指标为总磷，此处对其进行了匹配工作，将其匹配到LCAflow库里面相最符合的流，污染物指标备注为总磷
- Ammonia Nitrogen: 0.2
  the Technical of end-of-pipe management technology for pollution Ammonia NitrogenisPhysicochemical method + anaerobic/aerobic combined method + chemical method
  污染物指标氨氮的末端治理技术是物化法+厌氧/好氧组合法+化学法，末端治理设施实际运行率（k值）计算公式为k=废水治理设施年耗电量（千瓦时/年）/(废水治理设施额定功率（千瓦）*废水治理设施年运行时间（小时/年））。原文件中描述污染物类别为废水，污染物指标为氨氮，此处对其进行了匹配工作，将其匹配到LCAflow库里面相最符合的流，污染物指标备注为氨氮
- Nitrogen, organic bound: 0.45
  the Technical of end-of-pipe management technology for pollution Nitrogen, organic boundisPhysicochemical method + anaerobic/aerobic combined method + chemical method
  污染物指标总氮的末端治理技术是物化法+厌氧/好氧组合法+化学法，末端治理设施实际运行率（k值）计算公式为k=废水治理设施年耗电量（千瓦时/年）/(废水治理设施额定功率（千瓦）*废水治理设施年运行时间（小时/年））。原文件中描述污染物类别为废水，污染物指标为总氮，此处对其进行了匹配工作，将其匹配到LCAflow库里面相最符合的流，污染物指标备注为总氮
- chemical oxygen demand: 3.6
  the Technical of end-of-pipe management technology for pollution chemical oxygen demandisPhysicochemical method + anaerobic/aerobic combined method + chemical method，Its Technical efficiency of end-of-pipe management82
  污染物指标化学需氧量的末端治理技术是物化法+厌氧/好氧组合法+化学法，其效率为82，末端治理设施实际运行率（k值）计算公式为k=废水治理设施年耗电量（千瓦时/年）/(废水治理设施额定功率（千瓦）*废水治理设施年运行时间（小时/年））。原文件中描述污染物类别为废水，污染物指标为化学需氧量，此处对其进行了匹配工作，将其匹配到LCAflow库里面相最符合的流，污染物指标备注为化学需氧量

## Use advice
This dataset is derived from the Pollution Source Census Report and contains information on pollution emissions and related products. However, it does not include data on energy or chemical consumption, nor does it provide information on waste or co-product generation. When utilizing this dataset, please supplement the missing data based on actual conditions before use
该数据集来源于污染源普查报告，包含污染物排放及相关产品信息，但不包含能源或化学品消耗数据，也不提供废弃物或共生产物产生信息。在使用该数据集时，请根据实际情况补充缺失数据后再使用。

## Review details
Inventory: The internal review was done by several iteration steps concerning raw data validation, raw data documentation, representativity, completeness and consistency of modelling with regard to ISO 14040 and 14044.
清单： 内部审查通过几个迭代步骤完成，涉及原始数据验证、原始数据记录、代表性、完整性、与 ISO 14040 和 14044 有关的建模的一致性。

## Data sources
- 第二次全国污染源普查产排污核算系数手册（试用版）,二级代码25,四级代码2541文件，在完整版文件中第4111页
