# Electricity production ; Electricity mix ; Liaoning

Dataset: ILCD process, Unit process, single operation
Geography: LN-CN
Reference year: 2019
Classification: Unit processes / Energy carriers and technologies / Electricity
Generated by: Ruoxi Xiong, xiongrx0126@163.com
Owner: Tiangong LCI Data Working Group
Review: Dependent internal review by Tiangong LCI Data Working Group
Amounts: no units in this file; such an amount is in the reference unit of its flow, which a separate flow dataset defines
copyright: false
licenseType: Free of charge for all users and uses

## General comment
Electricity mix includes thermal, hydro, wind, nuclear and solar generation

## Technical purpose
The electricity mix from Liaoning province is utilized for diverse applications, encompassing residential, commercial, and industrial electricity requirements. This mix is beneficial in regions where a combination of thermal, hydro, wind, nuclear, and solar power generation is required to fulfill energy demands sustainably.

## Reference product
- Electricity: 3.6; missing unimportant
  [{'text': '能量', 'type': 'text'}]

## Inputs
All rows: missing unimportant
- electricity for thermal power: 3.01893
  [{'text': '能量', 'type': 'text'}]
- electricity from hydroelectric power plant: 0.0379944
  [{'text': '能量', 'type': 'text'}]
- electricity for nuclear power: 0
  [{'text': '能量', 'type': 'text'}]
- electricity from wind power: 0.436291
  [{'text': '能量', 'type': 'text'}]
- electricity for solar power: 0.10678
  [{'text': '能量', 'type': 'text'}]

## Use advice
When employing this data set for Life Cycle Assessment, it is important to consider regional electricity generation profiles, as the mix is specific to Liaoning province. This data should be used to represent the average electricity supply in Liaoning and not be generalized to other regions without appropriate regional data. Users should account for temporal variations and future changes in the energy mix when modeling for long-term projects.

## Review details
Inventory: The internal review was done by several iteration steps concerning raw data validation, raw data documentation, representativity, completeness and consistency of modelling with regard to ISO 14040 and 14044.

## Data sources
- 能源统计年鉴2020
