# Bioethanol ; Acid

Dataset: ILCD process
Geography: GLO
Classification: Energy carriers and technologies / Renewable fuels
Generated by: Jiayi Yuan, jiayi_y@mail.bnu.edu.cn
Owner: Tiangong LCI Data Working Group
Review: Dependent internal review by Tiangong LCI Data Working Group
Amounts: no units in this file; such an amount is in the reference unit of its flow, which a separate flow dataset defines
licenseType: Free of charge for all users and uses

## General comment
This bioethanol, characterized by its acidic content, is intended for applications that require a lower pH level. It is commonly used in biochemical processes or as a solvent in specific industrial reactions where the acidic property may be advantageous.

## Inputs
All rows: uniform; missing unimportant
- Electricity: 17.928; max 152.64
- heat: 5730; min 372; max 1570
- Electricity: 568.8; min 45; max 6840
- heat: 2080; min 244; max 5790
- Electricity: 608.4; min 65.52; max 2368.8

## Outputs
- heat: 2880; min 130; max 8400; uniform; missing unimportant

## Use advice
Users of this data set should note that the acidic nature of the bioethanol may influence subsequent chemical reactions and should account for this variable in their process design. Care should be taken to ensure compatibility with materials of construction and the safe handling of the acidic bioethanol. In life cycle assessment, the specific applications where the acid content is crucial should be highlighted, and the potential environmental impacts of the acidity should be considered.

## Review details
Inventory: The internal review was done by several iteration steps concerning raw data validation, raw data documentation, representativity, completeness and consistency of modelling with regard to ISO 14040 and 14044.
