# Aluminum alloy profile production ; virgin aluminum alloy extruded profiles ; extrusion ; virgin aluminum ingots

Dataset: ILCD process, Partly terminated system
Geography: CN
Reference year: 2008
Classification: Unit processes / Materials production / Metals and semimetals
Generated by: Jinliang Xie, jinliang.research@gmail.com
Owner: Tiangong LCI Data Working Group
Review: Dependent internal review by Tiangong LCI Data Working Group
Amounts: no units in this file; such an amount is in the reference unit of its flow, which a separate flow dataset defines
copyright: false
licenseType: Free of charge for all users and uses

## General comment
Aluminum Alloy Extrusion Production (from ingots to aluminum alloy extrusions)

## Time period
Year of publication

## Technical purpose
The production process of virgin aluminum alloy extruded profiles is used in various industrial and construction applications. The material produced in this process specifically involves extruding virgin aluminum ingots into profiles. These profiles are utilized in manufacturing components such as window frames, door frames, structural elements for buildings, and parts for the automotive and aerospace industries. The majority of the process begins with the melting of virgin aluminum ingots, while a minor part starts from aluminum alloy rods.

## Reference product
- aluminium extrusion profile: 1000; software or database

## Inputs
- electricity, high voltage, aluminium industry: 4464; software or database
  电
- hard coal; 26.3 MJ/kg: 12.2; software or database
  原煤
- Natural Gas: 51.1; software or database
  天然气，未指明
- coal gas: 666; software or database

## Outputs
- carbon dioxide (fossil),carbon dioxide (fossil): 1630; software or database
- methane (fossil): 2.78; software or database

## Data selection and combination
The production process of aluminum alloy extrusion is divided into two parts proportionally, with 85% starting from remelting of primary aluminum ingots and the remaining 15% from aluminum alloy rods.All relevant data are based on the statistical data in the Non-ferrous Metals Industry Yearbook as the main reference. For some non-statistical process data, they come from published literature and research on production processes and technical indexes of typical enterprises. Since the data on ore mining related to aluminum production in China are still not perfect, the data on bauxite mining are estimated by referring to the environmental emission data in the ore mining database of the material flow analysis software Umberto 4.0.

## Use advice
When utilizing this data set for Life Cycle Assessment (LCA), ensure to consider the production route of the aluminum alloy extrusion, which is divided into two parts: 85% originating from the remelting of virgin aluminum ingots and 15% from aluminum alloy rods. Reference statistical data from the Nonferrous Metals Industry Yearbook and use it as the primary source. For non-statistical process data, refer to publicly available literature, research on production processes and technical indicators from typical companies. Estimate related data of bauxite mining, which is linked to aluminum production, using environmental emission data from the mining database within the Umberto 4.0 material flow analysis software. The system boundary for the aluminum alloy extrusion production process should include melting/casting, preheating, extruding, heat treatment, and remelting of process scrap. Due to data availability limitations, the construction, maintenance of aluminum plants, and production and maintenance of smelting furnaces, and other production equipment are not included within the system scope.

## Review details
Inventory: The internal review was done by several iteration steps concerning raw data validation, raw data documentation, representativity, completeness and consistency of modelling with regard to ISO 14040 and 14044.

## Data sources
- 丁宁, 高峰, 王志宏, & 龚先政. 铝挤压材生产的能耗和温室效应分析. 轻金属 320–324 (2011) doi:
