# Production stage ; oil ; water drive production, chemical drive oil increase production, heavy oil production

Dataset: ILCD process, Unit process, single operation
Geography: CN
Reference year: 2016
Classification: Unit processes / Energy carriers and technologies / Crude oil based fuels
LCI method principle: Attributional
LCI method approaches: Consequential
Generated by: zimeng li, 1577978537@qq.com
Owner: Tiangong LCI Data Working Group
Review: Dependent internal review by Tiangong LCI Data Working Group
Amounts: no units in this file; such an amount is in the reference unit of its flow, which a separate flow dataset defines
copyright: false
licenseType: Free of charge for all users and uses

## General comment
The oil extraction processes described are employed for the extraction of crude oil from the LS oilfield. These methods include water flooding to enhance recovery rates (water drive production), the use of chemicals to improve oil recovery (chemical drive oil increase production), and the extraction of viscous heavy crude oil (heavy oil production). The extracted crude oil may be refined and utilized for various applications including energy production, manufacturing of petrochemicals, and as a raw material in the production of fuels, plastics, and other synthetic materials.

## Geography
The literature known as LS oilfield is not specified

## Technology and included processes
Oil and gas field development scheme is the basis of oil and gas field development process, and development scheme is the design of oil and gas field development method. It generally includes the geological research and engineering design of the reservoir, the design of the drilling project, the design of the oil production project, the design of the ground construction project, and the decision of the optimization of the program economy is usually included. After the design of the development scheme, it is usually necessary to adjust the development scheme appropriately and reasonably with the continuous progress of the development work. For different oil and gas fields, the development plan is also different. There are usually great differences in the design of development mode, well pattern layout and annual output of oil field. This is because the geological conditions of each oilfield are different, the original formation pressure and formation water energy of the oilfield are large and small, and the physical properties of the formation pore fluid may also be different.For some specific oil and gas fields with complex geological conditions, a rapid exploration method, namely rolling exploration and development, is usually proposed to simplify evaluation and exploration and accelerate the capacity construction of new oil fields. The so-called rolling exploration and development is a working method that takes overall control from the evaluation and exploration stage of oil and gas fields to the full-scale development stage, explores one piece and mines one piece, "exploration has development, development has exploration", and exploration and development are closely combined and cross-carried out.

## Reference product
- LPG - liquefied petroleum gas: 41700; uniform; missing unimportant
  Total heavy oil production from 2003 to 2012

## Outputs
- LPG - liquefied petroleum gas: 2.368e10; uniform; missing unimportant
  Total water flooding production from 2003 to 2012
- LPG - liquefied petroleum gas: 1.44e9; uniform; missing unimportant
  Total chemical flooding oil production from 2003 to 2012

## Use advice
When utilizing this data, users must note that the specifics of the individual process at the LS oilfield are not detailed in the referenced literature. Aspects such as the efficiency, technological advancement, and environmental impacts of the extraction processes may vary and are not accounted for. Users should apply this data cautiously and may need to consult additional sources or conduct a site-specific assessment for accurate modelling and evaluation within a Life Cycle Assessment framework. Pay particular attention to assumptions made regarding the extraction efficiency and secondary data relevance when incorporating this data into broader environmental studies.

## Review details
Inventory: The internal review was done by several iteration steps concerning raw data validation, raw data documentation, representativity, completeness and consistency of modelling with regard to ISO 14040 and 14044.

## Data sources
- 鞠小玉. 石油勘探开发投入产出优化研究——以LS油田为例 [D].中国石油大学(华东),2016.
