# Calcined Bauxite ; Calcined Bauxite ; Bauxite

Dataset: ILCD process, Unit process, single operation
Geography: CN
Reference year: 2020
Classification: Unit processes / Materials production / Non-energetic raw materials
Generated by: Ruoxi Xiong, xiongrx0126@163.com
Owner: Tiangong LCI Data Working Group
Review: Dependent internal review by Tiangong LCI Data Working Group
Amounts: no units in this file; such an amount is in the reference unit of its flow, which a separate flow dataset defines
copyright: false
licenseType: Free of charge for all users and uses

## General comment
bauxite calcination ; calcined bauxite ; bauxite

## Time period
Date of publication

## Technical purpose
The calcined bauxite process is intended for the production of refractory materials. The high-grade material produced by this process is commonly used in the refractory industry for the manufacture of bricks, castables, and shapes that withstand high temperatures and are resistant to corrosion. It may also be employed in producing proppants for hydraulic fracturing, anti-skid surfaces, and as an abrasive.

## Reference product
- calcined bauxite: 1000; missing unimportant
  Calcined bauxite

## Inputs
All rows: missing unimportant
- cement factory: 6.27e-9
  Capital equipment
- industrial machine, heavy, unspecified: 0.0376
  Capital equipment
- electricity, high voltage, aluminium industry: 216
- Water, cooling, unspecified natural origin: 0.0096
- Water, unspecified natural origin: 1.6
- bauxite: 1438
- Coal, brown, in ground: 6450
  Coal fuel

## Outputs
- Water, in air: 438; missing unimportant
  emission to air

## Data selection and combination
Specific energy consumption for bauxite calcination in China was obtained from An et al. (2018), …… The mass balance for the calcination process was established stoichiometrically, based on the expected mineralogical composition of both the raw material and product.

## Use advice
When using the dataset for the specific energy consumption of bauxite calcination in China, it is essential to ensure that all data inputs, such as the mineralogical composition of bauxite and the final product, are representative of the actual process being assessed in order to establish an accurate mass balance. Methodological considerations should include whether the energy data is specific to the location and the technology used. For transparency, the inclusion of potential variances in raw material quality, energy sources, and operational efficiencies must be considered.

## Review details
Inventory: The internal review was done by several iteration steps concerning raw data validation, raw data documentation, representativity, completeness and consistency of modelling with regard to ISO 14040 and 14044.

## Data sources
- Muñoz, I., Soto, A., Maza, D. & Bayón, F. Life cycle assessment of refractory waste management in a Spanish steel works. Waste Manage. 111, 1–9 (2020).
