# Cell processing ; Multi-Si solar cell ; High temperature diffusion of doped elements

Dataset: ILCD process, Unit process, single operation
Geography: CN
Reference year: 2014
Classification: Unit processes / Systems / Electrics and electronics
Functional unit: The functional unit of the LCA study was 1 kWh based on a multi-Si PV module
LCI method principle: Attributional
LCI method approaches: Allocation
Generated by: Jinfeng Yang, yjfzfshn@163.com
Owner: Tiangong LCI Data Working Group
Review: Dependent internal review by Tiangong LCI Data Working Group
Amounts: no units in this file; such an amount is in the reference unit of its flow, which a separate flow dataset defines
copyright: false
licenseType: Free of charge for all users and uses

## General comment
Multi-Si

## Geography
This study performs a life-cycle assessment for a photovoltaic (PV) system with multi-crystalline silicon (multi-Si) modules in China

## Time period
Available online

## Technical purpose
The multi-crystalline silicon (multi-Si) solar cells produced through the high temperature diffusion process are predominantly used in the manufacturing of photovoltaic (PV) modules which are integral components for constructing solar power systems. These systems convert solar energy into electricity, effectively serving as renewable energy sources for residential, commercial, and industrial applications.

## Reference product
- Multi-Si solar cell,Multi-Si solar cell,Multi-Si solar cell: 1090; measured
  Multi-Si Solar cell

## Inputs
All rows: measured
- Multi-Si wafer,Multi-Si wafer,Multi-Si wafer: 3.34
  Multi-Si Wafer
- Ammonia: 0.0881
- Ethanol: 0.23
  Ethanol (99.7%)
- Hydrochloric acid: 2.57
  Hydrochloric acid (37%)
- Hydrofluoric acid: 0.78
- Nitric acid: 1.43
  Nitric acid (70%)
- dinitrogen: 7.62
  Nitrogen
- phosphoric acid: 0.00931
  Phosphoric acid (85%)
- Potassium hydroxide: 2.76
  KOH (21%)
- silver: 0.0679
  Silver
- aluminium: 0.38
  Aluminum
- freshwater: 866.04
  Water
- natural gas: 0.59
  Natural gas
- Electricity: 686.69
- process steam: 26.15
  Steam

## Outputs
All rows: measured
- ammonia: 0.00786
  Ammonia emissions to air
- hydrogen chloride: 0.00492
  Hydrogen chloride emissions to air
- hydrogen fluoride: 0.00393
  Hydrogen fluoride emissions to air
- Nitrogen oxides: 0.061
  Nitrogen oxides emissions to air
- non-methane volatile organic compounds: 0.03464
  NMVOC to air
- process water: 888.13
  Water

## Deviations from the LCI method approaches
The goal of this study was to quantitatively assess the life-cycleenvironmental impacts of PV systems in China and provide a scientific basis for policy-making regarding the sustainable development of Chinese PV industry.

## Data selection and combination
The inventory data, including the material consumption and environmental emissions involved in the production of solar-grade silicon, wafers, ingots, cells, and modules, were mainly collected from companies that represent the current domain multi-Si PV technologies in China. The energy consumption data referred to the report “Clean Production ofSolar PV in China” (Li and Chang, 2012). The data of MG-Si production was from literature about MG-Si produced in China

## Use advice
When utilizing this data for life cycle assessment (LCA) of PV systems, it is important to consider the technological applicability of the data according to the geographical context, as the data are specific to Chinese multi-Si PV technology companies. The energy consumption figures should be referenced with respect to 'Clean Production of Solar PV in China' (Li and Chang, 2012). It is also vital to ensure transparent accounting for material consumption and environmental emissions across the entire production process of solar-grade silicon, wafers, ingots, cells, and modules. For LCA modeling, the functional unit should consistently be taken as 1 kWh of multi-crystalline Si PV module output.

## Review details
Inventory: The internal review was done by several iteration steps concerning raw data validation, raw data documentation, representativity, completeness and consistency of modelling with regard to ISO 14040 and 14044.

## Data sources
- Fu, Y., Liu, X. & Yuan, Z. Life-cycle assessment of multi-crystalline photovoltaic (PV) systems in China. Journal of Cleaner Production 86, 180–190 (2015).
