# Electricity/electrical energy + heat energy ; Petroleum coke ; Circulating fluidized bed boiler ; All sizes; NESPS2 / 电能/电能+热能 ; 石油焦 ; 循环流化床锅炉 ; 所有规模 ; 全国第二次污染普查数据

Dataset: ILCD process, Unit process, single operation
Geography: CN
Reference year: 2019
Classification: Reference Parameters / Energy carriers and technologies / Electricity
Generated by: The data was created by the Office of the Second National Pollution Source Census of the Ministry of Ecology and Environment, and the data was organized by the TianGong Plan team for ILCD format / 生态环境部第二次全国污染源普查工作办公室创建数据，天工计划团队常慧敏整理数据为ILCD格式
Owner: Tiangong LCI Data Working Group / 天工LCI数据工作小组
Review: Dependent internal review by Tiangong LCI Data Working Group / 天工LCI数据工作小组
Amounts: no units in this file; such an amount is in the reference unit of its flow, which a separate flow dataset defines
copyright: false
licenseType: Free of charge for all users and uses

## General comment
the Technical of end-of-pipe management technology for pollution sulfur dioxideisOthers (integration of wet desulfurization and precipitation)，Its Technical efficiency of end-of-pipe management0.5714Sar+93.43

## Technical purpose
描述的工业过程涉及使用石油焦在循环流化床锅炉中产生电能和热能。这种特定的燃料选择因其性质或成本效益而在不同规模的工业环境中有所应用。此外，它还涉及用于处理废水、化学需氧量、氨氮、废气、颗粒物（PM2.5 - PM10）、二氧化硫、氧化氮、汞和挥发性有机化合物的先进污染控制技术。对于旨在减少排放、符合环境法规和最小化生态足迹的工业设施来说，上述不同的末端处理技术例如电袋复合除尘器、静电除尘、布袋过滤器以及各种脱硫和脱硝过程对缓解特定类型的污染至关重要。

## Reference product
- Petroleum Coke: 1000; input; calculated
  源文件中描述为为石油焦，此处对其进行了匹配工作，将其匹配到LCAflow库里面相最符合的流，污染物指标备注为工业废水量

## Outputs
All rows: calculated
- volatile organic compound: 0
  the Technical of end-of-pipe management technology for pollution volatile organic compoundis/
  污染物指标挥发性有机物的末端治理技术是/。原文件中描述污染物类别为废气，污染物指标为挥发性有机物，此处对其进行了匹配工作，将其匹配到LCAflow库里面相最符合的流，污染物指标备注为挥发性有机物
- Nitrogen oxides: 0.53
  the Technical of end-of-pipe management technology for pollution Nitrogen oxidesisHigh-efficiency SCR③，Its Technical efficiency of end-of-pipe management50
  污染物指标氮氧化物（SNCR）的末端治理技术是高效选择性催化还原法（SCR）③，其效率为50，末端治理设施实际运行率（k值）计算公式为脱硝设施年实际运行小时数/机组年实际运行小时数，③高效氮氧化物末端治理技术：采取高效低氮燃烧技术、增设脱硝催化剂层数等措施，满足《燃煤电厂超低排放烟气治理工程技术规范》（HJ2053-2116）相关
  要求。。原文件中描述污染物类别为废气，污染物指标为氮氧化物（SNCR），此处对其进行了匹配工作，将其匹配到LCAflow库里面相最符合的流，污染物指标备注为氮氧化物（SNCR）
- Nitrogen oxides: 0.583
  the Technical of end-of-pipe management technology for pollution Nitrogen oxidesisHigh-efficiency SCR③，Its Technical efficiency of end-of-pipe management78
  污染物指标氮氧化物的末端治理技术是高效选择性催化还原法（SCR）③，其效率为78，末端治理设施实际运行率（k值）计算公式为脱硝设施年实际运行小时数/机组年实际运行小时数，③高效氮氧化物末端治理技术：采取高效低氮燃烧技术、增设脱硝催化剂层数等措施，满足《燃煤电厂超低排放烟气治理工程技术规范》（HJ2053-2115）相关
  要求。。原文件中描述污染物类别为废气，污染物指标为氮氧化物，此处对其进行了匹配工作，将其匹配到LCAflow库里面相最符合的流，污染物指标备注为氮氧化物
- Waste water: 610
  the Technical of end-of-pipe management technology for pollution Waste waterisOthers (direct discharge)
  污染物指标工业废水量的末端治理技术是其他（直排）。原文件中描述污染物类别为废水，污染物指标为工业废水量，此处对其进行了匹配工作，将其匹配到LCAflow库里面相最符合的流，污染物指标备注为工业废水量
- Waste water: 610
  the Technical of end-of-pipe management technology for pollution Waste waterisOthers (reuse)
  污染物指标工业废水量的末端治理技术是其他（重复利用）。原文件中描述污染物类别为废水，污染物指标为工业废水量，此处对其进行了匹配工作，将其匹配到LCAflow库里面相最符合的流，污染物指标备注为工业废水量
- Waste water: 610
  the Technical of end-of-pipe management technology for pollution Waste waterisOthers (utilization + direct discharge)
  污染物指标工业废水量的末端治理技术是其他（利用+直排）。原文件中描述污染物类别为废水，污染物指标为工业废水量，此处对其进行了匹配工作，将其匹配到LCAflow库里面相最符合的流，污染物指标备注为工业废水量
- Nitrogen oxides: 1.06
  the Technical of end-of-pipe management technology for pollution Nitrogen oxidesisOthers (direct discharge)
  污染物指标氮氧化物（SNCR）的末端治理技术是其他（直排）。原文件中描述污染物类别为废气，污染物指标为氮氧化物（SNCR），此处对其进行了匹配工作，将其匹配到LCAflow库里面相最符合的流，污染物指标备注为氮氧化物（SNCR）
- Nitrogen oxides: 1.06
  the Technical of end-of-pipe management technology for pollution Nitrogen oxidesisSCR，Its Technical efficiency of end-of-pipe management60
  污染物指标氮氧化物的末端治理技术是选择性催化还原法（SCR），其效率为60，末端治理设施实际运行率（k值）计算公式为脱硝设施年实际运行小时数/机组年实际运行小时数。原文件中描述污染物类别为废气，污染物指标为氮氧化物，此处对其进行了匹配工作，将其匹配到LCAflow库里面相最符合的流，污染物指标备注为氮氧化物
- Nitrogen oxides: 2.65
  the Technical of end-of-pipe management technology for pollution Nitrogen oxidesisOthers (direct discharge)
  污染物指标氮氧化物的末端治理技术是其他（直排），末端治理设施实际运行率（k值）计算公式为脱硝设施年实际运行小时数/机组年实际运行小时数。原文件中描述污染物类别为废气，污染物指标为氮氧化物，此处对其进行了匹配工作，将其匹配到LCAflow库里面相最符合的流，污染物指标备注为氮氧化物
- Ammonia Nitrogen: 0.00347771
  the Technical of end-of-pipe management technology for pollution Ammonia NitrogenisOthers (physical treatment + chemical treatment)，Its Technical efficiency of end-of-pipe management91.43
  污染物指标氨氮的末端治理技术是其他（物理处理法+化学处理法），其效率为91.43，末端治理设施实际运行率（k值）计算公式为（机组年实际运行小时数-废水总排口年事故排放小时数）/机组年实际运行小时数。原文件中描述污染物类别为废水，污染物指标为氨氮，此处对其进行了匹配工作，将其匹配到LCAflow库里面相最符合的流，污染物指标备注为氨氮
- chemical oxygen demand: 0.0340403
  the Technical of end-of-pipe management technology for pollution chemical oxygen demandisOthers (physical treatment + chemical treatment)，Its Technical efficiency of end-of-pipe management78.35
  污染物指标化学需氧量的末端治理技术是其他（物理处理法+化学处理法），其效率为78.35，末端治理设施实际运行率（k值）计算公式为（机组年实际运行小时数-废水总排口年事故排放小时数）/机组年实际运行小时数。原文件中描述污染物类别为废水，污染物指标为化学需氧量，此处对其进行了匹配工作，将其匹配到LCAflow库里面相最符合的流，污染物指标备注为化学需氧量
- Exhaust gas: 11665
  the Technical of end-of-pipe management technology for pollution Exhaust gasisOthers (direct discharge)
  污染物指标工业废气量的末端治理技术是其他（直排）。原文件中描述污染物类别为废气，污染物指标为工业废气量，此处对其进行了匹配工作，将其匹配到LCAflow库里面相最符合的流，污染物指标备注为工业废气量
- mercury: 0
  the Technical of end-of-pipe management technology for pollution mercuryisSynergistic mercury removal，Its Technical efficiency of end-of-pipe management25.73MHgar+84.12.The original article describes the pollution production coefficients as 0.000995MHgar。Please revise the corresponding emissions after accounting for them according to the notes.。.The original article describes the pollution production coefficients as 0.000995MHgar. Please revise the corresponding emissions after accounting for them according to the notes.
  污染物指标汞及其化合物的末端治理技术是协同脱汞，其效率为25.73MHgar+84.12，末端治理设施实际运行率（k值）计算公式为取该机组除尘、脱硝脱硫K的最小值。原文件中描述污染物类别为废气，污染物指标为汞及其化合物，此处对其进行了匹配工作，将其匹配到LCAflow库里面相最符合的流，污染物指标备注为汞及其化合物原文描述的产污系数为 0.000995MHgar。请根据备注自行核算后修改对应的排放量。
- particles (PM2.5 - PM10): 0
  the Technical of end-of-pipe management technology for pollution particles (PM2.5 - PM10)isBag filter + others (wet desulfurization synergy) + others (wet electrostatic precipitator)，Its Technical efficiency of end-of-pipe management0.001512Sar+99.981.The original article describes the pollution production coefficients as 5+52.08Sar。Please revise the corresponding emissions after accounting for them according to the notes.。.The original article describes the pollution production coefficients as 5+52.08Sar. Please revise the corresponding emissions after accounting for them according to the notes.
  污染物指标颗粒物的末端治理技术是袋式除尘+其他（湿法脱硫协同）+其他（湿式电除尘），其效率为0.001512Sar+99.981，末端治理设施实际运行率（k值）计算公式为除尘设施年实际运行小时数/机组年实际运行小时数。原文件中描述污染物类别为废气，污染物指标为颗粒物，此处对其进行了匹配工作，将其匹配到LCAflow库里面相最符合的流，污染物指标备注为颗粒物原文描述的产污系数为 5+52.08Sar。请根据备注自行核算后修改对应的排放量。
- particles (PM2.5 - PM10): 0
  the Technical of end-of-pipe management technology for pollution particles (PM2.5 - PM10)isBag filter + others (wet desulfurization synergy)，Its Technical efficiency of end-of-pipe management0.00756Sar+99.904.The original article describes the pollution production coefficients as 5+52.08Sar。Please revise the corresponding emissions after accounting for them according to the notes.。.The original article describes the pollution production coefficients as 5+52.08Sar. Please revise the corresponding emissions after accounting for them according to the notes.
  污染物指标颗粒物的末端治理技术是袋式除尘+其他（湿法脱硫协同），其效率为0.00756Sar+99.904，末端治理设施实际运行率（k值）计算公式为除尘设施年实际运行小时数/机组年实际运行小时数。原文件中描述污染物类别为废气，污染物指标为颗粒物，此处对其进行了匹配工作，将其匹配到LCAflow库里面相最符合的流，污染物指标备注为颗粒物原文描述的产污系数为 5+52.08Sar。请根据备注自行核算后修改对应的排放量。
- particles (PM2.5 - PM10): 0
  the Technical of end-of-pipe management technology for pollution particles (PM2.5 - PM10)isBag filter + others (wet electrostatic precipitator)，Its Technical efficiency of end-of-pipe management0.00378Sar+99.952.The original article describes the pollution production coefficients as 5+52.08Sar。Please revise the corresponding emissions after accounting for them according to the notes.。.The original article describes the pollution production coefficients as 5+52.08Sar. Please revise the corresponding emissions after accounting for them according to the notes.
  污染物指标颗粒物的末端治理技术是袋式除尘+其他（湿式电除尘），其效率为0.00378Sar+99.952，末端治理设施实际运行率（k值）计算公式为除尘设施年实际运行小时数/机组年实际运行小时数。原文件中描述污染物类别为废气，污染物指标为颗粒物，此处对其进行了匹配工作，将其匹配到LCAflow库里面相最符合的流，污染物指标备注为颗粒物原文描述的产污系数为 5+52.08Sar。请根据备注自行核算后修改对应的排放量。
- particles (PM2.5 - PM10): 0
  the Technical of end-of-pipe management technology for pollution particles (PM2.5 - PM10)isBag filter，Its Technical efficiency of end-of-pipe management0.0189Sar+99.76.The original article describes the pollution production coefficients as 5+52.08Sar。Please revise the corresponding emissions after accounting for them according to the notes.。.The original article describes the pollution production coefficients as 5+52.08Sar. Please revise the corresponding emissions after accounting for them according to the notes.
  污染物指标颗粒物的末端治理技术是袋式除尘，其效率为0.0189Sar+99.76，末端治理设施实际运行率（k值）计算公式为除尘设施年实际运行小时数/机组年实际运行小时数。原文件中描述污染物类别为废气，污染物指标为颗粒物，此处对其进行了匹配工作，将其匹配到LCAflow库里面相最符合的流，污染物指标备注为颗粒物原文描述的产污系数为 5+52.08Sar。请根据备注自行核算后修改对应的排放量。
- particles (PM2.5 - PM10): 0
  the Technical of end-of-pipe management technology for pollution particles (PM2.5 - PM10)isElectric-bag composite precipitator + others (wet desulfurization synergy) + others (wet electrostatic precipitator)，Its Technical efficiency of end-of-pipe management0.001512Sar+99.981.The original article describes the pollution production coefficients as 5+52.08Sar。Please revise the corresponding emissions after accounting for them according to the notes.。.The original article describes the pollution production coefficients as 5+52.08Sar. Please revise the corresponding emissions after accounting for them according to the notes.
  污染物指标颗粒物的末端治理技术是电袋组合+其他（湿法脱硫协同）+其他（湿式电除尘），其效率为0.001512Sar+99.981，末端治理设施实际运行率（k值）计算公式为除尘设施年实际运行小时数/机组年实际运行小时数。原文件中描述污染物类别为废气，污染物指标为颗粒物，此处对其进行了匹配工作，将其匹配到LCAflow库里面相最符合的流，污染物指标备注为颗粒物原文描述的产污系数为 5+52.08Sar。请根据备注自行核算后修改对应的排放量。
- particles (PM2.5 - PM10): 0
  the Technical of end-of-pipe management technology for pollution particles (PM2.5 - PM10)isElectric-bag composite precipitator + others (wet desulfurization synergy)，Its Technical efficiency of end-of-pipe management0.00756Sar+99.904.The original article describes the pollution production coefficients as 5+52.08Sar。Please revise the corresponding emissions after accounting for them according to the notes.。.The original article describes the pollution production coefficients as 5+52.08Sar. Please revise the corresponding emissions after accounting for them according to the notes.
  污染物指标颗粒物的末端治理技术是电袋组合+其他（湿法脱硫协同），其效率为0.00756Sar+99.904，末端治理设施实际运行率（k值）计算公式为除尘设施年实际运行小时数/机组年实际运行小时数。原文件中描述污染物类别为废气，污染物指标为颗粒物，此处对其进行了匹配工作，将其匹配到LCAflow库里面相最符合的流，污染物指标备注为颗粒物原文描述的产污系数为 5+52.08Sar。请根据备注自行核算后修改对应的排放量。
- particles (PM2.5 - PM10): 0
  the Technical of end-of-pipe management technology for pollution particles (PM2.5 - PM10)isElectric-bag composite precipitator + others (wet electrostatic precipitator)，Its Technical efficiency of end-of-pipe management0.00378Sar+99.952.The original article describes the pollution production coefficients as 5+52.08Sar。Please revise the corresponding emissions after accounting for them according to the notes.。.The original article describes the pollution production coefficients as 5+52.08Sar. Please revise the corresponding emissions after accounting for them according to the notes.
  污染物指标颗粒物的末端治理技术是电袋组合+其他（湿式电除尘），其效率为0.00378Sar+99.952，末端治理设施实际运行率（k值）计算公式为除尘设施年实际运行小时数/机组年实际运行小时数。原文件中描述污染物类别为废气，污染物指标为颗粒物，此处对其进行了匹配工作，将其匹配到LCAflow库里面相最符合的流，污染物指标备注为颗粒物原文描述的产污系数为 5+52.08Sar。请根据备注自行核算后修改对应的排放量。
- particles (PM2.5 - PM10): 0
  the Technical of end-of-pipe management technology for pollution particles (PM2.5 - PM10)isElectric-bag composite precipitator，Its Technical efficiency of end-of-pipe management0.0189Sar+99.76.The original article describes the pollution production coefficients as 5+52.08Sar。Please revise the corresponding emissions after accounting for them according to the notes.。.The original article describes the pollution production coefficients as 5+52.08Sar. Please revise the corresponding emissions after accounting for them according to the notes.
  污染物指标颗粒物的末端治理技术是电袋组合，其效率为0.0189Sar+99.76，末端治理设施实际运行率（k值）计算公式为除尘设施年实际运行小时数/机组年实际运行小时数。原文件中描述污染物类别为废气，污染物指标为颗粒物，此处对其进行了匹配工作，将其匹配到LCAflow库里面相最符合的流，污染物指标备注为颗粒物原文描述的产污系数为 5+52.08Sar。请根据备注自行核算后修改对应的排放量。
- particles (PM2.5 - PM10): 0
  the Technical of end-of-pipe management technology for pollution particles (PM2.5 - PM10)isElectrostatic precipitation + others (wet desulfurization synergy) + others (wet electrostatic precipitator)，Its Technical efficiency of end-of-pipe management0.001632Sar+99.981.The original article describes the pollution production coefficients as 5+52.08Sar。Please revise the corresponding emissions after accounting for them according to the notes.。.The original article describes the pollution production coefficients as 5+52.08Sar. Please revise the corresponding emissions after accounting for them according to the notes.
  污染物指标颗粒物的末端治理技术是静电除尘+其他（湿法脱硫协同）+其他（湿式电除尘），其效率为0.001632Sar+99.981，末端治理设施实际运行率（k值）计算公式为除尘设施年实际运行小时数/机组年实际运行小时数。原文件中描述污染物类别为废气，污染物指标为颗粒物，此处对其进行了匹配工作，将其匹配到LCAflow库里面相最符合的流，污染物指标备注为颗粒物原文描述的产污系数为 5+52.08Sar。请根据备注自行核算后修改对应的排放量。
- particles (PM2.5 - PM10): 0
  the Technical of end-of-pipe management technology for pollution particles (PM2.5 - PM10)isElectrostatic precipitation + others (wet desulfurization synergy)，Its Technical efficiency of end-of-pipe management0.00816Sar+99.904.The original article describes the pollution production coefficients as 5+52.08Sar。Please revise the corresponding emissions after accounting for them according to the notes.。.The original article describes the pollution production coefficients as 5+52.08Sar. Please revise the corresponding emissions after accounting for them according to the notes.
  污染物指标颗粒物的末端治理技术是静电除尘+其他（湿法脱硫协同），其效率为0.00816Sar+99.904，末端治理设施实际运行率（k值）计算公式为除尘设施年实际运行小时数/机组年实际运行小时数。原文件中描述污染物类别为废气，污染物指标为颗粒物，此处对其进行了匹配工作，将其匹配到LCAflow库里面相最符合的流，污染物指标备注为颗粒物原文描述的产污系数为 5+52.08Sar。请根据备注自行核算后修改对应的排放量。
- particles (PM2.5 - PM10): 0
  the Technical of end-of-pipe management technology for pollution particles (PM2.5 - PM10)isElectrostatic precipitation + others (wet electrostatic precipitator)，Its Technical efficiency of end-of-pipe management0.00408Sar+99.952.The original article describes the pollution production coefficients as 5+52.08Sar。Please revise the corresponding emissions after accounting for them according to the notes.。.The original article describes the pollution production coefficients as 5+52.08Sar. Please revise the corresponding emissions after accounting for them according to the notes.
  污染物指标颗粒物的末端治理技术是静电除尘+其他（湿式电除尘），其效率为0.00408Sar+99.952，末端治理设施实际运行率（k值）计算公式为除尘设施年实际运行小时数/机组年实际运行小时数。原文件中描述污染物类别为废气，污染物指标为颗粒物，此处对其进行了匹配工作，将其匹配到LCAflow库里面相最符合的流，污染物指标备注为颗粒物原文描述的产污系数为 5+52.08Sar。请根据备注自行核算后修改对应的排放量。
- particles (PM2.5 - PM10): 0
  the Technical of end-of-pipe management technology for pollution particles (PM2.5 - PM10)isElectrostatic precipitation，Its Technical efficiency of end-of-pipe management0.0204Sar+99.76.The original article describes the pollution production coefficients as 5+52.08Sar。Please revise the corresponding emissions after accounting for them according to the notes.。.The original article describes the pollution production coefficients as 5+52.08Sar. Please revise the corresponding emissions after accounting for them according to the notes.
  污染物指标颗粒物的末端治理技术是静电除尘，其效率为0.0204Sar+99.76，末端治理设施实际运行率（k值）计算公式为除尘设施年实际运行小时数/机组年实际运行小时数。原文件中描述污染物类别为废气，污染物指标为颗粒物，此处对其进行了匹配工作，将其匹配到LCAflow库里面相最符合的流，污染物指标备注为颗粒物原文描述的产污系数为 5+52.08Sar。请根据备注自行核算后修改对应的排放量。
- particles (PM2.5 - PM10): 0
  the Technical of end-of-pipe management technology for pollution particles (PM2.5 - PM10)isHigh-efficiency bag filter + others (wet desulfurization synergy) + others (wet electrostatic precipitator)①，Its Technical efficiency of end-of-pipe management0.000504Sar+99.9936.The original article describes the pollution production coefficients as 5+52.08Sar。Please revise the corresponding emissions after accounting for them according to the notes.。.The original article describes the pollution production coefficients as 5+52.08Sar. Please revise the corresponding emissions after accounting for them according to the notes.
  污染物指标颗粒物的末端治理技术是高效袋式除尘+其他（湿法脱硫协同）+其他（湿式电除尘）①，其效率为0.000504Sar+99.9936，末端治理设施实际运行率（k值）计算公式为除尘设施年实际运行小时数/机组年实际运行小时数，①高效颗粒物末端治理技术：采取高效电源供电、低低温电除尘、超净电袋、高效袋式除尘、湿法脱硫协同、湿式电除尘等技术，满足《燃煤电厂超低排放烟气
  治理工程技术规范》（HJ2053-2273）相关要求。
  。原文件中描述污染物类别为废气，污染物指标为颗粒物，此处对其进行了匹配工作，将其匹配到LCAflow库里面相最符合的流，污染物指标备注为颗粒物原文描述的产污系数为 5+52.08Sar。请根据备注自行核算后修改对应的排放量。
- particles (PM2.5 - PM10): 0
  the Technical of end-of-pipe management technology for pollution particles (PM2.5 - PM10)isHigh-efficiency bag filter + others (wet desulfurization synergy)①，Its Technical efficiency of end-of-pipe management0.00252Sar+99.968.The original article describes the pollution production coefficients as 5+52.08Sar。Please revise the corresponding emissions after accounting for them according to the notes.。.The original article describes the pollution production coefficients as 5+52.08Sar. Please revise the corresponding emissions after accounting for them according to the notes.
  污染物指标颗粒物的末端治理技术是高效袋式除尘+其他（湿法脱硫协同）①，其效率为0.00252Sar+99.968，末端治理设施实际运行率（k值）计算公式为除尘设施年实际运行小时数/机组年实际运行小时数，①高效颗粒物末端治理技术：采取高效电源供电、低低温电除尘、超净电袋、高效袋式除尘、湿法脱硫协同、湿式电除尘等技术，满足《燃煤电厂超低排放烟气
  治理工程技术规范》（HJ2053-2267）相关要求。
  。原文件中描述污染物类别为废气，污染物指标为颗粒物，此处对其进行了匹配工作，将其匹配到LCAflow库里面相最符合的流，污染物指标备注为颗粒物原文描述的产污系数为 5+52.08Sar。请根据备注自行核算后修改对应的排放量。
- particles (PM2.5 - PM10): 0
  the Technical of end-of-pipe management technology for pollution particles (PM2.5 - PM10)isHigh-efficiency bag filter + others (wet electrostatic precipitator)①，Its Technical efficiency of end-of-pipe management0.00126Sar+99.984.The original article describes the pollution production coefficients as 5+52.08Sar。Please revise the corresponding emissions after accounting for them according to the notes.。.The original article describes the pollution production coefficients as 5+52.08Sar. Please revise the corresponding emissions after accounting for them according to the notes.
  污染物指标颗粒物的末端治理技术是高效袋式除尘+其他（湿式电除尘）①，其效率为0.00126Sar+99.984，末端治理设施实际运行率（k值）计算公式为除尘设施年实际运行小时数/机组年实际运行小时数，①高效颗粒物末端治理技术：采取高效电源供电、低低温电除尘、超净电袋、高效袋式除尘、湿法脱硫协同、湿式电除尘等技术，满足《燃煤电厂超低排放烟气
  治理工程技术规范》（HJ2053-2270）相关要求。
  。原文件中描述污染物类别为废气，污染物指标为颗粒物，此处对其进行了匹配工作，将其匹配到LCAflow库里面相最符合的流，污染物指标备注为颗粒物原文描述的产污系数为 5+52.08Sar。请根据备注自行核算后修改对应的排放量。
- particles (PM2.5 - PM10): 0
  the Technical of end-of-pipe management technology for pollution particles (PM2.5 - PM10)isHigh-efficiency bag filter①，Its Technical efficiency of end-of-pipe management0.0063Sar+99.925.The original article describes the pollution production coefficients as 5+52.08Sar。Please revise the corresponding emissions after accounting for them according to the notes.。.The original article describes the pollution production coefficients as 5+52.08Sar. Please revise the corresponding emissions after accounting for them according to the notes.
  污染物指标颗粒物的末端治理技术是高效袋式除尘①，其效率为0.0063Sar+99.925，末端治理设施实际运行率（k值）计算公式为除尘设施年实际运行小时数/机组年实际运行小时数，①高效颗粒物末端治理技术：采取高效电源供电、低低温电除尘、超净电袋、高效袋式除尘、湿法脱硫协同、湿式电除尘等技术，满足《燃煤电厂超低排放烟气
  治理工程技术规范》（HJ2053-2264）相关要求。
  。原文件中描述污染物类别为废气，污染物指标为颗粒物，此处对其进行了匹配工作，将其匹配到LCAflow库里面相最符合的流，污染物指标备注为颗粒物原文描述的产污系数为 5+52.08Sar。请根据备注自行核算后修改对应的排放量。
- particles (PM2.5 - PM10): 0
  the Technical of end-of-pipe management technology for pollution particles (PM2.5 - PM10)isHigh-efficiency electric-bag composite precipitator + others (wet desulfurization synergy) + others (wet electrostatic precipitator)①，Its Technical efficiency of end-of-pipe management0.000504Sar+99.9936.The original article describes the pollution production coefficients as 5+52.08Sar。Please revise the corresponding emissions after accounting for them according to the notes.。.The original article describes the pollution production coefficients as 5+52.08Sar. Please revise the corresponding emissions after accounting for them according to the notes.
  污染物指标颗粒物的末端治理技术是高效电袋组合+其他（湿法脱硫协同）+其他（湿式电除尘）①，其效率为0.000504Sar+99.9936，末端治理设施实际运行率（k值）计算公式为除尘设施年实际运行小时数/机组年实际运行小时数，①高效颗粒物末端治理技术：采取高效电源供电、低低温电除尘、超净电袋、高效袋式除尘、湿法脱硫协同、湿式电除尘等技术，满足《燃煤电厂超低排放烟气
  治理工程技术规范》（HJ2053-2272）相关要求。
  。原文件中描述污染物类别为废气，污染物指标为颗粒物，此处对其进行了匹配工作，将其匹配到LCAflow库里面相最符合的流，污染物指标备注为颗粒物原文描述的产污系数为 5+52.08Sar。请根据备注自行核算后修改对应的排放量。
- particles (PM2.5 - PM10): 0
  the Technical of end-of-pipe management technology for pollution particles (PM2.5 - PM10)isHigh-efficiency electric-bag composite precipitator + others (wet desulfurization synergy)①，Its Technical efficiency of end-of-pipe management0.00252Sar+99.968.The original article describes the pollution production coefficients as 5+52.08Sar。Please revise the corresponding emissions after accounting for them according to the notes.。.The original article describes the pollution production coefficients as 5+52.08Sar. Please revise the corresponding emissions after accounting for them according to the notes.
  污染物指标颗粒物的末端治理技术是高效电袋组合+其他（湿法脱硫协同）①，其效率为0.00252Sar+99.968，末端治理设施实际运行率（k值）计算公式为除尘设施年实际运行小时数/机组年实际运行小时数，①高效颗粒物末端治理技术：采取高效电源供电、低低温电除尘、超净电袋、高效袋式除尘、湿法脱硫协同、湿式电除尘等技术，满足《燃煤电厂超低排放烟气
  治理工程技术规范》（HJ2053-2266）相关要求。
  。原文件中描述污染物类别为废气，污染物指标为颗粒物，此处对其进行了匹配工作，将其匹配到LCAflow库里面相最符合的流，污染物指标备注为颗粒物原文描述的产污系数为 5+52.08Sar。请根据备注自行核算后修改对应的排放量。
- particles (PM2.5 - PM10): 0
  the Technical of end-of-pipe management technology for pollution particles (PM2.5 - PM10)isHigh-efficiency electric-bag composite precipitator + others (wet electrostatic precipitator)①，Its Technical efficiency of end-of-pipe management0.00126Sar+99.984.The original article describes the pollution production coefficients as 5+52.08Sar。Please revise the corresponding emissions after accounting for them according to the notes.。.The original article describes the pollution production coefficients as 5+52.08Sar. Please revise the corresponding emissions after accounting for them according to the notes.
  污染物指标颗粒物的末端治理技术是高效电袋组合+其他（湿式电除尘）①，其效率为0.00126Sar+99.984，末端治理设施实际运行率（k值）计算公式为除尘设施年实际运行小时数/机组年实际运行小时数，①高效颗粒物末端治理技术：采取高效电源供电、低低温电除尘、超净电袋、高效袋式除尘、湿法脱硫协同、湿式电除尘等技术，满足《燃煤电厂超低排放烟气
  治理工程技术规范》（HJ2053-2269）相关要求。
  。原文件中描述污染物类别为废气，污染物指标为颗粒物，此处对其进行了匹配工作，将其匹配到LCAflow库里面相最符合的流，污染物指标备注为颗粒物原文描述的产污系数为 5+52.08Sar。请根据备注自行核算后修改对应的排放量。
- particles (PM2.5 - PM10): 0
  the Technical of end-of-pipe management technology for pollution particles (PM2.5 - PM10)isHigh-efficiency electric-bag composite precipitator①，Its Technical efficiency of end-of-pipe management0.0063Sar+99.925.The original article describes the pollution production coefficients as 5+52.08Sar。Please revise the corresponding emissions after accounting for them according to the notes.。.The original article describes the pollution production coefficients as 5+52.08Sar. Please revise the corresponding emissions after accounting for them according to the notes.
  污染物指标颗粒物的末端治理技术是高效电袋组合①，其效率为0.0063Sar+99.925，末端治理设施实际运行率（k值）计算公式为除尘设施年实际运行小时数/机组年实际运行小时数，①高效颗粒物末端治理技术：采取高效电源供电、低低温电除尘、超净电袋、高效袋式除尘、湿法脱硫协同、湿式电除尘等技术，满足《燃煤电厂超低排放烟气
  治理工程技术规范》（HJ2053-2263）相关要求。
  。原文件中描述污染物类别为废气，污染物指标为颗粒物，此处对其进行了匹配工作，将其匹配到LCAflow库里面相最符合的流，污染物指标备注为颗粒物原文描述的产污系数为 5+52.08Sar。请根据备注自行核算后修改对应的排放量。
- particles (PM2.5 - PM10): 0
  the Technical of end-of-pipe management technology for pollution particles (PM2.5 - PM10)isHigh-efficiency electrostatic precipitation + others (wet desulfurization synergy) + others (wet electrostatic precipitator)①，Its Technical efficiency of end-of-pipe management0.000544Sar+99.9936.The original article describes the pollution production coefficients as 5+52.08Sar。Please revise the corresponding emissions after accounting for them according to the notes.。.The original article describes the pollution production coefficients as 5+52.08Sar. Please revise the corresponding emissions after accounting for them according to the notes.
  污染物指标颗粒物的末端治理技术是高效静电除尘+其他（湿法脱硫协同）+其他（湿式电除尘）①，其效率为0.000544Sar+99.9936，末端治理设施实际运行率（k值）计算公式为除尘设施年实际运行小时数/机组年实际运行小时数，①高效颗粒物末端治理技术：采取高效电源供电、低低温电除尘、超净电袋、高效袋式除尘、湿法脱硫协同、湿式电除尘等技术，满足《燃煤电厂超低排放烟气
  治理工程技术规范》（HJ2053-2271）相关要求。
  。原文件中描述污染物类别为废气，污染物指标为颗粒物，此处对其进行了匹配工作，将其匹配到LCAflow库里面相最符合的流，污染物指标备注为颗粒物原文描述的产污系数为 5+52.08Sar。请根据备注自行核算后修改对应的排放量。
- particles (PM2.5 - PM10): 0
  the Technical of end-of-pipe management technology for pollution particles (PM2.5 - PM10)isHigh-efficiency electrostatic precipitation + others (wet desulfurization synergy)①，Its Technical efficiency of end-of-pipe management0.00272Sar+99.968.The original article describes the pollution production coefficients as 5+52.08Sar。Please revise the corresponding emissions after accounting for them according to the notes.。.The original article describes the pollution production coefficients as 5+52.08Sar. Please revise the corresponding emissions after accounting for them according to the notes.
  污染物指标颗粒物的末端治理技术是高效静电除尘+其他（湿法脱硫协同）①，其效率为0.00272Sar+99.968，末端治理设施实际运行率（k值）计算公式为除尘设施年实际运行小时数/机组年实际运行小时数，①高效颗粒物末端治理技术：采取高效电源供电、低低温电除尘、超净电袋、高效袋式除尘、湿法脱硫协同、湿式电除尘等技术，满足《燃煤电厂超低排放烟气
  治理工程技术规范》（HJ2053-2265）相关要求。
  。原文件中描述污染物类别为废气，污染物指标为颗粒物，此处对其进行了匹配工作，将其匹配到LCAflow库里面相最符合的流，污染物指标备注为颗粒物原文描述的产污系数为 5+52.08Sar。请根据备注自行核算后修改对应的排放量。
- particles (PM2.5 - PM10): 0
  the Technical of end-of-pipe management technology for pollution particles (PM2.5 - PM10)isHigh-efficiency electrostatic precipitation + others (wet electrostatic precipitator)①，Its Technical efficiency of end-of-pipe management0.00136Sar+99.984.The original article describes the pollution production coefficients as 5+52.08Sar。Please revise the corresponding emissions after accounting for them according to the notes.。.The original article describes the pollution production coefficients as 5+52.08Sar. Please revise the corresponding emissions after accounting for them according to the notes.
  污染物指标颗粒物的末端治理技术是高效静电除尘+其他（湿式电除尘）①，其效率为0.00136Sar+99.984，末端治理设施实际运行率（k值）计算公式为除尘设施年实际运行小时数/机组年实际运行小时数，①高效颗粒物末端治理技术：采取高效电源供电、低低温电除尘、超净电袋、高效袋式除尘、湿法脱硫协同、湿式电除尘等技术，满足《燃煤电厂超低排放烟气
  治理工程技术规范》（HJ2053-2268）相关要求。
  。原文件中描述污染物类别为废气，污染物指标为颗粒物，此处对其进行了匹配工作，将其匹配到LCAflow库里面相最符合的流，污染物指标备注为颗粒物原文描述的产污系数为 5+52.08Sar。请根据备注自行核算后修改对应的排放量。
- particles (PM2.5 - PM10): 0
  the Technical of end-of-pipe management technology for pollution particles (PM2.5 - PM10)isHigh-efficiency electrostatic precipitation①，Its Technical efficiency of end-of-pipe management0.0068Sar+99.92.The original article describes the pollution production coefficients as 5+52.08Sar。Please revise the corresponding emissions after accounting for them according to the notes.。.The original article describes the pollution production coefficients as 5+52.08Sar. Please revise the corresponding emissions after accounting for them according to the notes.
  污染物指标颗粒物的末端治理技术是高效静电除尘①，其效率为0.0068Sar+99.92，末端治理设施实际运行率（k值）计算公式为除尘设施年实际运行小时数/机组年实际运行小时数，①高效颗粒物末端治理技术：采取高效电源供电、低低温电除尘、超净电袋、高效袋式除尘、湿法脱硫协同、湿式电除尘等技术，满足《燃煤电厂超低排放烟气
  治理工程技术规范》（HJ2053-2262）相关要求。
  。原文件中描述污染物类别为废气，污染物指标为颗粒物，此处对其进行了匹配工作，将其匹配到LCAflow库里面相最符合的流，污染物指标备注为颗粒物原文描述的产污系数为 5+52.08Sar。请根据备注自行核算后修改对应的排放量。
- sulfur dioxide: 0
  the Technical of end-of-pipe management technology for pollution sulfur dioxideisDouble alkali process，Its Technical efficiency of end-of-pipe management0.5714Sar+93.43.The original article describes the pollution production coefficients as 3.8Sar。Please revise the corresponding emissions after accounting for them according to the notes.。.The original article describes the pollution production coefficients as 3.8Sar. Please revise the corresponding emissions after accounting for them according to the notes.
  污染物指标二氧化硫的末端治理技术是双碱法，其效率为0.5714Sar+93.43，末端治理设施实际运行率（k值）计算公式为脱硫设施年实际运行小时数/机组年实际运行小时数。原文件中描述污染物类别为废气，污染物指标为二氧化硫，此处对其进行了匹配工作，将其匹配到LCAflow库里面相最符合的流，污染物指标备注为二氧化硫原文描述的产污系数为 3.8Sar。请根据备注自行核算后修改对应的排放量。
- sulfur dioxide: 0
  the Technical of end-of-pipe management technology for pollution sulfur dioxideisFlue gas circulating fluidized bed method，Its Technical efficiency of end-of-pipe management0.5714Sar+93.43.The original article describes the pollution production coefficients as 3.8Sar。Please revise the corresponding emissions after accounting for them according to the notes.。.The original article describes the pollution production coefficients as 3.8Sar. Please revise the corresponding emissions after accounting for them according to the notes.
  污染物指标二氧化硫的末端治理技术是烟气循环流化床法，其效率为0.5714Sar+93.43，末端治理设施实际运行率（k值）计算公式为脱硫设施年实际运行小时数/机组年实际运行小时数。原文件中描述污染物类别为废气，污染物指标为二氧化硫，此处对其进行了匹配工作，将其匹配到LCAflow库里面相最符合的流，污染物指标备注为二氧化硫原文描述的产污系数为 3.8Sar。请根据备注自行核算后修改对应的排放量。
- sulfur dioxide: 0
  the Technical of end-of-pipe management technology for pollution sulfur dioxideisHigh-efficiency double alkali process②，Its Technical efficiency of end-of-pipe management0.2Sar+97.7.The original article describes the pollution production coefficients as 3.8Sar。Please revise the corresponding emissions after accounting for them according to the notes.。.The original article describes the pollution production coefficients as 3.8Sar. Please revise the corresponding emissions after accounting for them according to the notes.
  污染物指标二氧化硫的末端治理技术是高效双碱法②，其效率为0.2Sar+97.7，末端治理设施实际运行率（k值）计算公式为脱硫设施年实际运行小时数/机组年实际运行小时数，②高效二氧化硫末端治理技术：采取空塔提效、强化气液传质、改善pH值分区等措施，满足《燃煤电厂超低排放烟气治理工程技术规范》（HJ2053-2248）相
  关要求。
  。原文件中描述污染物类别为废气，污染物指标为二氧化硫，此处对其进行了匹配工作，将其匹配到LCAflow库里面相最符合的流，污染物指标备注为二氧化硫原文描述的产污系数为 3.8Sar。请根据备注自行核算后修改对应的排放量。
- sulfur dioxide: 0
  the Technical of end-of-pipe management technology for pollution sulfur dioxideisHigh-efficiency flue gas circulating fluidized bed method②，Its Technical efficiency of end-of-pipe management0.2Sar+97.7.The original article describes the pollution production coefficients as 3.8Sar。Please revise the corresponding emissions after accounting for them according to the notes.。.The original article describes the pollution production coefficients as 3.8Sar. Please revise the corresponding emissions after accounting for them according to the notes.
  污染物指标二氧化硫的末端治理技术是高效烟气循环流化床法②，其效率为0.2Sar+97.7，末端治理设施实际运行率（k值）计算公式为脱硫设施年实际运行小时数/机组年实际运行小时数，②高效二氧化硫末端治理技术：采取空塔提效、强化气液传质、改善pH值分区等措施，满足《燃煤电厂超低排放烟气治理工程技术规范》（HJ2053-2249）相
  关要求。
  。原文件中描述污染物类别为废气，污染物指标为二氧化硫，此处对其进行了匹配工作，将其匹配到LCAflow库里面相最符合的流，污染物指标备注为二氧化硫原文描述的产污系数为 3.8Sar。请根据备注自行核算后修改对应的排放量。
- sulfur dioxide: 0
  the Technical of end-of-pipe management technology for pollution sulfur dioxideisHigh-efficiency lime/gypsum method②，Its Technical efficiency of end-of-pipe management0.2Sar+97.7.The original article describes the pollution production coefficients as 3.8Sar。Please revise the corresponding emissions after accounting for them according to the notes.。.The original article describes the pollution production coefficients as 3.8Sar. Please revise the corresponding emissions after accounting for them according to the notes.
  污染物指标二氧化硫的末端治理技术是高效石灰石/石膏法②，其效率为0.2Sar+97.7，末端治理设施实际运行率（k值）计算公式为脱硫设施年实际运行小时数/机组年实际运行小时数，②高效二氧化硫末端治理技术：采取空塔提效、强化气液传质、改善pH值分区等措施，满足《燃煤电厂超低排放烟气治理工程技术规范》（HJ2053-2246）相
  关要求。
  。原文件中描述污染物类别为废气，污染物指标为二氧化硫，此处对其进行了匹配工作，将其匹配到LCAflow库里面相最符合的流，污染物指标备注为二氧化硫原文描述的产污系数为 3.8Sar。请根据备注自行核算后修改对应的排放量。
- sulfur dioxide: 0
  the Technical of end-of-pipe management technology for pollution sulfur dioxideisHigh-efficiency lime/gypsum method②，Its Technical efficiency of end-of-pipe management0.2Sar+97.7.The original article describes the pollution production coefficients as 3.8Sar。Please revise the corresponding emissions after accounting for them according to the notes.。.The original article describes the pollution production coefficients as 3.8Sar. Please revise the corresponding emissions after accounting for them according to the notes.
  污染物指标二氧化硫的末端治理技术是高效石灰/石膏法②，其效率为0.2Sar+97.7，末端治理设施实际运行率（k值）计算公式为脱硫设施年实际运行小时数/机组年实际运行小时数，②高效二氧化硫末端治理技术：采取空塔提效、强化气液传质、改善pH值分区等措施，满足《燃煤电厂超低排放烟气治理工程技术规范》（HJ2053-2247）相
  关要求。
  。原文件中描述污染物类别为废气，污染物指标为二氧化硫，此处对其进行了匹配工作，将其匹配到LCAflow库里面相最符合的流，污染物指标备注为二氧化硫原文描述的产污系数为 3.8Sar。请根据备注自行核算后修改对应的排放量。
- sulfur dioxide: 0
  the Technical of end-of-pipe management technology for pollution sulfur dioxideisLime/gypsum method，Its Technical efficiency of end-of-pipe management0.5714Sar+93.43.The original article describes the pollution production coefficients as 3.8Sar。Please revise the corresponding emissions after accounting for them according to the notes.。.The original article describes the pollution production coefficients as 3.8Sar. Please revise the corresponding emissions after accounting for them according to the notes.
  污染物指标二氧化硫的末端治理技术是石灰/石膏法，其效率为0.5714Sar+93.43，末端治理设施实际运行率（k值）计算公式为脱硫设施年实际运行小时数/机组年实际运行小时数。原文件中描述污染物类别为废气，污染物指标为二氧化硫，此处对其进行了匹配工作，将其匹配到LCAflow库里面相最符合的流，污染物指标备注为二氧化硫原文描述的产污系数为 3.8Sar。请根据备注自行核算后修改对应的排放量。
- sulfur dioxide: 0
  the Technical of end-of-pipe management technology for pollution sulfur dioxideisLimestone/gypsum method，Its Technical efficiency of end-of-pipe management0.5714Sar+93.43.The original article describes the pollution production coefficients as 3.8Sar。Please revise the corresponding emissions after accounting for them according to the notes.。.The original article describes the pollution production coefficients as 3.8Sar. Please revise the corresponding emissions after accounting for them according to the notes.
  污染物指标二氧化硫的末端治理技术是石灰石/石膏法，其效率为0.5714Sar+93.43，末端治理设施实际运行率（k值）计算公式为脱硫设施年实际运行小时数/机组年实际运行小时数。原文件中描述污染物类别为废气，污染物指标为二氧化硫，此处对其进行了匹配工作，将其匹配到LCAflow库里面相最符合的流，污染物指标备注为二氧化硫原文描述的产污系数为 3.8Sar。请根据备注自行核算后修改对应的排放量。
- sulfur dioxide: 0
  the Technical of end-of-pipe management technology for pollution sulfur dioxideisOthers (integration of high-efficiency wet desulfurization and precipitation) ②，Its Technical efficiency of end-of-pipe management0.2Sar+97.7.The original article describes the pollution production coefficients as 3.8Sar。Please revise the corresponding emissions after accounting for them according to the notes.。.The original article describes the pollution production coefficients as 3.8Sar. Please revise the corresponding emissions after accounting for them according to the notes.
  污染物指标二氧化硫的末端治理技术是其他（高效湿法脱硫除尘一体化）②，其效率为0.2Sar+97.7，末端治理设施实际运行率（k值）计算公式为脱硫设施年实际运行小时数/机组年实际运行小时数，②高效二氧化硫末端治理技术：采取空塔提效、强化气液传质、改善pH值分区等措施，满足《燃煤电厂超低排放烟气治理工程技术规范》（HJ2053-2250）相
  关要求。
  。原文件中描述污染物类别为废气，污染物指标为二氧化硫，此处对其进行了匹配工作，将其匹配到LCAflow库里面相最符合的流，污染物指标备注为二氧化硫原文描述的产污系数为 3.8Sar。请根据备注自行核算后修改对应的排放量。
- sulfur dioxide: 0
  the Technical of end-of-pipe management technology for pollution sulfur dioxideisOthers (integration of wet desulfurization and precipitation)，Its Technical efficiency of end-of-pipe management0.5714Sar+93.43.The original article describes the pollution production coefficients as 3.8Sar。Please revise the corresponding emissions after accounting for them according to the notes.。.The original article describes the pollution production coefficients as 3.8Sar. Please revise the corresponding emissions after accounting for them according to the notes.
  污染物指标二氧化硫的末端治理技术是其他（湿法脱硫除尘一体化），其效率为0.5714Sar+93.43，末端治理设施实际运行率（k值）计算公式为脱硫设施年实际运行小时数/机组年实际运行小时数。原文件中描述污染物类别为废气，污染物指标为二氧化硫，此处对其进行了匹配工作，将其匹配到LCAflow库里面相最符合的流，污染物指标备注为二氧化硫原文描述的产污系数为 3.8Sar。请根据备注自行核算后修改对应的排放量。

## Use advice
This dataset is derived from the Pollution Source Census Report and contains information on pollution emissions and related products. However, it does not include data on energy or chemical consumption, nor does it provide information on waste or co-product generation. When utilizing this dataset, please supplement the missing data based on actual conditions before use
该数据集来源于污染源普查报告，包含污染物排放及相关产品信息，但不包含能源或化学品消耗数据，也不提供废弃物或共生产物产生信息。在使用该数据集时，请根据实际情况补充缺失数据后再使用。

## Review details
Inventory: The internal review was done by several iteration steps concerning raw data validation, raw data documentation, representativity, completeness and consistency of modelling with regard to ISO 14040 and 14044.
清单： 内部审查通过几个迭代步骤完成，涉及原始数据验证、原始数据记录、代表性、完整性、与 ISO 14040 和 14044 有关的建模的一致性。

## Data sources
- 第二次全国污染源普查产排污核算系数手册（试用版）,四级代码4411、4412文件，在完整版文件中第5333页
