# Pyraclostrobin ; Phenylhydrazine, hydrazine hydrate, toluene, dimethyl sulfate, methyl chloroformate ; Condensation ; All sizes; NESPS2 / 吡唑醚菌酯 ; 苯肼、水合肼、甲苯、硫酸二甲酯、氯甲酸甲酯 ; 缩合 ; 所有规模 ; 全国第二次污染普查数据

Dataset: ILCD process, Unit process, single operation
Geography: CN
Reference year: 2019
Classification: Reference Parameters / Materials production / Organic chemicals
Generated by: The data was created by the Office of the Second National Pollution Source Census of the Ministry of Ecology and Environment, and the data was organized by the TianGong Plan team for ILCD format / 生态环境部第二次全国污染源普查工作办公室创建数据，天工计划团队常慧敏整理数据为ILCD格式
Owner: Tiangong LCI Data Working Group / 天工LCI数据工作小组
Review: Dependent internal review by Tiangong LCI Data Working Group / 天工LCI数据工作小组
Amounts: no units in this file; such an amount is in the reference unit of its flow, which a separate flow dataset defines
copyright: false
licenseType: Free of charge for all users and uses

## General comment
the Technical of end-of-pipe management technology for pollution Exhaust gasis/，Its Technical efficiency of end-of-pipe management0，The formula for calculating the actual operation rate (k-value) of the end-of-pipe treatment facility is k = annual power consumption of equipment (kWh) / (equipment power (kW) × annual operating hours (hours))

## Technical purpose
该吡唑醚菌酯生产过程包括苯肼、水合肼、甲苯、硫酸二甲酯和氯甲酸甲酯的缩合反应，适用于农业领域杀菌剂的所有规模生产。生产过程中产生的废水和废气排放采用末端治理技术进行处理。

## Reference product
- Pyraclostrobine: 1000; calculated
  源文件中描述为为吡唑醚菌酯，此处对其进行了匹配工作，将其匹配到LCAflow库里面相最符合的流，污染物指标备注为工业废水量

## Outputs
All rows: calculated
- volatile organic compound: 0.056
  the Technical of end-of-pipe management technology for pollution volatile organic compoundisRTO，Its Technical efficiency of end-of-pipe management99.9
  污染物指标挥发性有机物的末端治理技术是RTO，其效率为99.9，末端治理设施实际运行率（k值）计算公式为k=治理设施耗电量（千瓦时）/（治理设施运行时数（小时）*治理设施额定功率(千瓦)）。原文件中描述污染物类别为废气，污染物指标为挥发性有机物，此处对其进行了匹配工作，将其匹配到LCAflow库里面相最符合的流，污染物指标备注为挥发性有机物
- volatile organic compound: 1.68
  the Technical of end-of-pipe management technology for pollution volatile organic compoundis(Absorption + diversion) + (adsorption + steam desorption)/(adsorption + nitrogen/air desorption)，Its Technical efficiency of end-of-pipe management97，The formula for calculating the actual operation rate (k-value) of the end-of-pipe treatment facility is k = annual power consumption of equipment (kWh) / (equipment power (kW) × annual operating hours (hours))
  污染物指标挥发性有机物的末端治理技术是（吸收+分流）+（吸附+蒸汽解析）/（吸附+氮气/空气解析），其效率为97，末端治理设施实际运行率（k值）计算公式为k=治理设施耗电量（千瓦时）/（治理设施运行时数（小时）*治理设施额定功率(千瓦)）。原文件中描述污染物类别为废气，污染物指标为挥发性有机物，此处对其进行了匹配工作，将其匹配到LCAflow库里面相最符合的流，污染物指标备注为挥发性有机物
- Ammonia Nitrogen: 0.00496
  the Technical of end-of-pipe management technology for pollution Ammonia NitrogenisChemical precipitation + activated sludge process，Its Technical efficiency of end-of-pipe management84，The formula for calculating the actual operation rate (k-value) of the end-of-pipe treatment facility is k = annual power consumption of equipment (kWh) / (equipment power (kW) × annual operating hours (hours))
  污染物指标氨氮的末端治理技术是化学沉淀+活性污泥法，其效率为84，末端治理设施实际运行率（k值）计算公式为k=治理设施耗电量（千瓦时）/（治理设施运行时数（小时）*治理设施额定功率(千瓦)）。原文件中描述污染物类别为废水，污染物指标为氨氮，此处对其进行了匹配工作，将其匹配到LCAflow库里面相最符合的流，污染物指标备注为氨氮
- Ammonia Nitrogen: 0.00496
  the Technical of end-of-pipe management technology for pollution Ammonia NitrogenisRedox process + chemical coagulation method + electrolysis + activated sludge process，Its Technical efficiency of end-of-pipe management84，The formula for calculating the actual operation rate (k-value) of the end-of-pipe treatment facility is k = annual power consumption of equipment (kWh) / (equipment power (kW) × annual operating hours (hours))
  污染物指标氨氮的末端治理技术是氧化还原法+化学混凝法+电解法+活性污泥法，其效率为84，末端治理设施实际运行率（k值）计算公式为k=治理设施耗电量（千瓦时）/（治理设施运行时数（小时）*治理设施额定功率(千瓦)）。原文件中描述污染物类别为废水，污染物指标为氨氮，此处对其进行了匹配工作，将其匹配到LCAflow库里面相最符合的流，污染物指标备注为氨氮
- Ammonia Nitrogen: 0.0062
  the Technical of end-of-pipe management technology for pollution Ammonia NitrogenisBiological filter，Its Technical efficiency of end-of-pipe management80，The formula for calculating the actual operation rate (k-value) of the end-of-pipe treatment facility is k = annual power consumption of equipment (kWh) / (equipment power (kW) × annual operating hours (hours))
  污染物指标氨氮的末端治理技术是生物滤池，其效率为80，末端治理设施实际运行率（k值）计算公式为k=治理设施耗电量（千瓦时）/（治理设施运行时数（小时）*治理设施额定功率(千瓦)）。原文件中描述污染物类别为废水，污染物指标为氨氮，此处对其进行了匹配工作，将其匹配到LCAflow库里面相最符合的流，污染物指标备注为氨氮
- Ammonia Nitrogen: 0.00868
  the Technical of end-of-pipe management technology for pollution Ammonia NitrogenisShaped anaerobic reactor + A/O process，Its Technical efficiency of end-of-pipe management72，The formula for calculating the actual operation rate (k-value) of the end-of-pipe treatment facility is k = annual power consumption of equipment (kWh) / (equipment power (kW) × annual operating hours (hours))
  污染物指标氨氮的末端治理技术是定型厌氧反应器类+A/O工艺，其效率为72，末端治理设施实际运行率（k值）计算公式为k=治理设施耗电量（千瓦时）/（治理设施运行时数（小时）*治理设施额定功率(千瓦)）。原文件中描述污染物类别为废水，污染物指标为氨氮，此处对其进行了匹配工作，将其匹配到LCAflow库里面相最符合的流，污染物指标备注为氨氮
- Ammonia Nitrogen: 0.0093
  the Technical of end-of-pipe management technology for pollution Ammonia NitrogenisAnaerobic hydrolysis + biofilm process + redox process，Its Technical efficiency of end-of-pipe management70，The formula for calculating the actual operation rate (k-value) of the end-of-pipe treatment facility is k = annual power consumption of equipment (kWh) / (equipment power (kW) × annual operating hours (hours))
  污染物指标氨氮的末端治理技术是厌氧水解类+生物膜法+氧化还原法，其效率为70，末端治理设施实际运行率（k值）计算公式为k=治理设施耗电量（千瓦时）/（治理设施运行时数（小时）*治理设施额定功率(千瓦)）。原文件中描述污染物类别为废水，污染物指标为氨氮，此处对其进行了匹配工作，将其匹配到LCAflow库里面相最符合的流，污染物指标备注为氨氮
- Waste water: 68000
  the Technical of end-of-pipe management technology for pollution Waste wateris/，Its Technical efficiency of end-of-pipe management0，The formula for calculating the actual operation rate (k-value) of the end-of-pipe treatment facility is k = annual normal operating hours of dust removal equipment (hours) / production system annual production operating hours (hours)
  污染物指标工业废水量的末端治理技术是/，其效率为0。原文件中描述污染物类别为废水，污染物指标为工业废水量，此处对其进行了匹配工作，将其匹配到LCAflow库里面相最符合的流，污染物指标备注为工业废水量
- Nitrogen, organic bound: 0.211
  the Technical of end-of-pipe management technology for pollution Nitrogen, organic boundisShaped anaerobic reactor + A/O process，Its Technical efficiency of end-of-pipe management90，The formula for calculating the actual operation rate (k-value) of the end-of-pipe treatment facility is k = annual power consumption of equipment (kWh) / (equipment power (kW) × annual operating hours (hours))
  污染物指标总氮的末端治理技术是定型厌氧反应器类+A/O工艺，其效率为90，末端治理设施实际运行率（k值）计算公式为k=治理设施耗电量（千瓦时）/（治理设施运行时数（小时）*治理设施额定功率(千瓦)）。原文件中描述污染物类别为废水，污染物指标为总氮，此处对其进行了匹配工作，将其匹配到LCAflow库里面相最符合的流，污染物指标备注为总氮
- Nitrogen, organic bound: 0.4431
  the Technical of end-of-pipe management technology for pollution Nitrogen, organic boundisAnaerobic hydrolysis + biofilm process + redox process，Its Technical efficiency of end-of-pipe management79，The formula for calculating the actual operation rate (k-value) of the end-of-pipe treatment facility is k = annual power consumption of equipment (kWh) / (equipment power (kW) × annual operating hours (hours))
  污染物指标总氮的末端治理技术是厌氧水解类+生物膜法+氧化还原法，其效率为79，末端治理设施实际运行率（k值）计算公式为k=治理设施耗电量（千瓦时）/（治理设施运行时数（小时）*治理设施额定功率(千瓦)）。原文件中描述污染物类别为废水，污染物指标为总氮，此处对其进行了匹配工作，将其匹配到LCAflow库里面相最符合的流，污染物指标备注为总氮
- Nitrogen, organic bound: 0.4642
  the Technical of end-of-pipe management technology for pollution Nitrogen, organic boundisRedox process + chemical coagulation method + electrolysis + activated sludge process，Its Technical efficiency of end-of-pipe management78，The formula for calculating the actual operation rate (k-value) of the end-of-pipe treatment facility is k = annual power consumption of equipment (kWh) / (equipment power (kW) × annual operating hours (hours))
  污染物指标总氮的末端治理技术是氧化还原法+化学混凝法+电解法+活性污泥法，其效率为78，末端治理设施实际运行率（k值）计算公式为k=治理设施耗电量（千瓦时）/（治理设施运行时数（小时）*治理设施额定功率(千瓦)）。原文件中描述污染物类别为废水，污染物指标为总氮，此处对其进行了匹配工作，将其匹配到LCAflow库里面相最符合的流，污染物指标备注为总氮
- Nitrogen, organic bound: 0.633
  the Technical of end-of-pipe management technology for pollution Nitrogen, organic boundisBiological filter，Its Technical efficiency of end-of-pipe management70，The formula for calculating the actual operation rate (k-value) of the end-of-pipe treatment facility is k = annual power consumption of equipment (kWh) / (equipment power (kW) × annual operating hours (hours))
  污染物指标总氮的末端治理技术是生物滤池，其效率为70，末端治理设施实际运行率（k值）计算公式为k=治理设施耗电量（千瓦时）/（治理设施运行时数（小时）*治理设施额定功率(千瓦)）。原文件中描述污染物类别为废水，污染物指标为总氮，此处对其进行了匹配工作，将其匹配到LCAflow库里面相最符合的流，污染物指标备注为总氮
- Nitrogen, organic bound: 1.0339
  the Technical of end-of-pipe management technology for pollution Nitrogen, organic boundisChemical precipitation + activated sludge process，Its Technical efficiency of end-of-pipe management51，The formula for calculating the actual operation rate (k-value) of the end-of-pipe treatment facility is k = annual power consumption of equipment (kWh) / (equipment power (kW) × annual operating hours (hours))
  污染物指标总氮的末端治理技术是化学沉淀+活性污泥法，其效率为51，末端治理设施实际运行率（k值）计算公式为k=治理设施耗电量（千瓦时）/（治理设施运行时数（小时）*治理设施额定功率(千瓦)）。原文件中描述污染物类别为废水，污染物指标为总氮，此处对其进行了匹配工作，将其匹配到LCAflow库里面相最符合的流，污染物指标备注为总氮
- chemical oxygen demand: 1.32
  the Technical of end-of-pipe management technology for pollution chemical oxygen demandisRedox process + chemical coagulation method + electrolysis + activated sludge process，Its Technical efficiency of end-of-pipe management99
  污染物指标化学需氧量的末端治理技术是氧化还原法+化学混凝法+电解法+活性污泥法，其效率为99，末端治理设施实际运行率（k值）计算公式为k=治理设施耗电量（千瓦时）/（治理设施运行时数（小时）*治理设施额定功率(千瓦)）。原文件中描述污染物类别为废水，污染物指标为化学需氧量，此处对其进行了匹配工作，将其匹配到LCAflow库里面相最符合的流，污染物指标备注为化学需氧量
- chemical oxygen demand: 5.28
  the Technical of end-of-pipe management technology for pollution chemical oxygen demandisAnaerobic hydrolysis + biofilm process + redox process，Its Technical efficiency of end-of-pipe management96
  污染物指标化学需氧量的末端治理技术是厌氧水解类+生物膜法+氧化还原法，其效率为96，末端治理设施实际运行率（k值）计算公式为k=治理设施耗电量（千瓦时）/（治理设施运行时数（小时）*治理设施额定功率(千瓦)）。原文件中描述污染物类别为废水，污染物指标为化学需氧量，此处对其进行了匹配工作，将其匹配到LCAflow库里面相最符合的流，污染物指标备注为化学需氧量
- chemical oxygen demand: 9.24
  the Technical of end-of-pipe management technology for pollution chemical oxygen demandisChemical precipitation + activated sludge process，Its Technical efficiency of end-of-pipe management93，The formula for calculating the actual operation rate (k-value) of the end-of-pipe treatment facility is k = annual normal operating hours of wastewater treatment equipment (hours) / annual operating hours of production system (hours)
  污染物指标化学需氧量的末端治理技术是化学沉淀+活性污泥法，其效率为93，末端治理设施实际运行率（k值）计算公式为k=治理设施耗电量（千瓦时）/（治理设施运行时数（小时）*治理设施额定功率(千瓦)）。原文件中描述污染物类别为废水，污染物指标为化学需氧量，此处对其进行了匹配工作，将其匹配到LCAflow库里面相最符合的流，污染物指标备注为化学需氧量
- chemical oxygen demand: 14.52
  the Technical of end-of-pipe management technology for pollution chemical oxygen demandisShaped anaerobic reactor + A/O process，Its Technical efficiency of end-of-pipe management89，The formula for calculating the actual operation rate (k-value) of the end-of-pipe treatment facility is k = annual normal operating hours of dust removal equipment (hours) / production system annual production operating hours (hours)
  污染物指标化学需氧量的末端治理技术是定型厌氧反应器类+A/O工艺，其效率为89，末端治理设施实际运行率（k值）计算公式为k=治理设施耗电量（千瓦时）/（治理设施运行时数（小时）*治理设施额定功率(千瓦)）。原文件中描述污染物类别为废水，污染物指标为化学需氧量，此处对其进行了匹配工作，将其匹配到LCAflow库里面相最符合的流，污染物指标备注为化学需氧量
- chemical oxygen demand: 26.4
  the Technical of end-of-pipe management technology for pollution chemical oxygen demandisBiological filter，Its Technical efficiency of end-of-pipe management80，The formula for calculating the actual operation rate (k-value) of the end-of-pipe treatment facility is k = annual normal operating hours of dust removal equipment (hours) / production system annual production operating hours (hours)
  污染物指标化学需氧量的末端治理技术是生物滤池，其效率为80，末端治理设施实际运行率（k值）计算公式为k=治理设施耗电量（千瓦时）/（治理设施运行时数（小时）*治理设施额定功率(千瓦)）。原文件中描述污染物类别为废水，污染物指标为化学需氧量，此处对其进行了匹配工作，将其匹配到LCAflow库里面相最符合的流，污染物指标备注为化学需氧量
- Exhaust gas: 33800
  the Technical of end-of-pipe management technology for pollution Exhaust gasis/，Its Technical efficiency of end-of-pipe management0，The formula for calculating the actual operation rate (k-value) of the end-of-pipe treatment facility is k = annual power consumption of equipment (kWh) / (equipment power (kW) × annual operating hours (hours))
  污染物指标工业废气量的末端治理技术是/，其效率为0。原文件中描述污染物类别为废气，污染物指标为工业废气量，此处对其进行了匹配工作，将其匹配到LCAflow库里面相最符合的流，污染物指标备注为工业废气量

## Use advice
This dataset is derived from the Pollution Source Census Report and contains information on pollution emissions and related products. However, it does not include data on energy or chemical consumption, nor does it provide information on waste or co-product generation. When utilizing this dataset, please supplement the missing data based on actual conditions before use
该数据集来源于污染源普查报告，包含污染物排放及相关产品信息，但不包含能源或化学品消耗数据，也不提供废弃物或共生产物产生信息。在使用该数据集时，请根据实际情况补充缺失数据后再使用。

## Review details
Inventory: The internal review was done by several iteration steps concerning raw data validation, raw data documentation, representativity, completeness and consistency of modelling with regard to ISO 14040 and 14044.
清单： 内部审查通过几个迭代步骤完成，涉及原始数据验证、原始数据记录、代表性、完整性、与 ISO 14040 和 14044 有关的建模的一致性。

## Data sources
- 第二次全国污染源普查产排污核算系数手册（试用版）,二级代码26,三级代码263.0文件，在完整版文件中第2936页
