# SoG-Si ingot casting ; SoG-Si ingot ; Directional solidification

Dataset: ILCD process, Unit process, single operation
Geography: CN
Reference year: 2014
Classification: Unit processes / Materials production / Other materials
Functional unit: The functional unit of the LCA study was 1 kWh based on a multi-Si PV module
LCI method principle: Attributional
LCI method approaches: Allocation
Generated by: Jinfeng Yang, yjfzfshn@163.com
Owner: Tiangong LCI Data Working Group
Review: Dependent internal review by Tiangong LCI Data Working Group
Amounts: no units in this file; such an amount is in the reference unit of its flow, which a separate flow dataset defines
copyright: false
licenseType: Free of charge for all users and uses

## General comment
Multi-Si

## Geography
This study performs a life-cycle assessment for a photovoltaic (PV) system with multi-crystalline silicon (multi-Si) modules in China

## Time period
Available online

## Technical purpose
The multi-crystalline silicon (multi-Si) ingot casting process described here is employed for the production of solar-grade silicon ingots, which are subsequently sliced into wafers, fabricated into cells, and assembled into modules for use in photovoltaic (PV) systems. These PV systems utilize multi-Si modules predominantly for the conversion of solar energy into electricity, and are essential components of solar farms, rooftop installations, and various other applications that harness solar power for electricity generation.

## Reference product
- Multi-Si ingot: 5.47; measured

## Inputs
All rows: measured
- Solar grade multi-Si: 5.52
- Silicon carbide,Silicon carbide: 0.00049
  Silicon carbide
- Quartz Crucible,Quartz Crucible: 15.37
  Quartz crucible
- argon: 10.5
  Argon
- Hydrofluoric acid: 0.25403
  Hydrofluoric acid (49%)
- Compressed air: 18.76
- Sodium hydroxide: 0.04688
- freshwater: 492.47
  Water
- Electricity: 157.54
- process steam: 7.6
  Steam

## Outputs
- hydrogen fluoride: 0.0006; measured
  Hydrogen fluoride emissions to air
- Waste Acid: 0.34872; measured
  Waste acid
- Quartz Crucible,Quartz Crucible: 15.37; measured
  Waste quartz crucible for recovery
- Water (evapotranspiration): 375.08; measured
  Water (evapotranspiration) to air

## Deviations from the LCI method approaches
The goal of this study was to quantitatively assess the life-cycleenvironmental impacts of PV systems in China and provide a scientific basis for policy-making regarding the sustainable development of Chinese PV industry.

## Data selection and combination
The inventory data, including the material consumption and environmental emissions involved in the production of solar-grade silicon, wafers, ingots, cells, and modules, were mainly collected from companies that represent the current domain multi-Si PV technologies in China. The energy consumption data referred to the report “Clean Production ofSolar PV in China” (Li and Chang, 2012). The data of MG-Si production was from literature about MG-Si produced in China

## Use advice
When utilizing the life-cycle assessment (LCA) data provided for the multi-Si PV module production in China, users should be aware that the data is representative of the technological standards and environmental regulations applicable as of the published literature. It includes material consumption and emissions data relevant to the production of solar-grade silicon, wafers, ingots, cells, and modules in the Chinese context. Recyclability of the materials, if applicable, should also be considered when interpreting the data. It is essential to periodically review and update this data to reflect ongoing technological advancements and changes in production practices. Ensure that the use phase behavior of the PV systems is modeled according to localized energy production scenarios.

## Review details
Inventory: The internal review was done by several iteration steps concerning raw data validation, raw data documentation, representativity, completeness and consistency of modelling with regard to ISO 14040 and 14044.

## Data sources
- Fu, Y., Liu, X. & Yuan, Z. Life-cycle assessment of multi-crystalline photovoltaic (PV) systems in China. Journal of Cleaner Production 86, 180–190 (2015).
