# Dicamba ; Synthesis ; All sizes; NESPS2 / 麦草畏 ; 2,8-二氯苯胺、二甲苯 ; 合成 ; 所有规模 ; 全国第二次污染普查数据

Dataset: ILCD process, Unit process, single operation
Geography: CN
Reference year: 2019
Classification: Reference Parameters / Materials production / Organic chemicals
Generated by: The data was created by the Office of the Second National Pollution Source Census of the Ministry of Ecology and Environment, and the data was organized by the TianGong Plan team for ILCD format / 生态环境部第二次全国污染源普查工作办公室创建数据，天工计划团队常慧敏整理数据为ILCD格式
Owner: Tiangong LCI Data Working Group / 天工LCI数据工作小组
Review: Dependent internal review by Tiangong LCI Data Working Group / 天工LCI数据工作小组
Amounts: no units in this file; such an amount is in the reference unit of its flow, which a separate flow dataset defines
copyright: false
licenseType: Free of charge for all users and uses

## General comment
the Technical of end-of-pipe management technology for pollution Ammonia NitrogenisElectrolysis + redox process + shaped anaerobic reactor，Its Technical efficiency of end-of-pipe management85，The formula for calculating the actual operation rate (k-value) of the end-of-pipe treatment facility is k = power consumption of equipment (kWh) / (equipment rated power (kW) × equipment operating time (hours))

## Technical purpose
所述的合成工艺涉及使用2,8-二氯苯胺和二甲苯生产Dicamba，该除草剂可以适用于所有规模的制造。在农业部门，这种Dicamba可用于农田里的阔叶杂草控制。提到的氨氮污染末端管控技术用于处理过程，包括电解步骤、氧化还原过程，并使用成型厌氧反应器。该技术主要应用于污水处理设施，以减少氨氮污染。

## Reference product
- Dicamba: 1000; calculated
  源文件中描述为为麦草畏，此处对其进行了匹配工作，将其匹配到LCAflow库里面相最符合的流，污染物指标备注为氨氮

## Outputs
- Ammonia Nitrogen: 0.00255; calculated
  the Technical of end-of-pipe management technology for pollution Ammonia NitrogenisElectrolysis + redox process + shaped anaerobic reactor，Its Technical efficiency of end-of-pipe management85，The formula for calculating the actual operation rate (k-value) of the end-of-pipe treatment facility is k = power consumption of equipment (kWh) / (equipment rated power (kW) × equipment operating time (hours))
  污染物指标氨氮的末端治理技术是电解法+氧化还原法+定型厌氧反应器类，其效率为85，末端治理设施实际运行率（k值）计算公式为k=治理设施耗电量（千瓦时）/（治理设施运行时数（小时）*治理设施额定功率(千瓦)）。原文件中描述污染物类别为废水，污染物指标为氨氮，此处对其进行了匹配工作，将其匹配到LCAflow库里面相最符合的流，污染物指标备注为氨氮

## Use advice
This dataset is derived from the Pollution Source Census Report and contains information on pollution emissions and related products. However, it does not include data on energy or chemical consumption, nor does it provide information on waste or co-product generation. When utilizing this dataset, please supplement the missing data based on actual conditions before use
该数据集来源于污染源普查报告，包含污染物排放及相关产品信息，但不包含能源或化学品消耗数据，也不提供废弃物或共生产物产生信息。在使用该数据集时，请根据实际情况补充缺失数据后再使用。

## Review details
Inventory: The internal review was done by several iteration steps concerning raw data validation, raw data documentation, representativity, completeness and consistency of modelling with regard to ISO 14040 and 14044.
清单： 内部审查通过几个迭代步骤完成，涉及原始数据验证、原始数据记录、代表性、完整性、与 ISO 14040 和 14044 有关的建模的一致性。

## Data sources
- 第二次全国污染源普查产排污核算系数手册（试用版）,二级代码26,三级代码263.0文件，在完整版文件中第2936页
