# Substrate Remediation;Isotopic Remediation;Phytoremediation;Operation;Remediated Substrate

Dataset: ILCD process, Unit process, single operation
Geography: IT
Reference year: 2013
Classification: Unit processes / Other Services / Repair and maintenance
Generated by: Wang Ning, wang_ning@caep.org.cn
Owner: Tiangong LCI Data Working Group
Review: Dependent internal review by Tiangong LCI Data Working Group
Amounts: no units in this file; such an amount is in the reference unit of its flow, which a separate flow dataset defines
copyright: false
licenseType: Free of charge for all users and uses

## General comment
Phytoremediation is up and running and the substrate is repaired

## Technical purpose
This dataset represents a process used for environmental remediation of contaminated sediments (substrates). Phytoremediation, a part of the dataset, uses plants to stabilize, extract, or degrade contaminants from the substrate. This process is typically applied in situ or at a designated treatment area for the recovery of contaminated soil, sediment, or sludge. Its typical application is in ecological restoration projects and/or as part of larger environmental management strategies.

## Reference product
- Remediated Sediment: 1; measured

## Inputs
- Phytoremediation plant: 1; measured
- Contaminated Sediment: 1; measured
- soil: 3.1875e7; measured
- Compound Fertilizer,Compound Fertilizer: 11300; measured

## Use advice
Use this dataset to model the environmental impacts associated with substrate remediation using phytoremediation. Ensure to account for all inputs and outputs within the system boundary, which includes major raw materials, energy requirements, and site operations. The accuracy of LCA results depends on the correct representation of the system processes and their interactions. It is also critical to consider the temporal and spatial specificity of the remediation process, as these can significantly affect the environmental outcomes. Recycling or disposal of plant biomass after contaminant extraction may also need to be included to fully assess the environmental impact.

## Review details
Inventory: The internal review was done by several iteration steps concerning raw data validation, raw data documentation, representativity, completeness and consistency of modelling with regard to ISO 14040 and 14044.

## Data sources
- Puccini M., Seggiani M., Vitolo S., & Iannelli R. Life cycle assessment of remediation alternatives for dredged sediments. Chemical Engineering Transactions 35, 781–786 (2013).
