# Sinter | sintering | Sintering of iron ore

Dataset: ILCD process, Unit process, single operation
Geography: CN
Reference year: 2021
Classification: Materials production / Other mineralic materials
Generated by: Wanghuanyu, wanghuanyu00@126.com
Review: Dependent internal review by Tiangong LCI Data Working Group
Amounts: no units in this file; such an amount is in the reference unit of its flow, which a separate flow dataset defines

## Reference product
- Sinter / Pellet Dust: 1000; article inperiodical
  烧结矿

## Inputs
All rows: article inperiodical
- Iron ore (Import): 830.05
  铁矿
- Limestone: 34.47
  石灰石
- dolomite: 46.77
  白云石
- quicklime: 36.08
  生石灰
- Flue dust: 22.96
  烧结尘灰
- Flue dust: 15.31
  瓦斯灰
- Gypsum paste: 1.62
  石膏浆
- Water (fresh water): 0.349
  水
- Electricity: 143.136
  电能
- Blast furnace gas: 66.39
  高炉煤气
- process steam: 5.28
  蒸汽
- coke: 30.918
  焦炭
- anthracite: 10.306
  无烟煤
- compressed air: 11.53
  压缩空气

## Outputs
All rows: article inperiodical
- Flue dust: 29.865
  粉尘
- Flue dust: 6.281
  烟尘
- non-methane volatile organic compounds: 0.115
  VOCs
- 2,3,7,8-tetrachlorodibenzo-p-dioxin: 0.0014933
  二噁英/(ng-TEQ*t-1)
- lead: 9.008e-5
  Pb
- mercury: 4.222e-5
  Hg
- zinc: 4.765e-5
  Zn
- cadmium: 4.12e-5
  Cd
- arsenic: 1.04e-5
  As
- nickel: 9.3e-6
  Ni
- heavy metals (unspecified): 0.000136523
  其他金属
- chemical oxygen demand: 0.000644357
  COD
- Phosphate radical: 0.006129
  PO4(3-)
- Water (evapotranspiration): 0.07
  污水
- carbon dioxide: 209.65
  CO2
- carbon monoxide: 26.09
  CO
- sulfur dioxide: 0.520542
  SO2
- nitrous oxide: 0.493568
  NOx
- methane: 0.13078
  CH4
- hydrogen chloride: 0.014778
  HCl
- oxygen: 0.049966
  O2
- hydrogen fluoride: 0.053642
  HF

## Review details
Inventory: The internal review was done by several iteration steps concerning raw data validation, raw data documentation, representativity, completeness and consistency of modelling with regard to ISO 14040 and 14044.; Documentation: The review of the documentation was performed by Ecobilan and is in compliance with ISO 14040 and 14044. The data set documentation is correct in view of the appropriateness of the information provided. It includes all relevant information in view of data quality and scope of application of the respective LCI result.

## Data sources
- 1.易正明 et al. 基于LCA方法的铁矿烧结过程环境影响评价. 烧结球团 47, 88–95 (2022).
