# Electricity production ; Thermal power ; Shandong

Dataset: ILCD process, Unit process, single operation
Geography: SD-CN
Reference year: 2019
Classification: Unit processes / Energy carriers and technologies / Electricity
Generated by: Ruoxi Xiong, xiongrx0126@163.com
Owner: Tiangong LCI Data Working Group
Review: Dependent internal review by Tiangong LCI Data Working Group
Amounts: no units in this file; such an amount is in the reference unit of its flow, which a separate flow dataset defines
copyright: false
licenseType: Free of charge for all users and uses

## General comment
Thermal power generation includes seventeen fossil fuels such as raw coal, washed coal, oil and natural gas. The process only considers the direct power generation process, not the upstream raw material extraction and processing and the downstream power consumption

## Time period
Calculated based on data from the 2019 Energy Statistics Yearbook

## Technical purpose
The technological process described is employed for the production of electrical power using thermal power generation methods in Shandong. It specifically refers to the generation of electricity using seventeen different fossil fuels, including raw coal, washed coal, oil, and natural gas. It is intended for direct electricity production and does not encompass the upstream mining and processing of raw materials or the downstream consumption of electricity.

## Reference product
- electricity for thermal power: 3.6; calculated

## Inputs
All rows: calculated
- Raw coal: 0.475393
- Other Washed Coal: 0.00013815
- Gangue, in ground: 0.00338593
- Coke oven gas: 0.009257
- blast furnace gas: 0.139575
- Converter gas: 0.010036
- Diesel: 3.521e-5
- fuel oil, unspecified: 0.00033385
- refinery gas: 3.725e-5

## Outputs
- carbon dioxide (fossil): 0.758989; calculated
- sulfur dioxide: 0.000131695; calculated
- Nitrogen oxides: 0.000209241; calculated
- particles (> PM10): 2.63388e-5; calculated

## Data treatment and extrapolations
For the accounting method, please refer to the "Enterprise Greenhouse Gas Emissions Accounting Methods and Reporting Guidelines for Power Generation Facilities". Different forms of power generation and fuel consumption come from Chapter 3 (Energy Production) and Chapter 6 (Regional Energy Balance Sheet) in the "China Energy Statistical Yearbook 2020". The fuel parameters such as low calorific value and carbon content per unit calorific value used to calculate the carbon dioxide emission factor come from the "2019 China Regional Power Grid Carbon Dioxide Baseline Emission Factor Calculation Instructions OM" and the "Enterprise Greenhouse Gas Emission Accounting Method and Reporting Guide for Power Generation Facilities" 》

## Use advice
Users of this Life Cycle Assessment data should consider the data set as representative of the direct electricity generation process through thermal power in Shandong, based on statistics from the year 2019. When utilizing this data, take note of the specified methodologies for greenhouse gas emissions accounting, as they are critical for accurate emissions reporting. The data excludes upstream and downstream processes and focuses on in-plant electricity production. Use the accounting methods and emissions factors provided in the referenced guidelines and statistical yearbooks to ensure methodological consistency when calculating emissions for LCA inventories.

## Review details
Inventory: The internal review was done by several iteration steps concerning raw data validation, raw data documentation, representativity, completeness and consistency of modelling with regard to ISO 14040 and 14044.

## Data sources
- 熊若熙. 中国电力生产和消费二氧化碳与污染物排放因子核算. (清华大学, 2023).
