# Blast furnace ironmaking ; pellet sinter ; pig iron

Dataset: ILCD process, Unit process, single operation
Geography: CN
Reference year: 2020
Classification: Unit processes / Materials production / Metals and semimetals
Generated by: Jiwei, 1299801467@qq.com
Owner: Tiangong LCI Data Working Group
Review: Dependent internal review by Tiangong LCI Data Working Group
Amounts: no units in this file; such an amount is in the reference unit of its flow, which a separate flow dataset defines
copyright: false
licenseType: Free of charge for all users and uses

## General comment
This pig iron produced through the blast furnace ironmaking using pellet and sinter ore is intended for use in steel-making enterprises. Applicable in the manufacturing of a variety of steel products, it serves as a foundational material for the construction, automotive, and machinery industries.

## Time period
论文提到钢铁企业环境总体数据为1998年的吨钢环境基础数据。

## Reference product
- iron: 752; calculated

## Inputs
All rows: calculated
- Sinter ore: 1131
- freshwater,freshwater: 700
- Pellet: 74.1
- Electricity: 378
- carbon: 289.6
- anthracite: 108.3
- Blast furnace gas: 621.3

## Outputs
All rows: calculated
- Blast furnace gas: 708
- BF Slag: 501
- BF Shop Dust: 29.2
- carbon dioxide (fossil): 1281.6
  原文未区分bio和fossil，根据专家判断此处为carbon dioxide (fossil)
- sulfur dioxide: 0.17
- Nitrogen oxides: 0.2
- Sinter / Pellet Dust: 0.12

## Use advice
The life cycle assessment data for this pig iron is based on environmental baseline data from steel enterprises in 1998. Users should note that technology and efficiency improvements since then may affect the relevance of this data for current assessments. Caution should be exercised when extrapolating this historical data set to current or future scenarios. Consideration of technological advancements, as well as current and expected regulations, is advised for accurate impact evaluation.

## Review details
Inventory: The internal review was done by several iteration steps concerning raw data validation, raw data documentation, representativity, completeness and consistency of modelling with regard to ISO 14040 and 14044.

## Data sources
- 梁田. 基于生命周期评价的典型钢铁企业环境影响评估及绿色发展研究. (郑州大学, 2020).
