# Dyeing ; Carpet, tapestry ; Wool, cotton, linen, silk, wool, chemical fiber ; Dyeing - rinsing ; All sizes; NESPS2 / 染色 ; 地毯、挂毯 ; 羊毛、棉、麻、丝、毛、化纤 ; 印染-漂洗 ; 所有规模 ; 全国第二次污染普查数据

Dataset: ILCD process, Unit process, single operation
Geography: CN
Reference year: 2019
Classification: Reference Parameters / Other Services / Other Services
Generated by: The data was created by the Office of the Second National Pollution Source Census of the Ministry of Ecology and Environment, and the data was organized by the TianGong Plan team for ILCD format / 生态环境部第二次全国污染源普查工作办公室创建数据，天工计划团队常慧敏整理数据为ILCD格式
Owner: Tiangong LCI Data Working Group / 天工LCI数据工作小组
Review: Dependent internal review by Tiangong LCI Data Working Group / 天工LCI数据工作小组
Amounts: no units in this file; such an amount is in the reference unit of its flow, which a separate flow dataset defines
copyright: false
licenseType: Free of charge for all users and uses

## General comment
the Technical of end-of-pipe management technology for pollution Waste wateris/

## Technical purpose
此数据集代表各种纺织品（包括地毯、挂毯以及羊毛、棉、麻、丝和化纤等材料）的工业染色过程。该数据主要用于专注于评估末端废水处理技术及其在减少排放水中的化学需氧量(COD)、氨氮、有机氮和磷等污染物效率的环境影响评估。

## Reference product
- Wool: 1000; input; calculated
  源文件中描述为为羊毛、棉、麻、丝、毛、化纤，此处对其进行了匹配工作，将其匹配到LCAflow库里面相最符合的流，污染物类别备注为①2436抽纱刺绣工艺品制造行业：涉及染色核算，废水指标可参考1713棉纺织及印染精加工制造行业的蜡染工艺的系数手册；涉及印花/丝印核算环节，废水指标参考1713棉纺织及印染精加工制造行业印花核算环节“圆网印花、平网印花”工艺的系数手册。②2435天然植物纤维编织工艺品的生产过程中，如果包含浸泡-染色-清洗工艺，废水指标可参考本系数手册。③2439其他工艺美术及礼仪用品的生产过程中，如果以动物毛发为原料包含水洗-漂染工艺，废水指标可参考4111鬃毛加工、制刷及清扫制造行业鬃毛制备核算环节的系数手册。，污染物指标备注为工业废水量

## Outputs
All rows: calculated
- phosphorus, total: 0.00489
  the Technical of end-of-pipe management technology for pollution phosphorus, totalisDirect discharge，Its Technical efficiency of end-of-pipe management0
  污染物指标总磷的末端治理技术是直排，其效率为0，末端治理设施实际运行率（k值）计算公式为k=污水治理设施运行时间（小时/年）/正常生产时间（小时/年）。原文件中描述污染物类别为废水，污染物指标为总磷，此处对其进行了匹配工作，将其匹配到LCAflow库里面相最符合的流，污染物类别备注为①2436抽纱刺绣工艺品制造行业：涉及染色核算，废水指标可参考1713棉纺织及印染精加工制造行业的蜡染工艺的系数手册；涉及印花/丝印核算环节，废水指标参考1713棉纺织及印染精加工制造行业印花核算环节“圆网印花、平网印花”工艺的系数手册。②2435天然植物纤维编织工艺品的生产过程中，如果包含浸泡-染色-清洗工艺，废水指标可参考本系数手册。③2439其他工艺美术及礼仪用品的生产过程中，如果以动物毛发为原料包含水洗-漂染工艺，废水指标可参考4123鬃毛加工、制刷及清扫制造行业鬃毛制备核算环节的系数手册。，污染物指标备注为总磷
- Ammonia Nitrogen: 0.0074646
  the Technical of end-of-pipe management technology for pollution Ammonia NitrogenisChemical coagulation + aerobic biological treatment，Its Technical efficiency of end-of-pipe management82.6，The formula for calculating the actual operation rate (k-value) of the end-of-pipe treatment facility is k = annual operating hours of desulfurization facilities / annual operating hours of hot blast stove
  污染物指标氨氮的末端治理技术是化学混凝法+好氧生物处理法，其效率为82.6，末端治理设施实际运行率（k值）计算公式为k=污水治理设施运行时间（小时/年）/正常生产时间（小时/年）。原文件中描述污染物类别为废水，污染物指标为氨氮，此处对其进行了匹配工作，将其匹配到LCAflow库里面相最符合的流，污染物类别备注为①2436抽纱刺绣工艺品制造行业：涉及染色核算，废水指标可参考1713棉纺织及印染精加工制造行业的蜡染工艺的系数手册；涉及印花/丝印核算环节，废水指标参考1713棉纺织及印染精加工制造行业印花核算环节“圆网印花、平网印花”工艺的系数手册。②2435天然植物纤维编织工艺品的生产过程中，如果包含浸泡-染色-清洗工艺，废水指标可参考本系数手册。③2439其他工艺美术及礼仪用品的生产过程中，如果以动物毛发为原料包含水洗-漂染工艺，废水指标可参考4116鬃毛加工、制刷及清扫制造行业鬃毛制备核算环节的系数手册。，污染物指标备注为氨氮
- Ammonia Nitrogen: 0.02145
  the Technical of end-of-pipe management technology for pollution Ammonia NitrogenisChemical coagulation，Its Technical efficiency of end-of-pipe management50，The formula for calculating the actual operation rate (k-value) of the end-of-pipe treatment facility is k = annual operating hours of desulfurization facilities / annual operating hours of hot blast stove
  污染物指标氨氮的末端治理技术是化学混凝法，其效率为50，末端治理设施实际运行率（k值）计算公式为k=污水治理设施运行时间（小时/年）/正常生产时间（小时/年）。原文件中描述污染物类别为废水，污染物指标为氨氮，此处对其进行了匹配工作，将其匹配到LCAflow库里面相最符合的流，污染物类别备注为①2436抽纱刺绣工艺品制造行业：涉及染色核算，废水指标可参考1713棉纺织及印染精加工制造行业的蜡染工艺的系数手册；涉及印花/丝印核算环节，废水指标参考1713棉纺织及印染精加工制造行业印花核算环节“圆网印花、平网印花”工艺的系数手册。②2435天然植物纤维编织工艺品的生产过程中，如果包含浸泡-染色-清洗工艺，废水指标可参考本系数手册。③2439其他工艺美术及礼仪用品的生产过程中，如果以动物毛发为原料包含水洗-漂染工艺，废水指标可参考4115鬃毛加工、制刷及清扫制造行业鬃毛制备核算环节的系数手册。，污染物指标备注为氨氮
- Ammonia Nitrogen: 0.0429
  the Technical of end-of-pipe management technology for pollution Ammonia NitrogenisDirect discharge，Its Technical efficiency of end-of-pipe management0，The formula for calculating the actual operation rate (k-value) of the end-of-pipe treatment facility is k = annual operating hours of desulfurization facilities / annual operating hours of hot blast stove
  污染物指标氨氮的末端治理技术是直排，其效率为0，末端治理设施实际运行率（k值）计算公式为k=污水治理设施运行时间（小时/年）/正常生产时间（小时/年）。原文件中描述污染物类别为废水，污染物指标为氨氮，此处对其进行了匹配工作，将其匹配到LCAflow库里面相最符合的流，污染物类别备注为①2436抽纱刺绣工艺品制造行业：涉及染色核算，废水指标可参考1713棉纺织及印染精加工制造行业的蜡染工艺的系数手册；涉及印花/丝印核算环节，废水指标参考1713棉纺织及印染精加工制造行业印花核算环节“圆网印花、平网印花”工艺的系数手册。②2435天然植物纤维编织工艺品的生产过程中，如果包含浸泡-染色-清洗工艺，废水指标可参考本系数手册。③2439其他工艺美术及礼仪用品的生产过程中，如果以动物毛发为原料包含水洗-漂染工艺，废水指标可参考4117鬃毛加工、制刷及清扫制造行业鬃毛制备核算环节的系数手册。，污染物指标备注为氨氮
- phosphorus, total: 0.0489
  the Technical of end-of-pipe management technology for pollution phosphorus, totalisChemical coagulation + aerobic biological treatment
  污染物指标总磷的末端治理技术是化学混凝法+好氧生物处理法，末端治理设施实际运行率（k值）计算公式为k=污水治理设施运行时间（小时/年）/正常生产时间（小时/年）。原文件中描述污染物类别为废水，污染物指标为总磷，此处对其进行了匹配工作，将其匹配到LCAflow库里面相最符合的流，污染物类别备注为①2436抽纱刺绣工艺品制造行业：涉及染色核算，废水指标可参考1713棉纺织及印染精加工制造行业的蜡染工艺的系数手册；涉及印花/丝印核算环节，废水指标参考1713棉纺织及印染精加工制造行业印花核算环节“圆网印花、平网印花”工艺的系数手册。②2435天然植物纤维编织工艺品的生产过程中，如果包含浸泡-染色-清洗工艺，废水指标可参考本系数手册。③2439其他工艺美术及礼仪用品的生产过程中，如果以动物毛发为原料包含水洗-漂染工艺，废水指标可参考4122鬃毛加工、制刷及清扫制造行业鬃毛制备核算环节的系数手册。，污染物指标备注为总磷
- Nitrogen, organic bound: 0.0635
  the Technical of end-of-pipe management technology for pollution Nitrogen, organic boundisChemical coagulation + aerobic biological treatment，Its Technical efficiency of end-of-pipe management50
  污染物指标总氮的末端治理技术是化学混凝法+好氧生物处理法，其效率为50，末端治理设施实际运行率（k值）计算公式为k=污水治理设施运行时间（小时/年）/正常生产时间（小时/年）。原文件中描述污染物类别为废水，污染物指标为总氮，此处对其进行了匹配工作，将其匹配到LCAflow库里面相最符合的流，污染物类别备注为①2436抽纱刺绣工艺品制造行业：涉及染色核算，废水指标可参考1713棉纺织及印染精加工制造行业的蜡染工艺的系数手册；涉及印花/丝印核算环节，废水指标参考1713棉纺织及印染精加工制造行业印花核算环节“圆网印花、平网印花”工艺的系数手册。②2435天然植物纤维编织工艺品的生产过程中，如果包含浸泡-染色-清洗工艺，废水指标可参考本系数手册。③2439其他工艺美术及礼仪用品的生产过程中，如果以动物毛发为原料包含水洗-漂染工艺，废水指标可参考4119鬃毛加工、制刷及清扫制造行业鬃毛制备核算环节的系数手册。，污染物指标备注为总氮
- Nitrogen, organic bound: 0.0762
  the Technical of end-of-pipe management technology for pollution Nitrogen, organic boundisChemical coagulation，Its Technical efficiency of end-of-pipe management40
  污染物指标总氮的末端治理技术是化学混凝法，其效率为40，末端治理设施实际运行率（k值）计算公式为k=污水治理设施运行时间（小时/年）/正常生产时间（小时/年）。原文件中描述污染物类别为废水，污染物指标为总氮，此处对其进行了匹配工作，将其匹配到LCAflow库里面相最符合的流，污染物类别备注为①2436抽纱刺绣工艺品制造行业：涉及染色核算，废水指标可参考1713棉纺织及印染精加工制造行业的蜡染工艺的系数手册；涉及印花/丝印核算环节，废水指标参考1713棉纺织及印染精加工制造行业印花核算环节“圆网印花、平网印花”工艺的系数手册。②2435天然植物纤维编织工艺品的生产过程中，如果包含浸泡-染色-清洗工艺，废水指标可参考本系数手册。③2439其他工艺美术及礼仪用品的生产过程中，如果以动物毛发为原料包含水洗-漂染工艺，废水指标可参考4118鬃毛加工、制刷及清扫制造行业鬃毛制备核算环节的系数手册。，污染物指标备注为总氮
- Nitrogen, organic bound: 0.127
  the Technical of end-of-pipe management technology for pollution Nitrogen, organic boundisDirect discharge，Its Technical efficiency of end-of-pipe management0
  污染物指标总氮的末端治理技术是直排，其效率为0，末端治理设施实际运行率（k值）计算公式为k=污水治理设施运行时间（小时/年）/正常生产时间（小时/年）。原文件中描述污染物类别为废水，污染物指标为总氮，此处对其进行了匹配工作，将其匹配到LCAflow库里面相最符合的流，污染物类别备注为①2436抽纱刺绣工艺品制造行业：涉及染色核算，废水指标可参考1713棉纺织及印染精加工制造行业的蜡染工艺的系数手册；涉及印花/丝印核算环节，废水指标参考1713棉纺织及印染精加工制造行业印花核算环节“圆网印花、平网印花”工艺的系数手册。②2435天然植物纤维编织工艺品的生产过程中，如果包含浸泡-染色-清洗工艺，废水指标可参考本系数手册。③2439其他工艺美术及礼仪用品的生产过程中，如果以动物毛发为原料包含水洗-漂染工艺，废水指标可参考4120鬃毛加工、制刷及清扫制造行业鬃毛制备核算环节的系数手册。，污染物指标备注为总氮
- phosphorus, total: 0.489
  the Technical of end-of-pipe management technology for pollution phosphorus, totalisChemical coagulation
  污染物指标总磷的末端治理技术是化学混凝法，末端治理设施实际运行率（k值）计算公式为k=污水治理设施运行时间（小时/年）/正常生产时间（小时/年）。原文件中描述污染物类别为废水，污染物指标为总磷，此处对其进行了匹配工作，将其匹配到LCAflow库里面相最符合的流，污染物类别备注为①2436抽纱刺绣工艺品制造行业：涉及染色核算，废水指标可参考1713棉纺织及印染精加工制造行业的蜡染工艺的系数手册；涉及印花/丝印核算环节，废水指标参考1713棉纺织及印染精加工制造行业印花核算环节“圆网印花、平网印花”工艺的系数手册。②2435天然植物纤维编织工艺品的生产过程中，如果包含浸泡-染色-清洗工艺，废水指标可参考本系数手册。③2439其他工艺美术及礼仪用品的生产过程中，如果以动物毛发为原料包含水洗-漂染工艺，废水指标可参考4121鬃毛加工、制刷及清扫制造行业鬃毛制备核算环节的系数手册。，污染物指标备注为总磷
- chemical oxygen demand: 0.64
  the Technical of end-of-pipe management technology for pollution chemical oxygen demandisChemical coagulation + aerobic biological treatment，Its Technical efficiency of end-of-pipe management95，The formula for calculating the actual operation rate (k-value) of the end-of-pipe treatment facility is k = annual operating hours of desulfurization facilities / annual operating hours of hot blast stove
  污染物指标化学需氧量的末端治理技术是化学混凝法+好氧生物处理法，其效率为95，末端治理设施实际运行率（k值）计算公式为k=污水治理设施运行时间（小时/年）/正常生产时间（小时/年）。原文件中描述污染物类别为废水，污染物指标为化学需氧量，此处对其进行了匹配工作，将其匹配到LCAflow库里面相最符合的流，污染物类别备注为①2436抽纱刺绣工艺品制造行业：涉及染色核算，废水指标可参考1713棉纺织及印染精加工制造行业的蜡染工艺的系数手册；涉及印花/丝印核算环节，废水指标参考1713棉纺织及印染精加工制造行业印花核算环节“圆网印花、平网印花”工艺的系数手册。②2435天然植物纤维编织工艺品的生产过程中，如果包含浸泡-染色-清洗工艺，废水指标可参考本系数手册。③2439其他工艺美术及礼仪用品的生产过程中，如果以动物毛发为原料包含水洗-漂染工艺，废水指标可参考4113鬃毛加工、制刷及清扫制造行业鬃毛制备核算环节的系数手册。，污染物指标备注为化学需氧量
- chemical oxygen demand: 6.4
  the Technical of end-of-pipe management technology for pollution chemical oxygen demandisChemical coagulation，Its Technical efficiency of end-of-pipe management50，The formula for calculating the actual operation rate (k-value) of the end-of-pipe treatment facility is k = annual operating hours of desulfurization facilities / annual operating hours of hot blast stove
  污染物指标化学需氧量的末端治理技术是化学混凝法，其效率为50，末端治理设施实际运行率（k值）计算公式为k=污水治理设施运行时间（小时/年）/正常生产时间（小时/年）。原文件中描述污染物类别为废水，污染物指标为化学需氧量，此处对其进行了匹配工作，将其匹配到LCAflow库里面相最符合的流，污染物类别备注为①2436抽纱刺绣工艺品制造行业：涉及染色核算，废水指标可参考1713棉纺织及印染精加工制造行业的蜡染工艺的系数手册；涉及印花/丝印核算环节，废水指标参考1713棉纺织及印染精加工制造行业印花核算环节“圆网印花、平网印花”工艺的系数手册。②2435天然植物纤维编织工艺品的生产过程中，如果包含浸泡-染色-清洗工艺，废水指标可参考本系数手册。③2439其他工艺美术及礼仪用品的生产过程中，如果以动物毛发为原料包含水洗-漂染工艺，废水指标可参考4112鬃毛加工、制刷及清扫制造行业鬃毛制备核算环节的系数手册。，污染物指标备注为化学需氧量
- chemical oxygen demand: 12.8
  the Technical of end-of-pipe management technology for pollution chemical oxygen demandisDirect discharge，Its Technical efficiency of end-of-pipe management0，The formula for calculating the actual operation rate (k-value) of the end-of-pipe treatment facility is k = annual operating hours of desulfurization facilities / annual operating hours of hot blast stove
  污染物指标化学需氧量的末端治理技术是直排，其效率为0，末端治理设施实际运行率（k值）计算公式为k=污水治理设施运行时间（小时/年）/正常生产时间（小时/年）。原文件中描述污染物类别为废水，污染物指标为化学需氧量，此处对其进行了匹配工作，将其匹配到LCAflow库里面相最符合的流，污染物类别备注为①2436抽纱刺绣工艺品制造行业：涉及染色核算，废水指标可参考1713棉纺织及印染精加工制造行业的蜡染工艺的系数手册；涉及印花/丝印核算环节，废水指标参考1713棉纺织及印染精加工制造行业印花核算环节“圆网印花、平网印花”工艺的系数手册。②2435天然植物纤维编织工艺品的生产过程中，如果包含浸泡-染色-清洗工艺，废水指标可参考本系数手册。③2439其他工艺美术及礼仪用品的生产过程中，如果以动物毛发为原料包含水洗-漂染工艺，废水指标可参考4114鬃毛加工、制刷及清扫制造行业鬃毛制备核算环节的系数手册。，污染物指标备注为化学需氧量
- Waste water: 15000
  the Technical of end-of-pipe management technology for pollution Waste wateris/
  污染物指标工业废水量的末端治理技术是/，末端治理设施实际运行率（k值）计算公式为/。原文件中描述污染物类别为废水，污染物指标为工业废水量，此处对其进行了匹配工作，将其匹配到LCAflow库里面相最符合的流，污染物类别备注为①2436抽纱刺绣工艺品制造行业：涉及染色核算，废水指标可参考1713棉纺织及印染精加工制造行业的蜡染工艺的系数手册；涉及印花/丝印核算环节，废水指标参考1713棉纺织及印染精加工制造行业印花核算环节“圆网印花、平网印花”工艺的系数手册。②2435天然植物纤维编织工艺品的生产过程中，如果包含浸泡-染色-清洗工艺，废水指标可参考本系数手册。③2439其他工艺美术及礼仪用品的生产过程中，如果以动物毛发为原料包含水洗-漂染工艺，废水指标可参考4111鬃毛加工、制刷及清扫制造行业鬃毛制备核算环节的系数手册。，污染物指标备注为工业废水量

## Use advice
This dataset is derived from the Pollution Source Census Report and contains information on pollution emissions and related products. However, it does not include data on energy or chemical consumption, nor does it provide information on waste or co-product generation. When utilizing this dataset, please supplement the missing data based on actual conditions before use
该数据集来源于污染源普查报告，包含污染物排放及相关产品信息，但不包含能源或化学品消耗数据，也不提供废弃物或共生产物产生信息。在使用该数据集时，请根据实际情况补充缺失数据后再使用。

## Review details
Inventory: The internal review was done by several iteration steps concerning raw data validation, raw data documentation, representativity, completeness and consistency of modelling with regard to ISO 14040 and 14044.
清单： 内部审查通过几个迭代步骤完成，涉及原始数据验证、原始数据记录、代表性、完整性、与 ISO 14040 和 14044 有关的建模的一致性。

## Data sources
- 第二次全国污染源普查产排污核算系数手册（试用版）,二级代码24,四级代码2437文件，在完整版文件中第2844页
