# Polymer Hybrid Aluminum Electrolytic Capacitors (PHAEC) Scrap ; Aluminum Powder ; Used Capacitors

Dataset: ILCD process, Unit process, single operation
Geography: CN
Reference year: 2022
Classification: Unit processes / End-of-life treatment / Material recycling
Generated by: Huimin Chang, huiminchang@tsinghua.edu.cn
Owner: Tiangong LCI Data Working Group
Review: Dependent internal review by Tiangong LCI Data Working Group
Amounts: no units in this file; such an amount is in the reference unit of its flow, which a separate flow dataset defines
copyright: false
licenseType: Free of charge for all users and uses

## General comment
The described industrial process pertains to the production and end-of-life management of Polymer Hybrid Aluminum Electrolytic Capacitors (PHAECs). These capacitors are typically used in electronic devices for power supply stabilization and noise filtering due to their high capacitance and reliability. They are particularly suitable for applications requiring long-lasting performance under rigorous conditions such as high-temperature environments.

## Time period
Literature published on 2022-11-15 in the literature The reference year of the elementary data (alumminum ingots, separator paper, tansport, electricity, and water) is around 2016 and qcruired from the Gabi database (Version: 10.6.1.35)

## Reference product
- used capacitor: 1e6; input; measured
  Capacitors (waste)

## Outputs
All rows: measured
- electricity, high voltage, aluminium industry: 394.2
  Electricity
- Mixture of plastic and paper with electrolyte: 240.44
- iron, powder: 1.96
  Iron powder
- Aluminum powder: 731.08
- Rubber Powder: 121.52
  Rubber powder
- Dust: 0.1095

## Data selection and combination
The material information and performance parameters of the three types of AECs are from the investigated manufacturer. Moreover, through the field research of several factories in the AEC industry, the original data on aluminum blank foil fabrication (made from aluminum ingots), anode/cathode foil fabrication (made from aluminum blank foil), and capacitor fabrication were obtained. Due to technical confidentiality, the LCI data of the fabrication of the cathode foil for PHAECs cannot be obtained directly from the supplier. Therefore, the manufacturing LCI of aluminum cathode foil in PHAECs is adjusted according to the coating process data of cathode foil of PAECs, considering their similarity. In the transportation stage, the data of the main raw materials from the material origin to the capacitor manufacturer and the data of the manufactured capacitor products from the manufacturer to the customers are from the supply chain system of the manufacturer. The energy consumption in the use stage is calculated based on the physical equations and the electrical parameters of the AECs. To ensure the completeness of the analysis, the data of the end-of-life stage is obtained based on the analysis and calculation.The reference year of the elementary data is around 2016. The elementary data (i.e., aluminum ingots, separator paper, transport, electricity, and water) are acquired from the Gabi database (Version: 10.6.1.35). In addition, some background data, including 3, 4-ethylene dioxythiophene (EDOT), ammonium adipate, ammonium citrate, etc., are not available in the Gabi database. They are estimated based on the chemical reactions with the material preparation process from the existing raw materials in the Gabi database. The data on the preparation process of the dispersive solution (PEDOT:PSS, 1%wt) for PHAECs' fabrication are scaled from the lab data. The detailed LCI data of the three types of AEC and unit impact of the substance flow is provided in Sheets 5–7 and Sheet 2 of Supporting Info B.

## Use advice
When using the dataset provided, attention should be paid to the reference year of the elementary data, which is around 2016. Users should consider updating the data if newer information is available. Since the technology and environmental impacts may have evolved, it is crucial to verify the pertinence of the data to current conditions. Additionally, the lack of certain manufacturing LCI data due to confidentiality requires the user to be cautious when extrapolating results. When modeling the use phase behavior, the calculated energy consumption based on physical equations and electrical parameters should be used, ensuring it aligns with the specific applications of AECs. End-of-life data should be included in analysis to maintain completeness and reflect potential recycling or disposal impacts.

## Review details
Inventory: The internal review was done by several iteration steps concerning raw data validation, raw data documentation, representativity, completeness and consistency of modelling with regard to ISO 14040 and 14044.

## Data sources
- Zhang, C., Zheng, Y., Jing, J., Liu, Y. & Huang, H. A comparative LCA study on aluminum electrolytic capacitors: From liquid-state electrolyte, solid-state polymer to their hybrid. J. Clean. Prod. 375, (2022).
