# LIB Pyrometallurgy--Carbonthermal reduction(Process B)

Dataset: ILCD process, Unit process, single operation
Geography: CN
Reference year: 2013
Valid until: 2017
Classification: Unit processes / End-of-life treatment / Material recycling
Functional unit: FU is a typical type of LIB electrode material of 100 kg
Generated by: maqingyuan, m1120498928@163.com
Owner: Tiangong LCI Data Working Group
Review: Dependent internal review by Tiangong LCI Data Working Group
Amounts: no units in this file; such an amount is in the reference unit of its flow, which a separate flow dataset defines
copyright: false
licenseType: Free of charge for all users and uses

## General comment
Reducing carbon is introduced into the rotary furnace for mixed roasting, and graphite is used as the reducing agent to realize the reduction of valuable compounds at high temperatures (600-1000 oC), and Ni, Co, MnO and other reduction products are separated, and lithium can be recovered in the form of Li2CO3 through water leaching, so that the products can be selectively recovered.

## Time period
Data source: 2013-2017

## Technical purpose
Pyrometallurgy--Carbonthermal reduction (Process B) is an industrial process where reducing carbon is mixed and roasted with valuable compounds in a rotary furnace at high temperatures (600-1000 oC), using graphite as the reducing agent. This method effectively reduces and separates reduction products such as Ni (Nickel), Co (Cobalt), MnO (Manganese Oxide), and allows for the selective recovery of lithium resources in the form of Li2CO3 through water leaching. It is commonly applied in the production of LIB (Lithium-ion Battery) electrode materials and is crucial for the recycling and valorization of metals from spent LIBs.

## Reference product
- Electrolyte: 100; input; missing unimportant
  Electrode paste

## Inputs
- carbon: 6.2; missing unimportant
- water,water: 100; missing unimportant
- hard coal: 28.5; missing unimportant
- Electricity: 22.32; missing unimportant

## Outputs
All rows: missing unimportant
- Lithium carbonate: 13.3
- Graphite: 1
  Graphite powder
- Al/Cu foil: 2.7
- nickel: 4
  Ni salt、metal
- cobalt: 6
  Co salt、metal
- Manganese salt: 3
  Mn salt、metal
- Alloy (Ni, Fe, Al, etc.): 20
- Slags: 7.9
- Metal Fumes: 2.42
- carbon dioxide (fossil): 104.1
  The original text does not distinguish between bio and fossil, and according to experts, it is fossil here
- sulfur dioxide: 0.3
- waste water - treated: 90

## Data selection and combination
The input-output of the process comes from the average results of the data reported in the literature review, reflecting the representative process from "tomb" to "cradle". This study does not consider the recycling or treatment of plastic and metal shells, and labor costs, factory construction costs, and their impact on the environment are also not included in this analysis.

## Data treatment and extrapolations
It is worth noting that the EU's data is not specific to a specific industry, and some import and export data and recycling information are not suitable for China's situation. Therefore, the improved CRMs evaluation method also combines official Chinese data, literature reports, and data from other interest groups such as trade/industry associations to conduct the best estimation of data from major LIB manufacturers, recycling companies, official management agencies in China, and other stakeholders. In terms of data timeliness, the reference period used in the evaluation of CRMs is based on the latest 4-year average (i.e. 2013-2016).

## Use advice
When utilizing the Life Cycle Assessment data set for Process B, users must account for regional disparities; this data set average is based on a literature review and not optimized for individual industries or countries. It does not incorporate recycling or treatment of plastic and metal shells, labor and construction costs, or environmental impacts thereof. For accurate application, supplement with region-specific data, especially in the context of China where EU import/export data and recycling information may not apply. Users should adjust the weight of evidence towards more current and locally relevant data where possible, and be cognizant that the functional unit (FU) is based on 100 kg of a typical LIB electrode material.

## Review details
Inventory: The internal review was done by several iteration steps concerning raw data validation, raw data documentation, representativity, completeness and consistency of modelling with regard to ISO 14040 and 14044.

## Data sources
- 宋佳丽. 面向能源金属高效回收的资源关键性评价模型与应用. (天津大学, 2019).
