# LFP combined pyrometallurgical and hydrometallurgical recycling

Dataset: ILCD process, Unit process, single operation
Geography: CN
Reference year: 2018
Classification: End-of-life treatment / Material recycling
Functional unit: The functional unit for this study is the vehicle travelling distance of a single power system during its life cycle (250,000 km).
Generated by: maqingyuan, m1120498928@163.com
Owner: Tiangong LCI Data Working Group
Review: Dependent internal review by Tiangong LCI Data Working Group
Amounts: no units in this file; such an amount is in the reference unit of its flow, which a separate flow dataset defines
copyright: false
licenseType: Free of charge for all users and uses

## General comment
The waste LFP battery is pyrolyzed, crushed, sieved and magnetically separated to obtain the waste LFP battery cathode material, which is alkaline dissolved; the residues containing iron and lithium are obtained, and then iron, lithium, and phosphorus sources are added, and roasted to obtain the new LFP cathode material.

## Technical purpose
The process delineated is utilized for the recycling of waste Lithium Iron Phosphate (LFP) batteries, specifically targeting the recovery of cathode materials. After processing through pyrolysis, crushing, sieiving, and magnetic separation, the spent cathode materials, which contain valuable components such as lithium and iron, are extracted and subsequently treated with additional iron, lithium, and phosphorus sources to regenerate new LFP cathode materials. These regenerated cathode materials are primarily intended for use in power batteries for electric vehicles.

## Model description
In the current study, the CML2001 model is used along with the GaBi6 software,version 6.0.

## Reference product
- lithium: 1.88; software or database

## Inputs
- natural gas: 62.01; software or database
- electricity: 1975.9; software or database

## Outputs
- copper: 19.5; software or database
- aluminium: 24.08; software or database
- Cast Iron: 21.21; software or database
- polypropylene fibres (PP): 5.44; software or database

## Data selection and combination
As for the power battery, the data and recycling technology are presented by Brunp (a subsidiary of CATL).

## Data treatment and extrapolations
Classification, characterisation and normalisation are applied to analyse the environmental impacts.

## Use advice
When utilizing this LCA data set, it is critical to accurately model the methodological assumptions, such as the inclusion of energy consumption and material inputs during the recycling stage of LFP batteries. Users should apply classification, characterisation, and normalisation methods as mentioned, adopting the CML2001 model and GaBi6 software (version 6.0) for consistent environmental impact analysis. The data is specific to the battery's power system life cycle for a vehicle's travel distance of 250,000 km, which must be considered as the functional unit in relevant studies. Any deviation or scaling should be methodologically justified and clearly documented.

## Review details
Inventory: The internal review was done by several iteration steps concerning raw data validation, raw data documentation, representativity, completeness and consistency of modelling with regard to ISO 14040 and 14044.

## Data sources
- Yu, A., Wei, Y., Chen, W., Peng, N. & Peng, L. Life cycle environmental impacts and carbon emissions: A case study of electric and gasoline vehicles in China. Transportation Research Part D: Transport and Environment 65, 409–420 (2018).
