# Asphalt Production ; Asphalt ; Cradle

Dataset: ILCD process, Unit process, single operation
Geography: CN
Reference year: 2019
Classification: Unit processes / Materials production / Other mineralic materials
Generated by: Zimeng Cai, caizm6178@163.com
Owner: Tiangong LCI Data Working Group
Review: Dependent internal review by Tiangong LCI Data Working Group
Amounts: no units in this file; such an amount is in the reference unit of its flow, which a separate flow dataset defines
copyright: false
licenseType: Free of charge for all users and uses

## General comment
采矿和选矿;原铝生产

## Time period
Date of publication

## Technical purpose
The asphalt produced from this process is intended for various construction applications, including road paving, roofing, and waterproofing. It may also be used for the production of asphalt shingles and for sealing and insulating purposes in building construction.

## Reference product
- pitch: 1000; software or database
  coal tar pitch

## Inputs
All rows: software or database
- hard coal; 26.3 MJ/kg: 2037.15
  Fuel mix: raw coal (73%), electricity (15%), clean coal (8%), diesel (3%) and refined NG (1%)
- electricity, high voltage, aluminium industry: 418.743
  (same comment as for hard coal; 26.3 MJ/kg)
- hard coal: 223.41
  (same comment as for hard coal; 26.3 MJ/kg)
- Diesel oil: 83.8086
  (same comment as for hard coal; 26.3 MJ/kg)
- natural gas, high pressure: 27.9462
  (same comment as for hard coal; 26.3 MJ/kg)

## Data selection and combination
Inventories of energy input and material flow are collected from updated yearbook s, published papers, official reports and databases. The details of the inventory are presented as Table 1. It should be noted that the data for the material transportation assumptions are based on relevant studies, whic h may be slightly different from the actual situation. The life-cycle intensities of each end-use energy type are based on the results of our previous studies.

## Use advice
Users of this life cycle assessment data should note that while energy input and material flow inventories are derived from current yearbooks, published papers, official reports, and databases, the information on material transportation assumptions comes from relevant studies which may not precisely reflect the actual situation. Therefore, caution should be exercised when applying transportation data. The life-cycle intensities for each energy type should be used in accordance with the results presented in previous studies mentioned in the context.

## Review details
Inventory: The internal review was done by several iteration steps concerning raw data validation, raw data documentation, representativity, completeness and consistency of modelling with regard to ISO 14040 and 14044.

## Data sources
- Peng, T., Ou, X., Yan, X. & Wang, G. Life-cycle analysis of energy consumption and GHG emissions of aluminium production in China. in Energy Procedia vol. 158 3937–3943 (2019).
