# Steelmaking ; crude steel ; electric arc furnace steelmaking ; hot metal/scrap steel

Dataset: ILCD process, Unit process, single operation
Geography: CN
Reference year: 2006
Classification: Unit processes / Materials production / Metals and semimetals
Generated by: Wanghuanyu, wanghuanyu00@126.com
Owner: Tiangong LCI Data Working Group
Review: Dependent internal review by Tiangong LCI Data Working Group
Amounts: no units in this file; such an amount is in the reference unit of its flow, which a separate flow dataset defines
copyright: false
licenseType: Free of charge for all users and uses

## General comment
The process described is utilized in the production of crude steel through the electric arc furnace (EAF) method. This involves melting down hot metal, also known as pig iron, or scrap steel. This steelmaking process is commonly used in facilities where the recovery and recycling of steel scrap is a priority, or where the production of steel requires less energy and lower carbon emissions compared to traditional blast furnace methods. The crude steel produced can be used in various sectors, including construction, infrastructure, automotive, and appliance manufacturing.

## Geography
Z9工厂同一名称的工艺过程

## Reference product
- iron: 0.087; measured

## Inputs
All rows: measured
- iron: 1071
- Steel scrap (St): 742
- Alloy steel: 31.3
  alloy
- electrode: 5.9
- Electricity: 2221.2

## Outputs
- Flue dust: 4.07; measured
- waste incineration of municipal solid waste (MSW): 64; measured

## Use advice
When applying this data set for life cycle assessments, users should ensure that the boundaries of the analysis appropriately include the upstream impacts of energy supply and resource inputs for the EAF process. Consider the origin of the scrap steel – whether post-consumer or pre-consumer – for accurate classification of recycling benefits. Also, users should account for any potential emissions from the steelmaking process, including transportation of inputs and outputs. The technological era and geographic location of the EAF facility should reflect current practices to ensure data relevancy. It is recommended to use this data in combination with other relevant datasets to model the complete life cycle of steel products.

## Review details
Inventory: The internal review was done by several iteration steps concerning raw data validation, raw data documentation, representativity, completeness and consistency of modelling with regard to ISO 14040 and 14044.

## Data sources
- 刘微. LCI数据质量体系中的分析方法研究. (北京工业大学, 2006).
