# Livestock and poultry breeding ; feed processing stage ; dairy cow scale

Dataset: ILCD process, Unit process, single operation
Geography: CN
Reference year: 2014
Classification: Unit processes / Materials production / Agricultural production means
Functional unit: 1kg milk
Generated by: Rui Yang, 1632707028@qq.com
Owner: Tiangong LCI Data Working Group
Review: Dependent internal review by Tiangong LCI Data Working Group
Amounts: no units in this file; such an amount is in the reference unit of its flow, which a separate flow dataset defines
copyright: false
licenseType: Free of charge for all users and uses

## General comment
Livestock and poultry feed processing mainly consumes electricity and coal.

## Geography
This study was conducted from 2014 to 2015, aiming at livestock and poultry feeding cycle, meat ratio, feed formula, feed consumption, coal and electricity consumption, etc. Has been to Shandong Gaomi Zhengda pig farm, Laixi City Zhishuang dairy farm, Jimo city Duan Bolan town Jiangjiapo village pig farm, Jimo City Liujiazhuang town livestock farm, Rizhao City Changling town Guanzhuang village, Juxian County Zhailihe town Dongxing Agriculture and animal husbandry company, Juxian Qiaoshan town east Chen dairy farm, Juxian Qiaoshan town Liu Jiayi water pig farm, Zhucheng Foreign Trade Co., LTD. Phoenix parents breeding duck farm, Xinjiang Fukang Hongfa Breeding professional cooperative, Jiuyun Street Town Xuhong laying Chicken cooperative, Jiuyun Street Town Liuyun Village self-contained breeding farm, China Australia Holding Group Co., LTD., Dezhou City Qingyun County Wayu Village, Shandong Province Qingyun County four Liu community beef cattle breeding base, Dezhou City Qingyun Qingnian chicken breeding base, Qingyun County Yongli Poultry layer breeding company, Qingyun County Xingchen youth chicken breeding Field research was carried out by professional breeding cooperatives, Qingyun Dongtai broiler breeding cooperatives, Hebei Yanshan Boyuan Feed Co., LTD., Yanshan Da Chinese Feed Co., LTD., Wudi Liuhe Feed Co., LTD., and China-Australia Oriental Hope Feed Co., LTD.

## Technology and included processes
In this paper, the life cycle of livestock and poultry farming is divided into six stages: feed crop planting, feed processing, livestock and poultry raising, manure treatment, slaughter and transportation. The specific life cycle process of livestock and poultry breeding is shown in Figure 2-1. Due to the lack of some data and the limitations of basic conditions, the production, transportation and use of pesticides, mulch and feed additives have not been analyzed, and the environmental impact caused by other related infrastructure construction, transport production and labor costs is no longer considered.

## Technical purpose
The feed processing stage for dairy cows described in the data set is used within the livestock and poultry breeding industry. The data set focuses on large-scale operations and addresses the consumption of resources, such as electricity and coal, during the feed processing for dairy cows. It reflects field research conducted on various livestock breeding and feed processing facilities across different regions, providing insights into the efficiency and consumption patterns of these operations.

## Reference product
- feed: 2.26027; calculated

## Inputs
- Electricity: 0.203424; calculated
- hard coal: 0.0271232; calculated
- maize grain: 2.05; measured
- soybean: 0.16; measured
- wheat: 0.57; measured

## Outputs
- carbon dioxide (fossil),carbon dioxide (fossil): 0.11313; measured
  dairy cow scale
- sulfur dioxide: 0.00198; measured
  dairy cow scale
- nitrogen, total (excluding N2): 0.00032; measured
  dairy cow scale
- carbon monoxide (fossil): 5.1e-5; measured
  dairy cow scale

## Use advice
Researchers and industry professionals should utilize this data with consideration for its time-specific relevancy reflecting the period 2014-2015. Caution should be taken when extrapolating the data for current or future scenarios due to potential changes in industry standards, technology, and regulations. When using the data in life cycle assessments, ensure alignment with methodological frameworks that accommodate regional variations in livestock farming practices, resource consumption, and environmental impacts. The data set is best employed to benchmark current practices against this historical data to measure improvements or identify areas requiring optimization.

## Review details
Inventory: The internal review was done by several iteration steps concerning raw data validation, raw data documentation, representativity, completeness and consistency of modelling with regard to ISO 14040 and 14044.

## Data sources
- 周景月. 基于生命周期评价的畜禽养殖环境影响分析. (青岛科技大学, 2017).
