# Soil and groundwater remediation;Ex-situ;groundwater pump and treat;construction; Granular active carbon unit

Dataset: ILCD process, Unit process, single operation
Geography: JS-CN
Reference year: 2022
Classification: Other Services / Repair and maintenance
Generated by: Wang Ning, wang_ning@caep.org.cn
Owner: Tiangong LCI Data Working Group
Review: Dependent internal review by Tiangong LCI Data Working Group
Amounts: no units in this file; such an amount is in the reference unit of its flow, which a separate flow dataset defines
copyright: false
licenseType: Free of charge for all users and uses

## General comment
Construction of activated carbon plants using steel and activated carbon pellets

## Geography
a closed pesticide manufacturing plant located in Jiangsu Province, China.

## Technical purpose
The process encompasses the construction of a granular activated carbon treatment unit aimed for ex-situ soil and groundwater remediation. Specifically, this treatment unit is designed to address contamination issues at a closed pesticide manufacturing plant located in Jiangsu Province, China. The construction uses steel and activated carbon pellets, suggesting that the remediation unit is intended for heavy-duty industrial applications, particularly in treating polluted groundwater by pumping and filtering through the activated carbon to remove contaminants.

## Reference product
- Granular active carbon unit: 1; measured

## Inputs
- Activated Carbon: 900; measured
- Steel sections: 250; measured

## Use advice
Users of this data set should be aware that the life cycle assessment data is specific to the construction of an activated carbon unit for groundwater remediation following the closure of a pesticide plant in Jiangsu Province. The process data may not directly apply to other regions or different contaminant profiles. It is advisable to consider local regulatory requirements, geological conditions, and the specific contaminants involved when applying this data to other projects. When modeling the use phase, special attention should be given to the maintenance and replacement schedule of the activated carbon filter material, as well as the energy consumption of the groundwater pump system.

## Review details
Inventory: The internal review was done by several iteration steps concerning raw data validation, raw data documentation, representativity, completeness and consistency of modelling with regard to ISO 14040 and 14044.

## Data sources
- Ding, D. et al. Assessing the environmental impacts and costs of biochar and monitored natural attenuation for groundwater heavily contaminated with volatile organic compounds. Science of The Total Environment 846, 157316 (2022).
