# Aluminum electrolysis ; Liquid primary aluminum ; Prebaking ; Alumina for metallurgy ; 2012

Dataset: ILCD process, Unit process, single operation
Geography: CN
Reference year: 2021
Classification: Unit processes / Materials production / Metals and semimetals
Generated by: Zimeng Cai, caizm6178@163.com
Owner: Tiangong LCI Data Working Group
Review: Dependent internal review by Tiangong LCI Data Working Group
Amounts: no units in this file; such an amount is in the reference unit of its flow, which a separate flow dataset defines
copyright: false
licenseType: Free of charge for all users and uses

## General comment
The liquid primary aluminum produced from the industrial process of aluminum electrolysis, using the prebaking method, is intended for usage in the metallurgy industry. This aluminum produced in 2012 is especially suited for large-scale manufacturing processes that require high-purity aluminum, such as aircraft, automotive parts, construction materials, and other applications where the properties of aluminum are indispensable.

## Time period
Date of publication

## Reference product
- aluminium, primary, liquid: 1000; software or database

## Inputs
All rows: software or database
- Integrated AC power consumption: 48449
- aluminium oxide, metallurgical: 1919.89
- fluoride salt: 20.03
- anode, prebake, for aluminium electrolysis: 420.11
- Water, unspecified natural origin: 2.55

## Data selection and combination
The data in this study refers to the LCA data of PA, SA, electricity, and other background data. The PA data were obtained from statistical data sources, and the SA data were mainly obtained from the literatures. The background data were mainly derived from the Chinese localization LCA database CAS RCEES 2018, which was established by the Research Center for Eco-Environmental Sciences, Chinese Academy of Sciences and covers LCA data for energy, materials, transportation, waste management etc.

## Use advice
LCA data users should pay close attention to the scope and technological applicability of this dataset. The data set is specific to the year 2012 and may not accurately reflect current production processes or environmental impacts. Recycled material flows should be clearly distinguished and excluded if the analysis is strictly about primary production. When applying the LCA data on electricity and background data from CAS RCEES 2018, the geographical relevance and updates to the methodology or database should be considered. For any comparison, ensure temporal alignment and consistent system boundary with the studied processes.

## Review details
Inventory: The internal review was done by several iteration steps concerning raw data validation, raw data documentation, representativity, completeness and consistency of modelling with regard to ISO 14040 and 14044.

## Data sources
- Ding, N., Liu, N., Lu, B. & Yang, J. Life cycle greenhouse gas emissions of aluminum based on regional industrial transfer in China. J. Ind. Ecol. 25, 1657–1672 (2021).
