# Purified exhaust gas ; Soil in-situ remediation ; SVE system ; Exhaust gas disposal

Dataset: ILCD process, Unit process, single operation
Geography: KR
Reference year: 2011
Classification: Unit processes / Other Services / Repair and maintenance
Generated by: Zhang Jianbin, zhangjb@caep.org.cn
Owner: Tiangong LCI Data Working Group
Review: Dependent internal review by Tiangong LCI Data Working Group
Amounts: no units in this file; such an amount is in the reference unit of its flow, which a separate flow dataset defines
copyright: false
licenseType: Free of charge for all users and uses

## General comment
18,000 kg

## Technology and included processes
GAC replacement - 18,000 kg

## Technical purpose
The process described pertains to the environmental remediation sector, specifically soil in-situ remediation using a Soil Vapor Extraction (SVE) system. The process uses activated carbon to adsorb exhaust gases generated during the soil cleaning, thus ensuring the treated gas meets environmental standards before being released. This method is typically applied in scenarios where volatile organic compounds (VOCs) are contaminants in soil. The data set is useful for understanding the material and energy requirements for SVE systems and can be applied for environmental impact assessments of soil remediation projects.

## Reference product
- Purified exhaust gas (produced by thermal desorption of 1 m3 soil): 1; measured

## Inputs
- Activated Carbon: 18000; measured
- Exhaust gas: 1; estimated

## Outputs
- Waste (solid): 18000; measured
  用于尾气吸收产生的废弃活性炭

## Use advice
In applying this data, users must account for the specific conditions of the soil remediation project, such as the type and concentration of VOCs. The replacement volume of activated carbon (18,000 kg) provided should be adjusted based on the actual adsorption capacity required for the process. Users should ensure that all inputs and outputs, including all major raw materials and energy consumption detailed, are correctly incorporated into the life cycle assessment model. Particular attention should be given to the disposal method of the spent activated carbon, as it can bear significant environmental impacts.

## Review details
Inventory: The internal review was done by several iteration steps concerning raw data validation, raw data documentation, representativity, completeness and consistency of modelling with regard to ISO 14040 and 14044.

## Data sources
- Jeong, S.-W. & Suh, S.-W. Assessment of Environmental Impacts and CO 2 Emissions from Soil Remediation Technologies using Life Cycle Assessment - Case Studies on SVE and Biopile Systems -. Journal of Korean Society of Environmental Engineers 33, 267–274 (2011).
