# Electricity production ; Electricity mix ; Fujian

Dataset: ILCD process, Unit process, single operation
Geography: FJ-CN
Reference year: 2019
Classification: Unit processes / Energy carriers and technologies / Electricity
Generated by: Ruoxi Xiong, xiongrx0126@163.com
Owner: Tiangong LCI Data Working Group
Review: Dependent internal review by Tiangong LCI Data Working Group
Amounts: no units in this file; such an amount is in the reference unit of its flow, which a separate flow dataset defines
copyright: false
licenseType: Free of charge for all users and uses

## General comment
Electricity mix includes thermal, hydro, wind, nuclear and solar generation

## Technical purpose
This dataset describes the generation of electricity through a mixed energy grid in Fujian, China. The electricity produced by this process can be used for residential, commercial, industrial, and public services. It is suitable for applications requiring electricity from a mix of sources including thermal (most likely coal, gas or oil-fired plants), hydroelectric, wind, nuclear, and solar power generation.

## Reference product
- Electricity: 3.6; missing unimportant
  [{'text': '能量', 'type': 'text'}]

## Inputs
All rows: missing unimportant
- electricity for thermal power: 1.96804
  [{'text': '能量', 'type': 'text'}]
- electricity from hydroelectric power plant: 0.618631
  [{'text': '能量', 'type': 'text'}]
- electricity for nuclear power: 0.869162
  [{'text': '能量', 'type': 'text'}]
- electricity from wind power: 0.121766
  [{'text': '能量', 'type': 'text'}]
- electricity for solar power: 0.0223956
  [{'text': '能量', 'type': 'text'}]

## Use advice
Users applying this data must account for the regional and temporal specificity of the electricity mix in Fujian. The proportion of each generation type (thermal, hydro, wind, nuclear, solar) should be considered and may change over time. Inclusion of upstream and downstream processes, such as fuel extraction and end-of-life of infrastructure, should be considered based on the goal and scope of the Life Cycle Assessment (LCA). Users should be aware of the methodological differences in assessing the environmental impacts of each generation type and apply consistent methods within their LCA study.

## Review details
Inventory: The internal review was done by several iteration steps concerning raw data validation, raw data documentation, representativity, completeness and consistency of modelling with regard to ISO 14040 and 14044.

## Data sources
- 能源统计年鉴2020
