# Northwest Wheat-Corn Production ; Wheat-Corn Mixed Cultivation

Dataset: ILCD process, Unit process, single operation
Geography: XY-SAX-CN
Reference year: 2013
Valid until: 2013
Classification: Unit processes / Materials production / Food and renewable raw materials
Functional unit: 1t
LCI method principle: Attributional
LCI method approaches: Consequential
Generated by: Haoran Zhang, hrzhang@whu.edu.cn
Owner: Tiangong LCI Data Working Group
Review: Dependent internal review by Tiangong LCI Data Working Group
Amounts: no units in this file; such an amount is in the reference unit of its flow, which a separate flow dataset defines
copyright: false
licenseType: Free of charge for all users and uses

## General comment
The life cycle of winter wheats-summer maize rotation system mainly includes three stages: raw material mining and transportation, agricultural materials production and transportation, and crop planting, including coal, oil, natural gas, electricity and other raw materials mining and production, land resource utilization, fertilizer, pesticide and other agricultural materials production related energy consumption and pollutant emission. Including CO2, NH3, SO2, CH4, N2O and CO [11]. The environmental impact of plant equipment, construction facilities, production of transport tools and transportation of raw materials associated with the system is not considered.

## Geography
Yang Ling

## Technology and included processes
The research on the resource utilization and environmental emission of winter wheat-summer maize rotation system from raw material extraction, processing and transportation to agricultural materials production and crop planting process is to provide decision-making basis for the production and environmental management of the whole process of winter wheat-summer maize rotation system. The life cycle assessment of agricultural products starts from the mining of ore and energy and ends in the output of crop planting, including the output of agricultural products and pollutants. Land resources are the basis of all production activities and directly enter the agricultural system. In this study, 1 t of crops were evaluated as functional units

## Technical purpose
The dataset describes the winter wheat and summer corn mixed cultivation process in the northwest regions of China, specifically in Fuping and Yangling. It covers land use and the lifecycle impacts of crop rotation systems including the extraction and transportation of raw materials and the production and transportation of agricultural inputs like fertilizers and pesticides. This data can be instrumental for agricultural researchers, policymakers, and environmental scientists assessing the environmental footprint of crop production, optimizing farming practices, and developing sustainable agriculture strategies.

## Reference product
- maize grain: 1000; measured

## Inputs
- arable: 1670; measured
- water: 769; measured
- Electricity: 32871.6; measured
- Corn Seeds: 6.55; measured

## Outputs
All rows: measured
- carbon monoxide (fossil): 0.44498
- Nitrogen oxides: 3.13949
- sulfide: 2.4014
- carbon dioxide (fossil),carbon dioxide (fossil): 960.7
- methane (fossil),methane (fossil): 0.02112
- nitrous oxide: 0.52836
- ammonium: 11.89
- phosphorus, total: 0.01641
- phosphoric acid: 0.05012
- sodium nitrate: 1.61662
- Insecticide: 0.0955
- heavy metals (unspecified): 0.0361

## Deviations from the LCI method approaches
The stipulated starting boundary is the mining of ores and fossil energy for the production of fertilizers and pesticides. The termination boundary is the emission of pollutants during the rice planting phase.

## Data selection and combination
The data for the study mainly comes from field surveys conducted from August to September 2013, randomly surveying 30 farmers each in Fuping and Yangling, regarding the planting of winter wheat and summer corn.

## Data treatment and extrapolations
Impact assessment consists of four steps: impact categorization, characterization, normalization, and weighted assessment.

## Use advice
When using this dataset, ensure that the scope of your Life Cycle Assessment (LCA) includes the stipulated starting and termination boundaries. Factor in the production of upstream raw materials such as coal, oil, natural gas, and electricity, as well as the energy consumption and emissions from the production of agricultural inputs. However, do not consider the environmental impacts of facilities and equipment outside of crop cultivation, such as manufacturing of farming equipment or infrastructure, and the transportation impacts beyond the defined lifecycle stages. Additionally, bear in mind the regional specificity of the data, collected from Fuping and Yangling in 2013, which may influence extrapolation to other regions or time periods.

## Review details
Inventory: The internal review was done by several iteration steps concerning raw data validation, raw data documentation, representativity, completeness and consistency of modelling with regard to ISO 14040 and 14044.

## Data sources
- 彭小瑜, 吴喜慧, 吴发启, 等. 陕西关中地区冬小麦-夏玉米轮作系统生命周期评价[J].农业环境科学学报, 2015, 34(4).
