# Funnel and trench-based gate ; In-situ groundwater remediation ; Funnel-and-gate PRB

Dataset: ILCD process, Unit process, single operation
Geography: US
Reference year: 2011
Classification: Unit processes / Other Services / Repair and maintenance
Generated by: Yang Xintong, yangxt@caep.org.cn
Owner: Tiangong LCI Data Working Group
Review: Dependent internal review by Tiangong LCI Data Working Group
Amounts: no units in this file; such an amount is in the reference unit of its flow, which a separate flow dataset defines
copyright: false
licenseType: Free of charge for all users and uses

## General comment
The funnel and trench-based gate is composed of impermeable funnel, a water gate, and active materials, which is used for large underground water pollution plumes buried in shallow water. The water gate is installed using trench-based method.

## Geography
PRB is assumed to be installed at a simulated site

## Technical purpose
The funnel-and-trench based gate system is designed for in-situ remediation of large, shallowly buried groundwater pollution plumes. It is typically used in environmental engineering projects to contain and treat contaminated groundwater via a permeable reactive barrier (PRB). This system is suitable for treating a variety of contaminants and is applicable in areas where conventional pump-and-treat methods may not be feasible.

## Reference product
- Funnel and trench-based gate: 1; estimated

## Inputs
- Impermeable funnel: 31.4; estimated
  A funnel with a length of 31.4 m and a gate with a width of 10 m and a depth of 11 m are installed
- Trench-based gate: 1; estimated

## Use advice
When using this data set, it is important to consider the specific characteristics of the contamination and local geological conditions. The user may need to adjust the scale and design of the funnel-and-gate system based on the extent and nature of the groundwater pollution plume. The energy and material inputs should be accounted for in the overall environmental impact assessment of the remediation project. It is also advisable to consider the potential for secondary impacts from the installation and operation of the PRB system, such as changes in groundwater flow or the long-term integrity of the impermeable funnel.

## Review details
Inventory: The internal review was done by several iteration steps concerning raw data validation, raw data documentation, representativity, completeness and consistency of modelling with regard to ISO 14040 and 14044.

## Data sources
- Mark S. H. Mak and Irene M. C. Lo.Environmental Life Cycle Assessment of Permeable Reactive Barriers: Effects of Construction Methods, Reactive Materials and Groundwater Constituents[J].Environmental Science & Technology 2011, 45, 23, 10148-10154
