# Wet steaming cotton dyeing and finishing processing ; printing and dyeing cotton ; final disposal ; incineration

Dataset: ILCD process, Unit process, black box
Geography: CN
Reference year: 2012
Classification: Unit processes / End-of-life treatment / Energy recycling
Generated by: Yingfan Duan, 1300925579@qq.com
Owner: Tiangong LCI Data Working Group
Review: Dependent internal review by Tiangong LCI Data Working Group
Amounts: no units in this file; such an amount is in the reference unit of its flow, which a separate flow dataset defines
copyright: false
licenseType: Free of charge for all users and uses

## General comment
"Due to uncertainties in product consumption and the ultimate disposal location, this study omits the transportation process from the research subject to the final disposal site. The final disposal process of the product is based on a disposal model in a specific city in China (Yang Jianxin, Xu Cheng, Wang Rusong. Methods and Applications of Life Cycle Assessment [M]. Beijing: Meteorological Press, 2002, 6.). Due to a lack of sufficiently reliable data, this study neglects energy consumption in the final disposal process of the product and assumes an equal distribution of sanitary landfilling and incineration, each accounting for 50%."

## Geography
"China is the world's largest production base for printing and dyeing, but rapid development is accompanied by severe environmental issues. Currently, the printing and dyeing industry primarily addresses environmental problems through clean production audits, implementing research on low-toxicity and low-pollution raw materials, resource utilization of waste, equipment upgrades and renovations, recycling of water and steam, and improvements in production processes. However, existing clean production schemes often focus on specific environmental issues without considering the interconnections between industrial systems."

## Technical purpose
This process refers to the wet steaming method used in the dyeing and finishing of cotton fabric, intended for the production of printed and dyed cotton textiles. These textiles could be used for a range of applications, including clothing, home furnishings, and industrial textiles. The 'final disposal' element concerns the incineration of waste textiles, indicating that the data may also apply to waste management practices for cotton textile products.

## Reference product
- Cotton Fabric: 1000; input; estimated

## Outputs
All rows: estimated
- carbon monoxide (fossil): 0.578
- carbon dioxide (fossil): 722
- nitrous oxide: 0.123
- Chlorinated Hydrocarbon: 0.0902
- Nitrogen oxides: 0.513
- sulfur dioxide: 1.03
- hydrogen chloride: 0.225
- hydrogen sulfide: 1.75e-5
- ammonia: 8.4e-5
- chemical oxygen demand: 0.00281
- cadmium: 0.451
- lead: 0.00565
- mercury: 0.458

## Use advice
Due to uncertainty in the location of product consumption and final disposal, transportation to the final disposal site is excluded from the study. The final disposal process is based on a model from a city in China (referenced from a published source). The study assumes that energy consumption during the final disposal process is ignored due to lack of reliable data and that the proportions of sanitary landfill and incineration disposal methods are equal, each accounting for 50%. This should be considered when applying this data in Life Cycle Assessment (LCA) to ensure methodological consistency.

## Review details
Inventory: The internal review was done by several iteration steps concerning raw data validation, raw data documentation, representativity, completeness and consistency of modelling with regard to ISO 14040 and 14044.

## Data sources
- 朱亚楠. 棉布连续轧染工艺生命周期环境影响评价. (南京大学, 2012).
