# Livestock and poultry breeding ; feed processing stage ; layer scale

Dataset: ILCD process, Unit process, single operation
Geography: CN
Reference year: 2014
Classification: Unit processes / Materials production / Agricultural production means
Functional unit: 1kg eggs
Generated by: Rui Yang, 1632707028@qq.com
Owner: Tiangong LCI Data Working Group
Review: Dependent internal review by Tiangong LCI Data Working Group
Amounts: no units in this file; such an amount is in the reference unit of its flow, which a separate flow dataset defines
copyright: false
licenseType: Free of charge for all users and uses

## General comment
Livestock and poultry feed processing mainly consumes electricity and coal.

## Geography
This study was conducted from 2014 to 2015, aiming at livestock and poultry feeding cycle, meat ratio, feed formula, feed consumption, coal and electricity consumption, etc. Has been to Shandong Gaomi Zhengda pig farm, Laixi City Zhishuang dairy farm, Jimo city Duan Bolan town Jiangjiapo village pig farm, Jimo City Liujiazhuang town livestock farm, Rizhao City Changling town Guanzhuang village, Juxian County Zhailihe town Dongxing Agriculture and animal husbandry company, Juxian Qiaoshan town east Chen dairy farm, Juxian Qiaoshan town Liu Jiayi water pig farm, Zhucheng Foreign Trade Co., LTD. Phoenix parents breeding duck farm, Xinjiang Fukang Hongfa Breeding professional cooperative, Jiuyun Street Town Xuhong laying Chicken cooperative, Jiuyun Street Town Liuyun Village self-contained breeding farm, China Australia Holding Group Co., LTD., Dezhou City Qingyun County Wayu Village, Shandong Province Qingyun County four Liu community beef cattle breeding base, Dezhou City Qingyun Qingnian chicken breeding base, Qingyun County Yongli Poultry layer breeding company, Qingyun County Xingchen youth chicken breeding Field research was carried out by professional breeding cooperatives, Qingyun Dongtai broiler breeding cooperatives, Hebei Yanshan Boyuan Feed Co., LTD., Yanshan Da Chinese Feed Co., LTD., Wudi Liuhe Feed Co., LTD., and China-Australia Oriental Hope Feed Co., LTD.

## Technology and included processes
In this paper, the life cycle of livestock and poultry farming is divided into six stages: feed crop planting, feed processing, livestock and poultry raising, manure treatment, slaughter and transportation. The specific life cycle process of livestock and poultry breeding is shown in Figure 2-1. Due to the lack of some data and the limitations of basic conditions, the production, transportation and use of pesticides, mulch and feed additives have not been analyzed, and the environmental impact caused by other related infrastructure construction, transport production and labor costs is no longer considered.

## Technical purpose
The data set relates to the lifecycle stages of large-scale egg production, including livestock and poultry breeding and feed processing. The feed processing stage mainly involves the consumption of electricity and coal. This dataset is particularly relevant for the agricultural industry focused on poultry farming, feed manufacturing, and environmental impact analysis of these processes. The type of facilities evaluated includes pig and dairy farms, egg chicken breeding, and feed production plants.

## Reference product
- feed: 1.82611; calculated

## Inputs
- Electricity: 0.16435; calculated
- hard coal: 0.0219134; calculated
- maize grain: 1.33; measured
- soybean: 0.49; measured
- wheat: 0.75; measured

## Outputs
- carbon dioxide (fossil),carbon dioxide (fossil): 0.0914; measured
  Layer scale
- sulfur dioxide: 0.00159; measured
  Layer scale
- nitrogen, total (excluding N2): 0.00025; measured
  Layer scale
- carbon monoxide (fossil): 4.1e-5; measured
  Layer scale

## Use advice
When utilizing this data set for Life Cycle Assessment (LCA) purposes, users should ensure to include the energy inputs (electricity and coal) specific to the feed processing stage. The data should reflect the accurate scope of the assessed process and represent the time frame of the study (2014-2015). Users should also ensure that the data is used in the context of the Chinese livestock and poultry industries and that any extrapolation to other regions or practices is done with caution, considering the local energy mix and technological practices.

## Review details
Inventory: The internal review was done by several iteration steps concerning raw data validation, raw data documentation, representativity, completeness and consistency of modelling with regard to ISO 14040 and 14044.

## Data sources
- 周景月. 基于生命周期评价的畜禽养殖环境影响分析. (青岛科技大学, 2017).
