# Catalytic oxidation unit ; Groundwater ex-situ remediation ; Pump and treatment ; Infrastructure construction

Dataset: ILCD process, Unit process, single operation
Geography: JS-CN
Reference year: 2022
Classification: Other Services / Repair and maintenance
Generated by: Wang Ning, wang_ning@caep.org.cn
Owner: Tiangong LCI Data Working Group
Review: Dependent internal review by Tiangong LCI Data Working Group
Amounts: no units in this file; such an amount is in the reference unit of its flow, which a separate flow dataset defines
copyright: false
licenseType: Free of charge for all users and uses

## General comment
Catalytic oxidation device made of aluminium and iron

## Geography
a closed pesticide manufacturing plant located in Jiangsu Province, China.

## Technical purpose
The catalytic oxidation device is designed for groundwater ex-situ remediation as part of a pump and treatment system, used to treat contaminated water at a closed pesticide manufacturing plant in Jiangsu Province, China. The device is used to catalyze reactions to reduce pollutants in the groundwater by using aluminum and iron as its primary construction materials.

## Reference product
- Air stripping unit,Catalytic oxidation unit: 1; measured

## Inputs
- Aluminium and aluminium alloy products: 250; measured
- Steel sections: 250; measured
- transport in t*km: 50; calculated

## Use advice
When utilizing this data set, users should note that the catalytic oxidation unit is specific to ex-situ groundwater remediation and thus may not be directly applicable to in-situ treatment or other types of wastewater treatment processes. It is important to account for the geographic and technological applicability regarding the construction and operation phases. Consideration should also be given to the potential for recycling aluminum and iron after the device's useful life has ended.

## Review details
Inventory: The internal review was done by several iteration steps concerning raw data validation, raw data documentation, representativity, completeness and consistency of modelling with regard to ISO 14040 and 14044.

## Data sources
- Ding, D. et al. Assessing the environmental impacts and costs of biochar and monitored natural attenuation for groundwater heavily contaminated with volatile organic compounds. Science of The Total Environment 846, 157316 (2022).
