# Electricity production ; Electricity mix ; Sichuan

Dataset: ILCD process, Unit process, single operation
Geography: SC-CN
Reference year: 2019
Classification: Unit processes / Energy carriers and technologies / Electricity
Generated by: Ruoxi Xiong, xiongrx0126@163.com
Owner: Tiangong LCI Data Working Group
Review: Dependent internal review by Tiangong LCI Data Working Group
Amounts: no units in this file; such an amount is in the reference unit of its flow, which a separate flow dataset defines
copyright: false
licenseType: Free of charge for all users and uses

## General comment
Electricity mix includes thermal, hydro, wind, nuclear and solar generation

## Technical purpose
This data set describes the mixed electricity produced in Sichuan, conducive for various applications requiring a blend of energy sources. The electricity mix, consisting of thermal, hydro, wind, nuclear, and solar generation, is primarily used for residential, commercial, and industrial purposes.

## Reference product
- Electricity: 3.6; missing unimportant
  [{'text': '能量', 'type': 'text'}]

## Inputs
All rows: missing unimportant
- electricity for thermal power: 0.449744
  [{'text': '能量', 'type': 'text'}]
- electricity from hydroelectric power plant: 3.05893
  [{'text': '能量', 'type': 'text'}]
- electricity for nuclear power: 0
  [{'text': '能量', 'type': 'text'}]
- electricity from wind power: 0.0654948
  [{'text': '能量', 'type': 'text'}]
- electricity for solar power: 0.02583
  [{'text': '能量', 'type': 'text'}]

## Use advice
When using this LCA data set, users should consider the specific energy mix and its temporal variations within Sichuan region. It is crucial to align the data appropriately with the assessed system boundaries and to account for any potential changes in the energy mix over the time period of interest. Users should also be aware of methodological choices regarding the treatment of environmental impacts of each energy source within the mix and consider the inclusion of regional grid losses.

## Review details
Inventory: The internal review was done by several iteration steps concerning raw data validation, raw data documentation, representativity, completeness and consistency of modelling with regard to ISO 14040 and 14044.

## Data sources
- 能源统计年鉴2020
