# Remediated soil ; Soil remediation ; In Situ Thermal Remediation ; Steam enhanced extraction (SEE)

Dataset: ILCD process, Unit process, black box
Geography: DK
Reference year: 2013
Classification: Unit processes / Other Services / Repair and maintenance
Functional unit: Results are presented per unit volume (1 m3 ) of soil remediated in order to compare results for each site.
Generated by: Yang Xintong, yangxt@caep.org.cn
Owner: Tiangong LCI Data Working Group
Review: Dependent internal review by Tiangong LCI Data Working Group
Amounts: no units in this file; such an amount is in the reference unit of its flow, which a separate flow dataset defines
copyright: false
licenseType: Free of charge for all users and uses

## General comment
From Table 1 of the literature (Overview of Test Sites Used as a Basis for Data Collection), it can be seen that, the area and volume of the small site are 180 m2 and 1175 m3. Mass of contaminant is 400 kg of PCE.

## Geography
The data collection for the LCA was conducted for a smaller (180 m2) site representing typical Danish sites where remediation using ISTD has been conducted.

## Technology and included processes
SEE requires the injection of steam. for SEE a high-permeability geology at the contaminant source zone is assumed. soil is heated to around 100 °C to enhance the volatilization of the chlorinated solvents. In this study, the solvent vapors are assumed to be continuously extracted from the subsurface under vacuum and treated above ground in an activated carbon air filtration unit and, as a proportion of the extracted vapors also condense, the condensed aqueous phase is treated in a separate activated carbon water filtration unit. A vapor cap of 40 cm foam concrete is installed above the heated zone in order to prevent intrusion of rain, create a vapor-tight seal to the surface and to reduce heat loss to the atmosphere. All technologies require the installation of a number of wells to generate soil heating as well as extraction wells.

## Technical purpose
The soil remediation process described is intended for use in the decontamination of soil at small to mid-sized sites, particularly suited for high-permeability geologies. It implements In Situ Thermal Remediation (ISTD) with Steam Enhanced Extraction (SEE) to remove chlorinated solvents such as PCE (Perchloroethylene) from the soil. The remediation technology is applicable to typical Danish sites and is effective for areas with a high degree of pollution where traditional methods may not suffice.

## Reference product
- Remediated soil: 1175; measured

## Inputs
All rows: measured
- Road Transport,Road Transport: 1.5451e7
  Travel by car （personkm）
- transport in t*km: 53
  Shipping by van/small truck (day to day deliveries)
- transport in t*km: 6030
  Shipping by truck (above grade materials)
- transport in t*km: 610
  Shipping by truck (well field materials)
- Road Transport,Road Transport: 90000
- Electricity: 489600
  Power usage, treatment system
- natural gas,natural gas: 2.89085e6
  Natural gas usage (heat boiler)2740 MM BTU
- Diesel,Diesel: 3.921
  Diesel usage, total (machines)
- sand: 2105
  Sand
- Mortar: 5775
  High temp grout
- Concrete: 41600
  Vapor Cap concrete
- Activated Carbon: 2646
  Vapor granular activated carbon
- Activated Carbon: 405
  Liquid granular activated carbon
- Carbon Steel: 5842
  Carbon steel
- Stainless Steel: 857
  Stainless steel 304
- Copper and copper alloys: 33
  Cobber
- Fiber glass: 45
  Fiberglass
- Polyethylene,Polyethylene: 835
  PE
- contaminated soil: 1175

## Use advice
When utilizing this dataset for Life Cycle Assessment (LCA), users should account for all inputs and outputs specific to the outlined remediation process, including energy and material consumption, equipment use during construction and transportation activities, and treatment of by-products like condensed water and air emissions. It is important to include these factors in the assessment to ensure an accurate understanding of the environmental impacts associated with the use of SEE in soil remediation. Users should apply this data on a per cubic meter (1 m3) basis of soil treated to accurately compare impacts across different sites and remediation scenarios.

## Review details
Inventory: The internal review was done by several iteration steps concerning raw data validation, raw data documentation, representativity, completeness and consistency of modelling with regard to ISO 14040 and 14044.

## Data sources
- Lemming G ,Nielsen G S ,Weber K , et al. Optimizing the Environmental Performance of In Situ Thermal Remediation Technologies Using Life Cycle Assessment [J]. Groundwater Monitoring & Remediation, 2013, 33 (3): 38-51.
