# Polypropylene (PP) Production ; Coal to Polypropylene ; GLLMTP

Dataset: ILCD process, Unit process, black box
Geography: CN
Reference year: 2005
Classification: Unit processes / Materials production / Plastics
Generated by: Huijuan Guo, GHJ@email.ncu.edu.cn
Owner: Tiangong LCI Data Working Group
Review: Dependent internal review by Tiangong LCI Data Working Group
Amounts: no units in this file; such an amount is in the reference unit of its flow, which a separate flow dataset defines
copyright: false
licenseType: Free of charge for all users and uses

## General comment
There are many technical combinations of coal to polypropylene: according to the feeding method, it can be divided into two categories: wet feed gasification and dry feed gasification. The typical representatives of wet feed gasification are GE and multi nozzle coal water slurry gasification processes, while the typical representatives of dry feed gasification are She11, GSP, HT-L (aerospace powder coal pressurized gasification) processes, etc; The methanol synthesis process can be divided into high-pressure method, medium pressure method, and low-pressure method according to the different synthesis pressures; The methanol to polypropylene process can be divided into MTO process and MTP process based on the different main products. Different process combinations can bring different environmental impacts. The HDDMTO process mainly produces polyethylene and polypropylene, with by-products such as C4+and methyl tert butyl ether (MTBE)

## Geography
根据中国煤制烯烃产业现 状

## Time period
煤电化循环经济产业园煤制180万t/a甲醇及转化烯烃项目：可行性研究报告[R]．2005

## Technical purpose
The Coal to Polypropylene (PP) GLLMTP process is designed for industrial production of polypropylene. This process involves a combination of wet and dry feed gasification technologies, such as GE and multi-nozzle coal water slurry gasification for wet feed, and Shell, GSP, and HT-L for dry feed gasification. Methanol synthesis is performed using high-pressure, medium-pressure, or low-pressure methods, ultimately yielding polypropylene through MTO (Methanol-to-Olefins) or MTP (Methanol-to-Propylene) processes. The polypropylene produced is suitable for a wide range of applications, including plastics manufacturing for automotive parts, packaging materials, textiles, and consumer goods. By-products like gasoline and liquefied petroleum gas are also produced.

## Reference product
- polypropylene granulate (PP): 1000; missing unimportant

## Inputs
All rows: missing unimportant
- hard coal; 26.3 MJ/kg: 3800
  Raw coal(0.79kgce/kg)
- sodium hydroxide: 0.808
  Caustic soda
- Limestone: 21.8
- Water: 21400
- chlorine: 1.61
  Liquid chlorine
- hydrogen chloride: 1.46
  hydrochloric acid
- hard coal: 3500
  Thermal coal(0.73kgce/kg)
- Catalyst: 0.707

## Outputs
All rows: missing unimportant
- sulfur: 14.1
- gasoline (regular): 274
- LPG - liquefied petroleum gas: 131
- carbon dioxide (fossil): 10334
  原文未区分bio和fossil，根据专家判断此处为fossil
- methane (fossil): 0.09484
  原文未区分bio和fossil，根据专家判断此处为fossil
- nitrous oxide: 0.10221
- sulfur dioxide: 9.63666
- Nitrogen oxides: 18.8783
- particles (PM2.5): 2.46444
- Volatile Organic Compounds (VOCs): 0.23988
  VOC

## Data selection and combination
聚丙烯产品生命周期清单数据包括前景数据与背景数据。产品生产活动水平数据即为前景数据，通过查阅煤制烯烃企业生产数据。背景数 据为输入原料、材料或 能源的消耗以及污染物 排放数据 。本研究中的煤炭开采阶段生命周 期清单数据从北京工业大学数据库中提取，洗选 质量损失以全国平均值计算，质量损失为15%，原料煤需要经过洗选过程，燃料煤不需要经过洗选过程。

## Data treatment and extrapolations
本研究分配方式采用碳分 配，产品含碳量越高，分 配系数越大。

## Use advice
The Life Cycle Inventory (LCI) data for Coal to Polypropylene includes both foreground and background data. Users should refer to production data from coal-to-olefin enterprises to obtain foreground data, while background data involves consumption of raw materials, materials, energy, and pollutant emissions. The LCI of the coal extraction phase is derived from the Beijing University of Technology database, accounting for a national average loss rate of 15% during the washing and selection process; washing is necessary for raw coal but not for fuel coal. This study applies carbon allocation, where products with higher carbon content have greater allocation coefficients. The functional unit is defined as 1 tonne of coal-based polypropylene product. The study adopts a 'cradle-to-gate' scope, including nine stages (coal mining and washing, coal transportation, auxiliary materials supply, electricity supply, coal gasification, low-temperature methanol washing, methanol production, polyolefin production, and utilities) and excludes infrastructure construction, product packaging, transportation, use, and disposal processes.

## Review details
Inventory: The internal review was done by several iteration steps concerning raw data validation, raw data documentation, representativity, completeness and consistency of modelling with regard to ISO 14040 and 14044.

## Data sources
- 李泉鑫, 李俊杰, 龚先政 & 田亚峻. 两条不同技术路线的煤制聚丙烯生命周期评价. 煤炭转化 1–9 (2022) doi:
