# Wet steaming cotton dyeing and finishing processing ; printing and dyeing cotton ; sewage treatment

Dataset: ILCD process, Unit process, single operation
Geography: SZ-JS-CN
Reference year: 2012
Classification: Unit processes / Materials production / Organic chemicals
Generated by: Yingfan Duan, 1300925579@qq.com
Owner: Tiangong LCI Data Working Group
Review: Dependent internal review by Tiangong LCI Data Working Group
Amounts: no units in this file; such an amount is in the reference unit of its flow, which a separate flow dataset defines
copyright: false
licenseType: Free of charge for all users and uses

## General comment
"In the dyeing and finishing process, wastewater often contains organic and inorganic pollutants such as dyes, auxiliaries, and more. Therefore, treating this wastewater is a crucial environmental measure. Wastewater treatment involves a series of physical, chemical, and biological methods to remove or reduce harmful substances in the wastewater, ensuring that the treated water meets environmental standards and can be safely discharged or recycled."

## Geography
The study focuses on a printing and dyeing enterprise in Jiangsu Province, located in Changshu within the Yangtze River Delta Economic Zone.

## Technical purpose
The wet steaming method for dyeing and finishing cotton fabric is typically used in the textile industry for coloring and treating cotton materials to achieve desired textile properties. This process is applied to cotton fabrics requiring coloration and finishing treatments to meet specific quality standards for use in clothing, beddings, and decorative items. The specialty of this industrial process lies in its ability to produce textiles with vibrant colors and specific finishes, enhancing the fabric's appeal, durability, and texture.

## Reference product
- freshwater: 20.7; input; measured

## Inputs
- Electricity: 1330; measured
- Crude coal: 1560; calculated
- Cleaned coal: 3860; calculated
- Fuel Oil: 33.3; calculated
- heavy fuel oil: 10; calculated
- Diesel oil: 45.8; calculated
- Coke Oven Gas: 61.1; calculated
- natural gas: 0.782; calculated

## Outputs
All rows: calculated
- carbon dioxide (fossil): 420
- carbon monoxide (fossil): 1.02
- sulfur dioxide: 0.38
- Nitrogen oxides: 1.92
- particles (> PM10): 3.51
- chemical oxygen demand: -212
- Suspended solids, unspecified,Suspended solids, unspecified: -13.7
- lead: 3.41e-5
- mercury: 7.16e-7
- fluorine: 6.44e-6
- cadmium: 1.26e-6
- arsenic: 2.92e-5

## Use advice
Users of this data set should include considerations for environmental impacts associated with wastewater treatment from the dyeing and finishing process. It's crucial to account for the treatment of wastewater emissions to accurately assess the overall environmental performance of the wet steaming cotton dyeing and finishing process. Furthermore, when modeling the use phase of the cotton fabric, considerations should be made regarding the potential for fabric recycling or downcycling as part of the life cycle assessment. This data is context-specific and primarily relevant to textile enterprises operating in economically developed regions like the Yangtze River Delta, hence should be used with due consideration of geographical and technological variability.

## Review details
Inventory: The internal review was done by several iteration steps concerning raw data validation, raw data documentation, representativity, completeness and consistency of modelling with regard to ISO 14040 and 14044.

## Data sources
- 朱亚楠. 棉布连续轧染工艺生命周期环境影响评价. (南京大学, 2012).
