# Northwest (Ganzhou, Zhangye) Corn Production ; Agricultural Data Production

Dataset: ILCD process, Unit process, single operation
Geography: ZY-GS-CN
Reference year: 2012
Valid until: 2012
Classification: Unit processes / Materials production / Agricultural production means
Functional unit: 1 t
LCI method principle: Attributional
LCI method approaches: Consequential
Generated by: Haoran Zhang, hrzhang@whu.edu.cn
Owner: Tiangong LCI Data Working Group
Review: Dependent internal review by Tiangong LCI Data Working Group
Amounts: no units in this file; such an amount is in the reference unit of its flow, which a separate flow dataset defines
copyright: false
licenseType: Free of charge for all users and uses

## General comment
The article is based on research data collected from farmers, using the theory of agricultural carbon footprint and life cycle assessment to quantitatively study the carbon footprint and its composition of the rice-wheat rotation system in the downstream area of the Yangtze River. It further analyzes the factors influencing the carbon footprint.

## Geography
Ganzhou District

## Technology and included processes
LCA method is used to evaluate the agricultural system of seed corn production, which takes the whole process of product treatment from input to final output as the research object to conduct quantitative analysis and comparison, so as to evaluate the environmental impact of seed corn production [13]. In this paper, the mass of seed corn 1 t is used as the functional unit. The boundary of the system starts from the production of fertilizer and electricity, and ends from the output of agricultural products and pollutants in the crop planting process. In other words, there are two production systems, namely the agricultural material production system and the crop production system

## Technical purpose
This dataset pertains to the production of corn in the Northwest (Ganzhou, Zhangye) region, focusing on agricultural inputs. The information can be used to assess the agricultural carbon footprint, as well as environmental impacts of the corn production process, particularly within systems where rice-wheat rotation is practiced. It is pertinent for agricultural researchers, policymakers, and environmental scientists interested in analyzing carbon footprints and optimizing sustainable agricultural practices in similar agroecosystems.

## Reference product
- maize grain: 1000; measured

## Inputs
- Labor: 0.43; measured
  people
- Production Expenditure: 1950.3; calculated
  Yuan
- Electricity: 403.2; measured
  用于抽水

## Deviations from the LCI method approaches
The system boundary starts with the production of chemical fertilizers and electricity, and the terminal boundary is the output of agricultural products and pollutants during the crop planting process. There are two production systems: the agricultural input production system and the crop production system.

## Data selection and combination
The data in this text comes from the statistical sampling survey of Zhangye city, and additional data obtained from a special survey conducted during the 2012 input-output table. In Ganzhou district, Jiantan town, Dangzhai village, and Xiaoman village were selected; in Linze county, Shahe town and Pingchuan town were selected; in Gaotai county, Xuanhua town, Xiangdao village, and Luotuo city township were chosen. After excluding incomplete data, a total of 72 household's effective data was obtained

## Data treatment and extrapolations
Using a combination of stratified random sampling and typical sample selection methods, data were collected through questionnaire surveys and structured interviews with typical samples. The survey content revolves around all input production elements and economic costs, as well as resource consumption, etc. The output mainly focuses on product yield and the current economic value, as well as the quantity of waste generated and its disposal methods.

## Sampling procedure
It is determined that the survey sample size in the three counties and districts of Zhangye city needs to add 80 household surveys. The composition of the samples maintains the principle of being consistent with the local agricultural added value ratio. The corresponding survey household numbers are determined according to the agricultural added value ratio of 7:5:8, that is, 28, 20, and 32 households are respectively drawn from the three counties and districts.

## Use advice
When using this data set, it is important to ensure that the LCA is specific to the conditions and practices of the Northwest Ganzhou (Zhangye) region, including the reliance on chemical fertilizers and electricity in the agricultural input production system. Users must consider the geographical and technological specificity of the data. It is also important to maintain consistency with local agricultural added value ratios when extrapolating data. Users should account for all input production factors and economic costs, along with resource consumption and waste generated, in their life cycle inventory analyses. The output should include both agricultural products and emissions. Analyzing the carbon footprint should involve the entire lifecycle from input production to crop harvest.

## Review details
Inventory: The internal review was done by several iteration steps concerning raw data validation, raw data documentation, representativity, completeness and consistency of modelling with regard to ISO 14040 and 14044.

## Data sources
- 杨肖,钟方雷,郭爱君,王琼.干旱区绿洲制种玉米生命周期环境影响评价——以张掖市为例[J].农业环境科学学报,2017,36(8):1664-1671
