# Steam reforming of bio-oil

Dataset: ILCD process, Unit process, single operation
Geography: CN
Reference year: 2021
Classification: Unit processes / Energy carriers and technologies / Heat and steam
Functional unit: 29 kg H2 (hydrogen as an intermediate product)
LCI method principle: Attributional
Generated by: Jinlu Gan, jinlu.gan1998@gmail.com
Owner: Tiangong LCI Data Working Group
Review: Dependent internal review by Tiangong LCI Data Working Group
Amounts: no units in this file; such an amount is in the reference unit of its flow, which a separate flow dataset defines
copyright: false
licenseType: Free of charge for all users and uses

## General comment
all the aqueous phase corresponding to 63.42% of the bio-oil was used for steam reforming to produce 29.0 kg h−1 hydrogen. After using the requirement of 5.8 kg h−1 for hydrotreatment of bio-oil, the remaining 23.2 kg h−1 was considered as a co-product.

## Time period
the publication date of the article

## Technical purpose
The bio-oil steam reforming process is used for the production of hydrogen as an intermediary energy carrier. The hydrogen produced is used primarily for the hydrotreatment of bio-oil, supporting processes in the sustainable energy sector. The remaining output is considered a co-product and can be utilized in various other chemical synthesis processes or as an alternative energy source.

## Reference product
- Hydrogen: 29

## Inputs
- biomass; 14.7 MJ/kg: 1000
  Wheat straw; or 14335 MJ
- Electricity: 1758.24
- water: 225.9

## Use advice
When integrating this dataset into a Life Cycle Assessment, it is important to allocate the energy and material inputs in the steam reforming process proportionally between the main hydrogen product and the co-product. Consider the technological applicability of this process for hydrogen production and account for any potential changes in efficiency should the technology scale or operating conditions vary. For the use phase, the behavior of the hydrogen in downstream applications must be modeled accurately to reflect its environmental impact.

## Review details
Inventory: The internal review was done by several iteration steps concerning raw data validation, raw data documentation, representativity, completeness and consistency of modelling with regard to ISO 14040 and 14044.

## Data sources
- Zheng, X., Zhong, Z., Zhang, B., Du, H., Wang, W., & Li, Q. (2022). Environmental impact comparison of wheat straw fast pyrolysis systems with different hydrogen production processes based on life cycle assessment. Waste Management & Research: The Journal for a Sustainable Circular Economy, 40(6), 654–664.
