# Electricity production ; Electricity mix ; Tianjin

Dataset: ILCD process, Unit process, single operation
Geography: TJ-CN
Reference year: 2019
Classification: Unit processes / Energy carriers and technologies / Electricity
Generated by: Ruoxi Xiong, xiongrx0126@163.com
Owner: Tiangong LCI Data Working Group
Review: Dependent internal review by Tiangong LCI Data Working Group
Amounts: no units in this file; such an amount is in the reference unit of its flow, which a separate flow dataset defines
copyright: false
licenseType: Free of charge for all users and uses

## General comment
Electricity mix includes thermal, hydro, wind, nuclear and solar generation

## Technical purpose
This electricity mix is intended for general use within the Tianjin region, including but not limited to residential, commercial, and industrial applications. The mix comprises a blend of power sources, such as thermal, hydro, wind, nuclear, and solar power generation, providing a stable electricity supply for various types of consumption.

## Reference product
- Electricity: 3.6; missing unimportant
  [{'text': '能量', 'type': 'text'}]

## Inputs
All rows: missing unimportant
- electricity for thermal power: 3.47209
  [{'text': '能量', 'type': 'text'}]
- electricity from hydroelectric power plant: 0.0005868
  [{'text': '能量', 'type': 'text'}]
- electricity for nuclear power: 0
  [{'text': '能量', 'type': 'text'}]
- electricity from wind power: 0.0538668
  [{'text': '能量', 'type': 'text'}]
- electricity for solar power: 0.0734544
  [{'text': '能量', 'type': 'text'}]

## Use advice
Users employing this data set should consider the proportionate contribution of each electricity generation source in their life cycle assessments and adapt their models accordingly. It is important to note that the environmental impacts associated with each power generation technology may vary significantly, and these should be factored in when conducting an LCA. Additionally, any changes in the energy mix over time or technological updates in the Tianjin area should be monitored, as they may affect the relevance and accuracy of the assessment.

## Review details
Inventory: The internal review was done by several iteration steps concerning raw data validation, raw data documentation, representativity, completeness and consistency of modelling with regard to ISO 14040 and 14044.

## Data sources
- 能源统计年鉴2020
