# Electricity production ; Electricity mix ; Shanxi

Dataset: ILCD process, Unit process, single operation
Geography: SX-CN
Reference year: 2019
Classification: Unit processes / Energy carriers and technologies / Electricity
Generated by: Ruoxi Xiong, xiongrx0126@163.com
Owner: Tiangong LCI Data Working Group
Review: Dependent internal review by Tiangong LCI Data Working Group
Amounts: no units in this file; such an amount is in the reference unit of its flow, which a separate flow dataset defines
copyright: false
licenseType: Free of charge for all users and uses

## General comment
Electricity mix includes thermal, hydro, wind, nuclear and solar generation

## Technical purpose
The Shanxi electricity mix is utilized for various applications including residential, commercial, and industrial energy demands. It supports a wide range of electrical infrastructure such as lighting, heating, cooling, and operating machinery. The mix of power sources ensures a steady and diversified supply of electricity.

## Reference product
- Electricity: 3.6; missing unimportant
  [{'text': '能量', 'type': 'text'}]

## Inputs
All rows: missing unimportant
- electricity for thermal power: 3.16669
  [{'text': '能量', 'type': 'text'}]
- electricity from hydroelectric power plant: 0.0529488
  [{'text': '能量', 'type': 'text'}]
- electricity for nuclear power: 0
  [{'text': '能量', 'type': 'text'}]
- electricity from wind power: 0.242053
  [{'text': '能量', 'type': 'text'}]
- electricity for solar power: 0.138316
  [{'text': '能量', 'type': 'text'}]

## Use advice
When using this dataset, consider the proportion of each power generation type in the Shanxi electricity mix. Special attention should be given to the allocation of environmental impacts among the different electricity sources. Assumptions regarding grid losses and the average efficiency of transmission should be taken into account. Future changes in the electricity mix due to policy or technological advancements should also be considered for long-term assessments.

## Review details
Inventory: The internal review was done by several iteration steps concerning raw data validation, raw data documentation, representativity, completeness and consistency of modelling with regard to ISO 14040 and 14044.

## Data sources
- 能源统计年鉴2020
