# Sediment Remediation;In-situ Remediation;Activated Carbon Remediation;Pre-Phase;Water

Dataset: ILCD process, Unit process, single operation
Geography: US
Reference year: 2015
Classification: Other Services / Repair and maintenance
Generated by: Wang Ning, wang_ning@caep.org.cn
Owner: Tiangong LCI Data Working Group
Review: Dependent internal review by Tiangong LCI Data Working Group
Amounts: no units in this file; such an amount is in the reference unit of its flow, which a separate flow dataset defines
copyright: false
licenseType: Free of charge for all users and uses

## General comment
Preliminary preparations for in-situ activated carbon remediation of bottom mud: water dredging

## Technology and included processes
Dredging of water bodies using electrically powered pumps

## Technical purpose
This process data set describes the pre-phase preparations for in-situ activated carbon remediation, specifically tailored for treating bottom mud through water dredging. It is a critical preparatory step in environmental engineering used to enhance the quality of sediment by adsorbing contaminants from the sediment-water interface. This remediation technique is applied typically in contaminated water bodies such as lakes, rivers, and marine environments to mitigate pollution effects and improve ecological conditions.

## Reference product
- Electricity: 22.32; input; estimated
  使用电力疏浚水体

## Outputs
- Water (river water from technosphere, cooling water): 2200; estimated
  疏浚水体的体积

## Use advice
Users of this data set should consider the following methodological advice: Ensure the compatibility of data with the specific sediment contaminants present in the application site, as the effectiveness of activated carbon may vary based on contaminant type. Account for local environmental regulations and guidelines during application to ascertain the proper handling and implementation of the remediation process. Be aware that the data represents preliminary preparations and does not cover the full scope of remediation works necessary for the entire process of in-situ activated carbon treatment.

## Review details
Inventory: The internal review was done by several iteration steps concerning raw data validation, raw data documentation, representativity, completeness and consistency of modelling with regard to ISO 14040 and 14044.
