# Egg production ; feed raw material production

Dataset: ILCD process, Unit process, single operation
Geography: HLJ-CN
Reference year: 2009
Classification: Unit processes / Materials production / Agricultural production means
Functional unit: The main output product of laying hens is eggs, so the functional unit defined in this study is "1kg egg".
Generated by: Rui Yang, 1632707028@qq.com
Owner: Tiangong LCI Data Working Group
Review: Dependent internal review by Tiangong LCI Data Working Group
Amounts: no units in this file; such an amount is in the reference unit of its flow, which a separate flow dataset defines
copyright: false
licenseType: Free of charge for all users and uses

## General comment
The lexical ingredients of laying hens are composed of corn, soyabeans, bran, stone powder, etc. According to the actual situation in Heilongjiang Province, corn accounts for 60%~66% of the lexical ingredients and soyabeans account for 20%~26% of the lexical ingredients. Due to the lack of relevant data on the production of bran and stone powder, only corn and soyabeans are considered in the composition of lexical ingredients in this paper. The production stage of word materials mainly includes the production stage of fertilizer, the planting stage of corn and soybean and the production stage of soybean meal.

## Geography
Life cycle evaluation of intensive egg farm in Heilongjiang Province

## Time period
The average single yield of maize and soybean in Heilongjiang Province in 2009 is from the Chinese Agricultural Yearbook.

## Technology and included processes
Quantitative method was used in this study. This evaluation includes a re-examination or revision of the objectives and scope of the research to determine how the objectives of the research can be met. According to the actual situation of layer production, the technical framework of life cycle impact assessment (FIG. Impact assessment includes four steps: classification, characterization, standardization and weighted assessment. (1) Classification: The input and output data in the life cycle inventory analysis were classified into different types of environmental impact. Based on the analysis results of the life cycle inventory of laying hens, the following four types of environmental impact were evaluated: global warming, environmental acidification, eutrophication and photochemical ozone synthesis. (2) Characterization: Quantitative inventory analysis of data to determine the degree of impact of four types of environmental impact. This makes the amount of environmental pollution that would otherwise not be comparable comparable. (3) Standardization: First of all, standardization benchmarks should be established to provide comparable standards for the relative sizes of the four environmental impact types of global warming, environmental acidification, eutrophication, and photochemical ozone synthesis. (4) Weighted assessment: is the process of grouping environmental impact into a unified indicator - environmental load size, so as to directly compare different production systems.

## Technical purpose
The industrial process of egg production utilizes feed composed primarily of corn and soybeans. The feed mix is based on agricultural practices in Heilongjiang Province, where corn makes up 60% to 66% and soybeans 20% to 26% of the feed composition. This process is integral to the operation of intensive egg farms in the region, which are the primary source of eggs. The feedstock is produced through various stages including fertilizer production, cultivation of corn and soybean crops, and the production of soybean meal.

## Reference product
- egg: 1; estimated
  作为参考定量，非实际输出

## Inputs
- hard coal: 0.00903058; calculated

## Outputs
All rows: measured
- carbon monoxide (fossil): 1.0437e-5
- nitrogen, total (excluding N2): 0.000283551
- sulfur oxides: 0.000102912
- carbon dioxide (fossil),carbon dioxide (fossil): 0.0767573
- sulfur dioxide: 0.000383436
- maize grain: 1.721
- soybean: 0.764

## Data selection and combination
本研究中玉米和大豆的种植期间化肥投入的相关数据取自高强等王伟等的资料， 基 本能代表目前黑龙江省玉米、大豆生产的实际情况。

## Use advice
Data users should focus on the provided composition of feed when accounting for the environmental impacts of egg production. It should be noted that only corn and soybeans are considered in this dataset, due to the lack of data on other components such as bran and stone powder. The influence of fertilizer application during the growth of corn and soybean, as specifically practiced in Heilongjiang Province, should be included in the assessment. When assessing the environmental impact per functional unit, '1kg of eggs' should be used as the reference output. The data regarding crop yields and fertilizer usage is based on the situation in the year 2009 and sourced from the Chinese Agricultural Yearbook and relevant studies.

## Review details
Inventory: The internal review was done by several iteration steps concerning raw data validation, raw data documentation, representativity, completeness and consistency of modelling with regard to ISO 14040 and 14044.

## Data sources
- 高雪. 黑龙江省集约化蛋鸡场的生命周期评价. (东北农业大学, 2012).
