# In-situ leaching, RE carbonate precipitation and calcination of Rare Earth Oxides (REO) ;Rare Earth Oxides (REO) IAC route;Rare Earth Elements (REE) containing ore

Dataset: ILCD process, Unit process, single operation
Geography: CN
Reference year: 2007
Valid until: 2020
Classification: Unit processes / Materials production / Inorganic chemicals
Functional unit: The study considered 15 different functional units corresponding to different RE metals. The assessment included three main RE production sites in China: REO production in Bayan Obo, Sichuan, and IACs. Primary data were collected for foreground production processes from Chinese and further international scientific literature, industry reports, government and industry surveys. The authors assumed a baseline for aqueous and gaseous emissions using national discharge standards for industry from the Chinese Ministry of
LCI method principle: Attributional
LCI method approaches: Allocation
Generated by: Tao Wang, twang@iue.ac.cn
Owner: Tiangong LCI Data Working Group
Review: Dependent internal review by Tiangong LCI Data Working Group
Amounts: no units in this file; such an amount is in the reference unit of its flow, which a separate flow dataset defines
copyright: false
licenseType: Free of charge for all users and uses

## General comment
This data set represents the process of rare earth oxide (REO) production via the IAC (in-situ leaching, RE carbonate precipitation, and calcination) route in Bayan Obo, located in the Southern Provinces of China. The REO obtained from this process is used predominantly in the manufacturing of magnets, catalysts, glass additives, and various other high-tech and clean energy applications where specific rare earth elements are required.

## Geography
Bayan Obo, Chinese Southern Provinces

## Technology and included processes
Because no primary mining data from Bayan Obo were available, LCI data in the studies (Sprecher, Arshi, Marx, Bailey (Classen et al., 2007)) are based on different data sources either from iron mining or in Althaus from phosphate rock mining. Main inputs are energy and blasting agent

## Reference product
- Rare Earth Oxides: 1; calculated

## Inputs
- Ammonium sulfate: 20.07; calculated
- Ammonium bicarbonate: 4.29; calculated
- sulphuric acid: 0.86; calculated
- Electricity: 17.856; calculated

## Deviations from the LCI method approaches
Goal of this chapter is to identify the most important differences and uncertainties of crucial parameters in the LCIs and to link those directly to the affected LCIAs. However, comparability of LCIA results shown in Fig. 4 is limited due to different LCIA methods, as already mentioned in the chapter “methods”. All LCIA results are shown in Tables S1 and S3 (Supplementary material). It should also be mentioned that we calculated Althaus' LCIA data, as he provided only the LCI in the ecoinvent database. For this, we rebuilt Althaus' original process “rare earth oxide production from bastnasite” in the GaBi software and evaluated it with two LCIA methods for comparison (Table S1).

## Use advice
Users of this LCA data set should take into consideration the adoption of secondary data sources due to the absence of primary mining data from Bayan Obo. The main inputs, such as energy and blasting agents, are derived from iron or phosphate rock mining data. For accurate assessment, users should critically evaluate the differences and uncertainties in crucial parameters of the LCIs. Additionally, when comparing LCIA results, it is important to acknowledge the limitations due to different LCIA methods used across studies as highlighted in Figure 4 and Tables S1 and S3 of the supplementary material. It is advised to use consistent LCIA methods for meaningful comparison. Data users should also consider the baseline assumptions for aqueous and gaseous emissions in line with the Chinese Ministry of Environmental Protection's national industry discharge standards when applying this dataset.

## Review details
Inventory: The internal review was done by several iteration steps concerning raw data validation, raw data documentation, representativity, completeness and consistency of modelling with regard to ISO 14040 and 14044.

## Data sources
- Schreiber, A., Marx, J. & Zapp, P. Life Cycle Assessment studies of rare earths production - Findings from a systematic review. Science of The Total Environment 791, 148257 (2021).
