# Large-scale dairy cow rearing ; livestock and poultry rearing stage

Dataset: ILCD process, Unit process, single operation
Geography: SD-CN
Reference year: 2014
Classification: Unit processes / Materials production / Agricultural production means
Functional unit: 1kg milk
Generated by: Rui Yang, 1632707028@qq.com
Owner: Tiangong LCI Data Working Group
Review: Dependent internal review by Tiangong LCI Data Working Group
Amounts: no units in this file; such an amount is in the reference unit of its flow, which a separate flow dataset defines
copyright: false
licenseType: Free of charge for all users and uses

## General comment
The pollutant emission of livestock and poultry in the raising stage mainly comes from the pollutant emission of livestock and poultry gastrointestinal fermentation, and the pollutant emission generated by the energy consumption of livestock and poultry heating, lighting and equipment operation. Because of the different physiological structure of birds, the amount of CH4 produced in intestinal fermentation is very small, so it is ignored

## Geography
This study was conducted from 2014 to 2015, aiming at livestock and poultry feeding cycle, meat ratio, feed formula, feed consumption, coal and electricity consumption, etc. Has been to Shandong Gaomi Zhengda pig farm, Laixi City Zhishuang dairy farm, Jimo city Duan Bolan town Jiangjiapo village pig farm, Jimo City Liujiazhuang town livestock farm, Rizhao City Changling town Guanzhuang village, Juxian County Zhailihe town Dongxing Agriculture and animal husbandry company, Juxian Qiaoshan town east Chen dairy farm, Juxian Qiaoshan town Liu Jiayi water pig farm, Zhucheng Foreign Trade Co., LTD. Phoenix parents breeding duck farm, Xinjiang Fukang Hongfa Breeding professional cooperative, Jiuyun Street Town Xuhong laying Chicken cooperative, Jiuyun Street Town Liuyun Village self-contained breeding farm, China Australia Holding Group Co., LTD., Dezhou City Qingyun County Wayu Village, Shandong Province Qingyun County four Liu community beef cattle breeding base, Dezhou City Qingyun Qingnian chicken breeding base, Qingyun County Yongli Poultry layer breeding company, Qingyun County Xingchen youth chicken breeding Field research was carried out by professional breeding cooperatives, Qingyun Dongtai broiler breeding cooperatives, Hebei Yanshan Boyuan Feed Co., LTD., Yanshan Da Chinese Feed Co., LTD., Wudi Liuhe Feed Co., LTD., and China-Australia Oriental Hope Feed Co., LTD.

## Technology and included processes
In this paper, the life cycle of livestock and poultry farming is divided into six stages: feed crop planting, feed processing, livestock and poultry raising, manure treatment, slaughter and transportation. The specific life cycle process of livestock and poultry breeding is shown in Figure 2-1. Due to the lack of some data and the limitations of basic conditions, the production, transportation and use of pesticides, mulch and feed additives have not been analyzed, and the environmental impact caused by other related infrastructure construction, transport production and labor costs is no longer considered.

## Technical purpose
The dataset represents the use phase of dairy cows in large-scale rearing facilities, which are used for producing milk for human consumption. The included data may also be relevant for environmental impact studies concerning livestock operations and animal feeding processes.

## Reference product
- milk: 1; measured

## Inputs
All rows: measured
- maize grain: 2.05
- soybean: 0.16
- wheat: 0.57
- Electricity: 0.2412
- hard coal: 0.011

## Outputs
All rows: measured
- methane (biogenic): 2.7e-5
  dairy cow scale
- carbon dioxide (biogenic): 0.09336
  dairy cow scale
- sulfur dioxide: 0.00196
  dairy cow scale
- nitrogen, total (excluding N2): 0.00028
  dairy cow scale
- carbon monoxide (fossil): 2e-5
  dairy cow scale

## Data selection and combination
直接数据：畜禽饲养阶段数据皆来自实地调研，通过现场收集及企业可公开 数据获得。背景数据：化肥、电力、燃煤等数据来自相关统计年鉴及国家统计局、农业 部网站的公开数据。

## Use advice
Data users should take into account that the dataset encompasses direct data from field surveys and publicly available data from enterprises, whereas the background data such as for fertilizers, electricity, and coal consumption comes from statistical yearbooks and public data from the National Bureau of Statistics and the Ministry of Agriculture website. For the accurate assessment of environmental impacts, it is advisable to use this dataset in conjunction with updated local data, considering technological advancements and changes in rearing practices since the time of data collection (2014-2015). The negligible CH4 emissions from poultry as per the physiological differences in gastrointestinal fermentation should be considered when applying the data.

## Review details
Inventory: The internal review was done by several iteration steps concerning raw data validation, raw data documentation, representativity, completeness and consistency of modelling with regard to ISO 14040 and 14044.

## Data sources
- 周景月. 基于生命周期评价的畜禽养殖环境影响分析. (青岛科技大学, 2017).
