# Sediment remediation ; ex-situ remediation ; ex-situ thermal analysis ; engineering implementation ; sediment pyrolysis

Dataset: ILCD process, Unit process, single operation
Geography: CN
Classification: Other Services / Repair and maintenance
Generated by: Wang Feng, wangfeng@caep.org.cn
Owner: Tiangong LCI Data Working Group
Review: Dependent internal review by Tiangong LCI Data Working Group
Amounts: no units in this file; such an amount is in the reference unit of its flow, which a separate flow dataset defines
copyright: false
licenseType: Free of charge for all users and uses

## General comment
Taking the treatment of 1 t of sediment as a functional unit, the rated power of the tube furnace in the pyrolysis section was 4 kW, the no-load power was 1.4 kW, N2 was passed for 2~3 minutes before the reaction to ensure the anaerobic environment, and the final temperature of the pyrolysis was selected to be 350℃.

## Technology and included processes
The tube furnace has a rated power of 4 kW and a no-load power of 1.4 kW. N2 is introduced for 2-3 minutes before the reaction to ensure an anaerobic environment. The final pyrolysis temperature is selected as 350 °C.

## Technical purpose
The described industrial process involves ex-situ thermal treatment of sediment, specifically, pyrolysis for remediating 1 tonne of sludge as a functional unit. This process is operationalized in a project setting where the transportation phase utilizes a 5-tonne truck over a distance of 2 km. The drying phase employs a hollow blade dryer with a power rating of 55 kW, with the entire drying system handling a capacity of 50 tonnes/day on a 24-hour operational schedule. The pyrolysis phase utilises a tubular furnace with a rated power of 4 kW and an idling power of 1.4 kW. Before the reaction, nitrogen is fed for 2-3 minutes to ensure an oxygen-free environment. The end temperature for pyrolysis is set at 350°C. The gases produced in pyrolysis are first passed through a cooling unit, with the condensation collection predominantly consisting of bio-oil, which has a high calorific value and can be recuperated for reuse.

## Reference product
- Remediated Sediment: 1000; calculated

## Inputs
- Electricity: 1080; calculated
- nitrogen: 5.63; calculated

## Use advice
For Life Cycle Assessment (LCA) practitioners using this data set, it is crucial to consider the specificities of the transportation phase, drying system, and pyrolysis equipment detailed in this data. Ensure accurate modeling of the transportation distance, energy consumption of the drying phase, and the operational characteristics of the pyrolysis phase. Nitrogen input and the absence of oxygen during the thermal treatment must also be reflected in the environmental impact assessment. When calculating the potential energy recovery, the calorific value of the bio-oil produced should be incorporated. For cases where methodological consistency is needed, adhere to the assumptions and parameters outlined within the scope of this data set, and beware of boundary conditions when integrating with other data sets.

## Review details
Inventory: The internal review was done by several iteration steps concerning raw data validation, raw data documentation, representativity, completeness and consistency of modelling with regard to ISO 14040 and 14044.

## Data sources
- 王久兵.污泥热解反应机制及其能源化工艺的全生命周期评价研究[D].浙江工业大学,2016.
