# clinker production;clinker;traditional rotary kiln;phosphogypsum

Dataset: ILCD process, Unit process, black box
Geography: SD-CN
Reference year: 2013
Classification: Unit processes / Materials production / Inorganic chemicals
Generated by: #REF!, ysqsophia@gmail.com
Owner: Tiangong LCI Data Working Group
Review: Dependent internal review by Tiangong LCI Data Working Group
Amounts: no units in this file; such an amount is in the reference unit of its flow, which a separate flow dataset defines
copyright: false
licenseType: Free of charge for all users and uses

## General comment
Traditional rotary kilns produce cement clinker.After detection, the gas flow rate of rotary kiln was between 32137~43251Nm3/h.

## Geography
A sulfuric acid plant under Lubei Chemical Group Co., Ltd.

## Technology and included processes
According to the data, the data before and after the kiln of a sulfuric acid plant affiliated to Lubei Chemical Group Co., Ltd. were selected with the measured annual rated sulfuric acid output of 65kt/a and 81kt/a cement clinker. After testing, the gas flow rate of the rotary kiln is between 32137 and 43251 Nm3/h.

## Technical purpose
The traditional rotary kiln described is specifically used for the production of cement clinker, a critical component in the manufacture of cement. The clinker production process is a fundamental part of the cement manufacturing industry, where clinker serves as the main ingredient for creating various types of cement.

## Model description
1kg cement clinker is used as the functional unit; the system boundary is defined as the calcination process of cement clinker, and the specific content includes: input of raw materials → different decomposition and calcination processes → discharge of products and waste gases.

## Reference product
- clinker: 1000
  Cement clinker

## Inputs
- phosphogypsum: 2002
  Phosphogypsum
- hard coal: 558.599
  The original data is 0.519kg standard coal, here converted to hard coal, the conversion formula is 1kg hard coal = 0.929kg standard coal.

## Outputs
- carbon dioxide (fossil): 1340
  CO2
- sulfur dioxide: 975
  SO2
- Nitrogen oxides: 0.9
  NOx
- particles (> PM10): 0.76
  Dust, with an unspecified particle size, is treated as PM > 10 micrometers in diameter. In the production process of cement clinker, there is almost no dust generated.

## Sampling procedure
The actual measured values ​​of a sulfuric acid plant affiliated to Lubei Chemical Group Co., Ltd. are the data before and after the kiln with an annual output of 65kt/a sulfuric acid and 81kt/a cement clinker.

## Use advice
When utilizing the data set, users should pay attention to the specific production rates provided, which are 65kt/a and 81kt/a for the associated sulfuric acid plant and cement clinker production, respectively. The gas flow rates between 32137-43251 Nm3/h should be considered within their emission modeling. Ensure that the system boundary, which includes raw material input, calcination processes, and product and waste gas discharges, is appropriately integrated into the life cycle assessment to accurately ascertain the environmental impacts of the clinker production.

## Review details
Inventory: The internal review was done by several iteration steps concerning raw data validation, raw data documentation, representativity, completeness and consistency of modelling with regard to ISO 14040 and 14044.

## Data sources
- 张杭, 马丽萍, 胡建红, 毛宇, 戴取秀, & 谢龙贵. (2013). 不同分解工艺下磷石膏分解制水泥熟料的LCA研究. 材料导报, 27(S1), 302–305.
