# Solvent-based coatings ; Film-forming substances, solvents, pigments, auxiliaries ; Solvent-based paint production process ; All sizes; NESPS2 / 溶剂型涂料 ; 成膜物质、溶剂、颜料、助剂 ; 溶剂型涂料生产工艺 ; 所有规模 ; 全国第二次污染普查数据

Dataset: ILCD process, Unit process, single operation
Geography: CN
Reference year: 2019
Classification: Reference Parameters / Systems / Paints and chemical preparations
Generated by: The data was created by the Office of the Second National Pollution Source Census of the Ministry of Ecology and Environment, and the data was organized by the TianGong Plan team for ILCD format / 生态环境部第二次全国污染源普查工作办公室创建数据，天工计划团队常慧敏整理数据为ILCD格式
Owner: Tiangong LCI Data Working Group / 天工LCI数据工作小组
Review: Dependent internal review by Tiangong LCI Data Working Group / 天工LCI数据工作小组
Amounts: no units in this file; such an amount is in the reference unit of its flow, which a separate flow dataset defines
copyright: false
licenseType: Free of charge for all users and uses

## General comment
the Technical of end-of-pipe management technology for pollution Exhaust gasis/，Its Technical efficiency of end-of-pipe management0

## Technical purpose
本描述的溶剂型涂料生产工艺，包含成膜物质、溶剂、颜料和助剂，适用于各种规模的工业用途和消费产品的溶剂型涂料生产。概述的末端治理污染技术用于减轻涂料生产过程中的排放问题，涉及的污染物包括废气、细颗粒物（PM2.5至PM10）以及挥发性有机化合物（VOCs）。这些技术包括旋风除尘、布袋过滤、各种吸附和燃烧方法、光催化和低温等离子体处理，用于提高空气质量并满足监管标准。

## Reference product
- Solvent-based Coatings: 1000; calculated
  源文件中描述为为溶剂型涂料，此处对其进行了匹配工作，将其匹配到LCAflow库里面相最符合的流，污染物指标备注为工业废气量

## Outputs
All rows: calculated
- particles (PM2.5 - PM10): 0.0051
  the Technical of end-of-pipe management technology for pollution particles (PM2.5 - PM10)isBag filter，Its Technical efficiency of end-of-pipe management90
  污染物指标颗粒物的末端治理技术是袋式除尘，其效率为90，末端治理设施实际运行率（k值）计算公式为k=设备耗电量(千瓦时)/(设备额定功率(千瓦)×设备运行时间(小时))。原文件中描述污染物类别为废气，污染物指标为颗粒物，此处对其进行了匹配工作，将其匹配到LCAflow库里面相最符合的流，污染物指标备注为颗粒物
- particles (PM2.5 - PM10): 0.0051
  the Technical of end-of-pipe management technology for pollution particles (PM2.5 - PM10)isCyclone dust removal + bag filter，Its Technical efficiency of end-of-pipe management90
  污染物指标颗粒物的末端治理技术是旋风+布袋，其效率为90，末端治理设施实际运行率（k值）计算公式为k=设备耗电量(千瓦时)/(设备额定功率(千瓦)×设备运行时间(小时))。原文件中描述污染物类别为废气，污染物指标为颗粒物，此处对其进行了匹配工作，将其匹配到LCAflow库里面相最符合的流，污染物指标备注为颗粒物
- volatile organic compound: 4.1
  the Technical of end-of-pipe management technology for pollution volatile organic compoundisCatalytic combustion method，Its Technical efficiency of end-of-pipe management59
  污染物指标挥发性有机物的末端治理技术是催化燃烧法，其效率为59，末端治理设施实际运行率（k值）计算公式为k=设备耗电量(千瓦时)/(设备额定功率(千瓦)×设备运行时间(小时))。原文件中描述污染物类别为废气，污染物指标为挥发性有机物，此处对其进行了匹配工作，将其匹配到LCAflow库里面相最符合的流，污染物指标备注为挥发性有机物
- volatile organic compound: 4.1
  the Technical of end-of-pipe management technology for pollution volatile organic compoundisDirect combustion，Its Technical efficiency of end-of-pipe management59
  污染物指标挥发性有机物的末端治理技术是直接燃烧法，其效率为59，末端治理设施实际运行率（k值）计算公式为k=设备耗电量(千瓦时)/(设备额定功率(千瓦)×设备运行时间(小时))。原文件中描述污染物类别为废气，污染物指标为挥发性有机物，此处对其进行了匹配工作，将其匹配到LCAflow库里面相最符合的流，污染物指标备注为挥发性有机物
- volatile organic compound: 4.5
  the Technical of end-of-pipe management technology for pollution volatile organic compoundisRegenerative catalytic combustion method，Its Technical efficiency of end-of-pipe management55
  污染物指标挥发性有机物的末端治理技术是蓄热式催化燃烧法，其效率为55，末端治理设施实际运行率（k值）计算公式为k=设备耗电量(千瓦时)/(设备额定功率(千瓦)×设备运行时间(小时))。原文件中描述污染物类别为废气，污染物指标为挥发性有机物，此处对其进行了匹配工作，将其匹配到LCAflow库里面相最符合的流，污染物指标备注为挥发性有机物
- volatile organic compound: 4.5
  the Technical of end-of-pipe management technology for pollution volatile organic compoundisRegenerative thermal combustion method，Its Technical efficiency of end-of-pipe management55
  污染物指标挥发性有机物的末端治理技术是蓄热式热力燃烧法，其效率为55，末端治理设施实际运行率（k值）计算公式为k=设备耗电量(千瓦时)/(设备额定功率(千瓦)×设备运行时间(小时))。原文件中描述污染物类别为废气，污染物指标为挥发性有机物，此处对其进行了匹配工作，将其匹配到LCAflow库里面相最符合的流，污染物指标备注为挥发性有机物
- volatile organic compound: 6.1
  the Technical of end-of-pipe management technology for pollution volatile organic compoundisAdsorption/catalytic combustion method，Its Technical efficiency of end-of-pipe management39
  污染物指标挥发性有机物的末端治理技术是吸附/催化燃烧法，其效率为39，末端治理设施实际运行率（k值）计算公式为k=设备耗电量(千瓦时)/(设备额定功率(千瓦)×设备运行时间(小时))。原文件中描述污染物类别为废气，污染物指标为挥发性有机物，此处对其进行了匹配工作，将其匹配到LCAflow库里面相最符合的流，污染物指标备注为挥发性有机物
- volatile organic compound: 6.1
  the Technical of end-of-pipe management technology for pollution volatile organic compoundisAdsorption/thermal combustion method，Its Technical efficiency of end-of-pipe management39
  污染物指标挥发性有机物的末端治理技术是吸附/热力燃烧法，其效率为39，末端治理设施实际运行率（k值）计算公式为k=设备耗电量(千瓦时)/(设备额定功率(千瓦)×设备运行时间(小时))。原文件中描述污染物类别为废气，污染物指标为挥发性有机物，此处对其进行了匹配工作，将其匹配到LCAflow库里面相最符合的流，污染物指标备注为挥发性有机物
- volatile organic compound: 6.4
  the Technical of end-of-pipe management technology for pollution volatile organic compoundisCondensation，Its Technical efficiency of end-of-pipe management36
  污染物指标挥发性有机物的末端治理技术是冷凝法，其效率为36，末端治理设施实际运行率（k值）计算公式为k=设备耗电量(千瓦时)/(设备额定功率(千瓦)×设备运行时间(小时))。原文件中描述污染物类别为废气，污染物指标为挥发性有机物，此处对其进行了匹配工作，将其匹配到LCAflow库里面相最符合的流，污染物指标备注为挥发性有机物
- volatile organic compound: 7.4
  the Technical of end-of-pipe management technology for pollution volatile organic compoundisPhotocatalysis，Its Technical efficiency of end-of-pipe management26
  污染物指标挥发性有机物的末端治理技术是光催化，其效率为26，末端治理设施实际运行率（k值）计算公式为k=设备耗电量(千瓦时)/(设备额定功率(千瓦)×设备运行时间(小时))。原文件中描述污染物类别为废气，污染物指标为挥发性有机物，此处对其进行了匹配工作，将其匹配到LCAflow库里面相最符合的流，污染物指标备注为挥发性有机物
- volatile organic compound: 7.4
  the Technical of end-of-pipe management technology for pollution volatile organic compoundisPhotolysis，Its Technical efficiency of end-of-pipe management26
  污染物指标挥发性有机物的末端治理技术是光解，其效率为26，末端治理设施实际运行率（k值）计算公式为k=设备耗电量(千瓦时)/(设备额定功率(千瓦)×设备运行时间(小时))。原文件中描述污染物类别为废气，污染物指标为挥发性有机物，此处对其进行了匹配工作，将其匹配到LCAflow库里面相最符合的流，污染物指标备注为挥发性有机物
- volatile organic compound: 8
  the Technical of end-of-pipe management technology for pollution volatile organic compoundisLow temperature plasma，Its Technical efficiency of end-of-pipe management20
  污染物指标挥发性有机物的末端治理技术是低温等离子体，其效率为20，末端治理设施实际运行率（k值）计算公式为k=设备耗电量(千瓦时)/(设备额定功率(千瓦)×设备运行时间(小时))。原文件中描述污染物类别为废气，污染物指标为挥发性有机物，此处对其进行了匹配工作，将其匹配到LCAflow库里面相最符合的流，污染物指标备注为挥发性有机物
- Exhaust gas: 49300
  the Technical of end-of-pipe management technology for pollution Exhaust gasis/，Its Technical efficiency of end-of-pipe management0
  污染物指标工业废气量的末端治理技术是/，其效率为0。原文件中描述污染物类别为废气，污染物指标为工业废气量，此处对其进行了匹配工作，将其匹配到LCAflow库里面相最符合的流，污染物指标备注为工业废气量

## Use advice
This dataset is derived from the Pollution Source Census Report and contains information on pollution emissions and related products. However, it does not include data on energy or chemical consumption, nor does it provide information on waste or co-product generation. When utilizing this dataset, please supplement the missing data based on actual conditions before use
该数据集来源于污染源普查报告，包含污染物排放及相关产品信息，但不包含能源或化学品消耗数据，也不提供废弃物或共生产物产生信息。在使用该数据集时，请根据实际情况补充缺失数据后再使用。

## Review details
Inventory: The internal review was done by several iteration steps concerning raw data validation, raw data documentation, representativity, completeness and consistency of modelling with regard to ISO 14040 and 14044.
清单： 内部审查通过几个迭代步骤完成，涉及原始数据验证、原始数据记录、代表性、完整性、与 ISO 14040 和 14044 有关的建模的一致性。

## Data sources
- 第二次全国污染源普查产排污核算系数手册（试用版）,二级代码26,四级代码2641文件，在完整版文件中第4111页
