# metal extraction;Leaching battery panels with nitric acid

Dataset: ILCD process, Unit process, single operation
Geography: CN
Classification: Unit processes / Materials production / Metals and semimetals
Generated by: Nan Wang, 1209824595@qq.com
Owner: Tiangong LCI Data Working Group
Review: Dependent internal review by Tiangong LCI Data Working Group
Amounts: no units in this file; such an amount is in the reference unit of its flow, which a separate flow dataset defines
copyright: false
licenseType: Free of charge for all users and uses

## General comment
metal extraction is implemented by hydrometallurgical recovery with strong solvents and pollutant discharge.

## Technical purpose
This industrial process involves the metal extraction from battery panels through a hydrometallurgical recovery method using nitric acid leaching. The process is typically applied for the recovery of valuable metals from spent battery materials, where the use of strong solvents assists in separating metals for further processing and recycling. This method is utilized in industries that require high-purity metal inputs, such as the electronics and automotive sectors, particularly for producing components that demand specific metal properties.

## Reference product
- Multi-Si solar cell,Multi-Si solar cell,Multi-Si solar cell: 24.97; input; software or database

## Inputs
- Nitric acid: 6.72; software or database
- Electricity: 116.028; software or database
- water: 175.76; software or database

## Outputs
All rows: software or database
- silver: 0.46
- copper: 2.91
- Silicon: 21.6
- Medium and low radioactive liquid waste: 173.71
- Nitrogen oxides: 108.54
- sulfur dioxide: 71.4
- carbon dioxide: 144.5
- particles (> PM10),particles (>PM10): 0.0095

## Use advice
When using this data set, users should account for the environmental impact of strong solvent use and pollutant discharge that occurs during the leaching process. It is important to include these impacts in the Life Cycle Assessment to ensure a comprehensive evaluation of the process. Additionally, users should consider the technological applicability based on the intended recovery of certain metals and the purity levels achieved. The data should not be applied to processes that do not employ hydrometallurgical methods or for materials that do not react with nitric acid. Consideration should also be given to the geographic and technological relevance of the data to the specific context in which it is applied.

## Review details
Inventory: The internal review was done by several iteration steps concerning raw data validation, raw data documentation, representativity, completeness and consistency of modelling with regard to ISO 14040 and 14044.

## Data sources
- Li, J. et al. Life cycle analysis of the economic costs and environmental benefits of photovoltaic module waste recycling in China. (2023).
