# Ethylene Production ; Ethylene ; Natural Gas Ethane to Ethylene Route ; Natural Gas Ethane

Dataset: ILCD process, Unit process, black box
Geography: LZ-GS-CN
Reference year: 2021
Classification: Energy carriers and technologies / Natural gas based fuels
Functional unit: Define 1t of industrial grade ethylene product as a functional unit
LCI method principle: Attributional
LCI method approaches: Allocation - mass
Generated by: Yanan Ren, renyn15@tsinghua.org.cn
Owner: Tiangong LCI Data Working Group
Review: Dependent internal review by Tiangong LCI Data Working Group
Amounts: no units in this file; such an amount is in the reference unit of its flow, which a separate flow dataset defines
copyright: false
licenseType: Free of charge for all users and uses

## General comment
800,000 tons/year ethylene, CNPC ethylene project, natural gas-based ethane to ethylene, CNPC's independent ethane to ethylene high temperature steam cracking technology

## Geography
Yuheng Industrial Zone, Yulin City, Shaanxi Province

## Time period
Not mentioned, replaced by the publication time of the document

## Technology and included processes
The model of ethylene production from natural gas based on ethane adopts the high-temperature steam cracking technology of my country National Petroleum Corporation from ethane to ethylene. The cracking process is a process in which ethane is decomposed under the condition of isolation from air and high temperature to generate alkenes or alkanes. During this process, there are superposition and condensation reactions at the same time, so that some hydrocarbons become larger molecules. The ethylene plant is divided into a cracking furnace unit (including raw material preheating, cracking in the furnace), a quenching unit (quick cooling stage, decoking system, process water stripping, dilution steam), compression and alkali cleaning unit (compression stage, alkali cleaning stage, pre- deethanization, acetylene hydrogenation), cold separation unit (cryogenic system, demethanization unit, methanation reaction), ethylene rectification and heat pump unit (heat pump unit, propylene refrigeration unit), spent alkali oxidation unit (waste alkali dehydrocarbonation , waste caustic oxidation, spent caustic neutralization) and torches, public works systems, etc.

## Technical purpose
Ethylene is a widely used chemical building block in the petrochemical industry, essential for the production of polymers and chemicals. Hence, this data set represents the production of 800,000 tons/year of industrial-grade ethylene through the natural gas ethane to ethylene route, utilizing CNPC's high temperature steam cracking technology. This process is commonly applied in large-scale synthesis for manufacturing products such as plastics, antifreeze, solvents, and detergents.

## Reference product
- ethene (ethylene): 1000; measured
  Ethylene

## Inputs
All rows: measured
- Ethane: 1120
- Methane: 110
- Methanol: 0.09
- Dimethyl disulfide: 0.17
  dimethyl disulfide
- sodium hydroxide: 3.77
  NaOH
- Sulphuric acid: 0.44
  Concentrated sulfuric acid
- Carbon Monoxide: 0.27
  CO
- Cooling water: 20
- Water (desalinated; deionized): 3480
  Demineralized water
- process steam: 260
  steam
- Instrument Air: 35.57
  instrument air
- air: 4.36
  factory air
- Hydrogen: 90
  hydrogen
- nitrogen: 5.33
  Nitrogen
- electricity mix: 198.504
  electricity
- Compressor Washing Oil: 20
  Compressor washing oil
- Phosphate: 2.67

## Outputs
All rows: measured
- biological oxygen demand: 0.06
  BOD5
- chemical oxygen demand: 0.23
  CODcr
- Oils, unspecified: 0.00108
  Petro
- total dissolved solids: 7.38
  TDS
- phenol: 0.02
- sulfide: 0.00113
- Water (groundwater from technosphere, waste water): 108.24
  Diluted sewage
- nitrous oxide: 0.46
  NOx
- Dust (unspecified, from stack): 0.1
  particulates
- carbon monoxide: 0.27
  CO
- sulfur dioxide: 0.02
  SO2
- volatile organic compound: 0.1
  VOCs
- carbon dioxide: 0.02
  CO2
- Tar Residue: 0.29
  tar residue
- Waste Alumina Catalyst: 3.85e-5
  Spent Al2O3 catalyst

## Deviations from the LCI method approaches
This study chooses quality assignment

## Data selection and combination
The data list comes from PetroChina Lanzhou Petrochemical Ethane to Ethylene Project

## Use advice
When using this data set for Life Cycle Assessment, attention should be paid to the specifics of the high temperature steam cracking technology and the subsequent separation processes described. This includes the HQF-IV type cracking furnace and the pre-deethanizer hydrogenation technology utilized for the separation of ethylene. Users should consider this process a 'black box' and recognize that the production of larger hydrocarbons through superposition and condensation reactions is part of the described method. It is imperative to apply quality allocation when assessing outputs, defining 1 ton of industrial-grade ethylene as the functional unit. Adjustments may be needed based on the actual application of the ethylene produced and local technological variations.

## Review details
Inventory: The internal review was done by several iteration steps concerning raw data validation, raw data documentation, representativity, completeness and consistency of modelling with regard to ISO 14040 and 14044.

## Data sources
- 赵悦如. 基于生命周期方法的乙烯生产环境影响分析. (大连理工大学, 2021).
