# Steel production ; Total of all wind farm

Dataset: ILCD process, Unit process, single operation
Geography: SH-CN
Reference year: 2009
Classification: Materials production / Metals and semimetals
Functional unit: The functional unit is 1 kWh on-grid electricity provision.
LCI method principle: Attributional
LCI method approaches: Allocation
Generated by: Yunzhi Zhao, ll10088@163.com
Owner: Tiangong LCI Data Working Group
Review: Dependent internal review by Tiangong LCI Data Working Group
Amounts: no units in this file; such an amount is in the reference unit of its flow, which a separate flow dataset defines
copyright: false
licenseType: Free of charge for all users and uses

## General comment
The technical parameters of the Donghai Bridge Offshore Wind Farm (DBOWF) are intended for the construction and operation of offshore wind farms, providing a model for engineering offshore wind energy projects, especially outside Europe. This comprehensive data includes the production and supply chain for materials and equipment, emphasizing energy and emissions during manufacturing, transport, installation, operations, and maintenance of wind farm infrastructure.

## Geography
The studied wind farm, the Donghai Bridge Offshore Wind Farm (DBOWF), is China's first offshore wind farm within the jurisdiction of Shanghai, as well as the first offshore wind farm outside Europe. The project has two-phases of construction, located on each side of the Donghai bridge (Fig. 1).

## Reference product
- Steel: 4.24e7; article inperiodical

## Inputs
- Energy, geothermal, converted: 1.13e9; software or database

## Outputs
- carbon dioxide: 7.29e7; software or database
  GHG
- particles (PM2.5): 68760; software or database
- sulfur dioxide: 168090; software or database
- nitrous oxide: 157050; software or database

## Deviations from the LCI method approaches
The present study employed the PLCA modeling approach to calculate the energy and environmental emissions of a typical offshore wind farm in China. The cradle-to-grave process includes four stages, materials and equipment manufacturing, transportation and installation, operation and maintenance, and dismantling and recycling (Fig. 2).

## Data selection and combination
The technical parameters of wind turbines, foundations and cables are obtained from the design documents of the DBOWF (Table 2). The energy and emissions factors (i.e., the energy consumption and environmental emissions of per unit material and component production) are derived from the Ecoinvent 2.2 dataset (Ecoinvent Centre, 2009), and the coefficients of China's practices were preferentially referred. For key materials and equipment, their sea transportation energy is calculated from the transportation load and shipping energy intensity. The facility installation energy and emissions were estimated based on the construction plan. The wind farm's operation and maintenance data, such as the frequency and working time of maintenance, were obtained from site investigations with engineers and technicians. The uncertainties associated with model parameters and input data are illustrated in the sensitivity analysis section of this paper.

## Use advice
When using the DBOWF data set for environmental assessment or design purposes, take into account the specifics of the Chinese context, especially the emission factors and transportation aspects. Use the provided energy and emission factors from the Ecoinvent 2.2 dataset for comparative consistency. Pay attention to the construction phases and adapt the data to reflect the operation and maintenance practices pertinent to the geographic and technological context of the new wind farm project. Consider the sensitivity analysis described in the research to account for uncertainties in model parameters and input data. The functional unit for impact assessment should be normalized to 1 kWh of on-grid electricity supply.

## Review details
Inventory: The internal review was done by several iteration steps concerning raw data validation, raw data documentation, representativity, completeness and consistency of modelling with regard to ISO 14040 and 14044.

## Data sources
- Yang, J. et al. The life-cycle energy and environmental emissions of a typical offshore wind farm in China. Journal of Cleaner Production 180, 316–324 (2018).
