# Aluminum electrolysis ; Liquid primary aluminum ; Prebaking ; Alumina for metallurgy ; 2014

Dataset: ILCD process, Unit process, single operation
Geography: CN
Reference year: 2021
Classification: Unit processes / Materials production / Metals and semimetals
Generated by: Zimeng Cai, caizm6178@163.com
Owner: Tiangong LCI Data Working Group
Review: Dependent internal review by Tiangong LCI Data Working Group
Amounts: no units in this file; such an amount is in the reference unit of its flow, which a separate flow dataset defines
copyright: false
licenseType: Free of charge for all users and uses

## General comment
The given data set predominantly describes the process of aluminum electrolysis, which is focused on producing liquid primary aluminum using a prebaking approach from metallurgical alumina in the year 2014. This process is integral in the aluminum production industry and serves as a foundation for the manufacture of various aluminum-based products. The liquid primary aluminum obtained is crucial for producing components utilized across automotive, aerospace, construction, packaging, and electrical sectors due to its lightweight and corrosion resistance properties.

## Time period
Date of publication

## Reference product
- aluminium, primary, liquid: 1000; software or database

## Inputs
All rows: software or database
- Integrated AC power consumption: 47741.4
- aluminium oxide, metallurgical: 1915.94
- fluoride salt: 19.02
- anode, prebake, for aluminium electrolysis: 411.75
- Water, unspecified natural origin: 1.48

## Data selection and combination
The data in this study refers to the LCA data of PA, SA, electricity, and other background data. The PA data were obtained from statistical data sources, and the SA data were mainly obtained from the literatures. The background data were mainly derived from the Chinese localization LCA database CAS RCEES 2018, which was established by the Research Center for Eco-Environmental Sciences, Chinese Academy of Sciences and covers LCA data for energy, materials, transportation, waste management etc.

## Use advice
For accurate Life Cycle Assessment of aluminum production using this data set, users should ensure the contextual relevance of the 2014 data to their respective assessment year since technological advancements and efficiency improvements may alter subsequent process outputs. It is important to note that the PA (Primary Aluminum) data is based on statistical sources, while the SA (Secondary Aluminum) data is derived from literature. External LCA practitioners should cross-reference their data with updated databases, keeping in mind the technological applicability fits the locale-specific industry practices. Recycling should be considered where applicable, and background data from the CAS RCEES 2018 database should be used with acknowledgement of its geospatial and temporal context.

## Review details
Inventory: The internal review was done by several iteration steps concerning raw data validation, raw data documentation, representativity, completeness and consistency of modelling with regard to ISO 14040 and 14044.

## Data sources
- Ding, N., Liu, N., Lu, B. & Yang, J. Life cycle greenhouse gas emissions of aluminum based on regional industrial transfer in China. J. Ind. Ecol. 25, 1657–1672 (2021).
