# Bauxite Mining ; Bauxite ; Cradle ; 2010

Dataset: ILCD process, Unit process, single operation
Geography: CN
Reference year: 2021
Classification: Unit processes / Materials production / Non-energetic raw materials
Generated by: Zimeng Cai, caizm6178@163.com
Owner: Tiangong LCI Data Working Group
Review: Dependent internal review by Tiangong LCI Data Working Group
Amounts: no units in this file; such an amount is in the reference unit of its flow, which a separate flow dataset defines
copyright: false
licenseType: Free of charge for all users and uses

## General comment
氧化铝生产2017

## Time period
Date of publication

## Technical purpose
This data set represents the extraction and production processes of bauxite, a primary raw material used in the production of alumina and subsequently aluminum. The extraction process of bauxite is specific to the data set's respective mining location and year (2010). The resulting raw bauxite is intended for usage in the production of alumina in the year 2017 through a unit process (single operation).

## Reference product
- bauxite: 4.34878e10; software or database

## Inputs
All rows: software or database
- electricity, high voltage, aluminium industry: 7.26624e7
  electricity
- other fuels: 2.10988e9
  electricity
- Coal, brown, in ground: 4.4762e7
  coal
- natural gas, high pressure: 495000
  coal
- Gasoline: 2.048e6
  gasoline
- Diesel oil: 1.1089e7
  diesel

## Data selection and combination
The data in this study refers to the LCA data of PA, SA, electricity, and other background data. The PA data were obtained from statistical data sources, and the SA data were mainly obtained from the literatures. The background data were mainly derived from the Chinese localization LCA database CAS RCEES 2018, which was established by the Research Center for Eco-Environmental Sciences, Chinese Academy of Sciences and covers LCA data for energy, materials, transportation, waste management etc.

## Use advice
Users of this data should note that the PA (Production Allocation) data is sourced from statistical data, while SA (Site Allocation) data mainly comes from literature. It is essential to align the use of this data with corresponding temporal (years of data validity) and geographic (site-specific mining conditions) boundaries. The background data is sourced from the CAS RCEES 2018 database, which is specific to Chinese localization and may need to be adjusted if applied within a different environmental or regulatory context. Methodological considerations such as system boundaries, allocation procedures, and data quality should align with the goal and scope of the intended LCA study.

## Review details
Inventory: The internal review was done by several iteration steps concerning raw data validation, raw data documentation, representativity, completeness and consistency of modelling with regard to ISO 14040 and 14044.

## Data sources
- Ding, N., Liu, N., Lu, B. & Yang, J. Life cycle greenhouse gas emissions of aluminum based on regional industrial transfer in China. J. Ind. Ecol. 25, 1657–1672 (2021).
