# Al frame removal;Al;disassemble mechanically

Dataset: ILCD process, Unit process, single operation
Geography: CN
Classification: Unit processes / End-of-life treatment / Reuse or further use
Generated by: Nan Wang, 1209824595@qq.com
Owner: Tiangong LCI Data Working Group
Review: Dependent internal review by Tiangong LCI Data Working Group
Amounts: no units in this file; such an amount is in the reference unit of its flow, which a separate flow dataset defines
copyright: false
licenseType: Free of charge for all users and uses

## General comment
the Al frame and junction boxes are removed manually or mechanically in the dismantling stage.

## Technical purpose
The aluminum frames and junction boxes disassembled in this process are intended for recycling or further processing in waste management facilities. This process is typically applied to end-of-life products, construction debris, or during the refurbishment activities where aluminum components are removed to be reclaimed.

## Reference product
- PV Module Waste: 1000; input; software or database

## Inputs
- Electricity: 19.08; software or database

## Outputs
All rows: software or database
- aluminium: 179
- Junction Box: 14.4
- copper wire: 9.767
- Laminate,Laminate: 745.833
  PV laminates
- Electricity: 64.2413
- municipal solid waste deposition: 51
- chemical waste, inert (unspecified): 0.03029
- particles (> PM10),particles (>PM10): 3e-5

## Use advice
When using this data set, it is important to ensure it represents the specific aluminum frame removal process (manual or mechanical) in question. Users should account for the efficiency of the process and the quality of the recovered materials. For LCA studies, assumptions regarding downstream processing, reuse, or recycling rates of the recovered aluminum should be clearly stated and justified. Allocation procedures for environmental impacts between products in cases of co-processing need to be defined.

## Review details
Inventory: The internal review was done by several iteration steps concerning raw data validation, raw data documentation, representativity, completeness and consistency of modelling with regard to ISO 14040 and 14044.

## Data sources
- Li, J. et al. Life cycle analysis of the economic costs and environmental benefits of photovoltaic module waste recycling in China. (2023).
