# PVC production;PVC;Ethylene Method

Dataset: ILCD process, Unit process, black box
Geography: CN
Reference year: 2020
Classification: Unit processes / Materials production / Plastics
Functional unit: considering 1 kg resin production as the functional unit.
Generated by: Huijuan Guo, GHJ@email.ncu.edu.cn
Owner: Tiangong LCI Data Working Group
Review: Dependent internal review by Tiangong LCI Data Working Group
Amounts: no units in this file; such an amount is in the reference unit of its flow, which a separate flow dataset defines
copyright: false
licenseType: Free of charge for all users and uses

## General comment
Two commercially available synthesis methods (calcium carbide, ethylene) were assessed for PVC production in China.

## Geography
Process-based data from China were used, yet if not available, data from Europe were applied instead.

## Time period
Process-based data from China were used, yet if not available, data from Europe were applied instead. The electricity input was developed based on the national grid structure in China (Table S3), which was obtained from the share of the electric power structure in 2020 (National Bureau Statistics of China, 2020).

## Technical purpose
The dataset describes the industrial process of polyvinyl chloride (PVC) production in China, using two synthesis methods: calcium carbide and ethylene. This data can be used to understand the environmental impact of PVC produced via either synthesis method. PVC is a widely used plastic material in products such as pipes, wires, cable insulation, flooring, and medical devices.

## Model description
life cycle environmental and human health impacts were modeled using SimaPro software (version 8.5) with Ecoinvent 3 and ELCD (European Reference Life Cycle Database) databases.

## Reference product
- polyvinylchloride resin (B-PVC): 1; missing unimportant
  PVC

## Inputs
All rows: missing unimportant
- ethylene: 0.5
- chlorine: 0.65
- oxygen: 0.14
- hydrogen: 0.00029
- sodium hydroxide: 1.02e-5
- Process water: 6.05
  Processed water
- Electricity: 0.594
- process steam: 26.5862
  Steam
- natural gas; 44.1 MJ/kg: 0.0197
- Calcium Oxide: 2.67
- Calcium Oxide: 2.67e-5
  Quicklime

## Outputs
All rows: missing unimportant
- sulfur dioxide: 0.00043
- Nitrogen oxides: 0.00043
- chlorine: 1.2e-7
- hydrogen chloride: 2.33e-9
- Suspended solids, unspecified,Suspended solids, unspecified: 9.13e-6
- chemical oxygen demand: 4.9e-5
- biological oxygen demand: 9.35e-6
- mercury: 5.61e-10
- Waste (unspecified): 1.46
- Dust: 0.00021

## Data treatment and extrapolations
ReCiPe method (Europe H/H) was used as the assessment method for consistency.

## Use advice
This LCA data should be used with consideration of geographical and technological representativeness. If using for comparative purposes, ensure consistency in system boundaries and assumptions. For electricity input, be aware of the specific national grid structure of China as detailed in Table S3; for data not available from China, European datasets were used. The methodological framework followed is the ReCiPe method (Europe H/H), and the functional unit is 1 kg of resin. Modelling should use the provided SimaPro software (version 8.5) along with Ecoinvent 3 and ELCD databases for life cycle environmental and human health impact assessment.

## Review details
Inventory: The internal review was done by several iteration steps concerning raw data validation, raw data documentation, representativity, completeness and consistency of modelling with regard to ISO 14040 and 14044.

## Data sources
- An, J., Wu, F., Wang, D. & You, J. Estimated material metabolism and life cycle greenhouse gas emission of major plastics in China: A commercial sector-scale perspective. Resources, Conservation and Recycling 180, (2022).
