# Cement ; Calcium, silica-aluminum, iron raw materials ; Shaft kiln ; greater than or equal to10 (10000t - cement/a); NESPS2 / 水泥 ; 钙、硅铝、铁质原料 ; 立窑 ; 大于等于10（万吨-水泥/年） ; 全国第二次污染普查数据

Dataset: ILCD process, Unit process, single operation
Geography: CN
Reference year: 2019
Classification: Reference Parameters / Materials production / Other mineralic materials
Generated by: The data was created by the Office of the Second National Pollution Source Census of the Ministry of Ecology and Environment, and the data was organized by the TianGong Plan team for ILCD format / 生态环境部第二次全国污染源普查工作办公室创建数据，天工计划团队常慧敏整理数据为ILCD格式
Owner: Tiangong LCI Data Working Group / 天工LCI数据工作小组
Review: Dependent internal review by Tiangong LCI Data Working Group / 天工LCI数据工作小组
Amounts: no units in this file; such an amount is in the reference unit of its flow, which a separate flow dataset defines
copyright: false
licenseType: Free of charge for all users and uses

## General comment
the Technical of end-of-pipe management technology for pollution Exhaust gasis/

## Technical purpose
该工业流程数据集描述了使用立窑技术生产水泥的流程，生产能力大于或等于每年10,000吨水泥。数据集包括针对废水、化学需氧量、废气、颗粒物、二氧化硫、氮氧化物和汞排放等污染物的末端治理技术。

## Reference product
- Ordinary Portland Cement: 1000; calculated
  源文件中描述为为水泥，此处对其进行了匹配工作，将其匹配到LCAflow库里面相最符合的流，污染物指标备注为工业废水量

## Outputs
All rows: calculated
- mercury: 5.4e-5
  the Technical of end-of-pipe management technology for pollution mercuryisothers-combination，Its Technical efficiency of end-of-pipe management10
  污染物指标汞的末端治理技术是其他-组合，其效率为10，末端治理设施实际运行率（k值）计算公式为k=协同脱除效率（%）×窑磨同步运转率（%）。原文件中描述污染物类别为废气，污染物指标为汞，此处对其进行了匹配工作，将其匹配到LCAflow库里面相最符合的流，污染物指标备注为汞
- Waste water: 140
  the Technical of end-of-pipe management technology for pollution Waste wateris/
  污染物指标工业废水量的末端治理技术是/，末端治理设施实际运行率（k值）计算公式为/。原文件中描述污染物类别为废水，污染物指标为工业废水量，此处对其进行了匹配工作，将其匹配到LCAflow库里面相最符合的流，污染物指标备注为工业废水量
- Nitrogen oxides: 0.18615
  the Technical of end-of-pipe management technology for pollution Nitrogen oxidesisOther，Its Technical efficiency of end-of-pipe management15
  污染物指标氮氧化物的末端治理技术是其他，其效率为15，末端治理设施实际运行率（k值）计算公式为k=脱硝设施运行时间（小时/年）/生产装置生产时间（小时/年）。原文件中描述污染物类别为废气，污染物指标为氮氧化物，此处对其进行了匹配工作，将其匹配到LCAflow库里面相最符合的流，污染物指标备注为氮氧化物
- chemical oxygen demand: 0.00021
  the Technical of end-of-pipe management technology for pollution chemical oxygen demandisPhysical treatment，Its Technical efficiency of end-of-pipe management95
  污染物指标化学需氧量的末端治理技术是物理处理法，其效率为95。原文件中描述污染物类别为废水，污染物指标为化学需氧量，此处对其进行了匹配工作，将其匹配到LCAflow库里面相最符合的流，污染物指标备注为化学需氧量
- Nitrogen oxides: 0.219
  the Technical of end-of-pipe management technology for pollution Nitrogen oxidesisSNCR
  污染物指标氮氧化物的末端治理技术是SNCR，末端治理设施实际运行率（k值）计算公式为k=脱硝设施运行时间（小时/年）/生产装置生产时间（小时/年）。原文件中描述污染物类别为废气，污染物指标为氮氧化物，此处对其进行了匹配工作，将其匹配到LCAflow库里面相最符合的流，污染物指标备注为氮氧化物
- sulfur dioxide: 0.2457
  the Technical of end-of-pipe management technology for pollution sulfur dioxideisOther，Its Technical efficiency of end-of-pipe management30
  污染物指标二氧化硫的末端治理技术是其他，其效率为30，末端治理设施实际运行率（k值）计算公式为k=脱硫设施运行时间（小时/年）/生产装置生产时间（小时/年）。原文件中描述污染物类别为废气，污染物指标为二氧化硫，此处对其进行了匹配工作，将其匹配到LCAflow库里面相最符合的流，污染物指标备注为二氧化硫
- sulfur dioxide: 0.351
  the Technical of end-of-pipe management technology for pollution sulfur dioxideis/，Its Technical efficiency of end-of-pipe management0
  污染物指标二氧化硫的末端治理技术是/，其效率为0。原文件中描述污染物类别为废气，污染物指标为二氧化硫，此处对其进行了匹配工作，将其匹配到LCAflow库里面相最符合的流，污染物指标备注为二氧化硫
- particles (PM2.5 - PM10): 0.57
  the Technical of end-of-pipe management technology for pollution particles (PM2.5 - PM10)isBag filter，Its Technical efficiency of end-of-pipe management99
  污染物指标颗粒物的末端治理技术是袋式除尘，其效率为99，末端治理设施实际运行率（k值）计算公式为k=除尘设施运行时间（小时/年）/生产装置生产时间（小时/年）。原文件中描述污染物类别为废气，污染物指标为颗粒物，此处对其进行了匹配工作，将其匹配到LCAflow库里面相最符合的流，污染物指标备注为颗粒物
- particles (PM2.5 - PM10): 5.7
  the Technical of end-of-pipe management technology for pollution particles (PM2.5 - PM10)isElectrostatic precipitation，Its Technical efficiency of end-of-pipe management90
  污染物指标颗粒物的末端治理技术是静电除尘，其效率为90，末端治理设施实际运行率（k值）计算公式为k=除尘设施运行时间（小时/年）/生产装置生产时间（小时/年）。原文件中描述污染物类别为废气，污染物指标为颗粒物，此处对其进行了匹配工作，将其匹配到LCAflow库里面相最符合的流，污染物指标备注为颗粒物
- particles (PM2.5 - PM10): 11.4
  the Technical of end-of-pipe management technology for pollution particles (PM2.5 - PM10)isOther，Its Technical efficiency of end-of-pipe management80
  污染物指标颗粒物的末端治理技术是其他，其效率为80，末端治理设施实际运行率（k值）计算公式为k=除尘设施运行时间（小时/年）/生产装置生产时间（小时/年）。原文件中描述污染物类别为废气，污染物指标为颗粒物，此处对其进行了匹配工作，将其匹配到LCAflow库里面相最符合的流，污染物指标备注为颗粒物
- Exhaust gas: 4335
  the Technical of end-of-pipe management technology for pollution Exhaust gasis/
  污染物指标工业废气量的末端治理技术是/，末端治理设施实际运行率（k值）计算公式为/。原文件中描述污染物类别为废气，污染物指标为工业废气量，此处对其进行了匹配工作，将其匹配到LCAflow库里面相最符合的流，污染物指标备注为工业废气量

## Use advice
This dataset is derived from the Pollution Source Census Report and contains information on pollution emissions and related products. However, it does not include data on energy or chemical consumption, nor does it provide information on waste or co-product generation. When utilizing this dataset, please supplement the missing data based on actual conditions before use
该数据集来源于污染源普查报告，包含污染物排放及相关产品信息，但不包含能源或化学品消耗数据，也不提供废弃物或共生产物产生信息。在使用该数据集时，请根据实际情况补充缺失数据后再使用。

## Review details
Inventory: The internal review was done by several iteration steps concerning raw data validation, raw data documentation, representativity, completeness and consistency of modelling with regard to ISO 14040 and 14044.
清单： 内部审查通过几个迭代步骤完成，涉及原始数据验证、原始数据记录、代表性、完整性、与 ISO 14040 和 14044 有关的建模的一致性。

## Data sources
- 第二次全国污染源普查产排污核算系数手册（试用版）,二级代码30,四级代码3011文件，在完整版文件中第3333页
