# cement production;cement, ordinary portland cement, 42.5MPa;new dry process rotary kiln, 4000 t/d;mixed solid wastes

Dataset: ILCD process, Unit process, black box
Geography: BJ-CN
Classification: Unit processes / Materials production / Other mineralic materials
Generated by: #REF!, ysqsophia@gmail.com
Owner: Tiangong LCI Data Working Group
Review: Dependent internal review by Tiangong LCI Data Working Group
Amounts: no units in this file; such an amount is in the reference unit of its flow, which a separate flow dataset defines
copyright: false
licenseType: Free of charge for all users and uses

## General comment
Slag-based cement (SBC). According to Chinese cement standards (GB175-2007), SBC is a kind of ordinary portland cement (OPC), which is consist of 80-95% of Portland cement clinker and appropriate gypsum, and 5-20% of granulated BFS.This plant adopted new dry process and rotary kiln with 5 stages preheater to product SBC. The production scale was about 4000 ton/day. The content of blast furnace slag (BFS) was approximately 10%.BFS was generated as a co-product of pig iron in blast furnaces, and further treated by the means of aircooling and water-quenching. Air-cooled BFS was typically used in low-grade applications; while water-quenching BFS can be grinded with gypsum as a substitute of cementitious materials in cement production. Moreover, the utilization of BFS as admixture in SBC can improve technical properties, including strength, permeability and corrosion resistance.

## Geography
Modern cement plants in Beijing

## Technology and included processes
This plant adopted new dry process and rotary kiln with 5 stages preheater to product SBC. The production scale was about 4000 ton/day. The content of BFS was approximately 10%.BFS was generated as a co-product of pig iron in blast furnaces, and further treated by the means of aircooling and water-quenching. Air-cooled BFS was typically used in low-grade applications; while water-quenching BFS can be grinded with gypsum as a substitute of cementitious materials in cement production. Moreover, the utilization of BFS as admixture in SBC can improve technical properties, including strength, permeability and corrosion resistance (Song and Saraswathy, 2006). Therefore, the inventory of BFS was obtained in accordance with the allocation between pig iron and BFS based on their economic value. Moreover, the land use inventories of BFS, including land occupation and land transformation, were also considered as a benefit of preventing slag storage.

## Technical purpose
The cement described is ordinary portland cement (OPC) with the classification of 42.5MPa, suitable for a wide range of construction applications including infrastructure, buildings, and civil engineering projects. Primarily, it is used in concrete, mortars, and grouts where high strength and durability are required. The inclusion of 5-20% blast furnace slag (BFS) enhances technical properties such as strength, permeability, and corrosion resistance, making this OPC variant particularly valuable in projects demanding enhanced performance characteristics.

## Model description
This functional unit is defined as 1 kg of cement with a strength of 42.5 MPa.The system boundary is cement production.

## Reference product
- cement, ordinary portland cement, 42.5MPa: 1000
  Ordinary Portland cement, 42.5 MPa

## Inputs
- blast furnace slag: 102
  Blast furnace slag (BFS)
- sandstone: 70.2
  Sandstone
- limestone, crushed, for mill: 1080
  Limestone
- dolomite: 0.000649
  Dolomite
- iron ore: 21.4
  Iron ore
- ash: 2.96
  Fly ash
- gypsum stone (CaSO4-dihydrate): 76.3
  Gypsum
- hard coal; 26.3 MJ/kg: 137
  Raw coal
- crude oil; 42.3 MJ/kg: 0.0416
  Crude oil

## Outputs
- carbon dioxide (fossil): 744
  CO2. CO2 emission: Based on the consumption of fossil fuels andlimestone, CO2 emission was calculated by equation, expressed as follows: ECO2 = 3.67FQkα + mc x 0.48 x 44/56. where ECO2 is the total amount of CO2 emission (kg); F and Q are the amount of energy combustion (kg) and the calorific value (MJ/kg) of fossil fuel, respectively; k is the carbon emission factors of fossil fuel (kg C/MJ), which is 24.74E-3 kg C/MJ for coal (the average of burning coal in China); α is the oxidation rate of carbon combustion, with a value of 0.9; and mc is the consumption amount of limestone (kg).
- sulfur dioxide: 0.239
  SO2. SO2 emission: Based on the sulfur content, sulfur emissionrate of fuel, and relative desulfurization situation in investigated factories, SO2 emission was calculated using thefollowing equation: Eso2 = 2FSα(1 - γ). where Eso2 is the quantity of SO2 emission (kg); F and S are theconsumption amount (kg) and sulfur content (wt%) of fuel, respectively; α is the SO2 emission rate of fuel, which is 1.74E-3 for coal; and γ is the desulfurization rate. As desul-furization in Chinese cement industry is still in the research stage without actual application, y was assumed to be zero.
- Nitrogen oxides: 1.37
  NOX. NOx emission: Based on the consumption of fossil fuel, NOx emission factor, and denitrification rate in investigated factories, NOx emission was estimated by equation, expressed as follows: ENox = 0.001Fα(1 - γ). where ENox is the amount of NOx emission (kg); F is the consumption amount (kg) of fuel; α is the NOx emission factor of fuelcombustion (kg/t), which is 9.95 kg/t forcoal combustion; and γ is the denitration rate. Denitration wouldnot be considered because denitration in Chinese cement plant isstill in the research stage at present.
- carbon monoxide (fossil): 0.244
  CO. CO emission was calculated by using Formula, expressed as follows: E = FQα. where E is the amount of relative gas emissions (kg); Fand Q are the consumption amount (kg) and the calorific value (MJ/kg) of fossil fuel, respectively; and α is the gas emission factor (kg/TJ). Based on the default value recommended by the IPCC (2006), the gas emission factor for CO ais 106 kg/TJ.
- methane (fossil): 0.00184
  CH4. CH4 emission was calculated by using Formula, expressed as follows: E = FQα. where E is the amount of relative gas emissions (kg); Fand Q are the consumption amount (kg) and the calorific value (MJ/kg) of fossil fuel, respectively; and α is the gas emission factor (kg/TJ). Based on the default value recommended by the IPCC (2006), the gas emission factor for CH4 is 0.8 kg/TJ.
- non-methane volatile organic compounds: 0.0575
  NMVOC. NMVOC emission was calculated by using Formula, expressed as follows: E = FQα. where E is the amount of relative gas emissions (kg); Fand Q are the consumption amount (kg) and the calorific value (MJ/kg) of fossil fuel, respectively; and α is the gas emission factor (kg/TJ). The gas emission factor for NMVOC is 25 kg/TJ.

## Data selection and combination
Environmental data of the cement production process were investigated and measured from modern cement plants in Beijing.

## Use advice
This dataset represents the environmental impact associated with the production of ordinary portland cement with a strength of 42.5MPa in modern cement plants in Beijing, utilizing a new dry process rotary kiln with a 5-stage preheater and a daily production capacity of 4000 tons. The dataset includes the use of mixed solid wastes and a 10% BFS admixture. When utilizing this data, it is essential to ensure that its application is consistent with the defined system boundary of cement production. Consideration of the economic allocation between pig iron and BFS, as well as land use benefits from avoided slag storage, should also be factored into the LCA. It is advised that the data only apply to similar production processes and regional conditions, as generalization to other contexts may not be accurate.

## Review details
Inventory: The internal review was done by several iteration steps concerning raw data validation, raw data documentation, representativity, completeness and consistency of modelling with regard to ISO 14040 and 14044.

## Data sources
- Yao Li et al. (2016). Environmental impact analysis of blast furnace slag applied to ordinary Portland cement production. Journal of Cleaner Production 120, 221–230 (2016).
