# PV module packaging ; PV module, efficiency of modules 14.8% ; Compact PV glass, cells and composite together with binder, encase withaluminum alloy, and install junction box on the back

Dataset: ILCD process, Unit process, single operation
Geography: CN
Reference year: 2016
Classification: Systems / Electrics and electronics
Functional unit: Grid-connected electricity generation from a 1 MWp multi-Si PV system, whose lifespan is 30 years of a 10 MWp power station has been taken as the research object and the functional unit
LCI method principle: Attributional
LCI method approaches: Allocation
Generated by: Jinfeng Yang, yjfzfshn@163.com
Owner: Tiangong LCI Data Working Group
Review: Dependent internal review by Tiangong LCI Data Working Group
Amounts: no units in this file; such an amount is in the reference unit of its flow, which a separate flow dataset defines
copyright: false
licenseType: Free of charge for all users and uses

## General comment
Multi-Si

## Geography
The power station is located in the central region of Ningxia, China, where the average annual solar radiation is approximately5955.80 MJ m2 a-1, and the annual average number of peak sun-shine hours are 1718 h.

## Time period
Available online

## Technical purpose
The described multi-crystalline silicon (multi-Si) photovoltaic (PV) module packaging process is utilized for the production of PV modules with an efficiency of 14.8%. These modules comprise compact PV glass and cells bound together with a binder, encased in aluminum alloy, and completed with a junction box on the back. The application of these modules is specifically in grid-connected electricity generation PV systems, with research focusing on a 10 MWp power station expected to have a life span of 30 years. The geographical application is targeted at areas like the central region of Ningxia, China, which is characterized by its high solar radiation and number of peak sunshine hours.

## Reference product
- Solar Module: 1; article inperiodical
  PV module

## Inputs
All rows: article inperiodical
- electricity: 42.84
  Electricity
- Multi-Si solar cell: 60
  PV cells
- Water (fresh water): 20.7
  Fresh water
- Glass: 14.5
- Polyvinyl fluoride (PVF): 0.28
  Polyvinylfluoride film (PVF)
- Polyethylene terephthalate: 0.28
  Polyethylene terephthalate(PET)
- Ethylene-vinyl acetate copolymer: 1.29
  Ethylene vinyl acetatecopolymer (EVA)
- Organic Silicone: 0.05
  Silicone
- aluminium: 3.48
  Aluminum
- Ethanol: 0.00253
- Isopropanol: 0.00081
- Tin coated copper strips: 0.00311
- copper wire: 0.006
  Copper wire

## Outputs
- volatile organic compound: 0.00025; article inperiodical
  Volatile organic compound(VOC)
- waste water - untreated: 1.32; article inperiodical
  Waste water
- industrial waste (unspecified): 0.00734; article inperiodical
  Solid waste
- Hazardous organic waste for disposal (unspecific): 0.01188; article inperiodical
  Solid waste (organic waste)

## Deviations from the LCI method approaches
A life cycle assessment (LCA) has been performed for the grid-connected electricity generation from a metallurgical route multi-crystalline silicon (multi-Si) photovoltaic (PV) system in China.

## Data selection and combination
Survery of factories in Yunnan and Ningxia

## Use advice
When applying the LCA data of the multi-crystalline silicon photovoltaic modules production process for environmental impact assessment or other sustainability analyses, ensure to account for the geographical specificity of the modules' use, particularly the solar radiation and peak sunshine hours in the central region of Ningxia, China. The lifespan of the PV system is 30 years, and this should be integrated into calculations of cumulative energy demand and emissions over time. Furthermore, considerations regarding the end-of-life phase should include potential recycling and reuse pathways for the aluminum and glass components of the modules.

## Review details
Inventory: The internal review was done by several iteration steps concerning raw data validation, raw data documentation, representativity, completeness and consistency of modelling with regard to ISO 14040 and 14044.

## Data sources
- Yu, Z. et al. Life cycle assessment of grid-connected power generation from metallurgical route multi-crystalline silicon photovoltaic system in China. Applied Energy 185, 68–81 (2017).
