# Soybean Refined Oil ; Soybean ; Leaching + refining ; less than 500 t - raw material/d; NESPS2 / 大豆精制油 ; 大豆 ; 浸出+精炼 ; 小于500吨-原料/天 ; 全国第二次污染普查数据

Dataset: ILCD process, Unit process, single operation
Geography: CN
Reference year: 2019
Classification: Reference Parameters / Materials production / Organic chemicals
Generated by: The data was created by the Office of the Second National Pollution Source Census of the Ministry of Ecology and Environment, and the data was organized by the TianGong Plan team for ILCD format / 生态环境部第二次全国污染源普查工作办公室创建数据，天工计划团队常慧敏整理数据为ILCD格式
Owner: Tiangong LCI Data Working Group / 天工LCI数据工作小组
Review: Dependent internal review by Tiangong LCI Data Working Group / 天工LCI数据工作小组
Amounts: no units in this file; such an amount is in the reference unit of its flow, which a separate flow dataset defines
copyright: false
licenseType: Free of charge for all users and uses

## General comment
the Technical of end-of-pipe management technology for pollution chemical oxygen demandisPhysical treatment②，Its Technical efficiency of end-of-pipe management0

## Technical purpose
该工业流程生产的大豆精炼油涉及大豆的浸出和精炼，适用于包括但不限于食品生产，餐饮业，以及作为进一步化学加工的基础原料。每天不超过500吨原料的处理能力表明其满足中等规模生产需求。详细的尾端处理技术用于处理废水、化学需氧量(COD)、总磷、石油相关废物和挥发性有机化合物(VOCs)，表明在精炼过程中采取了管理和减少环境影响的措施。

## Reference product
- soybean: 1000; input; calculated
  源文件中描述为为大豆，此处对其进行了匹配工作，将其匹配到LCAflow库里面相最符合的流，污染物指标备注为工业废水量

## Outputs
All rows: calculated
- Waste water: 518
  the Technical of end-of-pipe management technology for pollution Waste wateris/，Its Technical efficiency of end-of-pipe management0
  污染物指标工业废水量的末端治理技术是/，其效率为0，末端治理设施实际运行率（k值）计算公式为/。原文件中描述污染物类别为废水，污染物指标为工业废水量，此处对其进行了匹配工作，将其匹配到LCAflow库里面相最符合的流，污染物指标备注为工业废水量
- phosphorus, total: 0.00157251
  the Technical of end-of-pipe management technology for pollution phosphorus, totalisPhysical treatment + chemical treatment + aerobic biological treatment + anaerobic biological treatment，Its Technical efficiency of end-of-pipe management90.11
  污染物指标总磷的末端治理技术是物理处理法+化学处理法厌氧生物处理法+好氧生物处理法，其效率为90.11，末端治理设施实际运行率（k值）计算公式为k=污水处理设施年耗电量/(总额定功率(千瓦)×年运行时间(小时))。原文件中描述污染物类别为废水，污染物指标为总磷，此处对其进行了匹配工作，将其匹配到LCAflow库里面相最符合的流，污染物指标备注为总磷，产污系数备注为采用“预压榨+浸出+精炼”工艺生产的菜籽精制油/葵花籽精制油/棉籽精制油等其它精制食用植物油，选用系数表单中同规模大豆精制油的产污系数和去除效率
- phosphorus, total: 0.00203361
  the Technical of end-of-pipe management technology for pollution phosphorus, totalisPhysical treatment + chemical treatment + aerobic biological treatment①，Its Technical efficiency of end-of-pipe management87.21
  污染物指标总磷的末端治理技术是物理处理法+化学处理法+好氧生物处理法①，其效率为87.21，末端治理设施实际运行率（k值）计算公式为k=污水处理设施年耗电量/(总额定功率(千瓦)×年运行时间(小时))，①指生产非单一产品的企业。
  。原文件中描述污染物类别为废水，污染物指标为总磷，此处对其进行了匹配工作，将其匹配到LCAflow库里面相最符合的流，污染物指标备注为总磷，产污系数备注为指生产非单一产品的企业
- volatile organic compound: 2.23
  the Technical of end-of-pipe management technology for pollution volatile organic compoundis/，Its Technical efficiency of end-of-pipe management0
  污染物指标挥发性有机物的末端治理技术是/，其效率为0，末端治理设施实际运行率（k值）计算公式为/。原文件中描述污染物类别为废气，污染物指标为挥发性有机物，此处对其进行了匹配工作，将其匹配到LCAflow库里面相最符合的流，污染物指标备注为挥发性有机物
- Petroleum-related waste: 0.0049646
  the Technical of end-of-pipe management technology for pollution Petroleum-related wasteisPhysical treatment + chemical treatment + aerobic biological treatment + anaerobic biological treatment，Its Technical efficiency of end-of-pipe management94.85
  污染物指标石油类a的末端治理技术是物理处理法+化学处理法厌氧生物处理法+好氧生物处理法，其效率为94.85，末端治理设施实际运行率（k值）计算公式为k=污水处理设施年耗电量/(总额定功率(千瓦)×年运行时间(小时))。原文件中描述污染物类别为废水，污染物指标为石油类a，此处对其进行了匹配工作，将其匹配到LCAflow库里面相最符合的流，污染物指标备注为石油类a
- phosphorus, total: 0.00517227
  the Technical of end-of-pipe management technology for pollution phosphorus, totalisPhysical treatment + anaerobic biological treatment + aerobic biological treatment，Its Technical efficiency of end-of-pipe management67.47
  污染物指标总磷的末端治理技术是物理处理法+厌氧生物处理法+好氧生物处理法，其效率为67.47，末端治理设施实际运行率（k值）计算公式为k=污水处理设施年耗电量/(总额定功率(千瓦)×年运行时间(小时))。原文件中描述污染物类别为废水，污染物指标为总磷，此处对其进行了匹配工作，将其匹配到LCAflow库里面相最符合的流，污染物指标备注为总磷，产污系数备注为采用“预压榨+浸出+精炼”工艺生产的菜籽精制油/葵花籽精制油/棉籽精制油等其它精制食用植物油，选用系数表单中同规模大豆精制油的产污系数和去除效率
- Petroleum-related waste: 0.00830968
  the Technical of end-of-pipe management technology for pollution Petroleum-related wasteisPhysical treatment + chemical treatment + aerobic biological treatment①，Its Technical efficiency of end-of-pipe management91.38
  污染物指标石油类a的末端治理技术是物理处理法+化学处理法+好氧生物处理法①，其效率为91.38，末端治理设施实际运行率（k值）计算公式为k=污水处理设施年耗电量/(总额定功率(千瓦)×年运行时间(小时))，①指生产非单一产品的企业。
  。原文件中描述污染物类别为废水，污染物指标为石油类a，此处对其进行了匹配工作，将其匹配到LCAflow库里面相最符合的流，污染物指标备注为石油类a
- Petroleum-related waste: 0.0101991
  the Technical of end-of-pipe management technology for pollution Petroleum-related wasteisPhysical treatment + anaerobic biological treatment + aerobic biological treatment，Its Technical efficiency of end-of-pipe management89.42
  污染物指标石油类a的末端治理技术是物理处理法+厌氧生物处理法+好氧生物处理法，其效率为89.42，末端治理设施实际运行率（k值）计算公式为k=污水处理设施年耗电量/(总额定功率(千瓦)×年运行时间(小时))。原文件中描述污染物类别为废水，污染物指标为石油类a，此处对其进行了匹配工作，将其匹配到LCAflow库里面相最符合的流，污染物指标备注为石油类a
- phosphorus, total: 0.0159
  the Technical of end-of-pipe management technology for pollution phosphorus, totalisPhysical treatment②，Its Technical efficiency of end-of-pipe management0
  污染物指标总磷的末端治理技术是物理处理法②，其效率为0，末端治理设施实际运行率（k值）计算公式为/，①指生产非单一产品的企业。
  。原文件中描述污染物类别为废水，污染物指标为总磷，此处对其进行了匹配工作，将其匹配到LCAflow库里面相最符合的流，污染物指标备注为总磷，产污系数备注为采用“预压榨+浸出+精炼”工艺生产的菜籽精制油/葵花籽精制油/棉籽精制油等其它精制食用植物油，选用系数表单中同规模大豆精制油的产污系数和去除效率
- chemical oxygen demand: 0.053738
  the Technical of end-of-pipe management technology for pollution chemical oxygen demandisPhysical treatment + chemical treatment + aerobic biological treatment + anaerobic biological treatment，Its Technical efficiency of end-of-pipe management97.23
  污染物指标化学需氧量的末端治理技术是物理处理法+化学处理法厌氧生物处理法+好氧生物处理法，其效率为97.23，末端治理设施实际运行率（k值）计算公式为k=污水处理设施年耗电量/(总额定功率(千瓦)×年运行时间(小时))。原文件中描述污染物类别为废水，污染物指标为化学需氧量，此处对其进行了匹配工作，将其匹配到LCAflow库里面相最符合的流，污染物指标备注为化学需氧量
- Petroleum-related waste: 0.0964
  the Technical of end-of-pipe management technology for pollution Petroleum-related wasteisPhysical treatment②，Its Technical efficiency of end-of-pipe management0
  污染物指标石油类a的末端治理技术是物理处理法②，其效率为0，末端治理设施实际运行率（k值）计算公式为/，①指生产非单一产品的企业。
  。原文件中描述污染物类别为废水，污染物指标为石油类a，此处对其进行了匹配工作，将其匹配到LCAflow库里面相最符合的流，污染物指标备注为石油类a
- chemical oxygen demand: 0.098358
  the Technical of end-of-pipe management technology for pollution chemical oxygen demandisPhysical treatment + anaerobic biological treatment + aerobic biological treatment，Its Technical efficiency of end-of-pipe management94.93
  污染物指标化学需氧量的末端治理技术是物理处理法+厌氧生物处理法+好氧生物处理法，其效率为94.93，末端治理设施实际运行率（k值）计算公式为k=污水处理设施年耗电量/(总额定功率(千瓦)×年运行时间(小时))。原文件中描述污染物类别为废水，污染物指标为化学需氧量，此处对其进行了匹配工作，将其匹配到LCAflow库里面相最符合的流，污染物指标备注为化学需氧量
- chemical oxygen demand: 0.10767
  the Technical of end-of-pipe management technology for pollution chemical oxygen demandisPhysical treatment + chemical treatment + aerobic biological treatment①，Its Technical efficiency of end-of-pipe management94.45
  污染物指标化学需氧量的末端治理技术是物理处理法+化学处理法+好氧生物处理法①，其效率为94.45，末端治理设施实际运行率（k值）计算公式为k=污水处理设施年耗电量/(总额定功率(千瓦)×年运行时间(小时))，①指生产非单一产品的企业。
  。原文件中描述污染物类别为废水，污染物指标为化学需氧量，此处对其进行了匹配工作，将其匹配到LCAflow库里面相最符合的流，污染物指标备注为化学需氧量
- chemical oxygen demand: 1.94
  the Technical of end-of-pipe management technology for pollution chemical oxygen demandisPhysical treatment②，Its Technical efficiency of end-of-pipe management0
  污染物指标化学需氧量的末端治理技术是物理处理法②，其效率为0，末端治理设施实际运行率（k值）计算公式为/，①指生产非单一产品的企业。
  。原文件中描述污染物类别为废水，污染物指标为化学需氧量，此处对其进行了匹配工作，将其匹配到LCAflow库里面相最符合的流，污染物指标备注为化学需氧量

## Use advice
This dataset is derived from the Pollution Source Census Report and contains information on pollution emissions and related products. However, it does not include data on energy or chemical consumption, nor does it provide information on waste or co-product generation. When utilizing this dataset, please supplement the missing data based on actual conditions before use
该数据集来源于污染源普查报告，包含污染物排放及相关产品信息，但不包含能源或化学品消耗数据，也不提供废弃物或共生产物产生信息。在使用该数据集时，请根据实际情况补充缺失数据后再使用。

## Review details
Inventory: The internal review was done by several iteration steps concerning raw data validation, raw data documentation, representativity, completeness and consistency of modelling with regard to ISO 14040 and 14044.
清单： 内部审查通过几个迭代步骤完成，涉及原始数据验证、原始数据记录、代表性、完整性、与 ISO 14040 和 14044 有关的建模的一致性。

## Data sources
- 第二次全国污染源普查产排污核算系数手册（试用版）,二级代码13,四级代码1331文件，在完整版文件中第3413页
