# Alumina production ; Alumina for metallurgy ; Bauxite ; 2011

Dataset: ILCD process, Unit process, single operation
Geography: CN
Reference year: 2021
Classification: Unit processes / Materials production / Non-energetic raw materials
Generated by: Yuzhen Feng, fyz22
Owner: Tiangong LCI Data Working Group
Review: Dependent internal review by Tiangong LCI Data Working Group
Amounts: no units in this file; such an amount is in the reference unit of its flow, which a separate flow dataset defines
copyright: false
licenseType: Free of charge for all users and uses

## General comment
This data set pertains to the production of metallurgical grade alumina from bauxite in the year 2011. Alumina produced through this process is primarily used for the extraction of aluminum via the electrolytic Hall-Héroult process. The industrial process targets large-scale aluminum production facilities where alumina is a critical input for the smelting operation to produce pure aluminum.

## Time period
Date of publication

## Reference product
- aluminium oxide, metallurgical: 1000; software or database
  alumina

## Inputs
All rows: software or database
- soda ash, dense: 150.1
  soda ash
- Petroleum Coke: 1193.78
  Energy sources proportion of energy consumption is coal: fuel oil: coke: natural gas: coke even gas=46.0%: 11.0%: 7.1%: 14.1%: 21.7%
- coal gas: 3648.59
  (same comment as for Petroleum Coke)
- natural gas, high pressure: 2370.74
  (same comment as for Petroleum Coke)
- fuel oil, unspecified: 1849.51
  (same comment as for Petroleum Coke)
- hard coal: 7734.33
  (same comment as for Petroleum Coke)
- Water, unspecified natural origin: 3.19
  water consumption

## Data selection and combination
The data in this study refers to the LCA data of PA, SA, electricity, and other background data. The PA data were obtained from statistical data sources, and the SA data were mainly obtained from the literatures. The background data were mainly derived from the Chinese localization LCA database CAS RCEES 2018, which was established by the Research Center for Eco-Environmental Sciences, Chinese Academy of Sciences and covers LCA data for energy, materials, transportation, waste management etc.

## Use advice
When using this data for LCA studies, consider the age of the data as it reflects the technology and practices from 2011. The PA data should be treated cautiously as it is based on statistical sources that may not fully capture the specifics of the assessed industrial process. The SA data is sourced from literatures and should be checked for relevance and consistency with current processes. Background data is derived from the CAS RCEES 2018 database which provides a Chinese localized LCA perspective; care should be taken when applying this data to different geographic contexts. Additionally, users should account for any developments in technology or practice that have occurred since 2011, which could affect the accuracy of the LCA results.

## Review details
Inventory: The internal review was done by several iteration steps concerning raw data validation, raw data documentation, representativity, completeness and consistency of modelling with regard to ISO 14040 and 14044.

## Data sources
- Ding, N., Liu, N., Lu, B. & Yang, J. Life cycle greenhouse gas emissions of aluminum based on regional industrial transfer in China. J. Ind. Ecol. 25, 1657–1672 (2021).
