# Peanut production

Dataset: ILCD process, Unit process, black box
Geography: IR
Reference year: 2007
Valid until: 2008
Classification: Unit processes / Materials production / Agricultural production means
Functional unit: 1000 kg peanuts
Generated by: zhu xian, zzhu0918@163.com
Owner: Tiangong LCI Data Working Group
Review: Dependent internal review by Tiangong LCI Data Working Group
Amounts: no units in this file; such an amount is in the reference unit of its flow, which a separate flow dataset defines
copyright: false
licenseType: Free of charge for all users and uses

## General comment
Sow the seeds needed for peanut production, add fertilizers, pesticides and other substances, and complete sowing, irrigation, fertilization and harvesting by manual or mechanical means.

## Geography
Astanaye Achrafieh, located in the eastern part of Jilan province.

## Technical purpose
Peanut production in Astanaye Achrafieh, Jilan province, encompasses the cultivation process that involves planting peanut seeds, applying fertilizers and pesticides, and performing sowing, irrigation, fertilization, and harvesting activities using manual or mechanical methods. This process yields peanuts that are widely used for direct human consumption as a nutrient-rich food, for the oil extraction industry, as a snack product after roasting or processing, in confectionery, and for peanut butter production.

## Reference product
- Peanut: 2406.56; measured

## Inputs
All rows: measured
- Nitrogenous fertilizer: 16.24
- Phosphate fertilizer: 7.44
- Potassium fertilizer: 6.81
- Labor: 27.9167
- Diesel: 0.05667

## Outputs
All rows: measured
- Nitrogen oxides: 0.0611
- ammonia: 3.33
- nitrous oxide: 0.5041
- carbon dioxide (fossil): 154.71
  The original text does not distinguish between biogenic and fossil, which in the expert's judgment is fossil here.
- sulfur dioxide: 0.2267
- methane (fossil): 0.0098
  (same comment as for carbon dioxide (fossil))

## Use advice
When utilizing this dataset for Life Cycle Assessment of peanut-based products, users should carefully consider the geographical specificity of the data. The agricultural practices, yield, and inputs such as fertilizers and pesticides specific to Astanaye Achrafieh, Jilan province should be taken into account. Special attention should be given to the allocation of environmental impacts in cases where peanut production is part of a larger agricultural system or when co-products are created. Recycling or secondary usage of agricultural waste (e.g., peanut shells) should be considered in the waste management phase.

## Review details
Inventory: The internal review was done by several iteration steps concerning raw data validation, raw data documentation, representativity, completeness and consistency of modelling with regard to ISO 14040 and 14044.
