# Beneficiation of Rare Earth Elements (REE)s;Rare Earth Elements (REE);bastnaesite route;Rare Earth Elements (REE) containing ore

Dataset: ILCD process, Unit process, single operation
Geography: NMG-CN
Reference year: 2014
Classification: Unit processes / Materials production / Non-energetic raw materials
Functional unit: The functional unit of this study is the production of 1 kg of the basket REO from each corresponding mineralogical and processing route.
LCI method principle: Attributional
LCI method approaches: Allocation - market value
Generated by: Tao Wang, twang@iue.ac.cn
Owner: Tiangong LCI Data Working Group
Review: Dependent internal review by Tiangong LCI Data Working Group
Amounts: no units in this file; such an amount is in the reference unit of its flow, which a separate flow dataset defines
copyright: false
licenseType: Free of charge for all users and uses

## General comment
The industrial process outlined pertains to the beneficiation of rare earth elements (REEs) using the bastnaesite route, which involves handling ores containing REEs. This process is crucial in the production of REE-containing materials that are essential for various advanced technologies. These materials typically serve in manufacturing high-performance magnets, catalysts, alloys, glass additives, and in electronics, such as smartphones and sophisticated defense systems. The production of 1 kg of the basket of rare earth oxides (REO) is the specific outcome of interest for this industrial process.

## Technology and included processes
In this study, the REE production system was analyzed from mining up to and including solvent extraction which contains product finishing processes such as precipitation and calcination

## Reference product
- Rare Earth Oxides: 1; calculated
  LANGUAGE

## Inputs
All rows: calculated
- transport in t*km,transport in t*km: 0.303, 1.52 (2 entries)
- Sodium silicate: 0.068
- hydrogen peroxide: 0.032
  H2O5 and H102
- Electricity: 1.1988
- Raw ore: 15.15
- ammonium hydroxide: 0.047
- water: 0.0174

## Outputs
All rows: calculated
- Iron ore: 7.365
- industrial area: 1
- waste heat: 1.22
- chemical oxygen demand: 0.002272
- biological oxygen demand: 0.00157
- DOC, Dissolved Organic Carbon: 5.68e-5
- total organic carbon: 5.68e-5
- Suspended solids, unspecified,Suspended solids, unspecified: 0.00303
- thorium-232: 0.0029, 1 (2 entries)
- ammonia: 0.000379
- chromium: 1.5152e-5
- fluoride: 0.00022727
- Oils, unspecified: 7.575e-5
- phosphorus, total: 4.545e-5
- nitrogen, total (excluding N2): 0.00075757
- uranium-234: 0.022
- particles (> PM10),particles (> PM10),particles (>PM10): 0.000364
- Water: 17.4
- nickel: 5.25e-6
- mercury: 1.05e-7
- iron: 3.67e-5

## Deviations from the LCI method approaches
In this study, the REE production system was analyzed from mining up to and including solvent extraction which contains product finishing processes such as precipitation and calcination (Fig. 1). The other categories assessed in the literature review were mineral type, radioactivity, waste treatment, and co-mining. For mineral type, it was noted that the mineralogy accounted for in each study was different, which makes comparison difficult. For radioactivity, we marked with an X those studies which exemplified radioactivity flows in the LCI (if provided). For waste, we distinguished those LCIs which quantified waste treatment flows. For co-mining, since all REE are co-products of each other, this column is meant to highlight the co-products in addition to REE.

## Use advice
When utilizing the LCA dataset for the outlined REE beneficiation process, practitioners must consider the specifics of the mineralogy and processing route when applying this data to their assessments. Pay special care to the inclusion of the full lifecycle, from mining to solvent extraction which includes precipitation and calcination. It is essential to consider the varying mineral types, radioactivity levels, waste treatment procedures, and the highlight of co-products in addition to REEs. For comparison purposes, the variations in mineralogy across different studies must be noted, as direct comparisons can be challenging. The functional unit for data application is the production of 1 kg of a mixed REO basket. Ensure that any analysis involving this data corresponds accurately to these methodological parameters.

## Review details
Inventory: The internal review was done by several iteration steps concerning raw data validation, raw data documentation, representativity, completeness and consistency of modelling with regard to ISO 14040 and 14044.

## Data sources
- Bailey, G. et al. Review and new life cycle assessment for rare earth production from bastnäsite, ion adsorption clays and lateritic monazite. Resources, Conservation and Recycling 155, 104675 (2020).
