# cement production;cement, ordinary portland cement;sulfate slag

Dataset: ILCD process, Unit process, black box
Geography: JS-CN
Classification: Materials production / Other mineralic materials
Generated by: Siqi Yang, ysqsophia@gmail.com
Owner: Tiangong LCI Data Working Group
Review: Dependent internal review by Tiangong LCI Data Working Group
Amounts: no units in this file; such an amount is in the reference unit of its flow, which a separate flow dataset defines
copyright: false
licenseType: Free of charge for all users and uses

## General comment
Ordinary portland cement. Cement production unit process.

## Geography
A cement plant in Jiangsu

## Technical purpose
The ordinary Portland cement (P.O 42.5) is primarily used in construction applications for the making of concrete structures, foundations, roads, and bridges. It is suitable for general construction purposes where specific properties such as high early strength are not required.

## Model description
The functional unit is 1t P·O 42.5 Ordinary Portland cement. The system boundary of ordinary Portland cement research is determined as raw meal preparation, clinker grinding and calcination and cement preparation until the final cement storage, excluding the environmental impact of cement in the use stage and waste recycling stage.

## Reference product
- cement, ordinary portland cement: 1000
  Ordinary Portland Cement

## Inputs
- limestone, crushed, for mill: 1300
  Limestone
- sandstone: 300
  Sandstone
- Sulfate slag: 20
- hard coal; 26.3 MJ/kg: 190
  Coal
- electricity, medium voltage: 370.296
  Electricity

## Outputs
- carbon dioxide: 998.3
  CO2. Cement companies generally do not test for CO2 emissions, so an empirical formula is used, which is the CO2 emissions from burning cement clinker = 0.51 + 2.57 × standard coal consumption (t).
- sulfur dioxide: 0.55
  SO2. Emissions data for SO2, NOX, and dust needs to be obtained through monitoring.
- Nitrogen oxides: 0.843
  NOX. Emissions data for SO2, NOX, and dust needs to be obtained through monitoring.
- particles (> PM10): 2.697
  Dust, with an unspecified particle size, is treated as PM > 10 micrometers in diameter. Emissions data for SO2, NOX, and dust needs to be obtained through monitoring.

## Use advice
When utilizing this LCA dataset for ordinary Portland cement, ensure that system boundaries are consistent and include raw meal preparation, clinker grinding, calcination, and cement preparation up to final storage. Do not include environmental impacts from the use stage and waste recycling stage of the cement. For accurate assessment, datasets should be used in the context of their technological applicability and regional relevance. Adjustments may be necessary when considering technological evolution or variations in regional practices.

## Review details
Inventory: The internal review was done by several iteration steps concerning raw data validation, raw data documentation, representativity, completeness and consistency of modelling with regard to ISO 14040 and 14044.

## Data sources
- 张乐. (2009). 磷石膏基生态水泥的开发及其生命周期评价研究 [硕士, 华中科技大学].
