# Wet sand Production; sand and gravel crushing ; cone crushing technology

Dataset: ILCD process, Unit process, single operation
Geography: CS-HUN-CN
Reference year: 2020
Classification: Unit processes / Materials production / Other mineralic materials
Generated by: Cui hang, Cuihang0716@163.com
Owner: Tiangong LCI Data Working Group
Review: Dependent internal review by Tiangong LCI Data Working Group
Amounts: no units in this file; such an amount is in the reference unit of its flow, which a separate flow dataset defines
copyright: false
licenseType: Free of charge for all users and uses

## General comment
Secondary crushing, screening and processing (cone crushing)

## Technology and included processes
After jaw crushing, it is transported to cone crusher through conveyor belt for second crushing, after crushing, it enters into vibrating screen for screening, and the 1~2cm crushed stone obtained enters into finished product yard through conveyor belt, and the unqualified products larger than 2cm return to cone crusher for crushing, and sand maker enters into sand making, and the other parts are sent to sand maker through conveyor belt for sand making after screening.

## Technical purpose
The industrial process described is part of the production chain for construction aggregates, primarily used in the construction industry. The wet sand production process entails secondary crushing and processing of sandstone, where after the initial jaw crushing, a cone crusher is utilized to perform secondary crushing. The end products from this process, which include various sizes of crushed stone, are generally used in concrete mixing, road base construction, pavement manufacturing, and other construction materials that require sand and gravel as a fundamental component.

## Reference product
- gravel: 133333; measured
  Sand and gravel produced by medium crushing

## Inputs
- gravel: 166667; measured
  Sand and gravel invested in medium crushing
- Electricity: 1800; measured
  Cone Crusher Electricity Consumption

## Outputs
- Rolling gravel: 33333.3; measured
  Medium aggregate produced by medium crushing
- particles (> PM10),particles (> PM10): 16.667; measured
  Dust particles generated during production

## Use advice
When utilizing this data set for Life Cycle Assessment, attention should be given to the following methodological advisories: Ensure that the transportation of raw materials and the end products are included in the system boundaries if they are significant. Include recycling and recovery rates for the construction aggregates if applicable. Model the use phase accurately, taking into account the specific end-uses of different crushed stone sizes. Consider the energy consumption and emission outputs of the cone crushing and sand making processes. Lastly, account for any upstream or downstream processes associated with this industrial process that may impact the overall environmental footprint.

## Review details
Inventory: The internal review was done by several iteration steps concerning raw data validation, raw data documentation, representativity, completeness and consistency of modelling with regard to ISO 14040 and 14044.

## Data sources
- 年产 60 万吨机制砂建设项目环评报告
