# Soil remediation ; ex situ remediation ; biopile ; engineering implementation ; soil conditioning ; Pre-treatment Soil

Dataset: ILCD process, Unit process, single operation
Geography: KR
Reference year: 2011
Classification: Unit processes / Other Services / Repair and maintenance
Generated by: Sang Chunhui, sangch@mail.bnu.edu.cn
Owner: Tiangong LCI Data Working Group
Review: Dependent internal review by Tiangong LCI Data Working Group
Amounts: no units in this file; such an amount is in the reference unit of its flow, which a separate flow dataset defines
copyright: false
licenseType: Free of charge for all users and uses

## General comment
Add an appropriate amount of water, nutrients, and regulators to polluted soil to regulate soil moisture content, pH, and porosity.

## Technical purpose
This biopile engineering implementation process is employed for the ex situ remediation of contaminated soil. The technique involves adjusting the moisture content, pH, and porosity of the soil by adding precise amounts of water, nutrients, and conditioners. It is used to prepare and treat soil before subsequent biological degradation and is especially applicable in environmental projects where soil contamination is addressed outside of its original location.

## Reference product
- Pre-treatment Soil: 1000; estimated

## Inputs
All rows: estimated
- Tap Water: 67400
- Ammonium sulfate,Ammonium sulfate: 2708
- Potassium in potassium sulfate: 558
- Microorganism: 4.777
- Excavated soil,Excavated soil: 1000
- Hardened impermeable ground: 600

## Use advice
When utilizing this data set for Life Cycle Assessment (LCA), ensure all input materials and energy consumptions as listed in the remedial system standardization report are included in the assessment. Consider the methodological aspects such as the treatment system boundaries, scale of the operation, and geographical relevance. It’s essential to accurately account for the upstream impacts associated with the production of inputs and any onsite energy use. Additionally, if evaluating long-term effects, include the analysis of soil after the remediation process to calculate potential shifts in environmental burdens.

## Review details
Inventory: The internal review was done by several iteration steps concerning raw data validation, raw data documentation, representativity, completeness and consistency of modelling with regard to ISO 14040 and 14044.

## Data sources
- Jeong, S.-W. & Suh, S.-W. Assessment of Environmental Impacts and CO 2 Emissions from Soil Remediation Technologies using Life Cycle Assessment - Case Studies on SVE and Biopile Systems -. Journal of Korean Society of Environmental Engineers 33, 267–274 (2011).
