# Aluminum Recycling ; Recycled Aluminum Ingots ; Scrap Aluminum

Dataset: ILCD process, Unit process, single operation
Geography: CN
Reference year: 2022
Classification: Unit processes / Materials production / Metals and semimetals
Generated by: Ruoxi Xiong, xiongrx0126@163.com
Owner: Tiangong LCI Data Working Group
Review: Dependent internal review by Tiangong LCI Data Working Group
Amounts: no units in this file; such an amount is in the reference unit of its flow, which a separate flow dataset defines
copyright: false
licenseType: Free of charge for all users and uses

## General comment
Recycled aluminum ingots produced from this process are typically used in various industries, including automotive, construction, packaging, and electronics. Given the material's versatility, it may be utilized for casting, die-casting, and as a raw material for aluminum alloy production.

## Time period
Date of publication

## Reference product
- secondary aluminium ingot: 1000; missing unimportant
  recycled aluminium

## Inputs
All rows: missing unimportant
- electricity, high voltage, aluminium industry: 925.2
- hard coal: 2.47
- Petroleum Coke: 42.5
- heavy fuel oil: 82.9
- natural gas, high pressure: 22.4
  natural gas
- liquefied petroleum gas: 341

## Data selection and combination
According to the goal, scope, and system boundary definition, relevant specifications, standards, yearbooks, or other related materials are used to collect and summarize the input and output data of each stage of the life cycle.

## Use advice
Users of this data set should ensure its applicability based on the goal, scope and system boundary definition of their Life Cycle Assessment (LCA). Attention should be paid to the relevance of the data to the specified year or period, and any changes in recycling technology or industry standards since the date of publication should be considered. Users must be aware of the input and output data specific to the recycling process and should account for any possible variations due to technological advancements or regional practices.

## Review details
Inventory: The internal review was done by several iteration steps concerning raw data validation, raw data documentation, representativity, completeness and consistency of modelling with regard to ISO 14040 and 14044.

## Data sources
- Zhang, Y. et al. Life cycle assessment of pollutants and emission reduction strategies based on the energy structure of the nonferrous metal industry in China. ENERGY 261, (2022).
