# Aluminum electrolysis ; Liquid primary aluminum ; Alumina for metallurgy

Dataset: ILCD process, Unit process, single operation
Geography: HEN-CN
Reference year: 2018
Classification: Unit processes / Materials production / Metals and semimetals
Generated by: Changqing Xu, xcq@bit.edu.cn
Owner: Tiangong LCI Data Working Group
Review: Dependent internal review by Tiangong LCI Data Working Group
Amounts: no units in this file; such an amount is in the reference unit of its flow, which a separate flow dataset defines
copyright: false
licenseType: Free of charge for all users and uses

## General comment
无流程图

## Time period
Dissertation Year of Publication

## Technical purpose
The primary aluminum produced through this aluminum electrolysis process is intended for use in metallurgical applications. Its high purity makes it suitable for producing aluminum alloys, components in the automotive industry, aerospace structures, and other applications where the integrity of the metal is critical.

## Reference product
- aluminium, primary, liquid: 1000; missing unimportant
  铝液-无条目 搜不出来

## Inputs
All rows: missing unimportant
- electricity, high voltage, aluminium industry: 48391.2
- aluminium oxide, metallurgical: 1916
- anode, for metal electrolysis: 469
- Fluoride: 19
  氟化物在这里是作为输入，但是只有排放的elementary flow
- cryolite: 11.9

## Outputs
All rows: missing unimportant
- carbon dioxide (fossil),carbon dioxide (fossil): 11222
- carbon monoxide (fossil),carbon monoxide (fossil): 659
- sulfur dioxide: 16.8
- Nitrogen oxides: 26.2
- methane (fossil): 30.9
- hydrogen fluoride: 17
- particles (> PM10): 5.48
- particles (PM2.5): 3.15
- Ethane, hexafluoro-, HFC-116: 0.0034
  六氟乙烷，空气排放物
- FC-14: 0.034
  四氟化碳-无条目

## Use advice
When employing this data set for Life Cycle Assessment purposes, pay special attention to the regional specificity of the electrolysis process and potential differences in energy sources. The data set is specific to the primary production of aluminum and does not account for any secondary processes such as recycling. Ensure modeling of the use phase reflects the specific applications and potential end-of-life recycling processes.

## Review details
Inventory: The internal review was done by several iteration steps concerning raw data validation, raw data documentation, representativity, completeness and consistency of modelling with regard to ISO 14040 and 14044.

## Data sources
- 王姗姗, 刘赛男, 王灿, & 张瑞芹. 基于生命周期评价的河南省原铝生产环境影响分析. 轻金属 1-7+16 (2018)
