# Polymer Hybrid Aluminum Electrolytic Capacitors (PHAEC) Shipping ; Polymer Hybrid Aluminum Electrolytic Capacitors (PHAEC)

Dataset: ILCD process, Unit process, single operation
Geography: CN
Reference year: 2022
Classification: Unit processes / Transport services / Other transport
Generated by: Yuzhen Feng, fyz22
Owner: Tiangong LCI Data Working Group
Review: Dependent internal review by Tiangong LCI Data Working Group
Amounts: no units in this file; such an amount is in the reference unit of its flow, which a separate flow dataset defines
copyright: false
licenseType: Free of charge for all users and uses

## General comment
接着50，待定，不知道什么是Total freight volume

## Time period
Literature published on 2022-11-15 in the literature The reference year of the elementary data (alumminum ingots, separator paper, tansport, electricity, and water) is around 2016 and qcruired from the Gabi database (Version: 10.6.1.35)

## Technical purpose
Polymer Hybrid Aluminum Electrolytic Capacitors (PHAECs) are critical components in modern electronic devices, offering high capacitance and stability across a range of temperatures and frequencies. PHAECs are typically used in applications where space is a premium and high performance is required, such as in telecommunications, computing, automotive electronics, and renewable energy systems.

## Reference product
- capacitor, electrolyte type, > 2cm height: 1e6; measured

## Inputs
- transport, freight, lorry 16-32 metric ton, unregulated: 639.666; measured
- capacitor, electrolyte type, > 2cm height: 1e6; measured

## Data selection and combination
The material information and performance parameters of the three types of AECs are from the investigated manufacturer. Moreover, through the field research of several factories in the AEC industry, the original data on aluminum blank foil fabrication (made from aluminum ingots), anode/cathode foil fabrication (made from aluminum blank foil), and capacitor fabrication were obtained. Due to technical confidentiality, the LCI data of the fabrication of the cathode foil for PHAECs cannot be obtained directly from the supplier. Therefore, the manufacturing LCI of aluminum cathode foil in PHAECs is adjusted according to the coating process data of cathode foil of PAECs, considering their similarity. In the transportation stage, the data of the main raw materials from the material origin to the capacitor manufacturer and the data of the manufactured capacitor products from the manufacturer to the customers are from the supply chain system of the manufacturer. The energy consumption in the use stage is calculated based on the physical equations and the electrical parameters of the AECs. To ensure the completeness of the analysis, the data of the end-of-life stage is obtained based on the analysis and calculation.The reference year of the elementary data is around 2016. The elementary data (i.e., aluminum ingots, separator paper, transport, electricity, and water) are acquired from the Gabi database (Version: 10.6.1.35). In addition, some background data, including 3, 4-ethylene dioxythiophene (EDOT), ammonium adipate, ammonium citrate, etc., are not available in the Gabi database. They are estimated based on the chemical reactions with the material preparation process from the existing raw materials in the Gabi database. The data on the preparation process of the dispersive solution (PEDOT:PSS, 1%wt) for PHAECs' fabrication are scaled from the lab data. The detailed LCI data of the three types of AEC and unit impact of the substance flow is provided in Sheets 5–7 and Sheet 2 of Supporting Info B.

## Use advice
Users of this LCA dataset should note the reference year of the elementary data, which is approximated to be around 2016. The elementary data were derived from the Gabi database (Version 10.6.1.35) and may include assumptions and regional contexts specific to that period. It is recommended to adjust the data if applying to contexts with significant technological or regional differences from those assumed. The LCI data of the cathode foil for PHAECs have been adjusted from comparable products, so usage in critical applications should be validated with additional data if possible. When using this dataset for modeling the impact of the transport stage, the supply chain specifics and geographical considerations should be taken into account. End-of-life stage data should be utilized with an understanding of the underlying analysis and calculations. Additional materials not found in the Gabi database have been estimated and should be used with caution.

## Review details
Inventory: The internal review was done by several iteration steps concerning raw data validation, raw data documentation, representativity, completeness and consistency of modelling with regard to ISO 14040 and 14044.

## Data sources
- Zhang, C., Zheng, Y., Jing, J., Liu, Y. & Huang, H. A comparative LCA study on aluminum electrolytic capacitors: From liquid-state electrolyte, solid-state polymer to their hybrid. J. Clean. Prod. 375, (2022).
