# Mine water treatment plant ; Lignite ; Lignite ; Underground synthetic mechanization mining ; 0.3~1.2 million t/a; NESPS2 / 矿井水处理站 ; 褐煤 ; 褐煤 ; 井工综采 ; 30-120万吨/年 ; 贫水地区 ; 全国第二次污染普查数据

Dataset: ILCD process, Unit process, single operation
Geography: CN
Reference year: 2019
Classification: Reference Parameters / Energy carriers and technologies / Lignite based fuels
Generated by: The data was created by the Office of the Second National Pollution Source Census of the Ministry of Ecology and Environment, and the data was organized by the TianGong Plan team for ILCD format / 生态环境部第二次全国污染源普查工作办公室创建数据，天工计划团队常慧敏整理数据为ILCD格式
Owner: Tiangong LCI Data Working Group / 天工LCI数据工作小组
Review: Dependent internal review by Tiangong LCI Data Working Group / 天工LCI数据工作小组
Amounts: no units in this file; such an amount is in the reference unit of its flow, which a separate flow dataset defines
copyright: false
licenseType: Free of charge for all users and uses

## General comment
the Technical of end-of-pipe management technology for pollution arsenicisPhysicochemical treatment，Its Technical efficiency of end-of-pipe management85，The formula for calculating the actual operation rate (k-value) of the end-of-pipe treatment facility is k = operating time of wastewater treatment facilities / normal production time

## Technical purpose
所描述的工业过程是一个矿井水处理作业，与褐煤（褐煤）的地下合成机械化采矿有关，年产能为30万至120万吨。该过程包括专门设计的末端处理技术，用于通过物理化学方法处理被化学需氧量(COD)、石油相关废物、汞和砷污染的废水。处理后的水可能用于工业用途或在环境法规下排放。COD和石油相关废物的处理技术效率为95%，而汞和砷的效率为85%。

## Reference product
- brown coal; 11.9 MJ/kg: 1000; input; calculated
  源文件中描述为为褐煤，此处对其进行了匹配工作，将其匹配到LCAflow库里面相最符合的流

## Outputs
All rows: calculated
- Mercury: 1.35e-8
  the Technical of end-of-pipe management technology for pollution MercuryisPhysicochemical treatment，Its Technical efficiency of end-of-pipe management85
  污染物指标汞的末端治理技术是物理化学处理法，其效率为85，末端治理设施实际运行率（k值）计算公式为k=处理设施正常运行时间（天/年）/企业正常生产时间（天/年）。原文件中描述污染物类别为废水，污染物指标为汞，此处对其进行了匹配工作，将其匹配到LCAflow库里面相最符合的流
- Petroleum-related waste: 5.8e-5
  the Technical of end-of-pipe management technology for pollution Petroleum-related wasteisPhysicochemical treatment，Its Technical efficiency of end-of-pipe management95，The formula for calculating the actual operation rate (k-value) of the end-of-pipe treatment facility is k = operating time of wastewater treatment facilities / normal production time
  污染物指标石油类的末端治理技术是物理化学处理法，其效率为95，末端治理设施实际运行率（k值）计算公式为k=处理设施正常运行时间（天/年）/企业正常生产时间（天/年）。原文件中描述污染物类别为废水，污染物指标为石油类，此处对其进行了匹配工作，将其匹配到LCAflow库里面相最符合的流
- Waste water: 500
  the treatment technology for the pollution of Waste waterdidn't offered，The formula for calculating the actual operation rate (k-value) of the end-of-pipe treatment facility is k = operating time of wastewater treatment facilities / normal production time
  污染物指标工业废水量的末端治理技术未说明，末端治理设施实际运行率（k值）计算公式为k=处理设施正常运行时间（天/年）/企业正常生产时间（天/年）。原文件中描述污染物类别为废水，污染物指标为工业废水量，此处对其进行了匹配工作，将其匹配到LCAflow库里面相最符合的流
- chemical oxygen demand: 0.00225
  the Technical of end-of-pipe management technology for pollution chemical oxygen demandisPhysicochemical treatment，Its Technical efficiency of end-of-pipe management95，The formula for calculating the actual operation rate (k-value) of the end-of-pipe treatment facility is k = operating time of wastewater treatment facilities / normal production time
  污染物指标化学需氧量的末端治理技术是物理化学处理法，其效率为95，末端治理设施实际运行率（k值）计算公式为k=处理设施正常运行时间（天/年）/企业正常生产时间（天/年）。原文件中描述污染物类别为废水，污染物指标为化学需氧量，此处对其进行了匹配工作，将其匹配到LCAflow库里面相最符合的流
- arsenic: 6e-6
  the Technical of end-of-pipe management technology for pollution arsenicisPhysicochemical treatment，Its Technical efficiency of end-of-pipe management85，The formula for calculating the actual operation rate (k-value) of the end-of-pipe treatment facility is k = operating time of wastewater treatment facilities / normal production time
  污染物指标砷的末端治理技术是物理化学处理法，其效率为85，末端治理设施实际运行率（k值）计算公式为k=处理设施正常运行时间（天/年）/企业正常生产时间（天/年）。原文件中描述污染物类别为废水，污染物指标为砷，此处对其进行了匹配工作，将其匹配到LCAflow库里面相最符合的流

## Use advice
This dataset is derived from the Pollution Source Census Report and contains information on pollution emissions and related products. However, it does not include data on energy or chemical consumption, nor does it provide information on waste or co-product generation. When utilizing this dataset, please supplement the missing data based on actual conditions before use
该数据集来源于污染源普查报告，包含污染物排放及相关产品信息，但不包含能源或化学品消耗数据，也不提供废弃物或共生产物产生信息。在使用该数据集时，请根据实际情况补充缺失数据后再使用。

## Review details
Inventory: The internal review was done by several iteration steps concerning raw data validation, raw data documentation, representativity, completeness and consistency of modelling with regard to ISO 14040 and 14044.
清单： 内部审查通过几个迭代步骤完成，涉及原始数据验证、原始数据记录、代表性、完整性、与 ISO 14040 和 14044 有关的建模的一致性。

## Data sources
- 第二次全国污染源普查产排污核算系数手册（试用版）,二级代码06,三级代码62.0,四级代码620文件，在完整版文件中第26页
