# Excavation soil ; 3~10 m ; Soil ex-situ remediation ; Excavation and transportation ; Including enclosed shed construction

Dataset: ILCD process, Unit process, black box
Geography: ZB-SD-CN
Reference year: 2024
Classification: Unit processes / Other Services / Repair and maintenance
Functional unit: Excavation of 59922m3 contaminated soil. Using concrete cast-in-place piles, crown beams, and anchor cables for foundation pit support
Generated by: Yang Xintong, yangxt@caep.org.cn
Owner: Tiangong LCI Data Working Group
Review: Dependent internal review by Tiangong LCI Data Working Group
Amounts: no units in this file; such an amount is in the reference unit of its flow, which a separate flow dataset defines
copyright: false
licenseType: Free of charge for all users and uses

## General comment
Excavate contaminated soil at a depth of 3-10 meters, and transport it to a enclosed shed on site.

## Geography
The polluted site is located in Zibo City, Shandong Province, covering a total area of approximately 87800 m2.

## Technology and included processes
Using excavators and transport vehicles, excavate and transport 59922m3 of contaminated soil to a enclosed shed. Excavation process using foundation pit support

## Technical purpose
The remediation process described pertains to the excavation and ex-situ remediation of contaminated soil within a depth of 3 to 10 meters. It is typically applicable for environmental restoration projects, especially for treating polluted sites like the one in Zibo City, Shandong Province. The process uses excavators and transport vehicles for moving the soil and employs concrete cast-in-place piles, crown beams, and anchor cables for foundational pit support.

## Reference product
- contaminated soil: 59922; measured
  开挖出的污染土壤，暂存于密闭负压大棚内，待进行氧化处置

## Inputs
All rows: measured
- Electricity: 1908
- Diesel,Diesel: 198.581
- Diesel,Diesel: 0.19543
  运输环节柴油消耗，主要为设备及材料入场环节的运输过程
- Tap Water: 360
- Concrete: 510
  基坑支护过程中，混凝土灌注桩的混凝土消耗量
- Steel: 55000
  基坑支护过程中，钢材的消耗量

## Outputs
- Soil Sample: 84; measured
  污染土壤开挖过程中，基坑及侧壁采集的土壤样品。
- waste water - untreated: 2481; measured
  开挖过程产生的基坑废水，以及车辆冲洗过程产生的洗车池废水

## Use advice
This dataset should be used in the context of environmental impact assessments for soil remediation projects. Special attention should be given to the indicated depth of soil excavation, as the energy consumption and material usage will vary depending on the specific depth and volume of contaminated soil addressed. Users must account for the transportation and production of materials for foundation pit support and include the energy consumption for the operation of excavation and transportation equipment in their environmental impact calculations.

## Review details
Inventory: The internal review was done by several iteration steps concerning raw data validation, raw data documentation, representativity, completeness and consistency of modelling with regard to ISO 14040 and 14044.

## Data sources
- 桑春晖,杨欣桐,张红振等. 氰化物污染土壤修复工程环境足迹评估方法和案例研究 [J/OL]. 中国环境科学, 1-11[2024-02-11].
