# Transportation ; Wind turbine (27×3.6MW+1×5MW) ; Road transportation negligible，but using more complex fleets including anchored vessels, dredger ships, concrete mixing vessels, crane ships, and cable laying vessels, nearly 25 miles.

Dataset: ILCD process, Unit process, single operation
Geography: SH-CN
Reference year: 2009
Classification: Unit processes / Transport services / Water
Functional unit: The functional unit is 1 kWh on-grid electricity provision.
LCI method principle: Consequential
LCI method approaches: Allocation
Generated by: Yunzhi Zhao, ll10088@163.com
Owner: Tiangong LCI Data Working Group
Review: Dependent internal review by Tiangong LCI Data Working Group
Amounts: no units in this file; such an amount is in the reference unit of its flow, which a separate flow dataset defines
copyright: false
licenseType: Free of charge for all users and uses

## General comment
The Donghai Bridge Offshore Wind Farm (DBOWF) is designed for the generation of on-grid electricity utilizing wind energy. The offshore wind turbines consist of 27 units of 3.6MW and 1 unit of 5MW turbines to collectively produce renewable energy. The technical complexity of transporting heavy and large components for the wind turbines necessitates a specialized fleet comprising anchored vessels, dredger ships, concrete mixing vessels, crane ships, and cable-laying vessels. This offshore wind farm serves as a major step in increasing China's renewable energy footprint and reducing reliance on fossil fuels.

## Geography
The studied wind farm, the Donghai Bridge Offshore Wind Farm (DBOWF), is China's first offshore wind farm within the jurisdiction of Shanghai, as well as the first offshore wind farm outside Europe. The project has two-phases of construction, located on each side of the Donghai bridge (Fig. 1).

## Reference product
- Wind turbine: 28; measured
  27 3.6-MW wind turbines and one 5-MW prototype wind turbine.

## Inputs
- Diesel: 747000; calculated
- Energy, geothermal, converted: 4.99e7; calculated

## Outputs
- carbon dioxide (fossil): 3.3687e6; calculated
- particles (PM2.5): 3600; calculated
- sulfur dioxide: 5200; calculated
- nitrous oxide: 37500; calculated

## Deviations from the LCI method approaches
The present study employed the PLCA modeling approach to calculate the energy and environmental emissions of a typical offshore wind farm in China. The cradle-to-grave process includes four stages, materials and equipment manufacturing, transportation and installation, operation and maintenance, and dismantling and recycling (Fig. 2).

## Data selection and combination
The technical parameters of wind turbines, foundations and cables are obtained from the design documents of the DBOWF (Table 2). For key materials and equipment, their sea transportation energy is calculated from the transportation load and shipping energy intensity. The facility installation energy and emissions were estimated based on the construction plan. The wind farm's operation and maintenance data, such as the frequency and working time of maintenance, were obtained from site investigations with engineers and technicians. The uncertainties associated with model parameters and input data are illustrated in the sensitivity analysis section of this paper.

## Use advice
When using this LCA data set, attention should be paid to the specific stages of the wind farm's lifecycle: manufacturing of materials and equipment, transportation and installation, operation and maintenance, and dismantling and recycling. Users should apply the data pertinent to these stages accordingly in their assessments. Due to the complexities of offshore wind farm installations, modelers must account for the transportation energy and emissions associated with sea transportation as calculated from the transportation load and the energy intensity of the different specialized vessels involved. Care should be taken to include the correct parameters for the on-grid electricity provision functional unit. Sensitivity analysis should be conducted to understand the impact of data uncertainties on the overall results.

## Review details
Inventory: The internal review was done by several iteration steps concerning raw data validation, raw data documentation, representativity, completeness and consistency of modelling with regard to ISO 14040 and 14044.

## Data sources
- Yang, J. et al. The life-cycle energy and environmental emissions of a typical offshore wind farm in China. Journal of Cleaner Production 180, 316–324 (2018).
