# Coke production | coke | coking | coking coal

Dataset: ILCD process, Unit process, single operation
Geography: CN
Reference year: 2006
Classification: Materials production / Other mineralic materials
Generated by: Wanghuanyu, wanghuanyu00@126.com
Review: Dependent internal review by Tiangong LCI Data Working Group
Amounts: no units in this file; such an amount is in the reference unit of its flow, which a separate flow dataset defines

## Reference product
All rows: measured
- coke: 0.767
  焦炭z01
- coke: 0.9326
  焦炭z02
- coke: 0.3848
  焦炭z03
- coke: 0.4342
  焦炭z04
- coke: 0.377
  焦炭z05
- coke: 0.6376
  焦炭z06
- coke: 0.2178
  焦炭z07
- coke: 0.4602
  焦炭z08
- coke: 0.2214
  焦炭z09
- coke: 0.1954
  焦炭z10
- coke: 0.3986
  焦炭z11
- coke: 0.1672
  焦炭z12
- coke: 0.1332
  焦炭z13
- coke: 0.1674
  焦炭z14
- coke: 0.1842
  焦炭z15
- coke: 0.2146
  焦炭z17

## Inputs
All rows: measured
- Cleaned coal: 1461
  洗精煤z01
- Energy, geothermal, converted: 4484.06
  z01
- Cleaned coal: 1437
  洗精煤z02
- Energy, geothermal, converted: 5392.6
  z02
- Cleaned coal: 1414
  洗精煤z03
- Energy, geothermal, converted: 5568.44
  z03
- Cleaned coal: 1388
  洗精煤z04
- Energy, geothermal, converted: 5158.14
  z04
- Cleaned coal: 1447
  洗精煤z05
- Energy, geothermal, converted: 5304.68
  z05
- Cleaned coal: 1429
  洗精煤z06
- Energy, geothermal, converted: 6476.98
  z06
- Cleaned coal: 1404
  洗精煤z07
- Energy, geothermal, converted: 4952.98
  z07
- Cleaned coal: 1359
  洗精煤z08
- Energy, geothermal, converted: 4220.29
  z08
- Cleaned coal: 1386
  洗精煤z09
- Energy, geothermal, converted: 5246.06
  z09
- Cleaned coal: 1401
  洗精煤z10
- Energy, geothermal, converted: 4571.99
  z10
- Cleaned coal: 1442
  洗精煤z11
- Energy, geothermal, converted: 4923.68
  z11
- Cleaned coal: 1378
  洗精煤z12
- Energy, geothermal, converted: 4952.98
  z12
- Cleaned coal: 1395
  洗精煤z13
- Energy, geothermal, converted: 5744.29
  z13
- Cleaned coal: 1406
  洗精煤z14
- Energy, geothermal, converted: 4835.75
  z14
- hard coal: 1406
  洗精煤z15
- Cleaned coal: 4952.98
  z15
- hard coal: 1398
  洗精煤z17
- Cleaned coal: 4777.14
  z17

## Outputs
All rows: measured
- Flue dust: 0.12
  z01
- phenol,Sulphur oxides (as SO2): 0.103, 2.6e-5 (2 entries)
  z01
- cyanide: 0.000235
  z01
- Flue dust: 2.388
  z02
- phenol,Sulphur oxides (as SO2): 0.409, 0.000781 (2 entries)
  z02
- cyanide: 0.003472
  z02
- Flue dust: 2.439
  z03
- phenol,Sulphur oxides (as SO2): 0.034, 0.000281 (2 entries)
  z03
- cyanide: 0.001112
  z03
- Flue dust: 1.178, 0.06 (2 entries)
  z04
- phenol,Sulphur oxides (as SO2): 0.007821, 0.003842 (2 entries)
  z04
- Flue dust: 4.86
  z05
- phenol,Sulphur oxides (as SO2): 0.022, 0.031788 (2 entries)
  z05
- cyanide: 0.019968
  z05
- Flue dust: 2.2
  z06
- phenol,Sulphur oxides (as SO2): 0.571, 0.004661 (2 entries)
  z06
- cyanide: 0.001286
  z06
- Flue dust: 0.446
  z07
- phenol,Sulphur oxides (as SO2): 1.316, 0.000441 (2 entries)
  z07
- cyanide: 0.000184
  z07
- Flue dust: 0.037
  z08
- phenol,Sulphur oxides (as SO2): 0.017, 0.000648 (2 entries)
  z08
- cyanide: 0.000165
  z08
- Flue dust: 0.584
  z09
- phenol,Sulphur oxides (as SO2): 2.036, 0.001021 (2 entries)
  z09
- cyanide: 0.000795
  z09
- Flue dust: 0.146
  z10
- phenol,Sulphur oxides (as SO2): 0, 0.001546 (2 entries)
  z10
- cyanide: 0.003347
  z10
- Flue dust: 5.154
  z11
- phenol,Sulphur oxides (as SO2): 4.931, 0.02002 (2 entries)
  z11
- cyanide: 0.005018
  z11
- Flue dust: 2.399
  z12
- phenol,Sulphur oxides (as SO2): 2.228, 0.066878 (2 entries)
  z12
- cyanide: 0.101806
  z12
- Flue dust: 0
  z13
- phenol,Sulphur oxides (as SO2): 0, 0.140961 (2 entries)
  z13
- cyanide: 0.066907
  z13
- Flue dust: 5.071
  z14
- phenol,Sulphur oxides (as SO2): 0.563, 0.002067 (2 entries)
  z14
- cyanide: 0.001649
  z14
- Flue dust: 2.01
  z15
- phenol,Sulphur oxides (as SO2): 5.098, 0.000337 (2 entries)
  z15
- cyanide: 0.000174
  z15
- Flue dust: 4.983
  z17
- phenol,Sulphur oxides (as SO2): 0, 0.004585 (2 entries)
  z17
- cyanide: 0.002144
  z17

## Review details
Inventory: The internal review was done by several iteration steps concerning raw data validation, raw data documentation, representativity, completeness and consistency of modelling with regard to ISO 14040 and 14044.; Documentation: The review of the documentation was performed by Ecobilan and is in compliance with ISO 14040 and 14044. The data set documentation is correct in view of the appropriateness of the information provided. It includes all relevant information in view of data quality and scope of application of the respective LCI result.

## Data sources
- 1.
