# Soil Remediation;In-situ Remediation;Electric Remediation;Remediation Facility Construction;Electric Remediation Facility

Dataset: ILCD process, Unit process, single operation
Geography: IT
Reference year: 2015
Classification: Unit processes / Other Services / Repair and maintenance
Generated by: Wang Ning, wang_ning@caep.org.cn
Owner: Tiangong LCI Data Working Group
Review: Dependent internal review by Tiangong LCI Data Working Group
Amounts: no units in this file; such an amount is in the reference unit of its flow, which a separate flow dataset defines
copyright: false
licenseType: Free of charge for all users and uses

## General comment
Construction of electric restoration facilities using electrodes, PVC, PP, etc.

## Technical purpose
This electric remediation facility construction process is applied in the field of environmental engineering, specifically for in-situ soil remediation. It utilizes electrodes, PVC, PP, and other necessary materials to create facilities capable of electrically treating contaminated soils without the need to excavate and transport the material to another location.

## Reference product
- Electric restoration facilities: 1; measured

## Inputs
- Electrode,Electrodes: 176; measured
- Polyvinyl chloride: 470; measured
- Polyethylene,Polyethylene: 9; measured

## Use advice
When using the LCA data for electric remediation facility construction, users should ensure all raw material inputs and energy consumption are accurately accounted for, including the maintenance phase. The data set should exclude the remediated soil itself but include the total infrastructure required for the remedy. It's essential to capture the full life cycle of the remediation facility when assessing environmental impacts.

## Review details
Inventory: The internal review was done by several iteration steps concerning raw data validation, raw data documentation, representativity, completeness and consistency of modelling with regard to ISO 14040 and 14044.

## Data sources
- Vocciante, M., Caretta, A., Bua, L., Bagatin, R. & Ferro, S. Enhancements in ElectroKinetic Remediation Technology: Environmental assessment in comparison with other configurations and consolidated solutions. Chemical Engineering Journal 289, 123–134 (2016).
