# Remediated soil ; Ex-situ thermal treatment ; Hazardous waste incineration plant ; Incineration

Dataset: ILCD process, Unit process, black box
Geography: SI
Reference year: 2018
Classification: Unit processes / Other Services / Repair and maintenance
Functional unit: The functional unit was the management of 1.0 m3 of contaminated soil at the Old Zinc-Works site. A time horizon of 100 years was assumed.
Generated by: Yang Xintong, yangxt@caep.org.cn
Owner: Tiangong LCI Data Working Group
Review: Dependent internal review by Tiangong LCI Data Working Group
Amounts: no units in this file; such an amount is in the reference unit of its flow, which a separate flow dataset defines
copyright: false
licenseType: Free of charge for all users and uses

## General comment
The principle of incineration treatment technology is to use an incinerator to incinerate contaminated soil at a certain temperature, destroying the structure of harmful chemicals.

## Geography
This study refers to the reclamation activities that were per formed at the Old Zinc-Works site in the town of Celje (in eastern Slovenia).

## Technology and included processes
Excavated contaminated soil was removed from the site. Excavated pit was refilled by waste rock. The contaminated soil, which was excavated from the site, was assumed to be loaded onto a train, transported and thermally treated at a hazardous waste incineration plant in order to reduce the volume and mass of waste.

## Technical purpose
The remediated soil through ex-situ thermal treatment in a hazardous waste incineration plant is primarily utilized for the structural destruction of harmful chemicals within contaminated soil, recovered from historically polluted industrial sites. This process is mainly applicable in environmental reclamation projects involving the cleanup of old industrial facilities like zinc factories, where soil contamination is addressed through high-temperature incineration methods.

## Reference product
- Remediated soil: 1; estimated

## Inputs
All rows: estimated
- Diesel,Diesel: 0.00169
  Excavation of the contaminated soil
- Electricity: 90.864
  Transport of the contaminated soil to the underground waste disposal location, by rail (1000 km)
- Waste rock: 1
  Reclamation of the degraded site
- Diesel,Diesel: 0.00072
  Delivery of the ﬁll material (waste rock) (35 km)
- Diesel,Diesel: 0.00058
  Spreading and compaction of the ﬁll material
- Light fuel oil: 0.085
  Incineration of the contaminated soil
- natural gas,natural gas: 22.6
  Incineration of the contaminated soil
- Tap Water: 6.0306
  Operation of the incineration plant
- Electricity: 1009.8
  Operation of the incineration plant
- Hydrogen peroxide,Hydrogen peroxide: 0.04
  Additives for ﬂue-gas treatment at the incineration plant
- Polyelectrolyte: 28
  Additives for ﬂue-gas treatment at the incineration plant
- iron chloride: 0.38
  Additives for ﬂue-gas treatment at the incineration plant
- Hydrochloric Acid,Hydrochloric Acid: 2.1
  Additives for ﬂue-gas treatment at the incineration plant
- Activated Carbon: 5.19
  Additives for ﬂue-gas treatment at the incineration plant
- Ammonia: 8.27
  Additives for ﬂue-gas treatment at the incineration plant
- sodium hydroxide: 21.74
  Additives for ﬂue-gas treatment at the incineration plant
- Lime,Lime: 40.11
  Additives for ﬂue-gas treatment at the incineration plant
- Electricity: 17.64
  Recovery of valuable metals from the bottom ash
- Polyethylene,Polyethylene: 3.91
  Landﬁlling of residues at the underground waste disposal location
- Wooden pallet (EURO): 5.44
  Landﬁlling of residues at the underground waste disposal location
- Brick: 5.17
  Landﬁlling of residues at the underground waste disposal location
- Mortar: 0.41
  Landﬁlling of residues at the underground waste disposal location
- Electricity: 2.376
  Operation of the underground waste disposal location (illumination, ventilation)
- contaminated soil: 1

## Use advice
When utilizing this data set for environmental impact assessments or LCA studies, ensure that the incineration process is appropriately accounted for as a waste treatment method for contaminated soil. It is essential to model the transport and treatment of soil specifically from the excavation site to the incineration facility. Furthermore, include considerations for the assumptions made regarding the long-term management (100-year time horizon) of the treated soil. Data users should model the use phase behavior, taking into account the complete cycle from soil excavation to the refilling of pits with waste rock, and the subsequent disposal or reuse of incinerated material. Methodological consistency with the broader LCA framework is crucial for accurate representation.

## Review details
Inventory: The internal review was done by several iteration steps concerning raw data validation, raw data documentation, representativity, completeness and consistency of modelling with regard to ISO 14040 and 14044.

## Data sources
- Pranjić M A ,Oprčkal P ,Mladenovič A , et al. Comparative Life Cycle Assessment of possible methods for the treatment of contaminated soil at an environmentally degraded site. Journal of Environmental Management, 2018, 218 497-508.
