# Sintered bricks and building blocks, coal gangue bricks, steamed bricks, etc. ; Clay shale fly ash, coal gangue, etc. ; Screening, molding and drying, etc. ; All sizes; NESPS2 / 烧结类砖瓦及建筑砌块、煤矸石砖、蒸养砖等 ; 粘土页岩粉煤灰、煤矸石等 ; 筛分、成型干燥等 ; 所有规模 ; 全国第二次污染普查数据

Dataset: ILCD process, Unit process, single operation
Geography: CN
Reference year: 2019
Classification: Reference Parameters / Materials production / Other mineralic materials
Generated by: The data was created by the Office of the Second National Pollution Source Census of the Ministry of Ecology and Environment, and the data was organized by the TianGong Plan team for ILCD format / 生态环境部第二次全国污染源普查工作办公室创建数据，天工计划团队常慧敏整理数据为ILCD格式
Owner: Tiangong LCI Data Working Group / 天工LCI数据工作小组
Review: Dependent internal review by Tiangong LCI Data Working Group / 天工LCI数据工作小组
Amounts: no units in this file; such an amount is in the reference unit of its flow, which a separate flow dataset defines
copyright: false
licenseType: Free of charge for all users and uses

## General comment
the Technical of end-of-pipe management technology for pollution Exhaust gasis/

## Technical purpose
所描述的工业过程用于生产各种类型的砖块和建筑砌块，如烧结砖、煤矸石砖和蒸养砖。这些产品的原料包括粘土页岩、粉煤灰和煤矸石。该过程包括适合所有生产规模的筛选、成型和干燥操作。这些材料主要用于建筑行业，用于搭建结构和提供隔热性能。此外，还应用了末端污染控制技术，如布袋过滤器和其他未指明的方法，以管理和减少排放气体中的颗粒物排放，具有不同程度的效率。

## Reference product
- Sintered Brick: 10000, 10000 (2 entries); calculated
  源文件中描述为为烧结类砖瓦及建筑砌块、煤矸石砖、蒸养砖等，此处对其进行了匹配工作，将其匹配到LCAflow库里面相最符合的流，污染物指标备注为工业废气量（除窑炉外工艺废气）

## Outputs
- particles (PM2.5 - PM10): 0.0246; calculated
  the Technical of end-of-pipe management technology for pollution particles (PM2.5 - PM10)isBag filter，Its Technical efficiency of end-of-pipe management98
  污染物指标颗粒物（除窑炉外工艺废气）的末端治理技术是袋式除尘，其效率为98，末端治理设施实际运行率（k值）计算公式为k=处理设施耗电量（千瓦时/年）/（设备额定功率（千瓦）×设备运行时间（小时/年））。原文件中描述污染物类别为废气，污染物指标为颗粒物（除窑炉外工艺废气），此处对其进行了匹配工作，将其匹配到LCAflow库里面相最符合的流，污染物指标备注为颗粒物（除窑炉外工艺废气）
- particles (PM2.5 - PM10): 0.492; calculated
  the Technical of end-of-pipe management technology for pollution particles (PM2.5 - PM10)isOthers①，Its Technical efficiency of end-of-pipe management60
  污染物指标颗粒物（除窑炉外工艺废气）的末端治理技术是其他①，其效率为60，末端治理设施实际运行率（k值）计算公式为k=处理设施耗电量（千瓦时/年）/（设备额定功率（千瓦）×设备运行时间（小时/年）），①其他包括机械除尘、喷雾降尘等。。原文件中描述污染物类别为废气，污染物指标为颗粒物（除窑炉外工艺废气），此处对其进行了匹配工作，将其匹配到LCAflow库里面相最符合的流，污染物指标备注为颗粒物（除窑炉外工艺废气）
- particles (PM2.5 - PM10): 1.23; calculated
  the Technical of end-of-pipe management technology for pollution particles (PM2.5 - PM10)is/，Its Technical efficiency of end-of-pipe management0
  污染物指标颗粒物（除窑炉外工艺废气）的末端治理技术是/，其效率为0，末端治理设施实际运行率（k值）计算公式为k=处理设施耗电量（千瓦时/年）/（设备额定功率（千瓦）×设备运行时间（小时/年））。原文件中描述污染物类别为废气，污染物指标为颗粒物（除窑炉外工艺废气），此处对其进行了匹配工作，将其匹配到LCAflow库里面相最符合的流，污染物指标备注为颗粒物（除窑炉外工艺废气）
- Exhaust gas: 8290; calculated
  the Technical of end-of-pipe management technology for pollution Exhaust gasis/
  污染物指标工业废气量（除窑炉外工艺废气）的末端治理技术是/。原文件中描述污染物类别为废气，污染物指标为工业废气量（除窑炉外工艺废气），此处对其进行了匹配工作，将其匹配到LCAflow库里面相最符合的流，污染物指标备注为工业废气量（除窑炉外工艺废气）

## Use advice
This dataset is derived from the Pollution Source Census Report and contains information on pollution emissions and related products. However, it does not include data on energy or chemical consumption, nor does it provide information on waste or co-product generation. When utilizing this dataset, please supplement the missing data based on actual conditions before use
该数据集来源于污染源普查报告，包含污染物排放及相关产品信息，但不包含能源或化学品消耗数据，也不提供废弃物或共生产物产生信息。在使用该数据集时，请根据实际情况补充缺失数据后再使用。

## Review details
Inventory: The internal review was done by several iteration steps concerning raw data validation, raw data documentation, representativity, completeness and consistency of modelling with regard to ISO 14040 and 14044.
清单： 内部审查通过几个迭代步骤完成，涉及原始数据验证、原始数据记录、代表性、完整性、与 ISO 14040 和 14044 有关的建模的一致性。

## Data sources
- 第二次全国污染源普查产排污核算系数手册（试用版）,二级代码30,四级代码3031文件，在完整版文件中第3368页
