# Molten steel production;Molten steel;BOF(Z11)

Dataset: ILCD process, Unit process, single operation
Geography: CN
Reference year: 1998
Classification: Materials production / Metals and semimetals
Generated by: Fuxiang, 1162850692@qq.com
Owner: Tiangong LCI Data Working Group
Review: Dependent internal review by Tiangong LCI Data Working Group
Amounts: no units in this file; such an amount is in the reference unit of its flow, which a separate flow dataset defines
copyright: false
licenseType: Free of charge for all users and uses

## General comment
来自表 4-15 Z11 钢厂生产吨材环境负荷编目表

## Time period
论文提到钢铁企业环境总体数据为1998年的吨钢环境基础数据。

## Technical purpose
The process described is used in steel manufacturing within a steel mill using a Basic Oxygen Furnace (BOF), also referred to as a converter process (Z11). It is intended for the production of molten steel, which can be utilized to create various steel products ranging from construction materials to automotive components. This high-temperature process is designed for large-scale steel production.

## Reference product
- Crude Steel: 1050.6; measured
  crude steel

## Inputs
- Energy, geothermal, converted: 1063.19; measured
- water: 67648; measured
- Molten Iron: 1054.46; measured
  molten iron

## Outputs
All rows: measured
- Dust (unspecified, from stack): 0.163
- sulfur dioxide: 0.116
- Hydrocarbons, aliphatic, alkanes, unspecified: 0.040133
  Petro
- Suspended solids, unspecified: 0.248677
- chemical oxygen demand: 0.094344
- Dust (unspecified, from stack): 13.973
  dust collection
- Spoil (deposited, hibernating in ground, non elementary flow): 231.132

## Use advice
When utilizing this data set for Life Cycle Assessment (LCA), it is important to consider the specific technological relevance of the year the data was collected, which in this case is 1998. This data represents environmental loads for producing one ton of material at the steel plant (unit process for a single operation), and it should be adapted if the technology or efficiency of the process has changed over time. Recycling and potential environmental credits should be considered methodologically. Adjustment might be necessary to reflect current production methodologies and regional context.

## Review details
Inventory: The internal review was done by several iteration steps concerning raw data validation, raw data documentation, representativity, completeness and consistency of modelling with regard to ISO 14040 and 14044.

## Data sources
- 周和敏. 钢铁材料生产过程环境协调性评价研究. (北京工业大学, 2001).
