# Aluminum electrolysis ; Liquid primary aluminum ; Prebaking ; Alumina for metallurgy ; 2013

Dataset: ILCD process, Unit process, single operation
Geography: CN
Reference year: 2021
Classification: Unit processes / Materials production / Metals and semimetals
Generated by: Zimeng Cai, caizm6178@163.com
Owner: Tiangong LCI Data Working Group
Review: Dependent internal review by Tiangong LCI Data Working Group
Amounts: no units in this file; such an amount is in the reference unit of its flow, which a separate flow dataset defines
copyright: false
licenseType: Free of charge for all users and uses

## General comment
This process data set relates to the industrial electrolysis of aluminum to produce liquid primary aluminum with the prebaking technique using metallurgical grade alumina. It is predominantly used in the manufacturing of aluminum products and components across various industries, such as automotive, construction, electronics, and packaging industries. The data pertains to the year 2013.

## Time period
Date of publication

## Reference product
- aluminium, primary, liquid: 1000; software or database

## Inputs
All rows: software or database
- Integrated AC power consumption: 48024.5
- aluminium oxide, metallurgical: 1915.89
- fluoride salt: 19.3
- anode, prebake, for aluminium electrolysis: 415.46
- Water, unspecified natural origin: 2.15

## Data selection and combination
The data in this study refers to the LCA data of PA, SA, electricity, and other background data. The PA data were obtained from statistical data sources, and the SA data were mainly obtained from the literatures. The background data were mainly derived from the Chinese localization LCA database CAS RCEES 2018, which was established by the Research Center for Eco-Environmental Sciences, Chinese Academy of Sciences and covers LCA data for energy, materials, transportation, waste management etc.

## Use advice
When utilizing this LCA data set, users should consider the specificity of the regional data sources and technological standards of China in 2013. Ensure the context of use aligns with that of the Chinese industry practices at the time. The primary aluminum (PA) and secondary aluminum (SA) data inputs must be sourced from reputable statistical data sources or from scientific literature. Background data should be referenced from the CAS RCEES 2018 database or similar Chinese localized LCA databases, ensuring that the data matches the methodology and geographical applicability of the study. Pay particular attention to methodological aspects such as system boundaries, allocation methods, and inclusion or exclusion of recycling processes where applicable.

## Review details
Inventory: The internal review was done by several iteration steps concerning raw data validation, raw data documentation, representativity, completeness and consistency of modelling with regard to ISO 14040 and 14044.

## Data sources
- Ding, N., Liu, N., Lu, B. & Yang, J. Life cycle greenhouse gas emissions of aluminum based on regional industrial transfer in China. J. Ind. Ecol. 25, 1657–1672 (2021).
