# Electricity production ; Electricity mix ; Jiangxi

Dataset: ILCD process, Unit process, single operation
Geography: JX-CN
Reference year: 2019
Classification: Unit processes / Energy carriers and technologies / Electricity
Generated by: Ruoxi Xiong, xiongrx0126@163.com
Owner: Tiangong LCI Data Working Group
Review: Dependent internal review by Tiangong LCI Data Working Group
Amounts: no units in this file; such an amount is in the reference unit of its flow, which a separate flow dataset defines
copyright: false
licenseType: Free of charge for all users and uses

## General comment
Electricity mix includes thermal, hydro, wind, nuclear and solar generation

## Technical purpose
This dataset represents the mixed electricity production in Jiangxi which is intended for use as a power supply in a diverse range of applications, ranging from residential consumption to industrial processes. The mix includes generation from thermal, hydro, wind, nuclear, and solar sources.

## Reference product
- Electricity: 3.6; missing unimportant
  [{'text': '能量', 'type': 'text'}]

## Inputs
All rows: missing unimportant
- electricity for thermal power: 2.8805
  [{'text': '能量', 'type': 'text'}]
- electricity from hydroelectric power plant: 0.439549
  [{'text': '能量', 'type': 'text'}]
- electricity for nuclear power: 0
  [{'text': '能量', 'type': 'text'}]
- electricity from wind power: 0.133434
  [{'text': '能量', 'type': 'text'}]
- electricity for solar power: 0.146516
  [{'text': '能量', 'type': 'text'}]

## Use advice
When utilizing this dataset for Life Cycle Assessment, consider the specific proportions of thermal, hydro, wind, nuclear, and solar generation in Jiangxi's electricity mix. Users should account for temporal variations in energy source usage and regional differences in generation efficiency and environmental impact. Updates to the dataset should be followed to capture changes in the energy mix over time.

## Review details
Inventory: The internal review was done by several iteration steps concerning raw data validation, raw data documentation, representativity, completeness and consistency of modelling with regard to ISO 14040 and 14044.

## Data sources
- 能源统计年鉴2020
