# Almond production

Dataset: ILCD process, Unit process, black box
Geography: UM
Reference year: 2015
Valid until: 2016
Classification: Unit processes / Materials production / Food and renewable raw materials
Functional unit: 1 kg of raw brown-skin almond
Generated by: zhu xian, zzhu0918@163.com
Owner: Tiangong LCI Data Working Group
Review: Dependent internal review by Tiangong LCI Data Working Group
Amounts: no units in this file; such an amount is in the reference unit of its flow, which a separate flow dataset defines
copyright: false
licenseType: Free of charge for all users and uses

## General comment
Prepare seedlings for almond production, cultivate and fertilize them manually or mechanically, add fertilizers, pesticides, water, and other substances, and finally harvest almond fruits and their by-products.

## Geography
California, USA

## Time period
This data is recorded from the 7th to 25th year of almond seedling growth

## Technical purpose
The data set represents the use of almond production for the cultivation and processing of raw brown-skin almonds. These almonds can be used for direct consumption, as ingredients in food products such as confectionery, bakery goods, and healthy snacks, or further processed into almond butter, milk, oil, flour, and other almond-based products.

## Reference product
- Almond: 2309

## Inputs
All rows: measured
- Nitrogenous fertilizer: 224
- Potassium fertilizer: 224
- boron: 0.448
- zinc: 5.6
- water: 12954

## Use advice
When utilizing this data for Life Cycle Assessment, take into account that it corresponds to the inputs and outputs from the 7th to 25th year of almond seedling growth, and is recorded as such in a 'black box' unit process. This data should not be used to represent early-stage growth or post-harvest processing. Consideration should be given to system boundaries and the inclusion/exclusion of environmental impacts from the use of fertilizers, pesticides, and water. The data set is region-specific to California, USA, and should be adapted when applied to almond production in other regions.

## Review details
Inventory: The internal review was done by several iteration steps concerning raw data validation, raw data documentation, representativity, completeness and consistency of modelling with regard to ISO 14040 and 14044.

## Data sources
- Life Cycle–based Assessment of Energy Use and Greenhouse Gas Emissions in Almond Production, Part I: Analytical Framework and Baseline Results.
