# Livestock and poultry breeding ; manure treatment stage ; beef cattle scale

Dataset: ILCD process, Unit process, single operation
Geography: SD-CN
Reference year: 2014
Classification: Unit processes / Materials production / Agricultural production means
Functional unit: 1kg beef
Generated by: Rui Yang, 1632707028@qq.com
Owner: Tiangong LCI Data Working Group
Review: Dependent internal review by Tiangong LCI Data Working Group
Amounts: no units in this file; such an amount is in the reference unit of its flow, which a separate flow dataset defines
copyright: false
licenseType: Free of charge for all users and uses

## General comment
Livestock and poultry manure treatment methods include dry cleaning manure, water flushing manure, bedding material treatment. The treatment method of water flushing manure is strictly restricted by the "Water Pollution Prevention and Control Action Plan" (referred to as "Water Ten") [88] and the new "Environmental Protection Law", which shows a downward trend year by year; The bedding method has less pollutant discharge and less harm to the environment, and can be directly applied to the field after simple composting, but it is highly restricted by economic cost, and is commonly used in poultry house manure treatment. The environmental harm of dry cleaning is between the two, and the economic cost is lower [89,90].

## Geography
This study was conducted from 2014 to 2015, aiming at livestock and poultry feeding cycle, meat ratio, feed formula, feed consumption, coal and electricity consumption, etc. Has been to Shandong Gaomi Zhengda pig farm, Laixi City Zhishuang dairy farm, Jimo city Duan Bolan town Jiangjiapo village pig farm, Jimo City Liujiazhuang town livestock farm, Rizhao City Changling town Guanzhuang village, Juxian County Zhailihe town Dongxing Agriculture and animal husbandry company, Juxian Qiaoshan town east Chen dairy farm, Juxian Qiaoshan town Liu Jiayi water pig farm, Zhucheng Foreign Trade Co., LTD. Phoenix parents breeding duck farm, Xinjiang Fukang Hongfa Breeding professional cooperative, Jiuyun Street Town Xuhong laying Chicken cooperative, Jiuyun Street Town Liuyun Village self-contained breeding farm, China Australia Holding Group Co., LTD., Dezhou City Qingyun County Wayu Village, Shandong Province Qingyun County four Liu community beef cattle breeding base, Dezhou City Qingyun Qingnian chicken breeding base, Qingyun County Yongli Poultry layer breeding company, Qingyun County Xingchen youth chicken breeding Field research was carried out by professional breeding cooperatives, Qingyun Dongtai broiler breeding cooperatives, Hebei Yanshan Boyuan Feed Co., LTD., Yanshan Da Chinese Feed Co., LTD., Wudi Liuhe Feed Co., LTD., and China-Australia Oriental Hope Feed Co., LTD.

## Technology and included processes
In this paper, the life cycle of livestock and poultry farming is divided into six stages: feed crop planting, feed processing, livestock and poultry raising, manure treatment, slaughter and transportation. The specific life cycle process of livestock and poultry breeding is shown in Figure 2-1. Due to the lack of some data and the limitations of basic conditions, the production, transportation and use of pesticides, mulch and feed additives have not been analyzed, and the environmental impact caused by other related infrastructure construction, transport production and labor costs is no longer considered.

## Technical purpose
The data set describes the manure treatment stage within the livestock and poultry breeding process, with a focus on beef cattle at a scale operation. The manure treatment methods detailed include dry cleaning manure, water flushing manure, and bedding material treatment. The dry cleaning method balances environmental impact and economic cost, while the bedding method is more environmentally friendly but costlier. This data set is relevant for stakeholders in the livestock industry, especially those involved in the design, operation, and management of beef cattle breeding facilities. It can be used for environmental impact assessments, efficiency optimizations, and compliance with environmental regulations.

## Reference product
- manure: 0.1006; input; calculated
  根据文献中畜禽排放系数计算

## Outputs
- methane (biogenic): 0.00115; measured
  Beef cattle scale
- nitrous oxide: 0.0016; measured
  Beef cattle scale
- ammonia: 0.02894; measured
  Beef cattle scale

## Use advice
When using this data set for Life Cycle Assessment, users should account for the method-specific environmental and economic impacts of manure treatments in the context of beef cattle scale operations. Users should also take into consideration the regulatory environment, as the usage of water flushing manure treatment is declining due to stringent laws such as the 'Water Pollution Prevention and Control Action Plan' and the 'Environmental Protection Law'. It is advised that the data be tailored for localized scenarios, taking into account differences in resource consumption and environmental impact among the various farms and treatment methods highlighted in the study from 2014 to 2015. The appropriateness of the data should be critically evaluated for relevance to current conditions as regulations and technological practices may have evolved since the time of the study.

## Review details
Inventory: The internal review was done by several iteration steps concerning raw data validation, raw data documentation, representativity, completeness and consistency of modelling with regard to ISO 14040 and 14044.

## Data sources
- 周景月. 基于生命周期评价的畜禽养殖环境影响分析. (青岛科技大学, 2017).
