# Groundwater remediation ; In-situ remediation ; Adsorption ; Preparation of adsorbents ; Drying

Dataset: ILCD process, Unit process, single operation
Geography: ID
Reference year: 2022
Classification: Unit processes / Other Services / Repair and maintenance
Generated by: Xiao Meng, xiaomeng@mail.bnu.edu.cn
Owner: Tiangong LCI Data Working Group
Review: Dependent internal review by Tiangong LCI Data Working Group
Amounts: no units in this file; such an amount is in the reference unit of its flow, which a separate flow dataset defines
copyright: false
licenseType: Free of charge for all users and uses

## General comment
The precipitate will be dried in an oven at 105°C for 24 hours. The particles will be randomly prepared in cylindrical shape.

## Technical purpose
This process is utilized for the preparation of adsorbents specifically for in-situ groundwater remediation applications. The adsorbents, which are in the form of dried cylindrical particles, are designed to remove contaminants from the groundwater through the process of adsorption.

## Reference product
- Aluminium hydroxide/oxide nanoparticles adsorption (Drying): 3.06; measured
  Dry Adsorbent

## Inputs
- Aluminium hydroxide/oxide nanoparticles adsorption (Electrolysis; prepeard; in water): 8.5; measured
  Wet Adsorbent
- Electricity: 23.328; measured

## Outputs
- water vapour: 6; measured

## Use advice
When using this data, ensure that the drying temperature of 105°C for the cylindrical adsorbent particles is consistent with the intended application's temperature tolerance. Consider the specific contaminant types and concentrations this adsorbent is designed for, as well as the required adsorption capacity and duration. Apply this data accordingly to scenarios with similar operational conditions and environmental standards.

## Review details
Inventory: The internal review was done by several iteration steps concerning raw data validation, raw data documentation, representativity, completeness and consistency of modelling with regard to ISO 14040 and 14044.

## Data sources
- Goyal, H. & Mondal, P. Life cycle assessment (LCA) of the arsenic and fluoride removal from groundwater through adsorption and electrocoagulation: A comparative study. Chemosphere 304, 135243 (2022).
