# Ethylene Production ; Ethylene ; Naphtha Route ; Naphtha

Dataset: ILCD process, Unit process, black box
Geography: CN
Reference year: 2010
Classification: Unit processes / Energy carriers and technologies / Energetic raw materials
Functional unit: The functional unit is 1t of ethylene product
LCI method principle: Attributional
LCI method approaches: Allocation - mass
Generated by: Yanan Ren, renyn15@tsinghua.org.cn
Owner: Tiangong LCI Data Working Group
Review: Dependent internal review by Tiangong LCI Data Working Group
Amounts: no units in this file; such an amount is in the reference unit of its flow, which a separate flow dataset defines
copyright: false
licenseType: Free of charge for all users and uses

## General comment
In 2010, 4 million-ton enterprises of Sinopec and PetroChina; ethylene complex, by-product propylene

## Geography
Four million-ton enterprises of Sinopec and PetroChina in 2010

## Technology and included processes
There are many raw materials for ethylene production in my country and the sources are complex, mainly including naphtha, cracked tail oil, ethylene-rich gas and liquefied petroleum gas, etc. Therefore, this study mainly investigates the tube furnace steam cracking method for ethylene production, and the upstream raw materials are four products of petroleum refining.

## Technical purpose
This dataset describes the process of ethylene production using the naphtha route, where naphtha and other petroleum refining products such as cracked tail oil, ethylene-rich gas, and liquefied petroleum gas are used as feedstock. The data is applicable to industrial ethylene production facilities, particularly those using tube furnace steam cracking methods. Ethylene produced using this process serves as a raw material for various chemicals and plastics fabrication. The by-product, propylene, has its own set of industrial applications, typically in the production of polypropylene and propylene oxide.

## Model description
According to the literature (IPCC, 2006; China Petroleum and Chemical Corporation, 2007), the cooling water, purified air, etc. are discounted, and the unknown pollutant CO2 is estimated

## Reference product
- ethene (ethylene): 1000; measured
  Ethylene

## Inputs
All rows: measured
- naphtha: 700
- tall oil: 230
  Add cracked tail oil
- LPG - liquefied petroleum gas: 50
  Liquefied gas
- ethene (ethylene): 30
  Ethylene-rich gas
- Electricity: 137.484
  electricity
- light fuel oil: 126.13
  fuel oil
- natural gas: 53.87
  fuel gas

## Outputs
- carbon dioxide (fossil): 560; missing unimportant
  CO2
- carbon monoxide (fossil): 0.03079; measured
  CO
- sulfur dioxide: 1.36854; measured
  SO2
- nitrogen monoxide: 0.30795; measured
  NOx
- methane (fossil): 0.01854; measured
  CH4
- nitrous oxide: 0.00331; measured
  N2O
- Suspended solids, unspecified,Suspended solids, unspecified: 0.31159; measured
  TSP
- Water: 92.72; measured
  wastewater
- chemical oxygen demand: 0.0053; measured
  COD
- ammonia: 0.00033; measured
  NH3-N
- Oils, unspecified: 0.00033; measured
  Oil
- Suspended solids, unspecified,Suspended solids, unspecified: 0.00464; measured
  SS

## Deviations from the LCI method approaches
According to the distribution principle of product mass proportion

## Data selection and combination
The inventory of raw material input, product output, energy consumption and pollutant discharge for ethylene production comes from the 4 million-ton enterprises of Sinopec and PetroChina in 2010.

## Use advice
When utilizing this dataset for Life Cycle Assessment (LCA) purposes, users should consider the methodology outlined for allocation based on product mass proportion. The functional unit provided is 1 ton of ethylene product; LCA studies should be normalized to this unit for consistency. Inputs such as cooling water and purified air should be weighted according to the standards provided by the indicated literature. CO2 emissions, as an unidentified pollutant, must be estimated as per guidance from the IPCC and China Petroleum and Chemical Corporation. Care should be taken to ensure that data is contextually relevant, considering the technological level of the year 2010 and region-specific practices of Sinopec and PetroChina's million-ton enterprises.

## Review details
Inventory: The internal review was done by several iteration steps concerning raw data validation, raw data documentation, representativity, completeness and consistency of modelling with regard to ISO 14040 and 14044.

## Data sources
- 赵志仝, 王峰, 赵宁, 李学宽, 魏伟, 孙予罕. 生命周期评价在我国乙烯行业环境评估中的应用. 环境科学学报 34, 3200–3206 (2014).
