# Groundwater remediation;In-situ;Permeable Reactive Barriers; Gate construction

Dataset: ILCD process, Unit process, single operation
Geography: US
Reference year: 2011
Classification: Other Services / Repair and maintenance
Generated by: Zhang Jianbin, zhangjb@caep.org.cn
Owner: Tiangong LCI Data Working Group
Review: Dependent internal review by Tiangong LCI Data Working Group
Amounts: no units in this file; such an amount is in the reference unit of its flow, which a separate flow dataset defines
copyright: false
licenseType: Free of charge for all users and uses

## General comment
Excavating soil lnstalling caissons (forcaisson method )sheetpiles (for trench method) Backfilling soil and sand Removing caissons (forcaisson method )sheetpiles (for trench method)

## Geography
in Dover Air Force Base.

## Technology and included processes
four 2.4 m diameter cylindrical gates

## Technical purpose
The data set describes an industrial groundwater remediation process, specifically an in-situ treatment using Permeable Reactive Barriers (PRBs) with gate construction at the Dover Air Force Base. This technology is commonly applied in environmental engineering to contain and treat contaminated groundwater, preventing the spread of pollutants and protecting water resources. It involves the construction of a permeable barrier through which groundwater can flow and undergo treatment via physical, chemical, or biological processes. The reactive materials in the barrier are selected based on the type and nature of contaminants present in the groundwater.

## Reference product
- Water diversion gate: 1; measured

## Inputs
- Steel sections: 37200; measured
- sand: 72100; measured
- soil: 21499; measured
- Primary energy: 731000; measured

## Use advice
Users of this data set should consider the specific ground conditions, types of contaminants, and concentration levels at the site when applying this data to similar environmental engineering projects. Careful attention should be given to the design, construction, and maintenance of the Permeable Reactive Barrier to ensure its effectiveness over time. When modeling the use phase, account for potential changes in contaminant profiles and hydrogeological conditions. Exclude recycling processes from this data set, as it is focused solely on the installation and initial function of the PRBs. Discussions with local environmental authorities may also be necessary to determine site-specific guidelines and regulations.

## Review details
Inventory: The internal review was done by several iteration steps concerning raw data validation, raw data documentation, representativity, completeness and consistency of modelling with regard to ISO 14040 and 14044.

## Data sources
- Mark S. H. Mak and Irene M. C. Lo.Environmental Life Cycle Assessment of Permeable Reactive Barriers: Effects of Construction Methods, Reactive Materials and Groundwater Constituents[J].Environmental Science & Technology 2011, 45, 23, 10148-10154
