# Sinter production;Sinter;Sintering

Dataset: ILCD process, Unit process, single operation
Geography: CN
Reference year: 2014
Classification: Unit processes / Materials production / Other mineralic materials
Generated by: Fuxiang, 1162850692@qq.com
Owner: Tiangong LCI Data Working Group
Review: Dependent internal review by Tiangong LCI Data Working Group
Amounts: no units in this file; such an amount is in the reference unit of its flow, which a separate flow dataset defines
copyright: false
licenseType: Free of charge for all users and uses

## General comment
The sinter production process, as represented by this dataset, relates to the agglomeration of fine iron ore particles into a coarse grained material suitable for use in blast furnace iron-making. This dataset is based on operational data from Plant A's sintering unit in 2014 and is typically utilized for improving efficiency and environmental performance in the iron and steel industry.

## Time period
基于 A 钢厂 2014 年的生产数据进行计算和分析对比。

## Reference product
- Sinter: 1211; measured

## Inputs
All rows: measured
- quicklime: 121.36
- dolomite: 93.2
- Limestone: 72.91
- coke,Coke: 49.35
  Coke
- Electricity: 158.4
- Iron ore: 1340
  iron ore
- Electricity: 115.2
  Waste heat power generation
- Sinter: 347
  Sintering return ore
- Blast furnace gas: 53
  blast furnace gas

## Outputs
- Sinter: 347; measured
  Sintering return ore
- carbon dioxide (fossil): 513400; measured
  原文未区分bio和fossil，根据专家判断此处为fossil
- methane: 50; measured
- nitrous oxide: 2; measured

## Use advice
When using this dataset for life cycle assessment or other sustainability studies, users should ensure that the system boundaries are clearly defined to include necessary upstream and downstream processes. Comparisons with other sintering datasets should consider temporal and geographical relevance. Any extrapolation or modification of the data should be documented with methodological justifications.

## Review details
Inventory: The internal review was done by several iteration steps concerning raw data validation, raw data documentation, representativity, completeness and consistency of modelling with regard to ISO 14040 and 14044.

## Data sources
- 刘宏强, 付建勋, 刘思雨, 谢欣悦, & 杨笑楹. 钢铁生产过程二氧化碳排放计算方法与实践. 钢铁 51, 74–82 (2016).
