# Downhole operations ; Well washing liquid (Water) ; Low-permeability well washing operations ; All sizes; NESPS2 / 井下作业 ; 洗井液（水） ; 低渗透油井洗井作业 ; 所有规模 ; 全国第二次污染普查数据

Dataset: ILCD process, Unit process, single operation
Geography: CN
Reference year: 2019
Classification: Reference Parameters / Energy carriers and technologies / Heat and steam
Generated by: The data was created by the Office of the Second National Pollution Source Census of the Ministry of Ecology and Environment, and the data was organized by the TianGong Plan team for ILCD format / 生态环境部第二次全国污染源普查工作办公室创建数据，天工计划团队常慧敏整理数据为ILCD格式
Owner: Tiangong LCI Data Working Group / 天工LCI数据工作小组
Review: Dependent internal review by Tiangong LCI Data Working Group / 天工LCI数据工作小组
Amounts: no units in this file; such an amount is in the reference unit of its flow, which a separate flow dataset defines
copyright: false
licenseType: Free of charge for all users and uses

## General comment
the Technical of end-of-pipe management technology for pollution chemical oxygen demandis③Filter separation/floating separation + bio-contact oxidation process，Its Technical efficiency of end-of-pipe management88*

## Technical purpose
该数据集描述了石油行业在各种规模的低渗透油井井下作业和用水洗井过程中使用的各种末端处理技术。详细解释了这些技术在处理化学需氧量和石油相关废物污染方面的应用。其中包括物理、化学和生物处理方法的组合，例如物理和化学处理后的回注，过滤和浮选分离与生物接触氧化相结合，以及使用水力旋流器分离，随后进行脱气、除油和排放等后续处理步骤。

## Reference product
- Underground Work: 1; calculated
  源文件中描述为为井下作业，此处对其进行了匹配工作，将其匹配到LCAflow库里面相最符合的流，污染物指标备注为化学需氧量

## Outputs
All rows: calculated
- chemical oxygen demand: 0
  the Technical of end-of-pipe management technology for pollution chemical oxygen demandis①Physical + chemical + reinjection，Its Technical efficiency of end-of-pipe management100
  污染物指标化学需氧量的末端治理技术是①物理+化学+回注，其效率为100，末端治理设施实际运行率（k值）计算公式为k=污水治理设施运行时间（小时/年）/正常生产时间（小时/年）。原文件中描述污染物类别为废水，污染物指标为化学需氧量，此处对其进行了匹配工作，将其匹配到LCAflow库里面相最符合的流，污染物指标备注为化学需氧量
- chemical oxygen demand: 0
  the Technical of end-of-pipe management technology for pollution chemical oxygen demandis②Physical + reinjection，Its Technical efficiency of end-of-pipe management100
  污染物指标化学需氧量的末端治理技术是②物理+回注，其效率为100，末端治理设施实际运行率（k值）计算公式为k=污水治理设施运行时间（小时/年）/正常生产时间（小时/年）。原文件中描述污染物类别为废水，污染物指标为化学需氧量，此处对其进行了匹配工作，将其匹配到LCAflow库里面相最符合的流，污染物指标备注为化学需氧量
- Petroleum-related waste: 0
  the Technical of end-of-pipe management technology for pollution Petroleum-related wasteis①Physical + chemical + reinjection，Its Technical efficiency of end-of-pipe management100
  污染物指标石油类的末端治理技术是①物理+化学+回注，其效率为100，末端治理设施实际运行率（k值）计算公式为k=污水治理设施运行时间（小时/年）/正常生产时间（小时/年）。原文件中描述污染物类别为废水，污染物指标为石油类，此处对其进行了匹配工作，将其匹配到LCAflow库里面相最符合的流，污染物指标备注为石油类
- Petroleum-related waste: 0
  the Technical of end-of-pipe management technology for pollution Petroleum-related wasteis②Physical + reinjection，Its Technical efficiency of end-of-pipe management100
  污染物指标石油类的末端治理技术是②物理+回注，其效率为100，末端治理设施实际运行率（k值）计算公式为k=污水治理设施运行时间（小时/年）/正常生产时间（小时/年）。原文件中描述污染物类别为废水，污染物指标为石油类，此处对其进行了匹配工作，将其匹配到LCAflow库里面相最符合的流，污染物指标备注为石油类
- Waste water: 27130
  the Technical of end-of-pipe management technology for pollution Waste wateris/
  污染物指标工业废水量的末端治理技术是/，末端治理设施实际运行率（k值）计算公式为/。原文件中描述污染物类别为废水，污染物指标为工业废水量，此处对其进行了匹配工作，将其匹配到LCAflow库里面相最符合的流，污染物指标备注为工业废水量
- Petroleum-related waste: 0.24488
  the Technical of end-of-pipe management technology for pollution Petroleum-related wasteis③Filter separation/floating separation + bio-contact oxidation process，Its Technical efficiency of end-of-pipe management96*
  污染物指标石油类的末端治理技术是③过滤分离/上浮分离+生物接触氧化法，其效率为96*，末端治理设施实际运行率（k值）计算公式为k=污水治理设施运行时间（小时/年）/正常生产时间（小时/年）。原文件中描述污染物类别为废水，污染物指标为石油类，此处对其进行了匹配工作，将其匹配到LCAflow库里面相最符合的流，污染物指标备注为石油类
- Petroleum-related waste: 1.59172
  the Technical of end-of-pipe management technology for pollution Petroleum-related wasteis⑥Hydrocyclone + filter + discharge，Its Technical efficiency of end-of-pipe management74③
  污染物指标石油类的末端治理技术是⑥水力旋流器＋过滤器＋排放，其效率为74③，末端治理设施实际运行率（k值）计算公式为k=污水治理设施运行时间（小时/年）/正常生产时间（小时/年），③污水排放标准为《海洋石油勘探开发污染物排放浓度限值》（GB4914-2008）中“石油类”一级排放浓度限值20mg/L，使用该治理技术。。原文件中描述污染物类别为废水，污染物指标为石油类，此处对其进行了匹配工作，将其匹配到LCAflow库里面相最符合的流，污染物指标备注为石油类
- Petroleum-related waste: 3.61198
  the Technical of end-of-pipe management technology for pollution Petroleum-related wasteis④Hydrocyclone + degassing and oil removal tank + discharge，Its Technical efficiency of end-of-pipe management41②
  污染物指标石油类的末端治理技术是④水力旋流器＋脱气除油罐＋排放，其效率为41②，末端治理设施实际运行率（k值）计算公式为k=污水治理设施运行时间（小时/年）/正常生产时间（小时/年），②污水排放标准为《海洋石油勘探开发污染物排放浓度限值》（GB4914-2008）中“石油类”二级排放浓度限值45mg/L，使用该治理技术。
  ，②污水排放标准为《海洋石油勘探开发污染物排放浓度限值》（GB4914-2008）中“石油类”二级排放浓度限值45mg/L，使用该治理技术。。原文件中描述污染物类别为废水，污染物指标为石油类，此处对其进行了匹配工作，将其匹配到LCAflow库里面相最符合的流，污染物指标备注为石油类
- Petroleum-related waste: 3.61198
  the Technical of end-of-pipe management technology for pollution Petroleum-related wasteis⑤Buffer tank + hydrocyclone + discharge，Its Technical efficiency of end-of-pipe management41②
  污染物指标石油类的末端治理技术是⑤缓冲罐＋水力旋流器＋排放，其效率为41②，末端治理设施实际运行率（k值）计算公式为k=污水治理设施运行时间（小时/年）/正常生产时间（小时/年），②污水排放标准为《海洋石油勘探开发污染物排放浓度限值》（GB4914-2008）中“石油类”二级排放浓度限值46mg/L，使用该治理技术。
  ，②污水排放标准为《海洋石油勘探开发污染物排放浓度限值》（GB4914-2008）中“石油类”二级排放浓度限值45mg/L，使用该治理技术。。原文件中描述污染物类别为废水，污染物指标为石油类，此处对其进行了匹配工作，将其匹配到LCAflow库里面相最符合的流，污染物指标备注为石油类
- chemical oxygen demand: 4.16148
  the Technical of end-of-pipe management technology for pollution chemical oxygen demandis③Filter separation/floating separation + bio-contact oxidation process，Its Technical efficiency of end-of-pipe management88*
  污染物指标化学需氧量的末端治理技术是③过滤分离/上浮分离+生物接触氧化法，其效率为88*，末端治理设施实际运行率（k值）计算公式为k=污水治理设施运行时间（小时/年）/正常生产时间（小时/年）。原文件中描述污染物类别为废水，污染物指标为化学需氧量，此处对其进行了匹配工作，将其匹配到LCAflow库里面相最符合的流，污染物指标备注为化学需氧量

## Use advice
This dataset is derived from the Pollution Source Census Report and contains information on pollution emissions and related products. However, it does not include data on energy or chemical consumption, nor does it provide information on waste or co-product generation. When utilizing this dataset, please supplement the missing data based on actual conditions before use
该数据集来源于污染源普查报告，包含污染物排放及相关产品信息，但不包含能源或化学品消耗数据，也不提供废弃物或共生产物产生信息。在使用该数据集时，请根据实际情况补充缺失数据后再使用。

## Review details
Inventory: The internal review was done by several iteration steps concerning raw data validation, raw data documentation, representativity, completeness and consistency of modelling with regard to ISO 14040 and 14044.
清单： 内部审查通过几个迭代步骤完成，涉及原始数据验证、原始数据记录、代表性、完整性、与 ISO 14040 和 14044 有关的建模的一致性。

## Data sources
- 第二次全国污染源普查产排污核算系数手册（试用版）,二级代码11,四级代码1120文件，在完整版文件中第3413页
