# waste Polyvinyl chloride recycling; the recycled Polyvinyl chloride; mechanical recycling ; waste Polyvinyl chloride

Dataset: ILCD process, Unit process, black box
Geography: TJ-CN
Reference year: 2016
Valid until: 2016
Classification: Unit processes / End-of-life treatment / Material recycling
Functional unit: 1 ton of waste Polyvinyl chloride
Generated by: Xiaoyu Cheng, xiaoyucheng@email.ncu.edu.cn
Owner: Tiangong LCI Data Working Group
Review: Dependent internal review by Tiangong LCI Data Working Group
Amounts: no units in this file; such an amount is in the reference unit of its flow, which a separate flow dataset defines
copyright: false
licenseType: Free of charge for all users and uses

## General comment
After calibration, the respective process data in 2016 were selected to assess the environmental impacts of mechanical recycling of waste plastics.

## Geography
The ZEDA is located in southwest of Tianjin, which is the largest renewable resource processing industrial park in China.

## Time period
The literature only states that it was in 2016.

## Technical purpose
Mechanically recycled polyvinyl chloride (PVC) from the waste PVC recycling process is typically utilized in the manufacturing of various plastic products, where the purity and properties of the recycled PVC meet the requirements. These applications include construction materials, such as piping and window frames, as well as consumer goods, such as packaging and automotive parts.

## Reference product
- Waste Polyvinyl Chloride: 1000; input; measured

## Inputs
- Water for industrial use: 453; measured
- Electricity: 974.952; measured
- natural gas; 44.1 MJ/kg: 62.5; measured

## Outputs
All rows: measured
- particles (>PM10): 0.62
- non-methane volatile organic compounds: 0.45
- Suspended solids, unspecified,Suspended solids, unspecified: 0.00896
- chemical oxygen demand: 0.1057
- biological oxygen demand: 0.01673
- Ammonia Nitrogen: 0.00651
- Phosphorus: 0.00028
- Oils, unspecified: 0.0001
- waste water - untreated: 372
- General Solid Waste: 96.23
- Hazardous Solid Waste: 3.12
- Recycled Polyvinyl chloride granules: 899.6

## Data selection and combination
In 2016, the recycled plastics production was 327 kilotons, covering all major categories of plastics.

## Data treatment and extrapolations
calibration

## Use advice
When using the 2016 calibrated process data for the environmental impact assessment of mechanical recycling of waste PVC, ensure that the system boundaries are correctly defined to include upstream processes (such as collection and transportation of waste PVC) and downstream processes (such as manufacturing with the recycled material). Attention should be given to the dataset quality, which should represent the actual process conditions of ZEDA in Tianjin, China. Data users should also consider the methodological consistency with other life cycle data used in the assessment and include necessary adjustments for technology developments or changes in processing efficiency since 2016.

## Review details
Inventory: The internal review was done by several iteration steps concerning raw data validation, raw data documentation, representativity, completeness and consistency of modelling with regard to ISO 14040 and 14044.

## Data sources
- Chen, Y. et al. Life cycle assessment of end-of-life treatments of waste plastics in China. Resources, Conservation and Recycling 146, 348–357 (2019).
