# Municipal sludge treatment and disposal;dry sludge;cement manufacturing

Dataset: ILCD process, Unit process, single operation
Geography: CN
Classification: Unit processes / End-of-life treatment / Waste water treatment
Functional unit: One ton of sludge on a dry basis (1 t-DS) is defined as the functional unit.
Generated by: Jin Sitian, 2331276@tongji.edu.cn
Owner: Tiangong LCI Data Working Group
Review: Dependent internal review by Tiangong LCI Data Working Group
Amounts: no units in this file; such an amount is in the reference unit of its flow, which a separate flow dataset defines
copyright: ['opt4ROkqig']
licenseType: Free of charge for all users and uses

## General comment
Several typical sludge treatment facilities in China, representing anaerobic digestion, composting, co-combustion, thermal drying-incineration, and cement production, respectively, are selected to carry out the inventory. Data are mainly taken from the site-specific measurement, either by field survey or by operation report. Sludge characteristics are based on the average values of the sites investigated.

## Technology and included processes
Sludge is first dried to 15% using the waste heat from the rotary kiln. Afterward, it is combusted at 1400 °C with other feedstock (1.6 tons of coal, 15.8 tons of limestone, 1.6 tons of iron ore, and 1.4 tons of clay per dried ton of sludge) to produce cement.

## Technical purpose
The dried sludge referred to in this Life Cycle Assessment data is intended for utilization in the cement manufacturing process as an alternative fuel or raw material (AFR). The process data represents the treatment and disposal of municipal sludge which, after being dried, is utilized within the cement industry to either partially replace conventional fuels or serve as a supplement to raw materials due to its calorific value and material composition.

## Reference product
- Sludge: 1000; input; estimated
  a dry basis (1 t-DS)

## Inputs
All rows: measured
- Electricity: 2640.6
- Diesel: 0.2
- hard coal; 26.3 MJ/kg: 1600
- Limestone: 15800
- iron: 1600
  iron ore

## Outputs
- cement, unspecified: 12700; measured

## Use advice
When applying this data within a Life Cycle Assessment framework, users should ensure that the functional unit of one ton of dry sludge (1 t-DS) is consistently used throughout their analysis to maintain accuracy. Attention should be paid to any potential differences in sludge characteristics specific to the region or the processing facility in question. Additionally, users must consider any environmental impacts associated with the transportation of sludge to the cement plant, as well as the emissions resulting from the co-processing of sludge in the cement manufacturing process.

## Review details
Inventory: The internal review was done by several iteration steps concerning raw data validation, raw data documentation, representativity, completeness and consistency of modelling with regard to ISO 14040 and 14044.

## Data sources
- Dong, J., Chi, Y., Tang, Y., Wang, F. & Huang, Q. Combined Life Cycle Environmental and Exergetic Assessment of Four Typical Sewage Sludge Treatment Techniques in China. Energy Fuels 28, 2114–2122 (2014).
