# primary copper smelting;Refined copper;flash smelting;copper concentrate

Dataset: ILCD process, Unit process, single operation
Geography: CN
Reference year: 2018
Classification: Unit processes / Materials production / Metals and semimetals
Functional unit: The production of 1000 kg of refined copper (99.99% cathode copper) was selected as the FU in this paper” (Chen 等, 2019, p. 36)
LCI method principle: Attributional
LCI method approaches: Allocation - market value
Generated by: Peng Wang, 2867919560@qq.com
Owner: Tiangong LCI Data Working Group
Review: Dependent internal review by Tiangong LCI Data Working Group
Amounts: no units in this file; such an amount is in the reference unit of its flow, which a separate flow dataset defines
copyright: false
licenseType: Free of charge for all users and uses

## General comment
The primary copper smelting process described by this data set refers to the conversion of copper concentrate into refined copper (99.99% cathode copper) through the flash smelting technique, which is associated with energy and resource usage, as well as pollution generation. This refined copper is used across various industries, including electronics, construction, transportation, and manufacturing of copper-based products.

## Geography
Resources, energy consumption and pollution data of primary copper production were collected mainly from the survey of production technology and typical enterprises in this study.

## Technology and included processes
flash smelting and converting were collectively called smelting.

## Reference product
- Refined copper: 1000; measured
  Refined copper needs to be supplemented

## Inputs
- crude oil; 42.3 MJ/kg: 40; software or database
  Crude oil (resource)
- hard coal,hard coal,hard coal: 1140; software or database
  Hard coal (resource)
- natural gas; 44.1 MJ/kg: 53.2; software or database
  Natural gas (resource)
- Copper ore: 197000; measured
- Copper scrap（Cu 95%）,Copper scrap（Cu 95%）: 0; measured
  Copper scrap needs to be supplemented
- freshwater,freshwater: 29600; measured
  Fresh water
- Butyl xanthate: 7.93; measured
  Butyl xanthate needs supplementation
- Pine camphor oil: 4.96; measured
  Pine camphor oil needs to be supplemented
- Limestone: 210; software or database
- quartz sand: 518; software or database
  Quartz sand
- Soften water: 3360; measured
  Soften water needs to be supplemented with flow
- Industrial oxygen: 1010; measured
  Industrial oxygen needs to supplement flow
- Refractory material: 13.3; measured
  Refractory material needs to be supplemented with flow
- hydrogen chloride: 0.48; measured
- Sulfuric acid(98%): 6.5; measured
  Sulfuric acid resourse needs supplementation
- Gelatin: 0.0448; measured
  Gelatin needs supplementation
- Thiourea: 0.035; measured
  Thioureas needs to be replenished
- Casein: 0.025; measured
  Casein needs to be supplemented

## Outputs
All rows: measured
- carbon dioxide (fossil): 3180
  原文未区分bio和fossil，根据专家判断此处为fossil
- sulfur dioxide: 13.7
  Sulfur dioxide
- Nitrogen oxides: 0.785
  NOx needs to be supplemented
- carbon monoxide,carbon monoxide (fossil): 3.17
  原文未区分bio和fossil，根据专家判断此处为fossil
- methane (fossil): 8.33
  Methane
- nitrous oxide: 0.0491
  Nitrous oxide
- sulphuric acid: 0.553
- particles (PM2.5 - PM10): 10.5
- mercury: 0.00205
  Mercury
- lead: 0.00205
  Lead
- zinc: 0.00411
- nickel: 0.00615
  Nickel
- arsenic: 0.0103
  Arsenic
- chemical oxygen demand: 0.0164
  Chemical oxygen demand
- biological oxygen demand: 0.0159
  Biochemical oxygen demand needs to be supplemented
- Solid suspension: 1.26
  Solid suspension needs to be supplemented
- Ammonia Nitrogen: 0.376
  Ammonia nitrogen needs to be supplemented
- municipal solid waste deposition: 106000
  Solid waste

## Deviations from the LCI method approaches
Combined with the characteristics of refined copper production in China, the CML2001 method (2016 revision), was selected for environmental impact accounting in this study.

## Data selection and combination
Resources, energy consumption and pollution data of primary copper production were collected mainly from the survey of production technology and typical enterprises in this study. The upstream date was from GaBi (ts vision) and Ecoinvent database

## Data treatment and extrapolations
This study used Gabi software (ts version) as the calculation software and the model was built for both technologies.

## Use advice
The provided data should be used with consideration of the methodological framework described, specifically the CML2001 method (2016 revision) for environmental impact accounting. Users should factor in the characteristics of refined copper production in China when interpreting the data. Ensure that the system boundaries include the survey of production technology and typical enterprise contributions. The Functional Unit (FU) is the production of 1000 kg of refined copper. For further precision, users should refer to the GaBi (ts version) software and Ecoinvent database for upstream data contextualization.

## Review details
Inventory: The internal review was done by several iteration steps concerning raw data validation, raw data documentation, representativity, completeness and consistency of modelling with regard to ISO 14040 and 14044.

## Data sources
- Chen, J. et al. Environmental benefits of secondary copper from primary copper based on life cycle assessment in China. Resources, Conservation and Recycling 146, 35–44 (2019).
