# 再生纸生产|瓦楞原纸|废水处理

Dataset: ILCD process, Unit process, single operation
Classification: Materials production / Other mineralic materials
LCI method principle: Attributional
Generated by: Yixiang Gao, 22210740040@m.fudan.edu.cn
Review: Dependent internal review by Tiangong LCI Data Working Group
Amounts: no units in this file; such an amount is in the reference unit of its flow, which a separate flow dataset defines
copyright: false

## Inputs
- water: 0.79; measured
  水
- Electricity: 6.192; measured
  电力

## Outputs
All rows: measured
- carbon dioxide: 7.39
  CO2
- sulfur dioxide: 0.001
  SO2
- methane: 0.001
  CH4
- carbon monoxide: 0.01
  CO
- nitrogen, total (excluding N2): 0.024
  TN
- phosphorus, total: 0.006
  TP
- Waste (solid): 68.79
  固体废弃物

## Review details
Inventory: The internal review was done by several iteration steps concerning raw data validation, raw data documentation, representativity, completeness and consistency of modelling with regard to ISO 14040 and 14044.

## Data sources
- 赵国杰, 游亚杰, & 黄起帅. 基于生命周期评价的瓦楞原纸产品碳足迹评价. 中国造纸 40, 40–44 (2021).
