# Turbine manufacture ; 3.6 MW wind turbine

Dataset: ILCD process, Unit process, black box
Geography: SH-CN
Reference year: 2009
Classification: Unit processes / Energy carriers and technologies / Mechanical energy
Functional unit: The functional unit is 1 kWh on-grid electricity provision.
LCI method principle: Attributional
LCI method approaches: Allocation
Generated by: Yunzhi Zhao, ll10088@163.com
Owner: Tiangong LCI Data Working Group
Review: Dependent internal review by Tiangong LCI Data Working Group
Amounts: no units in this file; such an amount is in the reference unit of its flow, which a separate flow dataset defines
copyright: false
licenseType: Free of charge for all users and uses

## General comment
The 3.6 MW wind turbines manufactured as part of this industrial process are designed for utilization in offshore wind farms, specifically the Donghai Bridge Offshore Wind Farm (DBOWF). Such turbines are integral to large-scale, sustainable power generation and are constructed with the aim of harnessing wind energy to provide on-grid electricity.

## Geography
The studied wind farm, the Donghai Bridge Offshore Wind Farm (DBOWF), is China's first offshore wind farm within the jurisdiction of Shanghai, as well as the first offshore wind farm outside Europe. The project has two-phases of construction, located on each side of the Donghai bridge (Fig. 1).

## Reference product
- Wind turbine: 1; measured

## Inputs
- Resin: 216000
  Resin and fiber glass
- iron: 78300
- Steel,Steel: 407900
- silicon: 500
  silica
- copper: 5200

## Deviations from the LCI method approaches
The present study employed the PLCA modeling approach to calculate the energy and environmental emissions of a typical offshore wind farm in China. The cradle-to-grave process includes four stages, materials and equipment manufacturing, transportation and installation, operation and maintenance, and dismantling and recycling (Fig. 2).

## Data selection and combination
The technical parameters of wind turbines, foundations and cables are obtained from the design documents of the DBOWF (Table 2). The energy and emissions factors (i.e., the energy consumption and environmental emissions of per unit material and component production) are derived from the Ecoinvent 2.2 dataset (Ecoinvent Centre, 2009), and the coefficients of China's practices were preferentially referred. For key materials and equipment, their sea transportation energy is calculated from the transportation load and shipping energy intensity. The facility installation energy and emissions were estimated based on the construction plan. The wind farm's operation and maintenance data, such as the frequency and working time of maintenance, were obtained from site investigations with engineers and technicians. The uncertainties associated with model parameters and input data are illustrated in the sensitivity analysis section of this paper.

## Use advice
When employing this data set in Life Cycle Assessment (LCA), users should carefully consider the entire cradle-to-grave life cycle, which includes material and equipment manufacturing, transportation and installation, operation and maintenance, as well as dismantling and recycling. The energy and emissions factors derived from the Ecoinvent 2.2 dataset should be contextually adjusted to reflect Chinese practices where applicable. It is critical to incorporate the sea transportation energy calculations for key materials and equipment in the assessment. Users must also take into account the uncertainties discussed in the sensitivity analysis section, especially when comparing with other energy production methods or geographical locations. Model the use phase behavior based on the operational data from the DBOWF, including maintenance frequency and working times.

## Review details
Inventory: The internal review was done by several iteration steps concerning raw data validation, raw data documentation, representativity, completeness and consistency of modelling with regard to ISO 14040 and 14044.

## Data sources
- Yang, J. et al. The life-cycle energy and environmental emissions of a typical offshore wind farm in China. Journal of Cleaner Production 180, 316–324 (2018).
