# Groundwater after biological Medium injection ; Groundwater in-situ remediation ; Enhanced bioremediation ; Injection of biomass culture medium

Dataset: ILCD process, Unit process, single operation
Geography: SH-CN
Reference year: 2020
Classification: Unit processes / Other Services / Repair and maintenance
Generated by: Xiao Meng, xiaomeng@mail
Owner: Tiangong LCI Data Working Group
Review: Dependent internal review by Tiangong LCI Data Working Group
Amounts: no units in this file; such an amount is in the reference unit of its flow, which a separate flow dataset defines
copyright: false
licenseType: Free of charge for all users and uses

## General comment
CHC+ISB is used for site remediation, and during the equipment operation phase, the injection of the biomass culture medium occurs.

## Geography
The aquifer in a certain area in Shanghai, China, is uniformly contaminated with chlorinated volatile organic compounds (CVOCs), with a surface area of 20,000 m2 and a depth of 50 m, with the water table located at a depth of 30 m.

## Technical purpose
The industrial process described is utilized for in-situ remediation of groundwater contaminated with chlorinated volatile organic compounds (CVOCs) in a specific area. The use of CHC+ISB (Compound-specific isotope characterization and In Situ Bioremediation) technology involves injecting a biomass culture medium into an aquifer to enhance the biological degradation of pollutants. This process is specifically applied for site remediation where the groundwater is contaminated and is particularly targeted towards a contaminated area of 20,000 m2 down to a depth of 50 meters in Shanghai, China.

## Reference product
- Groundwater after biological Medium injection: 600000; measured
  注射生物培养基后的地下水

## Inputs
- Biological Medium: 523.53; software or database
  1 kWh/m3 medium, 523.53 m3 biological medium
- Electricity: 1884.71; measured

## Use advice
When utilizing this dataset for life cycle assessment or other environmental impact analyses, users should pay special attention to ensuring that the methodological framework employed aligns with the specifics of the CHC+ISB remediation process. Considerations should include the geographic specificity of the dataset to Shanghai, China, and the depth of contamination. Data users should consider this context when modeling use-phase behavior and the potential for natural attenuation or other site-specific conditions that may influence the effectiveness of bioremediation. Additionally, users should evaluate whether similar conditions apply to their site of interest to determine the generalizability of this data.

## Review details
Inventory: The internal review was done by several iteration steps concerning raw data validation, raw data documentation, representativity, completeness and consistency of modelling with regard to ISO 14040 and 14044.

## Data sources
- Ni, Z. et al. Comparative Life-Cycle Assessment of Aquifer Thermal Energy Storage Integrated with in Situ Bioremediation of Chlorinated Volatile Organic Compounds. Environ. Sci. Technol. 54, 3039–3049 (2020).
