# NCM battery pyrometallurgical recycling

Dataset: ILCD process, Unit process, single operation
Geography: CN
Reference year: 2022
Classification: End-of-life treatment / Material recycling
Functional unit: 1 kWh of the Eol NCM battery
Generated by: Chen, Lipeng, lpchen07@163.com
Owner: Tiangong LCI Data Working Group
Review: Dependent internal review by Tiangong LCI Data Working Group
Amounts: no units in this file; such an amount is in the reference unit of its flow, which a separate flow dataset defines
copyright: false
licenseType: Free of charge for all users and uses

## General comment
The pyrometallurgical recycling is a simpler process to recover the precious metal materials in batteries by melting them directly after discharging and simple disassembly.

## Technical purpose
The pyrometallurgical recycling process is utilized for the recovery of precious metals from end-of-life NCM lithium batteries. It is commonly applied in recycling facilities that specialize in battery recycling, offering a less complex method for processing discharged and partially disassembled batteries through direct melting. This process mainly serves the purpose of reclaiming valuable materials for use in the manufacturing of new batteries.

## Reference product
- EoL NCM battery: 0.0157; input; article inperiodical

## Inputs
All rows: article inperiodical
- Electricity: 24.012
- Sodium hydroxide: 2.92
- coke: 1.1
- Limestone: 1
- slagging agent: 1

## Outputs
- hydrogen chloride: 0.0167; article inperiodical
- sulphuric acid: 0.025; article inperiodical
- Dust (unspecified, from stack),Dust (unspecified, from stack): 4.17e-5; article inperiodical
- sulfur dioxide: 2e-5; article inperiodical
- carbon dioxide: 2.03; article inperiodical
- nickel: 1.39; article inperiodical
- cobalt: 1.42; article inperiodical
- carbon: 3.86e-5
  soot

## Use advice
When using data from the pyrometallurgical recycling process of NCM lithium batteries, it's important to account for the quality and composition of the reclaimed materials. Data users should adjust their models to reflect efficiencies and potential losses due to the process temperature and handling. The end-of-life batteries should be considered fully discharged before recycling, and any deviations or additional preprocessing steps taken must be clearly documented and factored into the assessment.

## Review details
Inventory: The internal review was done by several iteration steps concerning raw data validation, raw data documentation, representativity, completeness and consistency of modelling with regard to ISO 14040 and 14044.

## Data sources
- Feng, T., Guo, W., Li, Q., Meng, Z. & Liang, W. Life cycle assessment of lithium nickel cobalt manganese oxide batteries and lithium iron phosphate batteries for electric vehicles in China. Journal of Energy Storage 52, 104767 (2022).
