# Plexiglass ; PMMA: Polymethyl Methacrylate (also known as Acrylic or Plexiglass); rectification process

Dataset: ILCD process, Unit process, single operation
Geography: JX-CN
Classification: Unit processes / Materials production / Glass and ceramics
Generated by: He xiaxia, 18616148319@163.com
Owner: Tiangong LCI Data Working Group
Review: Dependent internal review by Tiangong LCI Data Working Group
Amounts: no units in this file; such an amount is in the reference unit of its flow, which a separate flow dataset defines
copyright: false
licenseType: Free of charge for all users and uses

## General comment
The PMMA monomer MMA production through the rectification process is intended for the creation of polymethyl methacrylate (PMMA), also known as acrylic glass. This material is commonly used in applications requiring transparency and high strength, such as protective barriers, lens, and signs, as well as for various components in the automotive and construction industries.

## Reference product
- methyl methacrylate: 1015.48; measured
  MMA rough finished product

## Inputs
- Electricity: 335.52; measured
- methyl methacrylate: 997.998; measured
  MMA rough finished product
- propionic acid: 17.479; measured
  Distillation condensate

## Use advice
When utilizing this data set for the PMMA production process, consider the environmental impacts of the rectification process which may include energy consumption and emissions. Ensure that the use phase behavior for PMMA products is accurately modelled according to their specific applications. Additionally, consider the end-of-life scenarios, specifically whether the PMMA will be recycled or discarded, as this will significantly influence the overall environmental impact.

## Review details
Inventory: The internal review was done by several iteration steps concerning raw data validation, raw data documentation, representativity, completeness and consistency of modelling with regard to ISO 14040 and 14044.

## Data sources
- 江西旺达新材料有限公司年产20000吨有机玻璃原料生产项目
