# PVC production;PVC;Carbide Calcium Method

Dataset: ILCD process, Unit process, black box
Geography: CN
Reference year: 2020
Classification: Unit processes / Materials production / Plastics
Functional unit: considering 1 kg resin production as the functional unit.
Generated by: Huijuan Guo, GHJ@email.ncu.edu.cn
Owner: Tiangong LCI Data Working Group
Review: Dependent internal review by Tiangong LCI Data Working Group
Amounts: no units in this file; such an amount is in the reference unit of its flow, which a separate flow dataset defines
copyright: false
licenseType: Free of charge for all users and uses

## General comment
Two commercially available synthesis methods (calcium carbide, ethylene) were assessed for PVC production in China.

## Geography
Process-based data from China were used, yet if not available, data from Europe were applied instead.

## Time period
Process-based data from China were used, yet if not available, data from Europe were applied instead. The electricity input was developed based on the national grid structure in China (Table S3), which was obtained from the share of the electric power structure in 2020 (National Bureau Statistics of China, 2020).

## Technical purpose
The data set describes the production of Polyvinyl Chloride (PVC) using the calcium carbide method, specifically tailored for use in the Chinese domestic market. PVC produced by this method is typically utilized for a wide range of products including construction materials such as pipes and fittings, electrical cables, flooring, and roofing sheets, as well as for packaging, automotive parts, and medical devices.

## Model description
life cycle environmental and human health impacts were modeled using SimaPro software (version 8.5) with Ecoinvent 3 and ELCD (European Reference Life Cycle Database) databases.

## Reference product
- polyvinylchloride resin (B-PVC): 1; missing unimportant
  PVC

## Inputs
All rows: missing unimportant
- hydrogen chloride: 2.05
  Hydrochloric acid
- acetylene: 0.44
- Process water: 0.58
  Processed water
- Electricity: 0.62
- process steam: 4.52
  Steam

## Outputs
All rows: missing unimportant
- ethylene: 4.4e-8
- chemical oxygen demand: 0.00147
- mercury: 1e-9
- Waste (unspecified): 10
- Acid Gases: 12.5
  Acid gases
- Dust: 0.00095

## Data treatment and extrapolations
ReCiPe method (Europe H/H) was used as the assessment method for consistency.

## Use advice
For accurate life cycle assessment (LCA) of PVC, the provided data must be applied considering the regional specificity of electricity input based on China's national grid. If Chinese data are unavailable, European data can be substituted, acknowledging regional differences. Users should employ the ReCiPe method (Europe H/H) to ensure consistent evaluation of environmental and human health impacts. Additionally, when using this data set, define the functional unit as 1 kg of resin production to align with the assessment's basis and employ the SimaPro software with Ecoinvent 3 and ELCD databases for modeling purposes.

## Review details
Inventory: The internal review was done by several iteration steps concerning raw data validation, raw data documentation, representativity, completeness and consistency of modelling with regard to ISO 14040 and 14044.

## Data sources
- An, J., Wu, F., Wang, D. & You, J. Estimated material metabolism and life cycle greenhouse gas emission of major plastics in China: A commercial sector-scale perspective. Resources, Conservation and Recycling 180, (2022).
