# Fresh chestnut production

Dataset: ILCD process, Unit process, black box
Geography: PT
Reference year: 2010
Valid until: 2012
Classification: Unit processes / Materials production / Agricultural production means
Functional unit: 1 kg of edible chestnut kernel
Generated by: zhu xian, zzhu0918@163.com
Owner: Tiangong LCI Data Working Group
Review: Dependent internal review by Tiangong LCI Data Working Group
Amounts: no units in this file; such an amount is in the reference unit of its flow, which a separate flow dataset defines
copyright: false
licenseType: Free of charge for all users and uses

## General comment
Use small wild chestnut trees and graft them to the required varieties, fertilize, prune and pesticide the grafted chestnut trees, and finally harvest fresh chestnut fruits.

## Geography
Northern Portugal

## Time period
The planting data of different producers (2010-2012) were collected.

## Technical purpose
The fresh chestnut production process described herein integrates small wild chestnut trees that undergo grafting with desired chestnut varieties. The grafted chestnut trees are subsequently managed through fertilization, pruning, and pesticide application. This production process culminates in the harvesting of fresh chestnut fruits, which are primarily utilized for direct consumption or processed into various food products. This particular dataset represents a production environment prevalent in Northern Portugal and is specific to the agricultural practices conducted between 2010 and 2012 for the production of 1 kg of edible chestnut kernels.

## Reference product
- Chestnut: 881.3; measured

## Inputs
All rows: measured
- Nitrogenous fertilizer: 9
- Phosphate fertilizer: 38.57
- Potassium fertilizer: 18
- calcium carbonate: 348.57
- Pesticide: 12.5
- Diesel: 0.10109
- gasoline (regular): 0.00163

## Outputs
All rows: measured
- nitrous oxide: 0.19
- ammonia: 1.08
- carbon dioxide (biogenic): 153.37
  The original text does not distinguish between biogenic and fossil, which in the expert's judgment is biogenic here.
- nitrate: 11.96
- phosphate: 0.8
- Phosphorus: 0.05

## Use advice
Users of this dataset should note its narrow scope — reflective of chestnut production techniques specific to Northern Portugal and limited to the years 2010-2012. As agricultural practices may alter over time, extrapolation of this data to other time periods or geographic regions should be approached with caution. Additionally, users should consider the potential need for adjustments when applying this data to life cycle assessments for products outside the context of fresh chestnut consumption, accounting for any variances in associated agricultural practices. Special attention should be given to the methodological consistency when integrating this dataset into broader life cycle analysis models.

## Review details
Inventory: The internal review was done by several iteration steps concerning raw data validation, raw data documentation, representativity, completeness and consistency of modelling with regard to ISO 14040 and 14044.
