# Alumina production ; Alumina for metallurgy ; Sintering method ; Bauxite

Dataset: ILCD process, Unit process, single operation
Geography: CN
Reference year: 2011
Classification: Materials production / Inorganic chemicals
Generated by: Jinliang Xie, jinliang.research@gmail.com
Owner: Tiangong LCI Data Working Group
Review: Dependent internal review by Tiangong LCI Data Working Group
Amounts: no units in this file; such an amount is in the reference unit of its flow, which a separate flow dataset defines
copyright: false
licenseType: Free of charge for all users and uses

## General comment
Alumina produced using the sintering method is mainly utilized in the metallurgy industry for the production of aluminum via the electrolytic process. It is derived from bauxite, typically of a lower grade with higher resource and energy consumption. While the Bayer process is more prevalent in China's alumina production, the sintering method holds a small but specific share, catering to particular types of bauxite and specific production requirements.

## Time period
Dissertation Completion Date

## Reference product
- aluminium oxide, metallurgical: 1000; missing unimportant

## Inputs
All rows: missing unimportant
- electricity, high voltage, aluminium industry: 1274.4
- bauxite: 1650
- petroleum coke: 35.79
- steam, in chemical industry: 3417.8
- heavy fuel oil: 77

## Outputs
All rows: missing unimportant
- carbon dioxide (fossil): 4411
- carbon monoxide: 12.315
- sulfur dioxide: 83.969
- methane: 9.055
- Nitrogen oxides: 35.658
- VOC, volatile organic compounds, unspecified origin: 3.03
- dinitrogen: 0.357
- Dust: 16.798
  粉尘
- chemical oxygen demand: 0.004
- Solid Waste: 1901
  固体废物

## Use advice
When utilizing this dataset within a Life Cycle Assessment (LCA) for aluminum production, users should ensure the LCA boundary encompasses the production process from bauxite mining to primary aluminum production, including bauxite extraction, alumina production (specifically via the sintering method), anode production, and the aluminum electrolysis process. It is advised to exclude the mining, production, and transportation processes of minor auxiliary materials such as limestone and asphalt from the assessment system. Attention should be given to the significant environmental impact of resource consumption, energy use, and waste emissions during the manufacturing process compared to transport, usage, and recycling stages.

## Review details
Inventory: The internal review was done by several iteration steps concerning raw data validation, raw data documentation, representativity, completeness and consistency of modelling with regard to ISO 14040 and 14044.

## Data sources
- 李贵奇. 基于生命周期思想的环境评估模型及其在铝工业中的应用. (中南大学, 2011).
