# Sinter production;Sinter;Sintering(Z08)

Dataset: ILCD process, Unit process, single operation
Geography: CN
Reference year: 1998
Classification: Materials production / Other mineralic materials
Generated by: Fuxiang, 1162850692@qq.com
Owner: Tiangong LCI Data Working Group
Review: Dependent internal review by Tiangong LCI Data Working Group
Amounts: no units in this file; such an amount is in the reference unit of its flow, which a separate flow dataset defines
copyright: false
licenseType: Free of charge for all users and uses

## General comment
来自表 4-16 Z08 钢厂生产吨材环境负荷编目表

## Time period
论文提到钢铁企业环境总体数据为1998年的吨钢环境基础数据。

## Technical purpose
The sinter production process is used primarily in the iron and steel industry. Sinter is a porous clinker-like material that is produced by fusing iron ore fines together with other materials such as lime, coke fines, and fluxes, typically in a sinter plant. This material serves as an input for blast furnace operations, where it aids in the efficient smelting of iron to create steel.

## Reference product
- Sinter: 1869; measured

## Inputs
- Energy, geothermal, converted: 4502.59; measured
- water: 611; measured
- Refined Iron Ore: 1990; measured
  Concentrated iron ore

## Outputs
All rows: measured
- Dust (unspecified, from stack): 0.677
  soot
- Dust (unspecified, from stack): 3.8
- sulfur dioxide: 0.46
- Suspended solids, unspecified: 0.068592
- chemical oxygen demand: 0.051958
- Dust (unspecified, from stack): 131.036
  dust collection
- Spoil (deposited, hibernating in ground, non elementary flow): 95.319

## Use advice
Users of this data should note that it is based on environmental load inventory records for the iron and steel industry from 1998 and may not represent current processes or environmental impact profiles. It is suitable for the historical analysis of environmental performance in steel production but may require updating for contemporary assessments. Care should be taken to ensure methodological consistency when integrating with other life cycle data, particularly regarding temporal factors and technological advancements.

## Review details
Inventory: The internal review was done by several iteration steps concerning raw data validation, raw data documentation, representativity, completeness and consistency of modelling with regard to ISO 14040 and 14044.

## Data sources
- 周和敏. 钢铁材料生产过程环境协调性评价研究. (北京工业大学, 2001).
