# Brick production ; concrete pavement brick ; Fabric blending process

Dataset: ILCD process, Unit process, single operation
Geography: JNA-SD-CN
Reference year: 2018
Classification: Unit processes / Materials production / Other mineralic materials
Functional unit: The functional unit is the area of 1 m2 brick products.
Generated by: Wang xiangjin, r99rt4@163.com
Owner: Tiangong LCI Data Working Group
Review: Dependent internal review by Tiangong LCI Data Working Group
Amounts: no units in this file; such an amount is in the reference unit of its flow, which a separate flow dataset defines
copyright: false
licenseType: Free of charge for all users and uses

## General comment
Non sintering process of concrete pavement bricks

## Technical purpose
The concrete pavement bricks and permeable bricks produced by Jinan Shunde Cement Products Co. Ltd. are intended for use in laying pavements, walkways, and other outdoor surfaces requiring durable and stable ground coverage. These bricks provide a hardy surface capable of bearing vehicle and pedestrian traffic.

## Reference product
- brick dust: 14; measured
  Fabric blending materials

## Inputs
All rows: measured
- portland cement: 6.17
- sand: 7.41
- freshwater: 0.617
- Iron oxide pigment: 0.124
- Electricity: 0.29196

## Outputs
- particles (PM10): 9e-5; measured

## Deviations from the LCI method approaches
ReCiPe midpoint (H) model is applied in this study.

## Data selection and combination
In this study, the production energy consumption of concrete pavement brick and permeable brick as well as the relevant data of all kinds of raw materials and energy input and exhaust emissions are collected from Jinan Shunde Cement Products Co. Ltd. Shandong Province.

## Sampling procedure
Most data of raw materials, energy input and waste discharge were collected from the site investigation of manufacturer. Water reducer is also called water reducing agent, whose chemical constituents is the sodium salt of the sulfonate formaldehyde condensation

## Use advice
Users of this data set should apply the ReCiPe midpoint (H) model as employed in this study for assessing the environmental impacts of the brick production process. The functional unit for comparing different products or processes should be based on the area of 1 m2 of brick products. While utilizing this LCA data, it is recommended to consider the sensitivity analysis results, especially when variations in input and output data are within a 5% range of key process changes.

## Review details
Inventory: The internal review was done by several iteration steps concerning raw data validation, raw data documentation, representativity, completeness and consistency of modelling with regard to ISO 14040 and 14044.

## Data sources
- Yuan, X. et al. Environmental and economic impacts assessment of concrete pavement brick and permeable brick production process - A case study in China. Journal of Cleaner Production 171, 198–208 (2018).
