# DRI production;DRI;SF

Dataset: ILCD process, Unit process, single operation
Geography: CN
Classification: Materials production / Metals and semimetals
Generated by: Fuxiang, 1162850692@qq.com
Owner: Tiangong LCI Data Working Group
Review: Dependent internal review by Tiangong LCI Data Working Group
Amounts: no units in this file; such an amount is in the reference unit of its flow, which a separate flow dataset defines
copyright: false
licenseType: Free of charge for all users and uses

## General comment
Direct Reduced Iron (DRI) production via the coal-based reduction process, commonly referred to as Coal-DR, is used in steel manufacturing as an alternative to the traditional blast furnace method. The DRI obtained using this process can be utilized in electric arc furnaces for producing steel. A Single Furnace Direct Reduction Iron (SF-DRI) unit is specifically employed in a single operation within this manufacturing route.

## Geography
The LCI of Coal-DR is obtained, as shown in Table 9, based on the statistics of the demonstration project in China.

## Reference product
- Direct Reduced Iron: 1027.1; calculated
  DRI

## Inputs
- Pellet: 1394.1; calculated
  Pellets
- Reducing gas: 1362.3; calculated
- Natural gas, at consumer EU-27: 42.5; calculated
- Electricity: 70.92; calculated

## Outputs
- Top gas: 1439.2; calculated

## Data treatment and extrapolations
LCI of COG-DR and H-DR routes, which is not scaled-up in China are estimated based on Coal-DR routes combined with literature data from simulations, laboratory tests, and process modeling in Table 9 [49,50]. The LCI of Coal-DR is obtai

## Use advice
When utilizing the life cycle assessment (LCA) data for the Coal-DR process, users should take into account the specific context of the demonstration project in China from which the data is derived. For COG-DR (Coke Oven Gas - Direct Reduction) and H-DR (Hydrogen - Direct Reduction) routes which are not widely implemented in China, the LCA data should be considered as estimates based on Coal-DR data alongside additional information from simulations, laboratory tests, and process modeling. Attention should be paid to the methodological differences when applying the data from Coal-DR to COG-DR and H-DR processes.

## Review details
Inventory: The internal review was done by several iteration steps concerning raw data validation, raw data documentation, representativity, completeness and consistency of modelling with regard to ISO 14040 and 14044.

## Data sources
- The carbon reduction potential of hydrogen in the low carbon transition of the iron and steel industry: The case of China
