# Silicon-aluminum alloy production ; Silicon-aluminum alloy ; Bauxite

Dataset: ILCD process, Unit process, single operation
Geography: CN
Reference year: 2012
Classification: Materials production / Metals and semimetals
Generated by: Chenling Fu, fu-chenling@tsinghua.edu.cn
Owner: Tiangong LCI Data Working Group
Review: Dependent internal review by Tiangong LCI Data Working Group
Amounts: no units in this file; such an amount is in the reference unit of its flow, which a separate flow dataset defines
copyright: false
licenseType: Free of charge for all users and uses

## General comment
Silicon-aluminum alloy is primarily used in the production of automotive parts, aerospace components, and construction materials due to its lightweight and high-strength properties. It is produced by smelting bauxite and incorporating silicon.

## Time period
Literature published in March, 2012

## Reference product
- Silicon-Aluminum Alloy (Si, 12%): 1000; missing unimportant
  silicon-aluminum alloy (Si, 12%)

## Inputs
All rows: missing unimportant
- electricity, high voltage, aluminium industry: 54360
  Electricity
- steam, in chemical industry: 0.37
  Steam
- fluoride salt: 24.3
  Fluoride salt
- diesel: 1.45
  Diesel
- hard coal: 5.72
  Coal
- Copper, in ground: 8
  Copper
- inorganic chemicals: 4.1
  Inorganic chemicals
- natural gas, high pressure: 335.57
  Natural gas
- Nitrogen: 2.5
  Nitrogen gas
- coal gas: 21.75
  Coal gas
- bauxite: 4180
  Bauxite
- lime: 250
  Lime
- Sodium Hydroxide (100%): 160
  NaOH (100%)
- fresh water: 10480
  Fresh water
- petroleum coke: 590
  Petroleum coke
- bitumen: 90
  Bitumen
- anthracite: 120
  Anthracite
- silicon dioxide: 300
  Silica
- charcoal: 120
  Charcoal

## Outputs
All rows: missing unimportant
- Dust: 2.5
- sulfur dioxide: 5.4
  SO2
- Methane, tetrafluoro-, R-14: 0.26
  Tetrafluoro methane
- hexafluoroethane: 0.03
  Hexa-fluoro ethane
- hydrogen fluoride: 0.52
  HF
- Residue: 13.22
  Overhaul waste residues
- redmud from bauxite digestion: 1130
  Red mud
- chemical oxygen demand: 0.08105
  COD
- ammonia nitrogen: 0.00472
  NH3eN
- petroleum pollutions: 0.00659
  Petroleum pollutions
- Phenol: 0.00038
- Polycyclic Aromatic Hydrocarbon (PAH): 0.00067
  B(a)P

## Use advice
When using this data, pay special attention to the methodology applicable at the time of the literature's publication in March 2012. Verify if technological advancements or changes in industry standards have taken place that could affect the relevance of the data. Consider the geographic location and technological context when applying this data to current scenarios. The data excludes any considerations of recycling; therefore, if recycling is part of the life cycle under assessment, additional data reflecting recycling processes should be integrated.

## Review details
Inventory: The internal review was done by several iteration steps concerning raw data validation, raw data documentation, representativity, completeness and consistency of modelling with regard to ISO 14040 and 14044.

## Data sources
- Hong, J., Hong, J., Zhou, J. & Xu, X. Environmental and economic life cycle assessment of aluminum-silicon alloys production: A case study in China. J. Clean. Prod. 24, 11–19 (2012).
