# Extraction well ; Groundwater pump and treatment

Dataset: ILCD process, Unit process, single operation
Geography: UM
Reference year: 2009
Classification: Unit processes / Other Services / Repair and maintenance
Generated by: Yang Xintong, yangxt@caep.org.cn
Owner: Tiangong LCI Data Working Group
Review: Dependent internal review by Tiangong LCI Data Working Group
Amounts: no units in this file; such an amount is in the reference unit of its flow, which a separate flow dataset defines
copyright: false
licenseType: Free of charge for all users and uses

## General comment
PTS removes the contaminated groundwater by pumping and use of aboveground treatment facilities. A PTS provides quick initial reductions in contaminant concentrations, but often results in a slow, steady reduction for the long-term.

## Geography
The case study was conducted using publicly available design documents for two remediation strategies designed by Battelle for Dover Air Force Base (AFB) in Dover, DE

## Technology and included processes
The PTS was modeled with five subsystems: extraction wells, air-stripping unit (ASU), catalytic oxidation unit (COU), granular activated carbon (GAC) unit, and treatment facilities. Model extraction wells were constructed using an eight inch auger (80 kW at 5 m/hour) and were composed of PVC well pipe, filter pack, grout, and a 0.75 kW (1 hp) well pump.

## Technical purpose
The described industrial process involved in the extraction and treatment of contaminated groundwater is utilized for environmental remediation purposes. It is specifically implemented in sites where groundwater pollution poses a significant threat to the environment and human health, such as military bases, industrial sites, and areas with historical chemical spills or leaks. The process is designed to handle the clean-up of contaminated sites through a series of technologically advanced units including extraction wells, air-stripping units, catalytic oxidation units, granular activated carbon units, and treatment facilities.

## Reference product
- Extraction wel: 1; measured

## Inputs
All rows: measured
- polyvinylchloride resin (S-PVC): 40
  Rxtraction Well pVC Pipe
- cement, unspecified: 2000
  Extraction Well Cerment
- Gravel Sand: 330
  Extraction Well Gravel
- Steel: 50
  Extraction Well Steel (Pump)
- Energy, unspecified: 2300
  Extraction Well Construction Energy

## Use advice
When utilizing this dataset for Life Cycle Assessment, users should take into account the specific context of the groundwater remediation process, including the composition and concentration of contaminants, the hydrogeology of the area, and the performance characteristics of the treatment technology involved. It is essential to consider the environmental impact of the construction and operation of the remediation system. Additional data on similar processes or average industry practices should be sought to check the representativeness and validity of the dataset. Where data gaps exist, users should employ conservative assumptions or refer to the most relevant available literature and practices. Emissions that are not accounted for in this dataset should be estimated based on best available techniques, and the omission of such emissions should be clearly documented and justified in the assessment.

## Review details
Inventory: The internal review was done by several iteration steps concerning raw data validation, raw data documentation, representativity, completeness and consistency of modelling with regard to ISO 14040 and 14044.

## Data sources
- Life-Cycle Case Study Comparison of Permeable Reactive Barrier versus Pump-and-Treat Remediation
