# Tower manufacture ; Tower of a 1.5 MW wind turbine

Dataset: ILCD process, Unit process, single operation
Geography: NMG-CN
Reference year: 2017
Classification: Unit processes / Systems / Construction
Functional unit: The functional unit is 1.5 MW wind turbine
LCI method principle: Attributional
LCI method approaches: Allocation
Generated by: Yunzhi Zhao, ll10088@163.com
Owner: Tiangong LCI Data Working Group
Review: Dependent internal review by Tiangong LCI Data Working Group
Amounts: no units in this file; such an amount is in the reference unit of its flow, which a separate flow dataset defines
copyright: false
licenseType: Free of charge for all users and uses

## General comment
The technical application of this industrial process is the production of a 1.5 MW wind turbine tower, specifically designed for use within a wind farm setting. The towers manufactured through this process are utilized to support 1.5 MW wind turbine units, contributing to the generation of renewable energy. This industrial process is pertinent for areas such as Inner Mongolia, which is known to have significant installations of wind power facilities.

## Geography
The data regarding the parameters of wind power has been collected from Wang (2012). A wind farm equipped with 33 domestic 1.5 megawatts (MW) wind turbines is regarded as a case study to analyze the environmental impact and its substitution effects. The wind farm is located in the northeast of Inner Mongolia, the province in which most of China’s wind power is installed (Xia and Song, 2017).

## Reference product
- Wind foundation tower: 1; estimated
  Tower of wind turbine

## Inputs
- iron: 170000; calculated
  Steel and iron

## Deviations from the LCI method approaches
The life cycle inventory for wind power is illustrated as follows. The production and manufacturing stage include the production of wind turbines, substations, and cables, which consume a large amount of energy and emit pollutants (Xue et al., 2015).

## Use advice
When utilizing the LCA dataset for this manufacturing process of wind turbine towers, users should ensure to consider the specific energy consumption and pollutant emission profiles detailed in Xue et al., 2015. It is important to include the environmental impacts associated with the production of the wind turbines, substations, and cables in the assessment. Users should also note the original data source (Wang 2012) for wind power parameters and be aware of the geographical specificity of the data (Inner Mongolia, China), which might influence the transferability of results to other regions.

## Review details
Inventory: The internal review was done by several iteration steps concerning raw data validation, raw data documentation, representativity, completeness and consistency of modelling with regard to ISO 14040 and 14044.

## Data sources
- Li, H., Jiang, H.-D., Dong, K.-Y., Wei, Y.-M. & Liao, H. A comparative analysis of the life cycle environmental emissions from wind and coal power: Evidence from China. Journal of Cleaner Production 248, 119192 (2020).
