# Bauxite Mining ; Bauxite ; Cradle ; Aluminum Wheel Manufacturing Process

Dataset: ILCD process, Unit process, single operation
Geography: CN
Reference year: 2018
Classification: Unit processes / Materials production / Non-energetic raw materials
Generated by: Chenling Fu, fu-chenling@tsinghua.edu.cn
Owner: Tiangong LCI Data Working Group
Review: Dependent internal review by Tiangong LCI Data Working Group
Amounts: no units in this file; such an amount is in the reference unit of its flow, which a separate flow dataset defines
copyright: false
licenseType: Free of charge for all users and uses

## General comment
铝矿开采 ; 铝合金枢纽制造工艺

## Time period
Date of publication

## Technical purpose
This dataset describes the extraction and primary processing of bauxite material, which is used as the primary raw material in aluminum alloy wheel manufacturing processes. The aluminum obtained from bauxite mining is essential for producing aluminum alloy wheel hubs for vehicles.

## Reference product
- bauxite: 296.5; missing unimportant

## Inputs
- electricity, high voltage, aluminium industry: 17.388; missing unimportant
- heavy fuel oil, burned in refinery furnace: 0.41; missing unimportant

## Outputs
All rows: missing unimportant
- carbon dioxide (fossil),carbon dioxide (fossil): 1.27
- carbon monoxide (fossil),carbon monoxide (fossil): 0.0005
- sulfur dioxide: 0.002
- Nitrogen oxides: 0.001
- methane (fossil): 0.002
- particles, unspecified: 23.48
  Particle

## Use advice
When utilizing this dataset, it is important to account for the regional variability in bauxite mining practices and environmental impacts. Users should ensure the data corresponds to the specific technology and efficiency of the mining process in the assessed region. Furthermore, when incorporating this data into a life cycle assessment, considerations of the end-of-life recycling of aluminum alloy should be taken into account, as well as any transportation of the material from the mine to the manufacturing facility.

## Review details
Inventory: The internal review was done by several iteration steps concerning raw data validation, raw data documentation, representativity, completeness and consistency of modelling with regard to ISO 14040 and 14044.

## Data sources
- Yi Qiu-ping & Tang Chang-ping. Environmental impact assessment of magnesium alloy automobile hub based on life cycle assessment. JOURNAL OF CENTRAL SOUTH UNIVERSITY 25, 1870–1878 (2018).
