# Biosurfactant ; Soil and groundwater remediation ; Bioremediation ; Biosurfactant production

Dataset: ILCD process, Unit process, single operation
Geography: IT
Reference year: 2023
Classification: Unit processes / Other Services / Repair and maintenance
Functional unit: The functional unit is set to produce 10 mg of biosurfactant.
Generated by: Yang Xintong, yangxt@caep.org.cn
Owner: Tiangong LCI Data Working Group
Review: Dependent internal review by Tiangong LCI Data Working Group
Amounts: no units in this file; such an amount is in the reference unit of its flow, which a separate flow dataset defines
copyright: false
licenseType: Free of charge for all users and uses

## General comment
The production of biosurfactants is also included in both treatments because it is a significant input to enhance the degradation of petroleum hydrocarbons and the production of these stimulants has a considerable impact on environmental performance.

## Geography
This study is based on indoor experiments, where the author's hometown is filled in.

## Technology and included processes
Biosurfactants can be applied to MET as amendments to enhance electricity generation and degradation of the hydrocarbons contaminating the soil petroleum by increasing the contaminant's bioavailability to microorganisms and reducing surface tension, mineralization, and solubilization.

## Technical purpose
The biosurfactants produced are employed for soil and groundwater remediation, particularly in bioremediation processes for the degradation of petroleum hydrocarbons. They are utilized as amendments in Microbial Electrolysis Cells (MET) to enhance hydrocarbon degradation in contaminated soils by improving bioavailability to microorganisms and reducing surface tension.

## Reference product
- Biosurfactant: 1e-5

## Inputs
All rows: normal
- Deionized Water: 0.001
- Crude Oil: 0.045
- Magnesium Sulfate Heptahydrate: 9.77e-5
- sodium chloride: 0.0001
- Ammonium sulfate,Ammonium sulfate: 2.12e-5
- Iron (II) chloride: 2e-5
- ethyl acetate: 0.113
- Methanol: 0.261
- Benzoic acid: 0.000847
- sodium hydroxide: 0.000555
- Potassium Dihydrogen Phosphate: 0.000391
- Potassium hydroxide: 0.000161
- Glucose: 0.0005
- Ethanol: 0.000789
- Electricity: 271.08

## Use advice
Use these data sets with the understanding that they are based on laboratory-scale experiments and do not include maintenance of remediation systems or cultivation of inoculum, which may impact generalizability to larger-scale applications. When applying this data to other studies or industrial applications, where maintenance and inoculation are factors, adjustments must be considered for chemicals, materials, and electricity use.

## Review details
Inventory: The internal review was done by several iteration steps concerning raw data validation, raw data documentation, representativity, completeness and consistency of modelling with regard to ISO 14040 and 14044.

## Data sources
- Gebregiorgis T A ,Francesca F ,Silvia S , et al. Life cycle assessment of bioslurry and bioelectrochemical processes for sustainable remediation of soil polluted with petroleum hydrocarbons: An experimental study [J]. Sustainable Production and Consumption, 2023, 36 416-424.
