# Pulping ; Chemical pulp ; Bamboo ; Sulfate pulping (bleached) ; All sizes; NESPS2 / 制浆 ; 化学浆 ; 竹子 ; 硫酸盐法制浆（漂白） ; 所有规模 ; 全国第二次污染普查数据

Dataset: ILCD process, Unit process, single operation
Geography: CN
Reference year: 2019
Classification: Reference Parameters / Materials production / Organic chemicals
Generated by: The data was created by the Office of the Second National Pollution Source Census of the Ministry of Ecology and Environment, and the data was organized by the TianGong Plan team for ILCD format / 生态环境部第二次全国污染源普查工作办公室创建数据，天工计划团队常慧敏整理数据为ILCD格式
Owner: Tiangong LCI Data Working Group / 天工LCI数据工作小组
Review: Dependent internal review by Tiangong LCI Data Working Group / 天工LCI数据工作小组
Amounts: no units in this file; such an amount is in the reference unit of its flow, which a separate flow dataset defines
copyright: false
licenseType: Free of charge for all users and uses

## General comment
the Technical of end-of-pipe management technology for pollution volatile organic compoundis/，The formula for calculating the actual operation rate (k-value) of the end-of-pipe treatment facility is /

## Technical purpose
该数据集描述了用于生产漂白化学纸浆的竹子硫酸盐法制浆工艺，该纸浆适用于各种纸产品和纤维材料。纸浆可用于印刷写作纸、卫生纸和各种纸板以及其他与纸相关的产品。此外，数据还提供了用于处理制浆过程产生的废水的不同尾端污染管理技术的效率，包括化学混凝、好氧生物处理、氧化还原过程和浮选分离的组合。

## Reference product
- Kraft Pulping: 1000; calculated
  源文件中描述为为化学浆，此处对其进行了匹配工作，将其匹配到LCAflow库里面相最符合的流

## Outputs
All rows: calculated
- Waste water: 32000
  the Technical of end-of-pipe management technology for pollution Waste wateris/，The formula for calculating the actual operation rate (k-value) of the end-of-pipe treatment facility is /
  污染物指标工业废水量的末端治理技术是/。原文件中描述污染物类别为废水，污染物指标为工业废水量，此处对其进行了匹配工作，将其匹配到LCAflow库里面相最符合的流
- chemical oxygen demand: 0.92925
  the Technical of end-of-pipe management technology for pollution chemical oxygen demandisChemical coagulation + aerobic biological treatment + redox process，Its Technical efficiency of end-of-pipe management98.25，The formula for calculating the actual operation rate (k-value) of the end-of-pipe treatment facility is /
  污染物指标化学需氧量的末端治理技术是化学混凝法+好氧生物处理法+氧化还原法，其效率为98.25，末端治理设施实际运行率（k值）计算公式为k=环保设施实际运行小时数（小时）/环保设施应运行小时数（小时）。原文件中描述污染物类别为废水，污染物指标为化学需氧量，此处对其进行了匹配工作，将其匹配到LCAflow库里面相最符合的流
- chemical oxygen demand: 1.62486
  the Technical of end-of-pipe management technology for pollution chemical oxygen demandisChemical coagulation + aerobic biological treatment + chemical coagulation，Its Technical efficiency of end-of-pipe management96.94，The formula for calculating the actual operation rate (k-value) of the end-of-pipe treatment facility is /
  污染物指标化学需氧量的末端治理技术是化学混凝法+好氧生物处理法+化学混凝法，其效率为96.94，末端治理设施实际运行率（k值）计算公式为k=环保设施实际运行小时数（小时）/环保设施应运行小时数（小时）。原文件中描述污染物类别为废水，污染物指标为化学需氧量，此处对其进行了匹配工作，将其匹配到LCAflow库里面相最符合的流
- chemical oxygen demand: 2.78775
  the Technical of end-of-pipe management technology for pollution chemical oxygen demandisChemical coagulation + aerobic biological treatment + floating separation，Its Technical efficiency of end-of-pipe management94.75，The formula for calculating the actual operation rate (k-value) of the end-of-pipe treatment facility is /
  污染物指标化学需氧量的末端治理技术是化学混凝法+好氧生物处理法+上浮分离，其效率为94.75，末端治理设施实际运行率（k值）计算公式为k=环保设施实际运行小时数（小时）/环保设施应运行小时数（小时）。原文件中描述污染物类别为废水，污染物指标为化学需氧量，此处对其进行了匹配工作，将其匹配到LCAflow库里面相最符合的流
- volatile organic compound: 91.2
  the Technical of end-of-pipe management technology for pollution volatile organic compoundis/，The formula for calculating the actual operation rate (k-value) of the end-of-pipe treatment facility is /
  污染物指标挥发性有机物的末端治理技术是/。原文件中描述污染物类别为废气，污染物指标为挥发性有机物，此处对其进行了匹配工作，将其匹配到LCAflow库里面相最符合的流

## Use advice
This dataset is derived from the Pollution Source Census Report and contains information on pollution emissions and related products. However, it does not include data on energy or chemical consumption, nor does it provide information on waste or co-product generation. When utilizing this dataset, please supplement the missing data based on actual conditions before use
该数据集来源于污染源普查报告，包含污染物排放及相关产品信息，但不包含能源或化学品消耗数据，也不提供废弃物或共生产物产生信息。在使用该数据集时，请根据实际情况补充缺失数据后再使用。

## Review details
Inventory: The internal review was done by several iteration steps concerning raw data validation, raw data documentation, representativity, completeness and consistency of modelling with regard to ISO 14040 and 14044.
清单： 内部审查通过几个迭代步骤完成，涉及原始数据验证、原始数据记录、代表性、完整性、与 ISO 14040 和 14044 有关的建模的一致性。

## Data sources
- 第二次全国污染源普查产排污核算系数手册（试用版）,二级代码22,三级代码221.0,四级代码2211文件，在完整版文件中第484页
