# Recycled aluminum alloy body-in-white production and use ; Recycled aluminum alloy body-in-white ; New aluminum scrap

Dataset: ILCD process, Unit process, single operation
Geography: CN
Reference year: 2011
Classification: Unit processes / Materials production / Metals and semimetals
Generated by: Huimin Chang, huiminchang@tsinghua.edu.cn
Owner: Tiangong LCI Data Working Group
Review: Dependent internal review by Tiangong LCI Data Working Group
Amounts: no units in this file; such an amount is in the reference unit of its flow, which a separate flow dataset defines
copyright: false
licenseType: Free of charge for all users and uses

## General comment
The recycled aluminum alloy body-in-white refers to the primary structural framework of an automobile that is manufactured using recycled aluminum alloy materials. This component is typically used in the automotive industry for the construction of vehicle chassis. The aluminum alloys are sourced from new aluminum scrap, ensuring a sustainable approach in automotive manufacturing while reducing the need for virgin aluminum. This industrial process serves as a critical application in creating lightweight, energy-efficient, and environmentally friendly vehicles.

## Time period
Year of publication

## Reference product
- primary aluminum alloy body-in-white: 375.3; measured
  再生铝合金白车身

## Inputs
All rows: measured
- aluminium scrap, new: 1316
  铝合金废料
- sodium chloride, powder: 25
  (1)NaCl
- potassium chloride, industrial grade: 25
  (2)KCl
- heavy fuel oil: 136
  (1)重油
- electricity, high voltage, aluminium industry: 115
  (2)电力
- petrol, unleaded: 16775.7
  (3)汽油

## Outputs
All rows: measured
- carbon dioxide (fossil),carbon dioxide (fossil): 54729.1
  (1)CO2
- carbon monoxide (fossil),carbon monoxide (fossil): 3910.51
  (2)CO
- sulfur dioxide: 13.034
  (3)SO2
- Nitrogen oxides: 491.49
  (4)NOx
- hydrocarbons (unspecified): 770.59
  CxHy

## Use advice
Users of this LCA data should ensure the inclusion of all stages of the recycled aluminum alloy body-in-white production, from the sourcing of new aluminum scrap to the manufacturing process, and the eventual end-of-life recycling. When applying this data, it's critical to factor in the energy and environmental benefits of using recycled materials as opposed to virgin materials. Additionally, users should account for potential limitations in technological applicability such as the specific recycling processes used and the quality of the recycled material, which may affect the overall environmental impact assessment. Careful consideration should be given to the year of publication to ensure that the most current data and methods are being used.

## Review details
Inventory: The internal review was done by several iteration steps concerning raw data validation, raw data documentation, representativity, completeness and consistency of modelling with regard to ISO 14040 and 14044.

## Data sources
- 刘海东. 乘用车轻量化绿色效应评价理论与方法研究. (吉林大学, 2011).
