# Soil remediation ; Ex-situ remediation ; Collaborative disposal of cement kilns ; Preparation stage ; Raw material preparation ; Carbon dioxide

Dataset: ILCD process, Unit process, black box
Geography: CN
Reference year: 2015
Classification: Unit processes / Other Services / Repair and maintenance
Generated by: Cao Jiameng, 2979480760@qq.com
Owner: Tiangong LCI Data Working Group
Review: Dependent internal review by Tiangong LCI Data Working Group
Amounts: no units in this file; such an amount is in the reference unit of its flow, which a separate flow dataset defines
copyright: false
licenseType: Free of charge for all users and uses

## General comment
The cement plant has a modern dry process production line with a scale of 4000t/d, producing 1.9 million tons of cement and 1.5 million tons of clinker annually. The company's own mining area is 0.448km2, and the annual production capacity of limestone is 2 million tons. The production process adopts advanced RSP level five kiln external decomposition technology. Hazardous waste is transported by vehicles, equipped with hazardous goods special vehicles, and the driving route is a truck dedicated line. The transportation distance from the mine to the factory area is about 1.5km, The transportation distance of waste is about 50km. The production process of conventional cement mainly includes stages such as the extraction and transportation of raw and auxiliary materials, raw material preparation, coal powder preparation, clinker calcination, and cement grinding. After adding waste disposal links, waste (polluted soil, digested sludge, waste oil sludge, etc.) can be used as alternative raw materials and fuels to save raw materials such as limestone and coal. Collaborative disposal of cement kilns, preparation stage, raw material preparation process, mainly including crushing, pre homogenization, drying, and grinding of raw materials such as limestone and shale, as well as industrial waste (polluted soil, digested sludge, and waste catalysts).

## Technology and included processes
The raw material preparation process mainly includes the crushing, pre homogenization, drying, and grinding of raw materials such as limestone and shale, as well as industrial waste (polluted soil, digested sludge, and waste catalysts).

## Technical purpose
The industrial process described here is involved in soil remediation through the collaborative disposal using a cement kiln. It details an ex-situ remediation procedure which incorporates the utilization of waste materials such as polluted soil, digested sludge, and waste oil sludge in the preparation of raw materials for cement production. These waste materials are employed as substitute raw materials and alternative fuels within the process, improving resource efficiency and reducing the consumption of primary raw materials like limestone and coal. The process is applicable to a cement plant with a modern dry production line that produces both cement and clinker, incorporating advanced kiln technology for decomposition. This is indicative of a sustainable approach to cement manufacturing that also contributes to waste management and soil remediation efforts.

## Reference product
- carbon dioxide (fossil): 51.1; measured

## Inputs
All rows: measured
- calcium carbonate: 1073.81
- shale: 1.23
- diatomite: 17.75
- Iron powder: 27.25
- Spent catalyst: 2.11
- contaminated soil: 5.26
- Digested Sludge,Digester sludge: 15.79
- Electricity: 63.648

## Use advice
When utilizing this dataset for Life Cycle Assessment, the user should take note of the following: Verify the applicability of the data to the specific type of cement production process. Ensure that the scope of the LCA includes the environmental impacts associated with the use of waste materials as alternative resources. Pay attention to the transportation distances provided, as they are critical for determining associated emissions. Be aware that the input and output streams outlined do not account for minor quantities of exhaust gas, wastewater, or solid waste which should be considered separately if they are relevant to the assessment. Additionally, due to the specific method technology mentioned (RSP five-level kiln technology), the data might not be directly applicable to other cement production processes without adjustments for technological differences.

## Review details
Inventory: The internal review was done by several iteration steps concerning raw data validation, raw data documentation, representativity, completeness and consistency of modelling with regard to ISO 14040 and 14044.

## Data sources
- 侯星宇,张芸,戚昱等.水泥窑协同处置工业废弃物的生命周期评价[J].环境科学学报,2015,35(12):4112-4119.
