# Reverse osmosis module production ; spiral-wound , CN

Dataset: ILCD process, Unit process, single operation
Geography: US
Reference year: 2022
Classification: Unit processes / Materials production / Other materials
Functional unit: 1 item of reverse osmosis module
Generated by: Jiaqi Lu, wilsherelu@foxmail.com
Owner: Tiangong LCI Data Working Group
Review: Dependent internal review by Tiangong LCI Data Working Group
Amounts: no units in this file; such an amount is in the reference unit of its flow, which a separate flow dataset defines
copyright: false
licenseType: Free of charge for all users and uses

## General comment
This reverse osmosis module, characterized by spiral-wound construction, is typically used for water purification and desalination processes. It is designed to remove a wide range of contaminants such as dissolved salts, bacteria, pyrogens, and organic matter, thereby producing high-quality water for various applications. It can be employed in sectors including residential, commercial, industrial, and municipal water treatment facilities.

## Reference product
- Reverse Osmosis Component: 1; measured
  1 Reverse osmosis module

## Inputs
All rows: measured
- 1,1-Difluoroethane, HFC-152a: 0.014
- polyvinylchloride resin (E-PVC): 0.052
  PVC
- Polyvinylidene fluoride: 0.088
  Polyvinylidene fluoride (PVDF) membrane
- polypropylene fibres (PP): 0.129
  PP film
- Adhesive Tape: 1.643
  Tape (wrapped around the casing)
- plastic pipes: 0.016
  extruded plastic tube
- Plastic (unspecified): 0.012
  Injection molded plastic
- isopropanol: 0.013
  Isopropyl alcohol
- Polyurethane (PU) Filler: 0.032
  PU filler
- freshwater: 0.001
  tap water
- Electricity: 3.7116
  Process power consumption

## Use advice
When using this reverse osmosis module data set for Life Cycle Assessment, it is important to include the operating conditions such as pressure, temperature, and recovery rates that reflect the actual or expected use. Regional differences in water composition and quality should also be considered, as they affect module performance. For the end-of-life phase, users should take into account the disposal or recycling of the membrane elements. Assumptions and limitations regarding the module's lifespan, energy consumption, and maintenance should be clearly stated in the LCA model.

## Review details
Inventory: The internal review was done by several iteration steps concerning raw data validation, raw data documentation, representativity, completeness and consistency of modelling with regard to ISO 14040 and 14044.

## Data sources
- DuPont. Product Data Sheet
