# Copper slag Recycling;Unfired brick;production of unfired brick after Floatation;Copper slag

Dataset: ILCD process, Unit process, single operation
Geography: CN
Reference year: 2010
Classification: Unit processes / Materials production / Other mineralic materials
Functional unit: The functional unit was defined as the recycling of 1 ton of copper slag from copper smelting process.
LCI method principle: Attributional
LCI method approaches: Substitution
Generated by: Peng Wang, 2867919560@qq.com
Owner: Tiangong LCI Data Working Group
Review: Dependent internal review by Tiangong LCI Data Working Group
Amounts: no units in this file; such an amount is in the reference unit of its flow, which a separate flow dataset defines
copyright: false
licenseType: Free of charge for all users and uses

## General comment
The copper slag recycling process is intended to reduce waste and environmental impact by repurposing by-products of copper smelting. The resultant materials, such as cement and unfired bricks, are used in construction applications. The four developed scenarios reflect different methods of integrating copper slag into cement production or using it to produce unfired bricks—materials commonly used in building infrastructure.

## Geography
a dominant copper company in China.

## Time period
were obtained from internal report of relevant company in 2010.

## Technology and included processes
four scenarios of copper slag recycling were developed in terms of technological availability: (1) production of cement directly, (2) production of cement after Electric Furnace treatment, (3) production of cement after Floatation, and (4) production of unfired brick after Floatation.

## Reference product
- Limestone: 311.4; input; measured

## Inputs
- hard coal,hard coal,hard coal: 47.2; measured
  Hard coal
- crude oil; 42.3 MJ/kg: 12; measured
  Crude oil
- natural gas; 44.1 MJ/kg: 2.8; measured
  Natural gas
- clay: 108.7; measured
  Clay
- gypsum: 19.5; measured
  Gypsum
- sand: 616; measured
- Scrap: 1000

## Outputs
All rows: measured
- carbon dioxide (fossil): 318.9
  原文未区分bio和fossil，根据专家判断此处为fossil
- carbon monoxide,carbon monoxide (fossil): 0.2
  原文未区分bio和fossil，根据专家判断此处为fossil
- sulfur dioxide: 1.3
  SO2
- Nitrogen oxides: 0.8
  NOx needs to be supplemented
- particles (PM2.5 - PM10): 0.7
  Dust needs to be replenished

## Deviations from the LCI method approaches
characterization, normalization and weighting, after the allocation procedure by using the avoided burdens method.

## Data selection and combination
The data of copper slag treatment were mainly derived from a dominant copper company in China. The production data of cement and brick mostly came from real plant that adopts advanced equipment and processes, supplemented by published literature.

## Data treatment and extrapolations
GaBi 4 software was used to model the copper recycling system and determine the environmental impacts in this study. The Eco-Indicator 99 (EI99) was applied for the life cycle impact assessment

## Use advice
When using the data set for life cycle assessment (LCA), users must ensure that the methodological choices, like the allocation procedure and the avoided burdens method, align with the specific context of their study. The functional unit, set as 1 ton of recycled copper slag, must remain consistent throughout the analysis. This data should be utilized understanding it reflects the technological capabilities and environmental conditions pertaining to a dominant copper company in China in 2010, documented via an internal report. Any updates or changes in the practices since then should be considered in the analysis. The use of GaBi 4 software and the Eco-Indicator 99 (EI99) for impact assessment suggests compatibility with similar LCA software and methods.

## Review details
Inventory: The internal review was done by several iteration steps concerning raw data validation, raw data documentation, representativity, completeness and consistency of modelling with regard to ISO 14040 and 14044.

## Data sources
- Song, X. L., Yang, J. X., Wang, J. W. & Wu, W. J. Assessing the Life Cycle Environmental and Economic Performance of Copper Slag Recycling. AMR 878, 219–225 (2014).
