# clinker production;clinker;selective catalytic reduction denitration technology

Dataset: ILCD process, Unit process, black box
Geography: TJ-CN
Reference year: 2010
Classification: Unit processes / Materials production / Other mineralic materials
Generated by: #REF!, ysqsophia@gmail.com
Owner: Tiangong LCI Data Working Group
Review: Dependent internal review by Tiangong LCI Data Working Group
Amounts: no units in this file; such an amount is in the reference unit of its flow, which a separate flow dataset defines
copyright: false
licenseType: Free of charge for all users and uses

## General comment
The cement inventories without selective catalytic reduction (SCR) reactor are calculated as the bench mark.

## Geography
SINOMA Corporation Branch in Tianjin City

## Technical purpose
The clinker production data set represents the use of selective catalytic reduction denitration (SCR DeNOx) technology in the cement production process. It is applicable to life cycle assessments of cement manufacturing, particularly in evaluating the environmental performance of using an SCR system to reduce NOx emissions during the clinker incineration phase. The process is specific to Sinoma International Tianjin Branch's facility and includes steps such as coal and raw material transportation, grinding, and clinker incineration with SCR DeNOx implementation.

## Model description
The LCA model uses selective catalytic reduction denitrification (SCR DeNOx) technology as its SCR system to model the entire life cycle of cement production. The life cycle includes coal and raw material transportation, coal and raw meal grinding, clinker incineration, and finally sending flue gas containing NOx into the SCR reactor. The functional unit is 1 ton of clinker.

## Reference product
- clinker: 1000
  Clinker

## Inputs
- hard coal; 26.3 MJ/kg: 146
  Coal
- limestone, crushed, for mill: 1533
  Limestone
- sandstone: 52.96
  Sandstone
- Electricity: 227.448

## Outputs
All rows: uniform
- carbon dioxide (fossil): 807.3; min 807.3; max 807.3
  CO2
- carbon monoxide (fossil): 1.765; min 1.765; max 1.765
  CO
- sulfur dioxide: 0.004573; min 0.004573; max 0.004573
  SO2
- nitrogen monoxide: 0.4071; min 0.4071; max 0.4071
  NO
- nitrogen dioxide: 0.06935; min 0.06935; max 0.06935
  NO2
- particles (> PM10): 0.01692; min 0.01692; max 0.01692
  PM. The particle size is not specified. Here we treat it as PM>10.
- non-methane volatile organic compounds: 0.0002896; min 0.0002896; max 0.0002896
  NMVOC
- arsenic: 2.21e-5; min 7.621e-6; max 3.658e-5
  As
- cadmium: 3.811e-6; min 1.524e-6; max 6.097e-6
  Cd
- chromium: 1.524e-5; min 1.524e-5; max 1.524e-5
  Cr
- mercury: 9.906e-7; min 7.621e-7; max 1.219e-6
  Hg
- nickel: 2.286e-5; min 1.219e-5; max 3.353e-5
  Ni
- lead: 5.335e-5; min 1.524e-5; max 9.145e-5
  Pb
- zinc: 6.706e-5; min 1.524e-6; max 0.0001326
  Zn
- fluorine: 0.000218; min 0.000218; max 0.000218
  F
- 2,3,7,8-tetrachlorodibenzo-p-dioxin: 4.42e-11; min 4.42e-11; max 4.42e-11
  Dioxin
- cadmium: 1.524e-6; min 1.524e-6; max 1.524e-6
  Cu
- hydrogen chloride: 0.0001951; min 0.0001951; max 0.0001951
  HCI

## Data selection and combination
In 2010, Sinoma International Tianjin Branch conducted thermal balance and material balance measurements. Input and output data come from this report.

## Data treatment and extrapolations
The raw data of pollutant emissions are given as maximum and minimum values. We calculated the mean assuming a uniform distribution.

## Sampling procedure
Some data are presented as minimum and maximum values ​​to take into account formal fluctuations in emissions.

## Use advice
Users of this LCA data set pertaining to clinker production with SCR DeNOx technology should note the data is derived from thermal and material balance measurements specific to Sinoma International Tianjin Branch in 2010. Emission data is based on reported maximum and minimum values treated with an assumption of uniform distribution for average calculation. Users are advised to consider the technological applicability of the data, potential methodological variances for other locations or technologies, and to factor in specific use-phase behavior when modeling. Caution should be taken in generalizing results without considering local context and technology variations.

## Review details
Inventory: The internal review was done by several iteration steps concerning raw data validation, raw data documentation, representativity, completeness and consistency of modelling with regard to ISO 14040 and 14044.

## Data sources
- Chen Li, Suping Cui, Xianzheng Gong, Xiance Meng, & Boxue Sun. (2013). LCI Study of SCR DeNOx Technology for Cement Industry (XF Tang, Y Wu, Y Yao, & ZZ Zhang, Eds.; WOS:000319791800042; Vols. 743–744, pp. 252–257).
