# Veterinarygeneticallyengineereddrugsandvaccines|Microorganismsandmicrobialmetabolitesoranimalserum|Bioengineering process|less than200 kg/a / 兽用基因工程药物和疫苗|微生物及微生物代谢产物或动物血清|生物工程工艺|小于201千克/年

Dataset: ILCD process, Unit process, single operation
Geography: CN
Reference year: 2019
Classification: Other Services / Health, social services, beauty and wellness
Generated by: The data was created by the Office of the Second National Pollution Source Census of the Ministry of Ecology and Environment, and the data was organized by the TianGong Plan team for ILCD format / 生态环境部第二次全国污染源普查工作办公室创建数据，天工计划团队常慧敏整理数据为ILCD格式
Owner: Tiangong LCI Data Working Group / 天工LCI数据工作小组
Amounts: no units in this file; such an amount is in the reference unit of its flow, which a separate flow dataset defines
copyright: false
licenseType: Free of charge for all users and uses

## Technology and included processes
the Technical of end-of-pipe management technology for pollution Gene Engineered Subunit VaccineisPhysicochemical treatment + anaerobic hydrolysis + aerobic biological treatment，Its Technical efficiency of end-of-pipe management97.7，The formula for calculating the actual operation rate (k-value) of the end-of-pipe treatment facility is k = operating time of waste gas treatment facilities (hours) / annual normal production time of enterprise (hours)

## Reference product
- Gene Engineered Subunit Vaccine: 1; calculated
  源文件中描述为为兽用基因工程药物和疫苗，此处对其进行了匹配工作，将其匹配到LCAflow库里面相最符合的流，污染物指标备注为总磷

## Outputs
- phosphorus, total: 0.00483; calculated
  污染物指标总磷的末端治理技术是物化处理+厌氧水解+好氧生物处理，其效率为97.7，末端治理设施实际运行率（k值）计算公式为k=治理设施运行时间（天）/正常生产时间（天）。原文件中描述污染物类别为废水，污染物指标为总磷，此处对其进行了匹配工作，将其匹配到LCAflow库里面相最符合的流，污染物指标备注为总磷

## Data sources
- 第二次全国污染源普查产排污核算系数手册（试用版）,二级代码27,三级代码275.0文件，在完整版文件中第3158页
