# equipment installation and withdrawal ; coal mining

Dataset: ILCD process, Unit process, single operation
Geography: LF-SX-CN
Reference year: 2022
Classification: Other Services / Engineering and consulting
Generated by: Linlin Yin, yinlinlin0623@163.com
Owner: Tiangong LCI Data Working Group
Review: Dependent internal review by Tiangong LCI Data Working Group
Amounts: no units in this file; such an amount is in the reference unit of its flow, which a separate flow dataset defines
licenseType: Free of charge for all users and uses

## General comment
The equipment installation and withdrawal process described pertains to a coal mining operation. The data set is relevant for understanding the logistical and temporal aspects of handling mining equipment in large-scale coal extraction. Specifically, it can apply to scenarios where year-round production schedules and equipment management are crucial in industrial mining activities.

## Geography
The annual output of M coal mine is 1.2 million tons, and the actual working time is 360 days per year, so the working face needs 499 days to complete the mining. In the mining process of a working face in M coal mine, the time of installation and withdrawal of equipment is half a month respectively. In one year of production, the time of excavation is 11 months, and the time of mining is 10 months.

## Technology and included processes
Equipment Installation and Equipment Retracement

## Reference product
- carbon dioxide (fossil): 1.06648e7; uniform; article inperiodical
  Based on the time schedule of each stage in the life cycle of coal mining in M ​​Coal Mine and the mining time of the entire working face, it is calculated that the power consumption of equipment installation and withdrawal during the entire life cycle of mining in this working face is 14413.87 mw·h. of CO2 emissions.

## Inputs
- Electricity: 5.18899e7; uniform; article inperiodical
  Based on the time schedule of each stage in the full life cycle of coal mining in M ​​Coal Mine and the mining time of the entire working face, the power consumption of equipment installation and withdrawal during the full life cycle of mining in this working face was calculated.

## Use advice
Data set users should account for the time allocation of equipment installation and withdrawal when modelling the lifecycle of the coal mining process. Notably, the time dedicated to equipment setup and retraction must be included in the overall process time for accuracy. Users should also note that the equipment is inactive for one month per year due to these processes. It is advised to ensure the operational timeline reflects reality and that the assumptions about equipment utility time are consistent with this data's representation.

## Review details
Inventory: The internal review was done by several iteration steps concerning raw data validation, raw data documentation, representativity, completeness and consistency of modelling with regard to ISO 14040 and 14044.
