# Natural gas reservoir development ; Geology of abundant gas reservoir reserves ; Multi-attribute development decision making

Dataset: ILCD process, Unit process, single operation
Geography: SC-CN
Reference year: 2013
Classification: Unit processes / Energy carriers and technologies / Natural gas based fuels
LCI method principle: Attributional
LCI method approaches: Consequential
Generated by: Shikang Kang, 908798159@qq.com
Owner: Tiangong LCI Data Working Group
Review: Dependent internal review by Tiangong LCI Data Working Group
Amounts: no units in this file; such an amount is in the reference unit of its flow, which a separate flow dataset defines
copyright: false
licenseType: Free of charge for all users and uses

## General comment
The multi-attribute decision-making method is applied to the natural gas development decision-making field, and a comprehensive evaluation model is constructed. Through the model analysis and calculation results, we can know how the exploitation sequence will maximize the benefit

## Geography
Sichuan oil and gas field is an oil and gas producing area located in southwest China with Sichuan basin as the center

## Time period
Data collection time

## Technology and included processes
Taking Sichuan gas field as the research object, 12 blocks are selected as evaluation samples. According to the index system constructed in chapter four and the evaluation method described, the exploration and development of Sichuan gas field are decided and the optimal ranking is made.

## Technical purpose
The natural gas reservoir development process described is intended for assessing and optimizing the exploitation sequence of gas fields in Sichuan, China. This involves the application of multi-attribute decision-making methods to maximize the benefits from the development of gas reserves.

## Model description
Based on the theory of the second chapter, combined with the characteristics of natural gas reservoir development decision-making, the evaluation factors, attribute weights and comprehensive evaluation methods of the decision-making are determined, and the calculation models are established respectively.

## Reference product
- Shale gas well: 0.8861; input; min 0.6362; max 0.8861; uniform; missing unimportant
  weight coefficient

## Inputs
- natural gas: 706; log-normal
  Gas reservoir burial depth

## Outputs
- methane (fossil): 706; log-normal
  There is no mining output of natural gas in the literature. Assume that the input in the process of natural gas production: output=1:1

## Data selection and combination
Twelve blocks of Sichuan gas field are selected, namely: Xinchangpeng 1, Xinchangpeng 2, Xinchang Shaxi Temple, Hexingchang Penglai Town, Hexingchang Xuer, Luodaipeng 1, Luodaipeng 2, Luodaipeng 3, Luodaipeng 4, Majing Penglai Town, Xindu Penglai Town and Dongtai Penglai Town, which are expressed by p= {p1, p2,... p12}. From the fourth chapter, we have selected eight indexes as the evaluation criteria

## Data treatment and extrapolations
The important and difficult point of this paper lies in the determination of weight coefficient. At present, there are two commonly used methods: subjective weight method and objective weight method, but both methods have their advantages and some shortcomings. In order to make up for their shortcomings, this paper adopts the combination weight method of maximum deviation, which integrates subjective and objective weights to determine the final weight value of attributes. More scientific.

## Use advice
Users should apply the provided data sets and comprehensive evaluation models considering the determined evaluation factors and attribute weights. Attention should be given to the methodological advice on decision-making for exploration and development projects, including the integration of subjective and objective weights for a more scientific weighting coefficient, as well as the optimum ranking of the 12 selected blocks in the Sichuan gas field.

## Review details
Inventory: The internal review was done by several iteration steps concerning raw data validation, raw data documentation, representativity, completeness and consistency of modelling with regard to ISO 14040 and 14044.

## Data sources
- 刘亚莉. 基于多属性决策的天然气气藏开发决策方法研究[D].西安石油大学,2013.
