# Electricity production ; Electricity mix ; Xinjiang

Dataset: ILCD process, Unit process, single operation
Geography: XJ-CN
Reference year: 2019
Classification: Unit processes / Energy carriers and technologies / Electricity
Generated by: Ruoxi Xiong, xiongrx0126@163.com
Owner: Tiangong LCI Data Working Group
Review: Dependent internal review by Tiangong LCI Data Working Group
Amounts: no units in this file; such an amount is in the reference unit of its flow, which a separate flow dataset defines
copyright: false
licenseType: Free of charge for all users and uses

## General comment
Electricity mix includes thermal, hydro, wind, nuclear and solar generation

## Technical purpose
This dataset represents the electricity mix used for various applications across different industries in the Xinjiang Uyghur Autonomous Region. It includes electricity generated from thermal (likely coal or gas), hydroelectric, wind, nuclear, and solar power plants. This mix is employed in residential, commercial, and industrial applications where a combination of reliability and renewable energy sources is desired. Such a mix could be particularly suitable for companies aiming to optimize their energy consumption mix for sustainability and environmental impact considerations.

## Reference product
- Electricity: 3.6; missing unimportant
  [{'text': '能量', 'type': 'text'}]

## Inputs
All rows: missing unimportant
- electricity for thermal power: 2.78419
  [{'text': '能量', 'type': 'text'}]
- electricity from hydroelectric power plant: 0.285386
  [{'text': '能量', 'type': 'text'}]
- electricity for nuclear power: 0
  [{'text': '能量', 'type': 'text'}]
- electricity from wind power: 0.400525
  [{'text': '能量', 'type': 'text'}]
- electricity for solar power: 0.129899
  [{'text': '能量', 'type': 'text'}]

## Use advice
When utilizing this dataset for Life Cycle Assessment (LCA), users should note that the data represents an average electricity mix specific to the Xinjiang Uyghur Autonomous Region. It should be applied to processes or products that are geographically and temporally relevant to this region. It is also essential to consider the technological evolution and expected life span of the assessed product or process to ensure the accuracy of the impact assessment over time. Furthermore, users may need to account for future changes in the electricity mix due to policy shifts and technological developments in the energy sector. The inclusion or exclusion of upstream impacts (e.g., transportation of fuel) and the potential for future recycling should be considered based on the goals of the specific LCA study.

## Review details
Inventory: The internal review was done by several iteration steps concerning raw data validation, raw data documentation, representativity, completeness and consistency of modelling with regard to ISO 14040 and 14044.

## Data sources
- 能源统计年鉴2020
