# Pre-treatment soil ; Soil ex situ remediation ; Thermal desorption ; Soil pre-treating ; Including shed construction

Dataset: ILCD process, Unit process, black box
Geography: CN
Reference year: 2022
Classification: Unit processes / Other Services / Repair and maintenance
Generated by: Wang Feng, wangfeng@caep.org.cn
Owner: Tiangong LCI Data Working Group
Review: Dependent internal review by Tiangong LCI Data Working Group
Amounts: no units in this file; such an amount is in the reference unit of its flow, which a separate flow dataset defines
copyright: false
licenseType: Free of charge for all users and uses

## General comment
Remediation of 1 cubic meter of contaminated soil by ectopic thermal desorption. In order to prevent odor dissipation and secondary pollution, the contaminated soil needs to be broken in a negative pressure greenhouse made of PVDF membrane. Pretreatment processes such as crushing, screening, and moisture content adjustment

## Geography
我国华东区域5 个污染土壤异位热脱附修复工程案例

## Technology and included processes
In order to prevent odor emission and secondary pollution, the contaminated soil needs to be broken in the negative pressure greenhouse of PVDF membrane material.

## Technical purpose
The described industrial process is applied in the environmental engineering field for the remediation of contaminated soil. Specifically, it refers to an ex situ soil treatment method using thermal desorption to clean contaminated soil. The process includes pre-treatment steps such as crushing, screening, and moisture adjustment, conducted within a negative pressure greenhouse constructed with PVDF membrane material. This ensures the prevention of odor release and secondary pollution during the remediation process. This method is suitable for large-scale soil clean-up projects, particularly in the East China region, as exemplified by five case studies.

## Reference product
- Pre-treatment Soil: 1; measured

## Inputs
All rows: measured
- Diesel,Diesel: 0.00075
  基于我国华东区域 5 个污染土壤异位热脱附修复工程案例，得到异位热脱附修复 1 m3 污染土壤的平均能源和材料投入量
- Limestone: 6
- Steel: 0.13
- Polyvinylidene fluoride: 0.00108
  文中给出PVDF膜用量为0.0012 m2，根据填报人经验，PVDF膜密度约900 g/m2，因此此处填写0.0012*900=1.08 g。
- Concrete: 0.0054
- Electricity: 9.07
- Excavated soil,Excavated soil: 1

## Outputs
- Waste (solid): 50; measured

## Use advice
Users of this life cycle assessment data should consider the specific context of the soil remediation process including the material characteristics and the environmental controls in place. When applying the data to other projects, it is important to verify the soil type and level of contamination correspond to those described in the five East China case studies. Pay attention to the technological applicability, ensuring similar pre-treatment conditions and the use of an appropriate negative pressure system with PVDF membrane for odor and pollution control, as variations might lead to different environmental impacts.

## Review details
Inventory: The internal review was done by several iteration steps concerning raw data validation, raw data documentation, representativity, completeness and consistency of modelling with regard to ISO 14040 and 14044.

## Data sources
- 刘爽,陈盼,宋慧敏等.我国华东地区污染土壤异位热脱附修复碳排放及减排策略[J].环境工程学报,2022,16(08):2663-2671.
