# cement production;cement, ordinary portland cement, 42.5MPa;new dry process, 4000 t-cl/d;mixed solid wastes

Dataset: ILCD process, Unit process, black box
Geography: CN
Reference year: 2005
Classification: Materials production / Other mineralic materials
Generated by: Siqi Yang, ysqsophia@gmail.com
Owner: Tiangong LCI Data Working Group
Review: Dependent internal review by Tiangong LCI Data Working Group
Amounts: no units in this file; such an amount is in the reference unit of its flow, which a separate flow dataset defines
copyright: false
licenseType: Free of charge for all users and uses

## General comment
Precalciner kiln dry process cement production is a typical representative of new dry process. The process flow of new dry process cement production line of precalciner kiln with a daily production capacity of 4000t clinker in China.Limestone from the mine is transported into the crusher feed bib by the dump truck. crushed by crusher and crusher, sent to the crushed stone storage, and then sent to the pre-homogenization yard by skirt plate feeder and belt conveyor in a quantitative manner. Clay is imported by dump truck or unloaded from the clay pile shed of the plant into the clay feed bin by bucket, fed by feeder into the double-roll crusher for crushing, and sent to the pre-batch homogenization yard by metering equipment. The limestone and clay are automatically combined in the pre-batching homogenizing yard and homogenized into a uniform mixed raw material. The mixed raw materials, limestone and iron powder are sent to the feeding bin of the grinding head of the raw mill from the yard by belt conveyor, and then sent to the drying mill for drying and grinding by quantitative unloading and feeding. The hot gas for the drying mill comes from the exhaust gas discharged from the suspension preheater, and the hot air is supplied with the help of the hot air furnace during start-up.The powdered raw meal after grinding is lifted by a pneumatic pump and sent to two continuous air homogenization silos for further air mixing and storage. The raw material in the homogenizing storage is discharged, measured, lifted and fed into the suspension preheater and decomposer at the kiln tail by the pneumatic pump, and then preheated and decomposed. After that, it enters the rotary kiln for calcination to produce clinker. The raw coal used in the rotary kiln and decomposition furnace is dried and ground to make coal powder and stored in the coal powder bin for supply. The clinker is cooled by castor cooler and then sent to the clinker storage by skirt conveyor, metering scale and bucket elevator respectively.The clinker and gypsum are fed into the cement mill for grinding by a metering device. The cement mill with powder selector constitutes a so-called ring-flow cement mill, which can also be ground with the appropriate amount of mixed materials and clinker and gypsum according to the product requirements. After grinding, the cement is sent to the cement warehouse by the silo air transfer pump for storage. Part of the cement is packaged in bags by the packaging machine and transported out of the factory by train or truck, while the other part is shipped in bulk by bulk special vehicle.

## Technology and included processes
Limestone 1 from the mine is transported to the crusher feeding bin by dump trucks, crushed by crusher 6 and crusher 7, and sent to the gravel bin for storage. Homogenization yard 9. The clay is imported with a dump truck or unloaded from the clay storage shed of the factory with a bucket into the clay feeding bin. It is fed to the double-roller crusher through the feeder for crushing and sent to the pre-batched pre-homogenization storage yard through the metering equipment9 . Limestone and clay are automatically mixed in the pre-batching and homogenization yard and homogenized into a uniform mixed raw material. The mixed raw materials, limestone and iron powder 3 are each sent from the stockyard by a belt conveyor to the grinding head feeding bin of the raw material mill 1. After quantitative unloading, the feed material is sent to the drying mill for drying and powder grinding. The hot gas of the drying mill comes from the exhaust gas discharged from the suspension preheater 14. When starting up, the hot air furnace is used to supply hot air.The ground raw meal is sent to two continuous air homogenization warehouses using a pneumatic lift pump 12, and the air is further used to stir the homogenized raw meal and store the raw meal. After unloading, measuring, lifting and quantitative feeding, the raw meal in the homogenization warehouse is pumped by pneumatic lift to the suspension preheater 14 and decomposition furnace 15 at the end of the kiln. The preheated and decomposed materials enter the rotary kiln 16 for forging Burn clinker. The raw coal used in the rotary kiln and decomposition furnace 4 is dried and ground to produce pulverized coal and is stored in the pulverized coal bin for supply. After the clinker is cooled by the grating cooler 17, it is sent to the clinker warehouse for storage by the skirt conveyor, weighing scale, and bucket elevator respectively.Clinker and gypsum 5 are fed into the cement mill for grinding through a quantitative feeding machine. The cement mill 23 is equipped with a powder selector 24 to form a so-called circle flow cement mill. When grinding, an appropriate amount of mixed materials can also be added according to product requirements to grind together with clinker and gypsum. The ground cement is sent to the cement warehouse 2 and 6 for storage through a warehouse-type air transfer pump 25. Part of the cement is packaged into bagged cement by a packaging machine 27 and transported to the factory by train or truck 28. The other part is shipped in bulk by a special bulk truck 29. .

## Technical purpose
This dataset describes the production of ordinary Portland cement with a strength of 42.5MPa using the new dry process technology. It is typically applied in construction projects requiring high-strength concrete and is suitable for various types of large-scale civil engineering and architectural works.

## Model description
The functional unit is the service performance of 1 kilogram of cement with a 28-day compressive strength of 42.5MPa, that is, IFu=42.5kgMPa.The research scope is defined as: raw material pretreatment, raw material grinding, raw material calcination, clinker grinding, cement homogenization, and cement storage.

## Reference product
- cement, ordinary portland cement, 42.5MPa: 1000
  42.5 grade silicate composite cement cement

## Inputs
- limestone, crushed, for mill: 1073.7
  Limestone
- gypsum stone (CaSO4-dihydrate): 51.1
  Gupsum
- ash: 98
  Fly ash
- blast furnace slag: 137.6
  The original document is labeled as "slag" (i.e. blast furnace slag).
- hard coal: 100.957
  The original data is 0.0938kg standard coal, here converted to hard coal, the conversion formula is 1kg hard coal = 0.929kg standard coal.
- electricity, medium voltage: 347.76
  Electricity

## Outputs
- particles (> PM10): 0.15
  Dust, with an unspecified particle size, is treated as PM > 10 micrometers in diameter.
- sulfur dioxide: 0.3501
  Sulfur dioxide. Considering the actual operating conditions of domestic cement plants and the development trend for the foreseeable future, the statistical average of measured data is adopted for this evaluation.
- Nitrogen oxides: 1.419
  Nitrogen oxides. Considering the actual operating conditions of domestic cement plants and the development trend for the foreseeable future, the statistical average of measured data is adopted for this evaluation.
- carbon dioxide: 807.3
  Carbon dioxide. Considering the actual operating conditions of domestic cement plants and the development trend for the foreseeable future, the statistical average of measured data is adopted for this evaluation.

## Use advice
The dataset outlines the life cycle assessment of cement production and should be used considering the prescribed boundary which includes raw material pretreatment, raw material grinding, raw material calcination, clinker grinding, cement homogenization, and cement storage. Users must account for other emissions and energy use beyond this scope separately. Ensure that the application of this data is consistent with the 42.5MPa strength grade and matches the technology described; discrepancies between the processes may lead to inaccuracies in assessment results.

## Review details
Inventory: The internal review was done by several iteration steps concerning raw data validation, raw data documentation, representativity, completeness and consistency of modelling with regard to ISO 14040 and 14044.

## Data sources
- 曹晓润. (2005). 低环境负荷型水泥的生态环境评价 [硕士, 武汉理工大学].
