# Gold clay or gold-bearing carbon ; Gold Concentrate ; Cyclic roasting + thiourea gold leaching ; All sizes; NESPS2 / 金泥或载金炭 ; 金精矿 ; 循环焙烧+硫脲浸金 ; 所有规模 ; 全国第二次污染普查数据

Dataset: ILCD process, Unit process, single operation
Geography: CN
Reference year: 2019
Classification: Reference Parameters / Materials production / Metals and semimetals
Generated by: The data was created by the Office of the Second National Pollution Source Census of the Ministry of Ecology and Environment, and the data was organized by the TianGong Plan team for ILCD format / 生态环境部第二次全国污染源普查工作办公室创建数据，天工计划团队常慧敏整理数据为ILCD格式
Owner: Tiangong LCI Data Working Group / 天工LCI数据工作小组
Review: Dependent internal review by Tiangong LCI Data Working Group / 天工LCI数据工作小组
Amounts: no units in this file; such an amount is in the reference unit of its flow, which a separate flow dataset defines
copyright: false
licenseType: Free of charge for all users and uses

## General comment
the Technical of end-of-pipe management technology for pollution Exhaust gasis/

## Technical purpose
所述的金泥或含金量的碳金精矿主要用于贵金属行业中提取金。该精矿经过循环焙烧和硫脲浸金工序来回收金。数据集表明这些工序可适用于各种规模的操作。末端处理技术，如中和法和各种过滤方法，被用于处理废水和废气，针对的污染物包括化学需氧量、镉、铅、砷、汞、PM2.5-PM10和二氧化硫。

## Reference product
- Gold concentrate: 1000; input; calculated
  源文件中描述为为金精矿，此处对其进行了匹配工作，将其匹配到LCAflow库里面相最符合的流，污染物指标备注为工业废水量

## Outputs
All rows: calculated
- Mercury: 9.8e-7
  the Technical of end-of-pipe management technology for pollution MercuryisNeutralization method，Its Technical efficiency of end-of-pipe management30
  污染物指标汞的末端治理技术是中和法，其效率为30，末端治理设施实际运行率（k值）计算公式为k=废水治理设施年正常运行时间（小时）/企业年正常生产时间（小时）。原文件中描述污染物类别为废水，污染物指标为汞，此处对其进行了匹配工作，将其匹配到LCAflow库里面相最符合的流，污染物指标备注为汞
- chemical oxygen demand: 0.091
  the Technical of end-of-pipe management technology for pollution chemical oxygen demandisNeutralization method，Its Technical efficiency of end-of-pipe management30
  污染物指标化学需氧量的末端治理技术是中和法，其效率为30，末端治理设施实际运行率（k值）计算公式为k=废水治理设施年正常运行时间（小时）/企业年正常生产时间（小时）。原文件中描述污染物类别为废水，污染物指标为化学需氧量，此处对其进行了匹配工作，将其匹配到LCAflow库里面相最符合的流，污染物指标备注为化学需氧量
- particles (PM2.5 - PM10): 0.2648
  the Technical of end-of-pipe management technology for pollution particles (PM2.5 - PM10)isSettling chamber + cyclone dust collector + bag filter，Its Technical efficiency of end-of-pipe management99
  污染物指标颗粒物的末端治理技术是沉降室+旋风除尘器+袋式除尘，其效率为99，末端治理设施实际运行率（k值）计算公式为k=废气治理设施年正常运行时间（小时）/企业年正常生产时间（小时）。原文件中描述污染物类别为废气，污染物指标为颗粒物，此处对其进行了匹配工作，将其匹配到LCAflow库里面相最符合的流，污染物指标备注为颗粒物
- cadmium: 0.00028
  the Technical of end-of-pipe management technology for pollution cadmiumisNeutralization method，Its Technical efficiency of end-of-pipe management30
  污染物指标镉的末端治理技术是中和法，其效率为30，末端治理设施实际运行率（k值）计算公式为k=废水治理设施年正常运行时间（小时）/企业年正常生产时间（小时）。原文件中描述污染物类别为废水，污染物指标为镉，此处对其进行了匹配工作，将其匹配到LCAflow库里面相最符合的流，污染物指标备注为镉
- arsenic: 0.000798
  the Technical of end-of-pipe management technology for pollution arsenicisNeutralization method，Its Technical efficiency of end-of-pipe management30
  污染物指标砷的末端治理技术是中和法，其效率为30，末端治理设施实际运行率（k值）计算公式为k=废水治理设施年正常运行时间（小时）/企业年正常生产时间（小时）。原文件中描述污染物类别为废水，污染物指标为砷，此处对其进行了匹配工作，将其匹配到LCAflow库里面相最符合的流，污染物指标备注为砷
- sulfur dioxide: 1.059
  the Technical of end-of-pipe management technology for pollution sulfur dioxideisHydrogen peroxide + three-stage surge tower lime milk washing，Its Technical efficiency of end-of-pipe management95
  污染物指标二氧化硫的末端治理技术是双氧水+三级喘动塔石灰乳洗涤，其效率为95，末端治理设施实际运行率（k值）计算公式为k=废气治理设施年正常运行时间（小时）/企业年正常生产时间（小时）。原文件中描述污染物类别为废气，污染物指标为二氧化硫，此处对其进行了匹配工作，将其匹配到LCAflow库里面相最符合的流，污染物指标备注为二氧化硫
- lead: 0.00126
  the Technical of end-of-pipe management technology for pollution leadisNeutralization method，Its Technical efficiency of end-of-pipe management30
  污染物指标铅的末端治理技术是中和法，其效率为30，末端治理设施实际运行率（k值）计算公式为k=废水治理设施年正常运行时间（小时）/企业年正常生产时间（小时）。原文件中描述污染物类别为废水，污染物指标为铅，此处对其进行了匹配工作，将其匹配到LCAflow库里面相最符合的流，污染物指标备注为铅
- Nitrogen oxides: 1.33
  the treatment technology for the pollution of Nitrogen oxidesdidn't offered
  污染物指标氮氧化物的末端治理技术未说明，末端治理设施实际运行率（k值）计算公式为k=废气治理设施年正常运行时间（小时）/企业年正常生产时间（小时）。原文件中描述污染物类别为废气，污染物指标为氮氧化物，此处对其进行了匹配工作，将其匹配到LCAflow库里面相最符合的流，污染物指标备注为氮氧化物
- Waste water: 2000
  the Technical of end-of-pipe management technology for pollution Waste wateris/
  污染物指标工业废水量的末端治理技术是/，末端治理设施实际运行率（k值）计算公式为k=废水治理设施年正常运行时间（小时）/企业年正常生产时间（小时）。原文件中描述污染物类别为废水，污染物指标为工业废水量，此处对其进行了匹配工作，将其匹配到LCAflow库里面相最符合的流，污染物指标备注为工业废水量
- arsenic: 0.00865
  the Technical of end-of-pipe management technology for pollution arsenicisSettling chamber + cyclone dust collector + bag filter，Its Technical efficiency of end-of-pipe management99
  污染物指标砷及其化合物的末端治理技术是沉降室+旋风除尘器+袋式除尘，其效率为99，末端治理设施实际运行率（k值）计算公式为k=废气治理设施年正常运行时间（小时）/企业年正常生产时间（小时）。原文件中描述污染物类别为废气，污染物指标为砷及其化合物，此处对其进行了匹配工作，将其匹配到LCAflow库里面相最符合的流，污染物指标备注为砷及其化合物
- lead: 0.01218
  the Technical of end-of-pipe management technology for pollution leadisSettling chamber + cyclone dust collector + bag filter，Its Technical efficiency of end-of-pipe management99
  污染物指标铅及其化合物的末端治理技术是沉降室+旋风除尘器+袋式除尘，其效率为99，末端治理设施实际运行率（k值）计算公式为k=废气治理设施年正常运行时间（小时）/企业年正常生产时间（小时）。原文件中描述污染物类别为废气，污染物指标为铅及其化合物，此处对其进行了匹配工作，将其匹配到LCAflow库里面相最符合的流，污染物指标备注为铅及其化合物
- Exhaust gas: 17653
  the Technical of end-of-pipe management technology for pollution Exhaust gasis/
  污染物指标工业废气量的末端治理技术是/，末端治理设施实际运行率（k值）计算公式为k=废气治理设施年正常运行时间（小时）/企业年正常生产时间（小时）。原文件中描述污染物类别为废气，污染物指标为工业废气量，此处对其进行了匹配工作，将其匹配到LCAflow库里面相最符合的流，污染物指标备注为工业废气量

## Use advice
This dataset is derived from the Pollution Source Census Report and contains information on pollution emissions and related products. However, it does not include data on energy or chemical consumption, nor does it provide information on waste or co-product generation. When utilizing this dataset, please supplement the missing data based on actual conditions before use
该数据集来源于污染源普查报告，包含污染物排放及相关产品信息，但不包含能源或化学品消耗数据，也不提供废弃物或共生产物产生信息。在使用该数据集时，请根据实际情况补充缺失数据后再使用。

## Review details
Inventory: The internal review was done by several iteration steps concerning raw data validation, raw data documentation, representativity, completeness and consistency of modelling with regard to ISO 14040 and 14044.
清单： 内部审查通过几个迭代步骤完成，涉及原始数据验证、原始数据记录、代表性、完整性、与 ISO 14040 和 14044 有关的建模的一致性。

## Data sources
- 第二次全国污染源普查产排污核算系数手册（试用版）,四级代码3221文件，在完整版文件中第5074页
