# Recycled silicon and aluminum alloy production ; Recycled silicon and aluminum alloy ; Consumption of circulating aluminum scrap

Dataset: ILCD process, Unit process, single operation
Geography: ZJ-CN
Reference year: 2011
Classification: Unit processes / Materials production / Metals and semimetals
Generated by: Jinliang Xie, jinliang.research@gmail.com
Owner: Tiangong LCI Data Working Group
Review: Dependent internal review by Tiangong LCI Data Working Group
Amounts: no units in this file; such an amount is in the reference unit of its flow, which a separate flow dataset defines
copyright: false
licenseType: Free of charge for all users and uses

## General comment
aluminum scrap, post-consumer

## Time period
Literature published in 2011

## Technical purpose
The recycled silicon and aluminum alloy produced in this process is typically employed in the manufacturing of various aluminum products where secondary aluminum is suitable. Typical applications include the automotive and construction industries, components for electronic devices, and consumer goods where aluminum's strength-to-weight ratio and corrosion resistance are advantageous.

## Reference product
- Silicon Aluminum Alloy: 1000; measured
  Recycled Aluminum Alloy (Recycled high silicon aluminum alloy)

## Inputs
All rows: measured
- electricity, high voltage, aluminium industry: 129.6
- potassium chloride: 1.44
- Barium chloride: 2.66
  Barium chloride (BaCl2)
- Copper, in ground: 8
  copper
- Silicon, in ground: 120
- Water, unspecified natural origin: 6.11
  water
- Nitrogen: 0.25
- natural gas, high pressure: 76.67
  natural gas
- aluminium scrap, post-consumer: 1080
- buildings, unspecified: 0.0056
  buildings
- aluminium electrolysis facility: 34
  Equipment (yuan ; RMB)

## Outputs
- particles, unspecified: 0.24; measured
- chemical oxygen demand: 0.02; measured
- wastewater, average: 0.13; measured
  wastewater
- ammonia: 0.0034; measured
  Ammonia nitrogen (NH3-N)

## Use advice
When using this data set for Life Cycle Assessment, it is important to consider that it represents a process with geographical relevance for China, with specific energy mixes, particularly coal-based electricity generation. Users should align the system boundaries of their LCA study to include the stages of transport to the alloy production site, infrastructure of the production plant, chemicals and energy production, wastewater treatment, direct emissions, and scrap collection. The durability of building and equipment should be considered with a life span of 40 and 8 years, respectively. The European data sets used for the infrastructure and other background processes may require adaptation to reflect local conditions if applied in another geographical context.

## Review details
Inventory: The internal review was done by several iteration steps concerning raw data validation, raw data documentation, representativity, completeness and consistency of modelling with regard to ISO 14040 and 14044.

## Data sources
- Hong, J., Ismail, Z. Z. & Hong, J. Environmental and economic assessment of recycled aluminum alloy production - A case study of China. in Adv. Mater. Res. vols 146–147 1027–1030 (2011).
