# Electricity production ; Electricity mix ; Yunnan

Dataset: ILCD process, Unit process, single operation
Geography: YN-CN
Reference year: 2019
Classification: Unit processes / Energy carriers and technologies / Electricity
Generated by: Ruoxi Xiong, xiongrx0126@163.com
Owner: Tiangong LCI Data Working Group
Review: Dependent internal review by Tiangong LCI Data Working Group
Amounts: no units in this file; such an amount is in the reference unit of its flow, which a separate flow dataset defines
copyright: false
licenseType: Free of charge for all users and uses

## General comment
Electricity mix includes thermal, hydro, wind, nuclear and solar generation

## Technical purpose
The electricity generated from the described industrial process in Yunnan is used for both residential and industrial applications. This includes powering household appliances, lighting, heating and cooling systems in homes, as well as machinery, computer systems, and infrastructure in various industries such as manufacturing, technology, and services. The mix of sources ensures a more sustainable and reliable energy supply.

## Reference product
- Electricity: 3.6; missing unimportant
  [{'text': '能量', 'type': 'text'}]

## Inputs
All rows: missing unimportant
- electricity for thermal power: 0.32908
  [{'text': '能量', 'type': 'text'}]
- electricity from hydroelectric power plant: 2.96922
  [{'text': '能量', 'type': 'text'}]
- electricity for nuclear power: 0
  [{'text': '能量', 'type': 'text'}]
- electricity from wind power: 0.25177
  [{'text': '能量', 'type': 'text'}]
- electricity for solar power: 0.0499392
  [{'text': '能量', 'type': 'text'}]

## Use advice
When using the data set from the industrial process of electricity production in Yunnan, ensure that the energy mix reflects the actual proportions of thermal, hydro, wind, nuclear, and solar power generation. Factor in regional characteristics that may influence the overall environmental impact, such as the availability of renewable resources and the efficiency of local power plants. Pay attention to the temporal variation in the energy supply, as the proportions of each electricity source might fluctuate based on seasonal availability, especially for renewable sources like hydro and solar.

## Review details
Inventory: The internal review was done by several iteration steps concerning raw data validation, raw data documentation, representativity, completeness and consistency of modelling with regard to ISO 14040 and 14044.

## Data sources
- 能源统计年鉴2020
