# Hydrothermal liquefaction of biomass jet fuel

Dataset: ILCD process, Unit process, black box
Geography: CN
Classification: Unit processes / Energy carriers and technologies / Renewable fuels
Functional unit: 1 MJ aviation fuel
LCI method principle: Attributional
LCI method approaches: Allocation - gross calorific value
Generated by: Zhang Yixuan, zhangyixuan0444@igsnrr.ac.cn
Owner: Tiangong LCI Data Working Group
Review: Dependent internal review by Tiangong LCI Data Working Group
Amounts: no units in this file; such an amount is in the reference unit of its flow, which a separate flow dataset defines
licenseType: Free of charge for all users and uses

## General comment
The pathway is capable of using water as a medium to convert cellulosic biomass into bio-jet oil under reaction conditions of 250-550 °C and 5-25 MPa. Hydrothermal liquefaction technology is mainly divided into two stages, namely biomass liquefaction and bio-oil hydrogenation stage.

## Technical purpose
The hydrothermal liquefaction of biomass to produce jet fuel is a process wherein water is used as a solvent to transform cellulosic biomass into bio-jet fuel. Operating at conditions between 250-550 °C and pressures of 5-25 MPa, this technique is relevant for generating renewable aviation fuel. The process is typically segmented into two primary phases: the liquefaction of biomass and subsequent hydrogenation of the resulting bio-oil. This biomass-derived jet fuel is intended for use as a sustainable energy source within the aviation industry, primarily aimed at reducing the carbon footprint of air transportation.

## Model description
Build a simulation model of the complete process using Aspen Plus software and perform simulation calculations to obtain the mass flow, energy flow, thermodynamic parameters, and reactor power consumption of each process based on mass balance

## Reference product
- Electricity: 0.02628; input; calculated

## Inputs
- Electricity: 0.03492, 0.00828 (2 entries); calculated
- water: 0.096; calculated

## Outputs
- water: 0.1, 0.0058 (2 entries); calculated
- carbon monoxide (biogenic): 6.6e-5; calculated
  The original article does not distinguish between bio and fossil, and experts judge that this is bio
- hydrocarbons (unspecified): 6.8e-6; calculated

## Deviations from the LCI method approaches
Allocate environmental impact values according to energy allocation, that is, during the emission allocation process, allocate the energy of aviation fuel and other fuels to each MJ of aviation fuel production

## Use advice
When utilizing the LCA data set for hydrothermal liquefaction of biomass jet fuel, it is critical that users allocate environmental impact values prudently. The dataset requires energy allocation for proper accounting, where the impacts are divided proportionally based on the energy content of the jet fuel and other ancillary fuels produced. Specifically, the allocation should reflect the energy content per megajoule of jet fuel production. Methodological attention should also be given to analyzing the complete two-stage process - biomass liquefaction and bio-oil hydrogenation - to ensure a full life cycle assessment. Users must consider technological applicability assumptions, especially when generalizing the data for different scales or contexts outside the provided parameters.

## Review details
Inventory: The internal review was done by several iteration steps concerning raw data validation, raw data documentation, representativity, completeness and consistency of modelling with regard to ISO 14040 and 14044.

## Data sources
- 朱啸南. 基于生命周期评价的生物航油制备及利用对环境的影响研究. (浙江大学, 2022).
