# Beneficiation ; Refined ore ; Iron ore ; Strong magnetic separation ; All sizes; NESPS2 / 选矿 ; 精矿 ; 铁矿石 ; 强磁选 ; 所有规模 ; 全国第二次污染普查数据

Dataset: ILCD process, Unit process, single operation
Geography: CN
Reference year: 2019
Classification: Reference Parameters / Materials production / Metals and semimetals
Generated by: The data was created by the Office of the Second National Pollution Source Census of the Ministry of Ecology and Environment, and the data was organized by the TianGong Plan team for ILCD format / 生态环境部第二次全国污染源普查工作办公室创建数据，天工计划团队常慧敏整理数据为ILCD格式
Owner: Tiangong LCI Data Working Group / 天工LCI数据工作小组
Review: Dependent internal review by Tiangong LCI Data Working Group / 天工LCI数据工作小组
Amounts: no units in this file; such an amount is in the reference unit of its flow, which a separate flow dataset defines
copyright: false
licenseType: Free of charge for all users and uses

## General comment
the Technical of end-of-pipe management technology for pollution Exhaust gasis/

## Technical purpose
通过强磁选择所获得的选矿精矿铁矿石可在不同规模上应用，可能作为炼钢行业的原材料。它可以为高炉提供主要的原料，或用于直接还原铁制造方法。管末处理污染技术包括用于处理废水和降低化学需氧量（COD）的方法，例如沉淀分离和化学混凝，各具不同的效率水平。对于控制与石油相关的废物，两种方法也被应用，每种都有其特定的效率。此外，还实施了控制废气和颗粒物（PM2.5 - PM10）污染的技术，包括使用袋式过滤器、文丘里洗涤器和单（或多）筒旋风分离器，每种提供不同水平的颗粒去除效率。

## Reference product
- Concentrate: 1000; calculated
  源文件中描述为为精矿，此处对其进行了匹配工作，将其匹配到LCAflow库里面相最符合的流，污染物指标备注为工业废水量

## Outputs
All rows: calculated
- Petroleum-related waste: 0.0072
  the Technical of end-of-pipe management technology for pollution Petroleum-related wasteisChemical coagulation，Its Technical efficiency of end-of-pipe management70
  污染物指标石油类的末端治理技术是化学混凝法，其效率为70，末端治理设施实际运行率（k值）计算公式为k=末端治理设施运行时间（小时/年）/正常生产时间（小时/年）。原文件中描述污染物类别为废水，污染物指标为石油类，此处对其进行了匹配工作，将其匹配到LCAflow库里面相最符合的流，污染物指标备注为石油类
- Petroleum-related waste: 0.0132
  the Technical of end-of-pipe management technology for pollution Petroleum-related wasteisPrecipitation separation，Its Technical efficiency of end-of-pipe management45
  污染物指标石油类的末端治理技术是沉淀分离，其效率为45，末端治理设施实际运行率（k值）计算公式为k=末端治理设施运行时间（小时/年）/正常生产时间（小时/年）。原文件中描述污染物类别为废水，污染物指标为石油类，此处对其进行了匹配工作，将其匹配到LCAflow库里面相最符合的流，污染物指标备注为石油类
- particles (PM2.5 - PM10): 0.0855
  the Technical of end-of-pipe management technology for pollution particles (PM2.5 - PM10)isBag filter，Its Technical efficiency of end-of-pipe management95
  污染物指标颗粒物的末端治理技术是袋式除尘，其效率为95，末端治理设施实际运行率（k值）计算公式为k=末端治理设施运行时间（小时/年）/正常生产时间（小时/年）。原文件中描述污染物类别为废气，污染物指标为颗粒物，此处对其进行了匹配工作，将其匹配到LCAflow库里面相最符合的流，污染物指标备注为颗粒物
- chemical oxygen demand: 0.0897
  the Technical of end-of-pipe management technology for pollution chemical oxygen demandisChemical coagulation，Its Technical efficiency of end-of-pipe management70
  污染物指标化学需氧量的末端治理技术是化学混凝法，其效率为70，末端治理设施实际运行率（k值）计算公式为k=末端治理设施运行时间（小时/年）/正常生产时间（小时/年）。原文件中描述污染物类别为废水，污染物指标为化学需氧量，此处对其进行了匹配工作，将其匹配到LCAflow库里面相最符合的流，污染物指标备注为化学需氧量
- particles (PM2.5 - PM10): 0.171
  the Technical of end-of-pipe management technology for pollution particles (PM2.5 - PM10)isVenturi，Its Technical efficiency of end-of-pipe management90
  污染物指标颗粒物的末端治理技术是文丘里，其效率为90，末端治理设施实际运行率（k值）计算公式为k=末端治理设施运行时间（小时/年）/正常生产时间（小时/年）。原文件中描述污染物类别为废气，污染物指标为颗粒物，此处对其进行了匹配工作，将其匹配到LCAflow库里面相最符合的流，污染物指标备注为颗粒物
- chemical oxygen demand: 0.2093
  the Technical of end-of-pipe management technology for pollution chemical oxygen demandisPrecipitation separation，Its Technical efficiency of end-of-pipe management30
  污染物指标化学需氧量的末端治理技术是沉淀分离，其效率为30，末端治理设施实际运行率（k值）计算公式为k=末端治理设施运行时间（小时/年）/正常生产时间（小时/年）。原文件中描述污染物类别为废水，污染物指标为化学需氧量，此处对其进行了匹配工作，将其匹配到LCAflow库里面相最符合的流，污染物指标备注为化学需氧量
- particles (PM2.5 - PM10): 0.342
  the Technical of end-of-pipe management technology for pollution particles (PM2.5 - PM10)isSingle cylinder (multiple cylinders in parallel) cyclone，Its Technical efficiency of end-of-pipe management80
  污染物指标颗粒物的末端治理技术是单筒（多筒并联）旋风，其效率为80，末端治理设施实际运行率（k值）计算公式为k=末端治理设施运行时间（小时/年）/正常生产时间（小时/年）。原文件中描述污染物类别为废气，污染物指标为颗粒物，此处对其进行了匹配工作，将其匹配到LCAflow库里面相最符合的流，污染物指标备注为颗粒物
- Waste water: 12.1
  the Technical of end-of-pipe management technology for pollution Waste wateris/
  污染物指标工业废水量的末端治理技术是/，末端治理设施实际运行率（k值）计算公式为/。原文件中描述污染物类别为废水，污染物指标为工业废水量，此处对其进行了匹配工作，将其匹配到LCAflow库里面相最符合的流，污染物指标备注为工业废水量
- Exhaust gas: 1330
  the Technical of end-of-pipe management technology for pollution Exhaust gasis/
  污染物指标工业废气量的末端治理技术是/，末端治理设施实际运行率（k值）计算公式为k=末端治理设施运行时间（小时/年）/正常生产时间（小时/年）。原文件中描述污染物类别为废气，污染物指标为工业废气量，此处对其进行了匹配工作，将其匹配到LCAflow库里面相最符合的流，污染物指标备注为工业废气量

## Use advice
This dataset is derived from the Pollution Source Census Report and contains information on pollution emissions and related products. However, it does not include data on energy or chemical consumption, nor does it provide information on waste or co-product generation. When utilizing this dataset, please supplement the missing data based on actual conditions before use
该数据集来源于污染源普查报告，包含污染物排放及相关产品信息，但不包含能源或化学品消耗数据，也不提供废弃物或共生产物产生信息。在使用该数据集时，请根据实际情况补充缺失数据后再使用。

## Review details
Inventory: The internal review was done by several iteration steps concerning raw data validation, raw data documentation, representativity, completeness and consistency of modelling with regard to ISO 14040 and 14044.
清单： 内部审查通过几个迭代步骤完成，涉及原始数据验证、原始数据记录、代表性、完整性、与 ISO 14040 和 14044 有关的建模的一致性。

## Data sources
- 第二次全国污染源普查产排污核算系数手册（试用版）,二级代码08,四级代码0810文件，在完整版文件中第3413页
