# Downhole operations ; Well washing liquid (Water) ; Non-Low Permeability Well Washing Operations ; All sizes; NESPS2 / 井下作业 ; 洗井液（水） ; 非低渗透油井洗井作业 ; 所有规模 ; 全国第二次污染普查数据

Dataset: ILCD process, Unit process, single operation
Geography: CN
Reference year: 2019
Classification: Reference Parameters / Energy carriers and technologies / Other non-renewable fuels
Generated by: The data was created by the Office of the Second National Pollution Source Census of the Ministry of Ecology and Environment, and the data was organized by the TianGong Plan team for ILCD format / 生态环境部第二次全国污染源普查工作办公室创建数据，天工计划团队常慧敏整理数据为ILCD格式
Owner: Tiangong LCI Data Working Group / 天工LCI数据工作小组
Review: Dependent internal review by Tiangong LCI Data Working Group / 天工LCI数据工作小组
Amounts: no units in this file; such an amount is in the reference unit of its flow, which a separate flow dataset defines
copyright: false
licenseType: Free of charge for all users and uses

## General comment
the Technical of end-of-pipe management technology for pollution chemical oxygen demandis③Filter separation/floating separation + bio-contact oxidation process，Its Technical efficiency of end-of-pipe management88*①

## Technical purpose
该数据集描述了非低渗透油井洗井作业中使用的多种尾端处理技术，适用于所有规模的井。这些处理程序旨在管理来自化学需氧量和与石油相关的废水的污染，适用于环境法规要求在排放或回注前处理和管理工业废水的场景。所涉及的技术包括物理和化学处理方法、过滤和浮选分离、生物接触氧化以及各种效率的水力旋流器系统。

## Reference product
- Underground Work: 1; calculated
  源文件中描述为为井下作业，此处对其进行了匹配工作，将其匹配到LCAflow库里面相最符合的流，污染物指标备注为化学需氧量

## Outputs
All rows: calculated
- chemical oxygen demand: 0
  the Technical of end-of-pipe management technology for pollution chemical oxygen demandis①Physical + chemical + reinjection，Its Technical efficiency of end-of-pipe management100
  污染物指标化学需氧量的末端治理技术是①物理+化学+回注，其效率为100，末端治理设施实际运行率（k值）计算公式为k=污水治理设施运行时间（小时/年）/正常生产时间（小时/年），①“*”表示该分类下的油田企业，当前资料没有关于使用该工艺的记录，数据为参考其他类型油田得出。。原文件中描述污染物类别为废水，污染物指标为化学需氧量，此处对其进行了匹配工作，将其匹配到LCAflow库里面相最符合的流，污染物指标备注为化学需氧量
- chemical oxygen demand: 0
  the Technical of end-of-pipe management technology for pollution chemical oxygen demandis②Physical + reinjection，Its Technical efficiency of end-of-pipe management100
  污染物指标化学需氧量的末端治理技术是②物理+回注，其效率为100，末端治理设施实际运行率（k值）计算公式为k=污水治理设施运行时间（小时/年）/正常生产时间（小时/年）。原文件中描述污染物类别为废水，污染物指标为化学需氧量，此处对其进行了匹配工作，将其匹配到LCAflow库里面相最符合的流，污染物指标备注为化学需氧量
- Petroleum-related waste: 0
  the Technical of end-of-pipe management technology for pollution Petroleum-related wasteis①Physical + chemical + reinjection，Its Technical efficiency of end-of-pipe management100
  污染物指标石油类的末端治理技术是①物理+化学+回注，其效率为100，末端治理设施实际运行率（k值）计算公式为k=污水治理设施运行时间（小时/年）/正常生产时间（小时/年）。原文件中描述污染物类别为废水，污染物指标为石油类，此处对其进行了匹配工作，将其匹配到LCAflow库里面相最符合的流，污染物指标备注为石油类
- Petroleum-related waste: 0
  the Technical of end-of-pipe management technology for pollution Petroleum-related wasteis②Physical + reinjection，Its Technical efficiency of end-of-pipe management100
  污染物指标石油类的末端治理技术是②物理+回注，其效率为100，末端治理设施实际运行率（k值）计算公式为k=污水治理设施运行时间（小时/年）/正常生产时间（小时/年）。原文件中描述污染物类别为废水，污染物指标为石油类，此处对其进行了匹配工作，将其匹配到LCAflow库里面相最符合的流，污染物指标备注为石油类
- Waste water: 76000
  the Technical of end-of-pipe management technology for pollution Waste wateris/
  污染物指标工业废水量的末端治理技术是/，末端治理设施实际运行率（k值）计算公式为/。原文件中描述污染物类别为废水，污染物指标为工业废水量，此处对其进行了匹配工作，将其匹配到LCAflow库里面相最符合的流，污染物指标备注为工业废水量
- Petroleum-related waste: 0.7058
  the Technical of end-of-pipe management technology for pollution Petroleum-related wasteis③Filter separation/floating separation + bio-contact oxidation process，Its Technical efficiency of end-of-pipe management96*
  污染物指标石油类的末端治理技术是③过滤分离/上浮分离+生物接触氧化法，其效率为96*，末端治理设施实际运行率（k值）计算公式为k=污水治理设施运行时间（小时/年）/正常生产时间（小时/年）。原文件中描述污染物类别为废水，污染物指标为石油类，此处对其进行了匹配工作，将其匹配到LCAflow库里面相最符合的流，污染物指标备注为石油类
- Petroleum-related waste: 4.5877
  the Technical of end-of-pipe management technology for pollution Petroleum-related wasteis⑥Hydrocyclone + filter + discharge，Its Technical efficiency of end-of-pipe management74③
  污染物指标石油类的末端治理技术是⑥水力旋流器＋过滤器＋排放，其效率为74③，末端治理设施实际运行率（k值）计算公式为k=污水治理设施运行时间（小时/年）/正常生产时间（小时/年），③污水排放标准为《海洋石油勘探开发污染物排放浓度限值》（GB4914-2008）中“石油类”一级排放浓度限值20mg/L，使用该治理技术。。原文件中描述污染物类别为废水，污染物指标为石油类，此处对其进行了匹配工作，将其匹配到LCAflow库里面相最符合的流，污染物指标备注为石油类
- Petroleum-related waste: 10.4105
  the Technical of end-of-pipe management technology for pollution Petroleum-related wasteis④Hydrocyclone + degassing and oil removal tank + discharge，Its Technical efficiency of end-of-pipe management41②
  污染物指标石油类的末端治理技术是④水力旋流器＋脱气除油罐＋排放，其效率为41②，末端治理设施实际运行率（k值）计算公式为k=污水治理设施运行时间（小时/年）/正常生产时间（小时/年），②污水排放标准为《海洋石油勘探开发污染物排放浓度限值》（GB4914-2008）中“石油类”二级排放浓度限值45mg/L，使用该治理技术。
  ，②污水排放标准为《海洋石油勘探开发污染物排放浓度限值》（GB4914-2008）中“石油类”二级排放浓度限值45mg/L，使用该治理技术。。原文件中描述污染物类别为废水，污染物指标为石油类，此处对其进行了匹配工作，将其匹配到LCAflow库里面相最符合的流，污染物指标备注为石油类
- Petroleum-related waste: 10.4105
  the Technical of end-of-pipe management technology for pollution Petroleum-related wasteis⑤Buffer tank + hydrocyclone + discharge，Its Technical efficiency of end-of-pipe management41③
  污染物指标石油类的末端治理技术是⑤缓冲罐＋水力旋流器＋排放，其效率为41③，末端治理设施实际运行率（k值）计算公式为k=污水治理设施运行时间（小时/年）/正常生产时间（小时/年），③污水排放标准为《海洋石油勘探开发污染物排放浓度限值》（GB4914-2008）中“石油类”一级排放浓度限值20mg/L，使用该治理技术。，③污水排放标准为《海洋石油勘探开发污染物排放浓度限值》（GB4914-2008）中“石油类”一级排放浓度限值20mg/L，使用该治理技术。。原文件中描述污染物类别为废水，污染物指标为石油类，此处对其进行了匹配工作，将其匹配到LCAflow库里面相最符合的流，污染物指标备注为石油类
- chemical oxygen demand: 12.543
  the Technical of end-of-pipe management technology for pollution chemical oxygen demandis③Filter separation/floating separation + bio-contact oxidation process，Its Technical efficiency of end-of-pipe management88*①
  污染物指标化学需氧量的末端治理技术是③过滤分离/上浮分离+生物接触氧化法，其效率为88*①，末端治理设施实际运行率（k值）计算公式为k=污水治理设施运行时间（小时/年）/正常生产时间（小时/年），①“*”表示该分类下的油田企业，当前资料没有关于使用该工艺的记录，数据为参考其他类型油田得出。，①“*”表示该分类下的油田企业，当前资料没有关于使用该工艺的记录，数据为参考其他类型油田得出。。原文件中描述污染物类别为废水，污染物指标为化学需氧量，此处对其进行了匹配工作，将其匹配到LCAflow库里面相最符合的流，污染物指标备注为化学需氧量

## Use advice
This dataset is derived from the Pollution Source Census Report and contains information on pollution emissions and related products. However, it does not include data on energy or chemical consumption, nor does it provide information on waste or co-product generation. When utilizing this dataset, please supplement the missing data based on actual conditions before use
该数据集来源于污染源普查报告，包含污染物排放及相关产品信息，但不包含能源或化学品消耗数据，也不提供废弃物或共生产物产生信息。在使用该数据集时，请根据实际情况补充缺失数据后再使用。

## Review details
Inventory: The internal review was done by several iteration steps concerning raw data validation, raw data documentation, representativity, completeness and consistency of modelling with regard to ISO 14040 and 14044.
清单： 内部审查通过几个迭代步骤完成，涉及原始数据验证、原始数据记录、代表性、完整性、与 ISO 14040 和 14044 有关的建模的一致性。

## Data sources
- 第二次全国污染源普查产排污核算系数手册（试用版）,二级代码11,四级代码1120文件，在完整版文件中第3413页
