# cement production;cement, portland-composite cement;dry process rotary kiln, 4000t/d;mixed solid wastes

Dataset: ILCD process, Unit process, black box
Geography: CN
Classification: Unit processes / Materials production / Other mineralic materials
Generated by: #REF!, ysqsophia@gmail.com
Owner: Tiangong LCI Data Working Group
Review: Dependent internal review by Tiangong LCI Data Working Group
Amounts: no units in this file; such an amount is in the reference unit of its flow, which a separate flow dataset defines
copyright: false
licenseType: Free of charge for all users and uses

## General comment
Synergistic disposal is a production process that involves adding industrial waste as alternative raw materials and fuels at the raw material mill and kiln tail positions, specifically including waste clay, waste catalysts, and contaminated soil.The company's cement production line consists of a vertical raw material mill, a 5-stage preheater, a rotary kiln, and a large ball mill (cement mill) equipped with a roller press, as well as equipment for crushing, grinding, and conveying limestone and gypsum. The production system is referred to as the "two mills and one kiln" system, namely the raw material mill, cement mill, and rotary kiln incineration.

## Technology and included processes
The company's cement production line consists of main equipment such as a vertical raw material mill, a 5-stage external decomposition furnace, a rotary kiln, and a large ball mill (cement mill) equipped with a roller press. It is also equipped with limestone, gypsum crushing, conveying and adding equipment. This production system is referred to as the "two grinding and one burning" system, that is, raw material mill, cement mill and rotary kiln burning. The entire production process is centrally controlled by an advanced distributed computer control system, which has the characteristics of high automation, stable process and strong reliability.The cement production process includes the stages of raw material mining and transportation, raw meal preparation, pulverized coal preparation, clinker burning and cement grinding. The main production process is that after limestone and auxiliary raw materials (glue, silica) are crushed, they are matched with treated industrial waste in appropriate proportions, crushed by a vertical raw material mill to prepare raw meal, and then enter the raw material homogenizing pile for homogenization treatment. It enters the rotary kiln through the 5-stage sealed external calciner (RSP), burns the clinker in a high temperature state, and enters the clinker storage: it is then crushed by a cement mill equipped with a compilation press, and finally forms various types of cement products. . The production process flow is shown in Figure 3.1.

## Technical purpose
The described cement production process is intended for the manufacture of Portland-composite cement using the modern dry process rotary kiln technology with a capacity of 4000 tonnes per day. This production line is equipped to co-process mixed solid wastes as alternative raw materials and fuels. Specific industrial wastes such as waste clay, waste catalysts, and contaminated soil are utilized in the production process. The cement produced is suitable for use in various construction applications where Portland-composite cement is required.

## Model description
The system boundaries are raw meal preparation, pulverized coal preparation, clinker calcination, and cement grinding. Take 1 ton of cement product as 1 functional unit.

## Reference product
- cement, portland-composite cement: 1000
  Cement

## Inputs
- limestone, crushed, for mill: 1125.43
  Limestone
- shale: 1.23
  Shale
- silica stone: 17.75
  Silica
- iron, powder: 27.25
  Iron powder
- gypsum stone (CaSO4-dihydrate): 52.15
  Gupsum
- ash: 124.24
  Fly ash
- blast furnace slag: 203.78
  Blast furnace slag
- waste clay: 1.05
  Waste clay. Industrial waste.
- Coating slag: 0.16
  Coating slag. Industrial waste.
- refinery sludge: 5.26
  Waste oily sludge. Industrial waste.
- Catalyst waste: 2.11
  Waste catalyst. Industrial waste.
- soil, contaminated: 5.26
  Contaminated soil. Industrial waste.
- digester sludge: 15.79
  Digestion sludge. Industrial waste.
- hard coal; 26.3 MJ/kg: 98.28
  Coal
- Electricity: 290.412
  Electricity. The electricity consumption is measured in kWh·t^-1, in which the electricity consumption in the raw material extraction and cement grinding stages is calculated based on cement production, and the electricity consumption in the raw material preparation, coal powder preparation, and clinker calcination stages is calculated based on clinker production. Other resource and energy consumption, as well as pollutant emissions, are calculated based on cement production.

## Outputs
- carbon dioxide (fossil): 845.44
  CO2. CO2 emissions come from the calcination of limestone and coal combustion. Since CO2 monitoring devices are generally not installed in Chinese cement enterprises, the emissions are calculated based on the CO2 emission formula.
- sulfur dioxide: 0.256
  SO2
- Nitrogen oxides: 0.9
  NOX
- carbon monoxide (fossil): 0.02522
  CO
- particles (> PM10): 0.5808
  Dust (exhaust emissions), with an unspecified particle size, is treated as PM > 10 micrometers in diameter.
- chloride: 2.723
  Chloride (wastewater). Wastewater is mainly producing water, emission data comes from corporate monitoring values ​​and GABI databases.
- sulfate: 0.351
  Sulfate (wastewater). Wastewater is mainly producing water, emission data comes from corporate monitoring values ​​and GABI databases.
- blast furnace dust, for recovery: 657.39
  Dust (solid waste recycling). The solid waste is mainly the dust generated during the production process. After unified collection and processing, it is recycled and reused. The data is obtained by the actual monitoring of the enterprise.

## Data selection and combination
Industrial waste can replace part of coal. Therefore, the calorific value and mass ratio (that is, the ratio of coal with calorific value per unit of waste to the total mass of material input in co-processing) is used as the basis for data allocation of input and output. For details, see the formula αp = W'p/(W'p + Wc + Wr). In the formula, αp is the distribution ratio of input and output of waste in the co-processing system; W'p is the coal quality (t) corresponding to the calorific value ratio of 1 ton of waste; Wc is the coal that needs to be added to clinker production for 1 ton of waste. Mass (t); Wr is the mass of raw meal (t) that needs to be added to the waste in clinker production for 1t.

## Use advice
When using this data set for Life Cycle Assessment, note that the provided information corresponds to a 'black box' approach for the company's cement production line, comprising the following stages: raw meal preparation, pulverized coal preparation, clinker calcination, and cement grinding, summarized as the 'two grinding and one burning' system. To account for the co-processing of waste materials, use the formula αp = W'p/(W'p + Wc + Wr) to allocate the data according to the energy and mass balance. The system boundary for assessment is set from raw meal preparation to cement grinding, taking 1 ton of cement product as the functional unit. Ensure the inclusion of waste co-processing in the LCA model and maintain consistency with the technological applicability and system boundary defined.

## Review details
Inventory: The internal review was done by several iteration steps concerning raw data validation, raw data documentation, representativity, completeness and consistency of modelling with regard to ISO 14040 and 14044.

## Data sources
- 侯星宇, 张芸, 戚昱, 蒋慧, 张琳, & 曲殿利. (2015). 水泥窑协同处置工业废弃物的生命周期评价. 环境科学学报, 35(12), 4112–4119.
