# Municipal sludge treatment and disposal;wet sludge moisture content 80.94%;landfill

Dataset: ILCD process, Unit process, single operation
Geography: HF-AH-CN
Classification: Unit processes / End-of-life treatment / Waste water treatment
Functional unit: The residual sludge moisture content of Hefei Wangtang Sewage Treatment Plant is 80.94%, and the functional unit is 1t of residual sludge.
Generated by: Jin Sitian, 2331276@tongji.edu.cn
Owner: Tiangong LCI Data Working Group
Review: Dependent internal review by Tiangong LCI Data Working Group
Amounts: no units in this file; such an amount is in the reference unit of its flow, which a separate flow dataset defines
copyright: ['opt4ROkqig']
licenseType: Free of charge for all users and uses

## General comment
The estimation of soot, solid waste and leachate is based on literature and experience, and the environmental emissions of COD, BOD, ammonia nitrogen and SS are calculated according to the water pollutant emission concentration limits of the "Pollution Control Standards for Domestic Waste Landfills".

## Geography
Hefei Wangtang Sewage Treatment Plant

## Technology and included processes
The sludge needs to be dried and dewatered first, using a heat pump dehumidification dryer, and the assumed moisture content is reduced from 80.94% to 60%.

## Technical purpose
The data set describes the process of municipal sludge treatment and disposal from the Hefei Wangtang Sewage Treatment Plant, with an 80.94% moisture content of wet sludge earmarked for landfill. This data is applicable for environmental impact assessments where municipal sludge treatment as landfilling is the chosen waste management strategy. Municipalities and waste management companies can use this information for planning and optimizing the landfilling process of wet sludge resulting from sewage treatment plants.

## Reference product
- Sludge: 1000; input; estimated
  1t of remaining sludge with a moisture content of 80.94%

## Inputs
- Diesel: 0.0001906; calculated
- Electricity: 5.148; calculated

## Outputs
All rows: calculated
- carbon dioxide (biogenic): 47.51
  The original text does not distinguish between biogenic and fossil, and according to experts, it is biogenic here.
- methane (biogenic),methane (biogenic): 21.12
  (same comment as for carbon dioxide (biogenic))
- carbon monoxide (biogenic): 0.0006719
  (same comment as for carbon dioxide (biogenic))
- hydrogen chloride: 0.003494
- hydrogen fluoride: 0.0006988
- hydrogen sulfide: 0.01075
- ammonia: 0.0408
- hydrocarbons (unspecified): 0.1075
- cadmium: 5.699e-6
- chromium: 0.00202
- lead: 0.0009187
- mercury: 3.145e-5
- zinc: 0.02127
- copper: 0.0101
- nickel: 0.921
- chemical oxygen demand: 0.004765
- biological oxygen demand: 0.00143
- ammonia: 0.001191
  Ammonia nitrogen
- Suspended solids, unspecified,Suspended solids, unspecified,Suspended solids, unspecified: 0.00143
- Non Hazardous non organic waste for disposal (unspecific sludges and dusts): 0.319
  dust
- Waste (solid): 476.5

## Use advice
When utilizing this dataset for life cycle assessment, ensure the context of research or application aligns with the management of sludge specifically through landfilling. Adaptations may be necessary for different geographical or technological conditions. Always consider the temporal relevance and the specific environmental conditions in which the sludge is treated. Exclude any recycling activities as this dataset pertains solely to landfill disposal.

## Review details
Inventory: The internal review was done by several iteration steps concerning raw data validation, raw data documentation, representativity, completeness and consistency of modelling with regard to ISO 14040 and 14044.

## Data sources
- 齐星昊. 基于生命周期评价的典型剩余污泥处理方法的环境影响比较研究[D].河南师范大学,2020.
