# cement production;cement, common portland cement;new dry process

Dataset: ILCD process, Unit process, black box
Geography: CN
Reference year: 2011
Classification: Unit processes / Materials production / Other mineralic materials
Generated by: #REF!, ysqsophia@gmail.com
Owner: Tiangong LCI Data Working Group
Review: Dependent internal review by Tiangong LCI Data Working Group
Amounts: no units in this file; such an amount is in the reference unit of its flow, which a separate flow dataset defines
copyright: false
licenseType: Free of charge for all users and uses

## General comment
New dry-process technology for producing common portland cement. In 2011, the proportion of newly developed dry-process cement accounted for 89.0% of the national total, and it was still on the rise, thus basically representing the national level.

## Technical purpose
The data represents the typical applications of common portland cement produced using the new dry process technology in China, which by 2011 accounted for 89.0% of the national production and was still increasing. This common portland cement is primarily used in construction applications, including the creation of concrete structures, buildings, roads, and other infrastructure projects. It is pertinent to a wide range of construction projects due to its general-purpose properties and strength.

## Model description
The study only focuses on general cement, and selects the general cement produced in China using a new dry process with a clinker content of 70% in 1kg as the functional unit.

## Reference product
- cement, common portland cement: 1000
  General cement, 70% content

## Inputs
- clinker, portland cement clinker, 52.5MPa: 700
  Clinker, 52.5MPa. The input data for the benchmark scenario is based on the Level III benchmark value of the clean production index system.
- Electricity: 144
  Electricity. The input data for the benchmark scenario is based on the Level III benchmark value of the clean production index system.
- hard coal; 26.3 MJ/kg: 4.3
  Raw coal. The input data for the benchmark scenario is based on the Level III benchmark value of the clean production index system.
- gypsum stone (CaSO4-dihydrate): 50
  Gypsum. The input data for the benchmark scenario is based on the Level III benchmark value of the clean production index system.
- tap water: 2
  Industrial fresh water. The input data for the benchmark scenario is based on the Level III benchmark value of the clean production index system.

## Outputs
- carbon dioxide (fossil): 8.7
  Carbon dioxide. Environmental emissions are mainly based on the pollution coefficient manual and literature survey data.
- chemical oxygen demand: 6e-5
  Chemical oxygen demand. Environmental emissions are mainly based on the pollution coefficient manual and literature survey data.

## Data selection and combination
By surveying relevant literature on domestic cement production, combined with the cement industry's cleaner production evaluation index system and the emission coefficient manual, inventory data of the clinker production and cement grinding processes were obtained.

## Use advice
When utilizing this LCA data set, users should be aware that it specifically targets the general cement variety produced with a new dry process technology in China and represents industry practices as of 2011 with an upward trend. The functional unit is 1kg of general cement with a clinker content of 70%. The data is focused on inventory indicators relevant to the ECER (Energy Conservation and Emission Reduction) policy objectives and may be incomplete. Methodological considerations such as system boundaries, assumptions, and data quality should be carefully examined before applying this data in an LCA. The data should ideally be updated to reflect any significant technological or policy changes that have occurred since 2011.

## Review details
Inventory: The internal review was done by several iteration steps concerning raw data validation, raw data documentation, representativity, completeness and consistency of modelling with regard to ISO 14040 and 14044.

## Data sources
- 何晓雪, 张璐, & 王洪涛. (2014). 基于生命周期节能减排评价方法的水泥行业清洁生产评价指标权重的计算. 化学工程与装备, 4, 208–211.
