# Municipal sludge treatment and disposal;dry sludge;dewatering

Dataset: ILCD process, Unit process, single operation
Geography: CN
Classification: Unit processes / End-of-life treatment / Waste water treatment
Functional unit: The functional unit used for GHGs in this LCA is one dry ton (DT) of sludge.
Generated by: Jin Sitian, 2331276@tongji.edu.cn
Owner: Tiangong LCI Data Working Group
Review: Dependent internal review by Tiangong LCI Data Working Group
Amounts: no units in this file; such an amount is in the reference unit of its flow, which a separate flow dataset defines
copyright: ['opt4ROkqig']
licenseType: Free of charge for all users and uses

## General comment
The main data sources used in our study are as follows: 1) Energy consumption and material inputs are obtained from investigations in Tai Lake Watershed; 2) The energy use emission factor is obtained from our own calculation, IPCC, and the literature.3) The fugitive emissions during landfilling, incineration, and composting are mainly determined by the model given in the other study as well as by the IPCC factors (2006), except for the CH4 emission in landfilling, which is obtained from study.4) Data from theoretical calculations (see Incineration section).

## Geography
Tai Lake Watershed

## Technology and included processes
According to the operating data, about 12.7 tons of cement is produced per ton of the dried sludge considering the combustion loss in the kiln

## Technical purpose
The described process is utilized for the treatment and disposal of municipal sludge specifically within the Tai Lake Watershed area. The process involves dewatering of the sludge to produce dry sludge suitable for further processing or final disposal. The data associated with this process may be applied to assess environmental impacts in systemswhere treatment and management of municipal waste sludge is a component, especially when assessing greenhouse gas emissions on a per dry ton basis.

## Reference product
- Sludge: 1000; input; estimated
  one dry ton (DT) of sludge

## Inputs
- Polymer: 9.38; measured
- Electricity: 388.8; measured

## Use advice
When using this dataset for Life Cycle Assessment, ensure inclusion of all relevant lifecycle stages of sludge treatment and disposal. Pay particular attention to the methodological appropriateness of the data especially regarding the Tai Lake Watershed context. Consider the representativeness of the data for the specific geographic region and time period. It is advised to account for technology variations and operational practices that may affect greenhouse gas emissions. The functional unit of one dry ton of sludge should be consistently applied across the assessment.

## Review details
Inventory: The internal review was done by several iteration steps concerning raw data validation, raw data documentation, representativity, completeness and consistency of modelling with regard to ISO 14040 and 14044.

## Data sources
- Liu, B., Wei, Q., Zhang, B. & Bi, J. Life cycle GHG emissions of sewage sludge treatment and disposal options in Tai Lake Watershed, China. Science of The Total Environment 447, 361–369 (2013).
