# Drilling Stage-Well cementation process

Dataset: ILCD process
Geography: SC-CN
Reference year: 2014
Valid until: 2016
Classification: Materials production / Other mineralic materials
Generated by: Pu Hong, 15695258655@163.com
Review: Dependent internal review by Tiangong LCI Data Working Group
Amounts: no units in this file; such an amount is in the reference unit of its flow, which a separate flow dataset defines

## Geography
China's shale gas extraction work is currently concentrated in the Sichuan and Chongqing areas, and the data from Sichuan and Chongqing are selected for LCA calculations.

## Time period
Raw data dates between 2014-2016

## Inputs
- casing: 607000; min 760000; max 353000; uniform; article inperiodical
- freshwater: 293000; min 419000; max 72000; uniform; article inperiodical
  G grade cement slurry components
- G class cement: 405000; min 499000; max 235000; uniform; article inperiodical
  G grade cement slurry components
- Diesel: 4682; min 5806; max 2709; uniform; article inperiodical
  Transporting materials and driving equipment

## Review details
Inventory: The internal review was done by several iteration steps concerning raw data validation, raw data documentation, representativity, completeness and consistency of modelling with regard to ISO 14040 and 14044.

## Data sources
- Wang, J., Liu, M., McLellan, B. C., Tang, X. & Feng, L. Environmental impacts of shale gas development in China: A hybrid life cycle analysis. Resources, Conservation and Recycling 120, 38–45 (2017).
