# Vegetable Production ; Agricultural Inputs (Greenhouse)

Dataset: ILCD process, Unit process, single operation
Geography: XA-SAX-CN
Reference year: 2012
Valid until: 2013
Classification: Unit processes / Materials production / Agricultural production means
Functional unit: 1000 kg tomatoes
Generated by: Haoran Zhang, hrzhang@whu.edu.cn
Owner: Tiangong LCI Data Working Group
Review: Dependent internal review by Tiangong LCI Data Working Group
Amounts: no units in this file; such an amount is in the reference unit of its flow, which a separate flow dataset defines
copyright: false
licenseType: Free of charge for all users and uses

## General comment
The study area is the suburb of Xi 'an, Shaanxi Province. The total annual solar radiation in this area is 4.81 MJ·m-2, the annual sunshine duration is 2163.8 h, the annual average temperature is 12.9 °C, the average precipitation is 630 mm, the average evaporation is 884 mm, and the frost-free period is 221 days. The solar greenhouse in this area belongs to the structure of earth wall and steel frame, and the vegetables are mainly tomatoes, and the farming method of planting two crops of tomatoes a year is used. Plastic greenhouses belong to steel frame structure, generally planting melons in early spring, and planting tomatoes in autumn. In this study, 10 solar greenhouses (all 6 m× 90 m) and 5 plastic greenhouses (all 9 m×110 m) were selected as research objects to investigate the material consumption in the construction and daily operation of solar greenhouses and plastic greenhouses. The input and output of tomato and watermelon production from July 2012 to June 2013 were recorded in detail. During this period, two crops of tomatoes were planted in each of the 10 solar temperature rooms, covering the shed in July 2012, planting in mid-August, harvesting in mid-November, pulling seedlings in mid-January and late 2013, planting the second crop of tomatoes in early February, harvesting began in early April and mid-mid-June, and the final harvest was in mid-late June. Five plastic greenhouses planted melons in mid-to-late March, harvested in mid-to-late May, pulled seedlings in mid-to-late June, planted tomatoes in mid-July, harvested in mid-to-late September, and pulled seedlings in late November. Soil disinfection and tilling should be carried out before planting. Organic fertilizer and phosphate fertilizer should be applied before planting. Topdressing fertilizer should be applied along with irrigation water, which is deep well water.

## Technology and included processes
The data were obtained as averages from 10 solar greenhouses and 5 plastic greenhouses. Based on the typical service life of construction materials, the consumption of building materials and energy for constructing solar greenhouses and plastic greenhouses were calculated as the equivalent of one year of usage. The service life was assumed to be 15 years for general building materials, 5 years for PVC water pipes, 1 year for greenhouse films (3 years for plastic greenhouses), and 3 years for the anti-cold films (skirt films of plastic greenhouses). The annual consumption of building materials for plastic greenhouses was evenly allocated to tomatoes and watermelons.

## Technical purpose
This dataset provides lifecycle inventory and assessment for open-field vegetable production in China, focusing on tomatoes, cucumbers, Chinese cabbage, and radishes. It is useful for environmental researchers and professionals in the agricultural sector evaluating the sustainability and environmental impact of vegetable cultivation practices, particularly the net greenhouse gas emissions (NGHGE) associated with fertilizer, pesticide, diesel, and agricultural film inputs, as well as labor.

## Reference product
- Tomato: 1000; measured
  solar greenhouse

## Inputs
All rows: measured
- Steel: 18.746
  solar greenhouse
- cement, unspecified: 6.6149
  solar greenhouse
- brick: 30.81
  solar greenhouse
- Electricity: 98.7228
  solar greenhouse
- Diesel: 0.002399
  solar greenhouse
- polyethylene terephthalate fibres (PET): 11.927
  solar greenhouse
- Polyvinyl chloride: 1.365
  solar greenhouse
- water: 50.387
  solar greenhouse
- nitrogen: 3.952
  Solar greenhouse fertilizer
- nitrogen: 5.303
  solar greenhouse
- phosphorus: 3.662
  Solar greenhouse fertilizer
- phosphorus: 4.881
  solar greenhouse
- potassium: 5.279
  Solar greenhouse fertilizer
- potassium: 2.558
  solar greenhouse
- Rice Seeds: 0.044
  solar greenhouse
- Insecticide: 0.08
  solar greenhouse

## Deviations from the LCI method approaches
The system boundary defined in this study includes the construction of facilities and their routine operation (hereinafter referred to as "facility infrastructure"), and the production of materials required for them (cement, steel, bricks, and shed films, etc.), the production of agricultural inputs (chemical fertilizers, mulch films, fungicides, and insecticides), the cultivation of tomatoes (nursery, plowing, transplanting, mulching, fertilizing, spraying, irrigation, and harvesting) as well as the production and consumption of energy used in each process. It does not include the production of agricultural machinery, the transportation of tomatoes to the market for sale, or the process of consumer consumption.

## Data selection and combination
The environmental impact data of energy production and usage processes are sourced from literature (Di et al., 2007; Hu Zhiyuan et al., 2006). The resource, energy, and environmental emission data of the production of steel, cement, bricks, mulching films, frost protection films, plastic films, PVC water pipes, and fertilizers are taken from literature and the 'Clean Production Indicator System of the Phosphate Fertilizer Industry' and 'Clean Production Indicator System of the Nitrogen Fertilizer Industry'. Due to the lack of detailed research data, only energy consumption and CO2 emission volumes are considered in the production processes of insecticides and fungicides, represented in terms of the quality of effective ingredients, and data are adopted from the research results of West et al. (2002).

## Sampling procedure
In this study, 10 sunlight greenhouses (each with an area of 6 m×90 m) and 5 plastic greenhouses (each with an area of 9 m×110 m) were selected as research objects, and the material consumption of the construction and daily operation of the sunlight greenhouses and plastic greenhouses were investigated.

## Use advice
When using this dataset, ensure accurate representation of the regional practices and inputs for the four specified vegetable types. Consider the methodological framework necessary for NGHGE calculation as provided in the references and be mindful of the system boundaries focused on the entire production process. Note that data from Taiwan is not included in the dataset. Assess the technological variability and any emission reduction measures analyzed within the dataset for applicability in other contexts.

## Review details
Inventory: The internal review was done by several iteration steps concerning raw data validation, raw data documentation, representativity, completeness and consistency of modelling with regard to ISO 14040 and 14044.

## Data sources
- 王效琴,吴庆强,周建斌,陈妍,吴发启.设施番茄生产系统的环境影响生命周期评价[J].环境科学学报,2014,34(11):2940-2947.
