# Clear spiced white wine (original wine) ; Sorghum, rice, etc. ; Solid-state fermentation ; greater than or equal to5000 kl/a; NESPS2 / 清香型白酒（原酒） ; 高粱、稻米等 ; 固态发酵 ; 大于等于5000千升/年 ; 全国第二次污染普查数据

Dataset: ILCD process, Unit process, single operation
Geography: CN
Reference year: 2019
Classification: Reference Parameters / Energy carriers and technologies / Other non-renewable fuels
Generated by: The data was created by the Office of the Second National Pollution Source Census of the Ministry of Ecology and Environment, and the data was organized by the TianGong Plan team for ILCD format / 生态环境部第二次全国污染源普查工作办公室创建数据，天工计划团队常慧敏整理数据为ILCD格式
Owner: Tiangong LCI Data Working Group / 天工LCI数据工作小组
Review: Dependent internal review by Tiangong LCI Data Working Group / 天工LCI数据工作小组
Amounts: no units in this file; such an amount is in the reference unit of its flow, which a separate flow dataset defines
copyright: false
licenseType: Free of charge for all users and uses

## General comment
the Technical of end-of-pipe management technology for pollution chemical oxygen demandisPhysical treatment，Its Technical efficiency of end-of-pipe management0

## Technical purpose
该工业过程用于通过高粱、稻米和其他谷物的固态发酵生产清香型白酒（原酒），年产量大于或等于5000千升。该过程包括用于控制污染的末端处理技术，特别是对化学需氧量（COD）、氨氮、有机氮和总磷。有效污染管理的处理顺序包括物理处理、厌氧生物处理、好氧生物处理和化学处理。

## Reference product
- Baijiu: 1; calculated
  源文件中描述为为清香型白酒（原酒），此处对其进行了匹配工作，将其匹配到LCAflow库里面相最符合的流，污染物指标备注为化学需氧量

## Outputs
All rows: calculated
- Waste water: 4800
  the Technical of end-of-pipe management technology for pollution Waste wateris/，Its Technical efficiency of end-of-pipe management0
  污染物指标工业废水量的末端治理技术是/，其效率为0，末端治理设施实际运行率（k值）计算公式为/。原文件中描述污染物类别为废水，污染物指标为工业废水量，此处对其进行了匹配工作，将其匹配到LCAflow库里面相最符合的流，污染物指标备注为工业废水量
- Ammonia Nitrogen: 0.0100258
  the Technical of end-of-pipe management technology for pollution Ammonia NitrogenisPhysical treatment + anaerobic biological treatment + aerobic biological treatment + chemical treatment，Its Technical efficiency of end-of-pipe management84.75
  污染物指标氨氮的末端治理技术是物理处理法+厌氧生物处理法+好氧生物处理法+化学处理法，其效率为84.75，末端治理设施实际运行率（k值）计算公式为k=污水处理设施耗电量（千瓦时/年）/(总额定功率（千瓦）×年运行时间（小时/年）)。原文件中描述污染物类别为废水，污染物指标为氨氮，此处对其进行了匹配工作，将其匹配到LCAflow库里面相最符合的流，污染物指标备注为氨氮
- Nitrogen, organic bound: 0.0186671
  the Technical of end-of-pipe management technology for pollution Nitrogen, organic boundisPhysical treatment + anaerobic biological treatment + aerobic biological treatment + chemical treatment，Its Technical efficiency of end-of-pipe management94.77
  污染物指标总氮的末端治理技术是物理处理法+厌氧生物处理法+好氧生物处理法+化学处理法，其效率为94.77，末端治理设施实际运行率（k值）计算公式为k=污水处理设施耗电量（千瓦时/年）/(总额定功率（千瓦）×年运行时间（小时/年）)。原文件中描述污染物类别为废水，污染物指标为总氮，此处对其进行了匹配工作，将其匹配到LCAflow库里面相最符合的流，污染物指标备注为总氮
- phosphorus, total: 0.0248072
  the Technical of end-of-pipe management technology for pollution phosphorus, totalisPhysical treatment + anaerobic biological treatment + aerobic biological treatment + chemical treatment，Its Technical efficiency of end-of-pipe management87.95
  污染物指标总磷的末端治理技术是物理处理法+厌氧生物处理法+好氧生物处理法+化学处理法，其效率为87.95，末端治理设施实际运行率（k值）计算公式为k=污水处理设施耗电量（千瓦时/年）/(总额定功率（千瓦）×年运行时间（小时/年）)。原文件中描述污染物类别为废水，污染物指标为总磷，此处对其进行了匹配工作，将其匹配到LCAflow库里面相最符合的流，污染物指标备注为总磷
- Ammonia Nitrogen: 0.065743
  the Technical of end-of-pipe management technology for pollution Ammonia NitrogenisPhysical treatment，Its Technical efficiency of end-of-pipe management0
  污染物指标氨氮的末端治理技术是物理处理法，其效率为0，末端治理设施实际运行率（k值）计算公式为/。原文件中描述污染物类别为废水，污染物指标为氨氮，此处对其进行了匹配工作，将其匹配到LCAflow库里面相最符合的流，污染物指标备注为氨氮
- phosphorus, total: 0.205869
  the Technical of end-of-pipe management technology for pollution phosphorus, totalisPhysical treatment，Its Technical efficiency of end-of-pipe management0
  污染物指标总磷的末端治理技术是物理处理法，其效率为0，末端治理设施实际运行率（k值）计算公式为/。原文件中描述污染物类别为废水，污染物指标为总磷，此处对其进行了匹配工作，将其匹配到LCAflow库里面相最符合的流，污染物指标备注为总磷
- Nitrogen, organic bound: 0.356923
  the Technical of end-of-pipe management technology for pollution Nitrogen, organic boundisPhysical treatment，Its Technical efficiency of end-of-pipe management0
  污染物指标总氮的末端治理技术是物理处理法，其效率为0，末端治理设施实际运行率（k值）计算公式为/。原文件中描述污染物类别为废水，污染物指标为总氮，此处对其进行了匹配工作，将其匹配到LCAflow库里面相最符合的流，污染物指标备注为总氮
- chemical oxygen demand: 0.973499
  the Technical of end-of-pipe management technology for pollution chemical oxygen demandisPhysical treatment + anaerobic biological treatment + aerobic biological treatment + chemical treatment，Its Technical efficiency of end-of-pipe management97.35
  污染物指标化学需氧量的末端治理技术是物理处理法+厌氧生物处理法+好氧生物处理法+化学处理法，其效率为97.35，末端治理设施实际运行率（k值）计算公式为k=污水处理设施耗电量（千瓦时/年）/(总额定功率（千瓦）×年运行时间（小时/年）)。原文件中描述污染物类别为废水，污染物指标为化学需氧量，此处对其进行了匹配工作，将其匹配到LCAflow库里面相最符合的流，污染物指标备注为化学需氧量
- chemical oxygen demand: 36.7358
  the Technical of end-of-pipe management technology for pollution chemical oxygen demandisPhysical treatment，Its Technical efficiency of end-of-pipe management0
  污染物指标化学需氧量的末端治理技术是物理处理法，其效率为0，末端治理设施实际运行率（k值）计算公式为/。原文件中描述污染物类别为废水，污染物指标为化学需氧量，此处对其进行了匹配工作，将其匹配到LCAflow库里面相最符合的流，污染物指标备注为化学需氧量

## Use advice
This dataset is derived from the Pollution Source Census Report and contains information on pollution emissions and related products. However, it does not include data on energy or chemical consumption, nor does it provide information on waste or co-product generation. When utilizing this dataset, please supplement the missing data based on actual conditions before use
该数据集来源于污染源普查报告，包含污染物排放及相关产品信息，但不包含能源或化学品消耗数据，也不提供废弃物或共生产物产生信息。在使用该数据集时，请根据实际情况补充缺失数据后再使用。

## Review details
Inventory: The internal review was done by several iteration steps concerning raw data validation, raw data documentation, representativity, completeness and consistency of modelling with regard to ISO 14040 and 14044.
清单： 内部审查通过几个迭代步骤完成，涉及原始数据验证、原始数据记录、代表性、完整性、与 ISO 14040 和 14044 有关的建模的一致性。

## Data sources
- 第二次全国污染源普查产排污核算系数手册（试用版）,二级代码15,四级代码1512文件，在完整版文件中第3413页
