# copper-based mixed waste recycling;Blister copper;refining process;Black copper

Dataset: ILCD process, Unit process, single operation
Geography: JX-CN
Reference year: 2020
Classification: Unit processes / Materials production / Metals and semimetals
Functional unit: We consider the functional unit of the recycling of copper-based mixed waste to be 1000 kg electrolytic copper.
LCI method principle: Attributional
LCI method approaches: Allocation - market value
Generated by: Peng Wang, 2867919560@qq.com
Owner: Tiangong LCI Data Working Group
Review: Dependent internal review by Tiangong LCI Data Working Group
Amounts: no units in this file; such an amount is in the reference unit of its flow, which a separate flow dataset defines
copyright: false
licenseType: Free of charge for all users and uses

## General comment
The recycling process is employed in a metal recycling facility based in Jiangxi Province, China. It focuses on recovering copper from copper-based mixed waste materials. Black copper derived from the smelting process is used as the primary raw material. This process is vital for producing anode copper, intended for subsequent electrolytic refinement. The anode copper is mainly utilized in the electrical industry, especially in the production of high purity electrolytic copper for various electrical applications.

## Geography
The typical case is a metal recycling enterprise located in Jiangxi Province, China,

## Technology and included processes
Refining relies on the black copper from the smelting process as the main raw material, with heavy oil and coal used as fuel and oxygen, quartz sand, and other auxiliary materials used to produce anode copper as the main product (sent to the electrolytic process).

## Reference product
- Black copper: 1200; measured
  Blister copper(98.50%)

## Inputs
All rows: measured
- Activated coke: 2.4
  Activated coke needs to be replenished
- Anodes (used): 210
  Anodes (used)
  Self-produced
- Black copper（90% Cu）: 1350
  Black copper;90%copper needs to be supplemented
- clay: 5.9
  Clay bricks
- hard coal,hard coal,hard coal: 23.8
  Hard coal
- heavy fuel oil: 85.5
  Heavy fuel oil (1.0wt.% S)
- magnesium: 5.9
  Magnesium powder
- oxygen: 0.3
  Oxygen (gaseous)
- quartz sand: 48.8
  Quartz sand(90%)
- Sodium silicate: 9.6
  Sodium silicate needs to be supplemented
- transport in t*km,transport in t*km: 13.0828
  Transport

## Outputs
All rows: measured
- mineral waste (ash): 31.9
  Ash ;To zinc recovery
- particles (PM2.5 - PM10): 1.4
  Dust;Need to add
- Slag: 190.2
  Slag;To smelting
- mineral waste (ash): 0.1
  Ash;Emission into the air
- carbon dioxide (fossil): 151.7
  原文未区分bio和fossil，根据专家判断此处为fossil

## Deviations from the LCI method approaches
Using the LCA-ReCiPe 2016 (Heijungs et al., 2017) characterization and normalization method (the midpoint and endpoint method), the life cycle inventory is converted into impact scores in multiple fields.

## Data selection and combination
foreground data and background data.

## Data treatment and extrapolations
GaBi 9.0 software is adopted to calculate the inventory, resource consumption, and waste emissions of the various copper-based mixed-waste recovery processes per unit mass.

## Use advice
When using the provided LCA data for the copper-based mixed waste recycling process, users should take into account the regional specificity of the data, as the typical case is based in Jiangxi Province, China. The data includes both foreground and background information and is evaluated using GaBi 9.0 software, along with LCA-ReCiPe 2016 methods for characterization and normalization. To ensure the accuracy of assessments or comparisons, users must apply the functional unit of 1000 kg of electrolytic copper, as assumed in this study. Adjustments should be made when applying datasets in different technological or geographical contexts.

## Review details
Inventory: The internal review was done by several iteration steps concerning raw data validation, raw data documentation, representativity, completeness and consistency of modelling with regard to ISO 14040 and 14044.

## Data sources
- Zhang, W. et al. Analyzing the environmental impact of copper-based mixed waste recycling-a LCA case study in China. Journal of Cleaner Production 284, 125256 (2021).
