# cement production;cement, portland fly-ash cement, 52.5MPa;dry rotary kiln;Sewage sludge

Dataset: ILCD process, Unit process, black box
Geography: CN
Classification: Materials production / Other mineralic materials
Generated by: Siqi Yang, ysqsophia@gmail.com
Owner: Tiangong LCI Data Working Group
Review: Dependent internal review by Tiangong LCI Data Working Group
Amounts: no units in this file; such an amount is in the reference unit of its flow, which a separate flow dataset defines
copyright: false
licenseType: Free of charge for all users and uses

## General comment
Dry rotary kiln scenarios with 100% cement kiln dust recycling technology were considered.

## Geography
Beijing and Chongqing

## Technical purpose
The Portland fly-ash cement, with a strength grade of 52.5MPa, produced using dry rotary kiln technology with 100% cement kiln dust recycling, is intended for general construction purposes including infrastructure, residential, and commercial buildings. The use of sewage sludge in the cement production enhances the waste management, contributing to the circular economy.

## Model description
Choose to manage 1 ton of Portland fly ash cement (P·F 52.5).A dry rotary kiln scenario using 100% cement kiln dust recovery technology was considered. The infrastructure processes for each scenario, road transport of raw materials to the cement production site, direct emissions, wastewater treatment, raw material and energy production and the recovery of electricity from the dry rotary kiln scenario are included.

## Reference product
- cement, portland fly-ash cement, 52.5MPa: 1000
  Portland fly ash cement (P.F 52.5)

## Inputs
- limestone, crushed, for mill: 1160
  Limestone
- hard coal: 94.69
  Bituminous coal
- iron, powder: 1.7
  lron powder
- gypsum stone (CaSO4-dihydrate): 50
  Gypsum
- ash: 170
  Coal ash, namely fly ash.
- sandstone: 6.1
  Sandstone
- electricity, medium voltage: 372.204
  Electricity
- Water (fresh water): 180
  Fresh water consumption
- crude oil; 42.3 MJ/kg: 0.35
  Oil
- sewage sludge, dried: 83.55
  Dewatered sludge. The sewage sludge used in Beijing cement production site is coming from Jiuxianqiao sewage treatment plant in Beijing City. The calorific value of sewage sludge is 3800 kcal/kg-dry mass. The data for heavy metal emissions from sludge were used from the cement production process at the Runjiang cement production site in Chongqing, China.

## Outputs
- sulfur dioxide: 0.09
  SO2
- hydrogen chloride: 0.00528
  HCI
- carbon dioxide: 760
  CO2
- hydrogen fluoride: 0.00025
  HF
- carbon monoxide: 0.15
  CO
- Nitrogen oxides: 0.93
  NOx
- zinc: 1e-5
  Zn
- arsenic: 5.09e-8
  As
- nickel: 1e-5
  Ni
- cadmium: 7.92e-7
  Cd
- lead: 0.0002
  Pb
- mercury: 0.00024
  Hg
- chromium: 5.28e-6
  Cr
- copper: 3.02e-6
  Cu
- 2,3,7,8-tetrachlorodibenzo-p-dioxin: 3.08e-10
  Dioxins (TEQ-g)
- hydrogen sulfide: 9.36e-6
  H2S
- ammonia: 1.2e-5
  NH3
- methyl mercaptan: 1.2e-6
  Methyl mercaptan
- particles (> PM10): 0.036
  Particulates. The particle size is not specified. Here we treat it as PM>10.

## Data selection and combination
Chinese data were used where possible, but when Chinese data were not available, European data and related background data were used (Ecoinvent Centre, 2007). Based on Chinese data, annual average monitoring data of the cement production process (including energy, water and raw material consumption, direct emissions) of the Beijing cement production base in China are used (http://www.jiancai.hk/news/show/265/) .The heavy metal gas emission data of ordinary cement at Beijing cement production site comes from the report (2007). The heavy metal emission data from sewage sludge are based on data from the cement production process at the Runjiang cement production site in Chongqing, China.

## Sampling procedure
The actual annual output of the Beijing cement production base is approximately 2 million tons.

## Use advice
When using this LCA data set for the cement manufacturing process at the Beijing production base, ensure to consider the inclusion of annual average monitoring data pertaining to energy, water and raw material consumption, and direct emissions specific to this site. Additionally, take heavy metal gas emission data into account for ordinary cement and those from sewage sludge for a comprehensive environmental impact assessment. Note that this data set relies on Chinese data, supplemented by European data from the Ecoinvent Centre where necessary. Any extrapolation or comparison with other data sets should carefully consider the technological applicability and geographical specificity.

## Review details
Inventory: The internal review was done by several iteration steps concerning raw data validation, raw data documentation, representativity, completeness and consistency of modelling with regard to ISO 14040 and 14044.

## Data sources
- Jinglan Hong & Xiangzhi Li. (2011). Environmental assessment of sewage sludge as secondary raw material in cement production – A case study in China. Waste Management 31, 1364–1371.
