# Carbon emission from natural gas pipeline ;Long-distance natural gas pipeline ;Carbon footprint analysis

Dataset: ILCD process, Unit process, single operation
Geography: CN
Reference year: 2022
Classification: Unit processes / Energy carriers and technologies / Natural gas based fuels
LCI method principle: Attributional
LCI method approaches: Consequential
Generated by: Shikang Kang, 908798159@qq.com
Owner: Tiangong LCI Data Working Group
Review: Dependent internal review by Tiangong LCI Data Working Group
Amounts: no units in this file; such an amount is in the reference unit of its flow, which a separate flow dataset defines
copyright: false
licenseType: Free of charge for all users and uses

## General comment
A life cycle assessment method of natural gas pipeline is proposed to quantify carbon emissions from construction to disposal. The model divides the carbon emission of natural gas pipeline into four parts: manufacturing, construction, operation and recovery. For each of these four stages, the carbon emissions of material production and construction, facility construction and equipment operation are calculated in detail.

## Geography
Actual pipeline data in China

## Time period
Publication time of literature

## Technology and included processes
The relationship between energy input and greenhouse gas emissions in the life cycle of a natural gas pipeline needs to be calculated using a series of input parameters, such as the power grid in the area where the pipeline passes, the layout of compressor stations, and the length and diameter of the pipeline. Therefore, these parameters need to be used as model inputs for calculating carbon footprint. The model includes four emission calculation modules: manufacturing, construction, operation and recycling.

## Technical purpose
The data set describes a life cycle assessment method specifically designed for long-distance natural gas pipelines. The method is used to quantify carbon emissions throughout a pipeline's life cycle, from construction to disposal. Such data sets are typically applied in environmental assessments and carbon footprint analyses to understand the environmental impact of natural gas transportation infrastructure. It is suitable for large-scale environmental evaluations in the energy sector, particularly for companies managing and operating natural gas pipelines.

## Reference product
- carbon dioxide (fossil): 7.31e8; log-normal; software or database
  The original text has been distinguished as follows. This process comes from the first stage of carbon emissions

## Inputs
- natural gas: 7.31e8; log-normal
  There is no input of much natural gas in the literature, assuming (1:1)

## Outputs
- carbon dioxide (fossil): 2.29619e6; log-normal; software or database
  The original text has been distinguished as follows. This process comes from the second stage of carbon emissions
- carbon dioxide (fossil): 1.13e8; log-normal; software or database
  The original text has been distinguished as follows. This process comes from the third stage of carbon emissions
- carbon dioxide (fossil): 2.65e7; log-normal; software or database
  The original text has been distinguished as follows. This process comes from the fourth stage of carbon emissions

## Data selection and combination
Pipelines are mainly divided into trunk lines and branch lines, which are buried. The trunk line starts from the initial gas transmission station near the mine and ends at the final gas distribution station. Each station is mainly divided into compressor station, gas transmission station, gas receiving station and gas distribution station according to its function

## Data treatment and extrapolations
Using the proposed model, the carbon emissions of 26 actual natural gas pipelines are calculated and analyzed in depth

## Use advice
When using this data set for life cycle assessment, consider the specific stages of the natural gas pipeline's life cycle, such as manufacturing, construction, operation, and recovery. Ensure the input parameters such as regional power grids, the layout of compressor stations, and the pipeline's length and diameter, are accurately reflected in the model. Apply the data set's four emission calculation modules appropriately for each stage. Verify that the data correlates with the geographical region in question, and adjust parameters when applying the model to pipelines not covered in the original analysis. Also, consider the publication time of the literature to ascertain data relevance and validity for current assessments.

## Review details
Inventory: The internal review was done by several iteration steps concerning raw data validation, raw data documentation, representativity, completeness and consistency of modelling with regard to ISO 14040 and 14044.

## Data sources
- Xu, S. et al. Life cycle assessment of carbon emission from natural gas pipelines. Chemical Engineering Research and Design 185, 267–280 (2022).
