# underground coal mining | coal mining

Dataset: ILCD process, Unit process, black box
Geography: CN
Reference year: 2005
Classification: Materials production / Other mineralic materials
Generated by: Linlin Yin, yinlinlin0623@163.com
Review: Dependent internal review by Tiangong LCI Data Working Group
Amounts: no units in this file; such an amount is in the reference unit of its flow, which a separate flow dataset defines

## Geography
2000年“中国西南”地区井工煤矿开采过程甲烷排放。

## Technology and included processes
对1994年和2000年我国煤矿排入大气的甲烷量进行了调查研究, 通过对国有重点、国有地方和乡镇煤矿大量矿井瓦斯等级鉴定资料的整理分析, 矿井甲烷抽放量和利用量的调研,以及补充进行某些试验室测定工作。在此基础上, 按照IPCC 修订指南所提第2种方法即平均排放系数法, 分别求出我国各大区域的煤产量加权平均甲烷系数及我国各大区域煤矿开采过程甲烷排放系数。

## Outputs
- methane (fossil): 0.0002168; uniform; article inperiodical
  排放因子,2000年中国西南地区井工煤矿开采过程中甲烷排放系数，即“每开采1kg煤炭，释放的甲烷体积”。

## Review details
Inventory: The internal review was done by several iteration steps concerning raw data validation, raw data documentation, representativity, completeness and consistency of modelling with regard to ISO 14040 and 14044.; Documentation: The review of the documentation was performed by Ecobilan and is in compliance with ISO 14040 and 14044. The data set documentation is correct in view of the appropriateness of the information provided. It includes all relevant information in view of data quality and scope of application of the respective LCI result.
