# Alumina production ; Alumina for metallurgy ; Bayer process ; Bauxite

Dataset: ILCD process, Unit process, single operation
Geography: CN
Reference year: 2020
Classification: Unit processes / Materials production / Non-energetic raw materials
Generated by: Ruoxi Xiong, xiongrx0126@163.com
Owner: Tiangong LCI Data Working Group
Review: Dependent internal review by Tiangong LCI Data Working Group
Amounts: no units in this file; such an amount is in the reference unit of its flow, which a separate flow dataset defines
copyright: false
licenseType: Free of charge for all users and uses

## General comment
The alumina produced through the Bayer process is primarily used for metallurgical purposes. It serves as a fundamental feedstock for the production of aluminum by the electrolytic process in smelters.

## Time period
Date of publication

## Reference product
- aluminium oxide, metallurgical: 1000; missing unimportant
  alumina

## Inputs
All rows: missing unimportant
- electricity, high voltage, aluminium industry: 968.4
- bauxite: 2480
- lime: 32
- Sodium hydroxide: 61.5
- steam, in chemical industry: 2430
  Steam
- natural gas, high pressure: 72.5
  Natural gas
- Water, unspecified natural origin: 2000

## Outputs
All rows: missing unimportant
- wastewater, average: 791
  Waste water
- Residue: 758
  Filter residue 搜不出来
- Dust: 0.29
- ammonia: 0.0125
- chromium: 0.00132
  Chromium
- Bromine: 0.00115
- carbon monoxide (fossil),carbon monoxide (fossil): 1.16
- hydrogen fluoride: 0.00157
- hydrogen sulfide: 0.00644
- sulfur dioxide: 3.41
- Propane: 0.0252
- Xylene: 0.0917
- particles (PM2.5 - PM10): 0.161
  Particulate matters 10
- particles (PM2.5): 1.03
  Particulate matters 2.5
- BOD5, Biological Oxygen Demand: 0.00952
  Biochemical oxygen demand
- chemical oxygen demand: 0.26

## Use advice
This data set represents the production of metallurgical-grade alumina from bauxite using the Bayer process. Users should note that this data excludes the potential recycling of alumina and is focused on the primary production phase. It is essential to consider the geographical and technological applicability when modeling the use phase behavior for this material, given the environmental impact of regional energy sources and the emission standards of the production facilities.

## Review details
Inventory: The internal review was done by several iteration steps concerning raw data validation, raw data documentation, representativity, completeness and consistency of modelling with regard to ISO 14040 and 14044.

## Data sources
- Zhu, X., Jin, Q. & Ye, Z. Life cycle environmental and economic assessment of alumina recovery from secondary aluminum dross in China. J. Clean. Prod. 277, (2020).
