# Municipal sludge treatment and disposal;wet sludge moisture content 80.94%;composting

Dataset: ILCD process, Unit process, single operation
Geography: HF-AH-CN
Classification: Unit processes / End-of-life treatment / Waste water treatment
Functional unit: The residual sludge moisture content of Hefei Wangtang Sewage Treatment Plant is 80.94%, and the functional unit is 1t of residual sludge.
Generated by: Jin Sitian, 2331276@tongji.edu.cn
Owner: Tiangong LCI Data Working Group
Review: Dependent internal review by Tiangong LCI Data Working Group
Amounts: no units in this file; such an amount is in the reference unit of its flow, which a separate flow dataset defines
copyright: ['opt4ROkqig']
licenseType: Free of charge for all users and uses

## General comment
The composting process refers to high-temperature aerobic composting.

## Geography
Hefei Wangtang Sewage Treatment Plant

## Technology and included processes
During the composting process, about 2/3 of the carbon is converted into carbon dioxide and 13.16% of the nitrogen is converted into ammonia when microorganisms are metabolized.

## Technical purpose
The residual sludge from the Hefei Wangtang Sewage Treatment Plant is primarily used in composting processes for soil amendment applications. With a moisture content of 80.94%, the sludge can be processed to create compost that is beneficial for agricultural lands, greening projects, and possibly for land reclamation. The data represents the environmental impact associated with treating and disposing of 1 tonne of the wet sludge.

## Reference product
- Sludge: 1000; input; estimated
  1t of remaining sludge with a moisture content of 80.94%

## Outputs
All rows: calculated
- carbon dioxide (biogenic): 143.55
  The original text does not distinguish between biogenic and fossil, and according to experts, it is biogenic here.
- ammonia: 1.051
- Nitrogen oxides: 0.001292
- hydrogen sulfide: 0.01944
- sulfur dioxide: 0.002648

## Use advice
When utilizing this LCA data for municipal sludge treatment and disposal with composting, it is important to consider the regional variability in sludge composition and regulations. The technological applicability is specific to the characteristics of the sludge from Hefei Wangtang Sewage Treatment Plant, and results may differ for sludge from other regions or plants. Extrapolation of this data for other contexts should be done with caution, and any recycling or downstream utilization pathways beyond composting should be explicitly factored into the assessment.

## Review details
Inventory: The internal review was done by several iteration steps concerning raw data validation, raw data documentation, representativity, completeness and consistency of modelling with regard to ISO 14040 and 14044.

## Data sources
- 齐星昊. 基于生命周期评价的典型剩余污泥处理方法的环境影响比较研究[D].河南师范大学,2020.
