# Aluminum foil production ; Aluminum foil ; Lubricating oil, aluminum

Dataset: ILCD process, Unit process, single operation
Geography: AH-CN
Classification: Materials production / Metals and semimetals
Functional unit: Produce 1kg aluminum foil
LCI method principle: Attributional
Generated by: Xin Chen, xinchen@mail.nankai.edu.cn
Owner: Tiangong LCI Data Working Group
Review: Dependent internal review by Tiangong LCI Data Working Group
Amounts: no units in this file; such an amount is in the reference unit of its flow, which a separate flow dataset defines
copyright: false
licenseType: Free of charge for all users and uses

## General comment
Aluminum foil produced in this process is intended for multiple applications including packaging, thermal insulation, electromagnetic shielding, and electrical conductivity. It can be used in the food industry for wrapping, cooking, and storing perishables, as well as in the electronics industry for shielding components. The lubricating oil used in the process is specifically suited for the high-speed machines employed in foil production to ensure smooth operation and maintenance of equipment.

## Geography
Anhui Meixin Aluminum Co., Ltd.

## Reference product
- Aluminum foil: 1
  Data comes from the environmental performance assessment report of Anhui Maxim Aluminum Co., Ltd.

## Inputs
- aluminium: 1.11
  (same comment as for Aluminum foil)
- lubricating oil: 0.0267
  (same comment as for Aluminum foil)
- Electricity: 2.6172
  (same comment as for Aluminum foil)
- transport in t*km: 0.209
  (same comment as for Aluminum foil)

## Outputs
- non-methane volatile organic compounds: 0.000404
  (same comment as for Aluminum foil)
- chemical oxygen demand: 7.9e-5
  (same comment as for Aluminum foil)
- biological oxygen demand: 7.9e-5
  (same comment as for Aluminum foil)

## Data selection and combination
Data comes from environmental performance assessment reports

## Use advice
Users of this data must consider the full life cycle of aluminum production when utilizing this dataset for Life Cycle Assessment (LCA). This includes the extraction and processing of raw aluminum, the use of lubricants in the manufacturing stage, and the potential recycling or disposal of aluminum foil post-consumer use. Attention should be paid to the energy and material inputs detailed in the environmental performance assessment reports to accurately reflect the environmental impacts of the production process.

## Review details
Inventory: The internal review was done by several iteration steps concerning raw data validation, raw data documentation, representativity, completeness and consistency of modelling with regard to ISO 14040 and 14044.

## Data sources
- Yin, R., Hu, S. & Yang, Y. Life cycle inventories of the commonly used materials for lithium-ion batteries in China. Journal of Cleaner Production227, 960–971 (2019).
