# PV module manufacturing ; PV module ; Integrated method

Dataset: ILCD process, Unit process, black box
Geography: CN
Reference year: 2015
Classification: Unit processes / Materials production / Other materials
Functional unit: Therefore, to achieve the goals, 1 kWp of multi-crystalline silicon PV modules produced is used as the functional unit (FU)
LCI method principle: Attributional
LCI method approaches: Allocation
Generated by: Jinfeng Yang, yjfzfshn@163.com
Owner: Tiangong LCI Data Working Group
Review: Dependent internal review by Tiangong LCI Data Working Group
Amounts: no units in this file; such an amount is in the reference unit of its flow, which a separate flow dataset defines
copyright: false
licenseType: Free of charge for all users and uses

## General comment
Multi-Si

## Geography
We performed a life-cycle environmental assessment of China's multi-crystalline silicon photovoltaic(PV) modules associated with international trade.

## Time period
Available online

## Technical purpose
The multi-crystalline silicon photovoltaic (PV) modules manufactured through this process are used in the generation of solar power. This PV module technology is integrated within a range of solar energy applications, from residential and commercial solar panel installations to large-scale solar farms, facilitating the conversion of sunlight into electrical energy.

## Reference product
- Solar Module,Solar Module,Solar Module: 1000; software or database
  multi-crystalline silicon PV modules

## Inputs
All rows: software or database
- silicon: 11.6
  Silicon
- bauxite: 59.6
  Bauxite
- Calcite: 46.2
- hard coal: 930
  Coal
- metallurgical coal: 83.6
  Crude oil
- gravel: 10.2
  Gravel
- iron: 76.5
  Iron
- Limestone: 12.1
- natural gas: 4.18
  Natural gas
- sodium chloride: 21.4
  Sodium chloride
- freshwater: 36800
  Water
- silver: 0.106
  Silver

## Outputs
All rows: software or database
- Coal ash: 113
- Slag: 31.5
  Kind of
- industrial waste (unspecified): 64.4
  Industrial waste
- carbon dioxide (fossil): 1990
  carbon dioxide
- methane (fossil): 9.78
  Methane
- Nitrogen oxides: 6.85
- sulfur oxides: 1.85
  Sulfur oxides
- sulfate: 4.26
  Sulfate
- biological oxygen demand: 0.691
- chemical oxygen demand: 0.731
  Cod
- phosphate: 0.42
  Phosphate

## Deviations from the LCI method approaches
This study has two main goals:To assess environmental impacts and identify “hot spots” in the life cycle of multi-crystalline silicon PV module manufacturing in China.To quantify the shift of environmental impacts attributable to the export of Chinese multi-crystalline silicon PV modules.

## Data selection and combination
Data of silicon ore mining, multi-crystalline silicon manufacturing, multi-crystalline silicon chip cutting, and PV module packaging were all acquired from surveys and environmental impact assessment reports from relevant factories in China.Data on the industrial silicon manufacturing process were obtained from the literature.

## Use advice
When utilizing this data set for life-cycle environmental assessment, it is important to take into account the specific stages of multi-crystalline silicon PV modules' life cycle, such as silicon ore mining, manufacturing of multi-crystalline silicon, chip cutting, and module packaging. The data should be applied with an understanding of the technological context and be adjusted for site-specific conditions where necessary. Considerations should also include the impacts of international trade and the implications of exporting Chinese multi-crystalline silicon PV modules. The functional unit for this data is 1 kWp of produced multi-crystalline silicon PV modules.

## Review details
Inventory: The internal review was done by several iteration steps concerning raw data validation, raw data documentation, representativity, completeness and consistency of modelling with regard to ISO 14040 and 14044.

## Data sources
- Yang, D., Liu, J., Yang, J. & Ding, N. Life-cycle assessment of China’s multi-crystalline silicon photovoltaic modules considering international trade. Journal of Cleaner Production 94, 35–45 (2015).
