# raw meal preparation;raw meal

Dataset: ILCD process, Unit process, single operation
Geography: CS-HUN-CN
Classification: Materials production / Non-energetic raw materials
Generated by: Siqi Yang, ysqsophia@gmail.com
Owner: Tiangong LCI Data Working Group
Review: Dependent internal review by Tiangong LCI Data Working Group
Amounts: no units in this file; such an amount is in the reference unit of its flow, which a separate flow dataset defines
copyright: false
licenseType: Free of charge for all users and uses

## General comment
Raw Meal Preparation. The limestone, clay, and laterite are successively crushed by a hammer crusher and an impact crusher to obtain particles with a diameter particle size below 20 mm. Next, all the raw materials, except for the gypsum, are placed into the raw mill at corresponding ratios and are subsequently milled to a mixture, which is called “the raw meal”. The raw meal is dried in cyclone separators at an atmosphere filled with high-temperature gas from the kiln. Electricity is the primary energy source in this process.Modified granulated copper slag (MGCS) preparation is a crucial phase. The original copper slag was procured from a smelter of Boliden Mineral AB, Stockholm, Sweden. This was ground in the raw mill to form granulated copper slag (GCS) with a particle size lower than 0.60 mm. The CaO (99.9% pure) was supplied by Changsha Danuo Building Materials Co., Ltd., Changsha, China. The procedure of MGCS production is as follows. The GCS and CaO (20 wt.%) were charged in the furnace while the heating temperature was raised to approximately 1550 ◦C, at which point the mixtures were completely molten. The water-quenching method was then adopted to form the MGCS. The entire process was carried out within a nitrogen atmosphere with a flow rate of 150 mL/min. This procedure was conducted in the Changsha Research Institute of Mining and Metallurgy Co., Ltd., Changsha, China. The produced MGCS was eventually transported by trucks to the cement plant, which uses electricity as the main energy source.

## Geography
A typical cement plant in Changsha, Hunan Province, China

## Technology and included processes
MGCS preparation is a crucial phase. The original copper slag was procured from a smelter of Boliden Mineral AB, Stockholm, Sweden. This was ground in the raw mill to form GCS with a particle size lower than 0.60 mm. The CaO (99.9% pure) was supplied by Changsha Danuo Building Materials Co., Ltd., Changsha, China. The procedure of MGCS production is as follows. The GCS and CaO (20 wt.%) were charged in the furnace while the heating temperature was raised to approximately 1550 ◦C, at which point the mixtures were completely molten [23]. The water-quenching method was then adopted to form the MGCS. The entire process was carried out within a nitrogen atmosphere with a flow rate of 150 mL/min [24]. This procedure was conducted in the Changsha Research Institute of Mining and Metallurgy Co., Ltd., Changsha, China. The produced MGCS was eventually transported by trucks to the cement plant, which uses electricity as the main energy source.

## Technical purpose
The technical application of the described industrial process involves the preparation of raw meal and modified granulated copper slag (MGCS) for cement production. Limestone, clay, and laterite are processed to form the raw meal, which serves as the base material in the manufacture of cement. MGCS, produced by the combination of granulated copper slag and calcium oxide, is utilized in enhancing the properties of cement, contributing to its compressive strength. The process takes place in a controlled nitrogen atmosphere and involves high-temperature operations.

## Model description
A functional unit (FU) is defined as 1 kg of mixed cement with a compressive strength of 42.9 MPa.

## Reference product
- raw meal: 1000
  Raw meal

## Inputs
- limestone, crushed, for mill: 941.658
  Limestone
- clay: 13.5107
  Clay
- laterite, mineral: 44.8311
  Laterite
- crude oil; 42.3 MJ/kg: 0.00103378
  Crude oil
- electricity, medium voltage: 68.9048
  Electricity

## Outputs
- particles (> PM10): 2.90686
  PM. The particle size is not specified. Here we treat it as PM>10.
- carbon dioxide: 0.00190379
  CO2
- carbon monoxide: 1.0747e-5
  CO
- Nitrogen oxides: 1.8833e-5
  NOX

## Deviations from the LCI method approaches
Some data related to the background system were obtained from the Ecoinvent 3.1 database.

## Data selection and combination
Inventory data for the Prospect system is collected directly from cement plants located in Changsha, Hunan Province, China.

## Use advice
When utilizing this dataset for Life Cycle Assessment, it is essential to consider the geographical and technological context of the information, as it is specific to a cement plant in Changsha, Hunan Province, China. Original data for MGCS preparation was sourced from a specific smelter and concrete composition data may vary. Data related to the background system is derived from the Ecoinvent 3.1 database, and users should ensure compatibility with this source. The functional unit is defined as 1 kilogram of mixed cement with a specified compressive strength, and this should be consistently applied across the LCA study.

## Review details
Inventory: The internal review was done by several iteration steps concerning raw data validation, raw data documentation, representativity, completeness and consistency of modelling with regard to ISO 14040 and 14044.

## Data sources
- Qinli Zhang, Bingyi Zhang, & Daolin Wang. (2022). Environmental Benefit Assessment of Blended Cement with Modified Granulated Copper Slag. MATERIALS, 15(15).
