# Sediment Remediation;In-situ Remediation;Activated Carbon Remediation;Remediated Sediment

Dataset: ILCD process, Unit process, single operation
Geography: US
Reference year: 2015
Classification: Other Services / Repair and maintenance
Generated by: Wang Ning, wang_ning@caep.org.cn
Owner: Tiangong LCI Data Working Group
Review: Dependent internal review by Tiangong LCI Data Working Group
Amounts: no units in this file; such an amount is in the reference unit of its flow, which a separate flow dataset defines
copyright: false
licenseType: Free of charge for all users and uses

## General comment
Activated charcoal is sprinkled into the substrate and stirred well so that the substrate is repaired

## Technical purpose
This process describes the application of activated carbon remediation. It is specifically used for in-situ sediment remediation. Through seeding, spreading and mixing activated carbon into contaminated sediments, this method is applied to adsorb pollutants for environmental restoration purposes.

## Reference product
- Remediated Sediment: 1; estimated
  得到修复的底泥

## Inputs
- Activated Carbon: 5500; estimated
  播种活性炭的质量
- Contaminated Sediment: 1; estimated
  受到污染的底泥

## Use advice
When utilizing this data set for life cycle assessment of in-situ sediment remediation, pay attention to sourcing of activated carbon and the specific conditions of the contaminated site, such as the type and concentration of pollutants. Consider the effective service life of the activated carbon and the regeneration or replacement frequency. Ensure that the assessment includes potential environmental impacts of the activated carbon production and transport to the remediation site.

## Review details
Inventory: The internal review was done by several iteration steps concerning raw data validation, raw data documentation, representativity, completeness and consistency of modelling with regard to ISO 14040 and 14044.
