# cement production;cement, portland blastfurnace-slag cement;new dry process precalciner kiln, 4000 t/d;granulated blast furnace slag

Dataset: ILCD process, Unit process, black box
Geography: CN
Classification: Unit processes / Materials production / Other mineralic materials
Generated by: #REF!, ysqsophia@gmail.com
Owner: Tiangong LCI Data Working Group
Review: Dependent internal review by Tiangong LCI Data Working Group
Amounts: no units in this file; such an amount is in the reference unit of its flow, which a separate flow dataset defines
copyright: false
licenseType: Free of charge for all users and uses

## General comment
The new dry pre-decomposition cement production model is selected.

## Technology and included processes
Granulated blast furnace slag. This article selects a pre-decomposition kiln-drying cement production model. The new dry pre-decomposition cement production technology is based on suspension preheating and pre-decomposition technology. It is a production technology that is more in line with environmental protection requirements and meets high productivity requirements, and has become the future development trend of China's cement industry. Therefore, the selection of new dry pre-decomposition cement production technology as cement model production technology has advanced and environmentally friendly requirements.

## Technical purpose
The new dry pre-decomposition kiln technology for cement production is an advanced and eco-friendly technique favored for its compatibility with high production rates and environmental protection standards. It has been adopted extensively in the Chinese cement industry as a future-oriented approach. Granulated blast furnace slag, a byproduct of steel manufacturing, is utilized to produce portland blastfurnace-slag cement, with a particular process capacity of 4000 tonnes per day. This specialization ensures the cement is suitable for various construction applications requiring the unique properties imparted by the slag addition, such as increased durability and reduced permeability.

## Model description
The life cycle functional unit is selected as 1t of cement to construct the life cycle model.The cement industry system boundary includes the production of cement, the production and transportation of raw materials, and the production of electricity, but does not include the use and processing of cement.For auxiliary materials such as slag, only the transportation and preparation process will be considered, and the production process will not be considered.

## Reference product
- cement, portland blastfurnace-slag cement: 1000
  Portland slag cement

## Inputs
- limestone, crushed, for mill: 598.77
  Limestone
- clay: 107.66
  Clay
- iron, powder: 19.53
  Iron powder
- gypsum stone (CaSO4-dihydrate): 50
  Gypsum. The standard values of GB-175-2007 General Portland Cement in China are used for each component of the cement.
- hard coal; 26.3 MJ/kg: 51.3
  Coal. The statistical values of Chinese production lines are used, and the standard coal consumption for large and medium-sized precalciner kilns is 114 kg/t clinker. The coal consumption can also be calculated based on the chemical composition of coal ash and the industrial analysis values of coal.
- granulated blast furnace slag: 500
  Blast furnace slag. The standard values of GB-175-2007 General Portland Cement in China are used for each component of the cement.
- Electricity: 347.004
  Electricity consumption. The average level of domestic electricity consumption in China is used. For dry-process cement production lines, the electricity consumption for milling operations accounts for more than 60% of the total electricity consumption, with raw material milling accounting for about 30% and cement milling accounting for about 40%. Due to limited data on raw material mining, a simplified treatment is adopted for various raw materials, and the electricity consumption data of 13.89 kWh/t raw materials are used. For different types of blended cement, the electricity consumption for milling different raw materials varies due to differences in their shapes and properties. The estimation is based on the percentage of electricity consumption for milling raw materials in the United States.

## Outputs
- carbon dioxide (fossil): 478
  CO2. The CO2 emissions during the cement production stage come from two parts: one is the decomposition of calcium carbonate and magnesium carbonate in the raw materials during the calcination process, and the other is the release of CO2 from coal combustion as fuel. The formulas for CO2 emissions from raw materials are: CaCO3→CaO+CO2; MgCO3→MgO+CO2. The emission factor for CO2 from coal combustion is based on the carbon emission coefficient from the Chinese Academy of Engineering, which is 2.4933 kg CO2 per kg of standard coal.
- sulfur dioxide: 0.35
  SO2. The emission of SO2 is based on the results of the first national survey of pollution sources in the Chinese cement industry (SO2 0.066kg/t clinker).
- Nitrogen oxides: 1.62
  NOx. The emission of NOx is based on the results of the first national survey of pollution sources in the Chinese cement industry (NOx 1.584kg/t clinker).
- particles (> PM10): 0.34
  Dust, with an unspecified particle size, is treated as PM > 10 micrometers in diameter. The emissions of dust during cement production are based on the upper limit values of the Chinese cement industry atmospheric pollutant emission standards. According to the dust emission concentration from different equipment in cement production, the dust emission quantity from each production stage can be calculated. Among them, the dust emission from raw material grinding accounts for approximately 55% of the total, cement grinding accounts for about 20%, coal preparation stage accounts for 13%, and clinker calcination process accounts for 12%.
- chemical oxygen demand: 0.00962
  COD. The emission of COD is based on the results of the first national survey of pollution sources in the Chinese cement industry (COD 0.06g/t clinker).
- Oils, unspecified: 0.225
  Oil
- methane (fossil): 0.633
  Methane
- mercury: 0.00595
  Mercury

## Deviations from the LCI method approaches
Using GaBi4 professional life cycle assessment software, a life cycle model will be established to conduct a life cycle assessment of cement. GaBi4 software will be utilized to divide the entire life cycle of cement into five major modules, with each module being a plan model. Each plan model will include data inputs for various stages of cement production.

## Data selection and combination
Pollutant emission data from limestone and gypsum mining come from the China Life Cycle Reference Database (CLCD). Due to the lack of mining data for clay and iron ore and the small amount of mining, the pollutant emission data from limestone mining were used as estimates. The pollutant emission data from coal mining adopt the raw coal mining data from the China Life Cycle Reference Database (CLCD).The power production pollutant emission data uses the national average grid power mixing and transmission data from the China Life Cycle Reference Database (CLCD).The transportation stage considers the transportation of all raw materials required for cement production, including limestone, clay, iron powder, gypsum, coal and industrial waste. For the convenience of calculation, a diesel truck with a load of 10t on highway transportation is taken as an example. It is assumed that the average transportation of all raw materials The distance is 100km. The pollutant emission inventory data of diesel trucks with a load of 10 tons in the China Life Cycle Reference Data (CLCD) are used.

## Use advice
The life cycle assessment data for cement production using new dry pre-decomposition kiln technology should factor in the pollutant emissions from raw material mining, both direct (such as limestone and gypsum) and estimated (for clay and iron ore). Emissions data from coal mining should also be considered. The power production phase should reference national average data, while transportation related emissions should be estimated based on the average distance and the emission factors for the specified diesel trucks. All data is sourced from the China Life Cycle Reference Database (CLCD). The cement industry system boundary defined for LCA encompasses cement production, raw material production, and transportation, as well as power generation, but excludes the usage and disposal phases of cement. For auxiliary materials like slag, only their transportation and preparation stages are considered. When using GaBi4 software or equivalent to model the life cycle, separate plan models must be built for each stage. The production of industrial waste and its environmental impact should be accounted for by the waste generator and is not included in the cement life cycle model.

## Review details
Inventory: The internal review was done by several iteration steps concerning raw data validation, raw data documentation, representativity, completeness and consistency of modelling with regard to ISO 14040 and 14044.

## Data sources
- 徐小宁. (2013). 中国水泥工业的生命周期评价 [硕士, 大连理工大学].
