# Soil remediation ; ex situ remediation ; biopile ; engineering implementation ; pile maintenance ; Remediated soil

Dataset: ILCD process, Unit process, single operation
Geography: KR
Reference year: 2011
Classification: Unit processes / Other Services / Repair and maintenance
Generated by: Sang Chunhui, sangch@mail.bnu.edu.cn
Owner: Tiangong LCI Data Working Group
Review: Dependent internal review by Tiangong LCI Data Working Group
Amounts: no units in this file; such an amount is in the reference unit of its flow, which a separate flow dataset defines
copyright: false
licenseType: Free of charge for all users and uses

## General comment
Using forced ventilation to continuously pump oxygen into the system for 514 days

## Technical purpose
The described industrial process pertains to the application of soil remediation, specifically ex situ biopile treatment. It involves the creation of biopiles for the biological treatment of contaminated soil. The remediation technique involves engineering implementation of a biopile where contaminated soil is treated over an extended period, supplemented with oxygen to enhance microbial activity. This process is applicable in environmental engineering and waste management sectors, aimed at restoring the usability of contaminated land.

## Reference product
- Remediated soil: 1000; estimated

## Inputs
- Electricity: 229320; estimated
- Pre-treatment Soil: 10000; estimated

## Outputs
- Exhaust gas: 1; estimated

## Use advice
When utilizing this LCA data set, ensure all input materials and energy as listed in the remedial system standardization report are accounted for in the assessment. Consider the full 514-day treatment duration when evaluating the process's environmental impact. It is vital to model the specific behavior of the biopile, especially with regard to the continuous aeration and the subsequent maintenance of the pile. Take into account any emissions or by-products generated during the treatment and evaluate their impact accordingly. Ensure the methodology used is consistent with the standards for ex situ soil remediation LCA.

## Review details
Inventory: The internal review was done by several iteration steps concerning raw data validation, raw data documentation, representativity, completeness and consistency of modelling with regard to ISO 14040 and 14044.

## Data sources
- Jeong, S.-W. & Suh, S.-W. Assessment of Environmental Impacts and CO 2 Emissions from Soil Remediation Technologies using Life Cycle Assessment - Case Studies on SVE and Biopile Systems -. Journal of Korean Society of Environmental Engineers 33, 267–274 (2011).
