# cement milling;cement, alternative constituents 21-35%;shaft kiln

Dataset: ILCD process, Unit process, single operation
Geography: CN
Classification: Materials production / Other mineralic materials
Generated by: Siqi Yang, ysqsophia@gmail.com
Owner: Tiangong LCI Data Working Group
Review: Dependent internal review by Tiangong LCI Data Working Group
Amounts: no units in this file; such an amount is in the reference unit of its flow, which a separate flow dataset defines
copyright: false
licenseType: Free of charge for all users and uses

## General comment
The clinker from the cement kiln, mixed together with gypsum and other additives, is milled into fine particles of a particular size in the cement milling sub-system, which are a final product of cement. This phase consists entirely of physical processes; no chemical processes are involved.

## Technology and included processes
The clinker from the cement kiln, mixed together with gypsum and other additives, is milled into fine particles of a particular size in the cement milling sub-system, which are a final product of cement. This phase consists entirely of physical processes; no chemical processes are involved, as described and depicted in Fig. 5.

## Technical purpose
The technical application of this data set is targeted towards the cement milling industry. The described cement milling process involves grinding clinker produced from a shaft kiln, with the inclusion of gypsum and alternative constituents ranging from 21-35%, into a fine powder to achieve the final cement product. This milled cement is generally used for construction purposes, including concrete production, infrastructure development, and building construction. The process is characterized by physical grinding without any chemical reactions and refers to production lines associated with vertical kilns, which typically have high energy demands and low production efficiency.

## Model description
The system boundary is the grinding stage where cement is produced.

## Reference product
- cement, alternative constituents 21-35%: 1000
  Cement

## Inputs
- clinker: 867.679
  Cement clinker
- mixed materials, mineral: 91.829
  Mixed materials
- gypsum stone (CaSO4-dihydrate): 46.276
  Gypsum
- Water (fresh water): 15.184
  Water (water content): water contained in the input materials.

## Outputs
- particles (> PM10): 5.785
  Dust. The particle size is not specified. Here we treat it as PM>10.
- Water (groundwater from technosphere, waste water): 15.184
  Water

## Sampling procedure
After investigation, the annual production capacity of cement companies using vertical kiln production systems is 100,000 tons of clinker. The overall characteristics of shaft kiln production lines are high energy consumption, limited production capacity, low labor productivity, and large dust emissions. The dynamic metabolism analysis of the shaft kiln production line is carried out in units of 1 hour under normal production levels.

## Use advice
When using this dataset for Life Cycle Assessment (LCA) of cement produced with alternative constituents in a shaft kiln, note the specific conditions such as the percentage of alternative materials (21-35%) and the energy consumption characteristics of the production process. Consider the technological applicability to the targeted region or industry. Ensure inclusion of all relevant inputs and outputs in the system boundary for accurate representation, and account for high dust emissions in the environmental impact assessment. Avoid extrapolating the data to processes different from those described, such as those using rotary kilns, which may have different technological and environmental profiles.

## Review details
Inventory: The internal review was done by several iteration steps concerning raw data validation, raw data documentation, representativity, completeness and consistency of modelling with regard to ISO 14040 and 14044.

## Data sources
- Dan Hu, Zhen Guo, Zhen Wang, & Qiang Xiao. (2015). Metabolism analysis and eco-environmental impact assessment of two typical cement production systems in Chinese enterprises. Ecological Informatics 26, 70–77.
