# Retail dairy raising ; livestock and poultry raising stage

Dataset: ILCD process, Unit process, single operation
Geography: SD-CN
Reference year: 2014
Classification: Unit processes / Materials production / Agricultural production means
Functional unit: 1kg milk
Generated by: Rui Yang, 1632707028@qq.com
Owner: Tiangong LCI Data Working Group
Review: Dependent internal review by Tiangong LCI Data Working Group
Amounts: no units in this file; such an amount is in the reference unit of its flow, which a separate flow dataset defines
copyright: false
licenseType: Free of charge for all users and uses

## General comment
The pollutant emission of livestock and poultry in the raising stage mainly comes from the pollutant emission of livestock and poultry gastrointestinal fermentation, and the pollutant emission generated by the energy consumption of livestock and poultry heating, lighting and equipment operation. Because of the different physiological structure of birds, the amount of CH4 produced in intestinal fermentation is very small, so it is ignored

## Geography
This study was conducted from 2014 to 2015, aiming at livestock and poultry feeding cycle, meat ratio, feed formula, feed consumption, coal and electricity consumption, etc. Has been to Shandong Gaomi Zhengda pig farm, Laixi City Zhishuang dairy farm, Jimo city Duan Bolan town Jiangjiapo village pig farm, Jimo City Liujiazhuang town livestock farm, Rizhao City Changling town Guanzhuang village, Juxian County Zhailihe town Dongxing Agriculture and animal husbandry company, Juxian Qiaoshan town east Chen dairy farm, Juxian Qiaoshan town Liu Jiayi water pig farm, Zhucheng Foreign Trade Co., LTD. Phoenix parents breeding duck farm, Xinjiang Fukang Hongfa Breeding professional cooperative, Jiuyun Street Town Xuhong laying Chicken cooperative, Jiuyun Street Town Liuyun Village self-contained breeding farm, China Australia Holding Group Co., LTD., Dezhou City Qingyun County Wayu Village, Shandong Province Qingyun County four Liu community beef cattle breeding base, Dezhou City Qingyun Qingnian chicken breeding base, Qingyun County Yongli Poultry layer breeding company, Qingyun County Xingchen youth chicken breeding Field research was carried out by professional breeding cooperatives, Qingyun Dongtai broiler breeding cooperatives, Hebei Yanshan Boyuan Feed Co., LTD., Yanshan Da Chinese Feed Co., LTD., Wudi Liuhe Feed Co., LTD., and China-Australia Oriental Hope Feed Co., LTD.

## Technology and included processes
In this paper, the life cycle of livestock and poultry farming is divided into six stages: feed crop planting, feed processing, livestock and poultry raising, manure treatment, slaughter and transportation. The specific life cycle process of livestock and poultry breeding is shown in Figure 2-1. Due to the lack of some data and the limitations of basic conditions, the production, transportation and use of pesticides, mulch and feed additives have not been analyzed, and the environmental impact caused by other related infrastructure construction, transport production and labor costs is no longer considered.

## Technical purpose
The data set represents the environmental impact associated with the raising stage of dairy and other livestock. It is relevant for life cycle assessments of agricultural products, particularly in evaluating the greenhouse gas emissions and resource use for dairy, pork, beef, and poultry production. The typical applications of this data include agricultural policy-making, environmental impact studies, and optimization strategies for livestock and poultry raising efficiency.

## Reference product
- milk: 1; measured

## Inputs
All rows: measured
- maize grain: 1.12
- soybean: 0.14
- wheat: 0.51
- Electricity: 0.0396
- hard coal: 0.01

## Outputs
All rows: measured
- methane (biogenic): 2.7e-5
  Dairy retail investors
- carbon dioxide (biogenic): 0.03093
  Dairy retail investors
- sulfur dioxide: 0.00043
  Dairy retail investors
- nitrogen, total (excluding N2): 8e-5
  Dairy retail investors
- carbon monoxide (fossil): 2e-5
  Dairy retail investors

## Data selection and combination
直接数据：畜禽饲养阶段数据皆来自实地调研，通过现场收集及企业可公开 数据获得。背景数据：化肥、电力、燃煤等数据来自相关统计年鉴及国家统计局、农业 部网站的公开数据。

## Use advice
When utilizing this data set for life cycle assessment purposes, users should take into account the specific context of livestock raising in Shandong province during the period 2014 to 2015. Consideration should be given to the methodological consistency with the study, such as adherence to the local feeding practices, meat-to-feed ratios, and the types of feed used. It is crucial to note that the emission factors and resource consumption are based on field research at specific sites in China and may not be directly applicable to other regions or time frames without appropriate adjustments. Background data such as for fertilizer, electricity, and coal usage should be sourced consistently with the national statistical yearbooks or official websites, ensuring up-to-date and region-specific information.

## Review details
Inventory: The internal review was done by several iteration steps concerning raw data validation, raw data documentation, representativity, completeness and consistency of modelling with regard to ISO 14040 and 14044.

## Data sources
- 周景月. 基于生命周期评价的畜禽养殖环境影响分析. (青岛科技大学, 2017).
