# Biochar ; Peanut shell biochar production; Peanut shell grinding and pyrolysis

Dataset: ILCD process, Unit process, black box
Geography: JS-CN
Reference year: 2024
Classification: Unit processes / Other Services / Repair and maintenance
Generated by: Yang Xintong, yangxt@caep.org.cn
Owner: Tiangong LCI Data Working Group
Review: Dependent internal review by Tiangong LCI Data Working Group
Amounts: no units in this file; such an amount is in the reference unit of its flow, which a separate flow dataset defines
copyright: false
licenseType: Free of charge for all users and uses

## General comment
Using peanut shells as raw materials, after grinding and pre-treatment, the goods are transported for 100 km to the pyrolysis unit for heat dissipation, ultimately generating biomass charcoal for PRB wall filling materials

## Time period
Publication time of literature

## Technical purpose
The biomass charcoal produced from peanut shells grinding and pyrolysis process is intended for use as filling material in Permeable Reactive Barrier (PRB) walls, which are implemented in groundwater remediation systems to remove contaminants.

## Reference product
- Biochar: 29360

## Inputs
- Peanut shell: 82208
- Electricity: 108655
- transport in t*km: 8219.7

## Use advice
When utilizing the LCA dataset for this biochar production process, consider the transportation distance of the raw material to the pyrolysis unit as an important parameter. Emissions during transportation must be accounted for. Additionally, ensure that end-of-life scenarios for the biochar, and potential credit from avoided emissions or fertilizer use due to its application in PRB walls, are properly modeled. The user should also verify that the dataset is up to date and consult the publication time for relevance to current technological standards.

## Review details
Inventory: The internal review was done by several iteration steps concerning raw data validation, raw data documentation, representativity, completeness and consistency of modelling with regard to ISO 14040 and 14044.

## Data sources
- Ding, D. et al. Assessing the environmental impacts and costs of biochar and monitored natural attenuation for groundwater heavily contaminated with volatile organic compounds. Science of The Total Environment 846, 157316 (2022).
