# cement production;cement, ordinary portland cement, 42.5MPa;new dry process rotary kiln, incineration of municipal waste;fly ash

Dataset: ILCD process, Unit process, black box
Geography: CN
Reference year: 2008
Classification: Materials production / Other mineralic materials
Generated by: Siqi Yang, ysqsophia@gmail.com
Owner: Tiangong LCI Data Working Group
Review: Dependent internal review by Tiangong LCI Data Working Group
Amounts: no units in this file; such an amount is in the reference unit of its flow, which a separate flow dataset defines
copyright: false
licenseType: Free of charge for all users and uses

## General comment
Laboratory data. Urban domestic waste produces cement as a secondary fuel.

## Technical purpose
This dataset represents an ordinary Portland cement production process using a new dry process rotary kiln and incorporating the incineration of municipal waste as a secondary fuel. The cement produced, with a 28-day compressive strength of 42.5MPa, is typically used in construction applications requiring high-strength concrete.

## Model description
The functional unit is the performance of 1kg cement with a 28-day compressive strength of 42.5MPa, that is, 1Fu=42.5kgMPa. The scope of evaluation is raw meal preparation, clinker calcination and cement preparation. The environmental load caused by the consumption of clay resources is not considered for the time being. Iron powder is an iron correction material, and its environmental impact will not be considered. The wastes considered to be emitted at the output end of the product system mainly include nitrogen oxides, sulfur dioxide, carbon dioxide and dust.

## Reference product
- cement, ordinary portland cement, 42.5MPa: 1000
  42.5 Ordinary silicate cement

## Inputs
- limestone, crushed, for mill: 1104.4
  Limestone
- gypsum stone (CaSO4-dihydrate): 58.7
  Gypsum
- ash: 362.4
  Fly ash
- hard coal: 70.731
  Standard coal. The original data is 0.065717kg standard coal, here converted to hard coal, the conversion formula is 1kg hard coal = 0.929kg standard coal.
- electricity, medium voltage: 343.8
  Electricity

## Outputs
- particles (> PM10): 0.324
  Dust, with an unspecified particle size, is treated as PM > 10 micrometers in diameter.
- sulfur dioxide: 0.3893
  Sulfur dioxide
- Nitrogen oxides: 1.557
- carbon dioxide: 747.22
  Carbon dioxide

## Data selection and combination
Combined with the analysis of my country's urban domestic waste industry and calorific value analysis, the input and output data of the determined product system were collected, and the data were calculated and quantified.

## Use advice
Users of this dataset should note that while the technological process accounts for the use of urban domestic waste as a secondary fuel, environmental burdens associated with the consumption of clay resources are currently excluded from the analysis. Additionally, the environmental impacts caused by the use of iron powder as an iron correction material are also excluded. Emission data at the output end of the product system include nitrogen oxides, sulfur dioxide, carbon dioxide, and dust. When applying this dataset, ensure that it aligns with the specific context of your LCA study and that the bounds of the evaluation scope match your system boundaries.

## Review details
Inventory: The internal review was done by several iteration steps concerning raw data validation, raw data documentation, representativity, completeness and consistency of modelling with regard to ISO 14040 and 14044.

## Data sources
- 于淼. (2008). 黑龙江水泥工业可持续发展研究 [硕士, 哈尔滨工业大学].
