# Aluminum electrolysis ; Liquid primary aluminum ; Prebaking ; Alumina for metallurgy ; 2007

Dataset: ILCD process, Unit process, single operation
Geography: CN
Reference year: 2021
Classification: Unit processes / Materials production / Metals and semimetals
Generated by: Zimeng Cai, caizm6178@163.com
Owner: Tiangong LCI Data Working Group
Review: Dependent internal review by Tiangong LCI Data Working Group
Amounts: no units in this file; such an amount is in the reference unit of its flow, which a separate flow dataset defines
copyright: false
licenseType: Free of charge for all users and uses

## General comment
The described process relates to the production of liquid primary aluminum by the prebaking method, using alumina specifically processed for metallurgical applications. This industrial process is generally applied in the production of aluminum for use in diverse sectors such as construction, transportation, electrical systems, and consumer goods manufacturing. The data from 2007 reflects the technological state of the industry at that time and might guide the choice of technology or process assessment in historical analyses or comparisons with newer technologies.

## Time period
Date of publication

## Reference product
- aluminium, primary, liquid: 1000; software or database

## Inputs
All rows: software or database
- Integrated AC power consumption: 50123.8
- aluminium oxide, metallurgical: 1929.63
- fluoride salt: 25.58
- anode, prebake, for aluminium electrolysis: 437.09
- Water, unspecified natural origin: 5.36

## Data selection and combination
The data in this study refers to the LCA data of PA, SA, electricity, and other background data. The PA data were obtained from statistical data sources, and the SA data were mainly obtained from the literatures. The background data were mainly derived from the Chinese localization LCA database CAS RCEES 2018, which was established by the Research Center for Eco-Environmental Sciences, Chinese Academy of Sciences and covers LCA data for energy, materials, transportation, waste management etc.

## Use advice
This LCA data set should be used with consideration of its technological and temporal relevance. Users must note that the data pertain to the prebaking electrolytic process for aluminum production in 2007 and may not reflect current technologies or environmental conditions. When applying this data set in broader environmental impact studies, users should account for any advances in technology and changes in emissions or energy efficiency that have occurred since 2007. Furthermore, researchers should ensure that the background LCA data from the CAS RCEES 2018 database is compatible with their study goals and that any significant differences in geographic, technological, or temporal scopes between the study and data source are appropriately addressed.

## Review details
Inventory: The internal review was done by several iteration steps concerning raw data validation, raw data documentation, representativity, completeness and consistency of modelling with regard to ISO 14040 and 14044.

## Data sources
- Ding, N., Liu, N., Lu, B. & Yang, J. Life cycle greenhouse gas emissions of aluminum based on regional industrial transfer in China. J. Ind. Ecol. 25, 1657–1672 (2021).
