# Equipment and Materials Arriving on Site ; Soil Risk Control ; Vertical Barrier ; Cement slurry barrier

Dataset: ILCD process, Unit process, single operation
Geography: US
Reference year: 2013
Classification: Unit processes / Other Services / Repair and maintenance
Generated by: Xiao Meng, xiaomeng@mail
Owner: Tiangong LCI Data Working Group
Review: Dependent internal review by Tiangong LCI Data Working Group
Amounts: no units in this file; such an amount is in the reference unit of its flow, which a separate flow dataset defines
copyright: false
licenseType: Free of charge for all users and uses

## General comment
Transport limestone, concrete, sand, and gypsum materials required for the construction of a cement grout vertical barrier to the site.

## Geography
For this project, a Superfund location at the Brookhaven National Laboratory (BNL) is studied. This particular case was chosen because it is representative of the scale and scenario where soil grouting would be used. It is also one of only a few sites where CS grouting has been used for full scale remediation. BNL has served as a production facility for research and development of radioisotopes for decades. The design of some of the facilities failed to provide adequate safety measures against the spread of radioactivity to the soils and groundwater beneath them and as a result, BNL was added to the Superfund National Priorities List in 1989.

## Technical purpose
The described industrial process involves the transportation of materials such as limestone, concrete, sand, and gypsum to the construction site to create a cement grout vertical barrier. This process is primarily used for soil risk control in environmental remediation projects, specifically at locations like the Superfund site at Brookhaven National Laboratory (BNL), where soil grouting is employed to prevent the spread of contaminants from historic activities.

## Reference product
- Equipment and Materials Arriving on Site: 37510; measured
  运输到场的相关材料（石灰石、混凝土、黏土和石膏）

## Inputs
- transport in t*km: 1139.31; software or database

## Use advice
When applying this dataset, users must consider the specific context of environmental remediation at a Superfund site. Attention should be given to the methodological adjustments required for accounting for the transport of materials and the construction of the vertical barriers, including the impacts of site-specific factors such as local regulations, transport distances, and emissions. Furthermore, it is crucial to integrate this data within a broader LCA framework considering the complete lifecycle of environmental remediation projects, from planning through to execution and long-term maintenance.

## Review details
Inventory: The internal review was done by several iteration steps concerning raw data validation, raw data documentation, representativity, completeness and consistency of modelling with regard to ISO 14040 and 14044.

## Data sources
- Gallagher, P. M., Spatari, S. & Cucura, J. Hybrid life cycle assessment comparison of colloidal silica and cement grouted soil barrier remediation technologies. Journal of Hazardous Materials 250–251, 421–430 (2013).
