# waste Polystyrene recycling; the recycled Polystyrene; mechanical recycling ; waste Polystyrene

Dataset: ILCD process, Unit process, black box
Geography: TJ-CN
Reference year: 2016
Valid until: 2016
Classification: Unit processes / End-of-life treatment / Material recycling
Functional unit: 1 ton of waste Polystyrene
Generated by: Xiaoyu Cheng, xiaoyucheng@email.ncu.edu.cn
Owner: Tiangong LCI Data Working Group
Review: Dependent internal review by Tiangong LCI Data Working Group
Amounts: no units in this file; such an amount is in the reference unit of its flow, which a separate flow dataset defines
copyright: false
licenseType: Free of charge for all users and uses

## General comment
After calibration, the respective process data in 2016 were selected to assess the environmental impacts of mechanical recycling of waste plastics.

## Geography
The ZEDA is located in southwest of Tianjin, which is the largest renewable resource processing industrial park in China.

## Time period
The literature only states that it was in 2016.

## Technical purpose
The recycled polystyrene described by this data set is intended for reintegration into the production cycle as a raw material substitute for virgin polystyrene. It is primarily used for manufacturing various plastic products where material quality allows, such as packaging materials, insulation, and household items.

## Reference product
- Polystyrene wastes: 1000; input; measured

## Inputs
- Water for industrial use: 340; measured
- Electricity: 944.568; measured
- natural gas; 44.1 MJ/kg: 40.1; measured

## Outputs
All rows: measured
- particles (>PM10): 0.45
- non-methane volatile organic compounds: 0.55
- Suspended solids, unspecified,Suspended solids, unspecified: 0.00821
- chemical oxygen demand: 0.08033
- biological oxygen demand: 0.0108
- Ammonia Nitrogen: 0.00489
- Phosphorus: 0.0004
- Oils, unspecified: 0.0003
- waste water - untreated: 227
- General Solid Waste: 77.9
- Hazardous Solid Waste: 3.02
- Recycled Polystyrene granules: 918.1

## Data selection and combination
In 2016, the recycled plastics production was 327 kilotons, covering all major categories of plastics.

## Data treatment and extrapolations
calibration

## Use advice
When using this data set, users should take into account the specific year of the data (2016) and the geographical location of the process (ZEDA in Tianjin, China). It is important to ensure the recycling process data relevance to the assessed product system and its geographical market. Methodological adjustments may be required for a different temporal or geographical context. Additionally, users must consider the inclusion of the end-of-life phase, particularly the potential environmental benefits linked to waste polystyrene mechanical recycling as opposed to disposal or incineration.

## Review details
Inventory: The internal review was done by several iteration steps concerning raw data validation, raw data documentation, representativity, completeness and consistency of modelling with regard to ISO 14040 and 14044.

## Data sources
- Chen, Y. et al. Life cycle assessment of end-of-life treatments of waste plastics in China. Resources, Conservation and Recycling 146, 348–357 (2019).
