# Dry sand Production;Sand and gravel coarse crushing;Jaw Crushing Technology

Dataset: ILCD process, Unit process, single operation
Geography: HAIN-CN
Reference year: 2020
Classification: Unit processes / Materials production / Other mineralic materials
Generated by: Cui hang, Cuihang0716@163.com
Owner: Tiangong LCI Data Working Group
Review: Dependent internal review by Tiangong LCI Data Working Group
Amounts: no units in this file; such an amount is in the reference unit of its flow, which a separate flow dataset defines
copyright: false
licenseType: Free of charge for all users and uses

## General comment
Primary crushing (jaw crushing) and screening

## Technology and included processes
The material is fed first, then crushed by jaw crusher, after crushing, it goes into vibrating screen for screening, and the crushed stone obtained goes into the finished product yard through conveyor belt. Other parts after screening are sent to cone crusher (secondary crushing) through conveyor belt

## Technical purpose
The jaw crushing technology described is employed for primary crushing in the dry sand production process. In this context, the process is primarily utilized for the production of sand and gravel aggregates that are used in construction and building materials. The aggregate produced by this process forms the foundational material for concrete, asphalt, and other construction-related applications.

## Reference product
- gravel: 41870; measured

## Inputs
- gravel: 51370; measured
- Electricity: 396; measured

## Outputs
- sand: 8373; measured
  Gravel produced after coarse crushing
- Sludge: 790; measured
- particles (> PM10),particles (> PM10): 4; measured

## Data selection and combination
The process and inventory data for dry sand are derived from empirical data provided by the project

## Use advice
When utilizing the provided process data, ensure accurate representation of the primary crushing and screening phases in LCA models. Take into account the efficiency of jaw crushers and possible variations in output sizes when including this data in inventory analysis. Consider the downstream use of the produced aggregates (i.e., transportation to construction sites, incorporation into building materials) and potential secondary crushing processes. The provided empirical data should be interpreted with consideration of the geographical and technological context from which it was derived to ensure relevance and accuracy.

## Review details
Inventory: The internal review was done by several iteration steps concerning raw data validation, raw data documentation, representativity, completeness and consistency of modelling with regard to ISO 14040 and 14044.

## Data sources
- 陵水海岛混凝土有限公司干法制砂项目
