# Milk production ; Dairy breeding ; Integrated maize silage planting and dairy cow breeding system (IPBS)

Dataset: ILCD process, Unit process, single operation
Geography: QD-SD-CN
Reference year: 2016
Classification: Unit processes / Materials production / Agricultural production means
Functional unit: The 1t FPCM corrected for protein and fat content was selected as the evaluation unit
Generated by: Rui Yang, 1632707028@qq.com
Owner: Tiangong LCI Data Working Group
Review: Dependent internal review by Tiangong LCI Data Working Group
Amounts: no units in this file; such an amount is in the reference unit of its flow, which a separate flow dataset defines
copyright: false
licenseType: Free of charge for all users and uses

## General comment
In IPBS, part of the silage corn feed in the farms came from self-production, and the self-sufficiency rate of silage corn in 3 farms was 100%. In addition to silage rice, the feeding process of the two models is the same. The main inputs of production materials include feed, water, electricity, diesel, etc., and the products include milk, male calves, eliminated cows, beef cattle, etc. (Table 4). Specifically, dairy cattle feed mainly consists of concentrated feed (containing 30% soybean meal, 50% corn kernels, 10% wheat bran and 10% other substances), corn kernels, wheat bran, silage corn, cottonseed, oats, alfalfa and leveus chinensis. Some dairy farms also use wine grains and rapeseed meal, but the overall environmental impact can be ignored. The low amount of other substances in concentrated feed has negligible impact on the overall environment. Greenhouse gas emissions in dairy farming include emissions from the production of imported feed, emissions from farm energy consumption (e.g. on-farm feed processing, barn lighting and ventilation, water heating, milk refrigeration, etc.), intestinal gas emissions from dairy cows and barn gas emissions.

## Geography
A questionnaire survey was conducted on dairy farms in Qingdao, Shandong Province from July to August 2020.

## Time period
From 2016, Shandong began to implement the silage corn planting subsidy policy, is one of the earliest provinces to implement the subsidy policy, the subsidy standard is 20~50 yuan /t. In 2019, Shandong Province silage corn planting area reached 14,100 hm2, accounting for 7.3% of the country.

## Technology and included processes
In the study area, there are mainly two milk production modes :IPBS and non-IPBS. In non-IPBS, the farms only have feeding links and manure treatment links, all the feed is purchased, and the manure pile fertilizer is made into organic fertilizer and sold to fruit and vegetable farmers. In IPBS, the silage corn planting process is increased in the farm, organic fertilizer and liquid fertilizer are mainly applied to the farm field, and the remaining part is sold to fruit farmers and vegetable farmers, etc. The differences between the two models are as follows :1) the sources of silage corn in the farm are different, resulting in different feed transportation distances and feed costs; 2) The use of organic fertilizer and liquid fertilizer is different, and the transportation distance is different. A total of 109 dairy farms were investigated in this study, and 83 valid questionnaires were obtained after excluding non-conforming questionnaires, among which 38 were non-IPBS and 45 were IPBS.

## Technical purpose
The Integrated Planting and Breeding System (IPBS) for dairy farming is intended for the production of dairy products such as milk and beef. In this system, maize silage, which is part of the cattle feed, is produced on-farm to achieve self-sufficiency and reduce reliance on external feed sources. The efficient recycling of nutrients through on-farm feed production coupled with dairy farming is intended to serve as a sustainable model for agriculture, enhancing local food systems and potentially reducing the environmental impact of dairy production.

## Reference product
- milk: 1000; measured
  FPCM (IPBS mode)

## Inputs
All rows: measured
- cow: 0.1111
  Lactating cows (IPBS mode)
- cow: 0.025
  Dry lactating cows (IPBS mode)
- cow: 0.072
  Breeding cattle (IPBS model)
- cow: 0.032
  Calf (IPBS mode)
- feed: 228
  Concentrated feed (IPBS mode)
- maize grain: 111
  Corn kernels (IPBS mode)
- bean pulp: 51
  Soybean meal (IPBS model)
- wheat bran: 43
  Wheat bran (IPBS mode)
- maize grain: 682
  Purchased silage corn (IPBS model)
- maize grain: 318
  Self-produced silage corn (IPBS model)
- alfalfa: 108
  Alfalfa (IPBS model)
- oat: 115
  Oats (IPBS mode)
- chinese wildrye: 290
  Leymus chinensis (IPBS mode)
- cottonseed: 38
  Cottonseed (IPBS mode)
- Electricity: 397.595
  IPBS mode
- Diesel: 0.002183
  IPBS mode
- water: 10.2
  IPBS mode
- unspecified: 13.975
  Land occupation (IPBS model)

## Outputs
- cow: 0.798; measured
  Selling male calves (IPBS model)
- cow: 11.445; measured
  Sale of Culled Cows (IPBS Model)
- beef: 2.209; measured
  Selling beef cattle (IPBS model)

## Use advice
When utilizing this dataset for Life Cycle Assessment (LCA), it is important to ensure that all inputs such as feed, water, electricity, diesel, and outputs such as milk, male calves, culled cows, and beef cattle are accurately quantified. Emissions should be accounted for, including those from the production of feed (both on-farm and imported), on-farm energy consumption, and direct emissions from the dairy cows. Users should adopt the Functional Unit of 1 tonne of Fat and Protein Corrected Milk (FPCM) for comparing different dairy farming systems or scenarios. It is advised to consider the impact of regional policies such as silage corn planting subsidies on the economic and environmental aspects of dairy farming.

## Review details
Inventory: The internal review was done by several iteration steps concerning raw data validation, raw data documentation, representativity, completeness and consistency of modelling with regard to ISO 14040 and 14044.

## Data sources
- 黄显雷, 师博扬, 张英楠, 龙昭宇, & 尹昌斌. 基于生命周期视角的种养一体化奶牛场环境经济效益评估. 中国环境科学 41, 3944–3955 (2021).
