# cement production;cement, portland cement;new suspension preheater kiln

Dataset: ILCD process, Unit process, single operation
Geography: CN
Classification: Unit processes / Materials production / Other mineralic materials
Generated by: #REF!, ysqsophia@gmail.com
Owner: Tiangong LCI Data Working Group
Review: Dependent internal review by Tiangong LCI Data Working Group
Amounts: no units in this file; such an amount is in the reference unit of its flow, which a separate flow dataset defines
copyright: false
licenseType: Free of charge for all users and uses

## General comment
In the cement-milling phase for the new suspension preheater (NSP) kiln, clinker, gypsum, and other mixed materials are milled together into particles of a certain size, and the final product as cement is formed. In contrast with the shaft kiln, the clinker in the NSP kiln stems mainly from the “continuous baking and grinding” phase (100 tons/h), with only a very small part originating from the clinker storage of the previous production phase (2 tons/h). The total clinker thus amounts to 102 tons/h. The input in the NSP kiln contains no water.The NSP kiln is a production system of high efficiency, good production continuity, high output, and low overall energy consumption. In addition, with better dust collection and noise elimination equipment, the production system of the NSP kiln can greatly reduce the consumption of resources and pollutant emissions.

## Technology and included processes
Compared with the shaft kiln, the NSP kiln is a production system of high efficiency, good production continuity, high output, and low overall energy consumption. In addition, with better dust collection and noise elimination equipment, the production system of the NSP kiln can greatly reduce the consumption of resources and pollutant emissions.In the cement-milling phase for the NSP kiln, clinker, gypsum, and other mixed materials are milled together into particles of a certain size, and the final product as cement is formed. In contrast with the shaft kiln, the clinker in the NSP kiln stems mainly from the “continuous baking and grinding” phase (100 tons/h), with only a very small part originating from the clinker storage of the previous production phase (2 tons/h). The total clinker thus amounts to 102 tons/h. Another difference between the shaft kiln and the NSP kiln is that the input in the NSP kiln contains no water.

## Technical purpose
The NSP kiln's cement production process is designed for the manufacturing of Portland cement, a commonly used binder in various types of construction. The high-efficiency milling phase where clinker, gypsum, and other materials are ground is specifically employed for the production of high-quality cement, suitable for construction projects that require reliable and durable cement.

## Model description
The system boundary is the grinding stage where cement is produced.

## Reference product
- cement, common portland cement: 1000
  Cement

## Inputs
- clinker: 850.78
  Cement clinker
- mixed materials, mineral: 100.092
  Mixed materials
- gypsum stone (CaSO4-dihydrate): 50.046
  Gypsum

## Outputs
- particles (> PM10): 1.001
  Dust. The particle size is not specified. Here we treat it as PM>10.

## Use advice
When utilizing this LCA data set for the NSP kiln's cement production process, consider the efficient and continuous nature of the system, as well as its high output and low energy consumption. Special attention should be given to the advanced dust collection and noise reduction technologies implemented, which contribute to the reduction of resource consumption and emissions. Users must account for these factors when comparing this process with less efficient alternatives, such as the shaft kiln. The data set specifically pertains to the milling phase, and users should ensure that the system boundary is properly defined and maintained in their assessments.

## Review details
Inventory: The internal review was done by several iteration steps concerning raw data validation, raw data documentation, representativity, completeness and consistency of modelling with regard to ISO 14040 and 14044.

## Data sources
- Dan Hu, Zhen Guo, Zhen Wang, & Qiang Xiao. (2015). Metabolism analysis and eco-environmental impact assessment of two typical cement production systems in Chinese enterprises. Ecological Informatics 26, 70–77.
