# Plexiglass ;PMMA: Polymethyl Methacrylate (also known as Acrylic or Plexiglass) ; dry crushing

Dataset: ILCD process, Unit process, single operation
Geography: JX-CN
Classification: Materials production / Glass and ceramics
Generated by: He xiaxia, 18616148319@163.com
Owner: Tiangong LCI Data Working Group
Review: Dependent internal review by Tiangong LCI Data Working Group
Amounts: no units in this file; such an amount is in the reference unit of its flow, which a separate flow dataset defines
copyright: false
licenseType: Free of charge for all users and uses

## General comment
The dataset represents the production of PMMA (Polymethyl Methacrylate), commonly known as acrylic or acrylic glass, which includes the dry crushing process. PMMA is widely used in applications requiring transparency and durability, such as in automotive windows, aquariums, architectural features, and protective barriers.

## Reference product
- polymethyl methacrylate (PMMA) beads: 1098.25; measured

## Inputs
- Electricity: 349.92; measured
- polymethyl methacrylate (PMMA) beads: 1043.73; measured
- Water (fresh water): 21.9735; measured
- organic waste (unspecified): 32.96; measured

## Outputs
- Dust (unspecified, from stack): 0.412; measured

## Use advice
When utilizing this dataset for life cycle assessment studies, users should consider the specific regional context of the production process, the efficiency of the dry crushing method, and energy consumption. It is important to account for potential emissions during the production phase and to verify that the PMMA quality matches the intended application. Users should be aware that the end-of-life phase may include potential recycling or waste treatment scenarios, which must be modeled separately according to localized environmental management policies.

## Review details
Inventory: The internal review was done by several iteration steps concerning raw data validation, raw data documentation, representativity, completeness and consistency of modelling with regard to ISO 14040 and 14044.

## Data sources
- 江西旺达新材料有限公司年产20000吨有机玻璃原料生产项目
