# Remediated soil ; Soil remediation ; In situ solidification and stabilization ; Cement as a solidifying agent

Dataset: ILCD process, Unit process, single operation
Geography: GB
Reference year: 2006
Classification: Unit processes / Other Services / Repair and maintenance
Functional unit: The functional unit employed in this study was the amount of soil remediated.
Generated by: Yang Xintong, yangxt@caep.org.cn
Owner: Tiangong LCI Data Working Group
Review: Dependent internal review by Tiangong LCI Data Working Group
Amounts: no units in this file; such an amount is in the reference unit of its flow, which a separate flow dataset defines
copyright: false
licenseType: Free of charge for all users and uses

## General comment
Cement and concrete are used to achieve soil solidification and stabilization, and the remediation result is that the concentration of pollutants in groundwater meets the standard.

## Geography
The case study site is a former industrial site adjacent to a river in a mixed industrial/commercial/residential area in England, and which has been developed for housing.

## Time period
Publication time of literature

## Technology and included processes
The addition ratios are: Cement: bentonite -2.5:1, water: dry grout -3.8:1, soil: grout -3.5:1

## Technical purpose
The remediated soil data set represents the application of in situ solidification and stabilization techniques using cement as a solidifying agent, aiming to reduce the concentration of pollutants in groundwater to acceptable levels. This process is typically utilized in areas where soil contamination poses a significant risk to the environment and public health, such as in former industrial sites undergoing redevelopment for residential use.

## Reference product
- Remediated soil: 4400; measured
  Assumed bulk density of 1.6 t/m3.

## Inputs
All rows: measured
- contaminated soil: 4400
  Assumed bulk density of 1.6 t/m3.
- Concrete: 1.43673e6
  soil:grout—3.5:1, and so the mass of grout is 7040/3.5=2011.43 ton; Cement : bentonite—2.5:1, and so the mass of cement is 1436.73 ton, and the mass of bentonite is 574.69 ton
- bentonite: 574690
  (same comment as for Concrete)
- transport in t*km: 50573.1
  Distance from bentonite supply is 88 km
- transport in t*km: 34481.6
  Distance from cement supply is 24 km
- Tap Water: 7.64343e6
  soil:grout—3.5:1, and so the mass of grout is 7040/3.5=2011.43 ton; water:dry grout—3.8:1

## Use advice
When utilizing this data set, users should note that the functional unit is the amount of soil remediated. It's important to consider the specific addition ratios of Cement:bentonite, water:dry grout, and soil:grout provided in the data for accurate reproduction of the process. The use of additives to improve sorption is acknowledged but not included in the study's scope, focusing only on material consumption and transportation. The use of mechanical equipment is mentioned, but users should incorporate the operation time into their assessment independently as it's not provided in the data set. This data set is applicable for life cycle assessment of soil remediation processes and should be used in conjunction with additional LCA data sets to evaluate overall environmental impacts.

## Review details
Inventory: The internal review was done by several iteration steps concerning raw data validation, raw data documentation, representativity, completeness and consistency of modelling with regard to ISO 14040 and 14044.

## Data sources
- Harbottle, M. et al. A comparison of the technical sustainability of in situ stabilisation solidification with disposal to landfill. Journal of Hazardous Materials 141 (2007) 430–440
