# Aluminum cable production ; Aluminum cable ; Aluminum strip

Dataset: ILCD process, Unit process, single operation
Geography: CN
Reference year: 2017
Classification: Unit processes / Materials production / Metals and semimetals
Generated by: Changqing Xu, xcq@bit.edu.cn
Owner: Tiangong LCI Data Working Group
Review: Dependent internal review by Tiangong LCI Data Working Group
Amounts: no units in this file; such an amount is in the reference unit of its flow, which a separate flow dataset defines
copyright: false
licenseType: Free of charge for all users and uses

## General comment
The aluminum cable produced in this process is intended for use in various electrical infrastructure applications, such as power transmission and distribution systems. The high conductivity and lightweight nature of aluminum make it suitable for overhead power lines, residential wiring, and possibly for connections in electrical devices.

## Time period
Date of publication

## Reference product
- Aluminium Cable: 1000; measured
  aluminium cable-无条目

## Inputs
All rows: measured
- electricity, high voltage, aluminium industry: 6300
- cladding, crossbar-pole, aluminium: 1994.9
  aluminium pole
- Silane Cross-linked Polyethylene: 362
  Silane XLPE-无条目 flow可能有点问题
- textile, nonwoven polyester: 16.5
  non-woven fabric-无条目
- Aluminium strip: 591.4
  Aluminium strip-无条目
- polyvinylchloride, bulk polymerised: 896
  PVC sheath material
- natural gas, high pressure: 175
- freshwater: 3500
  river water
- transport, freight, lorry 7.5-16 metric ton, EURO4: 600000
  文中是Transportation distance

## Use advice
When using the LCA data for the aluminum cable production process, ensure to factor in regional electricity mix if assessing the environmental impact of the production phase. Consider the use phase efficiency and end-of-life recycling rates specific to aluminum cables. This data set is representative of the technology available at the date of publication and may not reflect the latest advancements or efficiency improvements in the aluminum cable manufacturing industry.

## Review details
Inventory: The internal review was done by several iteration steps concerning raw data validation, raw data documentation, representativity, completeness and consistency of modelling with regard to ISO 14040 and 14044.

## Data sources
- Bao, W. et al. Comparative study on life cycle environmental impact assessment of copper and aluminium cables. in IOP Conf. Ser. Earth Environ. Sci. vol. 94 (2017)
