# open-pit coal mining | coal mining

Dataset: ILCD process, Unit process, black box
Geography: CN
Reference year: 2005
Classification: Materials production / Other mineralic materials
Generated by: Linlin Yin, yinlinlin0623@163.com
Review: Dependent internal review by Tiangong LCI Data Working Group
Amounts: no units in this file; such an amount is in the reference unit of its flow, which a separate flow dataset defines

## Geography
There is no gas disaster and no measured data of methane emission in open-pit coal mine. Considering that the mining depth of this kind of coal mine is small and the gas content of coal seam is low, when estimating the methane emission coefficient, it is taken as half of the methane emission coefficient of the low gas mine in the state-owned key coal mine.

## Technology and included processes
There is no gas disaster in open-pit coal mine. When estimating the methane emission coefficient, it is taken as half of the methane emission coefficient of low gas mine in state-owned key coal mine.

## Outputs
- methane (fossil): 0.00159; uniform; article inperiodical
  排放因子,1994年估测露天煤矿甲烷排放系数,取为全国国有重点煤矿低瓦斯矿井甲烷排放系数的二分之一,即每开采1kg的煤炭释放的甲烷体积—甲烷排放因子。
- methane (fossil): 0.00165; uniform; article inperiodical
  排放因子,2000年估测露天煤矿甲烷排放系数,取为全国国有重点煤矿低瓦斯矿井甲烷排放系数的二分之一,即每开采1kg的煤炭释放的甲烷体积—甲烷排放因子。

## Review details
Inventory: The internal review was done by several iteration steps concerning raw data validation, raw data documentation, representativity, completeness and consistency of modelling with regard to ISO 14040 and 14044.; Documentation: The review of the documentation was performed by Ecobilan and is in compliance with ISO 14040 and 14044. The data set documentation is correct in view of the appropriateness of the information provided. It includes all relevant information in view of data quality and scope of application of the respective LCI result.
