# Remediated soil ; Ex-situ soil remediation ; Biopile ; Remediatied soil off-site landfill ; Off-site clean soil backfilling

Dataset: ILCD process, Unit process, black box
Geography: CA
Reference year: 2014
Classification: Unit processes / Other Services / Repair and maintenance
Functional unit: Defining the functional unit as “the treatment of 112 m3 of soil contaminated with diesel to an acceptable risk level over the short term” .
Generated by: Yang Xintong, yangxt@caep.org.cn
Owner: Tiangong LCI Data Working Group
Review: Dependent internal review by Tiangong LCI Data Working Group
Amounts: no units in this file; such an amount is in the reference unit of its flow, which a separate flow dataset defines
copyright: false
licenseType: Free of charge for all users and uses

## General comment
The contaminated soil is treated by ex-situ bioremediation (biopile) in the temporary facility on site. The contaminated soil was excavated with a backhoe. Backfilling was done with mine waste material transported by barge to Hopedale in 1-m3 bags. The contaminated soil was transported by dump truck to the treatment facility. Construction of the treatment facility included qualified supervisory staff travelling from Kingston, ON, the preparation of a containment area with a 0.76-mm high-density polyethylene (HDPE) liner, and soil heaping. The biopile was passively aerated with polyvinyl chloride (PVC) and perforated HDPE pipes that protruded from the soil. Granular fertilizers (urea and diammonium phosphate) were mixed into the soil. Treatment consisted of periodic visits by local staff to manage the leachate that was redistributed over the pile or filtered before it was released to the environment. Monitoring consisted of a visit by a qualified supervisor from Kingston at the end of treatment for sampling. The treated soil was disposed of and spread in the Hopedale unlined landfill. At the end of the facility’s life cycle, materials were disposed of in the landfill.

## Geography
Soil contaminated with diesel fuel was identified in a residential/commercial area of Hopedale, NL, Canada.

## Time period
Publication time of literature

## Technical purpose
The described industrial process applies to environmental remediation, specifically employing ex-situ bioremediation techniques such as biopile treatment to rehabilitate soil contaminated with diesel fuel. The process involves the excavation, treatment, and off-site disposal of the treated soil and the use of backfilling with mine waste materials. This process is relevant for residential and commercial areas requiring clean-up operations to reduce contamination to acceptable risk levels over the short term.

## Reference product
- Remediated soil: 112; missing unimportant

## Inputs
All rows: missing unimportant
- Diammonium phosphate: 13.6
- Polyethylene,Polyethylene: 153
- Lumber for construction: 20.8
- polyvinylchloride resin (S-PVC): 24
- sand: 2790
- Urea: 40
- transport in t*km: 84
- Road Transport,Road Transport: 11200, 85000, 590 (3 entries)
- Diesel,Diesel: 0.833333
  Operation backhoe, diesel
- Diesel,Diesel: 0.708333
  Operation forklift, diesel
- contaminated soil: 112

## Use advice
When utilizing this data set, users should take into account the site-specific nature of soil remediation. The data includes construction and operation of the treatment facility without consideration of personnel travel, which is deemed site-specific and therefore excluded. Users should ensure methodological congruence with their case-specific parameters, particularly when considering the transportation of contaminated materials, the presence of a qualified supervisory staff, the type of aeration system used for the biopile, the type of liners and fertilizers involved, and the end-of-life disposal method for materials. If applying this data to other location-specific cases, the user must adjust for local conditions, regulatory requirements, and transportation distances.

## Review details
Inventory: The internal review was done by several iteration steps concerning raw data validation, raw data documentation, representativity, completeness and consistency of modelling with regard to ISO 14040 and 14044.

## Data sources
- Sanscartier D ,Margni M ,Reimer K , et al. Comparison of the Secondary Environmental Impacts of Three Remediation Alternatives for a Diesel-contaminated Site in Northern Canada [J]. Soil and Sediment Contamination: An International Journal, 2010, 19 (3): 338-355.
