# Converter steelmaking ; pig iron ; crude steel

Dataset: ILCD process, Unit process, single operation
Geography: HUN-CN
Reference year: 2013
Classification: Unit processes / Materials production / Metals and semimetals
Generated by: Wanghuanyu, wanghuanyu00@126.com
Owner: Tiangong LCI Data Working Group
Review: Dependent internal review by Tiangong LCI Data Working Group
Amounts: no units in this file; such an amount is in the reference unit of its flow, which a separate flow dataset defines
copyright: false
licenseType: Free of charge for all users and uses

## General comment
The converter steelmaking process is utilized for the production of crude steel from pig iron. This industrial process is typically used in the metallurgy sector, especially within integrated steel plants that convert the raw material into steel as a basis for various products like construction materials, automobiles, and appliances.

## Geography
湖南华菱湘潭钢铁有限公司

## Reference product
- Crude Steel: 1000; measured
  crude steel

## Inputs
- Molten Iron: 950; measured
  pig iron

## Outputs
- BF Slag: 280; measured
  blast furnace slag
- Steel slag: 80; measured
  steel slag

## Use advice
When utilizing this data set for LCA, ensure to account for all inputs and outputs associated with the converter steelmaking process, including energy consumption, emissions to air and water, and solid waste generation. Consideration should be given to the technological applicability, ensuring the process data corresponds to the technology and efficiency levels of the referenced facility, Huaxi Iron & Steel Co., Ltd. located in Xiangtan, Hunan. Additionally, users should regard the potential for recycling of by-products and the necessity for end-of-life treatment of the steel produced.

## Review details
Inventory: The internal review was done by several iteration steps concerning raw data validation, raw data documentation, representativity, completeness and consistency of modelling with regard to ISO 14040 and 14044.

## Data sources
- 1.
