# Plexiglass ; PMMA: Polymethyl Methacrylate (also known as Acrylic or Plexiglass) ; sorting process

Dataset: ILCD process, Unit process, single operation
Geography: JX-CN
Classification: Unit processes / Materials production / Glass and ceramics
Generated by: He xiaxia, 18616148319@163.com
Owner: Tiangong LCI Data Working Group
Review: Dependent internal review by Tiangong LCI Data Working Group
Amounts: no units in this file; such an amount is in the reference unit of its flow, which a separate flow dataset defines
copyright: false
licenseType: Free of charge for all users and uses

## General comment
The data set describes the process of glass production which includes the manufacture of Polymethyl methacrylate (PMMA) monomers, used extensively as a shatter-resistant alternative to glass. The process encompasses the sorting operation, which is critical to ensuring the purity and quality of the PMMA produced. This PMMA is commonly utilized in applications such as construction materials, automotive parts, and optical devices due to its clarity, strength, and resistance to impact.

## Reference product
- polymethyl methacrylate (PMMA) beads: 1043.73; measured

## Inputs
- polymethyl methacrylate (PMMA) beads: 1109.76; measured

## Outputs
- freshwater: 21.9735; measured
- organic waste (unspecified): 32.96; measured
- Waste (unspecified): 11.0975; measured

## Use advice
Users should note that the data set specifically pertains to the production of PMMA monomers including a manual sorting process, which may not be representative of all glass production methods. When using these data in a Life Cycle Assessment, users must consider the methodological compatibility, especially if comparing with datasets for other types of glass or if recycling processes are considered. Exclusion or inclusion of subsequent stages, such as polymerization and end-of-life treatment, must be clearly defined in the scope of the study.

## Review details
Inventory: The internal review was done by several iteration steps concerning raw data validation, raw data documentation, representativity, completeness and consistency of modelling with regard to ISO 14040 and 14044.

## Data sources
- 江西旺达新材料有限公司年产20000吨有机玻璃原料生产项目
