# Northwest (Fuping) Wheat-Corn Production ; Corn Cultivation

Dataset: ILCD process, Unit process, single operation
Geography: WN-SAX-CN
Reference year: 2013
Valid until: 2013
Classification: Unit processes / Materials production / Food and renewable raw materials
Functional unit: 1t
LCI method principle: Attributional
LCI method approaches: Consequential
Generated by: Haoran Zhang, hrzhang@whu.edu.cn
Owner: Tiangong LCI Data Working Group
Review: Dependent internal review by Tiangong LCI Data Working Group
Amounts: no units in this file; such an amount is in the reference unit of its flow, which a separate flow dataset defines
copyright: false
licenseType: Free of charge for all users and uses

## General comment
The life cycle of winter wheats-summer maize rotation system mainly includes three stages: raw material mining and transportation, agricultural materials production and transportation, and crop planting, including coal, oil, natural gas, electricity and other raw materials mining and production, land resource utilization, fertilizer, pesticide and other agricultural materials production related energy consumption and pollutant emission. Including CO2, NH3, SO2, CH4, N2O and CO [11]. The environmental impact of plant equipment, construction facilities, production of transport tools and transportation of raw materials associated with the system is not considered.

## Geography
fuping

## Technology and included processes
The research on the resource utilization and environmental emission of winter wheat-summer maize rotation system from raw material extraction, processing and transportation to agricultural materials production and crop planting process is to provide decision-making basis for the production and environmental management of the whole process of winter wheat-summer maize rotation system. The life cycle assessment of agricultural products starts from the mining of ore and energy and ends in the output of crop planting, including the output of agricultural products and pollutants. Land resources are the basis of all production activities and directly enter the agricultural system. In this study, 1 t of crops were evaluated as functional units

## Technical purpose
The data set pertains to the lifecycle of winter wheat and summer maize rotation farming practices in the region of Fuping, Northwest China. It is specifically used for assessing the environmental impact of raw material extraction, production, and transportation of agricultural inputs, as well as the cultivation process itself. This data can be utilized in environmental studies, agricultural policies, and sustainability assessments to understand crop production impacts in this region.

## Reference product
- maize grain: 1000; measured

## Inputs
- arable: 1347.54; measured
- water: 3554.6; measured
- Electricity: 40843.9; measured
- Corn Seeds: 4.15; measured

## Outputs
All rows: measured
- carbon monoxide (fossil): 0.54703
- Nitrogen oxides: 5.89658
- sulfide: 2.91361
- carbon dioxide (fossil),carbon dioxide (fossil): 1226.66
- methane (fossil),methane (fossil): 0.03153
- nitrous oxide: 0.55842
- ammonium: 8.02
- phosphorus, total: 0.00933
- phosphoric acid: 0.04043
- sodium nitrate: 1.69838
- Insecticide: 0.05272
- heavy metals (unspecified): 0.01525

## Deviations from the LCI method approaches
The lifecycle evaluation of agricultural products starts from mining of ores and energy, terminated by the output of crops, including the output of agricultural products and pollutants. Land resources are the basis of all production activities and directly enter the agricultural production system."

## Data selection and combination
The data for the study mainly comes from field surveys conducted from August to September 2013, randomly surveying 30 farmers each in Fuping and Yangling, regarding the planting of winter wheat and summer corn.

## Data treatment and extrapolations
Impact assessment consists of four steps: impact categorization, characterization, normalization, and weighted assessment.

## Use advice
When using this data set for life cycle assessment, it is crucial to note that the environmental impacts related to infrastructure production for farming facilities, the equipments, and transportation of raw materials used in these processes are not included in the study. Data users should take care not to double-count emissions and should ensure that the boundaries of their environmental impact assessment are compatible with this limitation. This data should be used in conjunction with regional agricultural production practices and may require calibration for use in other geographical contexts.

## Review details
Inventory: The internal review was done by several iteration steps concerning raw data validation, raw data documentation, representativity, completeness and consistency of modelling with regard to ISO 14040 and 14044.

## Data sources
- 彭小瑜, 吴喜慧, 吴发启, 等. 陕西关中地区冬小麦-夏玉米轮作系统生命周期评价[J].农业环境科学学报, 2015, 34(4).
