# Injection well ; Construction well ; Well depth 20m, Di=46 mm ;In situ groundwater remediation;PRB system

Dataset: ILCD process, Unit process, single operation
Geography: JS-CN
Reference year: 2024
Classification: Unit processes / Other Services / Repair and maintenance
Generated by: Yang Xintong, yangxt@caep.org.cn
Owner: Tiangong LCI Data Working Group
Review: Dependent internal review by Tiangong LCI Data Working Group
Amounts: no units in this file; such an amount is in the reference unit of its flow, which a separate flow dataset defines
copyright: false
licenseType: Free of charge for all users and uses

## General comment
A new BC suspension injection well will be built for the permeable reaction wall used to pollute groundwater. The drilling diameter is 0.22 meters, the outer diameter of the well tube is 0.053 meters, the inner diameter of the well tube is 0.046 meters, the well depth is 24 meters, the screen tube length is 20 meters, and the bentonite filling thickness is 4 meters

## Time period
Publication time of literature

## Technical purpose
The described industrial process outlines the construction and operation of a new well dedicated to the injection of BC (biological carbon) suspension as part of a Permeable Reactive Barrier (PRB) system for in situ remediation of polluted groundwater. The well, with a specified depth of 24 meters and diameters for both drilling and well tubing, is constructed specifically for the permeation and reactivity needed to treat contaminated aquifers through the PRB system.

## Reference product
- injection well: 48; measured

## Inputs
All rows: measured
- Polyvinyl chloride: 915.92
- bentonite: 10310
- Polyethylene,Polyethylene: 598.8
- silica sand: 51560
- Steel: 240
- Diesel,Diesel: 0.18432
- transport in t*km: 6827.47

## Use advice
Users of this data set should ensure that the specific dimensions and specifications of the well are appropriately incorporated into their environmental impact models, particularly when assessing the performance and impact of the PRB system on groundwater remediation. Consideration should be given to the local geological conditions, the specific contaminants in the groundwater, and the overall design and efficacy of the PRB system. Methodological attention should be paid to the lifecycle of the well, including maintenance and potential decommissioning, when calculating long-term environmental effects.

## Review details
Inventory: The internal review was done by several iteration steps concerning raw data validation, raw data documentation, representativity, completeness and consistency of modelling with regard to ISO 14040 and 14044.

## Data sources
- Ding, D. et al. Assessing the environmental impacts and costs of biochar and monitored natural attenuation for groundwater heavily contaminated with volatile organic compounds. Science of The Total Environment 846, 157316 (2022).
