# Post-treatment ; Electroplated products (except electronic components, circuit boards) ; Sulfuric acid, nitric acid, others ; Stripping (rack plating) ; All sizes; NESPS2 / 后处理 ; 电镀产品（电子元器件、线路板除外） ; 硫酸、硝酸、其他 ; 退镀（挂镀） ; 所有规模 ; 全国第二次污染普查数据

Dataset: ILCD process, Unit process, single operation
Geography: CN
Reference year: 2019
Classification: Reference Parameters / End-of-life treatment / Other end-of-life services
Generated by: The data was created by the Office of the Second National Pollution Source Census of the Ministry of Ecology and Environment, and the data was organized by the TianGong Plan team for ILCD format / 生态环境部第二次全国污染源普查工作办公室创建数据，天工计划团队常慧敏整理数据为ILCD格式
Owner: Tiangong LCI Data Working Group / 天工LCI数据工作小组
Review: Dependent internal review by Tiangong LCI Data Working Group / 天工LCI数据工作小组
Amounts: no units in this file; such an amount is in the reference unit of its flow, which a separate flow dataset defines
copyright: false
licenseType: Free of charge for all users and uses

## General comment
the Technical of end-of-pipe management technology for pollution Exhaust gasis/

## Technical purpose
所描述的工业过程用于后处理电镀产品（电子元器件、线路板除外）。该处理使用硫酸和硝酸进行所有规模的挂镀应用的退镀。这个过程适合于需要进行后处理以去除多余镀层和提高产品质量的金属表面处理产业。

## Reference product
- Plating: 1; calculated
  源文件中描述为为电镀产品（电子元器件、线路板除外），此处对其进行了匹配工作，将其匹配到LCAflow库里面相最符合的流，污染物指标备注为工业废水量

## Outputs
All rows: calculated
- phosphorus, total: 2e-7, 8e-7 (2 entries)
  the Technical of end-of-pipe management technology for pollution phosphorus, totalisChemical coagulation + biological treatment，Its Technical efficiency of end-of-pipe management98
  污染物指标总磷的末端治理技术是化学混凝+生物法，其效率为98，末端治理设施实际运行率（k值）计算公式为k=废水治理设施运行时间（小时/年）/正常生产时间（小时/年）。原文件中描述污染物类别为废水，污染物指标为总磷，此处对其进行了匹配工作，将其匹配到LCAflow库里面相最符合的流，污染物指标备注为总磷
- phosphorus, total: 4e-7, 1.6e-6 (2 entries)
  the Technical of end-of-pipe management technology for pollution phosphorus, totalisChemical coagulation，Its Technical efficiency of end-of-pipe management96
  污染物指标总磷的末端治理技术是化学混凝法，其效率为96，末端治理设施实际运行率（k值）计算公式为k=废水治理设施运行时间（小时/年）/正常生产时间（小时/年）。原文件中描述污染物类别为废水，污染物指标为总磷，此处对其进行了匹配工作，将其匹配到LCAflow库里面相最符合的流，污染物指标备注为总磷
- Nitrogen, organic bound: 1.54e-6
  the Technical of end-of-pipe management technology for pollution Nitrogen, organic boundisChemical coagulation + biological treatment，Its Technical efficiency of end-of-pipe management93
  污染物指标总氮的末端治理技术是化学混凝+生物法，其效率为93，末端治理设施实际运行率（k值）计算公式为k=废水治理设施运行时间（小时/年）/正常生产时间（小时/年）。原文件中描述污染物类别为废水，污染物指标为总氮，此处对其进行了匹配工作，将其匹配到LCAflow库里面相最符合的流，污染物指标备注为总氮
- Nitrogen, organic bound: 2.86e-6, 1.235e-5 (2 entries)
  the Technical of end-of-pipe management technology for pollution Nitrogen, organic boundisChemical coagulation，Its Technical efficiency of end-of-pipe management87
  污染物指标总氮的末端治理技术是化学混凝法，其效率为87，末端治理设施实际运行率（k值）计算公式为k=废水治理设施运行时间（小时/年）/正常生产时间（小时/年）。原文件中描述污染物类别为废水，污染物指标为总氮，此处对其进行了匹配工作，将其匹配到LCAflow库里面相最符合的流，污染物指标备注为总氮
- Nitrogen, organic bound: 7.6e-6
  the Technical of end-of-pipe management technology for pollution Nitrogen, organic boundisChemical coagulation + biological treatment，Its Technical efficiency of end-of-pipe management92
  污染物指标总氮的末端治理技术是化学混凝+生物法，其效率为92，末端治理设施实际运行率（k值）计算公式为k=废水治理设施运行时间（小时/年）/正常生产时间（小时/年）。原文件中描述污染物类别为废水，污染物指标为总氮，此处对其进行了匹配工作，将其匹配到LCAflow库里面相最符合的流，污染物指标备注为总氮
- Waste water: 13.2, 16.04 (2 entries)
  the Technical of end-of-pipe management technology for pollution Waste wateris/
  污染物指标工业废水量的末端治理技术是/，末端治理设施实际运行率（k值）计算公式为/。原文件中描述污染物类别为废水，污染物指标为工业废水量，此处对其进行了匹配工作，将其匹配到LCAflow库里面相最符合的流，污染物指标备注为工业废水量
- Exhaust gas: 17000, 17000 (2 entries)
  the Technical of end-of-pipe management technology for pollution Exhaust gasis/
  污染物指标工业废气量的末端治理技术是/，末端治理设施实际运行率（k值）计算公式为/。原文件中描述污染物类别为废气，污染物指标为工业废气量，此处对其进行了匹配工作，将其匹配到LCAflow库里面相最符合的流，污染物指标备注为工业废气量

## Use advice
This dataset is derived from the Pollution Source Census Report and contains information on pollution emissions and related products. However, it does not include data on energy or chemical consumption, nor does it provide information on waste or co-product generation. When utilizing this dataset, please supplement the missing data based on actual conditions before use
该数据集来源于污染源普查报告，包含污染物排放及相关产品信息，但不包含能源或化学品消耗数据，也不提供废弃物或共生产物产生信息。在使用该数据集时，请根据实际情况补充缺失数据后再使用。

## Review details
Inventory: The internal review was done by several iteration steps concerning raw data validation, raw data documentation, representativity, completeness and consistency of modelling with regard to ISO 14040 and 14044.
清单： 内部审查通过几个迭代步骤完成，涉及原始数据验证、原始数据记录、代表性、完整性、与 ISO 14040 和 14044 有关的建模的一致性。

## Data sources
- 第二次全国污染源普查产排污核算系数手册（试用版）,二级代码33-37、431-434文件，在完整版文件中第5513页
