# Shale gas development ;Shale formation; Hydraulic fracturing

Dataset: ILCD process, Unit process, single operation
Geography: IO
Reference year: 2017
Classification: Unit processes / Energy carriers and technologies / Natural gas based fuels
LCI method principle: Attributional
LCI method approaches: Consequential
Generated by: Shikang Kang, 908798159@qq.com
Owner: Tiangong LCI Data Working Group
Review: Dependent internal review by Tiangong LCI Data Working Group
Amounts: no units in this file; such an amount is in the reference unit of its flow, which a separate flow dataset defines
copyright: false
licenseType: Free of charge for all users and uses

## General comment
With shale gas production booming in the United States and gas prices falling in the United States, interest in shale gas is growing in many countries with shale reserves, and some European Union countries, including Britain, are already exploring. Any commercial development of shale gas in Europe requires extensive environmental assessments, recognizing Europe's different conditions and legislation

## Geography
British shale gas

## Time period
Publication time of literature

## Technology and included processes
This study focuses on the situation in Britain and uses life cycle assessment (LCA) to estimate the impact of shale gas on the environment; The burden of shale gas production in the UK is compared with the burden of natural gas mixing in the UK at present. The main focus is on the analysis of water impacts, but a wide range of other impact categories are also considered.

## Technical purpose
Shale gas development via hydraulic fracturing in shale formations is intended for the production of natural gas, primarily used as an energy source for heating, electricity generation, and as feedstock in the chemical industry. This industrial process involves the extraction of gas trapped within shale formations, bringing it to the surface for processing and distribution.

## Reference product
- water: 5.46e-6; input; log-normal; missing unimportant
  Hydraulic fracturing water

## Inputs
- sand: 0.000725; log-normal; missing unimportant
  Fracturing sand (silica, quart sand)

## Outputs
- carbon monoxide (fossil): 2.18e-7; log-normal; missing unimportant
  The original text did not distinguish between Bio and Fossil. According to experts, this is Fossil. Carbon monoxide output
- methane (fossil): 5.46e-6; log-normal; missing unimportant
  There is no mining output of natural gas in the literature. Assume that the input in the process of natural gas production: output=1:1

## Data selection and combination
LCA model is based on the analysis of more than 60 open source literature data. The robustness of the model is tested by sensitivity analysis of key parameters. The system boundary does not include the use of natural gas, because natural gas is the same whether shale gas or conventional natural gas is used.

## Data treatment and extrapolations
According to ISO 14046 standard (ISO 14046 2014), the impacts related to fresh water use, degradation and consumption were analyzed respectively.

## Use advice
When using LCA data from this study focused on British shale gas production, users must note that the environmental impact assessment is based on a comparison with the current natural gas mixture in the UK. It is important to consider the technological applicability that this data specifically excludes the use phase of natural gas. Data users should conduct their assessments in alignment with the ISO 14046 standard, ensuring to take into account fresh water use, degradation, and consumption associated with this industrial process.

## Review details
Inventory: The internal review was done by several iteration steps concerning raw data validation, raw data documentation, representativity, completeness and consistency of modelling with regard to ISO 14040 and 14044.

## Data sources
- Tagliaferri, C., Clift, R., Lettieri, P. & Chapman, C. Shale gas: a life-cycle perspective for UK production. Int J Life Cycle Assess 22, 919–937 (2017).
