# Production of glass fiber pallets ; The glass fiber reinforced pallet ; production of glass fiber, pallet production,

Dataset: ILCD process, Unit process, single operation
Geography: YL-GX-CN
Reference year: 2012
Classification: Unit processes / Materials production / Glass and ceramics
Functional unit: For example, the generation of 1 kW h (kW h) of electricity is adapted as the functional unit in this study, and the corresponding amounts of CO2 emissions and air pollutants (SO2,NOX and PM10)perkWh of electricity are chosen as the indicators for environmental performances, and the monetary value (US$) of per kW h of electricity is chosen as the indicator for cost-effectiveness evaluation.
LCI method principle: Attributional
LCI method approaches: Allocation
Generated by: Yunzhi Zhao, ll10088@163.com
Owner: Tiangong LCI Data Working Group
Review: Dependent internal review by Tiangong LCI Data Working Group
Amounts: no units in this file; such an amount is in the reference unit of its flow, which a separate flow dataset defines
copyright: false
licenseType: Free of charge for all users and uses

## General comment
文献里只提供了部分污染物排放数据，未提供原材料和能源消耗清单

## Geography
In this study, the typical wind farm system in Yulin City of Guangxi of Zhuang Autonomous Region China was selected as a case study site. The developer, namely, China Huadian Corporation, is a state-owned enterprise and devotes to develop wind power by providing wind power equipment and related service in China [37].

## Technical purpose
The glass fiber reinforced pallets produced through this industrial process are used in various industries for the storage and transportation of goods, leveraging their high strength-to-weight ratio and durability. The pallets serve particularly well in sectors requiring robust and non-corrosive material handling solutions, such as in chemical, automotive, and food industries. Additionally, the wind turbines produced as a part of this case study are used for generating renewable energy, specifically targeted towards wind farms committed to sustainable power generation.

## Reference product
- Fiber glass: 1; calculated
  文献里只提供了部分污染物排放数据，未提供原材料和能源消耗清单

## Outputs
- carbon dioxide (fossil): 4.87; calculated
- sulfur dioxide: 0.0193; calculated
- nitrous oxide: 0.0342; calculated
  nitrogen oxide
- particles (PM10): 0.00383; calculated

## Deviations from the LCI method approaches
According to Introduced by the life cycle assessment approach [34,35], firstly the system boundaries boundary of wind energy as well as and thermal power are first identified. Then, methodology on evaluating both environmental and economic benefits is presented so that co-benefits can be quantified followed by the introduction of the methodologies on environmental as well as economic impacts evaluation from the co-benefits perspective.

## Data selection and combination
This wind farm is equipped with 24 wind turbines, with a production capacity of 1.25 MW for each turbine, and t the operation life for each turbine is expected to be 20 years. The life cycle of one wind power system can be divided into five stages, including (1) production, (2) transportation and installation, (3) power generation, (4) maintenance, and (5) end-of-life recycling and disposal. The input of non-renewable energy has been shown in each stage. In this study, raw material, fossil fuel consumption and corresponding emissions have been taken into account of a life cycle process. Meanwhile, cost-effectiveness of a wind farm is considered because the cost plays a very important role in operating a wind farm [38]. Considering the data reliability and availability, the cost data of this wind farm was mainly extracted from a feasibility report of one wind farm (with a designed capacity of the 49.5 MW) in Kang ping County of Liaoning province [39].

## Use advice
Users of this LCA data set for glass fiber reinforced pallets must consider the input of non-renewable energy and associated emissions across all life cycle stages—from raw material extraction to end-of-life recycling and disposal. When evaluating the environmental and economic impacts of the wind farm system, users should apply the provided environmental performance indicators such as CO2, SO2, NOX, and PM10 emissions, as well as the monetary value of electricity generated. It is crucial to respect the defined system boundaries and ensure accurate alignment with the chosen functional unit of 1 kWh of electricity for consistency in evaluation.

## Review details
Inventory: The internal review was done by several iteration steps concerning raw data validation, raw data documentation, representativity, completeness and consistency of modelling with regard to ISO 14040 and 14044.
