# Cutting laminates with knife grinder ;Laminates;knife grinder cutting

Dataset: ILCD process, Unit process, single operation
Geography: CN
Classification: Unit processes / Systems / Other machines
Generated by: Nan Wang, 1209824595@qq.com
Owner: Tiangong LCI Data Working Group
Review: Dependent internal review by Tiangong LCI Data Working Group
Amounts: no units in this file; such an amount is in the reference unit of its flow, which a separate flow dataset defines
copyright: false
licenseType: Free of charge for all users and uses

## General comment
This knife grinder cutting process is utilized for precision shaping and cutting of laminates. These laminates can be used in various industrial applications such as in the production of electrical insulation, decorative surfaces, or structural composites for construction.

## Reference product
- Laminate,Laminate: 745.833; input; software or database
  PV laminates

## Inputs
- Electricity: 172.8; software or database
- water: 20; software or database

## Outputs
All rows: software or database
- Mixture,Mixture: 641.63
  fragment mixture
- Ethylene-vinyl acetate copolymer,Ethylene-vinyl acetate copolymer,Ethylene-vinyl acetate copolymer: 41
  EVA
- Waste (unspecified): 56
  general waste
- hazardous waste (unspecified),hazardous waste (unspecified): 7.2
- Medium and low radioactive liquid waste: 18.6
  liquid waste
- Nitrogen oxides: 108
- sulfur dioxide: 71.4
- carbon dioxide: 144.5

## Use advice
When using the data set for the knife grinder cutting process of laminates, ensure to account for the specific energy consumption and material waste associated with precision cutting. Include considerations for the end-of-life phase of the laminates, particularly if they involve specialized recycling or disposal processes. Always verify whether the data is relevant to the technological level and geographic region of your application.

## Review details
Inventory: The internal review was done by several iteration steps concerning raw data validation, raw data documentation, representativity, completeness and consistency of modelling with regard to ISO 14040 and 14044.

## Data sources
- Li, J. et al. Life cycle analysis of the economic costs and environmental benefits of photovoltaic module waste recycling in China. (2023).
