# Monitoring well backfilling ; Din=0.15m,L=50m ; Soil in-situ remediation ; Enhanced bioremediation

Dataset: ILCD process, Unit process, single operation
Geography: SH-CN
Reference year: 2020
Classification: Unit processes / Other Services / Repair and maintenance
Generated by: Xiao Meng, xiaomeng@mail
Owner: Tiangong LCI Data Working Group
Review: Dependent internal review by Tiangong LCI Data Working Group
Amounts: no units in this file; such an amount is in the reference unit of its flow, which a separate flow dataset defines
copyright: false
licenseType: Free of charge for all users and uses

## General comment
The newly built monitoring wells during the repair process will be backfilled after the repair project is completed.

## Geography
The aquifer in a certain area in Shanghai, China, is uniformly contaminated with chlorinated volatile organic compounds (CVOCs), with a surface area of 20,000 m2 and a depth of 50 m, with the water table located at a depth of 30 m.

## Technical purpose
The described process, monitoring well backfilling, is used in the context of environmental remediation projects. Specifically, it is associated with soil in-situ remediation and enhanced bioremediation techniques to treat aquifers contaminated with chlorinated volatile organic compounds (CVOCs). The monitoring wells, with a specified diameter of 0.15 meters and a length of 50 meters, are employed to gauge and assess the progress of the bioremediation process. Once the goal of detoxifying the soil is achieved, these wells are backfilled, meaning they are sealed and the ground is restored to its original condition.

## Reference product
- Well backfilling: 272
  文中仅给出监测井和注入井一共544口，没有给出单独的监测井和注入井数量，这里填报人简单估计两种监测井数量各半。

## Inputs
- Monitoring well: 272
  文中仅给出监测井和注入井一共544口，没有给出单独的监测井和注入井数量，这里填报人简单估计两种监测井数量各半。
- Concrete: 4069.88; calculated
- Gravel Sand: 38155.1; calculated
- clay: 18047.4; calculated
- Water: 6865.28; calculated

## Use advice
When utilizing this data set for Life Cycle Assessment, users should take into account that monitoring well backfilling is a site-specific procedure and may not be directly transferable to other locations or projects without modifications. The characteristics of the site, such as the depth of the water table and the extent of CVOC contamination, need to be considered. For any comparative study, it is crucial to ensure that the geographic and environmental contexts are comparable, and that the system boundaries include all relevant environmental interventions connected to the well backfilling operations. The data set is tailored to a specific type of CVOCs contamination in Shanghai, China, and may require adjustment when applied to different contaminants or geographic locations.

## Review details
Inventory: The internal review was done by several iteration steps concerning raw data validation, raw data documentation, representativity, completeness and consistency of modelling with regard to ISO 14040 and 14044.

## Data sources
- Ni, Z. et al. Comparative Life-Cycle Assessment of Aquifer Thermal Energy Storage Integrated with in Situ Bioremediation of Chlorinated Volatile Organic Compounds. Environ. Sci. Technol. 54, 3039–3049 (2020).
