# cement production;cement, portland cement, 42.5MPa;new dry process kiln;fly ash

Dataset: ILCD process, Unit process, black box
Geography: HLJ-CN
Reference year: 2008
Classification: Materials production / Other mineralic materials
Generated by: Siqi Yang, ysqsophia@gmail.com
Owner: Tiangong LCI Data Working Group
Review: Dependent internal review by Tiangong LCI Data Working Group
Amounts: no units in this file; such an amount is in the reference unit of its flow, which a separate flow dataset defines
copyright: false
licenseType: Free of charge for all users and uses

## General comment
New dry process kiln is used for the production of portland cement. A study was conducted on the process flow and operating parameters of the new dry-process technology currently available in the cement industry in Heilongjiang Province, and input and output data of the established product system were collected and calculated and quantified.

## Technical purpose
The portland cement produced using the new dry process kiln technology is utilized mainly in the construction industry. It is suitable for constructing infrastructures such as buildings, highways, and bridges where a high level of durability and strength is required. The cement, with a specified 28-day compressive strength of 42.5MPa, is appropriate for structural concrete and other applications where 42.5MPa of strength is necessary.

## Model description
The functional unit is the performance of 1kg cement with a 28-day compressive strength of 42.5MPa, that is, 1Fu=42.5kgMPa. The scope of evaluation is raw meal preparation, clinker calcination and cement preparation. The environmental load caused by the consumption of clay resources is not considered for the time being. Iron powder is an iron correction material, and its environmental impact will not be considered. The wastes considered to be emitted at the output end of the product system mainly include nitrogen oxides, sulfur dioxide, carbon dioxide and dust.

## Reference product
- cement, portland cement, 42.5MPa: 1000
  Portland cement with a strength grade of 42.5.

## Inputs
- limestone, crushed, for mill: 1104.4
  Limestone
- gypsum stone (CaSO4-dihydrate): 58.7
  Gypsum
- ash: 319.4
  Fly ash
- hard coal: 100.526
  Standard coal. The original data is 0.0934kg standard coal, here converted to hard coal, the conversion formula is 1kg hard coal = 0.929kg standard coal.
- electricity, medium voltage: 343.8
  Electricity

## Outputs
- particles (> PM10): 0.324
  Dust, with an unspecified particle size, is treated as PM > 10 micrometers in diameter.
- sulfur dioxide: 0.3893
  Sulfur dioxide
- Nitrogen oxides: 1.557
- carbon dioxide: 813.1
  Carbon dioxide

## Use advice
When utilizing this LCA data for the cement production process, ensure that the data corresponds accurately to the new dry process kiln technology. In modeling the cement production lifecycle, exclude the environmental load caused by the consumption of clay resources and the environmental impact due to the use of iron powder as a correction material. Consider the emissions of nitrogen oxides, sulfur dioxide, carbon dioxide, and dust in the impact assessment, as these are significant pollutants emitted from the cement production. The functional unit of the dataset is based on 1kg of cement with a 28-day compressive strength of 42.5MPa.

## Review details
Inventory: The internal review was done by several iteration steps concerning raw data validation, raw data documentation, representativity, completeness and consistency of modelling with regard to ISO 14040 and 14044.

## Data sources
- 于淼. (2008). 黑龙江水泥工业可持续发展研究 [硕士, 哈尔滨工业大学].
