# Propylene Production ; Propylene ; Catalytic Cracking Route ; Naphtha

Dataset: ILCD process, Unit process, black box
Geography: ZJ-GD-CN
Reference year: 2018
Classification: Unit processes / Materials production / Organic chemicals
Functional unit: A functional unit is defined as 1 ton of propylene product
LCI method principle: Attributional
LCI method approaches: Allocation - mass
Generated by: Yanan Ren, renyn15@tsinghua.org.cn
Owner: Tiangong LCI Data Working Group
Review: Dependent internal review by Tiangong LCI Data Working Group
Amounts: no units in this file; such an amount is in the reference unit of its flow, which a separate flow dataset defines
copyright: false
licenseType: Free of charge for all users and uses

## General comment
The catalytic cracking process route mainly includes two processes of catalytic cracking and gas fractionation. The former includes sub-processes such as reaction-regeneration, energy recovery, fractionation, absorption stabilization, denitrification, desulfurization, and dust removal, while the latter includes depropanization, deethanization, and propylene refining. The main inputs of the catalytic cracking route include raw materials (ie heavy oil and hydrogenated diesel oil), energy sources (ie electricity, fresh water and steam), and auxiliary materials such as catalyst alumina. Propylene accounts for 33% of production by weight, with by-products being ethane and propane, C4 and C5 fractions, and LPG. It is worth noting that the steam by-products generated by coke combustion are transported outside the target plant for use. This process compensates for the environmental impact caused by raw material production and energy consumption, and reduces the environmental burden.

## Geography
The case plant of the catalytic cracking route comes from Sinopec Zhanjiang Dongxing Petrochemical Co., Ltd. The company is located in Zhanjiang City, Guangdong Province. Its catalytic cracking olefins process was built in 2018, with an annual production capacity of 116,000 tons of propylene.

## Time period
Craft built in 2018

## Technology and included processes
The factory is an integrated refining and chemical system, so raw materials (heavy oil, hydrogenated diesel) are used as intermediate products, regardless of the transportation stage.

## Technical purpose
The propylene production process through the catalytic cracking route is used for the manufacture of a variety of chemical products and plastics. It is principally applied in the production of polypropylene, propylene oxide, acrylonitrile, cumene, butyraldehyde and isopropanol, as well as in the synthesis of various intermediates in the chemical industry. This specific process is employed by integrated refining and chemical systems that generate propylene with an annual capacity of 116,000 tons, primarily serving sectors that require high-quality propylene in their manufacturing processes.

## Model description
The consumption of raw materials, energy, electricity, steam, water and auxiliary chemicals involved in each sub-stage is considered, and the output considers propylene and by-products (such as C4 products produced by the propane dehydrogenation process. The mass distribution method is used to quantify the products The environmental load between propylene and by-products. In addition, this model also considers the waste discharge of each process. This study focuses on the environmental impact analysis of different propylene production processes. Therefore, the utilization of propylene hydrocarbons and the end-of-life treatment of their products, as well as infrastructure Construction and equipment maintenance are outside the scope of this assessment.

## Reference product
- propene (propylene): 1000; measured
  Acrylic

## Inputs
All rows: measured
- heavy fuel oil: 12940
  heavy oil
- Diesel oil: 4310
  Hydrogenated diesel
- Aluminum oxide (alumina): 20
  catalyst
- Trisodium Phosphate: 0.02226
  Trisodium phosphate
- nitrogen: 20.67
  Nitrogen
- compressed air: 0.43488
- process steam: -6380
  steam
- freshwater: 9710
  fresh water
- Electricity: 348.768
  electricity

## Outputs
All rows: measured
- Refinery Gas: 530
  Refinery dry gas
- gasoline (regular): 7520
  gasoline
- Diesel oil: 4310
  Catalytic diesel
- Slurry oil: 600
  Oil slurry
- Ethane: 370
- C4 Hydrocarbon Mixture: 1650
  C4+
- carbon dioxide (fossil): 4160
  CO2
- sulfur dioxide: 0.20294
  SO2
- nitrous oxide: 0.28992
  NOx
- particles (> PM10): 0.1837
  particulates
- volatile organic compound: 0.53704
  VOCs
- ammonia: 0.00081
  Ammonia nitrogen
- chemical oxygen demand: 0.02954
  COD

## Deviations from the LCI method approaches
Quantification of environmental load between product propylene and by-products using mass distribution method

## Data selection and combination
The detailed input-output data of the propylene production process comes from the company's public environmental impact assessment report, including the input of raw materials and auxiliary materials, energy and resource consumption, and discharge of waste gas, wastewater and solid waste.

## Use advice
When utilizing this data set for life cycle assessment or other environmental impact studies, it's essential to consider the environmental load of both the main product and the by-products proportionally based on their masses. Since the factory does not include the transportation of intermediate raw materials, the environmental load limited to on-site processes must be considered. Additionally, waste discharges from all process stages are integrated into the analysis. The users of this data should not include the impacts of propylene use, end-of-life disposal of associated products, infrastructure construction, and equipment maintenance as these are outside the assessment boundary. Researchers need to ensure they reference the detailed input-output data of the propylene production process precisely as per the environmental impact assessment report published by the company.

## Review details
Inventory: The internal review was done by several iteration steps concerning raw data validation, raw data documentation, representativity, completeness and consistency of modelling with regard to ISO 14040 and 14044.

## Data sources
- 吕琳. 丙烯产品环境负荷及温室气体减排的碳税政策. (大连理工大学, 2022).
