# Groundwater remediation ; In-situ remediation ; Cement grout vertical barrier ; Construction preparation ; Cement preparation

Dataset: ILCD process, Unit process, single operation
Geography: US
Classification: Other Services / Repair and maintenance
Generated by: Xiao Meng, xiaomeng@mail
Owner: Tiangong LCI Data Working Group
Review: Dependent internal review by Tiangong LCI Data Working Group
Amounts: no units in this file; such an amount is in the reference unit of its flow, which a separate flow dataset defines
licenseType: Free of charge for all users and uses

## General comment
Prepare cement through processes such as calcination and clinker grinding.

## Geography
For this project, a Superfund location at the Brookhaven National Laboratory (BNL) is studied. This particular case was chosen because it is representative of the scale and scenario where soil grouting would be used. It is also one of only a few sites where CS grouting has been used for full scale remediation. BNL has served as a production facility for research and development of radioisotopes for decades. The design of some of the facilities failed to provide adequate safety measures against the spread of radioactivity to the soils and groundwater beneath them and as a result, BNL was added to the Superfund National Priorities List in 1989.

## Technical purpose
The industrial process described is intended for groundwater remediation, specifically using cement grout vertical barriers as part of in-situ (on-site) soil grouting techniques at Superfund locations. It is applied to contain and prevent further spread of contaminants, such as radioactivity, from affected soils into groundwater. The process is particularly suitable for scenarios that involve research facilities or production sites that have historically handled radioisotopes without adequate safeguards, which have led to contamination.

## Reference product
- cement: 22970; measured

## Inputs
All rows: measured
- Limestone: 32388
- clay: 3192.8
- sand: 780.98
- Gypsum: 1148.5
- Iron ore (Domestic): 344.55
  Iron ore（铁矿石）
- Coal: 2917.2
- Light fuel oil: 390.49
- natural gas: 436.34
- Electricity: 9344.16

## Use advice
When utilizing this data set for environmental impact assessments or decision-making in remediation projects, it is critical to consider the specific context of the remediation site, such as the scale of contamination and the nature of the contaminants (e.g., radioactivity). This data should be used in conjunction with local regulations and standards for soil and groundwater quality. Users should also ensure that the method chosen for cement preparation and the deployment of the cement grout vertical barrier is compatible with the site conditions and the desired outcomes of the remediation project.

## Review details
Inventory: The internal review was done by several iteration steps concerning raw data validation, raw data documentation, representativity, completeness and consistency of modelling with regard to ISO 14040 and 14044.

## Data sources
- Gallagher, P. M., Spatari, S. & Cucura, J. Hybrid life cycle assessment comparison of colloidal silica and cement grouted soil barrier remediation technologies. Journal of Hazardous Materials 250–251, 421–430 (2013).
