# Remediated soil ; Soil remediation ; In Situ Thermal Remediation ; Electro-Thermal Dynamic Stripping Process (ET-DSP)

Dataset: ILCD process, Unit process, black box
Geography: DK
Reference year: 2013
Classification: Unit processes / Other Services / Repair and maintenance
Functional unit: Results are presented per unit volume (1 m3 ) of soil remediated in order to compare results for each site.
Generated by: Yang Xintong, yangxt@caep.org.cn
Owner: Tiangong LCI Data Working Group
Review: Dependent internal review by Tiangong LCI Data Working Group
Amounts: no units in this file; such an amount is in the reference unit of its flow, which a separate flow dataset defines
copyright: false
licenseType: Free of charge for all users and uses

## General comment
From Table 1 of the literature (Overview of Test Sites Used as a Basis for Data Collection), it can be seen that, the area and volume of the small site are 180 m2 and 1175 m3. Mass of contaminant is 400 kg of PCE.

## Geography
The data collection for the LCA was conducted for a smaller (180 m2) site representing typical Danish sites where remediation using ISTD has been conducted.

## Technology and included processes
ET-DSP™ places steel electrodes in the wells, applied to a low-permeability contaminant source zone. soil is heated to around 100 °C to enhance the volatilization of the chlorinated solvents. In this study, the solvent vapors are assumed to be continuously extracted from the subsurface under vacuum and treated above ground in an activated carbon air filtration unit and, as a proportion of the extracted vapors also condense, the condensed aqueous phase is treated in a separate activated carbon water filtration unit. A vapor cap of 40 cm foam concrete is installed above the heated zone in order to prevent intrusion of rain, create a vapor-tight seal to the surface and to reduce heat loss to the atmosphere. All technologies require the installation of a number of wells to generate soil heating as well as extraction wells.

## Technical purpose
The Electro-Thermal Dynamic Stripping Process (ET-DSP) is used for in situ soil remediation at sites with low-permeability contaminant zones. This technique is applied particularly for the extraction and removal of high concentrations of volatile contaminants like perchloroethylene (PCE), which is a common solvent in dry cleaning and industrial degreasing operations.

## Reference product
- Remediated soil: 1175; measured

## Inputs
All rows: measured
- Road Transport,Road Transport: 1.4503e7, 5.76e7, 90000, 7.2e6, 4.2e6, 4.5e6 (6 entries)
- transport in t*km: 52245, 6.15168e6, 806008, 1.08e6, 8.568e7, 9.18e7 (6 entries)
- Electricity: 601200, 1.8108e6 (2 entries)
- Diesel,Diesel: 1.769
- sand: 5427
- Mortar: 1720
- Concrete: 41600
- Activated Carbon: 2484, 1620 (2 entries)
- Carbon Steel: 5239
- Stainless Steel: 688
- Copper and copper alloys: 473, 75 (2 entries)
- Aluminium and aluminium alloy products: 75
- Fiber glass: 220
- Polyethylene,Polyethylene: 799
- contaminated soil: 1175

## Use advice
This dataset should be used with understanding that it is specific to a small-scale (180 m2) typical Danish site where ISTD remediation using ET-DSP has been applied. The LCA data collection covers energy and material consumption, equipment use during construction and transportation activities, well field materials construction, capping materials, air and water treatment systems, and electricity consumption. Please ensure the correct application of this LCA data in the broader context of remediation project planning, taking into account variations in geographies, climates, and regulatory environments. Furthermore, translation of these results to other sites should account for differences in site size, contaminant concentration, and subsurface conditions.

## Review details
Inventory: The internal review was done by several iteration steps concerning raw data validation, raw data documentation, representativity, completeness and consistency of modelling with regard to ISO 14040 and 14044.

## Data sources
- Lemming G ,Nielsen G S ,Weber K , et al. Optimizing the Environmental Performance of In Situ Thermal Remediation Technologies Using Life Cycle Assessment [J]. Groundwater Monitoring & Remediation, 2013, 33 (3): 38-51.
