# Electricity production ; Electricity mix ; Ningxia

Dataset: ILCD process, Unit process, single operation
Geography: NX-CN
Reference year: 2019
Classification: Unit processes / Energy carriers and technologies / Electricity
Generated by: Ruoxi Xiong, xiongrx0126@163.com
Owner: Tiangong LCI Data Working Group
Review: Dependent internal review by Tiangong LCI Data Working Group
Amounts: no units in this file; such an amount is in the reference unit of its flow, which a separate flow dataset defines
copyright: false
licenseType: Free of charge for all users and uses

## General comment
Electricity mix includes thermal, hydro, wind, nuclear and solar generation

## Technical purpose
This dataset pertains to the electricity mix used in the Ningxia Hui Autonomous Region, which includes a blend of thermal (likely coal or natural gas-fired), hydro, wind, nuclear, and solar electricity generation. This mix can be used to represent the environmental performance of electricity consumed by various industrial processes, residential and commercial energy use, or as regional electricity grid references for Life Cycle Assessments in Ningxia.

## Reference product
- Electricity: 3.6; missing unimportant
  [{'text': '能量', 'type': 'text'}]

## Inputs
All rows: missing unimportant
- electricity for thermal power: 2.9176
  [{'text': '能量', 'type': 'text'}]
- electricity from hydroelectric power plant: 0.0464796
  [{'text': '能量', 'type': 'text'}]
- electricity for nuclear power: 0
  [{'text': '能量', 'type': 'text'}]
- electricity from wind power: 0.392962
  [{'text': '能量', 'type': 'text'}]
- electricity for solar power: 0.24296
  [{'text': '能量', 'type': 'text'}]

## Use advice
When utilizing this data set for Life Cycle Assessment, users should ensure that the electricity consumption profile of the product or system under study is consistent with the electric power generation mix of Ningxia. The temporal relevance of the data should be considered; use the most current data available or account for changes in the generation mix over time. Users should also consider including energy transmission and distribution losses if they are not accounted for within the dataset. Additionally, the allocation of environmental impacts among different energy sources within the mix should be handled according to the goal and scope of the assessment.

## Review details
Inventory: The internal review was done by several iteration steps concerning raw data validation, raw data documentation, representativity, completeness and consistency of modelling with regard to ISO 14040 and 14044.

## Data sources
- 能源统计年鉴2020
