# Repaired groundwater ; Groundwater In situ remediation ; Phytoremediation ; Eucalyptus planting ; 4.6 m x 4.6 m grid pattern ; Solar-powered irrigation system

Dataset: ILCD process, Unit process, black box
Geography: UM
Reference year: 2019
Classification: Unit processes / Other Services / Repair and maintenance
Functional unit: The functional unit was the treatment of a 9000 2 area of (= 9000 m3 volumn of) a PCE-contaminated aquifer. The timeframe for the LCA was 100 years.
Generated by: Yang Xintong, yangxt@caep.org.cn
Owner: Tiangong LCI Data Working Group
Review: Dependent internal review by Tiangong LCI Data Working Group
Amounts: no units in this file; such an amount is in the reference unit of its flow, which a separate flow dataset defines
copyright: false
licenseType: Free of charge for all users and uses

## General comment
Phytoremediation is the use of green plants to transfer, accommodate, or transform pollutants to make them harmless to the environment. The object of phytoremediation is soil and water contaminated with heavy metals, organic matter, or radioactive elements.

## Geography
This study was conducted in the context of the SF Bay area, a major metropolitan area (~18,000 km2 ) in California, USA.

## Technology and included processes
Salt-tolerant eucalyptus species were selected for the phytoremediation system. The trees were planted following a 4.6 m by 4.6 m grid pattern. A solar powered irrigation system was used to extract groundwater for irrigating the newly planted trees.

## Technical purpose
This phytoremediation process through the planting of salt-tolerant eucalyptus species is applied for in situ groundwater decontamination in areas contaminated with PCE (tetrachloroethylene), focusing on soils and aquifers with heavy metals, organic pollutants, or radioactive elements. The remediation system, with a 4.6 m x 4.6 m grid pattern of eucalyptus trees, is designed for urban areas like the San Francisco Bay area and incorporates a solar-powered irrigation system for sustainability.

## Reference product
- Remediated groundwater: 9000; measured
  含水层厚度1m，体积9000m3

## Inputs
All rows: measured
- polyvinylchloride resin (S-PVC): 1043
  太阳能灌溉系统安装材料
- Polyethylene,Polyethylene: 405, 177 (2 entries)
  太阳能灌溉系统安装材料
- Steel: 365
  太阳能灌溉系统安装材料
- Copper sheet: 47
  太阳能灌溉系统安装材料
- Textile: 84
  太阳能灌溉系统安装材料
- Compound Fertilizer,Compound Fertilizer: 5373
- aluminium sheet: 59
  太阳能灌溉系统安装材料
- Diesel,Diesel: 2206
- transport in t*km: 13600
  Material transport – by truck (tkm)
- Road Transport,Road Transport: 4.2e6
  Passenger transport (km)
- contaminated groundwater: 9000
  含水层厚度1m，体积9000m3

## Use advice
Users of this LCA data set should consider the specific environmental context of the remediation site when applying these data. It is important to ensure that the scale of application (9000 m2 area) and the climatic conditions (such as those in the SF Bay area) are comparable. The timeframe of the LCA (100 years) should be acknowledged in any extrapolation of data. Data users need to include all stages from cradle to grave in their assessment – acquisition of materials and energy, equipment procurement and usage, transportation, construction, and waste management. Special attention should be given to the sustainability aspects of the irrigation system and the applicability of the selected eucalyptus species to the local conditions of the remediation site.

## Review details
Inventory: The internal review was done by several iteration steps concerning raw data validation, raw data documentation, representativity, completeness and consistency of modelling with regard to ISO 14040 and 14044.

## Data sources
- O'Connor D ,Zheng X ,Hou D , et al. Phytoremediation: Climate change resilience and sustainability assessment at a coastal brownfield redevelopment [J]. Environment International, 2019, 130 104945.
