# Al alloy production ; Total fo all wind farm

Dataset: ILCD process, Unit process, single operation
Geography: SH-CN
Reference year: 2009
Classification: Unit processes / Materials production / Metals and semimetals
Functional unit: The functional unit is 1 kWh on-grid electricity provision.
LCI method principle: Attributional
LCI method approaches: Allocation
Generated by: Yunzhi Zhao, ll10088@163.com
Owner: Tiangong LCI Data Working Group
Review: Dependent internal review by Tiangong LCI Data Working Group
Amounts: no units in this file; such an amount is in the reference unit of its flow, which a separate flow dataset defines
copyright: false
licenseType: Free of charge for all users and uses

## General comment
The aluminum alloy production described is for structural components in wind turbines at an offshore wind farm, specifically the Donghai Bridge Offshore Wind Farm (DBOWF). This wind farm uses the aluminum alloys for building the wind turbines, foundations, and cables required for energy generation.

## Geography
The studied wind farm, the Donghai Bridge Offshore Wind Farm (DBOWF), is China's first offshore wind farm within the jurisdiction of Shanghai, as well as the first offshore wind farm outside Europe. The project has two-phases of construction, located on each side of the Donghai bridge (Fig. 1).

## Reference product
- aluminium: 85900; estimated

## Inputs
- Energy, geothermal, converted: 1.61e7; software or database

## Outputs
- carbon dioxide: 860000; software or database
- particles (PM2.5): 4290; software or database
- sulfur dioxide: 3290; software or database
- nitrous oxide: 1710; software or database

## Deviations from the LCI method approaches
The present study employed the PLCA modeling approach to calculate the energy and environmental emissions of a typical offshore wind farm in China. The cradle-to-grave process includes four stages, materials and equipment manufacturing, transportation and installation, operation and maintenance, and dismantling and recycling (Fig. 2).

## Data selection and combination
The technical parameters of wind turbines, foundations and cables are obtained from the design documents of the DBOWF (Table 2). The energy and emissions factors (i.e., the energy consumption and environmental emissions of per unit material and component production) are derived from the Ecoinvent 2.2 dataset (Ecoinvent Centre, 2009), and the coefficients of China's practices were preferentially referred. For key materials and equipment, their sea transportation energy is calculated from the transportation load and shipping energy intensity. The facility installation energy and emissions were estimated based on the construction plan. The wind farm's operation and maintenance data, such as the frequency and working time of maintenance, were obtained from site investigations with engineers and technicians. The uncertainties associated with model parameters and input data are illustrated in the sensitivity analysis section of this paper.

## Use advice
When utilizing this data set for Life Cycle Assessment (LCA), users should consider the technological specifications of raw materials and components such as energy and emissions factors from the Ecoinvent 2.2 dataset, adhering to practices relevant to China. Attention must be paid to the accuracy and limitations of data concerning transportation, installation, operation, and maintenance of wind farm equipment, acknowledging the uncertainties identified in the sensitivity analysis. This data should be applied in the context of a cradle-to-grave assessment incorporating all stages from manufacturing to recycling, with the functional unit defined as the provision of 1 kWh of on-grid electricity.

## Review details
Inventory: The internal review was done by several iteration steps concerning raw data validation, raw data documentation, representativity, completeness and consistency of modelling with regard to ISO 14040 and 14044.

## Data sources
- Yang, J. et al. The life-cycle energy and environmental emissions of a typical offshore wind farm in China. Journal of Cleaner Production 180, 316–324 (2018).
