# Plexiglass ; tempered glass ; slicing process

Dataset: ILCD process, Unit process, single operation
Geography: KM-YN-CN
Reference year: 2015
Valid until: 2023
Classification: Unit processes / Materials production / Glass and ceramics
Generated by: He xiaxia, 18616148319@163.com
Owner: Tiangong LCI Data Working Group
Review: Dependent internal review by Tiangong LCI Data Working Group
Amounts: no units in this file; such an amount is in the reference unit of its flow, which a separate flow dataset defines
copyright: false
licenseType: Free of charge for all users and uses

## General comment
The tempered glass manufacturing process entails cutting the glass to size, which is an essential step in producing various glass products. This slice process specifically involves wet grinding with water, a technique used to ensure the smooth edges and high-quality finish necessary for tempered glass applications requiring safety, durability, and optical clarity, such as in automotive windows, architectural glazing, and electronic devices.

## Technology and included processes
Wet grinding with water

## Reference product
- Glass (formed & finished): 302998; measured
  plate glass

## Inputs
- Electricity: 905966; measured
- Glass (formed & finished): 303202; measured
  plate glass

## Outputs
- Waste (solid): 203.4; measured

## Use advice
When utilizing this dataset for Life Cycle Assessment (LCA) purposes, it is critical to consider the specific context in which the tempered glass is used. Ensure the dataset reflects the geographical location and the technological relevance of your scenario. Take into account the water usage in the wet grinding process, which may require allocation of environmental impacts in areas with water scarcity. Assess the energy requirements and related emissions for the slicing process and review end-of-life scenarios where tempered glass recycling might affect the overall environmental impact.

## Review details
Inventory: The internal review was done by several iteration steps concerning raw data validation, raw data documentation, representativity, completeness and consistency of modelling with regard to ISO 14040 and 14044.

## Data sources
- 建设项目环境影响报告表（国环评证乙字 第 2501 号）
