# Groundwater ex-situ remediation ; Groundwater pump and treat ; Equipment and Materials Arriving on Site

Dataset: ILCD process, Unit process, single operation
Geography: DK
Reference year: 2021
Classification: Unit processes / Other Services / Repair and maintenance
Generated by: Wang Ning, wang_ning@caep.org.cn
Owner: Tiangong LCI Data Working Group
Review: Dependent internal review by Tiangong LCI Data Working Group
Amounts: no units in this file; such an amount is in the reference unit of its flow, which a separate flow dataset defines
copyright: false
licenseType: Free of charge for all users and uses

## General comment
Transportation of equipment and materials to the site

## Technology and included processes
Transportation of equipment and materials to the site after a 400km journey

## Technical purpose
The data set represents a process used for environmental remediation, specifically focused on groundwater. The described process, groundwater ex-situ remediation, involves the extraction of contaminated groundwater for treatment. The use of this data is applicable in the context of environmental management projects where groundwater pollution has been identified, and remediation is required to restore the quality of the water. The equipment and materials necessary for setting up and conducting the remediation process, which includes the pump and treat method, are transported over a distance of 400km to the remediation site.

## Reference product
- Equipment and Materials Arriving on Site: 1; estimated

## Inputs
- Equipment and Materials Arriving on Site: 400000; estimated

## Use advice
When utilizing this data set for life cycle assessment, users should ensure that it is relevant to their specific groundwater remediation scenario, taking into account the distances involved in transporting equipment and materials. The LCA should reflect the environmental impact of transportation over a 400km journey. It is crucial for users to include transportation impacts in their LCA model as part of the overall assessment of the remediation process. Users should also consider if the equipment can be sourced closer to the site to reduce transportation impacts and must adjust the data accordingly if their transport distance differs from the 400km specified.

## Review details
Inventory: The internal review was done by several iteration steps concerning raw data validation, raw data documentation, representativity, completeness and consistency of modelling with regard to ISO 14040 and 14044.

## Data sources
- Sustainable remediation assessment of a chlorinated ethene plume: method evelopment, application, and assessment
