# Fattening pig production ; feed processing and transportation process

Dataset: ILCD process, Unit process, single operation
Geography: LN-CN
Reference year: 2010
Classification: Unit processes / Materials production / Agricultural production means
Functional unit: The evaluation unit was 1000 fattening pigs
Generated by: Rui Yang, 1632707028@qq.com
Owner: Tiangong LCI Data Working Group
Review: Dependent internal review by Tiangong LCI Data Working Group
Amounts: no units in this file; such an amount is in the reference unit of its flow, which a separate flow dataset defines
copyright: false
licenseType: Free of charge for all users and uses

## General comment
Feed is the main input of pig breeding, that is, the raw material for the production of animal food pig meat. Contaminants are formed during feed processing and transportation. Feed processing is mainly divided into four stages, crushing, mixing, puffing and pressing into pellets. According to the survey, pulverized l t pig feed consumes 20 kWh of electricity; 1 t of mixed pig feed consumes 5 kWh; The expanded 1 t pig feed consumes 45 kWh of electricity; It takes 20 kWh of electricity to press 1 t of pig feed into pellets. It was calculated that 308 t of feed was required for 1 000 fattening pigs during their growth.

## Geography
The yield per hectare of corn, soybean and wheat in Liaoning Province in 2010 was ··

## Time period
The yield per hectare of corn, soybean and wheat in Liaoning Province in 2010 was respectively

## Technology and included processes
The evaluation includes: gas emissions during feed processing and exhaust emissions during feed transportation

## Technical purpose
The provided lifecycle assessment data applies to the feed processing and transportation process within the fattening pig production industry. It indicates that the feed is a primary input for pig meat production, where pollution is generated during feed processing and transportation. The feed processing is segmented into crushing, mixing, puffing, and pressing into pellets, requiring different amounts of energy at each stage. This data is crucial for operations involved in animal feed production, livestock management, and agriculture industry players focusing on optimizing the energy consumption and reducing environmental impacts associated with pig breeding and feed processing.

## Reference product
- feed: 308000; estimated
  假设运输过程无消耗

## Inputs
- feed: 308000; measured

## Outputs
All rows: measured
- carbon dioxide (fossil),carbon dioxide (fossil): 30802.7
- carbon monoxide (fossil): 43.36
- nitrogen, total (excluding N2): 181
  1 NOx
- sulfur oxides: 278.81
  1Sulfur oxides
- methane (fossil): 72.07

## Data selection and combination
The data in this paper were collected from 36 large-scale chemical fattening pig farms in Liaoning province. The potential impacts of global warming, environmental acidification and eutrophication in the process of fattening pig production were calculated with reference to the relevant data provided by Liaoning Statistical Yearbook.

## Use advice
Users analyzing the environmental impact of the fattening pig production process should take into account the electricity consumption at each feed processing stage, i.e., crushing, mixing, puffing, and pressing as per the given data. Furthermore, when modeling the input-output scenarios for pig feed supply chains, it's important to include the emissions from feed processing gas and transportation exhaust. Regional-specific data such as yields of corn, soybean, and wheat from Liaoning Province should be used to assess the local environmental impacts. Methodological factors like global warming potential, acidification, and eutrophication, as calculated in the data from Liaoning, are also to be considered for a comprehensive environmental evaluation.

## Review details
Inventory: The internal review was done by several iteration steps concerning raw data validation, raw data documentation, representativity, completeness and consistency of modelling with regard to ISO 14040 and 14044.

## Data sources
- 刘鸣达, 赵妍, 刘显军, & 王耀晶. 辽宁省育肥猪生产环境影响的生命周期评价. 农业环境科学学报 31, 1250–1255 (2012).
