# Aluminum electrolysis ; Liquid primary aluminum ; Prebaking ; Alumina for metallurgy ; 2017

Dataset: ILCD process, Unit process, single operation
Geography: CN
Reference year: 2021
Classification: Unit processes / Materials production / Metals and semimetals
Generated by: Zimeng Cai, caizm6178@163.com
Owner: Tiangong LCI Data Working Group
Review: Dependent internal review by Tiangong LCI Data Working Group
Amounts: no units in this file; such an amount is in the reference unit of its flow, which a separate flow dataset defines
copyright: false
licenseType: Free of charge for all users and uses

## General comment
The industrial process described relates to the production of liquid primary aluminum by means of electrolysis. This process involves the prebaking stage and uses alumina specifically designed for metallurgical applications. The primary aluminum produced through this process is used in various sectors such as transportation, construction, electronics, and packaging due to its properties of high conductivity, low density, and resistance to corrosion. The year indicated, 2017, suggests that the data correspond to the technological standards and practices of that time.

## Time period
Date of publication

## Reference product
- aluminium, primary, liquid: 1000; software or database

## Inputs
All rows: software or database
- Integrated AC power consumption: 47726.9
- aluminium oxide, metallurgical: 1913.11
- fluoride salt: 18.02
- anode, prebake, for aluminium electrolysis: 401.32
- Water, unspecified natural origin: 1.22

## Data selection and combination
The data in this study refers to the LCA data of PA, SA, electricity, and other background data. The PA data were obtained from statistical data sources, and the SA data were mainly obtained from the literatures. The background data were mainly derived from the Chinese localization LCA database CAS RCEES 2018, which was established by the Research Center for Eco-Environmental Sciences, Chinese Academy of Sciences and covers LCA data for energy, materials, transportation, waste management etc.

## Use advice
The LCA data provided should be considered with the context of the technology and practices of the year 2017; hence, updates in technology or efficiency changes since then must be taken into account when using this data. The Primary Aluminum (PA) and Secondary Aluminum (SA) data inputs should be verified with contemporary statistical sources to ensure relevance. Users should refer to the CAS RCEES 2018 database for background data relevance and ensure alignment with the geographical context of China. Attention should be given to methodological considerations, such as the inclusion or exclusion of recycling processes in the lifecycle and the specific use-phase behaviors that need to be modeled. Further, it may be necessary to consult with updated emissions factors and environmental impact data for a more current assessment.

## Review details
Inventory: The internal review was done by several iteration steps concerning raw data validation, raw data documentation, representativity, completeness and consistency of modelling with regard to ISO 14040 and 14044.

## Data sources
- Ding, N., Liu, N., Lu, B. & Yang, J. Life cycle greenhouse gas emissions of aluminum based on regional industrial transfer in China. J. Ind. Ecol. 25, 1657–1672 (2021).
