# recycling lithium battery by hydrometallurgy

Dataset: ILCD process, Unit process, single operation
Geography: AH-CN
Reference year: 2021
Classification: End-of-life treatment / Material recycling
Functional unit: 1t retired lithium iron phosphate battery and similar waste
Generated by: Chen, Lipeng, lpchen07@163.com
Owner: Tiangong LCI Data Working Group
Review: Dependent internal review by Tiangong LCI Data Working Group
Amounts: no units in this file; such an amount is in the reference unit of its flow, which a separate flow dataset defines
copyright: false
licenseType: Free of charge for all users and uses

## General comment
The mainstream recovery process of litium batteries is to recover lithium carbonate 、iron phosphate and the ternary precursor cathode material through a hydrometallurgical process (hydrochloric acid leaching-hydrogen peroxide oxidation-soda ash adjustment of pH)

## Technical purpose
The described industrial process is used for the recovery of valuable materials from retired lithium-ion batteries, such as lithium carbonate, iron phosphate, and ternary precursor cathode materials. The hydrometallurgical recycling process includes operations such as coarse extraction of battery powder, wet precipitation of salts, and synthesis of battery materials. This process is integral for the sustainable management of battery waste and supports the circular economy by providing inputs for new battery production.

## Reference product
- EoL NCM battery: 1e7; input; article inperiodical
  Ternary waste battery

## Inputs
All rows: article inperiodical
- EoL LFP battery: 1e7
  Lithium iron phosphate waste battery
- 3C Lithium Battery: 1e6
- Ternary pole plate: 1.5e6
  Ternary pole piece
- Nickel Scrap: 1e6
  Nickel-containing waste
- Calcium oxide: 512000
- Water: 9.32339e7
  Tap water for cleaning
- Iron Lithium Pole Piece: 1.5e6
  Lithium Iron Poles
- Sulfuric acid(98%): 1.43505e7
- hydrogen peroxide: 1.05279e7
- Sodium hydroxide（30%）: 1.83249e6
- Sodium carbonate（95%）: 5.15153e6
- Calcium hydroxide: 4.67919e6
- iron: 69700
- Concentrated hydrochloric acid: 2.78228e6
- Ammonium bicarbonate: 220790
- Nickel sulfate hexahydrate: 191290
- Cobalt(II) sulfate heptahydrate: 52030
  Cobalt sulfate heptahydrate
- Manganese Sulfate Monohydrate: 31130
- Sodium hydroxide: 301400
- Disooctyl Phosphate (P204): 15000
- 2-ethylhexyl hydrogen -2-ethylhexylphosphonate: 15000
- oxygen: 8240
- Ammonium hydroxide: 68260
- Lithium carbonate: 26410
- Lithium Hydroxide: 10240
  Lithium hydroxide
- Ternary precursor: 94660
  Precursor material

## Outputs
All rows: article inperiodical
- Battery Separator: 362220
  Diaphragm
- Aluminum Shell: 3.78889e6
  Casing
- copper: 1.97252e6
  Copper pellets
- aluminium: 1.29301e6
  Aluminum pellet
- CaF2 (low radioactice): 1.62053e6
  Calcium fluoride
- Sulfuric acid mist: 1150
- Phosphorus Ore: 7.48692e6
  Iron phosphate graphite slag
- Lithium carbonate: 2.5764e6
- oxygen: 352080
- carbon: 3.20631e6
  Carbon black slag
- copper: 79320
- Manganese Carbonate: 2.67034e6
  Manganese carbonate
- sodium sulfate: 5.92483e6, 2.56855e6 (2 entries)
- iron: 1.5267e6
- sodium chloride: 1.60866e6
- Cobalt Sulfate: 3.88131e6
- Nickel sulfate: 7.50139e6
- Gypsum: 1.0872e7
  Calcium sulfate
- Ammonium hydroxide: 278280
- ammonia: 5879
- Ternary precursor: 66630
  622 precursor
- Ternary precursor: 33320
  811 precursor
- waste water - untreated: 2.72276e7
- water vapour: 7.34918e7
- carbon dioxide: 27410
- particles (PM2.5 - PM10): 1728

## Use advice
When utilizing this dataset for Life Cycle Assessment, users should ensure that the scope of their assessment includes the full recycling process outlined: hydrochloric acid leaching, hydrogen peroxide oxidation, and soda ash pH adjustment. It is recommended to account for the environmental impacts of reagents and energy used in these processing steps. Inclusion of the recovery rates of materials and potential environmental releases during the process should also be considered. The functional unit is '1 tonne of retired lithium iron phosphate batteries and similar waste,' and any comparisons or extrapolations should adhere to this baseline.

## Review details
Inventory: The internal review was done by several iteration steps concerning raw data validation, raw data documentation, representativity, completeness and consistency of modelling with regard to ISO 14040 and 14044.

## Data sources
- 徐伟华. 基于三阶层体系我国锂电池回收产业的研究. (中国地质大学(北京), 2021).
