# Crushing; glass recycling;PV waste; Thermal decomposition, mechanical cutting, manual crushing; glass recycling.

Dataset: ILCD process, Unit process, black box
Geography: CN
Classification: Unit processes / End-of-life treatment / Material recycling
Generated by: Nan Wang, 1209824595@qq.com
Owner: Tiangong LCI Data Working Group
Review: Dependent internal review by Tiangong LCI Data Working Group
Amounts: no units in this file; such an amount is in the reference unit of its flow, which a separate flow dataset defines
copyright: false
licenseType: Free of charge for all users and uses

## General comment
Flat-glass recycling that aims to recover glass and Al frames, referred as “glass recycling”. glass is separated from the module and recycled by thermal decomposition, mechanical cutting or shredding. The downcycling approach recycles module glass and aluminiumframe, which has been demonstrated in Europe . This process firstlymanually removed the Al frame, junction box and copper cables. Then the module was shredded on the glass recycling line, followed by crushing and a series of manual and mechanical sorting and extractionprocesses to recycle most of the glass and Al . The ferrous metals were sent to specific recyclers; the leftovers, which includes the mixture of silicon, metal, plastic, and glasses that the shredder cannotfurther separate, were sent to landfill. This simple recycling methodavoids most masses to be landfilled with relatively low energy input and processing costs.

## Technical purpose
The industrial process described is utilized in the recycling and resource recovery industry, specifically for the processing of photovoltaic (PV) panel waste. It involves the separation and recovery of valuable materials such as glass and aluminum frames from discarded PV modules. The recovered glass is predominantly used for manufacturing new glass products, while the aluminum is reused in the production of aluminum frames and other aluminum-based goods. The process contributes to the sustainability of PV technology by enabling the circular economy in the energy sector.

## Reference product
- PV Module Waste: 1000; input; min 1; max 1; uniform; software or database

## Outputs
All rows: uniform; software or database
- Hazardous waste (unspec.): 0.18; min 0.1; max 0.28
  Hazardous solid Waste
- aluminium: 180; min 180; max 180
- Glass for recovery (shards): 587; min 490; max 665
  Glass (crushed)
- Copper wire: 2.97; min 2.8; max 3.3
  Copper cable
- Junction Box: 50; min 50; max 50

## Use advice
Users of this data set should ensure that the methodology for the glass and aluminum recovery process includes the separation techniques mentioned (thermal decomposition, mechanical cutting, manual crushing). When applying this data, it is crucial to consider the specific context of the PV waste treatment and the geographic applicability, as the process efficiency and environmental regulations can vary by region. For accurate LCA results, users must also factor in the end-of-life stage where non-recyclable materials end up in a landfill. The data should be updated to reflect technological advances and changes in waste management practices.

## Review details
Inventory: The internal review was done by several iteration steps concerning raw data validation, raw data documentation, representativity, completeness and consistency of modelling with regard to ISO 14040 and 14044.

## Data sources
- Deng, R., Chang, N. L., Ouyang, Z. & Chong, C. M. A techno-economic review of silicon photovoltaic module recycling. Renewable and Sustainable Energy Reviews 109, 532–550 (2019).
