# Recycled paper production;corrugated cardboard

Dataset: ILCD process, Unit process, black box
Geography: CN
Classification: Materials production / Paper and cardboards
Functional unit: 1000kg of corrugated cardboare
LCI method principle: Attributional
Generated by: Yixiang Gao, 22210740040@m.fudan.edu.cn
Owner: Tiangong LCI Data Working Group
Review: Dependent internal review by Tiangong LCI Data Working Group
Amounts: no units in this file; such an amount is in the reference unit of its flow, which a separate flow dataset defines
copyright: false
licenseType: Free of charge for all users and uses

## General comment
This project analyses and treats data according to five processes: waste paper pulping, paper making process, chemical production, transport of raw materials and products, and wastewater treatment.

## Technical purpose
Recycled paper production for the purpose of making corrugated cardboard is an industrial process which involves pulping of waste paper and paper making, coupled with chemical production, transportation of raw materials and products, as well as waste water treatment. The resulting product is corrugated base paper, which is primarily used in packaging applications.

## Reference product
- Corrugated Cardboard: 1000; measured

## Inputs
- Waste paper: 1099; measured
  waste paper(pulping stage)
- water: 0.79; measured
  water(pulping stage)
- Electricity: 335.16; measured
  electricity(pulping stage)
- Cassava Starch: 48; measured
  Cassava Starch(papermaking stage)
- Ring Crush Strengthening Agent: 8.5; measured
  Ring Crush Strengthening Agent(papermaking stage)
- Ammonium Persulfate: 1.9; measured
  Ammonium Persulfate(papermaking stage)
- hard coal: 351.12; measured
  coal(papermaking stage)
- water: 5.05; measured
  water(papermaking stage)
- Electricity: 564.84; measured
  electricity(papermaking stage)
- Diesel: 27.92; measured
  diesel(Transportation stage)
- water: 0.42; software or database
  water(Chemical production stage)
- Diesel: 15.08; software or database
  diesel(Chemical production stage)
- Electricity: 30.42; software or database
  electricity(Chemical production stage)
- Polymeric ferric sulfate: 0.0007; measured
  Polymeric ferric sulfate(Sewage treatment stage)
- water: 0.79; measured
  water(Sewage treatment stage)
- Electricity: 6.192; measured
  electricity(Sewage treatment stage)

## Outputs
- carbon dioxide: 398.96; measured
  CO2(pulping stage)
- Nitrogen oxides: 0.06; measured
  NOx(pulping stage)
- sulfur dioxide: 0.04; measured
  SO2(pulping stage)
- methane: 0.05; measured
  CH4(pulping stage)
- carbon monoxide: 0.74; measured
  CO(pulping stage)
- non-methane volatile organic compounds: 0.19; measured
  NMVOC(pulping stage)
- Total Suspended Particulate: 0.7; measured
  TSP(pulping stage)
- chemical oxygen demand: 0.191; measured
  CODcr(pulping stage)
- biological oxygen demand: 0.037; measured
  BOD5(pulping stage)
- total suspended solids, unspecified: 0.12; measured
  TSS(pulping stage)
- Waste solid: 189.17; measured
  Solid Waste(pulping stage)
- hazardous waste (unspecified): 0.015; measured
  Hazardous Waste(pulping stage)
- carbon dioxide: 660.16; measured
  CO2(papermaking stage)
- Nitrogen oxides: 0.09; measured
  NOx(papermaking stage)
- sulfur dioxide: 0.037; measured
  SO2(papermaking stage)
- methane: 0.009; measured
  CH4(papermaking stage)
- carbon monoxide: 1.2; measured
  CO(papermaking stage)
- non-methane volatile organic compounds: 0.32; measured
  NMVOC(papermaking stage)
- Total Suspended Particulate: 0.64; measured
  TSP(papermaking stage)
- chemical oxygen demand: 0.008; measured
  CODcr(papermaking stage)
- biological oxygen demand: 0.002; measured
  BOD5(papermaking stage)
- total suspended solids, unspecified: 0.008; measured
  TSS(papermaking stage)
- hazardous waste (unspecified): 0.02; measured
  Hazardous Waste(papermaking stage)
- carbon dioxide: 55.93; software or database
  CO2(Transportation stage)
- Nitrogen oxides: 0.01; software or database
  NOx(Transportation stage)
- sulfur dioxide: 0.003; software or database
  SO2(Transportation stage)
- methane: 0.15; software or database
  CH4(Transportation stage)
- carbon monoxide: 0.16; software or database
  CO(Transportation stage)
- non-methane volatile organic compounds: 0.02; software or database
  PM10(Transportation stage)
- Total Suspended Particulate: 0.06; software or database
  NMVOC(Transportation stage)
- carbon dioxide: 90.78; software or database
  CO2(Chemical production stage)
- Nitrogen oxides: 0.01; software or database
  NOx(Chemical production stage)
- sulfur dioxide: 0.003; software or database
  SO2(Chemical production stage)
- methane: 0.13; software or database
  CH4(Chemical production stage)
- carbon monoxide: 0.04; software or database
  CO(Chemical production stage)
- particles (PM10): 0.01; software or database
  PM10(Chemical production stage)
- non-methane volatile organic compounds: 0.08; software or database
  NMVOC(Chemical production stage)
- Total Suspended Particulate: 0.01; software or database
  TSP(Chemical production stage)
- chemical oxygen demand: 0.053; software or database
  CODcr(Chemical production stage)
- biological oxygen demand: 0.12; software or database
  BOD5(Chemical production stage)
- nitrogen, total (excluding N2): 0.09; software or database
  TN(Chemical production stage)
- nitrate: 0.036; software or database
  nitrate root(Chemical production stage)
- phosphate: 0.04; software or database
  Phosphate(Chemical production stage)
- total suspended solids, unspecified: 0.034; software or database
  TSS(Chemical production stage)
- carbon dioxide: 7.39; measured
  CO2(Sewage treatment stage)
- sulfur dioxide: 0.001; measured
  NOx(Sewage treatment stage)
- methane: 0.001; measured
  SO2(Sewage treatment stage)
- carbon monoxide: 0.01; measured
  CH4(Sewage treatment stage)
- non-methane volatile organic compounds: 0.01; measured
  NMVOC(Sewage treatment stage)
- Total Suspended Particulate: 0.02; measured
  TSP(Sewage treatment stage)
- nitrogen, total (excluding N2): 0.024; measured
  TN(Sewage treatment stage)
- phosphorus, total: 0.006; measured
  TP(Sewage treatment stage)
- Waste solid: 68.79; measured
  waste(Sewage treatment stage)

## Deviations from the LCI method approaches
The eFootprint system is used to create the modules of the process units, enter the data parameters of the process units and analyse the inventory by linking the relationship variables of the process units. In addition, the data analysis process involves allocation procedures, firstly, energy consumption and environmental emissions in the energy production process are allocated to the different process units, and secondly, wastewater pollution loads in the wastewater treatment process are allocated to the different process units.

## Data selection and combination
Primary activity level data. Collected through enterprise research, provision by upstream plants, sampling and monitoring, such as resource and energy consumption including coal, waste paper, water, electricity, etc., gas emissions including CO2, NOx, SO2, CO, PM10, Nonmethane Volatile Organic Compound (NMVOC), etc., water emissions including Total Suspended Particu⁃ late (TSP), Chemical Oxygen Demand (COD), Biochemical Oxygen Demand (COD), and Biochemical Oxygen Demand (COD). Total Suspended Particu⁃ late (TSP), Chemical Oxygen Demand (COD), Biochemical Oxygen Demand (BOD), Total Nitrogen (TN), Total Phosphorus (TP), and so on. Total Nitrogen (TN), Total Phosphorus (TP), NO3 -, PO4 3-, Total Suspended Solids (TSS), etc., as well as data on solid waste such as fibre and sludge, hazardous waste such as liquid waste mineral oil, and transport distance of raw materials and products. The data collected is the average statistical data of the enterprise for the whole year of 2019 and reflects the actual production level of the enterprise.2. Sub-activity level data. Data that cannot be obtained from the actual research process, such as data on environmental emissions during the production of relevant chemicals and transport of raw materials and products, will be replaced by data from CLCD-China, ELCD 3.0, Ecoinvent, Ecoinvent 2.2 Public or relevant scientific and technological literature.

## Use advice
The acquired LCA data for the production of 1000 kg of corrugated base paper from waste paper is to serve as an inventory result, reflecting the consumption of resources and energy, as well as the environmental emissions in each process unit. The framework for data collection is primarily business-to-business (B2B). Primary activity level data are collected through field surveys, provided by upstream manufacturers, and monitoring. Secondary activity level data that cannot be directly obtained are supplemented by databases such as CLCD-China, ELCD 3.0, Ecoinvent, or related scientific literature. It is recommended to use the eFootprint system to input process unit data parameters and carry out inventory analysis. Attention should be paid to allocation procedures during data analysis, especially energy consumption and pollution loads in the wastewater treatment process. For production, focus on chemicals used in quantities greater than 1%/t of paper or environmental impacts exceeding 1% of the total system. Exclude production equipment, building facilities, and packaging materials. Assume a 50% empty load rate for raw material transport.

## Review details
Inventory: The internal review was done by several iteration steps concerning raw data validation, raw data documentation, representativity, completeness and consistency of modelling with regard to ISO 14040 and 14044.

## Data sources
- 赵国杰, 游亚杰, & 黄起帅. 基于生命周期评价的瓦楞原纸产品碳足迹评价. 中国造纸 40, 40–44 (2021).
