# Chicken production ; broiler rearing

Dataset: ILCD process, Unit process, single operation
Geography: SD-CN
Reference year: 2018
Classification: Unit processes / Materials production / Agricultural production means
Functional unit: The main output of broiler production is chicken, and the functional unit is 1 kg chicken
Generated by: Rui Yang, 1632707028@qq.com
Owner: Tiangong LCI Data Working Group
Review: Dependent internal review by Tiangong LCI Data Working Group
Amounts: no units in this file; such an amount is in the reference unit of its flow, which a separate flow dataset defines
copyright: false
licenseType: Free of charge for all users and uses

## General comment
The pollutants released to the environment during the feeding stage of broilers are mainly divided into the broiler itself and other energy consumption.

## Geography
Aiming at a broiler farm in Shandong province, the life cycle of large-scale broiler breeding was evaluated

## Technology and included processes
Aiming at a broiler farm in Shandong Province, the life cycle evaluation of large-scale broiler breeding was carried out. The system boundaries of broiler production included crop cultivation (fertilizer production, corn and soybean cultivation), soybean meal production, feed processing, feed transportation, broiler feeding and manure treatment. The main output of broiler production is chicken, and the functional unit is 1 kg chicken

## Technical purpose
The primary application of this process data set is for the production of chicken meat. This data is relevant for stakeholders in the poultry industry, particularly for those involved in the large-scale rearing of broilers. The life cycle data represents the environmental outputs associated with the production of 1 kg of chicken meat from a farm based in Shandong province, which can be employed in various ecological and sustainability assessments.

## Reference product
- chicken: 1; measured

## Inputs
- maize grain: 1.88; measured
  corn
- soybean: 1.1; measured
  soybeans
- Electricity: 0.54; measured
- hard coal: 0.26; measured

## Outputs
- nitrous oxide: 0.00143; measured
- ammonia: 0.0157; measured
- methane (biogenic): 0.00143; measured

## Data selection and combination
根据实地调研，整合饲养阶 段数据得出

## Use advice
Users should note that the LCA data set specifically reflects the environmental impact of broiler rearing in a large-scale setting in Shandong province. Users must consider the location-specific nature of this data when applying it to other geographic contexts. Care must be taken to account for regional differences in rearing practices and energy consumptions. Data users should ensure that the functional unit of 1 kg of chicken matches the scope of their sustainability assessment or ecological footprint calculations. It is essential to include all relevant inputs and outputs during the feeding phase and to understand that this data set may not fully represent the environmental impact of chicken production in different contexts or scales.

## Review details
Inventory: The internal review was done by several iteration steps concerning raw data validation, raw data documentation, representativity, completeness and consistency of modelling with regard to ISO 14040 and 14044.

## Data sources
- 牛学锐 & 韩美. 肉鸡规模化养殖的生命周期评价——以山东某养鸡场为例. 安徽农业科学 46, 48–52 (2018).
