# Bauxite Mining ; Bauxite ; Cradle ; 2013

Dataset: ILCD process, Unit process, single operation
Geography: CN
Reference year: 2021
Classification: Unit processes / Materials production / Non-energetic raw materials
Generated by: Zimeng Cai, caizm6178@163.com
Owner: Tiangong LCI Data Working Group
Review: Dependent internal review by Tiangong LCI Data Working Group
Amounts: no units in this file; such an amount is in the reference unit of its flow, which a separate flow dataset defines
copyright: false
licenseType: Free of charge for all users and uses

## General comment
氧化铝生产2017

## Time period
Date of publication

## Technical purpose
The Life Cycle Assessment data set for Bauxite Mining represents the extraction of bauxite ore, which is the primary raw material used in the production of aluminum. This material is crucial for various applications in the aluminum industry, including but not limited to the manufacturing of aluminum metal, refractory materials, abrasives, and the production of high-grade alumina for ceramics and chemical processing.

## Reference product
- bauxite: 5.06566e10; software or database

## Inputs
- Coal, brown, in ground: 3.3943e7; software or database
  coal
- Gasoline: 1.026e6; software or database
  gasoline
- Diesel oil: 2.3126e7; software or database
  diesel

## Data selection and combination
The data in this study refers to the LCA data of PA, SA, electricity, and other background data. The PA data were obtained from statistical data sources, and the SA data were mainly obtained from the literatures. The background data were mainly derived from the Chinese localization LCA database CAS RCEES 2018, which was established by the Research Center for Eco-Environmental Sciences, Chinese Academy of Sciences and covers LCA data for energy, materials, transportation, waste management etc.

## Use advice
When using this LCA data set for Bauxite Mining for the year 2013, it is important to consider that the PA (Primary Aluminum) data are derived from statistical sources and the SA (Semi-Automatic) data are primarily based on literature. The background LCA data are sourced from the CAS RCEES 2018 database, which provides Chinese localization for energy, materials, transportation, and waste management. Users should ensure that the scope of their assessment accurately includes the appropriate technological applicability and system boundaries, and that the data are consistent with the geographical and time-related context of the study. Any updates to the database or changes in mining processes after 2013 should also be taken into consideration.

## Review details
Inventory: The internal review was done by several iteration steps concerning raw data validation, raw data documentation, representativity, completeness and consistency of modelling with regard to ISO 14040 and 14044.

## Data sources
- Ding, N., Liu, N., Lu, B. & Yang, J. Life cycle greenhouse gas emissions of aluminum based on regional industrial transfer in China. J. Ind. Ecol. 25, 1657–1672 (2021).
