# Plexiglass ; PMMA: Polymethyl Methacrylate (also known as Acrylic or Plexiglass); monomer receiving tank

Dataset: ILCD process, Unit process, single operation
Geography: JX-CN
Classification: Unit processes / Materials production / Glass and ceramics
Generated by: He xiaxia, 18616148319@163.com
Owner: Tiangong LCI Data Working Group
Review: Dependent internal review by Tiangong LCI Data Working Group
Amounts: no units in this file; such an amount is in the reference unit of its flow, which a separate flow dataset defines
copyright: false
licenseType: Free of charge for all users and uses

## General comment
This data set refers to an industrial process involved in the production of Polymethyl Methacrylate (PMMA), commonly known as acrylic glass or Plexiglas. The monomer receiving tank is a critical unit operation where the monomer MMA (Methyl Methacrylate) is stored upon production or delivery. This specialized equipment is used in the chemical industry and serves as an intermediary step in the PMMA production line. PMMA produced via this process is utilized in various applications such as in the manufacturing of transparent structural materials, including aircraft windows, aquariums, and safety shields for machining processes.

## Reference product
- methyl methacrylate: 896.478; measured

## Inputs
- Electricity: 248.04; measured
- polymethyl methacrylate (PMMA) beads: 998.097; measured

## Outputs
All rows: measured
- polymethyl methacrylate (PMMA) beads: 26.062
- freshwater: 15.081
- organic waste (unspecified): 27.4685
- methanol: 8.88
- methacrylic acid: 11.9325
- methacrylate: 11.9325

## Use advice
When utilizing this data set for Life Cycle Assessment purposes, it is important to consider the energy consumption and emissions associated with the monomer receiving tank operation in the PMMA production process. Ensure all inputs and outputs are accounted for in the flow analysis to reflect the true environmental impact. Model the use phase behavior, such as storage time and conditions, accurately as they can affect the quality and polymerization rate of MMA. Consider the technological applicability, such as the scale of operation and modernity of the equipment used, to ensure relevance to the specific production context being assessed.

## Review details
Inventory: The internal review was done by several iteration steps concerning raw data validation, raw data documentation, representativity, completeness and consistency of modelling with regard to ISO 14040 and 14044.

## Data sources
- 江西旺达新材料有限公司年产20000吨有机玻璃原料生产项目
