# Groundwater remediation ; In-situ remediation ; Adsorption ; Preparation of adsorbents ; Calcination of adsorbents

Dataset: ILCD process, Unit process, single operation
Geography: ID
Reference year: 2022
Classification: Unit processes / Other Services / Repair and maintenance
Generated by: Xiao Meng, xiaomeng@mail.bnu.edu.cn
Owner: Tiangong LCI Data Working Group
Review: Dependent internal review by Tiangong LCI Data Working Group
Amounts: no units in this file; such an amount is in the reference unit of its flow, which a separate flow dataset defines
copyright: false
licenseType: Free of charge for all users and uses

## General comment
Calcinate the adsorbent in an electric furnace at 700 ° C for 1 hour.

## Technical purpose
The adsorbents produced by this process are designed for in-situ groundwater remediation. They are applied in the treatment of contaminated groundwater by adsorbing pollutants. Calcination is a key step in the preparation of these adsorbents, enhancing their properties to effectively remove contaminants from groundwater.

## Reference product
- Aluminium hydroxide/oxide nanoparticles adsorption (Calcined; final product): 3.06; measured
  Calcined Adsorbent

## Inputs
- Electricity: 9.9; measured
- Aluminium hydroxide/oxide nanoparticles adsorption (Drying): 3.06; measured
  Dry Adsorbent

## Use advice
When utilizing this data set for life cycle assessment, note that the calcination process at 700°C for 1 hour should be considered as part of the production phase of the adsorbents. Ensure all energy consumption and emissions associated with the electric furnace operation are accounted for. The data is specific to the described unit process and should not be generalized without proper adjustment. Exclude the potential recycling of the adsorbents unless data specific to recycling processes is available and relevant.

## Review details
Inventory: The internal review was done by several iteration steps concerning raw data validation, raw data documentation, representativity, completeness and consistency of modelling with regard to ISO 14040 and 14044.

## Data sources
- Goyal, H. & Mondal, P. Life cycle assessment (LCA) of the arsenic and fluoride removal from groundwater through adsorption and electrocoagulation: A comparative study. Chemosphere 304, 135243 (2022).
