# Refined iron ore production;Refined iron ore;Beneficiation(D01)

Dataset: ILCD process, Unit process, single operation
Geography: CN
Reference year: 1998
Classification: Materials production / Metals and semimetals
Generated by: Fuxiang, 1162850692@qq.com
Owner: Tiangong LCI Data Working Group
Review: Dependent internal review by Tiangong LCI Data Working Group
Amounts: no units in this file; such an amount is in the reference unit of its flow, which a separate flow dataset defines
copyright: false
licenseType: Free of charge for all users and uses

## General comment
来自表 4-17 D01 钢厂生产吨材环境负荷编目表

## Time period
论文提到钢铁企业环境总体数据为1998年的吨钢环境基础数据。

## Technical purpose
The high-grade iron ore produced via the beneficiation process is typically used for steelmaking activities. It serves as a primary raw material for blast furnaces and direct reduction processes in the iron and steel industry.

## Reference product
- Refined Iron Ore: 955; measured
  Concentrated iron ore

## Inputs
- Energy, geothermal, converted: 574.341; measured
- water: 2770; measured
- Iron ore: 1873; measured
  iron ore

## Outputs
- sulfur dioxide: 0.296; measured
- Suspended solids, unspecified: 0.01528; measured
- Spoil (deposited, hibernating in ground, non elementary flow): 894.835; measured

## Use advice
When utilizing this data for Life Cycle Assessment, consideration should be given to the specific technologies used within the beneficiation process, as these may impact the environmental profile of the iron ore product. Differences in energy consumption, water usage, and waste generation among various beneficiation methods should be accounted for. The data set is based on 1998 environmental baseline data for the iron and steel industry and may require updating to reflect technological advancements or changes in production processes.

## Review details
Inventory: The internal review was done by several iteration steps concerning raw data validation, raw data documentation, representativity, completeness and consistency of modelling with regard to ISO 14040 and 14044.

## Data sources
- 周和敏. 钢铁材料生产过程环境协调性评价研究. (北京工业大学, 2001).
