# Treatment process of hazardous waste ;Purchased diesel required for transportation,CN

Dataset: ILCD process
Geography: SH-CN
Classification: Unit processes / End-of-life treatment / Other end-of-life services
Generated by: Jiaqi Lu, wilsherelu@foxmail.com
Owner: Tiangong LCI Data Working Group
Review: Dependent internal review by Tiangong LCI Data Working Group
Amounts: no units in this file; such an amount is in the reference unit of its flow, which a separate flow dataset defines
copyright: true
licenseType: Free of charge for all users and uses

## General comment
The described process is utilized for the treatment of hazardous waste. The facility specializes in the safe and regulated disposal of dangerous materials. Additionally, the requirement for purchased diesel refers to the transportation of hazardous waste to the treatment facility. The diesel is used exclusively for vehicles designed and authorized to handle and transport such materials, typically over various distances within a regulated framework.

## Reference product
- Hazardous waste treatment: 1000; input; measured
  Process 1 ton of hazardous waste

## Inputs
- Electricity: 226.8; measured
  electricity
- natural gas,natural gas: 4.17; measured
  natural gas
- Diesel: 0.26; measured
  diesel fuel

## Use advice
When using this data set, ensure to include the purchased diesel as part of the indirect environmental impact of the hazardous waste treatment process. The fuel consumption should be accounted for in the life cycle assessment as it is a critical component of the transportation phase. Additionally, considerations for the end-of-life treatment of vehicles and recycling or disposal of parts and fluids should be made. Users should refer to the latest environmental regulations and standards to ensure compliance in the modeling of this hazardous waste transportation and treatment process.

## Review details
Inventory: The internal review was done by several iteration steps concerning raw data validation, raw data documentation, representativity, completeness and consistency of modelling with regard to ISO 14040 and 14044.

## Data sources
- 上海市市政固废调研结果
