# Municipal wastewater treatment ; Wastewater ; Complete mixed activated-sludge technology

Dataset: ILCD process, Unit process, black box
Geography: TH
Reference year: 2014
Valid until: 2014
Classification: Unit processes / End-of-life treatment / Waste water treatment
Generated by: YU Chenyang, yuchenyang0506@foxmail.com
Owner: Tiangong LCI Data Working Group
Review: Dependent internal review by Tiangong LCI Data Working Group
Amounts: no units in this file; such an amount is in the reference unit of its flow, which a separate flow dataset defines
copyright: ['opt4ROkqig']
licenseType: Free of charge for all users and uses

## General comment
Fully mixed activated sludge technology is a biological treatment method that utilizes microorganisms to convert organic substances in wastewater into water and carbon dioxide. By fully mixing and reacting sewage with activated sludge, it achieves the purpose of efficiently purifying wastewater and is widely used in urban and industrial wastewater treatment.

## Geography
Dindaeng,Thailand

## Time period
2014年

## Technology and included processes
The fully mixed activated sludge technology consists of the following processes:Intake and mixing: Wastewater is introduced into the treatment system and mixed thoroughly with activated sludge already present in the reactor.Biodegradation: The mixed wastewater comes into contact with the activated sludge in the reactor, where microorganisms degrade the organic substances in the wastewater into water and carbon dioxide.Sedimentation: The treated water is settled for a period of time so that the sludge particles settle to the bottom to form sludge deposits.Sludge Return: A part of the activated sludge that has settled is returned to the reactor to maintain the number and activity of microorganisms in the sludge.Clean Water Discharge: The treated water is discharged through the outlet and the clean water is released to the environment.

## Technical purpose
The described process refers to the treatment of municipal wastewater using complete mixed activated-sludge technology. This technology is typically used in municipal wastewater treatment facilities to reduce the levels of organic matter, suspended solids, and nutrients in sewage, producing effluent that meets environmental discharge standards. The data set is representative for municipal wastewater treatment processes in Dindaeng, Thailand, as of the year 2014.

## Reference product
- Wastewater: 1; measured

## Inputs
- Electricity: 0.936; measured
- transport in t*km: 2.82e-14; measured
  transport by lorry
- Polyaluminium Chloride: 4e-5; measured
  polymer

## Outputs
All rows: measured
- Waste (solid): 0.0014
- nitrogen, total (excluding N2): 0.0084
- phosphorus, total: 0.0012
- Suspended solids, unspecified,Suspended solids, unspecified,Suspended solids, unspecified: 0.009
- chemical oxygen demand: 0.0202
- biological oxygen demand: 0.0063
- nitrous oxide: 0.00012
- methane (biogenic),methane (biogenic): 0.00096
  The original text does not provide information on biogenic and fossil sources. According to experts, it is classified as fossil.
- carbon dioxide (biogenic): 0.0189
  (same comment as for methane (biogenic),methane (biogenic))
- Sludge: 0.0849

## Use advice
Users of this data set should note that the information is specific to municipal wastewater treatment facilities utilizing complete mixed activated-sludge technology in Dindaeng, Thailand, during 2014. The data should be used with caution when applying to different geographical locations or timeframes, as the technology, regulations, and influent wastewater characteristics may vary. Users should also consider any updates to technology, regulatory changes, or shifts in influent composition when utilizing this data set. If the intention is to use the data in life cycle assessment, appropriate allocation procedures must be followed, especially if there is a co-product or waste recycling involved.

## Review details
Inventory: The internal review was done by several iteration steps concerning raw data validation, raw data documentation, representativity, completeness and consistency of modelling with regard to ISO 14040 and 14044.

## Data sources
- Polruang, S., Sirivithayapakorn, S. & Prateep Na Talang, R. A comparative life cycle assessment of municipal wastewater treatment plants in Thailand under variable power schemes and effluent management programs. Journal of Cleaner Production 172, 635–648 (2018).
