# Production of epoxy resin ; polypropylene production

Dataset: ILCD process, Unit process, single operation
Geography: YL-GX-CN
Reference year: 2012
Classification: Materials production / Organic chemicals
Functional unit: The generation of 1 kW h (kW h) of electricity is adapted as the functional unit in this study, and the corresponding amounts of CO2 emissions and air pollutants (SO2,NOX and PM10)perkWh of electricity are chosen as the indicators for environmental performances, and the monetary value (US$) of per kW h of electricity is chosen as the indicator for cost-effectiveness evaluation.
LCI method principle: Attributional
LCI method approaches: Allocation
Generated by: Yunzhi Zhao, ll10088@163.com
Owner: Tiangong LCI Data Working Group
Review: Dependent internal review by Tiangong LCI Data Working Group
Amounts: no units in this file; such an amount is in the reference unit of its flow, which a separate flow dataset defines
copyright: false
licenseType: Free of charge for all users and uses

## General comment
This dataset represents the life cycle of a wind power generation system within a typical wind farm in Yulin City, Guangxi Zhuang Autonomous Region, China. This system is used in the evaluation of environmental and economic performance of wind energy as compared to thermal power. The production process of both epoxy resin and polypropylene is involved as part of the manufacturing stage of the wind turbines' components. These materials are commonly used in the construction of wind turbine blades and components, owing to their strength, durability, and resistance to environmental factors.

## Geography
In this study, the typical wind farm system in Yulin City of Guangxi of Zhuang Autonomous Region China was selected as a case study site. The developer, namely, China Huadian Corporation, is a state-owned enterprise and devotes to develop wind power by providing wind power equipment and related service in China [37].

## Reference product
- polyvinylchloride resin (E-PVC): 1; article inperiodical

## Outputs
- carbon dioxide: 3.94; article inperiodical
- nitrous oxide: 0.0147; article inperiodical
- sulfur dioxide: 0.0229; article inperiodical

## Deviations from the LCI method approaches
According to Introduced by the life cycle assessment approach [34,35], firstly the system boundaries boundary of wind energy as well as and thermal power are first identified. Then, methodology on evaluating both environmental and economic benefits is presented so that co-benefits can be quantified followed by the introduction of the methodologies on environmental as well as economic impacts evaluation from the co-benefits perspective.

## Data selection and combination
This wind farm is equipped with 24 wind turbines, with a production capacity of 1.25 MW for each turbine, and t the operation life for each turbine is expected to be 20 years. The life cycle of one wind power system can be divided into five stages, including (1) production, (2) transportation and installation, (3) power generation, (4) maintenance, and (5) end-of-life recycling and disposal. The input of non-renewable energy has been shown in each stage. In this study, raw material, fossil fuel consumption and corresponding emissions have been taken into account of a life cycle process. Meanwhile, cost-effectiveness of a wind farm is considered because the cost plays a very important role in operating a wind farm [38]. Considering the data reliability and availability, the cost data of this wind farm was mainly extracted from a feasibility report of one wind farm (with a designed capacity of the 49.5 MW) in Kang ping County of Liaoning province [39].

## Use advice
When utilizing this dataset, users should adhere to the system boundaries as defined for wind energy and thermal power within the study. Users need to apply the provided life cycle assessment methodology for the evaluation of environmental and economic impacts. This includes considering the raw material consumption, energy use, and emissions across the life cycle—a functional unit of 1 kWh of electricity generation. For cost-effectiveness analysis, the monetary value of electricity per kWh should be considered. It is essential to account for the reliability and availability of the data, particularly cost data which is derived from the feasibility report of a wind farm in Kangping County, Liaoning Province.

## Review details
Inventory: The internal review was done by several iteration steps concerning raw data validation, raw data documentation, representativity, completeness and consistency of modelling with regard to ISO 14040 and 14044.
