# cement milling;cement, ordinary portland cement

Dataset: ILCD process, Unit process, single operation
Geography: CS-HUN-CN
Classification: Materials production / Other mineralic materials
Generated by: Siqi Yang, ysqsophia@gmail.com
Owner: Tiangong LCI Data Working Group
Review: Dependent internal review by Tiangong LCI Data Working Group
Amounts: no units in this file; such an amount is in the reference unit of its flow, which a separate flow dataset defines
copyright: false
licenseType: Free of charge for all users and uses

## General comment
Ordinary Portland cement (OPC)

## Geography
A typical cement plant in Changsha, Hunan Province, China

## Technical purpose
The ordinary Portland cement (OPC) produced through the cement milling process at a typical cement plant in Changsha, Hunan Province, China, is intended for general construction use. It is applicable for creating concrete, mortar, stucco, and non-specialty grout. The OPC has a defined compressive strength of 42.9 MPa, making it suitable for a wide range of construction applications from residential buildings to infrastructure projects.

## Model description
A functional unit (FU) is defined as 1 kg of mixed cement with a compressive strength of 42.9 MPa.

## Reference product
- cement, ordinary portland cement: 1000
  OPC

## Inputs
- clinker: 938
  Clinker
- gypsum stone (CaSO4-dihydrate): 67.6
  Gypsum
- electricity, medium voltage: 245.88
  Electricity. Electricity is generated from thermal power.

## Outputs
- particles (> PM10): 2.41e-5
  PM. The particle size is not specified. Here we treat it as PM>10.

## Deviations from the LCI method approaches
Some data related to the background system were obtained from the Ecoinvent 3.1 database.

## Data selection and combination
Inventory data for the Prospect system is collected directly from cement plants located in Changsha, Hunan Province, China.

## Use advice
When utilizing this LCA data of ordinary Portland cement from Changsha, data users should adhere to the functional unit of 1 kg of mixed cement with a compressive strength of 42.9 MPa. For environmental impacts assessments, the inclusion/exclusion of the end-of-life phase (e.g., recycling and waste treatment) should be carefully considered and consistent with the goal and scope of the study. The data from the Ecoinvent 3.1 database used for the background system should be used in conjunction with the primary data collected from the Changsha cement plant to ensure the accuracy and regional specificity of the impact assessment.

## Review details
Inventory: The internal review was done by several iteration steps concerning raw data validation, raw data documentation, representativity, completeness and consistency of modelling with regard to ISO 14040 and 14044.

## Data sources
- Qinli Zhang, Bingyi Zhang, & Daolin Wang. (2022). Environmental Benefit Assessment of Blended Cement with Modified Granulated Copper Slag. MATERIALS, 15(15).
