# Shale gas production

Dataset: ILCD process
Geography: SC-CN
Classification: Energy carriers and technologies / Natural gas based fuels
Generated by: Pu Hong, 15695258655@163.com
Owner: Tiangong LCI Data Working Group
Review: Dependent internal review by Tiangong LCI Data Working Group
Amounts: no units in this file; such an amount is in the reference unit of its flow, which a separate flow dataset defines
licenseType: Free of charge for all users and uses

## General comment
The dataset represents the process of shale gas production, which is predominantly carried out in the Sichuan and Chongqing regions of China. Shale gas, as a natural gas found trapped within shale formations, is utilized for several applications, including as a fuel for electricity generation, heating, and as a feedstock in the chemical industry for producing a wide range of chemical products.

## Geography
China's shale gas extraction work is currently concentrated in the Sichuan and Chongqing areas, and the data from Sichuan and Chongqing are selected for LCA calculations.

## Reference product
- Methane: 8.092e7; uniform; article inperiodical
  页岩气井全生命周期产量（包含泄漏部分）

## Inputs
All rows: article inperiodical
- gravel: 163000; min 12000; max 359000; uniform
  Gravel used for road construction
- Diesel: 1050; min 50; max 2877; uniform
  Transportation of equipment and gravel
- gravel: 1.005e6; min 912000; max 1.191e6; uniform
  Gravel used in well site construction
- Diesel: 4122; min 3741; max 4886; uniform
  Transportation of equipment and gravel
- waterproof fabric: 2627; min 1163; max 3366; uniform
  场地准备阶段--淡水蓄水池建设所用防水布
- #325 cement: 164000; min 110000; max 220000; uniform
  Components of C30 concrete
- sand: 281000; min 189000; max 377000; uniform
  Components of C30 concrete
- gravel: 485000; min 327000; max 651000; uniform
  Components of C30 concrete
- freshwater: 77000; min 52000; max 103000; uniform
  Components of C30 concrete
- Diesel: 3791; min 2382; max 5238; uniform
  Used for material transportation, etc.
- Electricity: 1519.2; min 1022.4; max 2037.6; uniform
  Used for concrete mixing, etc.
- #325 cement: 199000; min 149000; max 282000; uniform
  Components of C30 concrete
- sand: 341000; min 255000; max 482000; uniform
  Components of C30 concrete
- gravel: 590000; min 441000; max 834000; uniform
  Components of C30 concrete
- freshwater: 94000; min 70000; max 132000; uniform
  Components of C30 concrete
- Diesel: 5050; min 3689; max 7251; uniform
  Used for material transportation, etc.
- Electricity: 1846.8; min 1382.4; max 2610; uniform
  Used for concrete mixing, etc.
- #325 cement: 23000; min 10000; max 36000; uniform
  Components of C30 concrete
- sand: 40000; min 16000; max 62000; uniform
  Components of C30 concrete
- gravel: 69000; min 28000; max 108000; uniform
  Components of C30 concrete
- freshwater: 11000; min 4000; max 17000; uniform
  Components of C30 concrete
- Diesel: 469; min 173; max 789; uniform
  Used for material transportation, etc.
- Electricity: 216; min 90; max 338.4; uniform
  Used for concrete mixing, etc.
- freshwater: 627000; min 330000; max 849000; uniform
  Components of water-based and oil-based drilling fluids
- Diesel: 330; min 267; max 432; uniform
  Oil-based drilling fluid components
- bentonite: 21000; min 12000; max 30000; uniform
  Oil-based drilling fluid components
- Limestone: 42000; min 34000; max 54000; uniform
  Oil-based drilling fluid components
- calcium chloride: 61000; min 50000; max 80000; uniform
  Oil-based drilling fluid components
- Diesel: 395000; min 220000; max 522000; uniform
  Drilling equipment
- Diesel: 2596; min 1453; max 3642; uniform
  Material transportation
- casing: 607000; min 353000; max 760000; uniform
  钻井阶段-固井流程消耗的套管
- freshwater: 293000; min 72000; max 419000; uniform
  G grade cement slurry components
- G class cement: 405000; min 235000; max 499000; uniform
  G grade cement slurry components
- Diesel: 4682; min 2709; max 5806; uniform
  Transporting materials and driving equipment
- freshwater: 104000
  clean well
- Diesel: 451000
  Clean water and wastewater transportation
- freshwater: 2.6071e7; min 1.0253e7; max 4.0237e7; uniform
  Fracturing fluid composition
- sand: 1.253e6; min 304000; max 1.91e6; uniform
  Fracturing fluid composition
- Diesel: 6470; min 2025; max 9920; uniform
  Material, water and wastewater transportation
- Diesel: 209794; min 82508; max 323791; uniform
  Use of field equipment
- Diesel: 1189; min 906; max 1479; uniform
  transport wastewater
- freshwater: 295000; min 174000; max 432000; uniform
  Domestic water use during the project
- Diesel: 25; min 14; max 36; uniform
  Domestic water transportation during the project

## Outputs
- waste water - untreated: 100000; article inperiodical
  wastewater produced
- waste water - untreated: 209000; min 82000; max 322000; uniform; article inperiodical
  wastewater produced
- methane: 1679.72; calculated
  Methane emissions during testing phase
- carbon dioxide (fossil): 226343; calculated
  Emission of CO2 generated by methane combustion during the test phase
- waste water - untreated: 268000; min 205000; max 268000; uniform; article inperiodical
  Wastewater generated during the production phase of the entire life cycle

## Use advice
When using the dataset for Life Cycle Assessment (LCA) calculations of products or services involving shale gas, ensure that the geographical scope is consistent with the region from which the data was sourced, namely Sichuan and Chongqing. Attention should be paid to the impact assessment phase to consider the local environmental impact categories. Additionally, users should account for technological advancements in extraction techniques and potential variations in data due to policy changes or natural resource availability when applying this dataset.

## Review details
Inventory: The internal review was done by several iteration steps concerning raw data validation, raw data documentation, representativity, completeness and consistency of modelling with regard to ISO 14040 and 14044.

## Data sources
- Wang, J., Liu, M., McLellan, B. C., Tang, X. & Feng, L. Environmental impacts of shale gas development in China: A hybrid life cycle analysis. Resources, Conservation and Recycling 120, 38–45 (2017).
