# NCM Bioleaching method recycling

Dataset: ILCD process, Unit process, single operation
Geography: SD-CN
Reference year: 2016
Classification: Unit processes / End-of-life treatment / Material recycling
Functional unit: Functional unit is 1 kg of EoL zinc-manganese batteries treated by bioleaching method.
Generated by: huzhikang, hzk2503593129@163.com
Owner: Tiangong LCI Data Working Group
Review: Dependent internal review by Tiangong LCI Data Working Group
Amounts: no units in this file; such an amount is in the reference unit of its flow, which a separate flow dataset defines
copyright: false
licenseType: Free of charge for all users and uses

## General comment
The method basically consists of two processes: the bioleaching process and the preparation process. In the bioleaching process, the metals in the battery powder are leached into a solution and then recovered in the preparation process. The biofiltration process consists of two steps, the preparation of the battery powder and the culture of the bacteria.

## Technical purpose
The described bioleaching process is aimed at recycling end-of-life (EoL) nickel-cobalt-manganese (NCM) batteries, through a biological treatment procedure that leaches metallic elements from battery powder into solution for recovery. This technology is suitable for applications that involve the reclamation of valuable metals from spent batteries, such as in battery manufacturing and materials recovery facilities that specialize in upcycling EoL battery components.

## Reference product
- EoL zinc-manganese battery: 1; input

## Inputs
- Ammonium sulfate: 0.02703
  (NH4)2SO4
- Potassium Dihydrogen Phosphate: 0.01351
  KH2PO4
- Magnesium Sulfate Heptahydrate: 0.01351
  MgSO4·7H2O
- calcium chloride: 0.00338
  CaCl2 (Calcium chloride)
- sulfur: 0.10811
  S
- Ferrous disulfide: 0.10811
  Fe2S (Ferrous disulfide)
- Ferric Sulfate: 1.89189
  Fe2(SO4)3 (Ferric sulfate)
- sodium hydroxide: 1.89189
  NaOH
- Zinc sulfate: 0.30459
  ZnSO4
- Sulfuric acid: 0.00619
  H2SO4
- freshwater: 0.052
  Tap water
- Electricity: 77.076
- copper: 0.02
  Cu（recycled material）

## Outputs
- Manganese dioxide: 0.02474
  MnO2
- zinc oxide: 0.01939
  ZnO
- lead: 2.17e-5
  Pb
- cadmium: 6.94e-8
  Cd (cadmium)
- mercury: 1.12e-6
  Hg (mercury)
- carbon-14: 0.00351
  C（Carbon）
- PVC: 0.015
  PVC（Polyvinyl chloride）
- waste paper (unspecified): 0.015
  Paper
- Nylon: 0.015
- Sludge: 0.52213
  Mud
- waste water - untreated: 0.05676
  Waste water
- Fe(Ni,2.06%): 0.194
  Fe(Ni，2.06%）
- copper: 0.02
  Cu（recycled material）
- Zn0.6Mn0.4Fe2O4: 1.0649

## Data selection and combination
The data are mainly from experiments. The technology of biological leaching method for treating waste front pavement batteries developed by the co-workers of this group has been developed rapidly, and a 100L pilot experiment has been carried out in Qihe, Shandong Province, with good results. Data on energy, water, material consumption, solid waste and wastewater production were obtained from actual measurements in the pilot experiment; data on gas emissions were measured and calculated experimentally; the amount of recycled materials, iron and copper, was calculated from references; data on the production of thermal power, road transport, production of sodium hydroxide, and disposal of wastewater were obtained from Chinese literature. Production of other chemicals, metal recycling, solid waste landfill, etc. were taken from European databases.

## Use advice
When applying the data of the bioleaching process from this dataset, attention should be paid to the experimental nature of the input data, which was obtained from pilot experiments. Users should consider the scalability of the process when applying it to larger or industrial-scale operations. The data on energy and resource flows should be adapted to reflect changes in process scale. Additionally, for life cycle inventory analysis, the inclusion of indirect processes, such as production of electricity, road transport, sodium hydroxide production, wastewater disposal, and other chemical production should follow Chinese or European dataset references as appropriate to the geographical scope of the study.

## Review details
Inventory: The internal review was done by several iteration steps concerning raw data validation, raw data documentation, representativity, completeness and consistency of modelling with regard to ISO 14040 and 14044.

## Data sources
- 孙明星. 中国废旧电池回收路径与管理体系研究. (山东大学, 2016).
