# Raw material feeding ; Biogas ; Biomass ; Anaerobic fermentation ; All sizes; NESPS2 / 原料进料 ; 沼气 ; 生物质 ; 厌氧发酵 ; 所有规模 ; 采用粪便作为原料生产沼气或生物天然气，在进料工段的产污系数 ; 全国第二次污染普查数据

Dataset: ILCD process, Unit process, single operation
Geography: CN
Reference year: 2019
Classification: Reference Parameters / Energy carriers and technologies / Renewable fuels
Generated by: The data was created by the Office of the Second National Pollution Source Census of the Ministry of Ecology and Environment, and the data was organized by the TianGong Plan team for ILCD format / 生态环境部第二次全国污染源普查工作办公室创建数据，天工计划团队常慧敏整理数据为ILCD格式
Owner: Tiangong LCI Data Working Group / 天工LCI数据工作小组
Review: Dependent internal review by Tiangong LCI Data Working Group / 天工LCI数据工作小组
Amounts: no units in this file; such an amount is in the reference unit of its flow, which a separate flow dataset defines
copyright: false
licenseType: Free of charge for all users and uses

## General comment
the Technical of end-of-pipe management technology for pollution BiomassisBiological filtration method，Its Technical efficiency of end-of-pipe management67.3，The formula for calculating the actual operation rate (k-value) of the end-of-pipe treatment facility is k = opreating time of treatment facilities (hours/year) / normal production time (hours/year)

## Technical purpose
该数据集描述的生物质厌氧发酵生成沼气的工艺，旨在用于各种规模的可再生能源发电应用。该过程可以用于将农业废弃物、动物废弃物和其他有机物料转化为沼气，沼气可用于供暖、发电或作为车辆燃料。此外，采用生物过滤法的末端治理技术，其针对硫化氢的效率为67.3%，针对氨气的效率为49.49%，主要用于生物气设施中管理和减轻硫化氢和氨气排放的污染。

## Reference product
- Biomass: 1000; input; calculated
  源文件中描述为为生物质，此处对其进行了匹配工作，将其匹配到LCAflow库里面相最符合的流

## Outputs
- hydrogen sulfide: 0.000654; calculated
  the Technical of end-of-pipe management technology for pollution hydrogen sulfideisBiological filtration method，Its Technical efficiency of end-of-pipe management67.3，The formula for calculating the actual operation rate (k-value) of the end-of-pipe treatment facility is k = opreating time of treatment facilities (hours/year) / normal production time (hours/year)
  污染物指标硫化氢的末端治理技术是生物过滤法，其效率为67.3，末端治理设施实际运行率（k值）计算公式为k=工艺废气净化装置耗电量（千瓦时/年）/（工艺废气净化装置额定功率（千瓦）×工艺废气净化装置运行时间（小时/年））。原文件中描述污染物类别为废气，污染物指标为硫化氢，此处对其进行了匹配工作，将其匹配到LCAflow库里面相最符合的流
- ammonia: 0.00429335; calculated
  the Technical of end-of-pipe management technology for pollution ammoniaisBiological filtration method，Its Technical efficiency of end-of-pipe management49.49，The formula for calculating the actual operation rate (k-value) of the end-of-pipe treatment facility is k = opreating time of treatment facilities (hours/year) / normal production time (hours/year)
  污染物指标氨的末端治理技术是生物过滤法，其效率为49.49，末端治理设施实际运行率（k值）计算公式为k=工艺废气净化装置耗电量（千瓦时/年）/（工艺废气净化装置额定功率（千瓦）×工艺废气净化装置运行时间（小时/年））。原文件中描述污染物类别为废气，污染物指标为氨，此处对其进行了匹配工作，将其匹配到LCAflow库里面相最符合的流

## Use advice
This dataset is derived from the Pollution Source Census Report and contains information on pollution emissions and related products. However, it does not include data on energy or chemical consumption, nor does it provide information on waste or co-product generation. When utilizing this dataset, please supplement the missing data based on actual conditions before use
该数据集来源于污染源普查报告，包含污染物排放及相关产品信息，但不包含能源或化学品消耗数据，也不提供废弃物或共生产物产生信息。在使用该数据集时，请根据实际情况补充缺失数据后再使用。

## Review details
Inventory: The internal review was done by several iteration steps concerning raw data validation, raw data documentation, representativity, completeness and consistency of modelling with regard to ISO 14040 and 14044.
清单： 内部审查通过几个迭代步骤完成，涉及原始数据验证、原始数据记录、代表性、完整性、与 ISO 14040 和 14044 有关的建模的一致性。

## Data sources
- 第二次全国污染源普查产排污核算系数手册（试用版）,二级代码45,四级代码4513文件，在完整版文件中第2496页
