# Aluminum Recycling ; Recycled Aluminum Ingots ; Scrap Aluminum ; 2011

Dataset: ILCD process, Unit process, single operation
Geography: CN
Reference year: 2021
Classification: Unit processes / Materials production / Metals and semimetals
Generated by: Zimeng Cai, caizm6178@163.com
Owner: Tiangong LCI Data Working Group
Review: Dependent internal review by Tiangong LCI Data Working Group
Amounts: no units in this file; such an amount is in the reference unit of its flow, which a separate flow dataset defines
copyright: false
licenseType: Free of charge for all users and uses

## General comment
The technical usage of recycled aluminum ingots comprises their application in manufacturing various aluminum products such as automobile parts, construction materials, packaging, and electronics, substituting the primary aluminum and thus reducing the demand for energy-intensive aluminum production processes.

## Time period
Date of publication

## Reference product
- secondary aluminium ingot: 1000; missing unimportant
  ingot

## Inputs
- electricity, high voltage, aluminium industry: 925.2; missing unimportant
  electricity
- aluminium scrap, unspecified: 1350; missing unimportant
  aluminum scrap

## Data selection and combination
The data in this study refers to the LCA data of PA, SA, electricity, and other background data. The PA data were obtained from statistical data sources, and the SA data were mainly obtained from the literatures. The background data were mainly derived from the Chinese localization LCA database CAS RCEES 2018, which was established by the Research Center for Eco-Environmental Sciences, Chinese Academy of Sciences and covers LCA data for energy, materials, transportation, waste management etc.

## Use advice
Users should consider the methodological consistency when applying this data set to their LCA: ensure the background data from the CAS RCEES 2018 database is compatible with the system boundaries of the studied process. It's important to account for potential technological changes since 2011. When modeling the use phase, the efficiency of aluminum recirculation and the quantity of replaced primary aluminum should be considered. Additionally, users should take into account regional variations in electricity consumption and sourcing, particularly in the case of China's evolving energy mix.

## Review details
Inventory: The internal review was done by several iteration steps concerning raw data validation, raw data documentation, representativity, completeness and consistency of modelling with regard to ISO 14040 and 14044.

## Data sources
- Ding, N., Liu, N., Lu, B. & Yang, J. Life cycle greenhouse gas emissions of aluminum based on regional industrial transfer in China. J. Ind. Ecol. 25, 1657–1672 (2021).
