# Electricity production ; Thermal power ; Hainan

Dataset: ILCD process, Unit process, single operation
Geography: HAIN-CN
Reference year: 2019
Classification: Unit processes / Energy carriers and technologies / Electricity
Generated by: Ruoxi Xiong, xiongrx0126@163.com
Owner: Tiangong LCI Data Working Group
Review: Dependent internal review by Tiangong LCI Data Working Group
Amounts: no units in this file; such an amount is in the reference unit of its flow, which a separate flow dataset defines
copyright: false
licenseType: Free of charge for all users and uses

## General comment
Thermal power generation includes seventeen fossil fuels such as raw coal, washed coal, oil and natural gas. The process only considers the direct power generation process, not the upstream raw material extraction and processing and the downstream power consumption

## Time period
Calculated based on data from the 2019 Energy Statistics Yearbook

## Technical purpose
This dataset represents the electricity generation process in Hainan using thermal power. It covers the utilization of seventeen types of fossil fuels including raw coal, washed coal, oil, and natural gas for the exclusive purpose of direct power generation. This data is relevant for understanding energy production in thermal power plants and can be used for planning, analysis, and optimization within the energy sector.

## Reference product
- electricity for thermal power: 3.6; calculated

## Inputs
- Raw coal: 0.393387; calculated
- Diesel: 1.412e-5; calculated
- natural gas: 0.013744; calculated

## Outputs
- carbon dioxide (fossil): 0.753413; calculated
- sulfur dioxide: 0.000126466; calculated
- Nitrogen oxides: 0.00019944; calculated
- particles (> PM10): 2.4185e-5; calculated

## Data treatment and extrapolations
For the accounting method, please refer to the "Enterprise Greenhouse Gas Emissions Accounting Methods and Reporting Guidelines for Power Generation Facilities". Different forms of power generation and fuel consumption come from Chapter 3 (Energy Production) and Chapter 6 (Regional Energy Balance Sheet) in the "China Energy Statistical Yearbook 2020". The fuel parameters such as low calorific value and carbon content per unit calorific value used to calculate the carbon dioxide emission factor come from the "2019 China Regional Power Grid Carbon Dioxide Baseline Emission Factor Calculation Instructions OM" and the "Enterprise Greenhouse Gas Emission Accounting Method and Reporting Guide for Power Generation Facilities" 》

## Use advice
Users of this dataset should refer to the 'Enterprise Greenhouse Gas Emissions Accounting Methods and Reporting Guidelines for Power Generation Facilities' for the appropriate accounting method. The dataset is calculated based on information from the '2019 Energy Statistics Yearbook' specifically, energy production statistics and regional energy balances. Parameters utilized for carbon dioxide emissions calculations, such as low calorific value and carbon content per unit of heat, should be sourced from the '2019 China Regional Power Grid Carbon Dioxide Baseline Emission Factor Calculation Instructions OM' and the related enterprise greenhouse gas guidelines. Users should not consider upstream raw material extraction and processing or downstream consumption when utilizing this data. It is strictly for analyzing direct power generation impacts.

## Review details
Inventory: The internal review was done by several iteration steps concerning raw data validation, raw data documentation, representativity, completeness and consistency of modelling with regard to ISO 14040 and 14044.

## Data sources
- 熊若熙. 中国电力生产和消费二氧化碳与污染物排放因子核算. (清华大学, 2023).
