# Soil remediation ; ex situ remediation ; Biopile ; Engineering implementation ; Soil excavation ; contaminated soil

Dataset: ILCD process, Unit process, single operation
Geography: KR
Reference year: 2011
Classification: Unit processes / Other Services / Repair and maintenance
Generated by: Sang Chunhui, sangch@mail.bnu.edu.cn
Owner: Tiangong LCI Data Working Group
Review: Dependent internal review by Tiangong LCI Data Working Group
Amounts: no units in this file; such an amount is in the reference unit of its flow, which a separate flow dataset defines
copyright: false
licenseType: Free of charge for all users and uses

## General comment
Pollution source area of 200 square meters, pollution depth of 5 meters, and cleaning of polluted soil

## Technical purpose
This data set describes a soil remediation process utilizing ex situ biopile technology, which is applied to sites where soil contamination is present. It is specifically intended for areas with a source of pollution covering 200 square meters and a contamination depth of 5 meters. The biopile technique is suitable for engineering projects that involve the excavation of contaminated soils and their subsequent treatment to reduce pollution levels.

## Reference product
- Excavated soil,Excavated soil: 1000; estimated

## Inputs
- Diesel: 0.803; estimated

## Use advice
When using this data set for LCA, it is essential to ensure that all input materials and energy consumption reported in the standardization report for the biopile remedial system are incorporated. Users should account for the site-specific conditions such as soil type and contaminant characteristics and ensure the system boundaries are accurately reflected in the model. Also, attention should be given to the representativeness of the data in terms of geographical, technical, and temporal dimensions to guarantee the validity of the LCA results.

## Review details
Inventory: The internal review was done by several iteration steps concerning raw data validation, raw data documentation, representativity, completeness and consistency of modelling with regard to ISO 14040 and 14044.

## Data sources
- Jeong, S.-W. & Suh, S.-W. Assessment of Environmental Impacts and CO 2 Emissions from Soil Remediation Technologies using Life Cycle Assessment - Case Studies on SVE and Biopile Systems -. Journal of Korean Society of Environmental Engineers 33, 267–274 (2011).
