# Substrate Remediation;Ex situ Remediation;Phytoremediation;Construction;Phytoremediation Plant

Dataset: ILCD process, Unit process, single operation
Geography: IT
Reference year: 2013
Classification: Unit processes / Other Services / Repair and maintenance
Generated by: Wang Ning, wang_ning@caep.org.cn
Owner: Tiangong LCI Data Working Group
Review: Dependent internal review by Tiangong LCI Data Working Group
Amounts: no units in this file; such an amount is in the reference unit of its flow, which a separate flow dataset defines
copyright: false
licenseType: Free of charge for all users and uses

## General comment
Construction of phytoremediation plants using steel, concrete, etc.

## Technical purpose
The described process is intended for the construction of phytoremediation plants, which are facilities designed to utilize plants for the remediation of contaminated soils, sediments, and water. These plants are constructed using major construction materials such as steel, concrete, and other essential building components. This construction process is relevant for environmental engineering projects aimed at site cleanup through biological means, particularly in industrial or brownfield sites where land pollution is a concern.

## Reference product
- Phytoremediation plant: 1; measured

## Inputs
All rows: measured
- Concrete: 2.071e6
- Steel: 339900
- gravel: 5.0962e7
- sand: 2.4e7
- Waterproofing membrane: 577
- Chromium steel: 9200
- polyethylene high density granulate (PE-HD): 44100

## Use advice
When utilizing this data set for Life Cycle Assessment (LCA), ensure that it is appropriately scoped within the boundaries of the LCA study to include all upstream processes related to material extraction and production of steel, concrete, and other inputs. Carefully account for all energy consumption during the construction phase and assess the environmental impact of the entire phytoremediation plant establishment. Considerations should also be given to the maintenance and end-of-life phases, and methodological choices such as the inclusion/exclusion of recycling processes for materials should be transparently documented.

## Review details
Inventory: The internal review was done by several iteration steps concerning raw data validation, raw data documentation, representativity, completeness and consistency of modelling with regard to ISO 14040 and 14044.

## Data sources
- Puccini M., Seggiani M., Vitolo S., & Iannelli R. Life cycle assessment of remediation alternatives for dredged sediments. Chemical Engineering Transactions 35, 781–786 (2013).
