# Monitoring well ; Construction well ; Well depth 20m, Di=46 mm ; Ex situ groundwater remediation ; P&T system

Dataset: ILCD process, Unit process, single operation
Geography: JS-CN
Reference year: 2022
Classification: Unit processes / Other Services / Repair and maintenance
Generated by: Wang Ning, wang_ning@caep.org.cn
Owner: Tiangong LCI Data Working Group
Review: Dependent internal review by Tiangong LCI Data Working Group
Amounts: no units in this file; such an amount is in the reference unit of its flow, which a separate flow dataset defines
copyright: false
licenseType: Free of charge for all users and uses

## General comment
Construction of three monitoring wells using polyvinyl chloride, bentonite, silica, diesel and steel

## Geography
a closed pesticide manufacturing plant located in Jiangsu Province, China.

## Technical purpose
The three constructed monitoring wells are intended for ex situ groundwater remediation using a Pump and Treat (P&T) system at a closed pesticide manufacturing plant. These wells, with a depth of 20 meters and internal diameter of 46 mm, enable monitoring and extraction of contaminated groundwater for treatment. The construction materials used, including polyvinyl chloride (PVC), bentonite, silica, diesel fuel, and steel, reflect typical materials for well construction with resistance to chemical and structural stresses.

## Reference product
- Monitoring well: 3; measured

## Inputs
- Polyvinyl chloride: 54.86; measured
- bentonite: 644.53; measured
- quartz sand: 3222.64; measured
- Steel sections: 15; measured
- Diesel oil,diesel oil: 0.01152; measured
- transport in t*km: 393.703; calculated

## Use advice
Users utilizing this LCA data should consider the complete lifecycle of the monitoring wells including construction, operational, and decommissioning phases. The data is specific to monitoring wells constructed with the materials listed (PVC, bentonite, silica, diesel, and steel) and are not applicable for wells constructed with different materials or designs. For accurate modelling, users must take into account methodological choices such as the allocation of environmental burdens in the case of co-products or shared processes in well construction and maintenance.

## Review details
Inventory: The internal review was done by several iteration steps concerning raw data validation, raw data documentation, representativity, completeness and consistency of modelling with regard to ISO 14040 and 14044.

## Data sources
- Ding, D. et al. Assessing the environmental impacts and costs of biochar and monitored natural attenuation for groundwater heavily contaminated with volatile organic compounds. Science of The Total Environment 846, 157316 (2022).
