# Wastepaper pulp to make paper;corrugated cardboard

Dataset: ILCD process, Unit process, black box
Geography: SD-CN
Classification: Unit processes / Materials production / Paper and cardboards
Functional unit: In this study, one tonne of waste paper feedstock was collected as a functional unit.
LCI method principle: Attributional
LCI method approaches: Allocation
Generated by: Yixiang Gao, 22210740040@m.fudan.edu.cn
Owner: Tiangong LCI Data Working Group
Review: Dependent internal review by Tiangong LCI Data Working Group
Amounts: no units in this file; such an amount is in the reference unit of its flow, which a separate flow dataset defines
copyright: false
licenseType: Free of charge for all users and uses

## General comment
In a production scenario, processes such as pulping, papermaking, transport of raw materials, transport of auxiliary chemicals, wastewater treatment, and solid waste disposal are all included within the system boundary.

## Technology and included processes
在制浆工段，废纸经过链板输送机送到水力碎浆机，碎解后的浆料进入粗筛选系统(高浓除渣器和粗筛系统):粗筛后的浆料再通过分级筛系统，筛分为短纤维和长纤维，其中短纤维通过低浓除砂器除渣和浓缩机浓缩处理后进入抄前池;而长纤维通过低浓除砂器和精饰系统处理后再通过浓缩机、热分散系统和磨浆机后进入抄前池，抄前池的浆料再送往抄纸车间。此外，浆料浓缩过程中产生的白水部分回用于制浆工段。在造纸工段中，四种再生纸生产方案的流程基本相同分成打浆、抄纸、烘干三个工段。浆料经过调浆箱、浓白水塔及冲浆泵进入网前压力筛,后进入面层流浆箱上网。在废弃物处置环节，对再生纸生产制造中产生的一般固体废弃物、城市生活垃圾处理进行了安全填埋处置;而对浮选脱墨系统产生的工业危险废弃物脱墨渣收集后统一进行焚烧处置。再生瓦楞纸板方案中，对碎浆系统和除渣系统产生的废渣使用重力脱水机和污泥压榨机进行收集，后送至焚烧厂进行焚烧处理。

## Technical purpose
Recycled corrugated cardboard production encompasses a series of processes, which include pulping, papermaking, the transportation of raw materials and auxiliary chemicals, wastewater treatment, and the management of solid waste. This industrial procedure uses post-consumer waste paper as the primary feedstock, converted through mechanical and chemical treatment into corrugated cardboard. The cardboard is typically used for packaging solutions offering strength and durability for the shipment and storage of goods.

## Reference product
- Corrugated Cardboard: 885; measured
  Recycled corrugated cardboard

## Inputs
All rows: measured
- Oxidized starch: 1.75
- Inorganic Chemical Reagents: 4.51
  Inorganic chemical reagents
- Polyester Mesh Fabric: 0.02
  polyester mesh
- Blanket: 0.04425
  blanket
- water: 5.8
- process steam: 1590
  steam
- Electricity: 1116
  electricity
- waste water - untreated: 3.98
  waste water disposal

## Outputs
All rows: measured
- Plastic Waste: 72.08
  Plastic and metal waste
- Waste Residue: 3.7
  Waste residue
- sludge (paper production): 43.8
  sludge
- Waste solid: 0.31
  General solid waste
- methane (fossil): 5.07
  biogas

## Data selection and combination
The inventory data for the recycled corrugated cardboare programme were obtained from a field study at a paper company in Shandong Province. Secondly, the vast majority of the background data involved in this study was obtained from the China Localised Process-based Life Cycle Inventory Database (CPLCID).

## Use advice
Users of this data set should adhere to the system boundary conditions that include all the aforementioned processes. The primary functional unit for analysis in life cycle assessment is defined as one ton of waste paper input. The inventory data for this recycled corrugated cardboard production is derived from a field study of a paper company in Shandong province. The truncated approach is adopted, which excludes the economic and environmental impact of recycling processes for recoverable solid waste (e.g., coal slag, polyester resin, and cotton fiber) from consideration. Therefore, if users have specific requirements related to the inclusion of recycling or end-of-life phase, adjustments to this data set may be necessary to ensure accurate representation. Additionally, alignment with international life cycle assessment standards, specifically ISO 14040, should be maintained during application.

## Review details
Inventory: The internal review was done by several iteration steps concerning raw data validation, raw data documentation, representativity, completeness and consistency of modelling with regard to ISO 14040 and 14044.

## Data sources
- 杨冬璐. 典型再生纸产品的生命周期环境与经济影响评价. (山东大学, 2019).
