# Brick Production ;Shale Hollow Brick Production ;Jaw Crushing Process

Dataset: ILCD process, Unit process, single operation
Geography: GZ-JX-CN
Reference year: 2020
Classification: Unit processes / Materials production / Other mineralic materials
Generated by: Wang xiangjin, r99rt4@163.com
Owner: Tiangong LCI Data Working Group
Review: Dependent internal review by Tiangong LCI Data Working Group
Amounts: no units in this file; such an amount is in the reference unit of its flow, which a separate flow dataset defines
copyright: false
licenseType: Free of charge for all users and uses

## General comment
Traditional shale hollow brick production process

## Technical purpose
The data set represents the jaw crushing process in the production of shale hollow bricks, a construction material used in the building industry. These bricks are typically used for the construction of walls and buildings, particularly where light weight and insulation properties are considered beneficial.

## Reference product
- coal gangue: 330; measured
  Crushed coal gangue

## Inputs
- coal gangue: 336; measured
- Electricity: 14.9472; measured

## Outputs
- particles (> PM10),particles (> PM10): 0.02; measured
  soot
- Particles (PM0.2 - PM2.5): 0.03; measured
  dust

## Deviations from the LCI method approaches
The EIA report is based on the annual production of bricks (80 million bricks) as a whole, and for statistical purposes, the data has been converted according to the size specifications described therein, in terms of bricks produced per tonne of production

## Data selection and combination
Adopting the relevant data from the table of coefficients of production and discharge for sintered bricks and building blocks in 3131 of the Manual of Coefficients of Production and Discharge for Industrial Pollution Sources of the First National Pollution Sources Census (Seventh Subbook).

## Sampling procedure
The data for this EIA report is derived from real-time data from the plant

## Use advice
Users should consider this data specific to the sintered type of bricks and building blocks manufacturing industry (code 3131), as described in the Manual of Coefficients of Production and Discharge for Industrial Pollution Sources of the First National Pollution Sources Census (Seventh Subbook). The data reflects annual production volumes and should be adjusted if used for smaller production scenarios or different brick sizes. It is imperative to use the same unit of measurement (e.g., bricks per ton) for consistency. Users must also be aware that the data is based on actual plant operations and may need adjustment for theoretical or other specific applications.

## Review details
Inventory: The internal review was done by several iteration steps concerning raw data validation, raw data documentation, representativity, completeness and consistency of modelling with regard to ISO 14040 and 14044.

## Data sources
- 年产 8000 万块页岩标砖项目环评报告公示
