# Printed cloth production ; Printed cloth

Dataset: ILCD process, Unit process, black box
Geography: CN
Reference year: 2014
Classification: Unit processes / Systems / Textiles, furnitures and other interiors
Generated by: Yingfan Duan, 1300925579@qq.com
Owner: Tiangong LCI Data Working Group
Review: Dependent internal review by Tiangong LCI Data Working Group
Amounts: no units in this file; such an amount is in the reference unit of its flow, which a separate flow dataset defines
copyright: false
licenseType: Free of charge for all users and uses

## General comment
Comprising six stages, including greige fabric inspection, unwinding and sewing, dyeing, printing, post-printing processing, and final inspection. Greige fabric inspection is conducted under lighting conditions. Unwinding and sewing primarily involve the use of unwinding machines and sewing machines, requiring minimal electricity consumption and a short duration. Dyeing employs conventional rope dyeing machinery, consuming electricity, industrial water, steam, and dye. Printing involves the extensive use of dyes, accompanied by significant steam consumption. Final inspection is conducted under lighting conditions.

## Geography
"China is the world's largest production base for printing and dyeing, but rapid development is accompanied by severe environmental issues. Currently, the printing and dyeing industry primarily addresses environmental problems through clean production audits, implementing research on low-toxicity and low-pollution raw materials, resource utilization of waste, equipment upgrades and renovations, recycling of water and steam, and improvements in production processes. However, existing clean production schemes often focus on specific environmental issues without considering the interconnections between industrial systems."

## Technical purpose
The described printed cloth production process is applicable in the textile industry, specifically for the manufacturing of decorated or patterned fabrics. Such fabrics are commonly used for clothing, home textiles like curtains and bedding, and sometimes for industrial products such as banners and signages.

## Reference product
- Printed Fabric: 1000; measured

## Inputs
All rows: measured
- Electricity: 3.7188
  Grey fabric inspection
- Electricity: 7.0416
  Unwinding seams
- Electricity: 222.3
  Dyeing
- Water for industrial use: 3
  Dyeing
- Dye: 15.3
  Dyeing
- Electricity: 206.449
  Printing
- Water for industrial use: 11.558
  Printing
- process steam: 1400
  Printing
- Dye: 38.3
  Printing
- Electricity: 140.994
  Printing post-processing
- Water for industrial use: 4.976
  Printing post-processing
- natural gas: 14.938
  Printing post-processing
- process steam: 395
  Printing post-processing
- Electricity: 3.7188
  Final inspection

## Use advice
When using this data set for Life Cycle Assessments, pay special attention to the inventory data associated with each stage of the production process – particularly electricity, water, steam consumption, and dye usage. Ensure these inputs are appropriately allocated to the production output based on the weight or length of the printed cloth produced. Moreover, consider the technological efficiency of the machinery used and the environmental impacts of the dyes. If the data set is used for assessing products with recycling at their end-of-life stage, ensure the impacts of the recycling processes are incorporated.

## Review details
Inventory: The internal review was done by several iteration steps concerning raw data validation, raw data documentation, representativity, completeness and consistency of modelling with regard to ISO 14040 and 14044.

## Data sources
- 王赛赛, 吴雄英 & 丁雪梅. 三种LCA核算软件对印花布碳足迹核算的比较. 印染 40, 41–44 (2014).
