# Municipal sludge treatment and disposal;wet sludge moisture content 80%;750℃ pyrolysis

Dataset: ILCD process, Unit process, single operation
Geography: CN
Classification: Unit processes / End-of-life treatment / Wastewater treatment
Functional unit: 1 t of sludge is selected as the functional unit, the moisture content of wet sludge is 80%.
Generated by: Jin Sitian, 2331276@tongji.edu.cn
Owner: Tiangong LCI Data Working Group
Review: Dependent internal review by Tiangong LCI Data Working Group
Amounts: no units in this file; such an amount is in the reference unit of its flow, which a separate flow dataset defines
copyright: ['opt4ROkqig']
licenseType: Free of charge for all users and uses

## General comment
Through experiments, the relevant data of the sludge pyrolysis treatment process under different working conditions are collected and distributed, and the input and output of materials and energy in each process are quantified, and the environmental pollutant emissions are quantified.

## Technology and included processes
The rated power of the tube furnace in the pyrolysis link is 4 kW, the no-load power is 1.4 kW, nitrogen is introduced for 2~3 minutes before the reaction to ensure an oxygen-free environment, the nitrogen flow rate is 30 ml/min, the heating rate of the tube furnace is 80 °C/min, and the final temperature of pyrolysis is maintained for 10min.

## Technical purpose
This data set characterizes the process of municipal sludge treatment and disposal through pyrolysis at a temperature of 750°C. The treatment encompasses the transformation of wet sludge with a moisture content of 80%, which is typically used in waste management facilities. This process is applicable for the conversion of high-moisture sludge into usable byproducts or for reducing the mass and volume of waste for disposal.

## Reference product
- Sludge: 1000; input; estimated
  The moisture content of 1t of wet sludge is 80%

## Inputs
- Electricity: 1879.99; calculated
- nitrogen: 5.63; calculated

## Outputs
All rows: calculated
- hydrogen: 1.09
- carbon monoxide (biogenic): 15.37
  The original text does not distinguish between biogenic and fossil, and according to experts, it is biogenic here.
- methane (biogenic),methane (biogenic): 6.3
  (same comment as for carbon monoxide (biogenic))
- non-methane volatile organic compounds: 1.11
- carbon dioxide (biogenic): 23.82
  (same comment as for carbon monoxide (biogenic))
- Heat treatment oil: 74.86
- Semi-coke: 79.92

## Use advice
Users of this data should regard 1 ton of wet sludge with 80% moisture content as the functional unit. Special attention must be paid to the process temperature setting, which is critical for achieving the desired pyrolysis outcome. This data is best applicable for life cycle assessments of municipal waste treatment processes. When using this data, consider any upstream or downstream processes that may impact the overall environmental performance. Methodological considerations such as the end treatment of byproducts and any emissions associated with pyrolysis should be taken into account.

## Review details
Inventory: The internal review was done by several iteration steps concerning raw data validation, raw data documentation, representativity, completeness and consistency of modelling with regard to ISO 14040 and 14044.

## Data sources
- 王久兵. 污泥热解反应机制及其能源化工艺的全生命周期评价研究[D].浙江工业大学,2017.
