# Groundwater in-situ remediation ; In-situ Chemical Oxidation ; Remediated groundwater

Dataset: ILCD process, Unit process, single operation
Geography: CA
Reference year: 2007
Classification: Unit processes / Other Services / Repair and maintenance
Generated by: Wang Ning, wang_ning@caep.org.cn
Owner: Tiangong LCI Data Working Group
Review: Dependent internal review by Tiangong LCI Data Working Group
Amounts: no units in this file; such an amount is in the reference unit of its flow, which a separate flow dataset defines
copyright: false
licenseType: Free of charge for all users and uses

## General comment
Pharmaceutical preparations, injection systems operational, groundwater remediated

## Geography
The contaminated area was located 600 m from a river shore in the northern part of the prov-ince of Quebec， Canada.

## Technology and included processes
Preparation of oxidizing chemicals using acetic acid, ferrous sulfate, and hydrogen peroxide, and remediation of groundwater using an electricity-driven in situ groundwater oxidation system

## Technical purpose
The described industrial process is utilized for the in-situ remediation of contaminated groundwater. The use of acetic acid, ferrous sulfate, and hydrogen peroxide as oxidizing chemicals along with an electricity-driven in situ oxidation system enables the treatment of underground water sources that are polluted. This technology is typically applied in areas where groundwater contamination poses a risk to ecosystems and human health, and is suitable for sites such as the one located 600 m from a river shore in the northern part of Quebec, Canada.

## Reference product
- Remediated groundwater: 110067; estimated
  运行地下水原位氧化系统得到修复后的地下水

## Inputs
All rows: estimated
- Electricity: 166000
  消耗电力使地下水原位氧化系统运行
- acetic acid: 2280
  消耗醋酸使地下水原位氧化系统运行
- Hydrogen peroxide,Hydrogen peroxide: 4406
  消耗双氧水使地下水原位氧化系统运行
- Iron sulphate dissolution: 9844
  消耗硫酸亚铁使地下水原位氧化系统运行
- Tap Water: 9844
  消耗水使地下水原位氧化系统运行
- injection well: 125
- A device for configuring solid pharmaceuticals into liquid pharmaceuticals: 1

## Use advice
When using this data set for Life Cycle Assessment (LCA) purposes, ensure that the scope of the LCA includes potential environmental impacts derived from the usage of chemicals and electricity for in-situ groundwater remediation. The data should only be applied to scenarios where in-situ chemical oxidation is feasible and where the contamination characteristics are similar to those described for the site in Quebec. It is essential to consider the geographical location, as it may influence both the environmental impacts and the effectiveness of the remediation process.

## Review details
Inventory: The internal review was done by several iteration steps concerning raw data validation, raw data documentation, representativity, completeness and consistency of modelling with regard to ISO 14040 and 14044.

## Data sources
- Cadotte, M., Deschênes, L. & Samson, R. Selection of a remediation scenario for a diesel-contaminated site using LCA. Int J Life Cycle Assess 12, 239–251 (2007).
