# Dry sand Production;Sand and gravel dedusting;Bag Dedusting Technology

Dataset: ILCD process, Unit process, single operation
Geography: HAIN-CN
Reference year: 2020
Classification: Unit processes / Materials production / Other mineralic materials
Generated by: Cui hang, Cuihang0716@163.com
Owner: Tiangong LCI Data Working Group
Review: Dependent internal review by Tiangong LCI Data Working Group
Amounts: no units in this file; such an amount is in the reference unit of its flow, which a separate flow dataset defines
copyright: false
licenseType: Free of charge for all users and uses

## General comment
Dedusting of semi-finished sand with dedusting equipment

## Technology and included processes
Dedusting of semi-finished sand with pulse dusters

## Technical purpose
The process described is used in the production of construction-grade sand through a dry sand production method. It includes the dedusting of semi-finished sand and gravel using bag dedusting technology, specifically employing pulse dusters. This technique is generally utilized in industrial settings where high-quality construction sand is demanded, ensuring minimal dust content in the final product.

## Reference product
- sand: 38870; measured

## Inputs
- Electricity: 108; measured
- sand: 41870; measured

## Outputs
- Fly ash: 3000; measured

## Use advice
When utilizing this dataset for Life Cycle Assessment (LCA), users should consider the specific operational settings of the pulse dusters and their efficiency in the dedusting process. It is important to account for the energy consumption and maintenance activities associated with the dedusting equipment. Additionally, if this process is linked with other unit processes in sand production, careful integration and avoidance of double-counting in the LCA is required.

## Review details
Inventory: The internal review was done by several iteration steps concerning raw data validation, raw data documentation, representativity, completeness and consistency of modelling with regard to ISO 14040 and 14044.

## Data sources
- 陵水海岛混凝土有限公司干法制砂项目
