# Bauxite Mining ; Bauxite ; Cradle ; 2009

Dataset: ILCD process, Unit process, single operation
Geography: CN
Reference year: 2021
Classification: Unit processes / Materials production / Non-energetic raw materials
Generated by: Zimeng Cai, caizm6178@163.com
Owner: Tiangong LCI Data Working Group
Review: Dependent internal review by Tiangong LCI Data Working Group
Amounts: no units in this file; such an amount is in the reference unit of its flow, which a separate flow dataset defines
copyright: false
licenseType: Free of charge for all users and uses

## General comment
氧化铝生产2017

## Time period
Date of publication

## Technical purpose
This LCA data set pertains to the process of bauxite mining and the production of alumina. It is intended for use in assessing the environmental impact of extracting bauxite, the primary source of aluminum, and its subsequent processing into alumina, a major precursor for aluminum production. This data is relevant for stakeholders in the aluminum industry, from raw material extraction to the manufacturing of aluminum-based products.

## Reference product
- bauxite: 3.51331e10; software or database

## Inputs
All rows: software or database
- electricity, high voltage, aluminium industry: 5.87027e7
  electricity
- other fuels: 1.70454e9
  electricity
- Coal, brown, in ground: 3.61625e7
  coal
- natural gas, high pressure: 399900
  coal
- Gasoline: 1.6545e6
  gasoline
- Diesel oil: 8.9586e6
  diesel

## Data selection and combination
The data in this study refers to the LCA data of PA, SA, electricity, and other background data. The PA data were obtained from statistical data sources, and the SA data were mainly obtained from the literatures. The background data were mainly derived from the Chinese localization LCA database CAS RCEES 2018, which was established by the Research Center for Eco-Environmental Sciences, Chinese Academy of Sciences and covers LCA data for energy, materials, transportation, waste management etc.

## Use advice
When using this LCA data set, users should be aware that the primary aluminum (PA) data is based on statistical sources whereas the secondary aluminum (SA) data primarily comes from literature. Users should also note that the background data is derived from the Chinese localized LCA database CAS RCEES 2018. Any extrapolation or modeling should take into account that the data is specific to the Chinese context and might not be directly applicable to other regions without adjustments for local conditions. Special attention should be paid to methodological consistency, especially when integrating this data with datasets from other geographic areas or time periods.

## Review details
Inventory: The internal review was done by several iteration steps concerning raw data validation, raw data documentation, representativity, completeness and consistency of modelling with regard to ISO 14040 and 14044.

## Data sources
- Ding, N., Liu, N., Lu, B. & Yang, J. Life cycle greenhouse gas emissions of aluminum based on regional industrial transfer in China. J. Ind. Ecol. 25, 1657–1672 (2021).
