# Aluminum electrolytic capacitor production ; Capacitors, auxiliaries and energy use ; Aging and inspection ; Capacitors, auxiliaries and energy use

Dataset: ILCD process, Unit process, single operation
Geography: JS-CN
Reference year: 2020
Classification: Unit processes / Materials production / Metals and semimetals
Generated by: Huimin Chang, huiminchang@tsinghua.edu.cn
Owner: Tiangong LCI Data Working Group
Review: Dependent internal review by Tiangong LCI Data Working Group
Amounts: no units in this file; such an amount is in the reference unit of its flow, which a separate flow dataset defines
copyright: false
licenseType: Free of charge for all users and uses

## General comment
老化和检查 ; 铝电解电容器（AEC）生产 ; 420V 680uf

## Time period
The investigated manufacturer produced about 1.183 billion AECs of all kinds in 2020.

## Technical purpose
The technical application for the described Aluminum Electrolytic Capacitor (AEC) production caters to the manufacturing of capacitors rated at 420V 680uf, suitable for various electronic devices that require energy storage and filtering functions. These devices may include consumer electronics, industrial machinery, automotive electronics, and power supplies. The production process is specifically aimed at meeting the massive demand, as indicated by the 1.183 billion units produced by the investigated manufacturer in 2020.

## Reference product
- capacitor, auxilliaries and energy use: 1728; measured
  Capacitors (qualified) [pcs]

## Inputs
- electricity, high voltage, aluminium industry: 255.73; measured
  Electricity [kWh]
- capacitor, auxilliaries and energy use: 1800; measured
  Capacitors (before aging)[pcs]

## Outputs
- capacitor, auxilliaries and energy use: 72; measured
  Capacitors (waste) [pcs]

## Data selection and combination
The inventory data of capacitor production come from the AECs’ production factory in Jiangsu Province, China. The cut-off criteria of LCI data collection for each process is coverage of at least 95% of the mass and energy of the input and output flows. The inventory data of anode foil production and cathode foil production is obtained based on the analysis of the manufacturing processes and corresponding process parameters. The upstream data (i.e., aluminum ingots, separator paper, transport, electricity, and water) are acquired from the Gabi software (Version: 10.6.1.35). In detail, the profile of Chineses electricity grid from the China Electric Power Yearbook adopts the reference year 2016. The reference year of aluminum ingot production is 2015. The inaccessible data about ammonium citrate, ammonium pentaborate, NH4H2PO4, and HBO3 are estimated based on chemical equations using the existing materials (reactants) in the Gabi software. The use and end-of-life stage inventory data are obtained based on analysis and calculation.

## Use advice
When using the dataset for life cycle assessment, ensure that the inventory data for AEC production represents the geographical and technological context accurately by matching the processes with those in Jiangsu Province, China. Note the reference years for aluminum ingot production (2015) and the profile of the Chinese electricity grid (2016). Consider the cut-off criteria for the data collection of input and output flows, ensuring at least 95% coverage of mass and energy. Upstream data is sourced from the Gabi software; therefore, confirm software version compatibility (v10.6.1.35) for consistency. Modeling of the use phase and the end-of-life stage should incorporate specific factory-based analyses and calculations. For unavailable data such as certain chemicals, use estimates based on chemical equations with reactants from the Gabi software, acknowledging these as modeled and not primary data.

## Review details
Inventory: The internal review was done by several iteration steps concerning raw data validation, raw data documentation, representativity, completeness and consistency of modelling with regard to ISO 14040 and 14044.

## Data sources
- Zhang, C., Jing, J., Yun, L., Zheng, Y. & Huang, H. A cradle-to-grave life cycle assessment of high-voltage aluminum electrolytic capacitors in China. J. Clean. Prod. 370, (2022).
