# Northwest (Linze, Zhangye) Corn Production ; Agricultural Data Production

Dataset: ILCD process, Unit process, single operation
Geography: ZY-GS-CN
Reference year: 2012
Valid until: 2012
Classification: Unit processes / Materials production / Agricultural production means
Functional unit: 1 t
LCI method principle: Attributional
LCI method approaches: Consequential
Generated by: Haoran Zhang, hrzhang@whu.edu.cn
Owner: Tiangong LCI Data Working Group
Review: Dependent internal review by Tiangong LCI Data Working Group
Amounts: no units in this file; such an amount is in the reference unit of its flow, which a separate flow dataset defines
copyright: false
licenseType: Free of charge for all users and uses

## General comment
The article is based on research data collected from farmers, using the theory of agricultural carbon footprint and life cycle assessment to quantitatively study the carbon footprint and its composition of the rice-wheat rotation system in the downstream area of the Yangtze River. It further analyzes the factors influencing the carbon footprint.

## Geography
Linze County

## Technology and included processes
LCA method is used to evaluate the agricultural system of seed corn production, which takes the whole process of product treatment from input to final output as the research object to conduct quantitative analysis and comparison, so as to evaluate the environmental impact of seed corn production [13]. In this paper, the mass of seed corn 1 t is used as the functional unit. The boundary of the system starts from the production of fertilizer and electricity, and ends from the output of agricultural products and pollutants in the crop planting process. In other words, there are two production systems, namely the agricultural material production system and the crop production system

## Technical purpose
The dataset represents the carbon footprint and life cycle data for corn production in Linze, Zhangye, Northwest China. It is used to assess the environmental impact of corn cultivation, including the production and application of agricultural inputs such as chemical fertilizers and electricity. This data can support analyses of crop production systems and associated resource and waste management practices in agricultural processes, especially focusing on the rice-wheat rotation system in Yangtze River downstream areas.

## Reference product
- maize grain: 1000; measured

## Inputs
- Labor: 0.29; measured
  people
- Production Expenditure: 2940.22; calculated
  Yuan
- Electricity: 367.596; measured
  用于抽水

## Deviations from the LCI method approaches
The system boundary starts with the production of chemical fertilizers and electricity, and the terminal boundary is the output of agricultural products and pollutants during the crop planting process. There are two production systems: the agricultural input production system and the crop production system.

## Data selection and combination
The data in this text comes from the statistical sampling survey of Zhangye city, and additional data obtained from a special survey conducted during the 2012 input-output table. In Ganzhou district, Jiantan town, Dangzhai village, and Xiaoman village were selected; in Linze county, Shahe town and Pingchuan town were selected; in Gaotai county, Xuanhua town, Xiangdao village, and Luotuo city township were chosen. After excluding incomplete data, a total of 72 household's effective data was obtained

## Data treatment and extrapolations
Using a combination of stratified random sampling and typical sample selection methods, data were collected through questionnaire surveys and structured interviews with typical samples. The survey content revolves around all input production elements and economic costs, as well as resource consumption, etc. The output mainly focuses on product yield and the current economic value, as well as the quantity of waste generated and its disposal methods.

## Sampling procedure
It is determined that the survey sample size in the three counties and districts of Zhangye city needs to add 80 household surveys. The composition of the samples maintains the principle of being consistent with the local agricultural added value ratio. The corresponding survey household numbers are determined according to the agricultural added value ratio of 7:5:8, that is, 28, 20, and 32 households are respectively drawn from the three counties and districts.

## Use advice
When utilizing this dataset for environmental impact assessments, users must adhere to the system boundary definition provided, starting from the production of chemical fertilizers and electricity and ending with the output of agricultural products and pollutants. Adjustments to this prescribed boundary should be made with caution and clearly documented. Inclusion or exclusion of life-cycle stages like the use phase or recycling should be considered based on the goal and scope of the study. The sample survey data is regionally specific; therefore, cautious application is suggested when generalizing for other regions. Researchers should account for temporal variability and validate the applicability for different time frames or agricultural practices before using this dataset for comparative assessments or policy decision-making.

## Review details
Inventory: The internal review was done by several iteration steps concerning raw data validation, raw data documentation, representativity, completeness and consistency of modelling with regard to ISO 14040 and 14044.

## Data sources
- 杨肖,钟方雷,郭爱君,王琼.干旱区绿洲制种玉米生命周期环境影响评价——以张掖市为例[J].农业环境科学学报,2017,36(8):1664-1671
