# Blue hydrogen technology for hydrogen production ; natural gas ; TDM technology

Dataset: ILCD process
Geography: US
Reference year: 2022
Classification: Unit processes / Energy carriers and technologies / Natural gas based fuels
Functional unit: Production of 1kg hydrogen gas
Generated by: Xiaohua Liu, lxh01311@163.com
Owner: Tiangong LCI Data Working Group
Review: Dependent internal review by Tiangong LCI Data Working Group
Amounts: no units in this file; such an amount is in the reference unit of its flow, which a separate flow dataset defines
copyright: false
licenseType: Free of charge for all users and uses

## General comment
The industrial process described by this data set involves the production of hydrogen gas using blue hydrogen technology, specifically with TDM technology. This process utilizes natural gas as a feedstock. The hydrogen produced through this method is intended for applications where low-carbon hydrogen is a requirement, such as fuel cell electric vehicles (FCEVs), chemical synthesis, refining processes, industrial applications, and potentially for electric power generation systems that aim to reduce carbon footprints.

## Reference product
- hydrogen: 1; measured

## Inputs
- natural gas,natural gas: 6.7; measured
  natural gas
- Electricity: 4.608; measured
  electricity

## Outputs
- carbon dioxide (fossil): 1.73; measured
  Direct CO2 emissions The original text did not distinguish between bio and fossil，according to expert judgment, this is Fossil
- Solid Carbon Source: 3; measured
  solid carbon source

## Use advice
When utilizing this data set for Life Cycle Assessment (LCA) purposes, users must consider important aspects such as the source and type of natural gas used, as well as the specific emissions associated with the TDM technology. The carbon capture, utilization, or storage (CCUS) aspects integral to blue hydrogen production must be accounted for to accurately assess the environmental impact. It is crucial to include the upstream emissions from natural gas extraction and processing, as well as the downstream potential usage of hydrogen. Users should follow region-specific regulations and standards for greenhouse gas emissions accounting, and assess the technological applicability in terms of scale, location, and compatibility with existing infrastructures.

## Review details
Inventory: The internal review was done by several iteration steps concerning raw data validation, raw data documentation, representativity, completeness and consistency of modelling with regard to ISO 14040 and 14044.

## Data sources
- Climate change performance of hydrogen production based on life cycle assess
