# Municipal sludge treatment and disposal;wet sludge moisture content 80%;550℃ pyrolysis

Dataset: ILCD process, Unit process, single operation
Geography: CN
Classification: Unit processes / End-of-life treatment / Wastewater treatment
Functional unit: 1 t of sludge is selected as the functional unit, the moisture content of wet sludge is 80%.
Generated by: Jin Sitian, 2331276@tongji.edu.cn
Owner: Tiangong LCI Data Working Group
Review: Dependent internal review by Tiangong LCI Data Working Group
Amounts: no units in this file; such an amount is in the reference unit of its flow, which a separate flow dataset defines
copyright: ['opt4ROkqig']
licenseType: Free of charge for all users and uses

## General comment
Through experiments, the relevant data of the sludge pyrolysis treatment process under different working conditions are collected and distributed, and the input and output of materials and energy in each process are quantified, and the environmental pollutant emissions are quantified.

## Technology and included processes
The rated power of the tube furnace in the pyrolysis link is 4 kW, the no-load power is 1.4 kW, nitrogen is introduced for 2~3 minutes before the reaction to ensure an oxygen-free environment, the nitrogen flow rate is 30 ml/min, the heating rate of the tube furnace is 80 °C/min, and the final temperature of pyrolysis is maintained for 10min.

## Technical purpose
This data set represents the treatment and disposal of municipal sludge with a moisture content of 80% through a pyrolysis process at a temperature of 550°C. The process is utilized for managing and reducing the volume of wet sludge generated by municipal wastewater treatment facilities. This treatment converts the organic components in the sludge into syngas, which can be used for energy recovery, and biochar, which has applications in soil amendment or as a carbon sequestering agent.

## Reference product
- Sludge: 1000; input; estimated
  The moisture content of 1t of wet sludge is 80%

## Inputs
- Electricity: 1480; calculated
- nitrogen: 5.63; calculated

## Outputs
All rows: calculated
- hydrogen: 0.11
- carbon monoxide (biogenic): 2.59
  The original text does not distinguish between biogenic and fossil, and according to experts, it is biogenic here.
- methane (biogenic),methane (biogenic): 0.63
  (same comment as for carbon monoxide (biogenic))
- non-methane volatile organic compounds: 0.49
- carbon dioxide (biogenic): 24.47
  (same comment as for carbon monoxide (biogenic))
- Heat treatment oil: 85.28
- Semi-coke: 84.32

## Use advice
When using this data set for Life Cycle Assessment, take into account that the functional unit is the treatment of 1 tonne of municipal sludge with 80% moisture content. The pyrolysis process should be modeled carefully considering energy inputs and outputs, loss of mass due to the drying and conversion process, and potential emissions. If incorporating this data into a broader waste management or energy recovery system LCA, ensure consistency with other life cycle stages and consider the downstream use or disposal of byproducts like syngas and biochar.

## Review details
Inventory: The internal review was done by several iteration steps concerning raw data validation, raw data documentation, representativity, completeness and consistency of modelling with regard to ISO 14040 and 14044.

## Data sources
- 王久兵. 污泥热解反应机制及其能源化工艺的全生命周期评价研究[D].浙江工业大学,2017.
