# Rice planting ; ore and fossil energy mining ; used in the production of chemical fertilizers and pesticides in Northeast China

Dataset: ILCD process, Unit process, single operation
Geography: SY-LN-CN
Reference year: 2016
Valid until: 2017
Classification: Unit processes / Materials production / Agricultural production means
Functional unit: 1t
LCI method principle: Attributional
LCI method approaches: Consequential
Generated by: Haoran Zhang, hrzhang@whu.edu.cn
Owner: Tiangong LCI Data Working Group
Review: Dependent internal review by Tiangong LCI Data Working Group
Amounts: no units in this file; such an amount is in the reference unit of its flow, which a separate flow dataset defines
copyright: false
licenseType: Free of charge for all users and uses

## General comment
The resource consumption and pollution emission of mining and transportation of mineral and petrochemical energy sources are considered

## Technology and included processes
With the production of 1 t of rice as the functional unit, the starting boundary is defined as the mining of ore and fossil energy for the production of chemical fertilizers and pesticides, and the ending boundary is the emission of pollutants in the rice planting stage

## Technical purpose
The data set represents the environmental impacts during the production phase of rice in Northeast China, including raw material extraction. It is intended for assessing the environmental footprint of rice cultivation and identifying potential areas for improvement in farming practices. This data can be used in life cycle assessment studies of products where rice is a primary ingredient.

## Reference product
- rice: 1000; measured

## Inputs
All rows: measured
- Hard coal, at consumer EU-27: 10.85
- Diesel: 3.51, 0.41 (2 entries)
- Natural gas, at consumer EU-27: 1.63
- Electricity: 78.408
- water: 0.2
- crude oil; 42.3 MJ/kg: 7.66
- potassium chloride: 37.98
- phosphorus: 15.64

## Outputs
All rows: measured
- carbon monoxide (fossil): 1.22
- carbon dioxide (fossil),carbon dioxide (fossil): 44.81
- nitrous oxide: 5.15
- sulfur dioxide: 0.72
- Nitrogen oxides: 0.28
- methane (fossil),methane (fossil): 0.05
- chemical oxygen demand: 0.02
- cadmium: 0.0001
- nickel: 0.0013
- vanadium: 0.0005
- zinc: 0.0001
- arsenic: 0.0003

## Deviations from the LCI method approaches
The stipulated starting boundary is the mining of ores and fossil energy for the production of fertilizers and pesticides. The termination boundary is the emission of pollutants during the rice planting phase.

## Data selection and combination
A total of 62 households were surveyed, with the investigation covering various aspects such as the types and quantities of fertilizers used, types and amounts of pesticides used, machinery fuel consumption, production electricity consumption, and irrigation water volume, among other related information

## Data treatment and extrapolations
The equivalent coefficient method is used to convert similar pollutants into the environmental impact potential of reference objects [22], to assess the environmental impact of rice production."

## Use advice
When using this data set for life cycle assessment, users should note that the system boundary starts with the extraction of minerals and fossil energy for fertilizer and pesticide production and ends with the emission of pollutants at the rice planting stage. The equivalent coefficient method has been applied, allowing for the conversion of similar pollutants into a common unit of environmental impact potential. It is important to consider these boundaries and conversion methods when integrating this data into larger studies or evaluations. Additionally, care should be taken to update or validate the data with current practices and regional specifics as this data set reflects the practices of 62 surveyed households.

## Review details
Inventory: The internal review was done by several iteration steps concerning raw data validation, raw data documentation, representativity, completeness and consistency of modelling with regard to ISO 14040 and 14044.

## Data sources
- 常俊彦,宋明阳,于晓曼等.沈阳地区水稻生产的生态环境影响研究[J].农业环境科学学报,2018,37(08):1793-1801.
