# Groundwater remediation;In-situ;Air Sparging

Dataset: ILCD process, Unit process, single operation
Geography: SD-CN
Classification: Other Services / Repair and maintenance
Generated by: 苗秋慈
Owner: Tiangong LCI Data Working Group
Review: Dependent internal review by Tiangong LCI Data Working Group
Amounts: no units in this file; such an amount is in the reference unit of its flow, which a separate flow dataset defines
licenseType: Free of charge for all users and uses

## General comment
The process described is an in-situ air sparging system for groundwater remediation. It uses an air compressor (model: W-0.9/1.25) to inject air at a pressure of 0.45 MPa and a flow rate of 10m3/h in an intermittent sparging mode, with a cycle of 24 hours (18 hours on, 6 hours off) for a continuous period of 40 days. The purpose is to increase the dissolved oxygen concentration in groundwater at various depths to facilitate the degradation of petroleum contaminants. This technology is primarily used at a field site near an oil well in the Shengli oilfield, Shandong, where there is significant petroleum pollution in the groundwater.

## Geography
山东滨州胜利油田石油开采区某油井附近地下水石油污染比较严重的野外现场。

## Reference product
- Air: 7200; input; article inperiodical

## Use advice
When utilizing this data set for life cycle assessment or other environmental studies, users should ensure that the scope of their study matches the conditions and geographical specificity of the data. It is vital to assess the applicability of these results to other sites as geological conditions can affect air sparging efficiency. Additionally, care should be taken to model the use phase behavior accurately, and if extending the study beyond the provided data, assumptions regarding continued efficacy, degradation rates, and potential secondary impacts must be clearly stated.

## Review details
Inventory: The internal review was done by several iteration steps concerning raw data validation, raw data documentation, representativity, completeness and consistency of modelling with regard to ISO 14040 and 14044.

## Data sources
- 王志强,武强,邹祖光等.地下水石油污染曝气治理技术研究[J].环境科学,2007(04):4754-4760.DOI:10.13227/j.hjkx.2007.04.011.
