# Oil and gas reservoir evaluation ; Three types of pre-exploration zones ; Resource value calculation

Dataset: ILCD process, Unit process, single operation
Geography: SC-CN
Reference year: 2015
Classification: Unit processes / Energy carriers and technologies / Energetic raw materials
LCI method principle: Attributional
LCI method approaches: Consequential
Generated by: Shikang Kang, 908798159@qq.com
Owner: Tiangong LCI Data Working Group
Review: Dependent internal review by Tiangong LCI Data Working Group
Amounts: no units in this file; such an amount is in the reference unit of its flow, which a separate flow dataset defines
copyright: false
licenseType: Free of charge for all users and uses

## General comment
According to the templates and parameters of the pre-exploration zones, the strategic value of resources in five pre-exploration zones in Sichuan Basin is evaluated. In order to facilitate comparison and comparison, we normalized the evaluation index according to the exploration status of the pre-exploration zone in Sichuan Basin

## Geography
Pre-exploration zone of Sichuan basin

## Time period
Publication time of literature

## Technology and included processes
Based on the exploration risk analysis technology, the pre-exploration zone evaluation template of "oil and gas discovery probability-resource strategic value" is established, and the corresponding evaluation parameters, assignment standards, calculation formulas and result classification standards are put forward, thus realizing the evaluation and optimization of pre-exploration zones under a unified platform.

## Technical purpose
The data set pertains to the evaluation of oil and gas reservoirs specifically within the Sichuan Basin’s pre-exploration zones. It is intended for use in determining the strategic value of resources based on geological and technical parameters. This data can be applied in the energy sector, particularly by entities involved in the exploration and valuation of hydrocarbon resources to optimize exploration strategies and make informed decisions regarding potential drilling locations.

## Reference product
- carbon: 1e12; input; min 1e12; max 3e13; normal; missing unimportant
  The ratio of the average resource amount in each zone to its

## Inputs
- carbon: 3e11; max 3e11; uniform; missing unimportant
  potential resources

## Outputs
- natural gas: 0.34; log-normal; missing unimportant
  Oil and gas discovery rate
- methane (fossil): 1e12; normal; missing unimportant
  There is no mining output of natural gas in the literature. Assume that the input in the process of natural gas production: output=1:1

## Data selection and combination
The evaluation parameters of oil and gas discovery probability include the key factors of geological accumulation (source rock, trap, reservoir, preservation and oil and gas matching history) and the applicability of engineering technology, and the evaluation parameters of resource strategic value include resource potential, resource scale, exploration strategic significance and exploration well success rate

## Data treatment and extrapolations
In the evaluation, the factors such as the scale and potential of resources, the success rate of exploration wells and the strategic significance of exploration are taken into account. Four parameters, i.e. resource quantity index, potential resource quantity index, success rate index of exploration wells and strategic value of exploration, are used to comprehensively reflect the relative value of resources in the pre-exploration zone, and quantitatively express the potential and value of resources

## Use advice
When utilizing this data set for life cycle assessment or other analysis purposes, users should account for the specific geologic and engineering technology applicability of the Sichuan Basin pre-exploration zones. Users are advised to consider the exploration risk, including geological factors such as source rock, trap, reservoir conditions, and historical hydrocarbon occurrences. There is also a need to integrate technological applicability and exploration well success rates. The data set's normalization process should be carefully regarded to ensure correct comparative and contrastive analysis, and it should be used only within the context for which it was intended — pre-exploration in the Sichuan Basin.

## Review details
Inventory: The internal review was done by several iteration steps concerning raw data validation, raw data documentation, representativity, completeness and consistency of modelling with regard to ISO 14040 and 14044.

## Data sources
- 刘超英;闫相宾;高山林;闵斌; 油气预探区带评价优选方法及其应用. 石油与天然气地质 314-318+329 (2015).
