# Cadmium-nickel battery ; Cadmium or cadmium oxide, potassium hydroxide, nickelous hydroxide, nickel nitrate ; Sintering ; All sizes; NESPS2 / 镉镍电池 ; 镉或氧化镉、氢氧化钾、氢氧化亚镍、硝酸镍 ; 烧结式 ; 所有规模 ; 全国第二次污染普查数据

Dataset: ILCD process, Unit process, single operation
Geography: CN
Reference year: 2019
Classification: Reference Parameters / Energy carriers and technologies / Other non-renewable fuels
Generated by: The data was created by the Office of the Second National Pollution Source Census of the Ministry of Ecology and Environment, and the data was organized by the TianGong Plan team for ILCD format / 生态环境部第二次全国污染源普查工作办公室创建数据，天工计划团队常慧敏整理数据为ILCD格式
Owner: Tiangong LCI Data Working Group / 天工LCI数据工作小组
Review: Dependent internal review by Tiangong LCI Data Working Group / 天工LCI数据工作小组
Amounts: no units in this file; such an amount is in the reference unit of its flow, which a separate flow dataset defines
copyright: false
licenseType: Free of charge for all users and uses

## General comment
the treatment technology for the pollution of Exhaust gasdidn't offered

## Technical purpose
镉镍电池的生产工艺涉及使用镉或氧化镉、氢氧化钾、氢氧化亚镍和硝酸镍通过烧结过程制造各种大小的电池。这些电池常用于多种应用场合，包括应急照明、备用电源和某些类型的电动车辆。

## Reference product
- Nickel-Cadmium Battery: 10000; calculated
  源文件中描述为为镉镍电池，此处对其进行了匹配工作，将其匹配到LCAflow库里面相最符合的流，污染物指标备注为工业废水量

## Outputs
- cadmium: 4.6e-6; calculated
  the Technical of end-of-pipe management technology for pollution cadmiumisChemical precipitation + neutralization，Its Technical efficiency of end-of-pipe management95
  污染物指标总镉的末端治理技术是化学沉淀法+中和法，其效率为95，末端治理设施实际运行率（k值）计算公式为k=废水处理设备正常运转时间（小时/年）/正常生产时间（小时/年）。原文件中描述污染物类别为废水，污染物指标为总镉，此处对其进行了匹配工作，将其匹配到LCAflow库里面相最符合的流，污染物指标备注为总镉
- Waste water: 0.28; calculated
  the treatment technology for the pollution of Waste waterdidn't offered
  污染物指标工业废水量的末端治理技术是－。原文件中描述污染物类别为废水，污染物指标为工业废水量，此处对其进行了匹配工作，将其匹配到LCAflow库里面相最符合的流，污染物指标备注为工业废水量
- chemical oxygen demand: 0.002705; calculated
  the Technical of end-of-pipe management technology for pollution chemical oxygen demandisChemical precipitation + neutralization，Its Technical efficiency of end-of-pipe management50
  污染物指标化学需氧量的末端治理技术是化学沉淀法+中和法，其效率为50，末端治理设施实际运行率（k值）计算公式为k=废水处理设备正常运转时间（小时/年）/正常生产时间（小时/年）。原文件中描述污染物类别为废水，污染物指标为化学需氧量，此处对其进行了匹配工作，将其匹配到LCAflow库里面相最符合的流，污染物指标备注为化学需氧量
- Exhaust gas: 1350; calculated
  the treatment technology for the pollution of Exhaust gasdidn't offered
  污染物指标工业废气量的末端治理技术是－。原文件中描述污染物类别为废气，污染物指标为工业废气量，此处对其进行了匹配工作，将其匹配到LCAflow库里面相最符合的流，污染物指标备注为工业废气量

## Use advice
This dataset is derived from the Pollution Source Census Report and contains information on pollution emissions and related products. However, it does not include data on energy or chemical consumption, nor does it provide information on waste or co-product generation. When utilizing this dataset, please supplement the missing data based on actual conditions before use
该数据集来源于污染源普查报告，包含污染物排放及相关产品信息，但不包含能源或化学品消耗数据，也不提供废弃物或共生产物产生信息。在使用该数据集时，请根据实际情况补充缺失数据后再使用。

## Review details
Inventory: The internal review was done by several iteration steps concerning raw data validation, raw data documentation, representativity, completeness and consistency of modelling with regard to ISO 14040 and 14044.
清单： 内部审查通过几个迭代步骤完成，涉及原始数据验证、原始数据记录、代表性、完整性、与 ISO 14040 和 14044 有关的建模的一致性。

## Data sources
- 第二次全国污染源普查产排污核算系数手册（试用版）,二级代码38,四级代码3849文件，在完整版文件中第3413页
