# Steam/hot water/other ; Gas ; All types of boilers (outside boiler water treatment) ; All sizes; NESPS2 / 蒸汽/热水/其它 ; 燃气 ; 全部类型锅炉（锅外水处理） ; 所有规模 ; 全国第二次污染普查数据

Dataset: ILCD process, Unit process, single operation
Geography: CN
Reference year: 2019
Classification: Reference Parameters / Energy carriers and technologies / Heat and steam
Generated by: The data was created by the Office of the Second National Pollution Source Census of the Ministry of Ecology and Environment, and the data was organized by the TianGong Plan team for ILCD format / 生态环境部第二次全国污染源普查工作办公室创建数据，天工计划团队常慧敏整理数据为ILCD格式
Owner: Tiangong LCI Data Working Group / 天工LCI数据工作小组
Review: Dependent internal review by Tiangong LCI Data Working Group / 天工LCI数据工作小组
Amounts: no units in this file; such an amount is in the reference unit of its flow, which a separate flow dataset defines
copyright: false
licenseType: Free of charge for all users and uses

## General comment
the Technical of end-of-pipe management technology for pollution Waste waterisPhysical + chemical + comprehensive utilization，Its Technical efficiency of end-of-pipe management100

## Technical purpose
该数据集描述了使用蒸汽、热水和其它气体形式的多种锅炉，可能包括所有类型和大小，并配备了锅外水处理设施。这些锅炉可用于多个领域，包括发电、制造和加工行业。该数据集还详细介绍了废水和化学需氧量（COD）污染的末端处理技术，这些技术结合了物理和化学处理方法，以及综合利用方法，以实现高效的污染控制。

## Reference product
- Gas: 10000; input; calculated
  源文件中描述为为燃气，此处对其进行了匹配工作，将其匹配到LCAflow库里面相最符合的流，污染物指标备注为工业废水量

## Outputs
- chemical oxygen demand: 0; calculated
  the Technical of end-of-pipe management technology for pollution chemical oxygen demandisPhysical + chemical + comprehensive utilization，Its Technical efficiency of end-of-pipe management100
  污染物指标化学需氧量的末端治理技术是物理+化学法+综合利用，其效率为100，末端治理设施实际运行率（k值）计算公式为K=（锅炉运行小时数-废水处理设施的故障小时数）/锅炉运行小时数。原文件中描述污染物类别为废水，污染物指标为化学需氧量，此处对其进行了匹配工作，将其匹配到LCAflow库里面相最符合的流，污染物指标备注为化学需氧量
- chemical oxygen demand: 0.429948; calculated
  the Technical of end-of-pipe management technology for pollution chemical oxygen demandisPhysical + chemical method，Its Technical efficiency of end-of-pipe management60.19
  污染物指标化学需氧量的末端治理技术是物理+化学法，其效率为60.19，末端治理设施实际运行率（k值）计算公式为K=（锅炉运行小时数-废水处理设施的故障小时数）/锅炉运行小时数。原文件中描述污染物类别为废水，污染物指标为化学需氧量，此处对其进行了匹配工作，将其匹配到LCAflow库里面相最符合的流，污染物指标备注为化学需氧量
- Waste water: 0; calculated
  The end-of-pipe treatment technology for the pollutant indicator industrial wastewater volume is physical + chemical method, which has an efficiency of 0. The formula for calculating the actual operation rate of the end-of-pipe treatment facilities (k-value) is K=(boiler operation hours - wastewater treatment facilities' failure hours)/boiler operation hours. The original document describes the pollutant category as wastewater, pollutant indicators for industrial wastewater, here to match it to the LCAflow library face to face with the most compatible flow, pollutant indicators note for industrial wastewater volume of the original description of the production coefficient of 13.56 (boiler effluent + softening treatment wastewater). Please modify the corresponding emission rate after calculating according to the note..The original article describes the pollution production coefficients as 13.56（锅炉排污水＋软化处理废水）。Please revise the corresponding emissions after accounting for them according to the notes.。.The original article describes the pollution production coefficients as 13.56（锅炉排污水＋软化处理废水）. Please revise the corresponding emissions after accounting for them according to the notes.
  污染物指标工业废水量的末端治理技术是物理+化学法，其效率为0，末端治理设施实际运行率（k值）计算公式为K=（锅炉运行小时数-废水处理设施的故障小时数）/锅炉运行小时数。原文件中描述污染物类别为废水，污染物指标为工业废水量，此处对其进行了匹配工作，将其匹配到LCAflow库里面相最符合的流，污染物指标备注为工业废水量原文描述的产污系数为 13.56（锅炉排污水＋软化处理废水）。请根据备注自行核算后修改对应的排放量。
- Waste water: 0; calculated
  the Technical of end-of-pipe management technology for pollution Waste waterisPhysical + chemical + comprehensive utilization，Its Technical efficiency of end-of-pipe management100.The original article describes the pollution production coefficients as 13.56（锅炉排污水＋软化处理废水）。Please revise the corresponding emissions after accounting for them according to the notes.。.The original article describes the pollution production coefficients as 13.56（锅炉排污水＋软化处理废水）. Please revise the corresponding emissions after accounting for them according to the notes.
  污染物指标工业废水量的末端治理技术是物理+化学法+综合利用，其效率为100，末端治理设施实际运行率（k值）计算公式为K=（锅炉运行小时数-废水处理设施的故障小时数）/锅炉运行小时数。原文件中描述污染物类别为废水，污染物指标为工业废水量，此处对其进行了匹配工作，将其匹配到LCAflow库里面相最符合的流，污染物指标备注为工业废水量原文描述的产污系数为 13.56（锅炉排污水＋软化处理废水）。请根据备注自行核算后修改对应的排放量。

## Use advice
This dataset is derived from the Pollution Source Census Report and contains information on pollution emissions and related products. However, it does not include data on energy or chemical consumption, nor does it provide information on waste or co-product generation. When utilizing this dataset, please supplement the missing data based on actual conditions before use
该数据集来源于污染源普查报告，包含污染物排放及相关产品信息，但不包含能源或化学品消耗数据，也不提供废弃物或共生产物产生信息。在使用该数据集时，请根据实际情况补充缺失数据后再使用。

## Review details
Inventory: The internal review was done by several iteration steps concerning raw data validation, raw data documentation, representativity, completeness and consistency of modelling with regard to ISO 14040 and 14044.
清单： 内部审查通过几个迭代步骤完成，涉及原始数据验证、原始数据记录、代表性、完整性、与 ISO 14040 和 14044 有关的建模的一致性。

## Data sources
- 第二次全国污染源普查产排污核算系数手册（试用版）,四级代码4430文件，在完整版文件中第5449页
