# Synthesis of olefin oligomerization by biomass pyrolysis gasification of low carbon olefin Fischer-Tropsch

Dataset: ILCD process, Unit process, black box
Geography: CN
Classification: Unit processes / Energy carriers and technologies / Renewable fuels
Functional unit: 1 MJ aviation fuel
LCI method principle: Attributional
LCI method approaches: Allocation - gross calorific value
Generated by: Zhang Yixuan, zhangyixuan0444@igsnrr.ac.cn
Owner: Tiangong LCI Data Working Group
Review: Dependent internal review by Tiangong LCI Data Working Group
Amounts: no units in this file; such an amount is in the reference unit of its flow, which a separate flow dataset defines
licenseType: Free of charge for all users and uses

## General comment
Biomass is pyrolyzed at high temperatures, and the gas in the biomass pyrolysis product reacts with oxygen or steam in a high temperature environment to generate synthetic gas. In the synthetic gas, selective hydrogenation, oxidation and other reactions convert carbon monoxide and hydrogen into olefin compounds. The synthesized olefins react with other fuel components from biomass sources through liquid phase or gas phase reaction to produce bio-jet oil that meets aviation fuel standards

## Technical purpose
Biomass pyrolysis gasification of low carbon olefin Fischer-Tropsch to synthesize olefin oligomerization of Li Yong Rice husks and other biomass raw materials, through biomass pyrolysis, gasification, olefin oligomerization, and finally through liquid phase gas reaction to synthesize biological jet oil. This alternative jet fuel production process primarily serves the aviation industry by providing a renewable fuel source with lower potential greenhouse gas emissions compared to traditional fossil fuel-based jet fuels.

## Model description
Build a simulation model of the complete process using Aspen Plus software and perform simulation calculations to obtain the mass flow, energy flow, thermodynamic parameters, and reactor power consumption of each process based on mass balance

## Reference product
- water: 0.0018; input; calculated

## Inputs
- Electricity: 0.396, 0.396, 5.4, 0.396, 0.396 (5 entries); calculated
- Electricity: 3.276; calculated
  Production process input

## Outputs
All rows: calculated
- carbon dioxide (biogenic): 0.013, 0.27, 9.4, 0.97 (4 entries)
  The original article does not distinguish between bio and fossil, and experts judge that this is bio
- carbon monoxide (biogenic): 0.84, 0.0038 (2 entries)
  (same comment as for carbon dioxide (biogenic))
- nitrous oxide: 2.2e-15, 2e-5 (2 entries)
- methane (biogenic): 0.0026
- sulfur dioxide: 6.3e-6, 0.0045 (2 entries)
- methane (biogenic): 0.003
  (same comment as for carbon dioxide (biogenic))

## Deviations from the LCI method approaches
Allocate environmental impact values according to energy allocation, that is, during the emission allocation process, allocate the energy of aviation fuel and other fuels to each MJ of aviation fuel production

## Use advice
When utilizing this data set for life cycle assessment, it is crucial to consider energy allocation principles. The environmental impacts must be allocated based on the energy content of the bio-aviation fuel and any other co-produced fuels. The allocation should be proportionate to the energy provided by each MJ of bio-aviation fuel produced. It is important to ensure that methodological consistency is maintained with the system boundaries, and that the selection of allocation method is justified and in line with the goals of the study.

## Review details
Inventory: The internal review was done by several iteration steps concerning raw data validation, raw data documentation, representativity, completeness and consistency of modelling with regard to ISO 14040 and 14044.

## Data sources
- 于点. 生物质基航空燃料制备工艺系统仿真、㶲分析及全生命周期评价(东南大学, 2019).
