# Bauxite Mining ; Bauxite ; Cradle ; 2008

Dataset: ILCD process, Unit process, single operation
Geography: CN
Reference year: 2021
Classification: Unit processes / Materials production / Non-energetic raw materials
Generated by: Zimeng Cai, caizm6178@163.com
Owner: Tiangong LCI Data Working Group
Review: Dependent internal review by Tiangong LCI Data Working Group
Amounts: no units in this file; such an amount is in the reference unit of its flow, which a separate flow dataset defines
copyright: false
licenseType: Free of charge for all users and uses

## General comment
氧化铝生产2017

## Time period
Date of publication

## Technical purpose
The data set pertains to the process of bauxite mining and alumina production which is the initial stage in the production of aluminum. Bauxite is the primary raw material used in the manufacture of aluminum metal and is extracted from the earth through mining. After mining, bauxite is refined into alumina or aluminum oxide, which in turn is used to produce aluminum by the process of smelting. This data set is relevant for stakeholders involved in the mining sector, aluminum production industry, and any related fields requiring inputs of bauxite and alumina in their processes.

## Reference product
- bauxite: 3.29266e10; software or database

## Inputs
All rows: software or database
- electricity, high voltage, aluminium industry: 5.50159e7
  electricity
- other fuels: 1.59749e9
  electricity
- Coal, brown, in ground: 3.38913e7
  coal
- natural gas, high pressure: 374800
  coal
- Gasoline: 1.5506e6
  gasoline
- Diesel oil: 8.396e6
  diesel

## Data selection and combination
The data in this study refers to the LCA data of PA, SA, electricity, and other background data. The PA data were obtained from statistical data sources, and the SA data were mainly obtained from the literatures. The background data were mainly derived from the Chinese localization LCA database CAS RCEES 2018, which was established by the Research Center for Eco-Environmental Sciences, Chinese Academy of Sciences and covers LCA data for energy, materials, transportation, waste management etc.

## Use advice
When utilizing this data set, users are advised to carefully consider the year of publication (2008 for bauxite mining and 2017 for alumina production), as changes in technology and environmental regulations might have occurred since then. To accurately interpret the LCA data, it is recommended to refer to the technological applications relevant to the time period of the data. Users should integrate this data with current and localized LCA data to ensure the accuracy of their assessments. When modeling the use phase behavior, factor in the specific requirements of the aluminum production process. Pay attention to methodological guidelines on the inclusion or exclusion of recycling processes where applicable.

## Review details
Inventory: The internal review was done by several iteration steps concerning raw data validation, raw data documentation, representativity, completeness and consistency of modelling with regard to ISO 14040 and 14044.

## Data sources
- Ding, N., Liu, N., Lu, B. & Yang, J. Life cycle greenhouse gas emissions of aluminum based on regional industrial transfer in China. J. Ind. Ecol. 25, 1657–1672 (2021).
