# Electricity production ; Thermal power ; Tianjin

Dataset: ILCD process, Unit process, single operation
Geography: TJ-CN
Reference year: 2019
Classification: Energy carriers and technologies / Electricity
Generated by: Ruoxi Xiong, xiongrx0126@163.com
Owner: Tiangong LCI Data Working Group
Review: Dependent internal review by Tiangong LCI Data Working Group
Amounts: no units in this file; such an amount is in the reference unit of its flow, which a separate flow dataset defines
copyright: false
licenseType: Free of charge for all users and uses

## General comment
Thermal power generation includes seventeen fossil fuels such as raw coal, washed coal, oil and natural gas. The process only considers the direct power generation process, not the upstream raw material extraction and processing and the downstream power consumption

## Time period
Calculated based on data from the 2019 Energy Statistics Yearbook

## Technical purpose
The data set pertains to thermal power generation in Tianjin, which utilizes a variety of fossil fuels including raw coal, washed coal, oil, and natural gas. This process is employed to provide electricity for a wide range of applications, from residential to industrial needs, within the region.

## Reference product
- electricity for thermal power: 3.4704; calculated

## Inputs
All rows: calculated
- Raw coal: 0.295106
- Coke oven gas: 0.002412
- blast furnace gas: 0.076089
- Converter gas: 0.004795
- crude oil; 42.3 MJ/kg: 0.00225798
- Diesel: 2.821e-5
- fuel oil, unspecified: 2.82e-6
- petroleum coke: 0.00241876
- refinery gas: 2.82e-6
- Natural Gas: 0.043749

## Outputs
- carbon dioxide: 0.7; calculated
- sulfur dioxide: 0.000112; calculated
- Nitrogen oxides: 0.000173325; calculated
- Dust (unspecified, from stack): 2.5396e-5; calculated

## Data treatment and extrapolations
For the accounting method, please refer to the "Enterprise Greenhouse Gas Emissions Accounting Methods and Reporting Guidelines for Power Generation Facilities". Different forms of power generation and fuel consumption come from Chapter 3 (Energy Production) and Chapter 6 (Regional Energy Balance Sheet) in the "China Energy Statistical Yearbook 2020". The fuel parameters such as low calorific value and carbon content per unit calorific value used to calculate the carbon dioxide emission factor come from the "2019 China Regional Power Grid Carbon Dioxide Baseline Emission Factor Calculation Instructions OM" and the "Enterprise Greenhouse Gas Emission Accounting Method and Reporting Guide for Power Generation Facilities" 》

## Use advice
When utilizing this LCA data, focus on the direct power generation process. Exclude upstream activities such as raw material extraction and processing, as well as downstream electricity consumption. Use the data in conjunction with the 2019 Energy Statistics Yearbook as well as reference documents like the 'Enterprise Greenhouse Gas Emissions Accounting Methods and Reporting Guidelines for Power Generation Facilities' and relevant chapters from the 'China Energy Statistical Yearbook 2020' to ensure accurate carbon dioxide emissions accounting.

## Review details
Inventory: The internal review was done by several iteration steps concerning raw data validation, raw data documentation, representativity, completeness and consistency of modelling with regard to ISO 14040 and 14044.

## Data sources
- 熊若熙. 中国电力生产和消费二氧化碳与污染物排放因子核算. (清华大学, 2023).
