# Molten steel production;Molten steel;BOF

Dataset: ILCD process, Unit process, single operation
Geography: CN
Classification: Unit processes / Materials production / Metals and semimetals
Generated by: Fuxiang, 1162850692@qq.com
Owner: Tiangong LCI Data Working Group
Review: Dependent internal review by Tiangong LCI Data Working Group
Amounts: no units in this file; such an amount is in the reference unit of its flow, which a separate flow dataset defines
copyright: false
licenseType: Free of charge for all users and uses

## General comment
This data set represents the molten steel production process using the Basic Oxygen Furnace (BOF) method, commonly applied in integrated steel plants. The molten steel produced is typically used in a variety of applications such as construction, automotive industry, heavy machinery manufacturing, and household appliances.

## Geography
The data of the BF-BOF pathway were obtained from the large-scale integrated steel plants in China with an attached coking plant and EAF plant.

## Reference product
- Molten steel: 1023.4; measured

## Inputs
All rows: measured
- Molten Iron: 924
  Molten iron
- Iron scrap: 124.2
  Scrap steel/iron
- dolomite: 2.6
- quicklime: 24.3
  Quicklime
- Circulating water: 7600
- Refractory: 9.8
- oxygen: 51.6
- Coke oven gas: 13.7
  COG
- Linz-Donawitz gas: 2.2
  LDG
- Silicomanganese: 17.8
- Electricity: 180.36

## Outputs
- Linz-Donawitz gas: 98.1; measured
  LDG
- BOF Slag: 157.1; measured

## Use advice
When utilizing this data set for Life Cycle Assessment, pay special attention to system boundaries and technological applicability. The intended scope should reflect integrated steel plants with coking and electric arc furnace capabilities. Consideration should be given to specific regional practices and the inclusion or exclusion of related upstream and downstream processes, such as raw material extraction, transportation, and potential end-of-life recycling aspects.

## Review details
Inventory: The internal review was done by several iteration steps concerning raw data validation, raw data documentation, representativity, completeness and consistency of modelling with regard to ISO 14040 and 14044.

## Data sources
- The carbon reduction potential of hydrogen in the low carbon transition of the iron and steel industry: The case of China
