# greywater reuse ; greywater ; MBR with sludge incineration

Dataset: ILCD process, Unit process, black box
Geography: ES
Classification: Unit processes / End-of-life treatment / Waste water treatment
Generated by: 榕
Owner: Tiangong LCI Data Working Group
Review: Dependent internal review by Tiangong LCI Data Working Group
Amounts: no units in this file; such an amount is in the reference unit of its flow, which a separate flow dataset defines
copyright: ['opt4ROkqig']
licenseType: Free of charge for all users and uses

## General comment
The MBR greywater reuse system with sludge incineration capability can efficiently treat greywater and minimize environmental impact. However, this system also requires suitable sludge treatment facilities, and considerations for waste gas treatment and energy utilization during sludge incineration.

## Technology and included processes
The selected MBR adopts an immersed configuration to reduce energy consumption. The membrane is a flat-sheet ultrafiltration polyethersulfone membrane with a pore size of 50 nm, and an permeate flux of 19.2 L m-2 h-1. The hydraulic retention time (HRT) is estimated to be 25.6 hours. Assuming a sludge retention time (SRT) of 35 days. The biomass condition is based on an average mixed liquor total suspended solids (MLTSS) of 8.00 g L-1 as a reference.

## Technical purpose
The MBR greywater reuse system with sludge incineration is designed for the efficient treatment of greywater, aiming to minimize environmental impacts by incorporating advanced sludge management practices. Suitable for wastewater treatment facilities with high-environmental performance requirements, this system is optimal for scenarios where space is at a premium and minimized waste disposal is critical. With an emphasis on sustainability, it is an excellent choice for wastewater treatment plants that prioritize energy efficiency and waste reduction.

## Reference product
- greywater: 1; input; estimated

## Inputs
- Polyacrylamide: 0.00063
- air: 2072
- Electricity: 41.4
  Aeration
- Electricity: 20.3
  Pumping
- Electricity: 0.1
  Sludge treatment

## Outputs
- Sludge: 0.07; measured
- waste water - treated: 1; estimated

## Use advice
When utilizing the data for this MBR greywater reuse system with sludge incineration, users should incorporate the specific operational parameters indicated, such as the pore size of the membrane (50 nm), permeate flux (19.2 L m-2 h-1), hydraulic retention time (25.6 hours), and sludge retention time (35 days), for accurate simulation and impact analysis in LCA models. Users must also consider the additional infrastructure for sludge treatment and the potential need for waste gas treatment during sludge incineration, adhering to applicable emissions regulations. Further, the methodology for quantifying energy recovery benefits from sludge incineration should be consistent and transparent. Care should be taken to ensure methodological consistency when integrating this dataset with other data in an LCA study.

## Review details
Inventory: The internal review was done by several iteration steps concerning raw data validation, raw data documentation, representativity, completeness and consistency of modelling with regard to ISO 14040 and 14044.

## Data sources
- Dominguez, S. et al. LCA of greywater management within a water circular economy restorative thinking framework. SCIENCE OF THE TOTAL ENVIRONMENT 621, 1047–1056 (2018).
