# Octinoxate ; Benzene acetonitrile, ethyl chloride ; Synthesis ; All sizes; NESPS2 / 辛硫磷 ; 苯乙腈、乙基氯化物 ; 合成 ; 所有规模 ; 全国第二次污染普查数据

Dataset: ILCD process, Unit process, single operation
Geography: CN
Reference year: 2019
Classification: Reference Parameters / Materials production / Organic chemicals
Generated by: The data was created by the Office of the Second National Pollution Source Census of the Ministry of Ecology and Environment, and the data was organized by the TianGong Plan team for ILCD format / 生态环境部第二次全国污染源普查工作办公室创建数据，天工计划团队常慧敏整理数据为ILCD格式
Owner: Tiangong LCI Data Working Group / 天工LCI数据工作小组
Review: Dependent internal review by Tiangong LCI Data Working Group / 天工LCI数据工作小组
Amounts: no units in this file; such an amount is in the reference unit of its flow, which a separate flow dataset defines
copyright: false
licenseType: Free of charge for all users and uses

## General comment
the Technical of end-of-pipe management technology for pollution chemical oxygen demandisA2/O process，Its Technical efficiency of end-of-pipe management80

## Technical purpose
该工业过程描述了在各种规模上合成Octinoxate和苯乙腈及乙基氯化物的过程。这些化学品通常用于生产防晒霜、药品和有机合成应用。数据集还包括针对污染控制的尾端管理技术，特别是针对废水、化学需氧量（COD）、氨氮、有机结合氮、总磷、废气和挥发性有机化合物（VOCs）。提到的技术包括各种组合的氧化还原过程、化学沉淀、A2/O过程、电解、混凝、形状厌氧反应器、A/O过程、活性污泥过程、吸收、吸附、蒸汽脱附、RTO（蓄热式热氧化器）和冷凝。

## Reference product
- Phoxim: 1000; calculated
  源文件中描述为为辛硫磷，此处对其进行了匹配工作，将其匹配到LCAflow库里面相最符合的流，污染物指标备注为工业废水量

## Outputs
All rows: calculated
- volatile organic compound: 0.134
  the Technical of end-of-pipe management technology for pollution volatile organic compoundisRTO，Its Technical efficiency of end-of-pipe management99.9，The formula for calculating the actual operation rate (k-value) of the end-of-pipe treatment facility is k = power consumption of equipment (kWh) / (equipment rated power (kW) × equipment operating time (hours))
  污染物指标挥发性有机物的末端治理技术是RTO，其效率为99.9，末端治理设施实际运行率（k值）计算公式为k=治理设施耗电量（千瓦时）/（治理设施运行时数（小时）*治理设施额定功率(千瓦)）。原文件中描述污染物类别为废气，污染物指标为挥发性有机物，此处对其进行了匹配工作，将其匹配到LCAflow库里面相最符合的流，污染物指标备注为挥发性有机物
- volatile organic compound: 4.02
  the Technical of end-of-pipe management technology for pollution volatile organic compoundis(Absorption + diversion) + (adsorption + steam desorption)/(adsorption + nitrogen/air desorption)，Its Technical efficiency of end-of-pipe management97，The formula for calculating the actual operation rate (k-value) of the end-of-pipe treatment facility is k = power consumption of equipment (kWh) / (equipment rated power (kW) × equipment operating time (hours))
  污染物指标挥发性有机物的末端治理技术是（吸收+分流）+（吸附+蒸汽解析）/（吸附+氮气/空气解析），其效率为97，末端治理设施实际运行率（k值）计算公式为k=治理设施耗电量（千瓦时）/（治理设施运行时数（小时）*治理设施额定功率(千瓦)）。原文件中描述污染物类别为废气，污染物指标为挥发性有机物，此处对其进行了匹配工作，将其匹配到LCAflow库里面相最符合的流，污染物指标备注为挥发性有机物
- volatile organic compound: 4.02
  the Technical of end-of-pipe management technology for pollution volatile organic compoundisCondensation + (absorption + diversion) + (adsorption + steam desorption)/(adsorption + nitrogen/air desorption)，Its Technical efficiency of end-of-pipe management97
  污染物指标挥发性有机物的末端治理技术是冷凝法+（吸收+分流）+（吸附+蒸汽解析）/（吸附+氮气/空气解析），其效率为97，末端治理设施实际运行率（k值）计算公式为k=治理设施耗电量（千瓦时）/（治理设施运行时数（小时）*治理设施额定功率(千瓦)）。原文件中描述污染物类别为废气，污染物指标为挥发性有机物，此处对其进行了匹配工作，将其匹配到LCAflow库里面相最符合的流，污染物指标备注为挥发性有机物
- Waste water: 14000
  the Technical of end-of-pipe management technology for pollution Waste wateris/，Its Technical efficiency of end-of-pipe management0
  污染物指标工业废水量的末端治理技术是/，其效率为0。原文件中描述污染物类别为废水，污染物指标为工业废水量，此处对其进行了匹配工作，将其匹配到LCAflow库里面相最符合的流，污染物指标备注为工业废水量
- Ammonia Nitrogen: 0.1495
  the Technical of end-of-pipe management technology for pollution Ammonia NitrogenisChemical precipitation + activated sludge process + redox process，Its Technical efficiency of end-of-pipe management87
  污染物指标氨氮的末端治理技术是化学沉淀+活性污泥法+氧化还原法，其效率为87，末端治理设施实际运行率（k值）计算公式为k=治理设施耗电量（千瓦时）/（治理设施运行时数（小时）*治理设施额定功率(千瓦)）。原文件中描述污染物类别为废水，污染物指标为氨氮，此处对其进行了匹配工作，将其匹配到LCAflow库里面相最符合的流，污染物指标备注为氨氮
- Ammonia Nitrogen: 0.1495
  the Technical of end-of-pipe management technology for pollution Ammonia NitrogenisElectrolysis + activated sludge process，Its Technical efficiency of end-of-pipe management87，The formula for calculating the actual operation rate (k-value) of the end-of-pipe treatment facility is k = opreating time of treatment facilities (hours/year) / normal production time (hours/year)
  污染物指标氨氮的末端治理技术是电解法+活性污泥法，其效率为87，末端治理设施实际运行率（k值）计算公式为k=治理设施耗电量（千瓦时）/（治理设施运行时数（小时）*治理设施额定功率(千瓦)）。原文件中描述污染物类别为废水，污染物指标为氨氮，此处对其进行了匹配工作，将其匹配到LCAflow库里面相最符合的流，污染物指标备注为氨氮
- Ammonia Nitrogen: 0.1495
  the Technical of end-of-pipe management technology for pollution Ammonia NitrogenisElectrolysis + chemical coagulation + shaped anaerobic reactor + A/O process，Its Technical efficiency of end-of-pipe management87，The formula for calculating the actual operation rate (k-value) of the end-of-pipe treatment facility is k = opreating time of treatment facilities (hours/year) / normal production time (hours/year)
  污染物指标氨氮的末端治理技术是电解法+化学混凝法+定型厌氧反应器类+A/O工艺，其效率为87，末端治理设施实际运行率（k值）计算公式为k=治理设施耗电量（千瓦时）/（治理设施运行时数（小时）*治理设施额定功率(千瓦)）。原文件中描述污染物类别为废水，污染物指标为氨氮，此处对其进行了匹配工作，将其匹配到LCAflow库里面相最符合的流，污染物指标备注为氨氮
- Ammonia Nitrogen: 0.1495
  the Technical of end-of-pipe management technology for pollution Ammonia NitrogenisRedox process + chemical precipitation + A2/O process，Its Technical efficiency of end-of-pipe management87
  污染物指标氨氮的末端治理技术是氧化还原法+化学沉淀法+A2/O工艺，其效率为87，末端治理设施实际运行率（k值）计算公式为k=治理设施耗电量（千瓦时）/（治理设施运行时数（小时）*治理设施额定功率(千瓦)）。原文件中描述污染物类别为废水，污染物指标为氨氮，此处对其进行了匹配工作，将其匹配到LCAflow库里面相最符合的流，污染物指标备注为氨氮
- phosphorus, total: 0.2007
  the Technical of end-of-pipe management technology for pollution phosphorus, totalisRedox process + chemical precipitation + A2/O process，Its Technical efficiency of end-of-pipe management91，The formula for calculating the actual operation rate (k-value) of the end-of-pipe treatment facility is k = annual power consumption of equipment (kWh) / design power consumption of equipment (kWh)
  污染物指标总磷的末端治理技术是氧化还原法+化学沉淀法+A2/O工艺，其效率为91，末端治理设施实际运行率（k值）计算公式为k=治理设施耗电量（千瓦时）/（治理设施运行时数（小时）*治理设施额定功率(千瓦)）。原文件中描述污染物类别为废水，污染物指标为总磷，此处对其进行了匹配工作，将其匹配到LCAflow库里面相最符合的流，污染物指标备注为总磷
- Ammonia Nitrogen: 0.2875
  the Technical of end-of-pipe management technology for pollution Ammonia NitrogenisA2/O process，Its Technical efficiency of end-of-pipe management75
  污染物指标氨氮的末端治理技术是A2/O工艺，其效率为75，末端治理设施实际运行率（k值）计算公式为k=治理设施耗电量（千瓦时）/（治理设施运行时数（小时）*治理设施额定功率(千瓦)）。原文件中描述污染物类别为废水，污染物指标为氨氮，此处对其进行了匹配工作，将其匹配到LCAflow库里面相最符合的流，污染物指标备注为氨氮
- phosphorus, total: 1.561
  the Technical of end-of-pipe management technology for pollution phosphorus, totalisA2/O process，Its Technical efficiency of end-of-pipe management30
  污染物指标总磷的末端治理技术是A2/O工艺，其效率为30，末端治理设施实际运行率（k值）计算公式为k=治理设施耗电量（千瓦时）/（治理设施运行时数（小时）*治理设施额定功率(千瓦)）。原文件中描述污染物类别为废水，污染物指标为总磷，此处对其进行了匹配工作，将其匹配到LCAflow库里面相最符合的流，污染物指标备注为总磷
- Nitrogen, organic bound: 3.255
  the Technical of end-of-pipe management technology for pollution Nitrogen, organic boundisElectrolysis + activated sludge process，Its Technical efficiency of end-of-pipe management69，The formula for calculating the actual operation rate (k-value) of the end-of-pipe treatment facility is k = annual power consumption of equipment (kWh) / design power consumption of equipment (kWh)
  污染物指标总氮的末端治理技术是电解法+活性污泥法，其效率为69，末端治理设施实际运行率（k值）计算公式为k=治理设施耗电量（千瓦时）/（治理设施运行时数（小时）*治理设施额定功率(千瓦)）。原文件中描述污染物类别为废水，污染物指标为总氮，此处对其进行了匹配工作，将其匹配到LCAflow库里面相最符合的流，污染物指标备注为总氮
- Exhaust gas: 5000
  the Technical of end-of-pipe management technology for pollution Exhaust gasis/，Its Technical efficiency of end-of-pipe management0，The formula for calculating the actual operation rate (k-value) of the end-of-pipe treatment facility is k = power consumption of equipment (kWh) / (equipment rated power (kW) × equipment operating time (hours))
  污染物指标工业废气量的末端治理技术是/，其效率为0。原文件中描述污染物类别为废气，污染物指标为工业废气量，此处对其进行了匹配工作，将其匹配到LCAflow库里面相最符合的流，污染物指标备注为工业废气量
- Nitrogen, organic bound: 5.145
  the Technical of end-of-pipe management technology for pollution Nitrogen, organic boundisChemical precipitation + activated sludge process + redox process，Its Technical efficiency of end-of-pipe management51，The formula for calculating the actual operation rate (k-value) of the end-of-pipe treatment facility is k = annual power consumption of equipment (kWh) / design power consumption of equipment (kWh)
  污染物指标总氮的末端治理技术是化学沉淀+活性污泥法+氧化还原法，其效率为51，末端治理设施实际运行率（k值）计算公式为k=治理设施耗电量（千瓦时）/（治理设施运行时数（小时）*治理设施额定功率(千瓦)）。原文件中描述污染物类别为废水，污染物指标为总氮，此处对其进行了匹配工作，将其匹配到LCAflow库里面相最符合的流，污染物指标备注为总氮
- chemical oxygen demand: 11.82
  the Technical of end-of-pipe management technology for pollution chemical oxygen demandisElectrolysis + chemical coagulation + shaped anaerobic reactor + A/O process，Its Technical efficiency of end-of-pipe management97
  污染物指标化学需氧量的末端治理技术是电解法+化学混凝法+定型厌氧反应器类+A/O工艺，其效率为97，末端治理设施实际运行率（k值）计算公式为k=治理设施耗电量（千瓦时）/（治理设施运行时数（小时）*治理设施额定功率(千瓦)）。原文件中描述污染物类别为废水，污染物指标为化学需氧量，此处对其进行了匹配工作，将其匹配到LCAflow库里面相最符合的流，污染物指标备注为化学需氧量
- chemical oxygen demand: 23.64
  the Technical of end-of-pipe management technology for pollution chemical oxygen demandisRedox process + chemical precipitation + A2/O process，Its Technical efficiency of end-of-pipe management94
  污染物指标化学需氧量的末端治理技术是氧化还原法+化学沉淀法+A2/O工艺，其效率为94，末端治理设施实际运行率（k值）计算公式为k=治理设施耗电量（千瓦时）/（治理设施运行时数（小时）*治理设施额定功率(千瓦)）。原文件中描述污染物类别为废水，污染物指标为化学需氧量，此处对其进行了匹配工作，将其匹配到LCAflow库里面相最符合的流，污染物指标备注为化学需氧量
- chemical oxygen demand: 39.4
  the Technical of end-of-pipe management technology for pollution chemical oxygen demandisChemical precipitation + activated sludge process + redox process，Its Technical efficiency of end-of-pipe management90，The formula for calculating the actual operation rate (k-value) of the end-of-pipe treatment facility is k = opreating time of treatment facilities (hours/year) / normal production time (hours/year)
  污染物指标化学需氧量的末端治理技术是化学沉淀+活性污泥法+氧化还原法，其效率为90，末端治理设施实际运行率（k值）计算公式为k=治理设施耗电量（千瓦时）/（治理设施运行时数（小时）*治理设施额定功率(千瓦)）。原文件中描述污染物类别为废水，污染物指标为化学需氧量，此处对其进行了匹配工作，将其匹配到LCAflow库里面相最符合的流，污染物指标备注为化学需氧量
- chemical oxygen demand: 51.22
  the Technical of end-of-pipe management technology for pollution chemical oxygen demandisElectrolysis + activated sludge process，Its Technical efficiency of end-of-pipe management87
  污染物指标化学需氧量的末端治理技术是电解法+活性污泥法，其效率为87，末端治理设施实际运行率（k值）计算公式为k=治理设施耗电量（千瓦时）/（治理设施运行时数（小时）*治理设施额定功率(千瓦)）。原文件中描述污染物类别为废水，污染物指标为化学需氧量，此处对其进行了匹配工作，将其匹配到LCAflow库里面相最符合的流，污染物指标备注为化学需氧量
- chemical oxygen demand: 78.8
  the Technical of end-of-pipe management technology for pollution chemical oxygen demandisA2/O process，Its Technical efficiency of end-of-pipe management80
  污染物指标化学需氧量的末端治理技术是A2/O工艺，其效率为80，末端治理设施实际运行率（k值）计算公式为k=治理设施耗电量（千瓦时）/（治理设施运行时数（小时）*治理设施额定功率(千瓦)）。原文件中描述污染物类别为废水，污染物指标为化学需氧量，此处对其进行了匹配工作，将其匹配到LCAflow库里面相最符合的流，污染物指标备注为化学需氧量

## Use advice
This dataset is derived from the Pollution Source Census Report and contains information on pollution emissions and related products. However, it does not include data on energy or chemical consumption, nor does it provide information on waste or co-product generation. When utilizing this dataset, please supplement the missing data based on actual conditions before use
该数据集来源于污染源普查报告，包含污染物排放及相关产品信息，但不包含能源或化学品消耗数据，也不提供废弃物或共生产物产生信息。在使用该数据集时，请根据实际情况补充缺失数据后再使用。

## Review details
Inventory: The internal review was done by several iteration steps concerning raw data validation, raw data documentation, representativity, completeness and consistency of modelling with regard to ISO 14040 and 14044.
清单： 内部审查通过几个迭代步骤完成，涉及原始数据验证、原始数据记录、代表性、完整性、与 ISO 14040 和 14044 有关的建模的一致性。

## Data sources
- 第二次全国污染源普查产排污核算系数手册（试用版）,二级代码26,三级代码263.0文件，在完整版文件中第2936页
