# Beneficiation ; Chromium concentrate/chrome lump (powder) ore ; Chromite ore ; Strong magnetic separation ; All sizes; NESPS2 / 选矿 ; 铬精矿/铬块（粉）矿 ; 铬铁矿石 ; 强磁选 ; 所有规模 ; 全国第二次污染普查数据

Dataset: ILCD process, Unit process, single operation
Geography: CN
Reference year: 2019
Classification: Reference Parameters / Materials production / Metals and semimetals
Generated by: The data was created by the Office of the Second National Pollution Source Census of the Ministry of Ecology and Environment, and the data was organized by the TianGong Plan team for ILCD format / 生态环境部第二次全国污染源普查工作办公室创建数据，天工计划团队常慧敏整理数据为ILCD格式
Owner: Tiangong LCI Data Working Group / 天工LCI数据工作小组
Review: Dependent internal review by Tiangong LCI Data Working Group / 天工LCI数据工作小组
Amounts: no units in this file; such an amount is in the reference unit of its flow, which a separate flow dataset defines
copyright: false
licenseType: Free of charge for all users and uses

## General comment
the Technical of end-of-pipe management technology for pollution Exhaust gasis/

## Technical purpose
所描述的工业过程用于通过强磁选从铬铁矿石中提炼铬精矿/铬块（粉）矿。所述的末端处理技术用于处理废水、铬污染物、化学需氧量(COD)、与石油相关的废物、废气和细颗粒物（PM2.5-PM10）。这些应用与矿业特别是铬矿处理及相关工业废物和排放管理相关。

## Reference product
- Chromium Ore/Chromium Block (Powder) Ore: 1000; calculated
  源文件中描述为为铬精矿/铬块（粉）矿，此处对其进行了匹配工作，将其匹配到LCAflow库里面相最符合的流，污染物指标备注为工业废水量

## Outputs
All rows: calculated
- Chromium: 0.000174
  the Technical of end-of-pipe management technology for pollution ChromiumisChemical coagulation，Its Technical efficiency of end-of-pipe management70
  污染物指标铬的末端治理技术是化学混凝法，其效率为70，末端治理设施实际运行率（k值）计算公式为k=末端治理设施运行时间（小时/年）/正常生产时间（小时/年）。原文件中描述污染物类别为废水，污染物指标为铬，此处对其进行了匹配工作，将其匹配到LCAflow库里面相最符合的流，污染物指标备注为铬
- Chromium: 0.00029
  the Technical of end-of-pipe management technology for pollution ChromiumisPrecipitation separation，Its Technical efficiency of end-of-pipe management50
  污染物指标铬的末端治理技术是沉淀分离，其效率为50，末端治理设施实际运行率（k值）计算公式为k=末端治理设施运行时间（小时/年）/正常生产时间（小时/年）。原文件中描述污染物类别为废水，污染物指标为铬，此处对其进行了匹配工作，将其匹配到LCAflow库里面相最符合的流，污染物指标备注为铬
- Petroleum-related waste: 0.000396
  the Technical of end-of-pipe management technology for pollution Petroleum-related wasteisChemical coagulation，Its Technical efficiency of end-of-pipe management70
  污染物指标石油类的末端治理技术是化学混凝法，其效率为70，末端治理设施实际运行率（k值）计算公式为k=末端治理设施运行时间（小时/年）/正常生产时间（小时/年）。原文件中描述污染物类别为废水，污染物指标为石油类，此处对其进行了匹配工作，将其匹配到LCAflow库里面相最符合的流，污染物指标备注为石油类
- Petroleum-related waste: 0.000726
  the Technical of end-of-pipe management technology for pollution Petroleum-related wasteisPrecipitation separation，Its Technical efficiency of end-of-pipe management45
  污染物指标石油类的末端治理技术是沉淀分离，其效率为45，末端治理设施实际运行率（k值）计算公式为k=末端治理设施运行时间（小时/年）/正常生产时间（小时/年）。原文件中描述污染物类别为废水，污染物指标为石油类，此处对其进行了匹配工作，将其匹配到LCAflow库里面相最符合的流，污染物指标备注为石油类
- particles (PM2.5 - PM10): 0.003
  the Technical of end-of-pipe management technology for pollution particles (PM2.5 - PM10)isBag filter，Its Technical efficiency of end-of-pipe management95
  污染物指标颗粒物的末端治理技术是袋式除尘，其效率为95，末端治理设施实际运行率（k值）计算公式为k=末端治理设施运行时间（小时/年）/正常生产时间（小时/年）。原文件中描述污染物类别为废气，污染物指标为颗粒物，此处对其进行了匹配工作，将其匹配到LCAflow库里面相最符合的流，污染物指标备注为颗粒物
- particles (PM2.5 - PM10): 0.006
  the Technical of end-of-pipe management technology for pollution particles (PM2.5 - PM10)isVenturi，Its Technical efficiency of end-of-pipe management90
  污染物指标颗粒物的末端治理技术是文丘里，其效率为90，末端治理设施实际运行率（k值）计算公式为k=末端治理设施运行时间（小时/年）/正常生产时间（小时/年）。原文件中描述污染物类别为废气，污染物指标为颗粒物，此处对其进行了匹配工作，将其匹配到LCAflow库里面相最符合的流，污染物指标备注为颗粒物
- particles (PM2.5 - PM10): 0.009
  the Technical of end-of-pipe management technology for pollution particles (PM2.5 - PM10)isSingle cylinder (multiple cylinders in parallel) cyclone，Its Technical efficiency of end-of-pipe management85
  污染物指标颗粒物的末端治理技术是单筒（多筒并联）旋风，其效率为85，末端治理设施实际运行率（k值）计算公式为k=末端治理设施运行时间（小时/年）/正常生产时间（小时/年）。原文件中描述污染物类别为废气，污染物指标为颗粒物，此处对其进行了匹配工作，将其匹配到LCAflow库里面相最符合的流，污染物指标备注为颗粒物
- chemical oxygen demand: 0.0195
  the Technical of end-of-pipe management technology for pollution chemical oxygen demandisChemical coagulation，Its Technical efficiency of end-of-pipe management70
  污染物指标化学需氧量的末端治理技术是化学混凝法，其效率为70，末端治理设施实际运行率（k值）计算公式为k=末端治理设施运行时间（小时/年）/正常生产时间（小时/年）。原文件中描述污染物类别为废水，污染物指标为化学需氧量，此处对其进行了匹配工作，将其匹配到LCAflow库里面相最符合的流，污染物指标备注为化学需氧量
- chemical oxygen demand: 0.0455
  the Technical of end-of-pipe management technology for pollution chemical oxygen demandisPrecipitation separation，Its Technical efficiency of end-of-pipe management30
  污染物指标化学需氧量的末端治理技术是沉淀分离，其效率为30，末端治理设施实际运行率（k值）计算公式为k=末端治理设施运行时间（小时/年）/正常生产时间（小时/年）。原文件中描述污染物类别为废水，污染物指标为化学需氧量，此处对其进行了匹配工作，将其匹配到LCAflow库里面相最符合的流，污染物指标备注为化学需氧量
- Waste water: 3.62
  the Technical of end-of-pipe management technology for pollution Waste wateris/
  污染物指标工业废水量的末端治理技术是/，末端治理设施实际运行率（k值）计算公式为/。原文件中描述污染物类别为废水，污染物指标为工业废水量，此处对其进行了匹配工作，将其匹配到LCAflow库里面相最符合的流，污染物指标备注为工业废水量
- Exhaust gas: 384
  the Technical of end-of-pipe management technology for pollution Exhaust gasis/
  污染物指标工业废气量的末端治理技术是/，末端治理设施实际运行率（k值）计算公式为/。原文件中描述污染物类别为废气，污染物指标为工业废气量，此处对其进行了匹配工作，将其匹配到LCAflow库里面相最符合的流，污染物指标备注为工业废气量

## Use advice
This dataset is derived from the Pollution Source Census Report and contains information on pollution emissions and related products. However, it does not include data on energy or chemical consumption, nor does it provide information on waste or co-product generation. When utilizing this dataset, please supplement the missing data based on actual conditions before use
该数据集来源于污染源普查报告，包含污染物排放及相关产品信息，但不包含能源或化学品消耗数据，也不提供废弃物或共生产物产生信息。在使用该数据集时，请根据实际情况补充缺失数据后再使用。

## Review details
Inventory: The internal review was done by several iteration steps concerning raw data validation, raw data documentation, representativity, completeness and consistency of modelling with regard to ISO 14040 and 14044.
清单： 内部审查通过几个迭代步骤完成，涉及原始数据验证、原始数据记录、代表性、完整性、与 ISO 14040 和 14044 有关的建模的一致性。

## Data sources
- 第二次全国污染源普查产排污核算系数手册（试用版）,二级代码08,四级代码0820文件，在完整版文件中第3413页
