# Chemical Pharmaceutical Ingredients ; Chemical raw materials and chemical products, pharmaceutical intermediates ; Enzymatic synthesis ; Regardless of size; NESPS2 / 化学药品原料药 ; 化学原料及化学制品、医药中间体 ; 酶法合成 ; 不分规模 ; 全国第二次污染普查数据

Dataset: ILCD process, Unit process, single operation
Geography: CN
Reference year: 2019
Classification: Reference Parameters / Materials production / Organic chemicals
Generated by: The data was created by the Office of the Second National Pollution Source Census of the Ministry of Ecology and Environment, and the data was organized by the TianGong Plan team for ILCD format / 生态环境部第二次全国污染源普查工作办公室创建数据，天工计划团队常慧敏整理数据为ILCD格式
Owner: Tiangong LCI Data Working Group / 天工LCI数据工作小组
Review: Dependent internal review by Tiangong LCI Data Working Group / 天工LCI数据工作小组
Amounts: no units in this file; such an amount is in the reference unit of its flow, which a separate flow dataset defines
copyright: false
licenseType: Free of charge for all users and uses

## General comment
the Technical of end-of-pipe management technology for pollution Exhaust gasis/

## Technical purpose
此数据集代表无规模区分的酶法合成化学原料和产品，包括医药中间体。适用于各种化工和医药制造过程。尾端治理技术数据用于评估废水、化学需氧量、氨氮、总磷、有机结合氮、废气和挥发性有机化合物的污染处理效率，包括物理化学、好氧生物、厌氧生物和组合处理方法，以及低温等离子体、冷凝和蒸汽解吸附等方法。此信息对于化工和医药行业设计和操作污染控制系统至关重要。

## Reference product
- Chemical Drug Raw Materials: 1000; calculated
  源文件中描述为为化学药品原料药，此处对其进行了匹配工作，将其匹配到LCAflow库里面相最符合的流，污染物指标备注为废水量

## Outputs
All rows: calculated
- phosphorus, total: 0.01523
  the Technical of end-of-pipe management technology for pollution phosphorus, totalisPhysicochemical treatment + anaerobic/aerobic biological combined treatment + physicochemical treatment，Its Technical efficiency of end-of-pipe management99
  污染物指标总磷的末端治理技术是物理化学处理法+厌/好氧生物组合处理+物理化学处理法，其效率为99，末端治理设施实际运行率（k值）计算公式为k=治理设施运行时间(天)/正常生产时间（天）。原文件中描述污染物类别为废水，污染物指标为总磷，此处对其进行了匹配工作，将其匹配到LCAflow库里面相最符合的流，污染物指标备注为总磷
- volatile organic compound: 0.10231
  the Technical of end-of-pipe management technology for pollution volatile organic compoundisRegenerative catalytic combustion method，Its Technical efficiency of end-of-pipe management99，The formula for calculating the actual operation rate (k-value) of the end-of-pipe treatment facility is k = annual power consumption of equipment (kWh) / (equipment power (kW) × annual operating hours (hours))
  污染物指标挥发性有机物的末端治理技术是蓄热式催化燃烧法，其效率为99，末端治理设施实际运行率（k值）计算公式为k=治理设施运行时间(小时)/正常生产时间（小时）。原文件中描述污染物类别为废气，污染物指标为挥发性有机物，此处对其进行了匹配工作，将其匹配到LCAflow库里面相最符合的流，污染物指标备注为挥发性有机物
- volatile organic compound: 0.122772
  the Technical of end-of-pipe management technology for pollution volatile organic compoundisAdsorption + steam desorption，Its Technical efficiency of end-of-pipe management98.8
  污染物指标挥发性有机物的末端治理技术是吸附+蒸气解析，其效率为98.8，末端治理设施实际运行率（k值）计算公式为k=治理设施运行时间(小时)/正常生产时间（小时）。原文件中描述污染物类别为废气，污染物指标为挥发性有机物，此处对其进行了匹配工作，将其匹配到LCAflow库里面相最符合的流，污染物指标备注为挥发性有机物
- phosphorus, total: 0.129455
  the Technical of end-of-pipe management technology for pollution phosphorus, totalisPhysicochemical treatment + anaerobic biological treatment + aerobic biological treatment，Its Technical efficiency of end-of-pipe management91.5
  污染物指标总磷的末端治理技术是物理化学处理法+厌氧生物处理+好氧生物处理，其效率为91.5，末端治理设施实际运行率（k值）计算公式为k=治理设施运行时间(天)/正常生产时间（天）。原文件中描述污染物类别为废水，污染物指标为总磷，此处对其进行了匹配工作，将其匹配到LCAflow库里面相最符合的流，污染物指标备注为总磷
- phosphorus, total: 0.205605
  the Technical of end-of-pipe management technology for pollution phosphorus, totalisPhysicochemical treatment + aerobic biological treatment，Its Technical efficiency of end-of-pipe management86.5
  污染物指标总磷的末端治理技术是物理化学处理法+好氧生物处理法，其效率为86.5，末端治理设施实际运行率（k值）计算公式为k=治理设施运行时间(天)/正常生产时间（天）。原文件中描述污染物类别为废水，污染物指标为总磷，此处对其进行了匹配工作，将其匹配到LCAflow库里面相最符合的流，污染物指标备注为总磷
- phosphorus, total: 1.523
  the Technical of end-of-pipe management technology for pollution phosphorus, totalisWithout terminal treatment facility，Its Technical efficiency of end-of-pipe management0
  污染物指标总磷的末端治理技术是无末端处理设施，其效率为0，末端治理设施实际运行率（k值）计算公式为/。原文件中描述污染物类别为废水，污染物指标为总磷，此处对其进行了匹配工作，将其匹配到LCAflow库里面相最符合的流，污染物指标备注为总磷
- Nitrogen, organic bound: 2.31034
  the Technical of end-of-pipe management technology for pollution Nitrogen, organic boundisPhysicochemical treatment + anaerobic/aerobic biological combined treatment + physicochemical treatment，Its Technical efficiency of end-of-pipe management97.2
  污染物指标总氮的末端治理技术是物理化学处理法+厌/好氧生物组合处理+物理化学处理法，其效率为97.2，末端治理设施实际运行率（k值）计算公式为k=治理设施运行时间(天)/正常生产时间（天）。原文件中描述污染物类别为废水，污染物指标为总氮，此处对其进行了匹配工作，将其匹配到LCAflow库里面相最符合的流，污染物指标备注为总氮
- volatile organic compound: 2.55775
  the Technical of end-of-pipe management technology for pollution volatile organic compoundisCondensation，Its Technical efficiency of end-of-pipe management75
  污染物指标挥发性有机物的末端治理技术是冷凝法，其效率为75，末端治理设施实际运行率（k值）计算公式为k=治理设施运行时间(小时)/正常生产时间（小时）。原文件中描述污染物类别为废气，污染物指标为挥发性有机物，此处对其进行了匹配工作，将其匹配到LCAflow库里面相最符合的流，污染物指标备注为挥发性有机物
- Ammonia Nitrogen: 2.64855
  the Technical of end-of-pipe management technology for pollution Ammonia NitrogenisPhysicochemical treatment + anaerobic/aerobic biological combined treatment + physicochemical treatment，Its Technical efficiency of end-of-pipe management95.1
  污染物指标氨氮的末端治理技术是物理化学处理法+厌/好氧生物组合处理+物理化学处理法，其效率为95.1，末端治理设施实际运行率（k值）计算公式为（天）。原文件中描述污染物类别为废水，污染物指标为氨氮，此处对其进行了匹配工作，将其匹配到LCAflow库里面相最符合的流，污染物指标备注为氨氮
- Ammonia Nitrogen: 4.48632
  the Technical of end-of-pipe management technology for pollution Ammonia NitrogenisPhysicochemical treatment + anaerobic biological treatment + aerobic biological treatment，Its Technical efficiency of end-of-pipe management91.7
  污染物指标氨氮的末端治理技术是物理化学处理法+厌氧生物处理+好氧生物处理，其效率为91.7，末端治理设施实际运行率（k值）计算公式为（天）。原文件中描述污染物类别为废水，污染物指标为氨氮，此处对其进行了匹配工作，将其匹配到LCAflow库里面相最符合的流，污染物指标备注为氨氮
- Ammonia Nitrogen: 4.91873
  the Technical of end-of-pipe management technology for pollution Ammonia NitrogenisPhysicochemical treatment + aerobic biological treatment，Its Technical efficiency of end-of-pipe management90.9
  污染物指标氨氮的末端治理技术是物理化学处理法+好氧生物处理法，其效率为90.9，末端治理设施实际运行率（k值）计算公式为k=治理设施运行时间(天)/正常生产时间。原文件中描述污染物类别为废水，污染物指标为氨氮，此处对其进行了匹配工作，将其匹配到LCAflow库里面相最符合的流，污染物指标备注为氨氮
- volatile organic compound: 7.1617
  the Technical of end-of-pipe management technology for pollution volatile organic compoundisLow temperature plasma，Its Technical efficiency of end-of-pipe management30
  污染物指标挥发性有机物的末端治理技术是低温等离子体，其效率为30，末端治理设施实际运行率（k值）计算公式为k=治理设施运行时间(小时)/正常生产时间（小时）。原文件中描述污染物类别为废气，污染物指标为挥发性有机物，此处对其进行了匹配工作，将其匹配到LCAflow库里面相最符合的流，污染物指标备注为挥发性有机物
- volatile organic compound: 10.231
  the Technical of end-of-pipe management technology for pollution volatile organic compoundisWithout terminal treatment facility，Its Technical efficiency of end-of-pipe management0
  污染物指标挥发性有机物的末端治理技术是无末端处理设施，其效率为0，末端治理设施实际运行率（k值）计算公式为/。原文件中描述污染物类别为废气，污染物指标为挥发性有机物，此处对其进行了匹配工作，将其匹配到LCAflow库里面相最符合的流，污染物指标备注为挥发性有机物
- chemical oxygen demand: 15.2855
  the Technical of end-of-pipe management technology for pollution chemical oxygen demandisPhysicochemical treatment + anaerobic/aerobic biological combined treatment + physicochemical treatment，Its Technical efficiency of end-of-pipe management97.2
  污染物指标化学需氧量的末端治理技术是物理化学处理法+厌/好氧生物组合处理+物理化学处理法，其效率为97.2，末端治理设施实际运行率（k值）计算公式为k=治理设施运行时间(天)/正常生产时间（天）。原文件中描述污染物类别为废水，污染物指标为化学需氧量，此处对其进行了匹配工作，将其匹配到LCAflow库里面相最符合的流，污染物指标备注为化学需氧量
- Nitrogen, organic bound: 18.1526
  the Technical of end-of-pipe management technology for pollution Nitrogen, organic boundisPhysicochemical treatment + anaerobic biological treatment + aerobic biological treatment，Its Technical efficiency of end-of-pipe management78
  污染物指标总氮的末端治理技术是物理化学处理法+厌氧生物处理+好氧生物处理，其效率为78，末端治理设施实际运行率（k值）计算公式为k=治理设施运行时间(天)/正常生产时间（天）。原文件中描述污染物类别为废水，污染物指标为总氮，此处对其进行了匹配工作，将其匹配到LCAflow库里面相最符合的流，污染物指标备注为总氮
- Nitrogen, organic bound: 23.6809
  the Technical of end-of-pipe management technology for pollution Nitrogen, organic boundisPhysicochemical treatment + aerobic biological treatment，Its Technical efficiency of end-of-pipe management71.3
  污染物指标总氮的末端治理技术是物理化学处理法+好氧生物处理法，其效率为71.3，末端治理设施实际运行率（k值）计算公式为k=治理设施运行时间(天)/正常生产时间（天）。原文件中描述污染物类别为废水，污染物指标为总氮，此处对其进行了匹配工作，将其匹配到LCAflow库里面相最符合的流，污染物指标备注为总氮
- chemical oxygen demand: 26.7495
  the Technical of end-of-pipe management technology for pollution chemical oxygen demandisPhysicochemical treatment + anaerobic biological treatment + aerobic biological treatment，Its Technical efficiency of end-of-pipe management95.1
  污染物指标化学需氧量的末端治理技术是物理化学处理法+厌氧生物处理+好氧生物处理，其效率为95.1，末端治理设施实际运行率（k值）计算公式为k=治理设施运行时间(天)/正常生产时间（天）。原文件中描述污染物类别为废水，污染物指标为化学需氧量，此处对其进行了匹配工作，将其匹配到LCAflow库里面相最符合的流，污染物指标备注为化学需氧量
- chemical oxygen demand: 49.6777
  the Technical of end-of-pipe management technology for pollution chemical oxygen demandisPhysicochemical treatment + aerobic biological treatment，Its Technical efficiency of end-of-pipe management90.9
  污染物指标化学需氧量的末端治理技术是物理化学处理法+好氧生物处理法，其效率为90.9，末端治理设施实际运行率（k值）计算公式为k=治理设施运行时间(天)/正常生产时间（天）。原文件中描述污染物类别为废水，污染物指标为化学需氧量，此处对其进行了匹配工作，将其匹配到LCAflow库里面相最符合的流，污染物指标备注为化学需氧量
- Ammonia Nitrogen: 54.052
  the Technical of end-of-pipe management technology for pollution Ammonia NitrogenisWithout terminal treatment facility，Its Technical efficiency of end-of-pipe management0
  污染物指标氨氮的末端治理技术是无末端处理设施，其效率为0，末端治理设施实际运行率（k值）计算公式为/。原文件中描述污染物类别为废水，污染物指标为氨氮，此处对其进行了匹配工作，将其匹配到LCAflow库里面相最符合的流，污染物指标备注为氨氮
- Nitrogen, organic bound: 82.512
  the Technical of end-of-pipe management technology for pollution Nitrogen, organic boundisWithout terminal treatment facility，Its Technical efficiency of end-of-pipe management0
  污染物指标总氮的末端治理技术是无末端处理设施，其效率为0，末端治理设施实际运行率（k值）计算公式为/。原文件中描述污染物类别为废水，污染物指标为总氮，此处对其进行了匹配工作，将其匹配到LCAflow库里面相最符合的流，污染物指标备注为总氮
- Waste water: 332.212
  the Technical of end-of-pipe management technology for pollution Waste wateris/
  污染物指标废水量的末端治理技术是/，末端治理设施实际运行率（k值）计算公式为/。原文件中描述污染物类别为废水，污染物指标为废水量，此处对其进行了匹配工作，将其匹配到LCAflow库里面相最符合的流，污染物指标备注为废水量
- chemical oxygen demand: 545.909
  the Technical of end-of-pipe management technology for pollution chemical oxygen demandisWithout terminal treatment facility，Its Technical efficiency of end-of-pipe management0
  污染物指标化学需氧量的末端治理技术是无末端处理设施，其效率为0，末端治理设施实际运行率（k值）计算公式为/。原文件中描述污染物类别为废水，污染物指标为化学需氧量，此处对其进行了匹配工作，将其匹配到LCAflow库里面相最符合的流，污染物指标备注为化学需氧量
- Exhaust gas: 109631
  the Technical of end-of-pipe management technology for pollution Exhaust gasis/
  污染物指标废气量的末端治理技术是/，末端治理设施实际运行率（k值）计算公式为/。原文件中描述污染物类别为废气，污染物指标为废气量，此处对其进行了匹配工作，将其匹配到LCAflow库里面相最符合的流，污染物指标备注为废气量

## Use advice
This dataset is derived from the Pollution Source Census Report and contains information on pollution emissions and related products. However, it does not include data on energy or chemical consumption, nor does it provide information on waste or co-product generation. When utilizing this dataset, please supplement the missing data based on actual conditions before use
该数据集来源于污染源普查报告，包含污染物排放及相关产品信息，但不包含能源或化学品消耗数据，也不提供废弃物或共生产物产生信息。在使用该数据集时，请根据实际情况补充缺失数据后再使用。

## Review details
Inventory: The internal review was done by several iteration steps concerning raw data validation, raw data documentation, representativity, completeness and consistency of modelling with regard to ISO 14040 and 14044.
清单： 内部审查通过几个迭代步骤完成，涉及原始数据验证、原始数据记录、代表性、完整性、与 ISO 14040 和 14044 有关的建模的一致性。

## Data sources
- 第二次全国污染源普查产排污核算系数手册（试用版）,二级代码27,三级代码271.0文件，在完整版文件中第3027页
