# Aluminum ingot casting ; Primary aluminum ingot ; Liquid primary aluminum ; 2013

Dataset: ILCD process, Unit process, single operation
Geography: CN
Reference year: 2021
Classification: Unit processes / Materials production / Metals and semimetals
Generated by: Zimeng Cai, caizm6178@163.com
Owner: Tiangong LCI Data Working Group
Review: Dependent internal review by Tiangong LCI Data Working Group
Amounts: no units in this file; such an amount is in the reference unit of its flow, which a separate flow dataset defines
copyright: false
licenseType: Free of charge for all users and uses

## General comment
The primary aluminum ingot casting process is intended for generating raw aluminum ingots from liquid primary aluminum. This process is critical in the production of high-purity aluminum products that are essential in various applications, including but not limited to aerospace components, electrical conductors, building materials, and transportation. The aluminum ingots produced through this process are also used in further manufacturing and fabrication processes that require primary aluminum.

## Time period
Date of publication

## Reference product
- aluminium, primary, ingot: 1000; software or database

## Inputs
- aluminium, primary, liquid: 1047.2; software or database

## Data selection and combination
The data in this study refers to the LCA data of PA, SA, electricity, and other background data. The PA data were obtained from statistical data sources, and the SA data were mainly obtained from the literatures. The background data were mainly derived from the Chinese localization LCA database CAS RCEES 2018, which was established by the Research Center for Eco-Environmental Sciences, Chinese Academy of Sciences and covers LCA data for energy, materials, transportation, waste management etc.

## Use advice
This LCA data set is specific to the process of casting primary aluminum ingots in the year 2013, and should be used with consideration to its temporal and geographical relevance. Users should also take into account that the primary aluminum (PA) data are obtained from statistical sources, while the secondary aluminum (SA) data are mainly derived from literature. For the background data, the CAS RCEES 2018 database should be consulted, which includes LCA information pertinent to energy, materials, transportation, and waste management within the Chinese context. When applying this data, users must pay attention to methodological consistency, ensuring that any comparative assessments follow appropriate category rules and boundaries.

## Review details
Inventory: The internal review was done by several iteration steps concerning raw data validation, raw data documentation, representativity, completeness and consistency of modelling with regard to ISO 14040 and 14044.

## Data sources
- Ding, N., Liu, N., Lu, B. & Yang, J. Life cycle greenhouse gas emissions of aluminum based on regional industrial transfer in China. J. Ind. Ecol. 25, 1657–1672 (2021).
