# Soil remediation ; ex situ remediation ; Biopile ; Engineering implementation ; Waste gas disposal ; Activated Carbon

Dataset: ILCD process, Unit process, single operation
Geography: KR
Reference year: 2011
Classification: Unit processes / Other Services / Repair and maintenance
Generated by: Sang Chunhui, sangch@mail.bnu.edu.cn
Owner: Tiangong LCI Data Working Group
Review: Dependent internal review by Tiangong LCI Data Working Group
Amounts: no units in this file; such an amount is in the reference unit of its flow, which a separate flow dataset defines
copyright: false
licenseType: Free of charge for all users and uses

## General comment
Using activated carbon to adsorb the waste gas generated in the remediation process

## Technical purpose
This soil remediation process is designed for the ex situ treatment of contaminated soils using a biopile technique. It focuses on engineering implementation for the biodegradation of contaminants in excavated soils, coupled with waste gas disposal utilizing activated carbon adsorption. This process is specifically applied in environmental cleanup projects where soil contaminants need to be biologically degraded under controlled conditions before land can be reclaimed or reused.

## Reference product
- Treated exhaust gas: 1; estimated

## Inputs
- Activated Carbon: 1368; estimated
- Exhaust gas: 1; estimated

## Use advice
When using this dataset in a Life Cycle Assessment, ensure that all input materials and energy consumption data, as detailed in the standardization report for the soil remediation system, are included. Consider the specific conditions under which the biopile remediation process operates, including the scale of remediation and the type of soil contaminants being treated. The waste gas treatment via activated carbon should be accounted for as part of the overall environmental impact assessment. Pay special attention to the boundaries of the system, ensuring all stages from soil excavation to final disposal or land reuse are considered within the scope of your LCA study.

## Review details
Inventory: The internal review was done by several iteration steps concerning raw data validation, raw data documentation, representativity, completeness and consistency of modelling with regard to ISO 14040 and 14044.

## Data sources
- Jeong, S.-W. & Suh, S.-W. Assessment of Environmental Impacts and CO 2 Emissions from Soil Remediation Technologies using Life Cycle Assessment - Case Studies on SVE and Biopile Systems -. Journal of Korean Society of Environmental Engineers 33, 267–274 (2011).
