# Gypsum ; Gas-type fuels (natural gas) ; Autoclave (including wok) ; All sizes; NESPS2 / 石膏 ; 气体类燃料（天然气） ; 蒸压釜（含炒锅） ; 所有规模 ; 全国第二次污染普查数据

Dataset: ILCD process, Unit process, single operation
Geography: CN
Reference year: 2019
Classification: Reference Parameters / Energy carriers and technologies / Natural gas based fuels
Generated by: The data was created by the Office of the Second National Pollution Source Census of the Ministry of Ecology and Environment, and the data was organized by the TianGong Plan team for ILCD format / 生态环境部第二次全国污染源普查工作办公室创建数据，天工计划团队常慧敏整理数据为ILCD格式
Owner: Tiangong LCI Data Working Group / 天工LCI数据工作小组
Review: Dependent internal review by Tiangong LCI Data Working Group / 天工LCI数据工作小组
Amounts: no units in this file; such an amount is in the reference unit of its flow, which a separate flow dataset defines
copyright: false
licenseType: Free of charge for all users and uses

## General comment
the Technical of end-of-pipe management technology for pollution Exhaust gasis/

## Technical purpose
此工业过程用于使用气体燃料（天然气）在蒸压釜中（可能包括炒锅）制造石膏，适用于所有规模。这一过程通常应用于需要石膏作为建筑材料或生产石膏制品的建筑或制造行业。采用了排放控制技术来管理颗粒物、二氧化硫和氮氧化物的污染。使用静电除尘器和袋式过滤器来减少颗粒物（PM2.5 - PM10）的污染，效率分别为98％和95％。双碱脱硫用于控制二氧化硫污染，效率为50％，而其他未指定技术提供30％的效率。氮氧化物污染用未指定技术管理，效率为15％。

## Reference product
- Plaster: 1000; calculated
  源文件中描述为为石膏，此处对其进行了匹配工作，将其匹配到LCAflow库里面相最符合的流，污染物指标备注为颗粒物

## Outputs
All rows: calculated
- particles (PM2.5 - PM10): 2.8e-5
  the Technical of end-of-pipe management technology for pollution particles (PM2.5 - PM10)isElectrostatic precipitation，Its Technical efficiency of end-of-pipe management98
  污染物指标颗粒物的末端治理技术是静电除尘，其效率为98，末端治理设施实际运行率（k值）计算公式为k=除尘设施运行时间（小时/年）/生产装置生产时间（小时/年）。原文件中描述污染物类别为废气，污染物指标为颗粒物，此处对其进行了匹配工作，将其匹配到LCAflow库里面相最符合的流，污染物指标备注为颗粒物
- particles (PM2.5 - PM10): 7e-5
  the Technical of end-of-pipe management technology for pollution particles (PM2.5 - PM10)isBag filter，Its Technical efficiency of end-of-pipe management95
  污染物指标颗粒物的末端治理技术是袋式除尘，其效率为95，末端治理设施实际运行率（k值）计算公式为k=除尘设施运行时间（小时/年）/生产装置生产时间（小时/年）。原文件中描述污染物类别为废气，污染物指标为颗粒物，此处对其进行了匹配工作，将其匹配到LCAflow库里面相最符合的流，污染物指标备注为颗粒物
- particles (PM2.5 - PM10): 0.0015
  the Technical of end-of-pipe management technology for pollution particles (PM2.5 - PM10)is/，Its Technical efficiency of end-of-pipe management0
  污染物指标颗粒物的末端治理技术是/，其效率为0。原文件中描述污染物类别为废气，污染物指标为颗粒物，此处对其进行了匹配工作，将其匹配到LCAflow库里面相最符合的流，污染物指标备注为颗粒物
- sulfur dioxide: 0.0025
  the Technical of end-of-pipe management technology for pollution sulfur dioxideisDouble alkali desulfurization，Its Technical efficiency of end-of-pipe management50
  污染物指标二氧化硫的末端治理技术是双碱脱硫，其效率为50，末端治理设施实际运行率（k值）计算公式为k=脱硫设施运行时间（小时/年）/生产装置生产时间（小时/年）。原文件中描述污染物类别为废气，污染物指标为二氧化硫，此处对其进行了匹配工作，将其匹配到LCAflow库里面相最符合的流，污染物指标备注为二氧化硫
- sulfur dioxide: 0.0035
  the Technical of end-of-pipe management technology for pollution sulfur dioxideisOther，Its Technical efficiency of end-of-pipe management30
  污染物指标二氧化硫的末端治理技术是其他，其效率为30，末端治理设施实际运行率（k值）计算公式为k=脱硫设施运行时间（小时/年）/生产装置生产时间（小时/年）。原文件中描述污染物类别为废气，污染物指标为二氧化硫，此处对其进行了匹配工作，将其匹配到LCAflow库里面相最符合的流，污染物指标备注为二氧化硫
- Nitrogen oxides: 0.05185
  the Technical of end-of-pipe management technology for pollution Nitrogen oxidesisOther，Its Technical efficiency of end-of-pipe management15
  污染物指标氮氧化物的末端治理技术是其他，其效率为15，末端治理设施实际运行率（k值）计算公式为k=脱硝设施运行时间（小时/年）/生产装置生产时间（小时/年）。原文件中描述污染物类别为废气，污染物指标为氮氧化物，此处对其进行了匹配工作，将其匹配到LCAflow库里面相最符合的流，污染物指标备注为氮氧化物
- Nitrogen oxides: 0.061
  the Technical of end-of-pipe management technology for pollution Nitrogen oxidesis/，Its Technical efficiency of end-of-pipe management0
  污染物指标氮氧化物的末端治理技术是/，其效率为0。原文件中描述污染物类别为废气，污染物指标为氮氧化物，此处对其进行了匹配工作，将其匹配到LCAflow库里面相最符合的流，污染物指标备注为氮氧化物
- Exhaust gas: 3200
  the Technical of end-of-pipe management technology for pollution Exhaust gasis/
  污染物指标工业废气量的末端治理技术是/，末端治理设施实际运行率（k值）计算公式为/。原文件中描述污染物类别为废气，污染物指标为工业废气量，此处对其进行了匹配工作，将其匹配到LCAflow库里面相最符合的流，污染物指标备注为工业废气量

## Use advice
This dataset is derived from the Pollution Source Census Report and contains information on pollution emissions and related products. However, it does not include data on energy or chemical consumption, nor does it provide information on waste or co-product generation. When utilizing this dataset, please supplement the missing data based on actual conditions before use
该数据集来源于污染源普查报告，包含污染物排放及相关产品信息，但不包含能源或化学品消耗数据，也不提供废弃物或共生产物产生信息。在使用该数据集时，请根据实际情况补充缺失数据后再使用。

## Review details
Inventory: The internal review was done by several iteration steps concerning raw data validation, raw data documentation, representativity, completeness and consistency of modelling with regard to ISO 14040 and 14044.
清单： 内部审查通过几个迭代步骤完成，涉及原始数据验证、原始数据记录、代表性、完整性、与 ISO 14040 和 14044 有关的建模的一致性。

## Data sources
- 第二次全国污染源普查产排污核算系数手册（试用版）,二级代码30,四级代码3012文件，在完整版文件中第3333页
