# Soil remediation ; Ex-situ remediation ; Collaborative disposal of cement kilns ; Operation phase ; Cement grinding ; Cement

Dataset: ILCD process, Unit process, single operation
Geography: CN
Reference year: 2015
Classification: Other Services / Repair and maintenance
Generated by: Cao Jiameng, 2979480760@qq.com
Owner: Tiangong LCI Data Working Group
Review: Dependent internal review by Tiangong LCI Data Working Group
Amounts: no units in this file; such an amount is in the reference unit of its flow, which a separate flow dataset defines
copyright: false
licenseType: Free of charge for all users and uses

## General comment
The cement plant has a modern dry process production line with a scale of 4000t/d, producing 1.9 million tons of cement and 1.5 million tons of clinker annually. The company's own mining area is 0.448km2, and the annual production capacity of limestone is 2 million tons. The production process adopts advanced RSP level five kiln external decomposition technology. Hazardous waste is transported by vehicles, equipped with hazardous goods special vehicles, and the driving route is a truck dedicated line. The transportation distance from the mine to the factory area is about 1.5km, The transportation distance of waste is about 50km. The production process of conventional cement mainly includes stages such as the extraction and transportation of raw and auxiliary materials, raw material preparation, coal powder preparation, clinker calcination, and cement grinding. After adding waste disposal links, waste (polluted soil, digested sludge, waste oil sludge, etc.) can be used as alternative raw materials and fuels to save raw materials such as limestone and coal. Collaborative disposal of cement kilns, operation phase, cement grinding process, mainly including crushing, mixing of limestone and gypsum, and cement grinding process.

## Technology and included processes
The cement grinding process mainly involves the crushing and mixing of limestone and gypsum, as well as the cement grinding process.

## Technical purpose
This dataset describes the operation phase of an ex-situ soil remediation process in a cement plant, incorporating co-processing in a cement kiln and cement grinding. The production line, with a capacity of 4000t/d, produces conventional cement and clinker by utilizing advanced RSP level five external decomposition technology in its operation. Additionally, the inclusion of waste disposal steps allows for the use of polluted soil, digested sludge, and waste oil sludge as alternative raw materials and fuels, thus conserving limestone and coal resources. This data set is relevant for modeling the environmental aspects of cement production where alternative materials are in use and for assessing the life cycle impacts of cement production integrated with waste co-processing.

## Reference product
- cement: 1000; measured

## Inputs
All rows: measured
- calcium carbonate: 51.62
- gypsum: 52.15
- Fly ash: 124.24
- Slag: 203.78
- cement clinker: 1000
- Electricity: 116.856

## Use advice
When using this dataset, users should pay attention to the specific context of the cement production process. It is crucial to account for the environmental benefits of using alternative materials (waste) in place of traditional raw materials. Methodological considerations must be made regarding the life cycle stages, ensuring that the disposal of waste, the use phase behavior, and any emissions during these processes are accurately captured. The distances for transportation of raw materials and waste should also be reflected in the overall assessment. Users should model the waste inputs as alternative raw materials or fuels and note that the input and output streams do not contain significant amounts of exhaust gas, wastewater, or solid waste.

## Review details
Inventory: The internal review was done by several iteration steps concerning raw data validation, raw data documentation, representativity, completeness and consistency of modelling with regard to ISO 14040 and 14044.

## Data sources
- 侯星宇,张芸,戚昱等.水泥窑协同处置工业废弃物的生命周期评价[J].环境科学学报,2015,35(12):4112-4119.
