# Barrier layer ; Soil in-situ remediation ; SVE system ; Foundation construction

Dataset: ILCD process, Unit process, single operation
Geography: KR
Reference year: 2011
Classification: Unit processes / Other Services / Repair and maintenance
Generated by: Zhang Jianbin, zhangjb@caep.org.cn
Owner: Tiangong LCI Data Working Group
Review: Dependent internal review by Tiangong LCI Data Working Group
Amounts: no units in this file; such an amount is in the reference unit of its flow, which a separate flow dataset defines
copyright: false
licenseType: Free of charge for all users and uses

## General comment
Office, storage, and SVE system foundation

## Technology and included processes
Gravel 9.6 m3 , Concrete 19 m3 , wire mesh 96 m2 ) Bakhoe diesel 21 L

## Technical purpose
The provided data set represents materials and energy consumption for the construction of a barrier layer and foundation essential for soil in-situ remediation using a Soil Vapor Extraction (SVE) system. This includes the usage of gravel, concrete, and wire mesh as materials, and energy in the form of diesel for operating construction machinery. This data set is relevant for assessing environmental impacts in projects related to soil remediation infrastructure, specifically tied to SVE system establishments in office, storage, and other related constructions.

## Reference product
- Barrier layer: 1; measured
  根据原位，这里建设的是用于办公区、贮存区和SVE系统建设的混凝土硬化地层，文中没有给出具体的建设面积和混凝土厚度，这里采用项目为计量单位

## Inputs
- Gravel Sand: 9.6; measured
- cement, unspecified: 19; measured
- Wire Mesh: 96; measured
- Diesel,Diesel: 0.021; measured
- Equipment and Materials Arriving on Site: 30000
  文中给出修复工程总的材料使用量为99.8吨，但基础设施建设和建井两个环节材料用量没有单独统计重量，此处30吨为填报人根据经验估算得到的结果。

## Use advice
Users of this data set should note that it includes both raw materials and the energy required for the construction phase of soil in-situ remediation systems. When applying this data, it is important to correctly attribute these materials and energy consumption to the construction phase of the life cycle being studied. Additionally, users must consider the technological applicability of the data, ensuring that the data match the specific type of SVE system and remediation process contemplated in their analysis. Further methodological aspects, such as the inclusion or exclusion of potential recycling of the construction materials post-use or the modeling of different use phase behaviors, should also be carefully evaluated according to the goals of the specific life cycle assessment.

## Review details
Inventory: The internal review was done by several iteration steps concerning raw data validation, raw data documentation, representativity, completeness and consistency of modelling with regard to ISO 14040 and 14044.

## Data sources
- Jeong, S.-W. & Suh, S.-W. Assessment of Environmental Impacts and CO 2 Emissions from Soil Remediation Technologies using Life Cycle Assessment - Case Studies on SVE and Biopile Systems -. Journal of Korean Society of Environmental Engineers 33, 267–274 (2011).
