# small-scale intensive pig production ; Slaughtering

Dataset: ILCD process, Unit process, single operation
Geography: JS-CN
Reference year: 2010
Classification: Materials production / Food and renewable raw materials
Functional unit: The functional unit (FU) is defined to be 1000 kg of pig carcass weight (CW) after the process in slaughterhouse.
Generated by: Rui Yang, 1632707028@qq.com
Owner: Tiangong LCI Data Working Group
Review: Dependent internal review by Tiangong LCI Data Working Group
Amounts: no units in this file; such an amount is in the reference unit of its flow, which a separate flow dataset defines
copyright: false
licenseType: Free of charge for all users and uses

## General comment
When growing to a typical live weight of around 115 kg, at about 67 months of age, pigs are ready for slaughter and sale. First, pigs stay in the slaughterhouse for fasting for 24 h prior to slaughter, which reduces the stomach and intestinal contents and generates small amounts of manure, CH4 and NH3 in the abattoir. Then, pigs are slaughtered under conventional procedures that involve electrical stunning, bleeding, rinsing, dehairing and evisceration, resulting in a carcass weight of around 83 kg.

## Geography
In this study, primary data about material and energy consumption, the composition of feed and the mixture with other ingredients at different pig production stages are derived from interviews with several pig production facilities in Jiangsu Province, China.

## Time period
On-field investigation (Guo and Wang, 2010)

## Technology and included processes
The system boundary starts from off-site crop cultivation, feed processing, to on-site pig production. The functional unit (FU) is defined to be 1000 kg of pig carcass weight (CW) after the process in slaughterhouse.

## Technical purpose
The data set describes a small-scale intensive pig production and slaughtering process primarily intended for meat production. The product, pig carcass weight, is typically used within the food industry as raw material for various pork products.

## Reference product
- pig: 1000; measured
  Carcass pig

## Inputs
- Electricity: 292.32; measured
- transport in t*km: 517.29; measured
- water: 4200; measured
- pig: 1398.6; measured
  Market pig

## Outputs
- methane: 22.08; measured
- ammonia: 26.67; measured
- offal: 398.6; measured
  Offal
- Water (groundwater from technosphere, waste water): 7.25; measured

## Deviations from the LCI method approaches
Based on the LCI results, life cycle impact assessment (LCIA) is carried out by using the ReCiPe midpoint (H) 2016 method (Huijbregts et al., 2016), which is an updated version of ReCiPe 2008 and now provides characterization factors that are representative with a global scope. Six impact categories are mostly used to evaluate the main life cycle environmental impact potentials, namely global warming (GWP), freshwater eutrophication (FEP), terrestrial acidification (TAP), freshwater ecotoxicity (FETP), human carcinogenic toxicity (HTP) and terrestrial ecotoxicity (TETP) (Cherubini et al., 2015; Noyaet al., 2017). Among them, GWP, FEP and TAP are the most concerned impact categories in previous studies (de Vries and de Boer, 2010; Reckmann et al., 2013).

## Use advice
When utilizing this LCA data set, it is important to note that the functional unit is defined as 1000 kg of pig carcass weight after slaughterhouse processing. Users should ensure alignment of this functional unit with their intended study boundaries. The data should not be used without considering the specific context of the Jiangsu Province pig production facilities as the primary data source. Also, note that recycling is not applicable. Ensure the LCIA methodology is consistent with ReCiPe midpoint (H) 2016 for comparability with results presented in this data set.

## Review details
Inventory: The internal review was done by several iteration steps concerning raw data validation, raw data documentation, representativity, completeness and consistency of modelling with regard to ISO 14040 and 14044.

## Data sources
- Liu, X., Cai, Z. & Yuan, Z. Environmental burdens of small-scale intensive pig production in China. Science of The Total Environment 770, 144720 (2021).
