# Soil Remediation;In-situ Remediation;Soil Drenching;Case 1;Contaminated Soil Excavation;Excavated Soil

Dataset: ILCD process, Unit process, single operation
Geography: BJ-CN
Reference year: 2017
Classification: Unit processes / Other Services / Repair and maintenance
Generated by: Wang Ning, wang_ning@caep.org.cn
Owner: Tiangong LCI Data Working Group
Review: Dependent internal review by Tiangong LCI Data Working Group
Amounts: no units in this file; such an amount is in the reference unit of its flow, which a separate flow dataset defines
copyright: false
licenseType: Free of charge for all users and uses

## General comment
Use of excavators to dig out contaminated soil

## Technology and included processes
The volume of contaminated soil free site is 350,000 m3, the efficiency of the excavator is 44.6 m3/h, and the fuel consumption is 22l/h.

## Technical purpose
Excavation of contaminated soil using excavators is an industrial process applied in environmental engineering, particularly within in-situ soil remediation projects. This process involves the physical removal of polluted earth to mitigate environmental hazards. The operations are often part of larger land reclamation or industrial clean-up efforts, and the excavated soil is subsequently treated to remove contaminants or disposed of in accordance with environmental regulations.

## Reference product
- Excavated soil,Excavated soil: 350000; measured

## Inputs
- Diesel,Diesel: 172.646; measured

## Use advice
Users of this dataset should ensure inclusion of all inputs and outputs associated with the excavation process when conducting a Life Cycle Assessment (LCA). This includes accounting for all major raw materials and energy consumption related to the operation of excavators such as fuel usage. The dataset provides the efficiency of the excavation process and the volume of soil excavated, which must be considered in the LCA modelling. This data is case-specific (Case 1) and should not be generalized without proper adjustment and consideration of the technological applicability to other scenarios.

## Review details
Inventory: The internal review was done by several iteration steps concerning raw data validation, raw data documentation, representativity, completeness and consistency of modelling with regard to ISO 14040 and 14044.

## Data sources
- Song, Y. et al. Environmental and socio-economic sustainability appraisal of contaminated land remediation strategies: A case study at a mega-site in China. Science of The Total Environment 610–611, 391–401 (2018).
