# Bioethanol ; Solvent-based

Dataset: ILCD process
Geography: GLO
Classification: Energy carriers and technologies / Renewable fuels
Generated by: Jiayi Yuan, jiayi_y@mail.bnu.edu.cn
Owner: Tiangong LCI Data Working Group
Review: Dependent internal review by Tiangong LCI Data Working Group
Amounts: no units in this file; such an amount is in the reference unit of its flow, which a separate flow dataset defines
licenseType: Free of charge for all users and uses

## General comment
This bioethanol, characterized as a solvent-based product, is typically utilized as a renewable solvent in various industrial applications. It can also be employed as a biofuel component blended with gasoline, enhancing oxygenate levels to improve combustion and reduce emissions.

## Inputs
All rows: uniform; missing unimportant
- Electricity: 13.716; max 189
- heat: 1290; max 6550
- Electricity: 374.4; min 4.176; max 2415.6
- heat: 4770; min 417; max 14800
- Electricity: 417.6; min 227.52; max 597.6

## Outputs
- heat: 603; max 3280; uniform; missing unimportant

## Use advice
When utilizing this data set for life cycle assessments, users should ensure inclusion of the agricultural feedstock cultivation impacts and solvent recovery processes when applicable. Attention should be given to the emission profiles associated with production, including the handling and combustion of bioethanol. Methodologies to account for land use change and potential indirect effects should also be considered.

## Review details
Inventory: The internal review was done by several iteration steps concerning raw data validation, raw data documentation, representativity, completeness and consistency of modelling with regard to ISO 14040 and 14044.
