# Liquid aluminum electrolytic capacitor (LAEC) production ; Liquid aluminum electrolytic capacitor (LAEC)>2cm ; Primary aluminum ingot

Dataset: ILCD process, Unit process, single operation
Geography: CN
Reference year: 2022
Classification: Unit processes / Materials production / Metals and semimetals
Generated by: Huimin Chang, huiminchang@tsinghua.edu.cn
Owner: Tiangong LCI Data Working Group
Review: Dependent internal review by Tiangong LCI Data Working Group
Amounts: no units in this file; such an amount is in the reference unit of its flow, which a separate flow dataset defines
copyright: false
licenseType: Free of charge for all users and uses

## General comment
液态铝电解电容器（LAEC）生产 ; 25V 150uf

## Time period
Literature published on 2022-11-15 in the literature The reference year of the elementary data (alumminum ingots, separator paper, tansport, electricity, and water) is around 2016 and qcruired from the Gabi database (Version: 10.6.1.35)

## Technology and included processes
The manufacturing stage of the AECs is divided into several sub-stages in this study based on the actual fabrication segmentation in the AEC industry. First, the high-purity aluminum ingots will be smelt, cast, rolled, and annealed into the aluminum foil with a thickness of about 10–100 μm. Then, anode foil and cathode foil for the AECs will be fabricated, respectively. The same manufacturing processes are applied toward anode foil in three types of AECs. The aluminum blank foil will be etched by the weak acids to increase the superficial area of the foil, and the electrochemical reaction can further form the dielectric (Al2O3). But cathode foil of three types of AECs varies in structure and manufacturing processes due to the differences in electrolytes. The cathode foil of LAECs is made by the etched process, while the cathode foil of PAEC is made by the carbon coating process after the etched process. In PHAECs, when liquid-state electrolyte and solid-state polymer are used simultaneously, the carbon-coated cathode aluminum foil of the PAECs is also replaced by the aluminum foil with TiO2 film to overcome the potential problems on capacitor cycling life. After obtaining the anode and cathode foil, the AECs can be manufactured, assembled, and packed. Besides, there are some differences in the AEC fabrication sub-stage. The specific processes of the three types of AECs are shown in Fig. 2. In detail, the differences in manufacturing processes among the three types of AECs are mainly due to the change of repair conditions of the capacitor dielectric (Al2O3 film) and the introduction of conductive polymer. On the one hand, PAECs and PHAECs cannot use the electrolyte to repair the dielectric layer in the aging process like LAECs, so an additional forming solution is required to perform forming process, which adds extra manufacturing steps. On the other hand, the conductive polymer needs to be effectively introduced into the middle of anode and cathode foils. The conductive polymer (PEDOT) in PAECs is formed by the polymerization reaction of EDOT and oxidizing agents in the capacitor manufacturing process, while the conductive polymer (PEDOT:PSS) in PHAEC is introduced into the capacitors by the dispersive solution. The collected inventory data of LAECs, PAECs, and PHAECs by the FU are summarized in Table 2. The details of the inventory data are available in Sheets 5–7 of Supporting Info B.

## Technical purpose
Liquid aluminum electrolytic capacitors (LAECs) are electrical components that store electrical charge and energy. The specialized manufacturing process described creates LAECs primarily larger than 2cm, employing primary aluminum ingots. The LAECs produced are commonly used in a diverse range of electronic systems, such as power supplies, consumer electronics, and industrial machinery, where high capacitance and voltage ratings are necessary. They are also used in long-life applications owing to their improved cycling stability provided by the specialized materials and manufacturing techniques, such as the usage of high-purity aluminum and distinct fabrication processes for anode and cathode foils.

## Reference product
- capacitor, electrolyte type, > 2cm height: 1e6; measured
  capacitors (product)

## Inputs
All rows: measured
- electricity, high voltage, aluminium industry: 16836.5
  Electricity grid mix (China)
- aluminium, primary, ingot: 334.9
  334.9=215.2(99.99% Al ingots)+119.7(99.9% Al ingots)
- water, deionised: 55386.8
- tap water: 31009.2
- section bar extrusion, aluminium: 486.8
  Aluminum profile (China)
- paper, woodfree, uncoated: 81.3
  Paper 1 from Gabi database ({50e97735-1e19-4788-8525-e39de50cd804})
- rubber: 131.8
  Rubber from Gabi database ({401c53f8-0ace-410b-9cc7-9a586f8ac2e6})
- wire drawing, steel: 2.12
  substance flow is leads (Fe) but database from Gabi database is steel wire ({d3e4d4d7-66ee-4bea-b6eb-9704682a0b8a})
- section bar extrusion, aluminium: 15.94
  Tab (alluminium profile (China) )
- sealing tape, aluminium/PE, 50 mm wide: 4.2513
  Tape(PP film ,from Gabi {7d6d2565-aeb4-4f36-a049-f715a80fe954})
- phosphoric acid, industrial grade, without water, in 85% solution state: 57.9819
  H3PO4
- boric acid, anhydrous, powder: 10.5368
  HBO3
- hydrochloric acid, without water, in 30% solution state: 81.317
  HCl (31%)
- sodium hydroxide, without water, in 50% solution state: 91.5496
  NaOH (30%)
- sulfuric acid: 484.649
  H2SO4 (98%)
- nitric acid, without water, in 50% solution state: 24.3951
  HNO3 (98%)
- Lubricating oil,Lubricating Oil: 8.0717
  Rolling oil
- Ammonium Citrate: 20.2938
  Ammonium citrate
- Ammonium Pentaborate: 5.5661
  Ammonium pentaborate
- ethylene glycol: 221.239
  Electrolyte (liquid) 1
- Ammonium dihydrogen phosphate: 0.9276
  NH4H2PO4
- polyethylene terephthalate, granulate, amorphous: 49.4529
  PET

## Outputs
All rows: measured
- Aluminium Phosphate: 7.4681
  AlPO4 (by-product)4
- used capacitor: 62816.7
  Capacitors (waste)
- wastewater, average: 47338
  Waste water
- sewage sludge: 7.0283
  Sludge
- aluminium scrap, new: 20.832
  Al scraps
- chemical oxygen demand: 2.0427
  COD

## Data selection and combination
The material information and performance parameters of the three types of AECs are from the investigated manufacturer. Moreover, through the field research of several factories in the AEC industry, the original data on aluminum blank foil fabrication (made from aluminum ingots), anode/cathode foil fabrication (made from aluminum blank foil), and capacitor fabrication were obtained. Due to technical confidentiality, the LCI data of the fabrication of the cathode foil for PHAECs cannot be obtained directly from the supplier. Therefore, the manufacturing LCI of aluminum cathode foil in PHAECs is adjusted according to the coating process data of cathode foil of PAECs, considering their similarity. In the transportation stage, the data of the main raw materials from the material origin to the capacitor manufacturer and the data of the manufactured capacitor products from the manufacturer to the customers are from the supply chain system of the manufacturer. The energy consumption in the use stage is calculated based on the physical equations and the electrical parameters of the AECs. To ensure the completeness of the analysis, the data of the end-of-life stage is obtained based on the analysis and calculation.The reference year of the elementary data is around 2016. The elementary data (i.e., aluminum ingots, separator paper, transport, electricity, and water) are acquired from the Gabi database (Version: 10.6.1.35). In addition, some background data, including 3, 4-ethylene dioxythiophene (EDOT), ammonium adipate, ammonium citrate, etc., are not available in the Gabi database. They are estimated based on the chemical reactions with the material preparation process from the existing raw materials in the Gabi database. The data on the preparation process of the dispersive solution (PEDOT:PSS, 1%wt) for PHAECs' fabrication are scaled from the lab data. The detailed LCI data of the three types of AEC and unit impact of the substance flow is provided in Sheets 5–7 and Sheet 2 of Supporting Info B.

## Use advice
Data users should pay attention to the granularity and applicability of the inventory data, which reflect specific sub-stages in the manufacturing process of various types of aluminum electrolytic capacitors (AECs). This data set contains information on LAECs, as well as two other AEC variants (PAECs and PHAECs), which may differ in the dielectric repair process and the incorporation of conductive polymers. Users must consider these differences when applying the data to their respective Life Cycle Assessments. The reference year for the baseline data is 2016, and it originates from the Gabi database; data users should note potential discrepancies that may arise due to the evolution of the manufacturing processes or changes in environmental effects since then. Additional methodological details, including scaling from lab data and adjustments made for PHAECs, should be factored in when interpreting and utilizing this data for environmental impact assessments, ensuring an accurate representation of the current technological practices.

## Review details
Inventory: The internal review was done by several iteration steps concerning raw data validation, raw data documentation, representativity, completeness and consistency of modelling with regard to ISO 14040 and 14044.

## Data sources
- Zhang, C., Zheng, Y., Jing, J., Liu, Y. & Huang, H. A comparative LCA study on aluminum electrolytic capacitors: From liquid-state electrolyte, solid-state polymer to their hybrid. J. Clean. Prod. 375, (2022).
