# Milk production ; silage cultivation

Dataset: ILCD process, Unit process, single operation
Geography: QD-SD-CN
Reference year: 2016
Classification: Unit processes / Materials production / Agricultural production means
Functional unit: The 1t FPCM corrected for protein and fat content was selected as the evaluation unit
Generated by: Rui Yang, 1632707028@qq.com
Owner: Tiangong LCI Data Working Group
Review: Dependent internal review by Tiangong LCI Data Working Group
Amounts: no units in this file; such an amount is in the reference unit of its flow, which a separate flow dataset defines
copyright: false
licenseType: Free of charge for all users and uses

## General comment
In IPBS wheat-silage maize rotation cultivation, the main inputs of production materials are chemical fertilizer, organic fertilizer, pesticide, seed, etc. The products are wheat, wheat straw and rice silage. Among the products, all wheat is sold, all wheat straw is returned to the field, silage corn is used to feed dairy cows; There was no silage planting link in non-IPBS

## Geography
A questionnaire survey was conducted on dairy farms in Qingdao, Shandong Province from July to August 2020.

## Time period
From 2016, Shandong began to implement the silage corn planting subsidy policy, is one of the earliest provinces to implement the subsidy policy, the subsidy standard is 20~50 yuan /t. In 2019, Shandong Province silage corn planting area reached 14,100 hm2, accounting for 7.3% of the country.

## Technology and included processes
In the study area, there are mainly two milk production modes :IPBS and non-IPBS. In non-IPBS, the farms only have feeding links and manure treatment links, all the feed is purchased, and the manure pile fertilizer is made into organic fertilizer and sold to fruit and vegetable farmers. In IPBS, the silage corn planting process is increased in the farm, organic fertilizer and liquid fertilizer are mainly applied to the farm field, and the remaining part is sold to fruit farmers and vegetable farmers, etc. The differences between the two models are as follows :1) the sources of silage corn in the farm are different, resulting in different feed transportation distances and feed costs; 2) The use of organic fertilizer and liquid fertilizer is different, and the transportation distance is different. A total of 109 dairy farms were investigated in this study, and 83 valid questionnaires were obtained after excluding non-conforming questionnaires, among which 38 were non-IPBS and 45 were IPBS.

## Technical purpose
The technical usage of the silage corn and wheat produced in IPBS (Integrated Plant and Breed System) is primarily for the cultivation of feed to support dairy farming, with silage corn used directly as fodder for dairy cows. The wheat produced is sold, while the wheat straw is returned to the field as part of a sustainable agricultural practice. The process also integrates the use of manure from dairy cows as organic fertilizer, which is applied to the fields to promote crop health, with excess manure sold to fruit and vegetable farmers.

## Reference product
- milk: 1000; estimated
  作为参考定量，非实际输出

## Inputs
All rows: measured
- Nitrogenous Matter (unspecified, as N): 2.37
  Fertilizer(N)
- phosphorus, total: 0.677
  Fertilizer (P2O5)
- potassium oxide: 0.507
  Fertilizer(K2O)
- Nitrogenous Matter (unspecified, as N): 3.718
  Organic fertilizer(N)
- Electricity: 38.6208
- Diesel: 0.000895
- water: 21.457
  irrigation water

## Outputs
- wheat: 56.555; measured
- maize grain: 318.667; measured
  silage corn

## Data treatment and extrapolations
The values in the table are the total input and output of each farm evenly distributed to FPCM per ton, and then the average value of each farm is taken. All input-output list data are calculated according to this method. The value in "()" is the average input per hectare, for the convenience of comparison with relevant studies; "a" Because the mechanical operation of farm tillage is mainly substitute tillage operation, the farmer is not clear about the diesel consumption in this link, and this data is based on relevant research [20]. "b" This value is the output of the process and is ultimately used entirely inside the system.

## Sampling procedure
研究地区主要有 2 种牛奶生产模式:IPBS 和 non-IPBS,具体见图 1.non-IPBS 中,养殖场只有饲养 环节和粪污处理环节,饲料全部来源于购买,粪便堆 肥制成有机肥后全销售给果农和菜农.IPBS 中,养殖 场增加青贮玉米种植环节,有机肥、液体肥主要施用 于场内农田,剩余部分销售给果农和菜农等.2 种模 式的区别:1)养殖场青贮玉米的来源不同,导致饲料 运输距离和饲料成本不同;2)有机肥、液体肥的利用 途径不同,运输距离不同.本研究共调研奶牛场 109 家,剔除不符合研究问卷后,得 83 份有效问卷,其中 non-IPBS 为 38 家,IPBS 为 45 家.

## Use advice
When utilizing this LCA data for analyzing the environmental impact of milk production processes, note that the data is specific to the IPBS cultivation system in Shandong Province, China, with a focus on the rotational cultivation of wheat and silage maize. The data includes input-output lists for resources consumed and produced per ton of Fat and Protein Corrected Milk (FPCM). Care should be taken to accurately account for diesel consumption in mechanical operations, based on substitute figures from relevant research [20], where direct data is unavailable. The benefits of the rotational system, including reduced feed transportation costs and different utilization pathways for organic fertilizers, should be reflected in comparative studies.

## Review details
Inventory: The internal review was done by several iteration steps concerning raw data validation, raw data documentation, representativity, completeness and consistency of modelling with regard to ISO 14040 and 14044.

## Data sources
- 黄显雷, 师博扬, 张英楠, 龙昭宇, & 尹昌斌. 基于生命周期视角的种养一体化奶牛场环境经济效益评估. 中国环境科学 41, 3944–3955 (2021).
