# Production of lithium hexafluorophosphate ; Lithium hexafluorophosphate ; Lime, hydrogen fluoride, phosphorus pentachloride, lithium fluoride

Dataset: ILCD process, Unit process, single operation
Classification: Materials production / Inorganic chemicals
Functional unit: Produce 1kg of lithium hexafluorophosphate
LCI method principle: Attributional
Generated by: Xin Chen, xinchen@mail.nankai.edu.cn
Owner: Tiangong LCI Data Working Group
Review: Dependent internal review by Tiangong LCI Data Working Group
Amounts: no units in this file; such an amount is in the reference unit of its flow, which a separate flow dataset defines
copyright: false
licenseType: Free of charge for all users and uses

## General comment
Through the direct reaction of fluorite ore powder (calcium fluoride) and phosphorus pentachloride, phosphorus pentafluoride is produced, which then reacts with lithium fluoride to synthesize lithium hexafluorophosphate.

## Reference product
- Lithium hexafluorophosphate: 1; article inperiodical
  The data comes from the literature, there is no input of transportation data, and no output of pollutants.

## Inputs
- Lithium fluoride: 0.197; article inperiodical
  (same comment as for Lithium hexafluorophosphate)
- Hydrogen fluoride: 4.04; article inperiodical
  (same comment as for Lithium hexafluorophosphate)
- lime: 7.44; article inperiodical
  (same comment as for Lithium hexafluorophosphate)
- electricity: 1.9476; article inperiodical
  (same comment as for Lithium hexafluorophosphate)

## Data selection and combination
Data comes from literature

## Review details
Inventory: The internal review was done by several iteration steps concerning raw data validation, raw data documentation, representativity, completeness and consistency of modelling with regard to ISO 14040 and 14044.

## Data sources
- Yin, R., Hu, S. & Yang, Y. Life cycle inventories of the commonly used materials for lithium-ion batteries in China. Journal of Cleaner Production227, 960–971 (2019).
