# Propylene production ; general propylene ; catalytic cracking

Dataset: ILCD process
Geography: CN
Reference year: 2010
Classification: Unit processes / Materials production / Organic chemicals
Functional unit: 1kg propylene production
Generated by: Xiaohua Liu, lxh01311@163.com
Owner: Tiangong LCI Data Working Group
Review: Dependent internal review by Tiangong LCI Data Working Group
Amounts: no units in this file; such an amount is in the reference unit of its flow, which a separate flow dataset defines
copyright: false
licenseType: Free of charge for all users and uses

## General comment
The propylene produced via catalytic cracking is a general-purpose chemical commonly utilized for the manufacturing of various products including plastics, such as polypropylene, as well as in the production of chemicals like propylene oxide and acrylonitrile.

## Inputs
- Raw coal: 382; measured
  raw coal
- Fuel Oil: 1810; measured
  crude oil
- natural gas,natural gas: 16.6; measured
  natural gas
- water: 6230; measured

## Outputs
All rows: measured
- carbon dioxide (fossil): 1870
  carbon dioxide The original text did not distinguish between bio and fossil，according to expert judgment, this is carbon dioxide (fossil)
- sulfur dioxide: 9.07
- Nitrogen oxides: 5.42
  nitrogen oxide
- carbon monoxide (fossil): 4.2
  carbon monoxide The original text did not distinguish between bio and fossil，according to expert judgment, this is carbon monoxide(fossil)
- methane (fossil): 0.234
  methane The original text did not distinguish between bio and fossil,according to expert judgment, this is carbon methane (fossil)
- fume: 12.2
  smoke
- Non-methane volatile organic compounds: 0.0176
  Non methane volatile organic compounds
- Wastewater: 1140
  waste water
- Solid Waste: 7.87
  Waste residue

## Use advice
When using this LCA data for propylene production, ensure to account for upstream impacts of raw material extraction and transportation. If the propylene is intended to be part of a product that will be recycled, include considerations for the end-of-life phase, specifically the recycling processes. The data is best applicable for cradle-to-gate assessments and may need adjustments for cradle-to-grave analyses, depending on the use phase and end-of-life scenarios of the final product.

## Review details
Inventory: The internal review was done by several iteration steps concerning raw data validation, raw data documentation, representativity, completeness and consistency of modelling with regard to ISO 14040 and 14044.

## Data sources
- 聚碳酸酯和聚乳酸的生命周期评价
