# Component Production ; Battery components ; Leaded solder without flux ; Welded laminated frame ; All sizes; NESPS2 / 组件生产 ; 电池组件 ; 含铅焊料无助焊剂 ; 焊接层压装框 ; 所有规模 ; 全国第二次污染普查数据

Dataset: ILCD process, Unit process, single operation
Geography: CN
Reference year: 2019
Classification: Reference Parameters / Materials production / Metals and semimetals
Generated by: The data was created by the Office of the Second National Pollution Source Census of the Ministry of Ecology and Environment, and the data was organized by the TianGong Plan team for ILCD format / 生态环境部第二次全国污染源普查工作办公室创建数据，天工计划团队常慧敏整理数据为ILCD格式
Owner: Tiangong LCI Data Working Group / 天工LCI数据工作小组
Review: Dependent internal review by Tiangong LCI Data Working Group / 天工LCI数据工作小组
Amounts: no units in this file; such an amount is in the reference unit of its flow, which a separate flow dataset defines
copyright: false
licenseType: Free of charge for all users and uses

## General comment
the Technical of end-of-pipe management technology for pollution Lead solderisBag filter，Its Technical efficiency of end-of-pipe management86

## Technical purpose
该工业数据集描述了采用无助焊剂的含铅焊料在焊接层压框架中的电池组件生产过程，适用于所有尺寸。该过程与参与电池组件组装的制造商有关，如汽车工业、可再生能源存储、便携式电子产品及其他需要高品质电池单元的设备。

## Reference product
- Lead solder: 1; input; calculated
  源文件中描述为为含铅焊料无助焊剂，此处对其进行了匹配工作，将其匹配到LCAflow库里面相最符合的流，污染物指标备注为颗粒物

## Outputs
- lead: 8.54e-9; calculated
  the Technical of end-of-pipe management technology for pollution leadisBag filter，Its Technical efficiency of end-of-pipe management86
  污染物指标铅的末端治理技术是袋式除尘，其效率为86，末端治理设施实际运行率（k值）计算公式为k=除尘设备耗电量（千瓦时/年）/[除尘设备额定功率（千瓦）×除尘设备运行时间（小时/年）]。原文件中描述污染物类别为废气，污染物指标为铅，此处对其进行了匹配工作，将其匹配到LCAflow库里面相最符合的流，污染物指标备注为铅
- particles (PM2.5 - PM10): 3.41e-5; calculated
  the Technical of end-of-pipe management technology for pollution particles (PM2.5 - PM10)isSpray tower，Its Technical efficiency of end-of-pipe management89
  污染物指标颗粒物的末端治理技术是喷淋塔，其效率为89，末端治理设施实际运行率（k值）计算公式为k=除尘设备耗电量（千瓦时/年）/[除尘设备额定功率（千瓦）×除尘设备运行时间（小时/年）]。原文件中描述污染物类别为废气，污染物指标为颗粒物，此处对其进行了匹配工作，将其匹配到LCAflow库里面相最符合的流，污染物指标备注为颗粒物
- particles (PM2.5 - PM10): 4.34e-5; calculated
  the Technical of end-of-pipe management technology for pollution particles (PM2.5 - PM10)isBag filter，Its Technical efficiency of end-of-pipe management86
  污染物指标颗粒物的末端治理技术是袋式除尘，其效率为86，末端治理设施实际运行率（k值）计算公式为k=除尘设备耗电量（千瓦时/年）/[除尘设备额定功率（千瓦）×除尘设备运行时间（小时/年）]。原文件中描述污染物类别为废气，污染物指标为颗粒物，此处对其进行了匹配工作，将其匹配到LCAflow库里面相最符合的流，污染物指标备注为颗粒物

## Use advice
This dataset is derived from the Pollution Source Census Report and contains information on pollution emissions and related products. However, it does not include data on energy or chemical consumption, nor does it provide information on waste or co-product generation. When utilizing this dataset, please supplement the missing data based on actual conditions before use
该数据集来源于污染源普查报告，包含污染物排放及相关产品信息，但不包含能源或化学品消耗数据，也不提供废弃物或共生产物产生信息。在使用该数据集时，请根据实际情况补充缺失数据后再使用。

## Review details
Inventory: The internal review was done by several iteration steps concerning raw data validation, raw data documentation, representativity, completeness and consistency of modelling with regard to ISO 14040 and 14044.
清单： 内部审查通过几个迭代步骤完成，涉及原始数据验证、原始数据记录、代表性、完整性、与 ISO 14040 和 14044 有关的建模的一致性。

## Data sources
- 第二次全国污染源普查产排污核算系数手册（试用版）,四级代码3825文件，在完整版文件中第5117页
