# Crop production｜crop｜no process

Dataset: ILCD process, Unit process, single operation
Geography: CN
Reference year: 2010
Classification: Unit processes / Materials production / Agricultural production means
Functional unit: 1 ton of straw as a functional unit (0% moisture content).
LCI method principle: Consequential
Generated by: Chaoshuo Liu, liucs22@mails.jlu.edu.cn
Owner: Tiangong LCI Data Working Group
Review: Dependent internal review by Tiangong LCI Data Working Group
Amounts: no units in this file; such an amount is in the reference unit of its flow, which a separate flow dataset defines
copyright: false
licenseType: Free of charge for all users and uses

## General comment
The system boundary of this document includes the growth stage of crops, the acquisition stage of agricultural waste (straw), the pretreatment stage of agricultural waste (straw), and the stage of combustion and power generation (the stage of final use of electricity is also included, but there is no emission in the process).This process is the growth stage of crops.

## Technical purpose
This dataset represents the growth stage of crops specifically designed for the subsequent acquisition and pretreatment of agricultural waste (straw) for combustion and power generation. The functional unit of this process is the production of 1 ton of straw with 0% moisture content. It can apply to agricultural sectors aiming at a dual-utilization farming model where not only is the crop harvested but also the leftover straw is utilized for energy generation.

## Reference product
- Crop straw: 1000; measured

## Outputs
All rows: measured
- sulfur dioxide: 0.258
- carbon monoxide,carbon monoxide (fossil): 0.146
  The expert notes that the original text does not differentiate between biogenic and fossil sources of emissions, and in their opinion, the emissions in question are fossil.
- nitrous oxide: 0.254
- hydrocarbons (unspecified): 0.046
- particles (> PM10),particles (> PM10): 0.054
- carbon dioxide (fossil): 206
  (same comment as for carbon monoxide,carbon monoxide (fossil))
- methane (fossil): 0.44
  The original literature data is 11kg of carbon dioxide emission equivalent. This emission data is calculated after conversion (conversion factor 25).
- nitrous oxide: 0.584
  The original literature data is carbon dioxide emission equivalent of 174kg. This emission data is calculated after conversion (conversion factor 298).

## Use advice
Users of this data should ensure that they account for every stage as outlined in the system boundary of the document, including growth, acquisition, pretreatment, and combustion for energy generation, with special attention to the absence of emissions during the final use of electricity. This data should not be applied to processes where moisture content in straw is above 0%, or where straw is not used as a source of energy. As the data is specific for no process parameters, users might want to adjust it to match their specific process conditions.

## Review details
Inventory: The internal review was done by several iteration steps concerning raw data validation, raw data documentation, representativity, completeness and consistency of modelling with regard to ISO 14040 and 14044.

## Data sources
- Lu, W. & Zhang, T. Life-Cycle Implications of Using Crop Residues for Various Energy Demands in China. Environ. Sci. Technol. 44, 4026–4032 (2010).
