# Municipal wastewater treatment ; Wastewater ;Anoxic-oxic (A/O)

Dataset: ILCD process, Unit process, single operation
Geography: CN
Classification: Unit processes / End-of-life treatment / Waste water treatment
Generated by: YU Chenyang, yuchenyang0506@foxmail.com
Owner: Tiangong LCI Data Working Group
Review: Dependent internal review by Tiangong LCI Data Working Group
Amounts: no units in this file; such an amount is in the reference unit of its flow, which a separate flow dataset defines
copyright: ['opt4ROkqig']
licenseType: Free of charge for all users and uses

## General comment
The anoxic- aerobic (A/O) process is a common wastewater treatment technology that degrades organic matter and nitrogen in wastewater through alternating anoxic and aerobic environments. In the anoxic phase, organic matter is partially oxidized and nitrogen is released, while in the aerobic phase, microorganisms further oxidize the organic matter and convert ammonia nitrogen to nitrate nitrogen.The A/O process is commonly used in municipal wastewater treatment plants to efficiently remove organic matter and nitrogen from wastewater, purify the water quality, and reduce the impact of wastewater on the environment.

## Geography
17 WWTPs in China

## Technology and included processes
The anoxic- aerobic (A/O) process first realizes nitrification and denitrification of nitrogen through the anoxic stage, then oxidation of organic matter and treatment of wastewater under aerobic conditions, and finally separates sludge from water through sedimentation. This process effectively removes nitrogen and organic matter from wastewater by switching between different treatment stages at the right time, realizing the purification and treatment of wastewater.

## Technical purpose
The Anoxic-oxic (A/O) process described in this dataset is implemented for municipal wastewater treatment. It is a commonly used biological treatment method in municipal wastewater treatment plants (WWTPs) for the removal of organic pollutants, nitrogen, and phosphorus. The process is applicable to the 17 WWTPs in China mentioned in the dataset.

## Reference product
- Wastewater: 1; input; measured

## Inputs
- Electricity: 1.728; measured
- sodium: 0.22; measured
  Sodium acetate
- Polyacrylamide: 0.00264; measured
- Polyferric chloride: 0.13; measured

## Outputs
All rows: measured
- chemical oxygen demand: 0.02052
- biological oxygen demand: 0.00612
- ammonia: 0.00047
- nitrogen, total (excluding N2): 0.01095
- phosphorus, total: 0.0003
- Suspended solids, unspecified,Suspended solids, unspecified,Suspended solids, unspecified: 0.00425
- methane (biogenic),methane (biogenic): 0.00248
  The original text does not provide information on biogenic and fossil sources. According to experts, it is classified as fossil.
- nitrous oxide: 0.00054

## Use advice
When using this dataset for Life Cycle Assessment (LCA), ensure that the system boundaries include both the anoxic and oxic stages of the A/O process. Carefully consider the operational characteristics of the 17 WWTPs in China, as their specific technologies and efficiencies may differ. Model the use phase accurately by integrating the site-specific data provided. Verify if the data is current and representative of the current technologies used in China. Exclude external wastewater treatment processes not described by this dataset unless they are a part of your LCA's system boundaries.

## Review details
Inventory: The internal review was done by several iteration steps concerning raw data validation, raw data documentation, representativity, completeness and consistency of modelling with regard to ISO 14040 and 14044.

## Data sources
- Chen, W., Zhang, Q., Hu, L., Geng, Y. & Liu, C. Understanding the greenhouse gas emissions from China’s wastewater treatment plants: Based on life cycle assessment coupled with statistical data. Ecotoxicology and environmental safety 259, 115007 (2023).
