# Dimethyl carbonate production ; dimethyl carbonate ; oxidative carbonylation ; oxygen, methanol, coke

Dataset: ILCD process, Unit process, single operation
Geography: QZ-FJ-CN
Classification: Materials production / Organic chemicals
Functional unit: Produce 1kg dimethyl carbonate
LCI method principle: Attributional
Generated by: Xin Chen, xinchen@mail.nankai.edu.cn
Owner: Tiangong LCI Data Working Group
Review: Dependent internal review by Tiangong LCI Data Working Group
Amounts: no units in this file; such an amount is in the reference unit of its flow, which a separate flow dataset defines
copyright: false
licenseType: Free of charge for all users and uses

## General comment
Coke and oxygen react incompletely to generate carbon monoxide. At the same time, the unreacted part of the coke can be used as a catalyst. Oxygen, carbon monoxide and methanol react under gas phase conditions to generate dimethyl carbonate; because there is no specific method for using coke, oxygen, and methanol to produce dimethyl carbonate. process, so this process is a guess of the existing process

## Geography
Quanzhou Henghe Chemical Industry Co., Ltd

## Technology and included processes
Direct gas phase method/oxidative carbonylation method, the reaction of oxygen, carbon monoxide and methanol under gaseous conditions to synthesize dimethyl carbonate

## Technical purpose
Dimethyl carbonate produced by the oxidative carbonylation using coke, oxygen, and methanol is primarily utilized in the synthesis of polycarbonates, solvents, and as a methylating agent. It's applied in industries such as plastic manufacturing, pharmaceuticals, and as an eco-friendly solvent or intermediate in organic syntheses.

## Reference product
- Dimethyl carbonate: 1
  Data comes from the environmental performance assessment report of Quanzhou Ganghe Chemical Co., Ltd.

## Inputs
- Methanol: 0.75
  (same comment as for Dimethyl carbonate)
- Coke: 0.24
  (same comment as for Dimethyl carbonate)
- oxygen: 0.529
  (same comment as for Dimethyl carbonate)
- electricity: 0.8604
  (same comment as for Dimethyl carbonate)
- process steam: 0.0055
  (same comment as for Dimethyl carbonate)

## Outputs
- non-methane volatile organic compounds: 1.63e-5
  (same comment as for Dimethyl carbonate)
- carbon monoxide: 1.03e-6
  (same comment as for Dimethyl carbonate)
- chemical oxygen demand: 9.25e-6
  (same comment as for Dimethyl carbonate)
- biological oxygen demand: 1.83e-6
  (same comment as for Dimethyl carbonate)
- Suspended solids, unspecified: 6.46e-6
  (same comment as for Dimethyl carbonate)

## Data selection and combination
Data comes from the environmental performance assessment report of Quanzhou Ganghe Chemical Co., Ltd.

## Data treatment and extrapolations
There may be simple multiplication and division processing on the data

## Use advice
When using this LCA data set for dimethyl carbonate produced via the speculated oxidative carbonylation method with coke, oxygen, and methanol, ensure correct allocation of inputs and outputs for the functional unit of 1 kg of product. Consider technological applicability carefully; the information is based on a theoretical process not yet in commercial practice. Validate the data with empirical studies when available, and adjust the system boundaries as necessary to reflect real-life scenarios.

## Review details
Inventory: The internal review was done by several iteration steps concerning raw data validation, raw data documentation, representativity, completeness and consistency of modelling with regard to ISO 14040 and 14044.

## Data sources
- Yin, R., Hu, S. & Yang, Y. Life cycle inventories of the commonly used materials for lithium-ion batteries in China. Journal of Cleaner Production227, 960–971 (2019).
