# Dry distillation section ; Shale crude oil ; Oil shale block ; ATP technology process ; All sizes; NESPS2 / 干馏工段 ; 页岩原油 ; 油页岩块 ; ATP技术工艺 ; 所有规模 ; 全国第二次污染普查数据

Dataset: ILCD process, Unit process, single operation
Geography: CN
Reference year: 2019
Classification: Reference Parameters / Energy carriers and technologies / Other non-renewable fuels
Generated by: The data was created by the Office of the Second National Pollution Source Census of the Ministry of Ecology and Environment, and the data was organized by the TianGong Plan team for ILCD format / 生态环境部第二次全国污染源普查工作办公室创建数据，天工计划团队常慧敏整理数据为ILCD格式
Owner: Tiangong LCI Data Working Group / 天工LCI数据工作小组
Review: Dependent internal review by Tiangong LCI Data Working Group / 天工LCI数据工作小组
Amounts: no units in this file; such an amount is in the reference unit of its flow, which a separate flow dataset defines
copyright: false
licenseType: Free of charge for all users and uses

## General comment
the Technical of end-of-pipe management technology for pollution Exhaust gasis/

## Technical purpose
本工艺描述了一个干馏工段，利用ATP技术（绝热热解工艺）处理油页岩，制取页岩原油，适合所有规模的操作。该转化技术主要应用于能源行业，其中页岩油作为传统原油的替代品。精炼产品可能用于燃料生产、供暖以及作为各种化学合成的原料。管尾污染管理技术应用于处理废水、化学需氧量（COD）、氨氮、与石油相关的废物、氰化物、苯酚以及排放气体，以确保符合环境标准。具体的处理技术包括浮选分离、生化处理和催化氧化处理。针对如PM2.5 - PM10、二氧化硫（SO2）和氮氧化物（NOx）等空气颗粒和气体，所使用的技术是单筒旋风除尘、布袋过滤器和石灰/石膏法。这些技术的效率各不相同，表明了工业操作中不同污染物的控制效果。

## Reference product
- Oil Shale: 1000; input; calculated
  源文件中描述为为油页岩块，此处对其进行了匹配工作，将其匹配到LCAflow库里面相最符合的流，污染物指标备注为工业废水量

## Outputs
All rows: calculated
- cyanide: 1.2e-7
  the Technical of end-of-pipe management technology for pollution cyanideisFloating separation + biochemical treatment + catalytic oxidation
  污染物指标氰化物的末端治理技术是上浮分离+生化处理+催化氧化，末端治理设施实际运行率（k值）计算公式为/。原文件中描述污染物类别为废水，污染物指标为氰化物，此处对其进行了匹配工作，将其匹配到LCAflow库里面相最符合的流，污染物指标备注为氰化物
- Petroleum-related waste: 0.000854
  the Technical of end-of-pipe management technology for pollution Petroleum-related wasteisFloating separation + biochemical treatment + catalytic oxidation
  污染物指标石油类的末端治理技术是上浮分离+生化处理+催化氧化，末端治理设施实际运行率（k值）计算公式为/。原文件中描述污染物类别为废水，污染物指标为石油类，此处对其进行了匹配工作，将其匹配到LCAflow库里面相最符合的流，污染物指标备注为石油类
- volatile organic compound: 0.002
  the Technical of end-of-pipe management technology for pollution volatile organic compoundis/，Its Technical efficiency of end-of-pipe management0
  污染物指标挥发性有机物的末端治理技术是/，其效率为0，末端治理设施实际运行率（k值）计算公式为/。原文件中描述污染物类别为废气，污染物指标为挥发性有机物，此处对其进行了匹配工作，将其匹配到LCAflow库里面相最符合的流，污染物指标备注为挥发性有机物
- phenol: 0.00519
  the Technical of end-of-pipe management technology for pollution phenolisFloating separation + biochemical treatment + catalytic oxidation
  污染物指标挥发酚的末端治理技术是上浮分离+生化处理+催化氧化，末端治理设施实际运行率（k值）计算公式为/。原文件中描述污染物类别为废水，污染物指标为挥发酚，此处对其进行了匹配工作，将其匹配到LCAflow库里面相最符合的流，污染物指标备注为挥发酚
- Nitrogen oxides: 0.00644
  the Technical of end-of-pipe management technology for pollution Nitrogen oxidesisSingle cylinder cyclone dust removal + bag filter + lime/gypsum method，Its Technical efficiency of end-of-pipe management77
  污染物指标氮氧化物的末端治理技术是单筒旋风+袋式除尘+石灰/石膏法，其效率为77，末端治理设施实际运行率（k值）计算公式为k=废气治理设施运行时间（小时/年）/正常生产时间（小时/年）。原文件中描述污染物类别为废气，污染物指标为氮氧化物，此处对其进行了匹配工作，将其匹配到LCAflow库里面相最符合的流，污染物指标备注为氮氧化物
- sulfur dioxide: 0.01808
  the Technical of end-of-pipe management technology for pollution sulfur dioxideisSingle cylinder cyclone dust removal + bag filter + lime/gypsum method，Its Technical efficiency of end-of-pipe management84
  污染物指标二氧化硫的末端治理技术是单筒旋风+袋式除尘+石灰/石膏法，其效率为84，末端治理设施实际运行率（k值）计算公式为k=废气治理设施运行时间（小时/年）/正常生产时间（小时/年）。原文件中描述污染物类别为废气，污染物指标为二氧化硫，此处对其进行了匹配工作，将其匹配到LCAflow库里面相最符合的流，污染物指标备注为二氧化硫
- particles (PM2.5 - PM10): 0.0207
  the Technical of end-of-pipe management technology for pollution particles (PM2.5 - PM10)isSingle cylinder cyclone dust removal + bag filter + lime/gypsum method，Its Technical efficiency of end-of-pipe management85
  污染物指标颗粒物的末端治理技术是单筒旋风+袋式除尘+石灰/石膏法，其效率为85，末端治理设施实际运行率（k值）计算公式为k=废气治理设施运行时间（小时/年）/正常生产时间（小时/年）。原文件中描述污染物类别为废气，污染物指标为颗粒物，此处对其进行了匹配工作，将其匹配到LCAflow库里面相最符合的流，污染物指标备注为颗粒物
- Ammonia Nitrogen: 0.115
  the Technical of end-of-pipe management technology for pollution Ammonia NitrogenisFloating separation + biochemical treatment + catalytic oxidation
  污染物指标氨氮的末端治理技术是上浮分离+生化处理+催化氧化，末端治理设施实际运行率（k值）计算公式为/。原文件中描述污染物类别为废水，污染物指标为氨氮，此处对其进行了匹配工作，将其匹配到LCAflow库里面相最符合的流，污染物指标备注为氨氮
- chemical oxygen demand: 0.154
  the Technical of end-of-pipe management technology for pollution chemical oxygen demandisFloating separation + biochemical treatment + catalytic oxidation
  污染物指标化学需氧量的末端治理技术是上浮分离+生化处理+催化氧化，末端治理设施实际运行率（k值）计算公式为/。原文件中描述污染物类别为废水，污染物指标为化学需氧量，此处对其进行了匹配工作，将其匹配到LCAflow库里面相最符合的流，污染物指标备注为化学需氧量
- Waste water: 31.2
  the Technical of end-of-pipe management technology for pollution Waste waterisFloating separation + biochemical treatment + catalytic oxidation
  污染物指标工业废水量的末端治理技术是上浮分离+生化处理+催化氧化，末端治理设施实际运行率（k值）计算公式为/。原文件中描述污染物类别为废水，污染物指标为工业废水量，此处对其进行了匹配工作，将其匹配到LCAflow库里面相最符合的流，污染物指标备注为工业废水量
- Exhaust gas: 532
  the Technical of end-of-pipe management technology for pollution Exhaust gasis/
  污染物指标工业废气量的末端治理技术是/，末端治理设施实际运行率（k值）计算公式为/。原文件中描述污染物类别为废气，污染物指标为工业废气量，此处对其进行了匹配工作，将其匹配到LCAflow库里面相最符合的流，污染物指标备注为工业废气量

## Use advice
This dataset is derived from the Pollution Source Census Report and contains information on pollution emissions and related products. However, it does not include data on energy or chemical consumption, nor does it provide information on waste or co-product generation. When utilizing this dataset, please supplement the missing data based on actual conditions before use
该数据集来源于污染源普查报告，包含污染物排放及相关产品信息，但不包含能源或化学品消耗数据，也不提供废弃物或共生产物产生信息。在使用该数据集时，请根据实际情况补充缺失数据后再使用。

## Review details
Inventory: The internal review was done by several iteration steps concerning raw data validation, raw data documentation, representativity, completeness and consistency of modelling with regard to ISO 14040 and 14044.
清单： 内部审查通过几个迭代步骤完成，涉及原始数据验证、原始数据记录、代表性、完整性、与 ISO 14040 和 14044 有关的建模的一致性。

## Data sources
- 第二次全国污染源普查产排污核算系数手册（试用版）,二级代码25,四级代码2519文件，在完整版文件中第4111页
