# Single Rare Earth Oxide / Single Rare Earth Carbonate / Single Rare Earth Chloride ; Southern ionic rare earth concentrates ; Hydrochloric acid dissolution + P507/naphthenic acid (ammonia soap) extraction and separation ; All sizes; NESPS2 / 单一稀土氧化物/单一稀土碳酸盐/单一稀土氯化物 ; 南方离子型稀土精矿 ; 盐酸溶解+P509/环烷酸（氨皂）萃取分离 ; 所有规模 ; 全国第二次污染普查数据

Dataset: ILCD process, Unit process, single operation
Geography: CN
Reference year: 2019
Classification: Reference Parameters / Materials production / Inorganic chemicals
Generated by: The data was created by the Office of the Second National Pollution Source Census of the Ministry of Ecology and Environment, and the data was organized by the TianGong Plan team for ILCD format / 生态环境部第二次全国污染源普查工作办公室创建数据，天工计划团队常慧敏整理数据为ILCD格式
Owner: Tiangong LCI Data Working Group / 天工LCI数据工作小组
Review: Dependent internal review by Tiangong LCI Data Working Group / 天工LCI数据工作小组
Amounts: no units in this file; such an amount is in the reference unit of its flow, which a separate flow dataset defines
copyright: false
licenseType: Free of charge for all users and uses

## General comment
the Technical of end-of-pipe management technology for pollution Ammonia NitrogenisEvaporative crystallization method，Its Technical efficiency of end-of-pipe management99

## Technical purpose
该数据集描述了从南方离子型稀土精矿出发，经过盐酸溶解工艺，再通过P509和环烷酸（氨皂）萃取与分离生产单一稀土氧化物、碳酸盐和氯化物的过程。稀土元素在多种应用中至关重要，如制造风力涡轮机的强磁体、电动车电机、电子产品以及在各种合金工艺中的应用。这种材料可能会在包括航空航天、军事和消费电子在内的高科技产业中使用。

## Reference product
- Single Rare Earth Oxide，Single Rare Earth Carbonate，Single Rare Earth Chloride: 1000; calculated
  源文件中描述为为单一稀土氧化物/单一稀土碳酸盐/单一稀土氯化物，此处对其进行了匹配工作，将其匹配到LCAflow库里面相最符合的流，污染物指标备注为氨氮

## Outputs
- Ammonia Nitrogen: 1.08; calculated
  the Technical of end-of-pipe management technology for pollution Ammonia NitrogenisEvaporative crystallization method，Its Technical efficiency of end-of-pipe management99
  污染物指标氨氮的末端治理技术是蒸发结晶法，其效率为99，末端治理设施实际运行率（k值）计算公式为k=废水治理设施年运行时间（小时）/企业年正常生产时间（小时）。原文件中描述污染物类别为废水，污染物指标为氨氮，此处对其进行了匹配工作，将其匹配到LCAflow库里面相最符合的流，污染物指标备注为氨氮

## Use advice
This dataset is derived from the Pollution Source Census Report and contains information on pollution emissions and related products. However, it does not include data on energy or chemical consumption, nor does it provide information on waste or co-product generation. When utilizing this dataset, please supplement the missing data based on actual conditions before use
该数据集来源于污染源普查报告，包含污染物排放及相关产品信息，但不包含能源或化学品消耗数据，也不提供废弃物或共生产物产生信息。在使用该数据集时，请根据实际情况补充缺失数据后再使用。

## Review details
Inventory: The internal review was done by several iteration steps concerning raw data validation, raw data documentation, representativity, completeness and consistency of modelling with regard to ISO 14040 and 14044.
清单： 内部审查通过几个迭代步骤完成，涉及原始数据验证、原始数据记录、代表性、完整性、与 ISO 14040 和 14044 有关的建模的一致性。

## Data sources
- 第二次全国污染源普查产排污核算系数手册（试用版）,四级代码3232文件，在完整版文件中第5117页
