# Soil Remediation;In-situ Remediation;Electric Remediation;Electric Remediation Facility Operation;Remediated Soil

Dataset: ILCD process, Unit process, single operation
Geography: KR
Reference year: 2014
Classification: Unit processes / Other Services / Repair and maintenance
Generated by: Wang Yipeng, wangyp@caep.org.cn
Owner: Tiangong LCI Data Working Group
Review: Dependent internal review by Tiangong LCI Data Working Group
Amounts: no units in this file; such an amount is in the reference unit of its flow, which a separate flow dataset defines
copyright: false
licenseType: Free of charge for all users and uses

## General comment
System operation and maintenance

## Technical purpose
This dataset describes an industrial process for in-situ soil remediation through electroremediation. It is intended for use in scenarios where soil contamination is addressed on site, without the need to transport the soil elsewhere. The electric remediation facility operation outlined in this dataset pertains to the treatment of soils to remove contaminants through the application of an electric current. This process is applicable, particularly for areas where excavation is impractical or where traditional remediation methods may be less effective.

## Reference product
- Remediated soil: 90; measured

## Inputs
All rows: measured
- Water for industrial use: 50
  Vehicle (onetime/week, 19.3 km, 10 km/1 L)
- sodium hydroxide: 10
  Chemical (0.01 M)
- Electricity: 21600
  Pump, power supply, etc
- EDTA: 36.5
- Diesel: 0.0927
  Vehicle (onetime/week, 19.3 km, 10 km/1 L)
- contaminated soil: 90
- Electric restoration facilities: 1

## Outputs
- Greenhouse Gases: 4340; measured
- Nitrogen oxides: 10.1; measured
- SOx: 11.2; measured
- particles (> PM10): 0.037; measured

## Use advice
When using this LCA dataset, it is important to ensure that the data accurately represents the specific electric remediation process employed. Users should verify that the input-output flow data reflects all major raw materials usage and necessary energy consumption for their application. If recycling of materials occurs during the remediation process, this must be taken into consideration in the data analysis. The maintenance and operational aspects of the electroremediation system described should also be included in the LCA to ensure a complete assessment of the environmental impact.

## Review details
Inventory: The internal review was done by several iteration steps concerning raw data validation, raw data documentation, representativity, completeness and consistency of modelling with regard to ISO 14040 and 14044.

## Data sources
- Kim, DH., Yoo, JC., Hwang, BR. et al. Environmental assessment on electrokinetic remediation of multimetal-contaminated site: a case study. Environ Sci Pollut Res 21, 6751–6758 (2014).
