# Salt production from seawater ; Electrodialysis, spiral-wound, CN

Dataset: ILCD process, Unit process, single operation
Geography: CN
Reference year: 2023
Classification: Materials production / Inorganic chemicals
Functional unit: 1 t sodium chloride
Generated by: Jiaqi Lu, wilsherelu@foxmail.com
Owner: Tiangong LCI Data Working Group
Review: Dependent internal review by Tiangong LCI Data Working Group
Amounts: no units in this file; such an amount is in the reference unit of its flow, which a separate flow dataset defines
copyright: false
licenseType: Free of charge for all users and uses

## General comment
This dataset describes the process of salt production from seawater using electrodialysis with a spiral-wound configuration. The end product, sodium chloride, is commonly employed in various sectors such as food preservation, flavor enhancement, de-icing, and as a raw material in the chemical industry.

## Reference product
- sodium chloride: 1000; article inperiodical
  product salt

## Inputs
- Electrodialysis Component: 0.0054; article inperiodical
  ED components
- electricity mix: 639.72; article inperiodical
  Process power consumption
- Water (fresh water): 4085; article inperiodical
  raw water

## Outputs
- High-concentration saline wastewater: 817; article inperiodical
  thick water
- Deionized Water: 3268; article inperiodical
  freshwater

## Use advice
When utilizing this data set, it is crucial to ensure its applicability to the geographical context due to the variability in seawater composition across different regions. Additionally, if the scope of the LCA includes downstream processes, it should include the potential environmental impacts related to transportation and further processing of sodium chloride. Recycling and end-of-life scenarios are not typically relevant for the dataset of primary salt production but should be considered for derived products.

## Review details
Inventory: The internal review was done by several iteration steps concerning raw data validation, raw data documentation, representativity, completeness and consistency of modelling with regard to ISO 14040 and 14044.

## Data sources
- Xue, N. et al. Carbon footprint analysis and carbon neutrality potential of desalination by electrodialysis for different applications. Water Res. 232, 119716 (2023).
