# Steel products ; steel ; Steel production

Dataset: ILCD process, Unit process, single operation
Geography: CN
Reference year: 2006
Classification: Unit processes / Materials production / Metals and semimetals
Generated by: Wanghuanyu, wanghuanyu00@126.com
Owner: Tiangong LCI Data Working Group
Review: Dependent internal review by Tiangong LCI Data Working Group
Amounts: no units in this file; such an amount is in the reference unit of its flow, which a separate flow dataset defines
copyright: false
licenseType: Free of charge for all users and uses

## General comment
This data set represents the production of steel products. The steel obtained from this process is suitable for a wide range of applications including construction, automotive, manufacturing, and infrastructure due to its strength, durability, and recyclability.

## Reference product
- Alloy steel: 1000; measured
  Only source indicators and end indicators outside the production process are counted in the literature, and some intermediate input (such as self-production and scrap processing in the process) is not given in the literature

## Inputs
- iron: 729; measured
  (same comment as for Alloy steel)
- primary energy from solar energy: 560.2; measured
  (same comment as for Alloy steel)
- freshwater,freshwater: 16000; measured
  (same comment as for Alloy steel)

## Outputs
All rows: measured
- carbon monoxide (fossil): 21.27
  (same comment as for Alloy steel)
- carbon dioxide (fossil): 1336.28
  (same comment as for Alloy steel)
- phenol,Sulphur oxides (as SO2): 4.66
  (same comment as for Alloy steel)
- nitrous oxide: 2.85
  (same comment as for Alloy steel)
- Flue dust: 15.64
  (same comment as for Alloy steel)

## Use advice
When using this data set, users should consider the technological applicability of the steel production process to their specific context. Attention should be paid to the inclusion or exclusion of recycling when considering the end-of-life phase. Additionally, if the steel is to be used in specialized environments or applications, users must consider specific use-phase behavior, such as exposure to corrosive elements or mechanical stress.

## Review details
Inventory: The internal review was done by several iteration steps concerning raw data validation, raw data documentation, representativity, completeness and consistency of modelling with regard to ISO 14040 and 14044.

## Data sources
- 杜涛 & 蔡九菊. 典型钢铁生产流程的环境负荷分析. 中国冶金 38–41 (2006) doi:
