# Production stage ; crude oil ; seismic exploration, drilling, and well repair

Dataset: ILCD process, Unit process, single operation
Geography: BJ-CN
Reference year: 2004
Classification: Unit processes / Energy carriers and technologies / Crude oil based fuels
LCI method principle: Attributional
LCI method approaches: Consequential
Generated by: RuiXi Zhu, z2958242159@163.com
Owner: Tiangong LCI Data Working Group
Review: Dependent internal review by Tiangong LCI Data Working Group
Amounts: no units in this file; such an amount is in the reference unit of its flow, which a separate flow dataset defines
copyright: false
licenseType: Free of charge for all users and uses

## General comment
The main engineering categories to be carried out in the exploration and exploitation stage of petroleum include seismic exploration, drilling, workover, oil and gas accumulation and storage, etc. . According to the different regions are divided into onshore oil mining and offshore oil mining. In these processes, the main impact on the environment are noise, waste water, waste gas, and solid waste, but the most important is waste water, solid waste, these two parts. The following analysis of their impact and energy consumption

## Geography
Jianghan Oilfield

## Technology and included processes
The main engineering categories to be carried out in petroleum exploration and production stage include seismic exploration, drilling, workover, oil and gas storage. According to the different areas of exploitation, it is divided into onshore oil exploitation and offshore oil exploitation. In these processes, the impact on the environment is mainly noise, waste water, waste gas and solid waste, but the most important is the two parts of wastewater and solid waste. Seismic exploration is usually divided into three stages: seismic data acquisition, processing and interpretation. The techniques commonly used in seismic exploration include seismic source release (such as explosion source or vibration source), seismometer layout, seismic data recording and digital processing. Drilling technology involves the selection and operation of drilling equipment, the design and use of drill bit and drill pipe, and the circulation and management of drilling fluid. Common drilling methods include rotary drilling, circulation drilling and non-circulation drilling.Workover technology involves the repair of borehole wall, installation and fixing of casing, cement sealing and so on. The operation of the workover depends on the depth of the hole, the geology and the condition of the hole.

## Technical purpose
The data set represents the various activities involved in the exploration and exploitation stages of crude oil in the Jianghan Oilfield. The technical usage includes seismic exploration, drilling, and well repair, with a focus on applications for onshore and offshore oil extraction. This covers oil and gas accumulation, storage, and efforts to mitigate environmental impacts from noise, waste water, waste gas, and solid waste discharge during these processes. The data provided could be instrumental for developing strategies to reduce resource consumption and waste production in the petroleum sector.

## Reference product
- LPG - liquefied petroleum gas: 2030; uniform; missing unimportant
  Percentage of crude oil produced per unit of oil field for self-use

## Inputs
- LPG - liquefied petroleum gas: 250000; uniform; missing unimportant
  Crude oil production water consumption

## Deviations from the LCI method approaches
(1) from the energy consumption table, it can be seen that the oil loss rate is high in the stage of exploitation and refining, so it is necessary to take measures to reduce the loss in this process. (2) because of the large amount of wastewater in the process of oil exploitation and use, it is necessary to recycle the wastewater to reduce pollution and save water. (3) from the view of the whole life cycle, the use of oil is more polluting. But it has a wide range of applications and so many products that there are no alternatives in the short term.

## Use advice
Users of this LCA data set should take into account the high oil loss rates during the exploitation and refining stages, adopting measures to minimize losses. Special attention is required for water recycling and reuse to mitigate wastewater pollution and conserve resources. Considering the significant environmental impacts throughout the life cycle of oil usage, data users should incorporate the provided data into a broader environmental management strategy, while factoring in the current lack of viable alternatives to petroleum products and their widespread application.

## Review details
Inventory: The internal review was done by several iteration steps concerning raw data validation, raw data documentation, representativity, completeness and consistency of modelling with regard to ISO 14040 and 14044.

## Data sources
- 董志强,马晓茜,张凌.石油利用对环境影响的生命周期分析[J].石油与天然气化工,2004(06):456-459.
