# clinker production;clinker;shaft kiln

Dataset: ILCD process, Unit process, single operation
Geography: CN
Classification: Materials production / Other mineralic materials
Generated by: Siqi Yang, ysqsophia@gmail.com
Owner: Tiangong LCI Data Working Group
Review: Dependent internal review by Tiangong LCI Data Working Group
Amounts: no units in this file; such an amount is in the reference unit of its flow, which a separate flow dataset defines
copyright: false
licenseType: Free of charge for all users and uses

## General comment
In the calcinating phase for clinker, the raw meal (mainly CaCO3) is mixed with fuels as coal. Adding air into the kiln for calcinating causes the raw meal to decompose into clinker (mainly CaO) at a high temperature. Various pollutants are generated in the process.

## Technology and included processes
In the calcinating phase for clinker, the raw meal (mainly CaCO3)is mixed with fuels as coal. Adding air into the kiln for calcinating causes the raw meal to decompose into clinker (mainly CaO) at a high temperature. Various pollutants are generated in the process.

## Technical purpose
The clinker produced through this industrial process is a fundamental component in the manufacture of cement. The clinker calcination stage in the shaft kiln involves the thermal decomposition of raw materials, primarily calcium carbonate, using coal as a fuel. The resulting product, mainly calcium oxide, is an essential ingredient in the construction industry for creating various types of cement.

## Model description
The system boundary is the calcination stage where clinker is produced.

## Reference product
- clinker: 1000
  Clinker

## Inputs
- raw meal: 2042.5
  Raw ball
- limestone, crushed, for mill: 1165.83
  Limestone
- clay: 242.5
  Clay
- hard coal; 26.3 MJ/kg: 161.667
  Coal. Coal 1.94; Adding coal 0.4.
- iron, powder: 56.667
  Iron powder
- Water (fresh water): 416.667
  Water
- oxygen: 373.333
  O2

## Outputs
- particles (> PM10): 27.5
  Dust. The particle size is not specified. Here we treat it as PM>10.
- carbon dioxide: 914.167
  CO2
- sulfur dioxide: 2.5
  SO2
- Nitrogen oxides: 4.167
  NOX
- Water (groundwater from technosphere, waste water): 416.667
  Water
- Waste, solid, from cement production: 73.753
  Others. The original text did not specify what substance it is, so let's assume it is the soild waste.

## Sampling procedure
After investigation, the annual production capacity of cement companies using vertical kiln production systems is 100,000 tons of clinker. The overall characteristics of shaft kiln production lines are high energy consumption, limited production capacity, low labor productivity, and large dust emissions. The dynamic metabolism analysis of the shaft kiln production line is carried out in units of 1 hour under normal production levels.

## Use advice
When utilizing this dataset, ensure to account for associated emissions of pollutants during the high-temperature calcination process. Attention should be paid to the energy consumption characteristics and limited production capacity of shaft kiln systems. Dust emissions, in particular, should be monitored and included in any environmental impact assessments. The data use and methodology must align with the technological applicability of the shaft kiln system, and the production data should be applied only to cement plants with similar production environments and capacities.

## Review details
Inventory: The internal review was done by several iteration steps concerning raw data validation, raw data documentation, representativity, completeness and consistency of modelling with regard to ISO 14040 and 14044.

## Data sources
- Dan Hu, Zhen Guo, Zhen Wang, & Qiang Xiao. (2015). Metabolism analysis and eco-environmental impact assessment of two typical cement production systems in Chinese enterprises. Ecological Informatics 26, 70–77.
