# Municicpal sludge treatment and disposal;dry sludge;composting

Dataset: ILCD process, Unit process, single operation
Geography: CN
Classification: Unit processes / End-of-life treatment / Waste water treatment
Functional unit: One ton of sludge on a dry basis (1 t-DS) is defined as the functional unit.
Generated by: Jin Sitian, 2331276@tongji.edu.cn
Owner: Tiangong LCI Data Working Group
Review: Dependent internal review by Tiangong LCI Data Working Group
Amounts: no units in this file; such an amount is in the reference unit of its flow, which a separate flow dataset defines
copyright: ['opt4ROkqig']
licenseType: Free of charge for all users and uses

## General comment
Several typical sludge treatment facilities in China, representing anaerobic digestion, composting, co-combustion, thermal drying-incineration, and cement production, respectively, are selected to carry out the inventory. Data are mainly taken from the site-specific measurement, either by field survey or by operation report. Sludge characteristics are based on the average values of the sites investigated.

## Technology and included processes
According to the operating data, around 57% organic matter degrades, and the sludge moisture after composting is approximately 40%. Total N and total P after composting is 2.01% and 1.27% of digested matter on a dry basis, respectively.

## Technical purpose
The technical use of the data set describes the process of municipal sludge treatment and disposal via composting. This process is relevant for waste management facilities that specialize in converting dry sludge into compost, which can subsequently be used as a fertilizer or soil amendment in various agricultural and landscaping applications.

## Reference product
- Sludge: 1000; input; estimated
  a dry basis (1 t-DS)

## Inputs
- Electricity: 275.4; measured
- Diesel: 11.3; measured
- Straw: 455; measured

## Outputs
- Compost: 1700; measured

## Use advice
When using this data set, users should ensure that they account for the specific composting process parameters and emissions involved. It is imperative that users consider relevant local regulations and standards for composting and the subsequent use of the compost produced. The functional unit is one ton of dry sludge (1 t-DS); this should be the reference for any assessments and comparisons. Any potential environmental benefits or burdens from the use of compost as opposed to disposal without resource recovery should also be taken into account.

## Review details
Inventory: The internal review was done by several iteration steps concerning raw data validation, raw data documentation, representativity, completeness and consistency of modelling with regard to ISO 14040 and 14044.

## Data sources
- Dong, J., Chi, Y., Tang, Y., Wang, F. & Huang, Q. Combined Life Cycle Environmental and Exergetic Assessment of Four Typical Sewage Sludge Treatment Techniques in China. Energy Fuels 28, 2114–2122 (2014).
