# North China (Gaomi) Corn Production ; Agricultural Cultivation

Dataset: ILCD process, Unit process, single operation
Geography: WF-SD-CN
Reference year: 2016
Valid until: 2017
Classification: Unit processes / Materials production / Agricultural production means
Functional unit: 1t
LCI method principle: Attributional
LCI method approaches: Consequential
Generated by: Haoran Zhang, hrzhang@whu.edu.cn
Owner: Tiangong LCI Data Working Group
Review: Dependent internal review by Tiangong LCI Data Working Group
Amounts: no units in this file; such an amount is in the reference unit of its flow, which a separate flow dataset defines
copyright: false
licenseType: Free of charge for all users and uses

## General comment
This study was conducted in Gaomi City, Shandong Province, which is located in Huang-Huai-hai Plain, the core area of winter wheat-summer maize rotation in China. The research was carried out in the form of a questionnaire survey, and a total of 56 farmers who operated wheat-maize rotation were interviewed. The contents of the questionnaire include input and output in the process of food production: (1) food output; (2) agricultural inputs such as seeds, fertilizers, herbicides, fungicides and insecticides; (3) Energy consumption of agricultural machinery, including fuel consumption in the process of sowing, farming and grain transportation; (4) irrigation energy consumption, etc

## Geography
high density

## Technology and included processes
The study calculated the greenhouse gas emissions from the cradle to the door of the grain production process. The boundary of the accounting system includes: greenhouse gas emissions from agricultural inputs (such as seeds, agricultural medicines, fertilizers, etc.); Greenhouse gas emissions from the use of agricultural machinery (tillage, sowing, harvesting, food transportation, etc.); Field N2O emission caused by fertilizer application; Irrigation energy consumption, greenhouse gas emissions, etc. (Figure 1)

## Technical purpose
The data set represents the processes involved in the high-density cultivation of corn in Gaomi, North China. It is intended for application in life cycle assessments (LCAs) of corn production, specifically focusing on calculating the carbon footprint of corn produced per unit area and per unit yield.

## Reference product
- maize grain: 9962.95; measured

## Inputs
All rows: measured
- nitrogen: 205.03
- phosphorus: 160.97
- potassium: 160.97
- Bactericide: 5.57
- Rice Seeds: 3.34
- Insecticide: 1.7
- Diesel: 113.35
- Electricity: 2343.74

## Deviations from the LCI method approaches
The accounting system boundary includes: greenhouse gas emissions from agricultural input (such as seeds, pesticides, fertilizers, etc.); greenhouse gas emissions from the use of agricultural machinery during operations (tilling, sowing, harvesting, and grain transportation); greenhouse gas emissions from N2O during fertilizer application; greenhouse gas emissions from irrigation energy consumption, etc.

## Data selection and combination
Because this study is based on survey data, it is impossible to obtain the baseline condition of soil carbon from the farmers. Due to different management methods of different farmers, the baseline condition of their soil carbon is different, so the change in soil carbon has not been accounted for. The functional unit chosen in this study is the carbon footprint per unit area and per unit yield.

## Data treatment and extrapolations
Greenhouse gas emission accounting uses the methodology recommended in the '2006 IPCC National Greenhouse Gas Inventory Guidelines' and follows the international standard 'ISO/DIS 14067'.

## Sampling procedure
The questionnaire includes inputs and outputs during the grain production process: (1) grain yield; (2) agricultural input such as seeds, fertilizers, herbicides, fungicides, and insecticides; (3) energy consumption of agricultural machinery, including fuel consumption for processes like sowing, ploughing, and grain transportation; (4) irrigation energy consumption.

## Use advice
Users should utilize the data set within the specified boundaries of the LCA, which include greenhouse gas emissions from agricultural inputs, machinery use, N2O emissions from fertilizer application, and irrigation energy consumption. It is important for users to note that due to the variability in soil carbon baselines among farms, soil carbon changes are not accounted for in this data. Greenhouse gas emission calculations should be based on guidelines from the '2006 IPCC National Greenhouse Gas Inventory' and 'ISO/DIS 14067'. When deploying this data, users must consider these limitations and uncertainties, and if possible, supplement with region-specific data to improve the accuracy of the LCA results.

## Review details
Inventory: The internal review was done by several iteration steps concerning raw data validation, raw data documentation, representativity, completeness and consistency of modelling with regard to ISO 14040 and 14044.

## Data sources
- 朱永昶,李玉娥,姜德锋等.基于生命周期评估的冬小麦-夏玉米种植系统碳足迹核算——以山东省高密地区为例[J].农业资源与环境学报,2017,34(05):473-482.
