# Electricity production ; Thermal power ; Henan

Dataset: ILCD process, Unit process, single operation
Geography: HEN-CN
Reference year: 2019
Classification: Unit processes / Energy carriers and technologies / Electricity
Generated by: Ruoxi Xiong, xiongrx0126@163.com
Owner: Tiangong LCI Data Working Group
Review: Dependent internal review by Tiangong LCI Data Working Group
Amounts: no units in this file; such an amount is in the reference unit of its flow, which a separate flow dataset defines
copyright: false
licenseType: Free of charge for all users and uses

## General comment
Thermal power generation includes seventeen fossil fuels such as raw coal, washed coal, oil and natural gas. The process only considers the direct power generation process, not the upstream raw material extraction and processing and the downstream power consumption

## Time period
Calculated based on data from the 2019 Energy Statistics Yearbook

## Technical purpose
This data set describes the use of various fossil fuels, including raw coal, washed coal, oil, and natural gas, specifically for thermal power generation in Henan province. The utilization is restricted to direct electricity generation processes within the thermal power plants, and does not extend to the mining and processing of the aforementioned raw materials or to the end use of generated electricity.

## Reference product
- electricity for thermal power: 3.6; calculated

## Inputs
All rows: calculated
- Raw coal: 0.389693
- Other Washed Coal: 0.00779244
- Gangue, in ground: 0.00808067
- Coke oven gas: 0.004942
- blast furnace gas: 0.039495
- Converter gas: 0.000584
- Diesel: 6.031e-5
- fuel oil, unspecified: 7.83e-6
- Petroleum Coke: 0.000168
- refinery gas: 3.446e-5
- natural gas: 0.001555

## Outputs
- carbon dioxide (fossil): 0.770836; calculated
- sulfur dioxide: 0.000134019; calculated
- Nitrogen oxides: 0.00021242; calculated
- particles (> PM10): 2.64002e-5; calculated

## Data treatment and extrapolations
For the accounting method, please refer to the "Enterprise Greenhouse Gas Emissions Accounting Methods and Reporting Guidelines for Power Generation Facilities". Different forms of power generation and fuel consumption come from Chapter 3 (Energy Production) and Chapter 6 (Regional Energy Balance Sheet) in the "China Energy Statistical Yearbook 2020". The fuel parameters such as low calorific value and carbon content per unit calorific value used to calculate the carbon dioxide emission factor come from the "2019 China Regional Power Grid Carbon Dioxide Baseline Emission Factor Calculation Instructions OM" and the "Enterprise Greenhouse Gas Emission Accounting Method and Reporting Guide for Power Generation Facilities" 》

## Use advice
When utilizing this data set for Life Cycle Assessment, please consider the data as only applicable to the direct power generation phase in thermal power plants. Exclude upstream phases such as fuel extraction and processing, and downstream phases including electricity use. For greenhouse gas emission accounting, adhere to the methodologies outlined in the 'Enterprise Greenhouse Gas Emissions Accounting Methods and Reporting Guidelines for Power Generation Facilities', using the specific parameters and statistics provided for the year 2019 from the 'China Energy Statistical Yearbook 2020' and other specified references.

## Review details
Inventory: The internal review was done by several iteration steps concerning raw data validation, raw data documentation, representativity, completeness and consistency of modelling with regard to ISO 14040 and 14044.

## Data sources
- 熊若熙. 中国电力生产和消费二氧化碳与污染物排放因子核算. (清华大学, 2023).
