# Sludge treatment and disposal;co-incineration

Dataset: ILCD process, Unit process, single operation
Geography: CN
Classification: Unit processes / End-of-life treatment / Waste water treatment
Functional unit: The functional unit used for GHGs in this LCA is one dry ton (DT) of sludge.
Generated by: Jin Sitian, 2331276@tongji.edu.cn
Owner: Tiangong LCI Data Working Group
Review: Dependent internal review by Tiangong LCI Data Working Group
Amounts: no units in this file; such an amount is in the reference unit of its flow, which a separate flow dataset defines
copyright: ['opt4ROkqig']
licenseType: Free of charge for all users and uses

## General comment
The main data sources used in our study are as follows: 1) Energy consumption and material inputs are obtained from investigations in Tai Lake Watershed; 2) The energy use emission factor is obtained from our own calculation, IPCC, and the literature.3) The fugitive emissions during landfilling, incineration, and composting are mainly determined by the model given in the other study as well as by the IPCC factors (2006), except for the CH4 emission in landfilling, which is obtained from study.4) Data from theoretical calculations (see Incineration section).

## Geography
Tai Lake Watershed

## Technology and included processes
The kiln temperature is assumed to be 1000 °C during combustion in S2, S3, and S4 and is 1400 °C in S5. Kiln efficiency is assumed to be 75%.

## Technical purpose
The sludge treatment and disposal process described in this dataset is specifically designed for municipal sludge management within the Tai Lake Watershed. The co-incineration of dry sludge occurs in a unit operation setting, indicating that this process is part of a larger treatment facility. This industrial process is primarily utilized for the reduction of sludge volume and the mitigation of its environmental impact, particularly focusing on greenhouse gas emissions, measured per one dry ton (DT) of sludge.

## Reference product
- Sludge: 1000; input; estimated
  one dry ton (DT) of sludge

## Inputs
- Electricity: 399.6; measured
- hard coal: 8049; measured
  coal as fuel

## Use advice
When utilizing this dataset for Life Cycle Assessment purposes, users must consider the specific context of the sludge treatment and disposal for municipal applications within the Tai Lake Watershed. The functional unit for assessing greenhouse gas emissions is one dry ton of sludge. Users should account for the regional parameters and include appropriate emissions factors relevant to co-incineration. Caution must be exercised to ensure that the data reflects the technology and practices specific to the locality concerned, and to follow methodological consistency for GHG emissions accounting.

## Review details
Inventory: The internal review was done by several iteration steps concerning raw data validation, raw data documentation, representativity, completeness and consistency of modelling with regard to ISO 14040 and 14044.

## Data sources
- Liu, B., Wei, Q., Zhang, B. & Bi, J. Life cycle GHG emissions of sewage sludge treatment and disposal options in Tai Lake Watershed, China. Science of The Total Environment 447, 361–369 (2013).
