# Milk production ; Feed and organic fertilizer transportation ; Non-integrated maize silage planting and dairy cow breeding system (non-IPBS)

Dataset: ILCD process, Unit process, single operation
Geography: QD-SD-CN
Reference year: 2016
Classification: Unit processes / Transport services / Road
Functional unit: The 1t FPCM corrected for protein and fat content was selected as the evaluation unit
Generated by: Rui Yang, 1632707028@qq.com
Owner: Tiangong LCI Data Working Group
Review: Dependent internal review by Tiangong LCI Data Working Group
Amounts: no units in this file; such an amount is in the reference unit of its flow, which a separate flow dataset defines
copyright: false
licenseType: Free of charge for all users and uses

## General comment
In the transport of feed and organic fertilizer, the difference between the two models lies in the transport of silage corn and organic fertilizer. In non-IPBS, silage corn is all purchased, assuming that the average transportation distance is 30km, and organic fertilizer is all sold to fruit and vegetable farmers, with an average transportation distance of 20km. The transportation distance of the two is 1km. Different transportation distances will lead to different energy consumption, and thus different impacts on the environment. Relevant studies have shown that long distance transport of organic fertilizers will increase the loss of N and P in feces and increase the risk of eutrophication in water [11]. According to the investigation, the fertilizer value of liquid fertilizer is low, and vegetable and fruit farmers are reluctant to buy liquid fertilizer. The liquid fertilizer of the two modes is sprayed by the farm car to the surrounding farmland or farm farmland, and the transportation distance is 1km. The other feed transportation distance of the two modes is the same, and the concentrated feed, soybean meal, corn kernel and wheat bran are from the local market, and the transportation distance is the same About 50km. Cottonseed from Gansu Province, the transport distance of about 1830km. Leymus chinensis from Heilongjiang Province, the transport distance of about 1720km. Oats and alfalfa come from the United States and travel a distance of about 18,000 km

## Geography
A questionnaire survey was conducted on dairy farms in Qingdao, Shandong Province from July to August 2020.

## Time period
From 2016, Shandong began to implement the silage corn planting subsidy policy, is one of the earliest provinces to implement the subsidy policy, the subsidy standard is 20~50 yuan /t. In 2019, Shandong Province silage corn planting area reached 14,100 hm2, accounting for 7.3% of the country.

## Technology and included processes
In the study area, there are mainly two milk production modes :IPBS and non-IPBS. In non-IPBS, the farms only have feeding links and manure treatment links, all the feed is purchased, and the manure pile fertilizer is made into organic fertilizer and sold to fruit and vegetable farmers. In IPBS, the silage corn planting process is increased in the farm, organic fertilizer and liquid fertilizer are mainly applied to the farm field, and the remaining part is sold to fruit farmers and vegetable farmers, etc. The differences between the two models are as follows :1) the sources of silage corn in the farm are different, resulting in different feed transportation distances and feed costs; 2) The use of organic fertilizer and liquid fertilizer is different, and the transportation distance is different. A total of 109 dairy farms were investigated in this study, and 83 valid questionnaires were obtained after excluding non-conforming questionnaires, among which 38 were non-IPBS and 45 were IPBS.

## Technical purpose
The non-Integrated Planting and Breeding System (non-IPBS) for milk production is an agricultural process where dairy farming and maize silage planting are separate operations. In this system, feed is sourced externally with silage corn transported over average distances of 30km. The produced organic fertilizer is sold to fruit and vegetable farmers, requiring an average transportation of 20km. Contrastingly, in IPBS systems, feed is produced on the farm and organic fertilizers are primarily used on-site, with surplus sold externally. The different models affect the transportation distances and thus feeding costs, as well as the management and utilization routes for organic and liquid fertilizers, influencing environmental impacts through energy consumption and potential nutrient loss.

## Reference product
- milk: 1000; estimated
  作为参考定量，非实际输出

## Inputs
All rows: measured
- feed: 11.8
  Concentrated feed (non-IPBS mode)
- maize grain: 5.8
  Corn kernels (non-IPBS mode)
- bean pulp: 2.7
  Soybean meal (non-IPBS mode)
- wheat bran: 2.2
  Wheat Bran (non-IPBS mode)
- maize grain: 30.9
  Purchased silage corn (non-IPBS mode)
- alfalfa: 2034
  Alfalfa (non-IPBS mode)
- oat: 2232
  Oats (non-IPBS mode)
- chinese wildrye: 524.6
  Leymus chinensis (non-IPBS mode)
- cottonseed: 71.4
  Cottonseed (non-IPBS mode)
- organic fertilizer: 15
  Organic fertilizer for external sale (non-IPBS mode)
- Fertilizer: 10.7
  Liquid fertilizer (non-IPBS mode)

## Data treatment and extrapolations
The values in the table are the total input and output of each farm evenly distributed to FPCM per ton, and then the average value of each farm is taken. All input-output list data are calculated according to this method. The value in "()" is the average input per hectare, for the convenience of comparison with relevant studies; "a" Because the mechanical operation of farm tillage is mainly substitute tillage operation, the farmer is not clear about the diesel consumption in this link, and this data is based on relevant research [20]. "b" This value is the output of the process and is ultimately used entirely inside the system.

## Sampling procedure
研究地区主要有 2 种牛奶生产模式:IPBS 和 non-IPBS,具体见图 1.non-IPBS 中,养殖场只有饲养 环节和粪污处理环节,饲料全部来源于购买,粪便堆 肥制成有机肥后全销售给果农和菜农.IPBS 中,养殖 场增加青贮玉米种植环节,有机肥、液体肥主要施用 于场内农田,剩余部分销售给果农和菜农等.2 种模 式的区别:1)养殖场青贮玉米的来源不同,导致饲料 运输距离和饲料成本不同;2)有机肥、液体肥的利用 途径不同,运输距离不同.本研究共调研奶牛场 109 家,剔除不符合研究问卷后,得 83 份有效问卷,其中 non-IPBS 为 38 家,IPBS 为 45 家.

## Use advice
When using data from the non-IPBS system for Life Cycle Assessment (LCA), it is important to account for the feed and fertilizer transport distances as they significantly impact energy consumption and environmental effects. Modeling should consider the outsourced feed transportation (30km for silage corn) and the sale of organic fertilizer to local farmers (20km on average). Additionally, attention should be paid to the impact of long-distance transportation of organic fertilizers on N and P loss, which may increase the risk of water eutrophication. Data on mechanical operations for farm tillage not known to farmers can be referenced from related studies. The unit of measurement for data comparison and calculation should be the functional unit of 1t FPCM, corrected for protein and fat content.

## Review details
Inventory: The internal review was done by several iteration steps concerning raw data validation, raw data documentation, representativity, completeness and consistency of modelling with regard to ISO 14040 and 14044.

## Data sources
- 黄显雷, 师博扬, 张英楠, 龙昭宇, & 尹昌斌. 基于生命周期视角的种养一体化奶牛场环境经济效益评估. 中国环境科学 41, 3944–3955 (2021).
