# Soil remediation ; ex situ remediation ; soil leaching ; soil column leaching ; Humic Acid foam leaching

Dataset: ILCD process, Unit process, single operation
Geography: CN
Reference year: 2023
Classification: Other Services / Repair and maintenance
Generated by: Huang Yue, huangyue@caep.org.cn
Owner: Tiangong LCI Data Working Group
Review: Dependent internal review by Tiangong LCI Data Working Group
Amounts: no units in this file; such an amount is in the reference unit of its flow, which a separate flow dataset defines
copyright: false
licenseType: Free of charge for all users and uses

## General comment
Remediated soil columns obtained by drenching contaminated soil columns with muriatic acid foam

## Technical purpose
This industrial process is employed for ex situ soil remediation, typically utilizing soil column leaching techniques. Humic acid foam, here indicated as muriatic acid foam which is likely an error (as muriatic acid refers to hydrochloric acid), is used to treat contaminated soil columns, resulting in decontaminated soil suitable for environmental restoration or construction purposes.

## Reference product
- Remediated soil columns: 0.0008

## Inputs
- Humic Acid: 0.00146
- Nitrogen: 0.0144
- Activated Carbon: 0.03484
- Methanol: 0.0002
- Water (evapotranspiration): 0.00545
- Electricity: 0.36
- Contaminated soil columns: 0.0008

## Outputs
- quartz sand: 0.08
- polycyclic aromatic hydrocarbons: 0.0344, 0.00036 (2 entries)

## Use advice
Users of this dataset should note the importance of accurately identifying the chemical used for leaching, as 'muriatic acid foam' seems to be a mistranslation or misidentification. Typically, humic acid is used for such processes, not muriatic acid (hydrochloric acid). Ensure that the inputs and outputs listed in the dataset accurately reflect the materials and energy used in the actual process. Adjustments should be made to account for variations in operational conditions, such as differences in soil composition, contamination levels, and treatment efficacy.

## Review details
Inventory: The internal review was done by several iteration steps concerning raw data validation, raw data documentation, representativity, completeness and consistency of modelling with regard to ISO 14040 and 14044.

## Data sources
- 张雅鑫 et al. 基于生命周期评价的焦化污染土壤 淋洗技术环境影响研究. 安全、健康和环境 23, (2023).
