# Modules assembly

Dataset: ILCD process, Unit process, single operation
Geography: CN
Reference year: 2014
Classification: Systems / Other machines
Functional unit: The functional unit selected for this paper is a 1 kWp
LCI method principle: Attributional
LCI method approaches: Allocation
Generated by: Jinfeng Yang, yjfzfshn@163.com
Owner: Tiangong LCI Data Working Group
Review: Dependent internal review by Tiangong LCI Data Working Group
Amounts: no units in this file; such an amount is in the reference unit of its flow, which a separate flow dataset defines
copyright: false
licenseType: Free of charge for all users and uses

## General comment
Multi-Si

## Geography
Life cycle assessment of mono-Si and multi-Si photovoltaic systems produced in China

## Time period
Available online

## Technology and included processes
Monolithic Soldering - String Soldering - Lamination Stacking - Laminating - Framing - Cleaning - Electrical testing - Packaging and warehousin

## Technical purpose
The industrial process described pertains to the production of battery modules for photovoltaic systems with an efficiency of 13.2%. This includes various stages such as wire soldering, string soldering, lamination stacking, laminating, framing, cleaning, electrical performance testing, and packaging for storage. The resulting monocrystalline or multi-crystalline silicon solar panels are intended for use in solar energy systems which are capable of converting sunlight to electricity. These panels are suitable for deployment in a wide range of solar applications such as residential, commercial, and utility-scale solar energy projects.

## Reference product
- Solar Module: 1; article inperiodical
  solar panels

## Inputs
All rows: article inperiodical
- Multi-Si solar cell: 60
  Cell
- aluminium: 4.2
  aluminum
- Glass: 18
- Ethylene-vinyl acetate copolymer: 1.6
  EVA
- TPT film: 0.78
  backplane
- Cardboard: 1.75
  cardboard
- electricity: 68.4
  Power consumption

## Outputs
All rows: article inperiodical
- carbon dioxide: 56
  CO2
- carbon monoxide: 0.1
- methane: 0.12
  Methane
- Nitrogen oxides: 0.24
- sulfur dioxide: 0.3
- Dust (unspecified, from stack): 0.31
  dust
- Biochemical Oxygen Demand: 0.08
  biological oxygen demand
- chemical oxygen demand: 0.1
  Cod
- dissolved organic carbon: 0.03
  DOC
- total organic carbon: 0.03
  TOC

## Deviations from the LCI method approaches
The objective of this paper is to conduct a life cycle assessment of monocrystalline and multi-Si photovoltaic (PV) systems produced in China, and to analyze the methods of disposal and the environmental impacts of different methods of disposal.

## Use advice
When using the life cycle assessment (LCA) data of the described process for mono-Si and multi-Si photovoltaic systems produced in China, it is essential to ensure the selection of the appropriate functional unit (1 kWp in this case). Users should incorporate this data focusing on the specified efficiency and the various stages of the module production when modeling environmental impacts. Attention should be paid to the end-of-life scenarios, including disposal and recycling aspects, to fully capture the ecological footprint. It is recommended to apply this LCA data in accordance with relevant regional regulations and standards to maintain accuracy and relevance.

## Review details
Inventory: The internal review was done by several iteration steps concerning raw data validation, raw data documentation, representativity, completeness and consistency of modelling with regard to ISO 14040 and 14044.

## Data sources
- 李鹞 & 于随然. 中国光伏系统的生命周期评价. 环境工程 32, 119–124 (2014).
