# Solar grade multi-Si production ; Solar grade multi-Si ; Improved Siemens process

Dataset: ILCD process, Unit process, single operation
Geography: CN
Reference year: 2013
Classification: Unit processes / Energy carriers and technologies / Other non-renewable fuels
Functional unit: 1 kg solar grade multi-Si
LCI method principle: Attributional
LCI method approaches: Allocation
Generated by: Jinfeng Yang, yjfzfshn@163.com
Owner: Tiangong LCI Data Working Group
Review: Dependent internal review by Tiangong LCI Data Working Group
Amounts: no units in this file; such an amount is in the reference unit of its flow, which a separate flow dataset defines
copyright: false
licenseType: Free of charge for all users and uses

## General comment
Multi-Si

## Time period
Available online

## Technology and included processes
Improved Siemens Method

## Technical purpose
The high-purity polysilicon produced by the improved Siemens process has a purity level of 99.9999% and is specifically designed for applications in the solar energy industry. It is utilized as a primary material in the manufacturing of solar photovoltaic (PV) cells and modules.

## Reference product
- Solar grade multi-Si: 1; measured
  Solar grade polysilicon

## Inputs
All rows: measured
- Metallurgical silicon: 1.5
  Industrial silicon
- Electricity: 684
  Power
- Cooling water: 454.2
- Process Water: 17
  process water
- process steam: 150
  steam
- Hydrogen: 0.131
  hydrogen
- chlorine: 2.24
  Chlorine
- Sodium hydroxide: 44
  NaOH

## Outputs
All rows: measured
- hydrogen chloride: 0.09
  HCl
- Silicon tetrachloride: 0.8
- chemical oxygen demand: 0.00461
  COD
- chloride: 2.44
- fluoride: 5e-5
  Fluoride
- Suspended solids, unspecified: 0.00518
  suspended solids
- industrial waste (unspecified): 0.23
  Solid Waste

## Deviations from the LCI method approaches
In this paper, solar-grade polysilicon is taken as the research object, and the value of resource, energy input and environment emission of solar-grade polysilicon life cycle process at domestic and general production level is calculated quantitatively by using LCA evaluation method

## Data selection and combination
Direct reference to representative literature data

## Use advice
When using this LCA data set, users should consider the specific grade of polysilicon and its associated production process when comparing it with other types of polysilicon or alternative materials. Due attention should be given to the geographic scope as the data represents domestic general production levels. If applying this data to global scenarios, adjustments may be required. Recycling and end-of-life scenarios for solar PV materials should be considered when assessing the complete life cycle.

## Review details
Inventory: The internal review was done by several iteration steps concerning raw data validation, raw data documentation, representativity, completeness and consistency of modelling with regard to ISO 14040 and 14044.

## Data sources
- 何洋. 太阳能级多晶硅的生命周期评价. (西南交通大学, 2013).
