# Sintering ; Ceramic interior tile ; Feldspar, quartz, porcelain clay, etc. ; Roller kiln (natural gas - primary firing) ; All sizes; NESPS2 / 烧成 ; 陶瓷内墙砖 ; 长石、石英、瓷土等 ; 辊道窑（天然气-一次烧成） ; 所有规模 ; 全国第二次污染普查数据

Dataset: ILCD process, Unit process, single operation
Geography: CN
Reference year: 2019
Classification: Reference Parameters / Materials production / Glass and ceramics
Generated by: The data was created by the Office of the Second National Pollution Source Census of the Ministry of Ecology and Environment, and the data was organized by the TianGong Plan team for ILCD format / 生态环境部第二次全国污染源普查工作办公室创建数据，天工计划团队常慧敏整理数据为ILCD格式
Owner: Tiangong LCI Data Working Group / 天工LCI数据工作小组
Review: Dependent internal review by Tiangong LCI Data Working Group / 天工LCI数据工作小组
Amounts: no units in this file; such an amount is in the reference unit of its flow, which a separate flow dataset defines
copyright: false
licenseType: Free of charge for all users and uses

## General comment
the Technical of end-of-pipe management technology for pollution Nitrogen oxidesisDirect discharge，The formula for calculating the actual operation rate (k-value) of the end-of-pipe treatment facility is k = 1

## Technical purpose
该烧成工艺用于生产陶瓷内墙砖，使用如长石、石英、瓷土等材料，在自然气作为燃料的辊道窑中进行一次烧成。此过程适用于所有规模的砖块，并采用了多种尾气治理技术来控制颗粒物(PM2.5和PM10)、二氧化硫(SO2)和氮氧化物(NOx)等污染物。包括使用布袋过滤器、湿式静电沉降、喷雾塔、石灰/石膏法、纳碱法和选择性非催化还原(SNCR)技术。文中还提到了对某些污染物的直接排放。

## Reference product
- bauxite: 1; calculated
  源文件中描述为为陶瓷内墙砖，此处对其进行了匹配工作，将其匹配到LCAflow库里面相最符合的流

## Outputs
All rows: calculated
- particles (PM2.5 - PM10): 0.51
  the Technical of end-of-pipe management technology for pollution particles (PM2.5 - PM10)isBag filter，Its Technical efficiency of end-of-pipe management99
  污染物指标颗粒物的末端治理技术是袋式除尘，其效率为99，末端治理设施实际运行率（k值）计算公式为k=治理设施正常运行小时数(小时/年)/企业正常运转小时数（小时/年）。原文件中描述污染物类别为废气，污染物指标为颗粒物，此处对其进行了匹配工作，将其匹配到LCAflow库里面相最符合的流
- particles (PM2.5 - PM10): 7.65
  the Technical of end-of-pipe management technology for pollution particles (PM2.5 - PM10)isOthers (wet electrostatic precipitation)，Its Technical efficiency of end-of-pipe management85，The formula for calculating the actual operation rate (k-value) of the end-of-pipe treatment facility is /
  污染物指标颗粒物的末端治理技术是其他（湿式电除尘），其效率为85，末端治理设施实际运行率（k值）计算公式为k=治理设施正常运行小时数(小时/年)/企业正常运转小时数（小时/年）。原文件中描述污染物类别为废气，污染物指标为颗粒物，此处对其进行了匹配工作，将其匹配到LCAflow库里面相最符合的流
- particles (PM2.5 - PM10): 20.4
  the Technical of end-of-pipe management technology for pollution particles (PM2.5 - PM10)isSpray tower，Its Technical efficiency of end-of-pipe management60，The formula for calculating the actual operation rate (k-value) of the end-of-pipe treatment facility is /
  污染物指标颗粒物的末端治理技术是喷淋塔，其效率为60，末端治理设施实际运行率（k值）计算公式为k=治理设施正常运行小时数(小时/年)/企业正常运转小时数（小时/年）。原文件中描述污染物类别为废气，污染物指标为颗粒物，此处对其进行了匹配工作，将其匹配到LCAflow库里面相最符合的流
- sulfur dioxide: 25.5
  the Technical of end-of-pipe management technology for pollution sulfur dioxideisOthers (sodium alkali method)，Its Technical efficiency of end-of-pipe management70
  污染物指标二氧化硫的末端治理技术是其他（钠碱法），其效率为70，末端治理设施实际运行率（k值）计算公式为k=治理设施正常运行小时数(小时/年)/企业正常运转小时数（小时/年）。原文件中描述污染物类别为废气，污染物指标为二氧化硫，此处对其进行了匹配工作，将其匹配到LCAflow库里面相最符合的流
- sulfur dioxide: 34
  the Technical of end-of-pipe management technology for pollution sulfur dioxideisLime/gypsum method，Its Technical efficiency of end-of-pipe management60，The formula for calculating the actual operation rate (k-value) of the end-of-pipe treatment facility is /
  污染物指标二氧化硫的末端治理技术是石灰/石膏法，其效率为60，末端治理设施实际运行率（k值）计算公式为k=治理设施正常运行小时数(小时/年)/企业正常运转小时数（小时/年）。原文件中描述污染物类别为废气，污染物指标为二氧化硫，此处对其进行了匹配工作，将其匹配到LCAflow库里面相最符合的流
- particles (PM2.5 - PM10): 51
  the Technical of end-of-pipe management technology for pollution particles (PM2.5 - PM10)isDirect discharge
  污染物指标颗粒物的末端治理技术是直排。原文件中描述污染物类别为废气，污染物指标为颗粒物，此处对其进行了匹配工作，将其匹配到LCAflow库里面相最符合的流
- Nitrogen oxides: 76.5
  the Technical of end-of-pipe management technology for pollution Nitrogen oxidesisSNCR，Its Technical efficiency of end-of-pipe management50，The formula for calculating the actual operation rate (k-value) of the end-of-pipe treatment facility is /
  污染物指标氮氧化物的末端治理技术是选择性非催化还原法（SNCR），其效率为50，末端治理设施实际运行率（k值）计算公式为k=治理设施正常运行小时数(小时/年)/企业正常运转小时数（小时/年）。原文件中描述污染物类别为废气，污染物指标为氮氧化物，此处对其进行了匹配工作，将其匹配到LCAflow库里面相最符合的流
- sulfur dioxide: 85
  the Technical of end-of-pipe management technology for pollution sulfur dioxideisDirect discharge，The formula for calculating the actual operation rate (k-value) of the end-of-pipe treatment facility is /
  污染物指标二氧化硫的末端治理技术是直排。原文件中描述污染物类别为废气，污染物指标为二氧化硫，此处对其进行了匹配工作，将其匹配到LCAflow库里面相最符合的流
- Exhaust gas: 850000
  the treatment technology for the pollution of Exhaust gasdidn't offered，The formula for calculating the actual operation rate (k-value) of the end-of-pipe treatment facility is /
  污染物指标废气量的末端治理技术未说明。原文件中描述污染物类别为废气，污染物指标为废气量，此处对其进行了匹配工作，将其匹配到LCAflow库里面相最符合的流
- Nitrogen oxides: 153
  the Technical of end-of-pipe management technology for pollution Nitrogen oxidesisDirect discharge，The formula for calculating the actual operation rate (k-value) of the end-of-pipe treatment facility is k = 1
  污染物指标氮氧化物的末端治理技术是直排。原文件中描述污染物类别为废气，污染物指标为氮氧化物，此处对其进行了匹配工作，将其匹配到LCAflow库里面相最符合的流

## Use advice
This dataset is derived from the Pollution Source Census Report and contains information on pollution emissions and related products. However, it does not include data on energy or chemical consumption, nor does it provide information on waste or co-product generation. When utilizing this dataset, please supplement the missing data based on actual conditions before use
该数据集来源于污染源普查报告，包含污染物排放及相关产品信息，但不包含能源或化学品消耗数据，也不提供废弃物或共生产物产生信息。在使用该数据集时，请根据实际情况补充缺失数据后再使用。

## Review details
Inventory: The internal review was done by several iteration steps concerning raw data validation, raw data documentation, representativity, completeness and consistency of modelling with regard to ISO 14040 and 14044.
清单： 内部审查通过几个迭代步骤完成，涉及原始数据验证、原始数据记录、代表性、完整性、与 ISO 14040 和 14044 有关的建模的一致性。

## Data sources
- 第二次全国污染源普查产排污核算系数手册（试用版）,二级代码30,三级代码307.0,四级代码3071文件，在完整版文件中第820页
