# Municipal sludge treatment and disposal;wet sludge moisture content 80%;450℃ pyrolysis

Dataset: ILCD process, Unit process, single operation
Geography: CN
Classification: Unit processes / End-of-life treatment / Wastewater treatment
Functional unit: 1 t of sludge is selected as the functional unit, the moisture content of wet sludge is 80%.
Generated by: Jin Sitian, 2331276@tongji.edu.cn
Owner: Tiangong LCI Data Working Group
Review: Dependent internal review by Tiangong LCI Data Working Group
Amounts: no units in this file; such an amount is in the reference unit of its flow, which a separate flow dataset defines
copyright: ['opt4ROkqig']
licenseType: Free of charge for all users and uses

## General comment
Through experiments, the relevant data of the sludge pyrolysis treatment process under different working conditions are collected and distributed, and the input and output of materials and energy in each process are quantified, and the environmental pollutant emissions are quantified.

## Technology and included processes
The rated power of the tube furnace in the pyrolysis link is 4 kW, the no-load power is 1.4 kW, nitrogen is introduced for 2~3 minutes before the reaction to ensure an oxygen-free environment, the nitrogen flow rate is 30 ml/min, the heating rate of the tube furnace is 80 °C/min, and the final temperature of pyrolysis is maintained for 10min.

## Technical purpose
This data set characterizes the process of municipal sludge treatment and disposal with a wet sludge moisture content of 80%. This process involves the pyrolysis of sludge at 450°C to stabilize and reduce the volume, and is typically utilized in waste management facilities. It represents a unit process for treating 1 tonne of municipal sludge.

## Reference product
- Sludge: 1000; input; estimated
  The moisture content of 1t of wet sludge is 80%

## Inputs
- Electricity: 1280.02; calculated
- nitrogen: 5.63; calculated

## Outputs
- carbon monoxide (biogenic): 13.72; calculated
  The original text does not distinguish between biogenic and fossil, and according to experts, it is biogenic here.
- carbon dioxide (biogenic): 7.84; calculated
  (same comment as for carbon monoxide (biogenic))
- Heat treatment oil: 90.22; calculated
- Semi-coke: 88.1; calculated

## Use advice
Users of this data set should consider the specific application of this process as it relates to municipal sludge with a moisture content of 80%. When modeling lifecycle impacts, take into account the energy consumption and emissions associated with the pyrolysis at 450°C. The data is representative for the given conditions and should not be extrapolated to sludge with different characteristics or treatment processes without proper adjustments.

## Review details
Inventory: The internal review was done by several iteration steps concerning raw data validation, raw data documentation, representativity, completeness and consistency of modelling with regard to ISO 14040 and 14044.

## Data sources
- 王久兵. 污泥热解反应机制及其能源化工艺的全生命周期评价研究[D].浙江工业大学,2017.
