# End-of-life LFP batteryAdvanced hydrometallurgy process

Dataset: ILCD process, Unit process, single operation
Geography: CN
Reference year: 2020
Classification: Unit processes / End-of-life treatment / Material recycling
Functional unit: using 1 kWh as the functionalunit
Generated by: Pengfei, pengfei24@email.ncu.edu.cn
Owner: Tiangong LCI Data Working Group
Review: Dependent internal review by Tiangong LCI Data Working Group
Amounts: no units in this file; such an amount is in the reference unit of its flow, which a separate flow dataset defines
copyright: false
licenseType: Free of charge for all users and uses

## General comment
Before adopting wet process for material recovery, the waste lithium iron phosphate batteries are safely discharged, disassembled, pyrolyzed, mechanically crushed, and sorted to get powdered lithium-containing waste. Lithium-containing material is added to leaching solvent for leaching, filtered and separated to get lithium-containing solution, added to the purification agent for reaction, filtered, concentrated, and under certain reaction conditions, added to the precipitation agent fully reacted to crystallization and precipitation, filtered, washed and dried to get battery-grade lithium carbonate.

## Technology and included processes
Leaching: During the leaching process, the solid-liquid ratio of the selected electrode materials for smelting and the leaching solution should be controlled within the appropriate range, and should be stirred evenly and reacted adequately.Impurity removal: The impurity removal process should be based on the premise of not introducing excess impurities, combined with precipitation and extraction methods to ensure that the impurity elements are reasonably removed, and reduce the loss of nickel, cobalt, manganese, lithium and other elements.Purification: Should be purified according to the characteristics of metal elements, select the appropriate extractant, under certain extraction conditions, after multiple extraction, to obtain a high-purity target metal solution, such as nickel, cobalt, manganese solution or lithium solution.Material synthesis: Material synthesis is the process of converting metal purification liquid into positive electrode materials, precursors and other battery materials. The products synthesized by the material should meet the national standards or industry standards of the relevant products, nickel diamond lithium manganese oxide should meet the requirements of YS/T798, nickel cobalt manganese hydroxide should meet the requirements of GB/T26300.

## Technical purpose
The advanced hydrometallurgy process described is specifically used for the recovery of materials from waste lithium iron phosphate (LFP) batteries. The end product is battery-grade lithium carbonate, which is a critical raw material for the manufacturing of new lithium iron phosphate batteries, as well as other lithium-based chemical products.

## Reference product
- EoL LFP battery: 3.6; input; software or database

## Inputs
All rows: software or database
- sodium hydroxide: 2.04
  Sodium hydroxide, production mix/EU-28
- Hydrogen peroxide (30%): 0.29
  Hydrogen peroxide production mix/DE
- Citric Acid: 14.38
  Citric acid，New process based on GREET/CN
- Sodium carbonate（95%）: 0.9
  Soda (Na2CO3)
- Electricity: 4.58
- natural gas,natural gas: 11.79

## Outputs
All rows: software or database
- Carbon dioxide (fossil): 0.16
  The original text does not distinguish between bio and fossil, and according to experts, it is fossil here
- aluminium: 0.8
- copper: 1.01
- iron: 0.92
- Lithium carbonate: 0.63
  Li2CO3

## Data selection and combination
The data come from multiple papers and are difficult to distinguish.

## Use advice
The life cycle assessment data pertaining to the advanced hydrometallurgy process for LFP batteries should be used carefully, considering the unique aspects of the recycling process. The functional unit for this data set is 1 kWh of battery capacity. Users need to ensure that comparisons or assessments are made on a similar basis and scale. Attention should be given to methodological choices, such as the allocation of environmental impacts between the recycled product and the original waste stream. It is important to note that the data come from multiple papers and may contain variability that could affect the outcome of the analysis.

## Review details
Inventory: The internal review was done by several iteration steps concerning raw data validation, raw data documentation, representativity, completeness and consistency of modelling with regard to ISO 14040 and 14044.

## Data sources
- Wang, Y. et al. Environmental impact assessment of second life and recycling for LiFePO4 power batteries in China. Journal of Environmental Management 314, 115083 (2022).
