# Electricity production ; Thermal power ; Chongqing

Dataset: ILCD process, Unit process, single operation
Geography: CQ-CN
Reference year: 2019
Classification: Unit processes / Energy carriers and technologies / Electricity
Generated by: Ruoxi Xiong, xiongrx0126@163.com
Owner: Tiangong LCI Data Working Group
Review: Dependent internal review by Tiangong LCI Data Working Group
Amounts: no units in this file; such an amount is in the reference unit of its flow, which a separate flow dataset defines
copyright: false
licenseType: Free of charge for all users and uses

## General comment
Thermal power generation includes seventeen fossil fuels such as raw coal, washed coal, oil and natural gas. The process only considers the direct power generation process, not the upstream raw material extraction and processing and the downstream power consumption

## Time period
Calculated based on data from the 2019 Energy Statistics Yearbook

## Technical purpose
This dataset represents the direct electricity generation process in a thermal power plant located in Chongqing, using a variety of seventeen fossil fuel sources such as raw coal, washed coal, oil, and natural gas. It is applicable for the assessment of thermal electricity generation facilities when considering only the direct generation process without accounting for upstream raw material extraction and processing or the downstream electricity consumption.

## Reference product
- electricity for thermal power: 3.6; calculated

## Inputs
All rows: calculated
- Raw coal: 0.37003
- Other Washed Coal: 0.00021627
- Gangue, in ground: 0.0154132
- Coke oven gas: 0.002776
- blast furnace gas: 0.09918
- Converter gas: 0.001964
- Diesel: 6.128e-5
- fuel oil, unspecified: 7.21e-6
- natural gas: 0.006705

## Outputs
- carbon dioxide (fossil): 0.796079; calculated
- sulfur dioxide: 0.000133331; calculated
- Nitrogen oxides: 0.000214871; calculated
- particles (> PM10): 2.7557e-5; calculated

## Data treatment and extrapolations
For the accounting method, please refer to the "Enterprise Greenhouse Gas Emissions Accounting Methods and Reporting Guidelines for Power Generation Facilities". Different forms of power generation and fuel consumption come from Chapter 3 (Energy Production) and Chapter 6 (Regional Energy Balance Sheet) in the "China Energy Statistical Yearbook 2020". The fuel parameters such as low calorific value and carbon content per unit calorific value used to calculate the carbon dioxide emission factor come from the "2019 China Regional Power Grid Carbon Dioxide Baseline Emission Factor Calculation Instructions OM" and the "Enterprise Greenhouse Gas Emission Accounting Method and Reporting Guide for Power Generation Facilities" 》

## Use advice
Users of this dataset should refer to the 'Enterprise Greenhouse Gas Emissions Accounting Methods and Reporting Guidelines for Power Generation Facilities' for the methodology of data calculation. The dataset is based on the 2019 Energy Statistics Yearbook data, specifically drawing from Chapter 3 (Energy Production) and Chapter 6 (Regional Energy Balance Sheet) of the 'China Energy Statistical Yearbook 2020' for various forms of electricity generation and fuel consumption statistics. Users are advised to use the calorific value and the carbon content per unit calorific value parameters from sources like the '2019 China Regional Power Grid Carbon Dioxide Baseline Emission Factor Calculation Instructions OM' and the related enterprise greenhouse gas reporting guidelines to calculate carbon dioxide emission factors. It is essential for users to apply this dataset within its defined scope, i.e., accounting only for direct emissions from power generation, excluding upstream and downstream processes.

## Review details
Inventory: The internal review was done by several iteration steps concerning raw data validation, raw data documentation, representativity, completeness and consistency of modelling with regard to ISO 14040 and 14044.

## Data sources
- 熊若熙. 中国电力生产和消费二氧化碳与污染物排放因子核算. (清华大学, 2023).
