# Aluminum ingot casting ; Primary aluminum ingot ; Liquid primary aluminum ; 2007

Dataset: ILCD process, Unit process, single operation
Geography: CN
Reference year: 2021
Classification: Unit processes / Materials production / Metals and semimetals
Generated by: Zimeng Cai, caizm6178@163.com
Owner: Tiangong LCI Data Working Group
Review: Dependent internal review by Tiangong LCI Data Working Group
Amounts: no units in this file; such an amount is in the reference unit of its flow, which a separate flow dataset defines
copyright: false
licenseType: Free of charge for all users and uses

## General comment
The primary aluminum ingot casting process described in this data set is used to produce aluminum ingots from liquid primary aluminum. These ingots are then typically used as a high-quality raw material in the production of various aluminum-based products, including components for the automotive industry, aerospace applications, construction materials, and electrical conductors.

## Time period
Date of publication

## Reference product
- aluminium, primary, ingot: 1000; missing unimportant

## Inputs
- aluminium, primary, liquid: 1024.9; missing unimportant

## Data selection and combination
The data in this study refers to the LCA data of PA, SA, electricity, and other background data. The PA data were obtained from statistical data sources, and the SA data were mainly obtained from the literatures. The background data were mainly derived from the Chinese localization LCA database CAS RCEES 2018, which was established by the Research Center for Eco-Environmental Sciences, Chinese Academy of Sciences and covers LCA data for energy, materials, transportation, waste management etc.

## Use advice
When using this data set for Life Cycle Assessment (LCA), ensure that you account for the specific year of publication (2007) as technology and efficiencies may have evolved since then. Users should also note that the PA data draw from statistical sources, while the SA data primarily come from literature. The background data originates from the Chinese localized LCA database – CAS RCEES 2018. It is recommended to check for consistency with other data sources and consider the relevance of the technological applicability of the data based on the specific characteristics of the region or system under study.

## Review details
Inventory: The internal review was done by several iteration steps concerning raw data validation, raw data documentation, representativity, completeness and consistency of modelling with regard to ISO 14040 and 14044.

## Data sources
- Ding, N., Liu, N., Lu, B. & Yang, J. Life cycle greenhouse gas emissions of aluminum based on regional industrial transfer in China. J. Ind. Ecol. 25, 1657–1672 (2021).
