# Aluminum Electrolysis Carbon Anode Production ; Carbon Anode ; Petroleum Coke ; 2015

Dataset: ILCD process, Unit process, single operation
Geography: CN
Reference year: 2021
Classification: Unit processes / Materials production / Non-energetic raw materials
Generated by: Zimeng Cai, caizm6178@163.com
Owner: Tiangong LCI Data Working Group
Review: Dependent internal review by Tiangong LCI Data Working Group
Amounts: no units in this file; such an amount is in the reference unit of its flow, which a separate flow dataset defines
copyright: false
licenseType: Free of charge for all users and uses

## General comment
The provided LCA data pertains to the production of carbon anodes made from petroleum coke, which are specifically used in aluminum electrolysis processes. These anodes are a crucial component for conducting electricity and facilitating the extraction of aluminum from its oxide during the manufacturing. This process is relevant for industries producing primary aluminum where such anodes are required for the electrolytic reduction.

## Time period
Date of publication

## Reference product
- anode, for metal electrolysis: 1000; software or database
  anode

## Inputs
All rows: software or database
- electricity, high voltage, aluminium industry: 748.8
  electricty
- heavy fuel oil: 65
  fuel oil
- coal tar: 214
  coal tar pitch
- Petroleum Coke: 1089
  petroleum coak
- coal gas: 1277

## Data selection and combination
The data in this study refers to the LCA data of PA, SA, electricity, and other background data. The PA data were obtained from statistical data sources, and the SA data were mainly obtained from the literatures. The background data were mainly derived from the Chinese localization LCA database CAS RCEES 2018, which was established by the Research Center for Eco-Environmental Sciences, Chinese Academy of Sciences and covers LCA data for energy, materials, transportation, waste management etc.

## Use advice
Users of this LCA data should take into account that the Production data of the carbon anodes is obtained from statistical sources and literature, ensuring relevance to the specific year indicated (2015). The background data is sourced from the CAS RCEES 2018 database, which is localized for the Chinese context. When applying this data in life cycle assessments or environmental impact analyses, users must consider the technological advancement and regional specificities for energy, materials, transportation, and waste management data from that timeframe and adjust for developments or changes in technology and practices in subsequent years.

## Review details
Inventory: The internal review was done by several iteration steps concerning raw data validation, raw data documentation, representativity, completeness and consistency of modelling with regard to ISO 14040 and 14044.

## Data sources
- Ding, N., Liu, N., Lu, B. & Yang, J. Life cycle greenhouse gas emissions of aluminum based on regional industrial transfer in China. J. Ind. Ecol. 25, 1657–1672 (2021).
