# Exploration potential analysis ; Marine source rock ; Organic geochemical analysis

Dataset: ILCD process, Unit process, single operation
Geography: SC-CN
Reference year: 1940
Classification: Unit processes / Other Services / Research and development
LCI method principle: Attributional
LCI method approaches: Consequential
Generated by: Shikang Kang, 908798159@qq.com
Owner: Tiangong LCI Data Working Group
Review: Dependent internal review by Tiangong LCI Data Working Group
Amounts: no units in this file; such an amount is in the reference unit of its flow, which a separate flow dataset defines
copyright: false
licenseType: Free of charge for all users and uses

## General comment
Eight outcrop sections are selected to systematically analyze the organic geochemistry of 8 sets of marine source rocks in northwestern Sichuan, including Doushantuo Formation of Lower Sinian, Dengsan Formation of Upper Sinian, Qiongzhusi Formation of Lower Cambrian, Longmaxi Formation of Lower Silurian, Middle Devonian, Maokou Formation of Middle Permian, Longtan Formation/Wujiaping Formation of Upper Permian and Dalong Formation, and discuss the natural gas exploration potential in this area.

## Geography
Sichuan Basin in Northwest Sichuan

## Time period
Since the 1940s, natural gas exploration in northwest Sichuan has continued

## Technology and included processes
Based on the analysis data of the thickness and organic carbon of the source rocks, the total gas generation intensity of 8 sets of source rocks in Northwest Sichuan is evaluated

## Technical purpose
The geochemical analysis data set from the marine source rocks in northwestern Sichuan is intended for use by geological and geochemical researchers as well as the energy industry to evaluate the natural gas exploration potential. It includes assessments of organic matter abundance, type, and maturity within different geological formations, which can be used to identify areas with higher quality source rocks characterized by large thickness and wide distribution, and therefore indicate promising regions for future natural gas exploration and extraction activities.

## Reference product
- natural gas: 6.5e9; input; min 1.3e10; max 4e9; uniform; missing unimportant
  total anger intensity

## Inputs
- natural gas: 20; min 10; max 30; uniform; missing unimportant
  overall thickness

## Outputs
- natural gas: 0.0108; min 0.0104; max 0.0112; uniform; missing unimportant
  Equivalent vitrinite reflectance, range average

## Data selection and combination
Abundance, type and maturity of organic matter in source rocks

## Data treatment and extrapolations
According to the analysis of geochemistry and vertical and horizontal thickness distribution of each set of source rocks in Northwest Sichuan, high-quality source rocks with high organic matter abundance are developed in the Lower Cambrian Qiongzhusi Formation, Upper Permian Longtan Formation and Dalong Formation, which are characterized by large thickness and wide distribution.

## Use advice
Users of this data set should consider the regional geological context when interpreting the organic geochemical analyses. The data is specifically applicable to the northwestern Sichuan region, and should not be extrapolated to other areas without further geospatial analysis. Users should account for the methodological approach used in the data collection, including the selection of outcrop sections and the techniques applied for determining organic matter characteristics. It is essential that users integrate this data with geological and geophysical data to derive robust conclusions on natural gas potential.

## Review details
Inventory: The internal review was done by several iteration steps concerning raw data validation, raw data documentation, representativity, completeness and consistency of modelling with regard to ISO 14040 and 14044.

## Data sources
- 胡国艺;贺飞;米敬奎;袁懿琳;郭谨豪; 川西北地区海相烃源岩地球化学特征、分布规律及天然气勘探潜力. 天然气地球科学 319–333 (2021).
