# coal mining ; coal mining

Dataset: ILCD process, Unit process, single operation
Geography: LF-SX-CN
Reference year: 2022
Classification: Energy carriers and technologies / Energetic raw materials
Generated by: Linlin Yin, yinlinlin0623@163.com
Owner: Tiangong LCI Data Working Group
Review: Dependent internal review by Tiangong LCI Data Working Group
Amounts: no units in this file; such an amount is in the reference unit of its flow, which a separate flow dataset defines
licenseType: Free of charge for all users and uses

## General comment
This dataset represents the coal mining process at M coal mine, with an annual production capacity of 1.2 million tons. It is suited for depicting the environmental impact and energy consumption in the coal supply chain, especially relevant for industries relying on coal as a primary energy source or raw material. Examples of end-use applications for the coal extracted might include electricity generation, metallurgical processes for steel production, or as feedstock for chemical synthesis.

## Geography
The annual output of M coal mine is 1.2 million tons, and the actual working time is 360 days per year, so the working face needs 499 days to complete the mining. In the mining process of a working face in M coal mine, the time of installation and withdrawal of equipment is half a month respectively. In one year of production, the time of excavation is 11 months, and the time of mining is 10 months.

## Technology and included processes
coal mining

## Reference product
- carbon dioxide (fossil): 7.21474e7; uniform; article inperiodical
  Based on the time schedule of each stage in the full life cycle of coal mining in M ​​Coal Mine and the mining time of the entire working face, the CO2 emissions generated by the consumption of 97509.62mw·h of electricity in coal mining during the full life cycle of mining in this working face were calculated. quantity.

## Inputs
- Electricity: 3.51035e8; uniform; article inperiodical
  Based on the time schedule of each stage in the full life cycle of coal mining in M ​​Coal Mine and the mining time of the entire working face, the power consumption of coal mining in the full life cycle of this working face is calculated.

## Use advice
When using this LCA data of M coal mine's process, it is important to take into account adjustments for regional differences in mining practices if applied to a different geographic location. The expected functional lifespan of heavy machinery used in extraction and the treatment of mine-related environmental burdens like land use and water consumption should also be included. Methodological advice includes a careful consideration of methodological boundaries for included emissions, and an accurate allocation of burdens between co-products if applicable.

## Review details
Inventory: The internal review was done by several iteration steps concerning raw data validation, raw data documentation, representativity, completeness and consistency of modelling with regard to ISO 14040 and 14044.
