# Large-scale wheat production

Dataset: ILCD process, Partly terminated system
Geography: SD-CN
Reference year: 2015
Valid until: 2016
Classification: Materials production / Agricultural production means
LCI method principle: Other
Generated by: Xin Xiong, xiongxin@swjtu.edu.cn
Owner: Tiangong LCI Data Working Group
Review: Dependent internal review by Tiangong LCI Data Working Group
Amounts: no units in this file; such an amount is in the reference unit of its flow, which a separate flow dataset defines
licenseType: Free of charge for all users and uses

## General comment
carbon footprints of wheat production

## Geography
The study sites are in Shandong Province, which is one of themain grain producing areas of China, accounting for about 7.6% oftotal national grain production

## Time period
A survey was carried out between August 2015 and August 2016using a questionnaire survey method

## Technical purpose
Large-scale wheat production in Shandong Province is primarily used for generating a significant proportion of China's grain supply. It is an essential part of the agricultural sector and plays a critical role in food security, providing raw material for various food products such as flour, bread, noodles, and other wheat-based foods.

## Reference product
- carbon dioxide: 0.49; normal; article inperiodical

## Inputs
All rows: normal; article inperiodical
- nitrogen, total (excluding N2): 237.1
- phosphorus, total: 143.3
- potassium: 114.1
- Oils (unspecified): 209
- Electricity: 1100.16

## Data treatment and extrapolations
Tier 2 methods recommended in the 2006 IPCC Guidelines for National Greenhouse Gas Inventories were applied to estimate GHG emissions and removals from activities listed in Fig. 2 (IPCC, 2006). Carbon footprints per unit area (CFarea) and per unit grain yield (CFyield) were calculated based on net GHG emissions and crop yield.

## Use advice
When utilizing this data set for Life Cycle Assessment of large-scale wheat production in Shandong Province, special attention should be paid to the methodological framework adopted. The greenhouse gas (GHG) emissions and removal rates, along with carbon footprints (CFarea and CFyield), were estimated using Tier 2 methods from the 2006 IPCC Guidelines. These estimations are indicative of the specific time frame (August 2015 - August 2016) and geographic location (Shandong Province). Users should note that this data might not accurately represent other time periods or different agricultural practices. Appropriate adjustments may be required for extrapolation or application in other contexts.

## Review details
Inventory: The internal review was done by several iteration steps concerning raw data validation, raw data documentation, representativity, completeness and consistency of modelling with regard to ISO 14040 and 14044.

## Data sources
- Zhu, Y. et al. Large-scale farming operations are win-win for grain production, soil carbon storage and mitigation of greenhouse gases. JOURNAL OF CLEANER PRODUCTION vol. 172 2143–2152 (2018).
