# Steam/hot water/other ; Fuel oil ; All types of boilers (water treatment in boilers) ; All sizes; NESPS2 / 蒸汽/热水/其它 ; 燃油 ; 全部类型锅炉（锅内水处理） ; 所有规模 ; 全国第二次污染普查数据

Dataset: ILCD process, Unit process, single operation
Geography: CN
Reference year: 2019
Classification: Reference Parameters / Energy carriers and technologies / Heat and steam
Generated by: The data was created by the Office of the Second National Pollution Source Census of the Ministry of Ecology and Environment, and the data was organized by the TianGong Plan team for ILCD format / 生态环境部第二次全国污染源普查工作办公室创建数据，天工计划团队常慧敏整理数据为ILCD格式
Owner: Tiangong LCI Data Working Group / 天工LCI数据工作小组
Review: Dependent internal review by Tiangong LCI Data Working Group / 天工LCI数据工作小组
Amounts: no units in this file; such an amount is in the reference unit of its flow, which a separate flow dataset defines
copyright: false
licenseType: Free of charge for all users and uses

## General comment
the Technical of end-of-pipe management technology for pollution Waste waterisPhysical + chemical + comprehensive utilization，Its Technical efficiency of end-of-pipe management100

## Technical purpose
该数据集代表所有类型的锅炉，用于产生蒸汽、热水或由其它燃油提供动力。这包括所有规模、配有内置水处理系统的锅炉。该技术用于末端治理，以减少废水污染，涉及物理和化学处理方法的结合，以及全面利用技术以实现最大效率。该技术适用于需要控制废水中化学需氧量（COD）污染的各种工业用途。

## Reference product
- Heavy fuel oil (1.0 wt.% S): 1000; input; calculated
  源文件中描述为为燃油，此处对其进行了匹配工作，将其匹配到LCAflow库里面相最符合的流，污染物指标备注为工业废水量

## Outputs
- chemical oxygen demand: 0; calculated
  the Technical of end-of-pipe management technology for pollution chemical oxygen demandisPhysical + chemical + comprehensive utilization，Its Technical efficiency of end-of-pipe management100
  污染物指标化学需氧量的末端治理技术是物理+化学法+综合利用，其效率为100，末端治理设施实际运行率（k值）计算公式为K=（锅炉运行小时数-废水处理设施的故障小时数）/锅炉运行小时数。原文件中描述污染物类别为废水，污染物指标为化学需氧量，此处对其进行了匹配工作，将其匹配到LCAflow库里面相最符合的流，污染物指标备注为化学需氧量
- chemical oxygen demand: 0.07999; calculated
  the Technical of end-of-pipe management technology for pollution chemical oxygen demandisPhysical + chemical method，Its Technical efficiency of end-of-pipe management57.9
  污染物指标化学需氧量的末端治理技术是物理+化学法，其效率为57.9，末端治理设施实际运行率（k值）计算公式为K=（锅炉运行小时数-废水处理设施的故障小时数）/锅炉运行小时数。原文件中描述污染物类别为废水，污染物指标为化学需氧量，此处对其进行了匹配工作，将其匹配到LCAflow库里面相最符合的流，污染物指标备注为化学需氧量
- Waste water: 0; calculated
  Pollutant indicators of industrial wastewater volume of end-of-pipe treatment technology is physical + chemical method, the efficiency of which is 0. The formula for calculating the actual operation rate of the end-of-pipe treatment facilities (k value) is K = (boiler operating hours - the number of hours of failure of the wastewater treatment facilities) / the number of hours of operation of the boiler. The original document describes the pollutant category as wastewater, the pollutant indicator for industrial wastewater, here to match it to the LCAflow library face to face with the most compatible flow, pollutant indicator note for industrial wastewater volume of the original description of the production coefficient of 0.968 (boiler sewage water). Please modify the corresponding emissions after accounting for yourself according to the note.
  污染物指标工业废水量的末端治理技术是物理+化学法，其效率为0，末端治理设施实际运行率（k值）计算公式为K=（锅炉运行小时数-废水处理设施的故障小时数）/锅炉运行小时数。原文件中描述污染物类别为废水，污染物指标为工业废水量，此处对其进行了匹配工作，将其匹配到LCAflow库里面相最符合的流，污染物指标备注为工业废水量原文描述的产污系数为 0.968（锅炉排污水）。请根据备注自行核算后修改对应的排放量。
- Waste water: 0; calculated
  the Technical of end-of-pipe management technology for pollution Waste waterisPhysical + chemical + comprehensive utilization，Its Technical efficiency of end-of-pipe management100.The original article describes the pollution production coefficients as 0.968（锅炉排污水）。Please revise the corresponding emissions after accounting for them according to the notes.。.The original article describes the pollution production coefficients as 0.968（锅炉排污水）. Please revise the corresponding emissions after accounting for them according to the notes.
  污染物指标工业废水量的末端治理技术是物理+化学法+综合利用，其效率为100，末端治理设施实际运行率（k值）计算公式为K=（锅炉运行小时数-废水处理设施的故障小时数）/锅炉运行小时数。原文件中描述污染物类别为废水，污染物指标为工业废水量，此处对其进行了匹配工作，将其匹配到LCAflow库里面相最符合的流，污染物指标备注为工业废水量原文描述的产污系数为 0.968（锅炉排污水）。请根据备注自行核算后修改对应的排放量。

## Use advice
This dataset is derived from the Pollution Source Census Report and contains information on pollution emissions and related products. However, it does not include data on energy or chemical consumption, nor does it provide information on waste or co-product generation. When utilizing this dataset, please supplement the missing data based on actual conditions before use
该数据集来源于污染源普查报告，包含污染物排放及相关产品信息，但不包含能源或化学品消耗数据，也不提供废弃物或共生产物产生信息。在使用该数据集时，请根据实际情况补充缺失数据后再使用。

## Review details
Inventory: The internal review was done by several iteration steps concerning raw data validation, raw data documentation, representativity, completeness and consistency of modelling with regard to ISO 14040 and 14044.
清单： 内部审查通过几个迭代步骤完成，涉及原始数据验证、原始数据记录、代表性、完整性、与 ISO 14040 和 14044 有关的建模的一致性。

## Data sources
- 第二次全国污染源普查产排污核算系数手册（试用版）,四级代码4430文件，在完整版文件中第5449页
