# clinker production;clinker

Dataset: ILCD process, Unit process, black box
Geography: ZZ-SD-CN
Classification: Unit processes / Materials production / Other mineralic materials
Generated by: #REF!, ysqsophia@gmail.com
Owner: Tiangong LCI Data Working Group
Review: Dependent internal review by Tiangong LCI Data Working Group
Amounts: no units in this file; such an amount is in the reference unit of its flow, which a separate flow dataset defines
copyright: false
licenseType: Free of charge for all users and uses

## General comment
Conventional clinker production.

## Geography
Shandong Shenfeng Cement Group Co., Ltd

## Technical purpose
The dataset describes the conventional production of clinker by the Shandong Shenfeng Cement Group Co., Ltd. This process is a core component for cement manufacturing where the clinker serves as the primary ingredient for the production of various types of cement. As such, it is essential in the construction industry for creating concrete, mortar, and other building materials.

## Model description
Two functional units are defined, namely 1 ton of clinker and the amount of food waste and residual waste required to produce 1 ton of clinker.The system boundaries include pulverized coal preparation, raw meal preparation and clinker calcination.

## Reference product
- clinker: 1000
  Clinker

## Inputs
- limestone, crushed, for mill: 1353.4
  Limestone
- sandstone: 101.905
  Sandstone
- shale: 75.555
  Shale
- iron, powder: 26.941
  Iron powder
- hard coal; 26.3 MJ/kg: 125
  Coal
- Electricity: 219.02
  Electricity. The power consumption at each stage was calculated according to the electricity consumption index for cement production (Wang, 2013). The background processes data from GaBi databases: electricity production, “CN: Electricity grid mix PE”.

## Outputs
- carbon dioxide (fossil): 760.538
  CO2. E_(CO_2 )=E_"coal" +E_(CaCO_3 ), E_coal=NCV×FC×CC×OF×44/10, E_(C"a" CO_3 )=(FR_1-FR_10)×44/56+(FR_2-FR_20)×44/40. Where E_(CO_2 ) represents CO2 emissions from the cement kiln (t), E_"coal" represents CO2 emissions from coal combustion (t), E_(CaCO_3 ) represents CO2 emissions from the carbonate decomposition of raw materials (t), NCV is the lower heat value of coal (19.570 GJ/t), FC is the consumption of coal (t), CC is the carbon content per unit heat value of coal (0.0261 t C/GJ), OF is the carbon oxidation rate of coal (98%), FR1 is the content of CaO in clinker (%), FR10 is the content of CaO in clinker that is not derived from carbonate decomposition (%), FR2 is the content of MgO in clinker (%), FR20 is the content of MgO in clinker that is not derived from carbonate decomposition (%), and 44/56 and 44/40 are the molecular weight conversion between CO2 and CaO, MgO respectively.FR_10=(FS_10)/((1-L)×F_"c" ), FR_20=(FS_20)/((1-L)×F_"c" ). Where Fc is the conversion factor of coal ash content in clinker (1.04), FS10 is the content of CaO in raw meal that is not in the form of carbonate (%), and FS20 is the content of MgO in the raw meal that is not in the form of carbonate (%).FS_10=(∑_"n" ▒〖(m_n×r_10n)〗)/m, FS_20=(∑_"n" ▒〖(m_n×r_20n)〗)/m. Where mn is the mass of the nth raw material except limestone (kg), r10n is the content of CaO in the nth raw material except limestone (%), r20n is the content of MgO in the nth raw material except limestone (%), and m is clinker consumption (kg).
- sulfur oxides: 0.411575
  SOx. P_(SO_2 )=64/80×"m"×SO_3 (1-X)×〖10〗^3, where P_(SO_2 ) is the SO2 emission from the cement kiln (kg), 64/80 is the molecular weight ratio of SO2 to SO3, m is clinker consumption (t), SO3 is the SO3 content in the raw meal (%), and X is the SO3 absorption rate of the raw meal (88%).
- Nitrogen oxides: 1.325
  NOx. P_(NO_x )=(R_Y×16+R_L×7)×m_coal×〖10〗^(-3), Where P_(NO_x ) is the NOx emission from the cement kiln (kg), R_L and R_Y are the ratios of fuel used in the rotary kiln and precalciner (0.6 and 0.4, respectively), and m_coal is the coal consumption of clinker generation (kg).

## Data selection and combination
First assume the proportion of raw material consumption, and then calculate the coal consumption, coal ash incorporation rate, raw meal ratio, raw meal ratio after ignition, clinker ratio and clinker quality parameters according to the formula, including lime saturation coefficient (KH) , silicate modulus (SM) and aluminate modulus (IM). The clinker quality parameters are KH=0.89±0.02, SM=2.5±0.1, IM=1.5±0.1. The quantity of wet material was calculated using the formula. The electricity consumption at each stage is calculated based on the electricity consumption index of cement production.

## Use advice
When using this dataset, users should pay attention to the specific clinker quality parameters (KH, SM, and IM), as these impact the resulting quality and types of cement that can be produced. Additionally, as the system boundaries exclude wastewater considerations due to minimal discharge, any assessment requiring analysis of the water use and disposal in the production should adjust the data accordingly. Methodological considerations should also include the specific energy consumption metrics, as well as the calculation of materials involved in the process, such as the proportions of raw materials, coal, coal ash, and the management of food waste, and residual waste. Further, understanding the functional units will be critical in applying this data to environmental impact assessments and in comparing the clinker production efficiency and emissions with other production methods or facilities.

## Review details
Inventory: The internal review was done by several iteration steps concerning raw data validation, raw data documentation, representativity, completeness and consistency of modelling with regard to ISO 14040 and 14044.

## Data sources
- Xuemin Liang, Wenling Dang, Guangling Yang, & Yueling Zhang. (2023). Environmental feasibility evaluation of cement co-production using classified domestic waste as alternative raw material and fuel: A life cycle perspective. Journal of Environmental Management 326, 116726.
