# Remediated soil ; Soil remediation ; In Situ Thermal Desorption ; Engineering implementation

Dataset: ILCD process, Unit process, black box
Geography: CN
Reference year: 2022
Classification: Unit processes / Other Services / Repair and maintenance
Generated by: Zhang Jinying, zhangjy@caep.org.cn
Owner: Tiangong LCI Data Working Group
Review: Dependent internal review by Tiangong LCI Data Working Group
Amounts: no units in this file; such an amount is in the reference unit of its flow, which a separate flow dataset defines
copyright: false
licenseType: Free of charge for all users and uses

## General comment
The construction operation period in high-risk areas is about 200 days, divided into two parts: ① thermal desorption, including heating, extraction well construction, installation of thermal desorption equipment, and heating desorption work;

## Technical purpose
The process described is used for the remediation of contaminated soil in high-risk areas through In Situ Thermal Desorption (ISTD). It involves heating the soil to volatilize contaminants and extracting them via wells. This technique is applied in environmental engineering projects where soil pollutants pose a significant health or environmental hazard and require removal to meet regulatory standards or to facilitate land redevelopment.

## Reference product
- Remediated soil: 30413; measured

## Inputs
All rows: measured
- natural gas,natural gas: 766514
- Electricity: 1.296e6
- Diesel: 38.806
- water: 115
- Cast Iron: 310265
- Concrete: 2270
- cement, unspecified: 1513
- Diesel,Diesel: 6.162
- contaminated soil: 30413
- Prepared site: 1

## Outputs
- Exhaust gas: 1; measured
- waste water - untreated: 1; measured

## Use advice
Users utilizing this data set for Life Cycle Assessment (LCA) should ensure to account for all inputs and outputs relevant to the construction and operational phases of In Situ Thermal Desorption. This includes consumption of fuels, electricity, other energy sources like natural gas, and materials such as concrete and steel. It is essential to include transportation of these inputs and any outputs or emissions that occur during the soil remediation process. The duration of use captured in the data is 200 days, and LCA practitioners should consider the specific context of the project when applying this data, to align with the temporal scope of the LCA study.

## Review details
Inventory: The internal review was done by several iteration steps concerning raw data validation, raw data documentation, representativity, completeness and consistency of modelling with regard to ISO 14040 and 14044.

## Data sources
- 刘文晓等.基于修复效果的污染土壤修复工程环境足迹分析[J].环境科学研究 35,2367-2377（2022）.
