# cement production;cement, portland-composite cement, 42.5MPa;high-volume fly ash dry process;mixed solid wastes

Dataset: ILCD process, Unit process, black box
Geography: WH-HUB-CN
Reference year: 2005
Classification: Materials production / Other mineralic materials
Generated by: Siqi Yang, ysqsophia@gmail.com
Owner: Tiangong LCI Data Working Group
Review: Dependent internal review by Tiangong LCI Data Working Group
Amounts: no units in this file; such an amount is in the reference unit of its flow, which a separate flow dataset defines
copyright: false
licenseType: Free of charge for all users and uses

## General comment
The production process of high-volume fly ash dry process is mainly referring to the technical reform indicators of Huaxin Cement Yidu Co., Ltd., which produces 42.5 grade silicate composite cement with various industrial waste slag admixture of more than 50% (including slag and fly ash admixture of not less than 40%).

## Geography
Wuhan Huaxin Cement Yidu Co., Ltd.

## Technology and included processes
The high-ash-mixed dry production process mainly refers to the technical transformation indicators of Huaxin Cement Yidu Co., Ltd. The 42.5 grade Portland composite cement produced by it contains more than 50% of various industrial waste residues (including slag The blending amount of fly ash is not less than 40%).

## Technical purpose
This dataset represents the industrial process for the production of Portland composite cement with a compressive strength of 42.5MPa. This cement, featuring a high-volume fly ash content and incorporating mixed industrial solid wastes, such as slag and fly ash, is intended for general construction purposes where such strength level is required.

## Model description
The functional unit is the service performance of 1 kilogram of cement with a 28-day compressive strength of 42.5MPa, that is, IFu=42.5kgMPa.The research scope is defined as: raw material pretreatment, raw material grinding, raw material calcination, clinker grinding, cement homogenization, and cement storage.

## Reference product
- cement, portland-composite cement, 42.5MPa: 1000
  42.5 grade composite portland cement

## Inputs
- limestone, crushed, for mill: 786.4
  Limestone
- gypsum stone (CaSO4-dihydrate): 45.1
  Gupsum
- ash: 200
  Fly ash
- blast furnace slag: 200
  The original document is labeled as "slag" (i.e. blast furnace slag).
- hard coal: 88.472
  The original data is 0.0822kg standard coal, here converted to hard coal, the conversion formula is 1kg hard coal = 0.929kg standard coal.
- electricity, medium voltage: 370.8
  Electricity

## Outputs
- particles (> PM10): 0.15
  Dust, with an unspecified particle size, is treated as PM > 10 micrometers in diameter.
- sulfur dioxide: 0.000562
  Sulfur dioxide. Considering the actual operating conditions of domestic cement plants and the development trend for the foreseeable future, the statistical average of measured data is adopted for this evaluation.
- Nitrogen oxides: 0.004627
  Nitrogen oxides. Considering the actual operating conditions of domestic cement plants and the development trend for the foreseeable future, the statistical average of measured data is adopted for this evaluation.
- carbon dioxide: 559.1
  Carbon dioxide. Considering the actual operating conditions of domestic cement plants and the development trend for the foreseeable future, the statistical average of measured data is adopted for this evaluation.

## Use advice
Users of this dataset should note that the data reflects the specific technological approach and environmental performance tied to Huaxin Cement Yidu Co., Ltd's technical reform indicators. The high-volume fly ash content (over 50% industrial waste slag admixture, with at least 40% consisting of slag and fly ash) should be considered when evaluating the environmental impact and applying the data to similar industrial contexts. The functional unit here is defined as the service performance of 1 kilogram of cement with a 28-day compressive strength of 42.5 MPa, crucial for comparative LCA studies. The scope of the research includes all phases from raw material pretreatment to cement storage; thus, users should include all these stages when using the data for the life cycle assessment of cement-related products.

## Review details
Inventory: The internal review was done by several iteration steps concerning raw data validation, raw data documentation, representativity, completeness and consistency of modelling with regard to ISO 14040 and 14044.

## Data sources
- 曹晓润. (2005). 低环境负荷型水泥的生态环境评价 [硕士, 武汉理工大学].
