# Instant Rice Flour ; Rice ; Pretreatment + powdering + extrusion molding + aging + packaging ; All sizes; NESPS2 / 方便米粉 ; 大米 ; 前处理+打粉+挤出成型+老化+包装 ; 所有规模 ; 全国第二次污染普查数据

Dataset: ILCD process, Unit process, single operation
Geography: CN
Reference year: 2019
Classification: Reference Parameters / Materials production / Food and renewable raw materials
Generated by: The data was created by the Office of the Second National Pollution Source Census of the Ministry of Ecology and Environment, and the data was organized by the TianGong Plan team for ILCD format / 生态环境部第二次全国污染源普查工作办公室创建数据，天工计划团队常慧敏整理数据为ILCD格式
Owner: Tiangong LCI Data Working Group / 天工LCI数据工作小组
Review: Dependent internal review by Tiangong LCI Data Working Group / 天工LCI数据工作小组
Amounts: no units in this file; such an amount is in the reference unit of its flow, which a separate flow dataset defines
copyright: false
licenseType: Free of charge for all users and uses

## General comment
the Technical of end-of-pipe management technology for pollution chemical oxygen demandis/，Its Technical efficiency of end-of-pipe management0

## Technical purpose
该工业流程描述了从原料大米到即食米粉的完整生产周期，包括前处理、粉碎、挤出成型、老化和适用于所有规模生产的包装。此外，数据集还包含了使用的末端污染管理技术，包含物理处理和序批式反应器(SBR)，用于处理化学需氧量、氨氮、有机结合态氮、总磷、石油相关废弃物和废水等污染物。

## Reference product
- Rice Noodles: 1000; calculated
  源文件中描述为为方便米粉，此处对其进行了匹配工作，将其匹配到LCAflow库里面相最符合的流，污染物指标备注为化学需氧量

## Outputs
All rows: calculated
- Petroleum-related waste: 0.0002475
  the Technical of end-of-pipe management technology for pollution Petroleum-related wasteisPhysical treatment + SBR，Its Technical efficiency of end-of-pipe management45
  污染物指标石油类的末端治理技术是物理处理法+SBR，其效率为45，末端治理设施实际运行率（k值）计算公式为k=污水处理设施年耗电量（千瓦时）/(总额定功率(千瓦)×年运行时间(小时)。原文件中描述污染物类别为废水，污染物指标为石油类，此处对其进行了匹配工作，将其匹配到LCAflow库里面相最符合的流，污染物指标备注为石油类
- Petroleum-related waste: 0.00045
  the Technical of end-of-pipe management technology for pollution Petroleum-related wasteis/，Its Technical efficiency of end-of-pipe management0
  污染物指标石油类的末端治理技术是/，其效率为0。原文件中描述污染物类别为废水，污染物指标为石油类，此处对其进行了匹配工作，将其匹配到LCAflow库里面相最符合的流，污染物指标备注为石油类
- Ammonia Nitrogen: 0.00391782
  the Technical of end-of-pipe management technology for pollution Ammonia NitrogenisPhysical treatment + SBR，Its Technical efficiency of end-of-pipe management66
  污染物指标氨氮的末端治理技术是物理处理法+SBR，其效率为66，末端治理设施实际运行率（k值）计算公式为k=污水处理设施年耗电量（千瓦时）/(总额定功率(千瓦)×年运行时间(小时)。原文件中描述污染物类别为废水，污染物指标为氨氮，此处对其进行了匹配工作，将其匹配到LCAflow库里面相最符合的流，污染物指标备注为氨氮
- phosphorus, total: 0.00414
  the Technical of end-of-pipe management technology for pollution phosphorus, totalisPhysical treatment + SBR，Its Technical efficiency of end-of-pipe management90
  污染物指标总磷的末端治理技术是物理处理法+SBR，其效率为90，末端治理设施实际运行率（k值）计算公式为k=污水处理设施年耗电量（千瓦时）/(总额定功率(千瓦)×年运行时间(小时)。原文件中描述污染物类别为废水，污染物指标为总磷，此处对其进行了匹配工作，将其匹配到LCAflow库里面相最符合的流，污染物指标备注为总磷
- Waste water: 4250
  the Technical of end-of-pipe management technology for pollution Waste wateris/，Its Technical efficiency of end-of-pipe management0
  污染物指标工业废水量的末端治理技术是/，其效率为0。原文件中描述污染物类别为废水，污染物指标为工业废水量，此处对其进行了匹配工作，将其匹配到LCAflow库里面相最符合的流，污染物指标备注为工业废水量
- Ammonia Nitrogen: 0.011523
  the Technical of end-of-pipe management technology for pollution Ammonia Nitrogenis/，Its Technical efficiency of end-of-pipe management0
  污染物指标氨氮的末端治理技术是/，其效率为0。原文件中描述污染物类别为废水，污染物指标为氨氮，此处对其进行了匹配工作，将其匹配到LCAflow库里面相最符合的流，污染物指标备注为氨氮
- Nitrogen, organic bound: 0.0119213
  the Technical of end-of-pipe management technology for pollution Nitrogen, organic boundisPhysical treatment + SBR，Its Technical efficiency of end-of-pipe management83
  污染物指标总氮的末端治理技术是物理处理法+SBR，其效率为83，末端治理设施实际运行率（k值）计算公式为k=污水处理设施年耗电量（千瓦时）/(总额定功率(千瓦)×年运行时间(小时)。原文件中描述污染物类别为废水，污染物指标为总氮，此处对其进行了匹配工作，将其匹配到LCAflow库里面相最符合的流，污染物指标备注为总氮
- phosphorus, total: 0.0414
  the Technical of end-of-pipe management technology for pollution phosphorus, totalis/，Its Technical efficiency of end-of-pipe management0
  污染物指标总磷的末端治理技术是/，其效率为0。原文件中描述污染物类别为废水，污染物指标为总磷，此处对其进行了匹配工作，将其匹配到LCAflow库里面相最符合的流，污染物指标备注为总磷
- Nitrogen, organic bound: 0.070125
  the Technical of end-of-pipe management technology for pollution Nitrogen, organic boundis/，Its Technical efficiency of end-of-pipe management0
  污染物指标总氮的末端治理技术是/，其效率为0。原文件中描述污染物类别为废水，污染物指标为总氮，此处对其进行了匹配工作，将其匹配到LCAflow库里面相最符合的流，污染物指标备注为总氮
- chemical oxygen demand: 0.988313
  the Technical of end-of-pipe management technology for pollution chemical oxygen demandisPhysical treatment + SBR，Its Technical efficiency of end-of-pipe management85
  污染物指标化学需氧量的末端治理技术是物理处理法+SBR，其效率为85，末端治理设施实际运行率（k值）计算公式为k=污水处理设施年耗电量（千瓦时）/(总额定功率(千瓦)×年运行时间(小时)。原文件中描述污染物类别为废水，污染物指标为化学需氧量，此处对其进行了匹配工作，将其匹配到LCAflow库里面相最符合的流，污染物指标备注为化学需氧量
- chemical oxygen demand: 6.58875
  the Technical of end-of-pipe management technology for pollution chemical oxygen demandis/，Its Technical efficiency of end-of-pipe management0
  污染物指标化学需氧量的末端治理技术是/，其效率为0。原文件中描述污染物类别为废水，污染物指标为化学需氧量，此处对其进行了匹配工作，将其匹配到LCAflow库里面相最符合的流，污染物指标备注为化学需氧量

## Use advice
This dataset is derived from the Pollution Source Census Report and contains information on pollution emissions and related products. However, it does not include data on energy or chemical consumption, nor does it provide information on waste or co-product generation. When utilizing this dataset, please supplement the missing data based on actual conditions before use
该数据集来源于污染源普查报告，包含污染物排放及相关产品信息，但不包含能源或化学品消耗数据，也不提供废弃物或共生产物产生信息。在使用该数据集时，请根据实际情况补充缺失数据后再使用。

## Review details
Inventory: The internal review was done by several iteration steps concerning raw data validation, raw data documentation, representativity, completeness and consistency of modelling with regard to ISO 14040 and 14044.
清单： 内部审查通过几个迭代步骤完成，涉及原始数据验证、原始数据记录、代表性、完整性、与 ISO 14040 和 14044 有关的建模的一致性。

## Data sources
- 第二次全国污染源普查产排污核算系数手册（试用版）,二级代码14,四级代码1439文件，在完整版文件中第3413页
