# Chlorothalonil ; m-Phenylenedicarbonitrile, liquid chlorine ; Synthesis ; All sizes; NESPS2 / 百菌清 ; 间苯二甲腈、液氯 ; 合成 ; 所有规模 ; 全国第二次污染普查数据

Dataset: ILCD process, Unit process, single operation
Geography: CN
Reference year: 2019
Classification: Reference Parameters / Materials production / Organic chemicals
Generated by: The data was created by the Office of the Second National Pollution Source Census of the Ministry of Ecology and Environment, and the data was organized by the TianGong Plan team for ILCD format / 生态环境部第二次全国污染源普查工作办公室创建数据，天工计划团队常慧敏整理数据为ILCD格式
Owner: Tiangong LCI Data Working Group / 天工LCI数据工作小组
Review: Dependent internal review by Tiangong LCI Data Working Group / 天工LCI数据工作小组
Amounts: no units in this file; such an amount is in the reference unit of its flow, which a separate flow dataset defines
copyright: false
licenseType: Free of charge for all users and uses

## General comment
the Technical of end-of-pipe management technology for pollution Nitrogen, organic boundisChemical coagulation + biofilm process，Its Technical efficiency of end-of-pipe management51，The formula for calculating the actual operation rate (k-value) of the end-of-pipe treatment facility is k = annual power consumption of the treatment facilities (kWh) / (equipment rated power (kW) × equipment operating time (hours))

## Technical purpose
所描述的工业过程包含合成百菌清(Chlorothalonil)和间苯二甲腈，以液氯作为主要原料。这个过程适用于各种规模的生产设施。末端处理技术包括活性污泥法结合厌氧水解和化学混凝法与生物膜过程，这些技术用于处理废水并降低化学需氧量(COD)、氨氮、有机结合态氮和挥发性有机化合物(VOCs)的污染水平。此外，采用吸附蒸汽或氮气/空气解吸以及再生热氧化器(RTO)作为VOCs的排放方法。这些技术的效率各不相同，显示了它们处理不同污染物的有效性。

## Reference product
- Chlorothalonil: 1000; calculated
  源文件中描述为为百菌清，此处对其进行了匹配工作，将其匹配到LCAflow库里面相最符合的流，污染物指标备注为工业废水量

## Outputs
All rows: calculated
- volatile organic compound: 0.15
  the Technical of end-of-pipe management technology for pollution volatile organic compoundisRTO，Its Technical efficiency of end-of-pipe management99.9，The formula for calculating the actual operation rate (k-value) of the end-of-pipe treatment facility is k = annual power consumption of the treatment facilities (kWh) / (equipment rated power (kW) × equipment operating time (hours))
  污染物指标挥发性有机物的末端治理技术是RTO，其效率为99.9，末端治理设施实际运行率（k值）计算公式为k=治理设施耗电量（千瓦时）/（治理设施运行时数（小时）*治理设施额定功率(千瓦)）。原文件中描述污染物类别为废气，污染物指标为挥发性有机物，此处对其进行了匹配工作，将其匹配到LCAflow库里面相最符合的流，污染物指标备注为挥发性有机物
- Waste water: 2000
  the Technical of end-of-pipe management technology for pollution Waste wateris/，Its Technical efficiency of end-of-pipe management0
  污染物指标工业废水量的末端治理技术是/，其效率为0。原文件中描述污染物类别为废水，污染物指标为工业废水量，此处对其进行了匹配工作，将其匹配到LCAflow库里面相最符合的流，污染物指标备注为工业废水量
- volatile organic compound: 4.5
  the Technical of end-of-pipe management technology for pollution volatile organic compoundis(Adsorption + steam desorption)/(adsorption + nitrogen/air desorption)，Its Technical efficiency of end-of-pipe management97，The formula for calculating the actual operation rate (k-value) of the end-of-pipe treatment facility is k = annual power consumption of the treatment facilities (kWh) / (equipment rated power (kW) × equipment operating time (hours))
  污染物指标挥发性有机物的末端治理技术是（吸附+蒸汽解析）/（吸附+氮气/空气解析），其效率为97，末端治理设施实际运行率（k值）计算公式为k=治理设施耗电量（千瓦时）/（治理设施运行时数（小时）*治理设施额定功率(千瓦)）。原文件中描述污染物类别为废气，污染物指标为挥发性有机物，此处对其进行了匹配工作，将其匹配到LCAflow库里面相最符合的流，污染物指标备注为挥发性有机物
- Exhaust gas: 2700
  the Technical of end-of-pipe management technology for pollution Exhaust gasis/，Its Technical efficiency of end-of-pipe management0，The formula for calculating the actual operation rate (k-value) of the end-of-pipe treatment facility is k = annual power consumption of the treatment facilities (kWh) / (equipment rated power (kW) × equipment operating time (hours))
  污染物指标工业废气量的末端治理技术是/，其效率为0。原文件中描述污染物类别为废气，污染物指标为工业废气量，此处对其进行了匹配工作，将其匹配到LCAflow库里面相最符合的流，污染物指标备注为工业废气量
- chemical oxygen demand: 3.692
  the Technical of end-of-pipe management technology for pollution chemical oxygen demandisActivated sludge process + anaerobic hydrolysis，Its Technical efficiency of end-of-pipe management87，The formula for calculating the actual operation rate (k-value) of the end-of-pipe treatment facility is k = annual power consumption of the treatment facilities (kWh) / (equipment rated power (kW) × equipment operating time (hours))
  污染物指标化学需氧量的末端治理技术是活性污泥法+厌氧水解类，其效率为87，末端治理设施实际运行率（k值）计算公式为k=治理设施耗电量（千瓦时）/（治理设施运行时数（小时）*治理设施额定功率(千瓦)）。原文件中描述污染物类别为废水，污染物指标为化学需氧量，此处对其进行了匹配工作，将其匹配到LCAflow库里面相最符合的流，污染物指标备注为化学需氧量
- chemical oxygen demand: 3.976
  the Technical of end-of-pipe management technology for pollution chemical oxygen demandisChemical coagulation + biofilm process，Its Technical efficiency of end-of-pipe management86
  污染物指标化学需氧量的末端治理技术是化学混凝法+生物膜法，其效率为86，末端治理设施实际运行率（k值）计算公式为k=治理设施耗电量（千瓦时）/（治理设施运行时数（小时）*治理设施额定功率(千瓦)）。原文件中描述污染物类别为废水，污染物指标为化学需氧量，此处对其进行了匹配工作，将其匹配到LCAflow库里面相最符合的流，污染物指标备注为化学需氧量
- Ammonia Nitrogen: 9.504
  the Technical of end-of-pipe management technology for pollution Ammonia NitrogenisChemical coagulation + biofilm process，Its Technical efficiency of end-of-pipe management84
  污染物指标氨氮的末端治理技术是化学混凝法+生物膜法，其效率为84，末端治理设施实际运行率（k值）计算公式为k=治理设施耗电量（千瓦时）/（治理设施运行时数（小时）*治理设施额定功率(千瓦)）。原文件中描述污染物类别为废水，污染物指标为氨氮，此处对其进行了匹配工作，将其匹配到LCAflow库里面相最符合的流，污染物指标备注为氨氮
- Nitrogen, organic bound: 13.797
  the Technical of end-of-pipe management technology for pollution Nitrogen, organic boundisActivated sludge process + anaerobic hydrolysis，Its Technical efficiency of end-of-pipe management79，The formula for calculating the actual operation rate (k-value) of the end-of-pipe treatment facility is k = annual power consumption of the treatment facilities (kWh) / (equipment rated power (kW) × equipment operating time (hours))
  污染物指标总氮的末端治理技术是活性污泥法+厌氧水解类，其效率为79，末端治理设施实际运行率（k值）计算公式为k=治理设施耗电量（千瓦时）/（治理设施运行时数（小时）*治理设施额定功率(千瓦)）。原文件中描述污染物类别为废水，污染物指标为总氮，此处对其进行了匹配工作，将其匹配到LCAflow库里面相最符合的流，污染物指标备注为总氮
- Ammonia Nitrogen: 17.82
  the Technical of end-of-pipe management technology for pollution Ammonia NitrogenisActivated sludge process + anaerobic hydrolysis，Its Technical efficiency of end-of-pipe management70，The formula for calculating the actual operation rate (k-value) of the end-of-pipe treatment facility is k = annual power consumption of the treatment facilities (kWh) / (equipment rated power (kW) × equipment operating time (hours))
  污染物指标氨氮的末端治理技术是活性污泥法+厌氧水解类，其效率为70，末端治理设施实际运行率（k值）计算公式为k=治理设施耗电量（千瓦时）/（治理设施运行时数（小时）*治理设施额定功率(千瓦)）。原文件中描述污染物类别为废水，污染物指标为氨氮，此处对其进行了匹配工作，将其匹配到LCAflow库里面相最符合的流，污染物指标备注为氨氮
- Nitrogen, organic bound: 32.193
  the Technical of end-of-pipe management technology for pollution Nitrogen, organic boundisChemical coagulation + biofilm process，Its Technical efficiency of end-of-pipe management51，The formula for calculating the actual operation rate (k-value) of the end-of-pipe treatment facility is k = annual power consumption of the treatment facilities (kWh) / (equipment rated power (kW) × equipment operating time (hours))
  污染物指标总氮的末端治理技术是化学混凝法+生物膜法，其效率为51，末端治理设施实际运行率（k值）计算公式为k=治理设施耗电量（千瓦时）/（治理设施运行时数（小时）*治理设施额定功率(千瓦)）。原文件中描述污染物类别为废水，污染物指标为总氮，此处对其进行了匹配工作，将其匹配到LCAflow库里面相最符合的流，污染物指标备注为总氮

## Use advice
This dataset is derived from the Pollution Source Census Report and contains information on pollution emissions and related products. However, it does not include data on energy or chemical consumption, nor does it provide information on waste or co-product generation. When utilizing this dataset, please supplement the missing data based on actual conditions before use
该数据集来源于污染源普查报告，包含污染物排放及相关产品信息，但不包含能源或化学品消耗数据，也不提供废弃物或共生产物产生信息。在使用该数据集时，请根据实际情况补充缺失数据后再使用。

## Review details
Inventory: The internal review was done by several iteration steps concerning raw data validation, raw data documentation, representativity, completeness and consistency of modelling with regard to ISO 14040 and 14044.
清单： 内部审查通过几个迭代步骤完成，涉及原始数据验证、原始数据记录、代表性、完整性、与 ISO 14040 和 14044 有关的建模的一致性。

## Data sources
- 第二次全国污染源普查产排污核算系数手册（试用版）,二级代码26,三级代码263.0文件，在完整版文件中第2936页
