# Copper production ; pyrometallurgical processes; Total of all wind farm

Dataset: ILCD process, Unit process, single operation
Geography: NMG-CN
Reference year: 2017
Classification: Unit processes / Materials production / Metals and semimetals
Functional unit: The functional unit is 1.5 MW wind turbine
LCI method principle: Attributional
LCI method approaches: Allocation
Generated by: Yunzhi Zhao, ll10088@163.com
Owner: Tiangong LCI Data Working Group
Review: Dependent internal review by Tiangong LCI Data Working Group
Amounts: no units in this file; such an amount is in the reference unit of its flow, which a separate flow dataset defines
copyright: false
licenseType: Free of charge for all users and uses

## General comment
The data set represents materials and processes utilized in the production phase of wind power generation. It includes the manufacturing of 1.5 MW wind turbines, substations, and cables for wind farms. This infrastructure is specifically used in the generation of renewable energy within wind farms, and in this dataset, it focuses on a case study from a wind farm located in the northeast of Inner Mongolia, which has the highest concentration of wind power installations in China.

## Geography
The data regarding the parameters of wind power has been collected from Wang (2012). A wind farm equipped with 33 domestic 1.5 megawatts (MW) wind turbines is regarded as a case study to analyze the environmental impact and its substitution effects. The wind farm is located in the northeast of Inner Mongolia, the province in which most of China’s wind power is installed (Xia and Song, 2017).

## Reference product
- copper: 1000; measured

## Inputs
- Energy, gross calorific value, in biomass, primary forest: 107.492; calculated

## Outputs
- carbon dioxide (fossil): 10909.3; calculated
- sulfur dioxide: 31.87; calculated
- nitrous oxide: 27.69; calculated

## Deviations from the LCI method approaches
The life cycle inventory for wind power is illustrated as follows. The production and manufacturing stage include the production of wind turbines, substations, and cables, which consume a large amount of energy and emit pollutants (Xue et al., 2015).

## Use advice
This data set should be used to understand the environmental impacts of the production and manufacturing stages of a 1.5 MW wind turbine infrastructure. Users should note that the data reflects the specific context of wind power generation in Inner Mongolia, and may not be representative of other regions or countries. The implications for energy consumption and pollutant emissions should be contextualized within the regional energy infrastructure and the role of wind power in substituting traditional energy sources. Additionally, when using the data for life cycle assessment or environmental impact analysis, it may be necessary to account for regional variations in energy mix, production practices, and environmental regulations.

## Review details
Inventory: The internal review was done by several iteration steps concerning raw data validation, raw data documentation, representativity, completeness and consistency of modelling with regard to ISO 14040 and 14044.

## Data sources
- Li, H., Jiang, H.-D., Dong, K.-Y., Wei, Y.-M. & Liao, H. A comparative analysis of the life cycle environmental emissions from wind and coal power: Evidence from China. Journal of Cleaner Production 248, 119192 (2020).
