# Soil restoration ; ex-situ capping ; soil landfill ;soil excavation;contaminated soil

Dataset: ILCD process, Unit process, single operation
Geography: ES
Reference year: 2022
Classification: Other Services / Repair and maintenance
Generated by: Sang Chunhui, sangch@mail.bnu.edu.cn
Owner: Tiangong LCI Data Working Group
Review: Dependent internal review by Tiangong LCI Data Working Group
Amounts: no units in this file; such an amount is in the reference unit of its flow, which a separate flow dataset defines
copyright: false
licenseType: Free of charge for all users and uses

## General comment
Pollution source area of 1000 square meters, pollution depth of 0.20 meters, soil bulk density of 1.5, pollution soil excavation

## Technical purpose
This dataset represents an ex-situ soil remediation process, specifically the excavation of contaminated soil from a source area of 1000 m2 with a depth of contamination at 0.20 m. The soil has a bulk density of 1.5. The data is relevant for operations involving the excavation unit process (single operation) as a part of soil decontamination and landfill projects.

## Reference product
- contaminated soil: 3e6; software or database

## Inputs
- Diesel: 112000; software or database

## Use advice
Users of this dataset should ensure that the scope of their environmental impact assessment matches the specified area and depth of soil excavation. Caution should be exercised when generalizing these data to other soil types, pollution levels, or remediation techniques. This dataset is specific to ex-situ soil decontamination and should only be applied to similar soil remediation scenarios. Special attention should be given to the methodological approach for treatment and disposal of the excavated soil when applying this data.

## Review details
Inventory: The internal review was done by several iteration steps concerning raw data validation, raw data documentation, representativity, completeness and consistency of modelling with regard to ISO 14040 and 14044.

## Data sources
- Espada et al. Coupling phytoremediation of Pb-contaminated soil and biomass energy production: A comparative Life Cycle Assessment. Science of the Total Environment 840 (2022) 156675
