# Aluminum electrolysis carbon anode production ; carbon anode ; petroleum coke

Dataset: ILCD process, Unit process, single operation
Geography: CN
Reference year: 2017
Classification: Unit processes / Materials production / Non-energetic raw materials
Generated by: Huimin Chang, huiminchang@tsinghua.edu.cn
Owner: Tiangong LCI Data Working Group
Review: Dependent internal review by Tiangong LCI Data Working Group
Amounts: no units in this file; such an amount is in the reference unit of its flow, which a separate flow dataset defines
copyright: false
licenseType: Free of charge for all users and uses

## General comment
阳极产量 ; 原生铝产量

## Time period
IAI 2017 （GLO）

## Technical purpose
This dataset represents the process of producing carbon anodes from petroleum coke, specifically for use in aluminum electrolysis. Carbon anodes are essential components in the primary aluminum production industry and are used as electrodes during the electrolysis process to smelt aluminum oxide into aluminum.

## Reference product
- anode, prebake, for aluminium electrolysis: 1000; software or database
  Anode (C carrier) [kg]

## Inputs
- natural gas, high pressure: 6721.06; software or database
  Natural gas [MJ] ; 1m3 ~ 11kWh (Bund der Energieverbraucher e.V. 2007)
- electricity, high voltage, aluminium industry: 400.18; software or database
  Electricity [kWh]
- Petroleum Coke: 674.884
  Petrol coke [kg] ; US used for CN as no data for CN available
- steel, low-alloyed: 5.81673; software or database
  Steel [kg] ; Steel billet (16MnCr5)
- heavy fuel oil: 691.006; software or database
  Heavy oil [kg] ; 1L ~ 1kg, 1kg ~ 41.5MJ (Käser 2014)
- Diesel oil: 5.53137; software or database
  Diesel oil [kg] ; 1L ~ 0.84 kg, 1kg ~ 42.5MJ (Paschotta 2010)
- freshwater: 1.9548; software or database
  fresh water [m3]
- Water, salt, ocean: 1.57295; estimated
  Sea water [m3]

## Outputs
All rows: software or database
- particles (> PM10): 0.19537
  Particulates [kg] ; Dust (> PM10) [Particles to air]
- particles (PM2.5): 0.07794
  Particulates <2.5 [kg] ; Particulates, < 2.5 um [ecoinvent long-term to air]
- particles (PM2.5 - PM10): 0.23598
  Particulates 2.5-10 [kg] ; Particulates, > 2.5 um, and < 10um [ecoinvent long-term to air]
- sulfur dioxide: 4.28417
  Sulfur dioxide [kg]
- Nitrogen oxides: 0.49506
  Nitrous oxides (as NO2)
- hydrogen fluoride: 0.02378
  Fluoride (as F) (to air) [kg]
- polycyclic aromatic hydrocarbons: 0.05317
  Total polycyclic aromatic hydrocarbons (to air) [kg]
- Benzo(a)pyrene: 5e-5
- Suspended solids, unspecified: 0.08804
  Suspended solids [kg]
- Oils, unspecified: 0.02032
  Oil and grease/total hydrocarbons [kg]
- Fluoride: 0.00879
  Fluoride (as F) (to fresh water) [kg]
- PAH, polycyclic aromatic hydrocarbons: 1e-5
  Polycyclic aromatic hydrocarbons (to water) [kg]
- freshwater: 1.69515
  Fresh water [m3] CN: sum of sea water and fresh water
- Water, salt, ocean: 1.56993
  Sea water [m3] CN: sum of sea water and fresh water

## Data selection and combination
For reliable findings, the most recent and representative data were considered. Regional or country-specific data were used when provided in the GaBi© “professional and extension” database (SP 39) or in the literature. If location-specific data were not found, either comparable data for the country or global data were used. For consistency, data from the same source and year were used if available. Due to data availability, the study did not consider some inputs and background processes if they contributed less than 1% to the total input mass. For primary aluminium production, this study used the most recent LCI data from 2015 provided by the International Aluminium Institute (IAI) (International Aluminium Institute, 2017b). IAI data were used because the IAI is an established institute that considers primary aluminium production worldwide and the data were used in studies e.g. from the Aluminium Association and from the European Aluminium Association (Aluminum Association, 2013; European Aluminium Association, 2018). In terms of the LCA data of standardized primary aluminium production, only few uncertainties occurred. Generally, the composition of these data could be fully explained and reconstructed.

## Use advice
When utilizing this dataset for Life Cycle Assessment, it is important to note that it is based on the most recent and representative data available as of 2015. IAI-provided data is credible and widely accepted in industry studies. Users should be cautious that the dataset does not account for inputs and background processes that contribute less than 1% to total input mass. The dataset is most applicable for global or country-specific assessments in regions where data match with the sources from the IAI, Aluminium Association, or European Aluminium Association.

## Review details
Inventory: The internal review was done by several iteration steps concerning raw data validation, raw data documentation, representativity, completeness and consistency of modelling with regard to ISO 14040 and 14044.

## Data sources
- Luthin, A., Backes, J. G. & Traverso, M. A framework to identify environmental-economic trade-offs by combining life cycle assessment and life cycle costing – A case study of aluminium production. Journal of Cleaner Production 321, 128902 (2021).
