# Remediated soil ; Mercury contaminated agricultural soil ; Stabilization/solidification with biochar based powdered activated carbon

Dataset: ILCD process, Unit process, black box
Geography: GZ-CN
Reference year: 2016
Classification: Unit processes / Other Services / Repair and maintenance
Functional unit: The functional unit in this study is the treatment of 1 tonne of mercury contaminated top soil in agricultural land to meet regulatory standards. The average initial mercury concentration is 134 mg/kg.
Generated by: Yang Xintong, yangxt@caep.org.cn
Owner: Tiangong LCI Data Working Group
Review: Dependent internal review by Tiangong LCI Data Working Group
Amounts: no units in this file; such an amount is in the reference unit of its flow, which a separate flow dataset defines
copyright: false
licenseType: Free of charge for all users and uses

## General comment
The S/S treatment of mercury contaminated soil using sulfur-impregnated activated carbon has been demonstrated to be effective in achieving leaching thresholds.

## Geography
The study site is agricultural land contaminated by mercury, located in Guizhou Province in Southern China.This particular case is representative of the typical scale and scenario where agricultural land is contaminated by nearby mining and smelting operations.

## Technology and included processes
In S/S, a stabilizing reagent is mixed with contaminated soil, leading to reduced leachability of mercury in the soil matrix, either due to the physical binding/enclosure (solidification) or chemical reaction (stabilization). Because S/S does not reduce the total mercury content, the stabilized material still requires disposal in a landfill. Powder reactivated carbon (PAC) modified by sulfur is used for stabilization. The production of powder reactivated carbon are from biochar based PAC that is produced from the local area. A cement dosage ratio of 6% is used based on data from a full scale cement-based S/S project.

## Technical purpose
The powdered activated carbon (PAC) stabilization/solidification (S/S) process described is intended for the remediation of mercury-contaminated agricultural soil. Specifically, sulfur-impregnated activated carbon is used to treat the soil to reduce mercury leachability to achieve regulatory leaching thresholds. This process is suitable for agricultural lands impacted by pollution from nearby mining and smelting operations, particularly where the aim is to remediate the land for continued agricultural use without reducing the total mercury content. It represents a typical solution for land decontamination on a scale representative of such incidents in agricultural settings.

## Reference product
- Remediated soil: 1000; missing unimportant

## Inputs
All rows: missing unimportant
- cement, unspecified: 60
- biochar based powdered activated carbon: 20
- Plastic (unspecified): 0.24
- Steel: 0.01
- Tap Water: 0.04
- transport in t*km: 313
- Waste (solid): 1120
  Waste for landilling (kg)
- contaminated soil: 1000

## Use advice
Data users should note that while the S/S treatment described effectively reduces mercury leachability, it does not alter the total mercury content in the soil. Therefore, after treatment, disposal of the stabilized material in a landfill is still necessary. The data provided is specific to the treatment of 1 tonne of mercury-contaminated topsoil with an initial mercury concentration of 134 mg/kg. Users intending to apply this data to their LCA models should consider site-specific conditions, such as the initial contamination levels and local regulatory requirements. When using the process data for S/S treatment, the user should ensure that input and output flows include all key raw materials and essential energy consumption, and consider that the technological applicability is based on using a 6% cement dosage ratio from a full-scale cement-based S/S project in the local context.

## Review details
Inventory: The internal review was done by several iteration steps concerning raw data validation, raw data documentation, representativity, completeness and consistency of modelling with regard to ISO 14040 and 14044.

## Data sources
- Hou D ,Gu Q ,Ma F , et al. Life cycle assessment comparison of thermal desorption and stabilization/solidification of mercury contaminated soil on agricultural land [J]. Journal of Cleaner Production, 2016, 139 949-956.
