# Milk production ; Dairy breeding ; Non-integrated maize silage planting and dairy cow breeding system (non-IPBS)

Dataset: ILCD process, Unit process, single operation
Geography: QD-SD-CN
Reference year: 2016
Classification: Unit processes / Materials production / Food and renewable raw materials
Functional unit: The 1t FPCM corrected for protein and fat content was selected as the evaluation unit
Generated by: Rui Yang, 1632707028@qq.com
Owner: Tiangong LCI Data Working Group
Review: Dependent internal review by Tiangong LCI Data Working Group
Amounts: no units in this file; such an amount is in the reference unit of its flow, which a separate flow dataset defines
copyright: false
licenseType: Free of charge for all users and uses

## General comment
In dairy farming, the difference between the two models is the source of silage corn feed.

## Geography
A questionnaire survey was conducted on dairy farms in Qingdao, Shandong Province from July to August 2020.

## Time period
From 2016, Shandong began to implement the silage corn planting subsidy policy, is one of the earliest provinces to implement the subsidy policy, the subsidy standard is 20~50 yuan /t. In 2019, Shandong Province silage corn planting area reached 14,100 hm2, accounting for 7.3% of the country.

## Technology and included processes
In the study area, there are mainly two milk production modes :IPBS and non-IPBS. In non-IPBS, the farms only have feeding links and manure treatment links, all the feed is purchased, and the manure pile fertilizer is made into organic fertilizer and sold to fruit and vegetable farmers. In IPBS, the silage corn planting process is increased in the farm, organic fertilizer and liquid fertilizer are mainly applied to the farm field, and the remaining part is sold to fruit farmers and vegetable farmers, etc. The differences between the two models are as follows :1) the sources of silage corn in the farm are different, resulting in different feed transportation distances and feed costs; 2) The use of organic fertilizer and liquid fertilizer is different, and the transportation distance is different. A total of 109 dairy farms were investigated in this study, and 83 valid questionnaires were obtained after excluding non-conforming questionnaires, among which 38 were non-IPBS and 45 were IPBS.

## Technical purpose
The milk production process described is utilized in dairy farming, specifically within non-integrated maize silage planting and dairy cow breeding systems (non-IPBS). This method focuses on raising dairy cattle and managing manure, with a distinctive practice of sourcing all feed through purchasing, and the manure composted is then fully sold to fruit and vegetable farmers. It stands in contrast to the IPBS model where farms cultivate their own silage corn and primarily use the produced organic and liquid fertilizers on their own farmland, selling the surplus to local farmers.

## Reference product
- milk: 1000; measured
  FPCM

## Inputs
All rows: measured
- cow: 0.113
  Lactating cows (non-IPBS mode)
- cow: 0.03
  Dry lactating cows
- cow: 0.072
  Breeding cattle (non-IPBS mode)
- cow: 0.033
  CALVES (non-IPBS mode)
- feed: 235
  Concentrated feed (non-IPBS mode)
- maize grain: 115
  Corn kernels (non-IPBS mode)
- bean pulp: 53
  Soybean meal (non-IPBS mode)
- wheat bran: 44
  Wheat Bran (non-IPBS mode)
- maize grain: 1030
  Purchased silage corn (non-IPBS mode) (missing flow)
- alfalfa: 113
  Alfalfa (non-IPBS mode)
- oat: 124
  Oats (non-IPBS mode)
- chinese wildrye: 305
  Leymus chinensis (non-IPBS mode)
- cottonseed: 39
  Cottonseed (non-IPBS mode)
- Electricity: 372.456
  non-IPBS mode
- Diesel: 0.002265
  non-IPBS mode
- water: 10.647
  non-IPBS mode
- unspecified: 15.695
  Land occupation (non-IPBS mode)

## Outputs
- cow: 0.92; measured
  Selling male calves (non-IPBS model)
- cow: 13.977; measured
  Sale of culled cows (non-IPBS model)
- cow: 1.185; measured
  Selling beef cattle (non-IPBS model)

## Data treatment and extrapolations
The values in the table are the total input and output of each farm evenly distributed to FPCM per ton, and then the average value of each farm is taken. All input-output list data are calculated according to this method. The value in "()" is the average input per hectare, for the convenience of comparison with relevant studies; "a" Because the mechanical operation of farm tillage is mainly substitute tillage operation, the farmer is not clear about the diesel consumption in this link, and this data is based on relevant research [20]. "b" This value is the output of the process and is ultimately used entirely inside the system.

## Sampling procedure
研究地区主要有 2 种牛奶生产模式:IPBS 和 non-IPBS,具体见图 1.non-IPBS 中,养殖场只有饲养 环节和粪污处理环节,饲料全部来源于购买,粪便堆 肥制成有机肥后全销售给果农和菜农.IPBS 中,养殖 场增加青贮玉米种植环节,有机肥、液体肥主要施用 于场内农田,剩余部分销售给果农和菜农等.2 种模 式的区别:1)养殖场青贮玉米的来源不同,导致饲料 运输距离和饲料成本不同;2)有机肥、液体肥的利用 途径不同,运输距离不同.本研究共调研奶牛场 109 家,剔除不符合研究问卷后,得 83 份有效问卷,其中 non-IPBS 为 38 家,IPBS 为 45 家.

## Use advice
Data users should take note of the distinctive characteristics of the non-IPBS dairy farming system when utilizing this LCA data. It is crucial to differentiate between the non-IPBS and IPBS models, particularly regarding silage corn feed source, feed transportation distance, feed cost, and the utilization pathways of organic and liquid fertilizers. Ensure correct application of the provided values by taking into account that all inputs and outputs are calculated based on FPCM per ton, along with average input per hectare for comparison with relevant studies. Reference to specific research (indicated by [20]) is required when addressing areas of uncertainty, such as diesel consumption for farm tillage operations.

## Review details
Inventory: The internal review was done by several iteration steps concerning raw data validation, raw data documentation, representativity, completeness and consistency of modelling with regard to ISO 14040 and 14044.

## Data sources
- 黄显雷, 师博扬, 张英楠, 龙昭宇, & 尹昌斌. 基于生命周期视角的种养一体化奶牛场环境经济效益评估. 中国环境科学 41, 3944–3955 (2021).
