# Bioethanol ; Liquid hot water ; Collection and transportation

Dataset: ILCD process
Geography: GLO
Classification: Unit processes / Energy carriers and technologies / Renewable fuels
Generated by: Jiayi Yuan, jiayi_y@mail.bnu.edu.cn
Owner: Tiangong LCI Data Working Group
Review: Dependent internal review by Tiangong LCI Data Working Group
Amounts: no units in this file; such an amount is in the reference unit of its flow, which a separate flow dataset defines
copyright: false
licenseType: Free of charge for all users and uses

## General comment
The described industrial process involves the production of bioethanol, which is to be collected and transported using liquid hot water pretreatment technology. This bioethanol can be utilized as a renewable fuel source primarily for automotive applications, as a substitute for gasoline. The specific use case is the combustion of bioethanol in cars to lower carbon emissions.

## Technology and included processes
Through data quality evaluation, 141 datasets with high completeness and consistency were selected from the reported 561 datasets in 474 published papers and classified into eight technological configurations determined by the pretreatment technology. The technological steps following pretreatment were all the same, although actual flows and parameter values vary, as observed in the literature

## Inputs
- Diesel: 0.0006
  L/kg

## Data selection and combination
Global datasets were used where possible, since the study does not apply to any specific region. LCI data for one external process named “Combustion of bioethanol in car” were obtained from the GREET database

## Data treatment and extrapolations
We assessed the robustness of the modeling results through uncertainty propagation (Monte Carlo), discernibility analysis, global sensitivity analysis, and scenario variation.

## Use advice
The given LCA datasets are highly specific to the production and utilization of bioethanol with liquid hot water pretreatment and are classified into eight technological configurations for proper comparison. Users should apply global datasets when regional specificity is not required. Special attention should be paid to the methodological advice, such as the inclusion of the combustion of bioethanol in cars sourced from the GREET database for analyzing emissions. Furthermore, users are encouraged to consider the provided robustness assessments such as Monte Carlo simulations, discernibility analysis, global sensitivity analysis, and scenario variations to understand the uncertainties and sensitivities associated with the data.

## Review details
Inventory: The internal review was done by several iteration steps concerning raw data validation, raw data documentation, representativity, completeness and consistency of modelling with regard to ISO 14040 and 14044.
