# Electrolytic lead ; Lead concentrate ; Oxygen-rich melting-blast furnace lead reduction-electrolysis process ; All sizes; NESPS2 / 电解铅 ; 铅精矿 ; 富氧熔炼-鼓风炉还原炼铅-电解工艺 ; 所有规模 ; 全国第二次污染普查数据

Dataset: ILCD process, Unit process, single operation
Geography: CN
Reference year: 2019
Classification: Reference Parameters / Materials production / Metals and semimetals
Generated by: The data was created by the Office of the Second National Pollution Source Census of the Ministry of Ecology and Environment, and the data was organized by the TianGong Plan team for ILCD format / 生态环境部第二次全国污染源普查工作办公室创建数据，天工计划团队常慧敏整理数据为ILCD格式
Owner: Tiangong LCI Data Working Group / 天工LCI数据工作小组
Review: Dependent internal review by Tiangong LCI Data Working Group / 天工LCI数据工作小组
Amounts: no units in this file; such an amount is in the reference unit of its flow, which a separate flow dataset defines
copyright: false
licenseType: Free of charge for all users and uses

## General comment
the Technical of end-of-pipe management technology for pollution Exhaust gasis/

## Technical purpose
所描述的工业过程涉及使用富氧熔炼-鼓风炉还原后的电解工艺从铅精矿中生产电解铅。这种电解铅可用于各种应用，例如制造电池、辐射防护和建筑行业。该过程适用于所有规模的生产。末端治理污染管理技术被实施，以控制和减少工艺过程中排放的废气、颗粒物(PM)、二氧化硫、氮氧化物、铅、镉、砷、汞、化学需氧量(COD)、氨氮、总磷和有机结合氮。具体技术包括湿式沉淀系统、除尘器、静电沉淀、旋风集尘、各种化学吸收方法、氧化还原过程和膜分离，提供一系列的技术效率。

## Reference product
- lead: 1000; calculated
  源文件中描述为为电解铅，此处对其进行了匹配工作，将其匹配到LCAflow库里面相最符合的流，污染物指标备注为工业废气量

## Outputs
All rows: calculated
- Mercury: 1.3095e-5
  the Technical of end-of-pipe management technology for pollution MercuryisNeutralization + redox process + chemical precipitation + membrane separation，Its Technical efficiency of end-of-pipe management99.5
  污染物指标汞的末端治理技术是中和法+氧化还原法+化学沉淀法+膜分离法，其效率为99.5，末端治理设施实际运行率（k值）计算公式为K=废水处理设施正常运行时间（小时/年）/企业正常生产时间（小时/年）。原文件中描述污染物类别为废水，污染物指标为汞，此处对其进行了匹配工作，将其匹配到LCAflow库里面相最符合的流，污染物指标备注为汞
- Mercury: 2.619e-5
  the Technical of end-of-pipe management technology for pollution MercuryisNeutralization + redox process + chemical precipitation，Its Technical efficiency of end-of-pipe management99
  污染物指标汞的末端治理技术是中和法+氧化还原法+化学沉淀法，其效率为99，末端治理设施实际运行率（k值）计算公式为K=废水处理设施正常运行时间（小时/年）/企业正常生产时间（小时/年）。原文件中描述污染物类别为废水，污染物指标为汞，此处对其进行了匹配工作，将其匹配到LCAflow库里面相最符合的流，污染物指标备注为汞
- Mercury: 5.238e-5
  the Technical of end-of-pipe management technology for pollution MercuryisNeutralization + chemical precipitation，Its Technical efficiency of end-of-pipe management98
  污染物指标汞的末端治理技术是中和法+化学沉淀法，其效率为98，末端治理设施实际运行率（k值）计算公式为K=废水处理设施正常运行时间（小时/年）/企业正常生产时间（小时/年）。原文件中描述污染物类别为废水，污染物指标为汞，此处对其进行了匹配工作，将其匹配到LCAflow库里面相最符合的流，污染物指标备注为汞
- Mercury: 5.238e-5
  the Technical of end-of-pipe management technology for pollution MercuryisRedox process + chemical precipitation，Its Technical efficiency of end-of-pipe management98
  污染物指标汞的末端治理技术是氧化还原法+化学沉淀法，其效率为98，末端治理设施实际运行率（k值）计算公式为K=废水处理设施正常运行时间（小时/年）/企业正常生产时间（小时/年）。原文件中描述污染物类别为废水，污染物指标为汞，此处对其进行了匹配工作，将其匹配到LCAflow库里面相最符合的流，污染物指标备注为汞
- cadmium: 6.0405e-5
  the Technical of end-of-pipe management technology for pollution cadmiumisNeutralization + redox process + chemical precipitation + membrane separation，Its Technical efficiency of end-of-pipe management99.5
  污染物指标镉的末端治理技术是中和法+氧化还原法+化学沉淀法+膜分离法，其效率为99.5，末端治理设施实际运行率（k值）计算公式为K=废水处理设施正常运行时间（小时/年）/企业正常生产时间（小时/年）。原文件中描述污染物类别为废水，污染物指标为镉，此处对其进行了匹配工作，将其匹配到LCAflow库里面相最符合的流，污染物指标备注为镉
- cadmium: 0.00012081
  the Technical of end-of-pipe management technology for pollution cadmiumisNeutralization + redox process + chemical precipitation，Its Technical efficiency of end-of-pipe management99
  污染物指标镉的末端治理技术是中和法+氧化还原法+化学沉淀法，其效率为99，末端治理设施实际运行率（k值）计算公式为K=废水处理设施正常运行时间（小时/年）/企业正常生产时间（小时/年）。原文件中描述污染物类别为废水，污染物指标为镉，此处对其进行了匹配工作，将其匹配到LCAflow库里面相最符合的流，污染物指标备注为镉
- arsenic: 0.000195835
  the Technical of end-of-pipe management technology for pollution arsenicisNeutralization + redox process + chemical precipitation + membrane separation，Its Technical efficiency of end-of-pipe management99.5
  污染物指标砷的末端治理技术是中和法+氧化还原法+化学沉淀法+膜分离法，其效率为99.5，末端治理设施实际运行率（k值）计算公式为K=废水处理设施正常运行时间（小时/年）/企业正常生产时间（小时/年）。原文件中描述污染物类别为废水，污染物指标为砷，此处对其进行了匹配工作，将其匹配到LCAflow库里面相最符合的流，污染物指标备注为砷
- cadmium: 0.00024162
  the Technical of end-of-pipe management technology for pollution cadmiumisNeutralization + chemical precipitation，Its Technical efficiency of end-of-pipe management98
  污染物指标镉的末端治理技术是中和法+化学沉淀法，其效率为98，末端治理设施实际运行率（k值）计算公式为K=废水处理设施正常运行时间（小时/年）/企业正常生产时间（小时/年）。原文件中描述污染物类别为废水，污染物指标为镉，此处对其进行了匹配工作，将其匹配到LCAflow库里面相最符合的流，污染物指标备注为镉
- cadmium: 0.00024162
  the Technical of end-of-pipe management technology for pollution cadmiumisRedox process + chemical precipitation，Its Technical efficiency of end-of-pipe management98
  污染物指标镉的末端治理技术是氧化还原法+化学沉淀法，其效率为98，末端治理设施实际运行率（k值）计算公式为K=废水处理设施正常运行时间（小时/年）/企业正常生产时间（小时/年）。原文件中描述污染物类别为废水，污染物指标为镉，此处对其进行了匹配工作，将其匹配到LCAflow库里面相最符合的流，污染物指标备注为镉
- arsenic: 0.00039167
  the Technical of end-of-pipe management technology for pollution arsenicisNeutralization + redox process + chemical precipitation，Its Technical efficiency of end-of-pipe management99
  污染物指标砷的末端治理技术是中和法+氧化还原法+化学沉淀法，其效率为99，末端治理设施实际运行率（k值）计算公式为K=废水处理设施正常运行时间（小时/年）/企业正常生产时间（小时/年）。原文件中描述污染物类别为废水，污染物指标为砷，此处对其进行了匹配工作，将其匹配到LCAflow库里面相最符合的流，污染物指标备注为砷
- lead: 0.000413445
  the Technical of end-of-pipe management technology for pollution leadisNeutralization + redox process + chemical precipitation + membrane separation，Its Technical efficiency of end-of-pipe management99.5
  污染物指标铅的末端治理技术是中和法+氧化还原法+化学沉淀法+膜分离法，其效率为99.5，末端治理设施实际运行率（k值）计算公式为K=废水处理设施正常运行时间（小时/年）/企业正常生产时间（小时/年）。原文件中描述污染物类别为废水，污染物指标为铅，此处对其进行了匹配工作，将其匹配到LCAflow库里面相最符合的流，污染物指标备注为铅
- arsenic: 0.00078334
  the Technical of end-of-pipe management technology for pollution arsenicisNeutralization + chemical precipitation，Its Technical efficiency of end-of-pipe management98
  污染物指标砷的末端治理技术是中和法+化学沉淀法，其效率为98，末端治理设施实际运行率（k值）计算公式为K=废水处理设施正常运行时间（小时/年）/企业正常生产时间（小时/年）。原文件中描述污染物类别为废水，污染物指标为砷，此处对其进行了匹配工作，将其匹配到LCAflow库里面相最符合的流，污染物指标备注为砷
- arsenic: 0.00078334
  the Technical of end-of-pipe management technology for pollution arsenicisRedox process + chemical precipitation，Its Technical efficiency of end-of-pipe management98
  污染物指标砷的末端治理技术是氧化还原法+化学沉淀法，其效率为98，末端治理设施实际运行率（k值）计算公式为K=废水处理设施正常运行时间（小时/年）/企业正常生产时间（小时/年）。原文件中描述污染物类别为废水，污染物指标为砷，此处对其进行了匹配工作，将其匹配到LCAflow库里面相最符合的流，污染物指标备注为砷
- lead: 0.00082689
  the Technical of end-of-pipe management technology for pollution leadisNeutralization + redox process + chemical precipitation，Its Technical efficiency of end-of-pipe management99
  污染物指标铅的末端治理技术是中和法+氧化还原法+化学沉淀法，其效率为99，末端治理设施实际运行率（k值）计算公式为K=废水处理设施正常运行时间（小时/年）/企业正常生产时间（小时/年）。原文件中描述污染物类别为废水，污染物指标为铅，此处对其进行了匹配工作，将其匹配到LCAflow库里面相最符合的流，污染物指标备注为铅
- particles (PM2.5 - PM10): 0.89079
  the Technical of end-of-pipe management technology for pollution particles (PM2.5 - PM10)isDust filter (bag filter - film coating)，Its Technical efficiency of end-of-pipe management99.5
  污染物指标颗粒物的末端治理技术是过滤除尘法（布袋除尘器-覆膜），其效率为99.5，末端治理设施实际运行率（k值）计算公式为k=治理设施运行时间（小时/年）/正常生产时间（小时/年）。原文件中描述污染物类别为废气，污染物指标为颗粒物，此处对其进行了匹配工作，将其匹配到LCAflow库里面相最符合的流，污染物指标备注为颗粒物
- lead: 0.00165378
  the Technical of end-of-pipe management technology for pollution leadisNeutralization + chemical precipitation，Its Technical efficiency of end-of-pipe management98
  污染物指标铅的末端治理技术是中和法+化学沉淀法，其效率为98，末端治理设施实际运行率（k值）计算公式为K=废水处理设施正常运行时间（小时/年）/企业正常生产时间（小时/年）。原文件中描述污染物类别为废水，污染物指标为铅，此处对其进行了匹配工作，将其匹配到LCAflow库里面相最符合的流，污染物指标备注为铅
- lead: 0.00165378
  the Technical of end-of-pipe management technology for pollution leadisRedox process + chemical precipitation，Its Technical efficiency of end-of-pipe management98
  污染物指标铅的末端治理技术是氧化还原法+化学沉淀法，其效率为98，末端治理设施实际运行率（k值）计算公式为K=废水处理设施正常运行时间（小时/年）/企业正常生产时间（小时/年）。原文件中描述污染物类别为废水，污染物指标为铅，此处对其进行了匹配工作，将其匹配到LCAflow库里面相最符合的流，污染物指标备注为铅
- particles (PM2.5 - PM10): 1.78158
  the Technical of end-of-pipe management technology for pollution particles (PM2.5 - PM10)isDust filter (bag filter - without film coating)，Its Technical efficiency of end-of-pipe management99
  污染物指标颗粒物的末端治理技术是过滤除尘法（布袋除尘器-无覆膜），其效率为99，末端治理设施实际运行率（k值）计算公式为k=治理设施运行时间（小时/年）/正常生产时间（小时/年）。原文件中描述污染物类别为废气，污染物指标为颗粒物，此处对其进行了匹配工作，将其匹配到LCAflow库里面相最符合的流，污染物指标备注为颗粒物
- particles (PM2.5 - PM10): 1.78158
  the Technical of end-of-pipe management technology for pollution particles (PM2.5 - PM10)isElectrostatic precipitation technology，Its Technical efficiency of end-of-pipe management99
  污染物指标颗粒物的末端治理技术是电除尘技术，其效率为99，末端治理设施实际运行率（k值）计算公式为k=治理设施运行时间（小时/年）/正常生产时间（小时/年）。原文件中描述污染物类别为废气，污染物指标为颗粒物，此处对其进行了匹配工作，将其匹配到LCAflow库里面相最符合的流，污染物指标备注为颗粒物
- particles (PM2.5 - PM10): 1.78158
  the Technical of end-of-pipe management technology for pollution particles (PM2.5 - PM10)isWet precipitation (dynamic wave)，Its Technical efficiency of end-of-pipe management99
  污染物指标颗粒物的末端治理技术是湿式除尘法（动力波），其效率为99，末端治理设施实际运行率（k值）计算公式为k=治理设施运行时间（小时/年）/正常生产时间（小时/年）。原文件中描述污染物类别为废气，污染物指标为颗粒物，此处对其进行了匹配工作，将其匹配到LCAflow库里面相最符合的流，污染物指标备注为颗粒物
- phosphorus, total: 0.0018051
  the Technical of end-of-pipe management technology for pollution phosphorus, totalisNeutralization + redox process + chemical precipitation + membrane separation，Its Technical efficiency of end-of-pipe management70
  污染物指标总磷的末端治理技术是中和法+氧化还原法+化学沉淀法+膜分离法，其效率为70，末端治理设施实际运行率（k值）计算公式为K=废水处理设施正常运行时间（小时/年）/企业正常生产时间（小时/年）。原文件中描述污染物类别为废水，污染物指标为总磷，此处对其进行了匹配工作，将其匹配到LCAflow库里面相最符合的流，污染物指标备注为总磷
- Nitrogen oxides: 1.8447
  the Technical of end-of-pipe management technology for pollution Nitrogen oxidesisSCR，Its Technical efficiency of end-of-pipe management70
  污染物指标氮氧化物的末端治理技术是选择性催化还原法，其效率为70，末端治理设施实际运行率（k值）计算公式为k=治理设施运行时间（小时/年）/正常生产时间（小时/年）。原文件中描述污染物类别为废气，污染物指标为氮氧化物，此处对其进行了匹配工作，将其匹配到LCAflow库里面相最符合的流，污染物指标备注为氮氧化物
- phosphorus, total: 0.00228646
  the Technical of end-of-pipe management technology for pollution phosphorus, totalisNeutralization + redox process + chemical precipitation，Its Technical efficiency of end-of-pipe management62
  污染物指标总磷的末端治理技术是中和法+氧化还原法+化学沉淀法，其效率为62，末端治理设施实际运行率（k值）计算公式为K=废水处理设施正常运行时间（小时/年）/企业正常生产时间（小时/年）。原文件中描述污染物类别为废水，污染物指标为总磷，此处对其进行了匹配工作，将其匹配到LCAflow库里面相最符合的流，污染物指标备注为总磷
- mercury: 0.002347
  the Technical of end-of-pipe management technology for pollution mercuryisSame as PM
  污染物指标汞的末端治理技术是同颗粒物，末端治理设施实际运行率（k值）计算公式为k=治理设施运行时间（小时/年）/正常生产时间（小时/年）。原文件中描述污染物类别为废气，污染物指标为汞，此处对其进行了匹配工作，将其匹配到LCAflow库里面相最符合的流，污染物指标备注为汞
- phosphorus, total: 0.00288816
  the Technical of end-of-pipe management technology for pollution phosphorus, totalisNeutralization + chemical precipitation，Its Technical efficiency of end-of-pipe management52
  污染物指标总磷的末端治理技术是中和法+化学沉淀法，其效率为52，末端治理设施实际运行率（k值）计算公式为K=废水处理设施正常运行时间（小时/年）/企业正常生产时间（小时/年）。原文件中描述污染物类别为废水，污染物指标为总磷，此处对其进行了匹配工作，将其匹配到LCAflow库里面相最符合的流，污染物指标备注为总磷
- Nitrogen oxides: 3.0745
  the Technical of end-of-pipe management technology for pollution Nitrogen oxidesisOxidation/absorption method，Its Technical efficiency of end-of-pipe management50
  污染物指标氮氧化物的末端治理技术是氧化/吸收法，其效率为50，末端治理设施实际运行率（k值）计算公式为k=治理设施运行时间（小时/年）/正常生产时间（小时/年）。原文件中描述污染物类别为废气，污染物指标为氮氧化物，此处对其进行了匹配工作，将其匹配到LCAflow库里面相最符合的流，污染物指标备注为氮氧化物
- Nitrogen oxides: 3.0745
  the Technical of end-of-pipe management technology for pollution Nitrogen oxidesisSNCR，Its Technical efficiency of end-of-pipe management50
  污染物指标氮氧化物的末端治理技术是选择性非催化还原法，其效率为50，末端治理设施实际运行率（k值）计算公式为k=治理设施运行时间（小时/年）/正常生产时间（小时/年）。原文件中描述污染物类别为废气，污染物指标为氮氧化物，此处对其进行了匹配工作，将其匹配到LCAflow库里面相最符合的流，污染物指标备注为氮氧化物
- phosphorus, total: 0.00385088
  the Technical of end-of-pipe management technology for pollution phosphorus, totalisRedox process + chemical precipitation，Its Technical efficiency of end-of-pipe management36
  污染物指标总磷的末端治理技术是氧化还原法+化学沉淀法，其效率为36，末端治理设施实际运行率（k值）计算公式为K=废水处理设施正常运行时间（小时/年）/企业正常生产时间（小时/年）。原文件中描述污染物类别为废水，污染物指标为总磷，此处对其进行了匹配工作，将其匹配到LCAflow库里面相最符合的流，污染物指标备注为总磷
- sulfur dioxide: 5.0464
  the Technical of end-of-pipe management technology for pollution sulfur dioxideisActivated coke adsorption method，Its Technical efficiency of end-of-pipe management90
  污染物指标二氧化硫的末端治理技术是活性焦吸附法，其效率为90，末端治理设施实际运行率（k值）计算公式为k=治理设施运行时间（小时/年）/正常生产时间（小时/年）。原文件中描述污染物类别为废气，污染物指标为二氧化硫，此处对其进行了匹配工作，将其匹配到LCAflow库里面相最符合的流，污染物指标备注为二氧化硫
- sulfur dioxide: 5.0464
  the Technical of end-of-pipe management technology for pollution sulfur dioxideisAmmonia absorption，Its Technical efficiency of end-of-pipe management90
  污染物指标二氧化硫的末端治理技术是氨法吸收法，其效率为90，末端治理设施实际运行率（k值）计算公式为k=治理设施运行时间（小时/年）/正常生产时间（小时/年）。原文件中描述污染物类别为废气，污染物指标为二氧化硫，此处对其进行了匹配工作，将其匹配到LCAflow库里面相最符合的流，污染物指标备注为二氧化硫
- sulfur dioxide: 5.0464
  the Technical of end-of-pipe management technology for pollution sulfur dioxideisHydrogen peroxide desulfurization，Its Technical efficiency of end-of-pipe management90
  污染物指标二氧化硫的末端治理技术是双氧水脱硫法，其效率为90，末端治理设施实际运行率（k值）计算公式为k=治理设施运行时间（小时/年）/正常生产时间（小时/年）。原文件中描述污染物类别为废气，污染物指标为二氧化硫，此处对其进行了匹配工作，将其匹配到LCAflow库里面相最符合的流，污染物指标备注为二氧化硫
- sulfur dioxide: 5.0464
  the Technical of end-of-pipe management technology for pollution sulfur dioxideisLime/limestone-gypsum method，Its Technical efficiency of end-of-pipe management90
  污染物指标二氧化硫的末端治理技术是石灰/石灰石-石膏法，其效率为90，末端治理设施实际运行率（k值）计算公式为k=治理设施运行时间（小时/年）/正常生产时间（小时/年）。原文件中描述污染物类别为废气，污染物指标为二氧化硫，此处对其进行了匹配工作，将其匹配到LCAflow库里面相最符合的流，污染物指标备注为二氧化硫
- sulfur dioxide: 5.0464
  the Technical of end-of-pipe management technology for pollution sulfur dioxideisMetal oxide absorption method，Its Technical efficiency of end-of-pipe management90
  污染物指标二氧化硫的末端治理技术是金属氧化物吸收法，其效率为90，末端治理设施实际运行率（k值）计算公式为k=治理设施运行时间（小时/年）/正常生产时间（小时/年）。原文件中描述污染物类别为废气，污染物指标为二氧化硫，此处对其进行了匹配工作，将其匹配到LCAflow库里面相最符合的流，污染物指标备注为二氧化硫
- sulfur dioxide: 5.0464
  the Technical of end-of-pipe management technology for pollution sulfur dioxideisOrganic solution recycling absorption method，Its Technical efficiency of end-of-pipe management90
  污染物指标二氧化硫的末端治理技术是有机溶液循环吸收法，其效率为90，末端治理设施实际运行率（k值）计算公式为k=治理设施运行时间（小时/年）/正常生产时间（小时/年）。原文件中描述污染物类别为废气，污染物指标为二氧化硫，此处对其进行了匹配工作，将其匹配到LCAflow库里面相最符合的流，污染物指标备注为二氧化硫
- Waste water: 5732
  the Technical of end-of-pipe management technology for pollution Waste wateris/
  污染物指标工业废水量的末端治理技术是/，末端治理设施实际运行率（k值）计算公式为K=废水处理设施正常运行时间（小时/年）/企业正常生产时间（小时/年）。原文件中描述污染物类别为废水，污染物指标为工业废水量，此处对其进行了匹配工作，将其匹配到LCAflow库里面相最符合的流，污染物指标备注为工业废水量
- sulfur dioxide: 7.5696
  the Technical of end-of-pipe management technology for pollution sulfur dioxideisSodium alkali method，Its Technical efficiency of end-of-pipe management85
  污染物指标二氧化硫的末端治理技术是钠碱法，其效率为85，末端治理设施实际运行率（k值）计算公式为k=治理设施运行时间（小时/年）/正常生产时间（小时/年）。原文件中描述污染物类别为废气，污染物指标为二氧化硫，此处对其进行了匹配工作，将其匹配到LCAflow库里面相最符合的流，污染物指标备注为二氧化硫
- particles (PM2.5 - PM10): 8.9079
  the Technical of end-of-pipe management technology for pollution particles (PM2.5 - PM10)isWet precipitation (foam tower)，Its Technical efficiency of end-of-pipe management95
  污染物指标颗粒物的末端治理技术是湿式除尘法（泡沫塔），其效率为95，末端治理设施实际运行率（k值）计算公式为k=治理设施运行时间（小时/年）/正常生产时间（小时/年）。原文件中描述污染物类别为废气，污染物指标为颗粒物，此处对其进行了匹配工作，将其匹配到LCAflow库里面相最符合的流，污染物指标备注为颗粒物
- Ammonia Nitrogen: 0.0163218
  the Technical of end-of-pipe management technology for pollution Ammonia NitrogenisNeutralization + redox process + chemical precipitation + membrane separation，Its Technical efficiency of end-of-pipe management70
  污染物指标氨氮的末端治理技术是中和法+氧化还原法+化学沉淀法+膜分离法，其效率为70，末端治理设施实际运行率（k值）计算公式为K=废水处理设施正常运行时间（小时/年）/企业正常生产时间（小时/年）。原文件中描述污染物类别为废水，污染物指标为氨氮，此处对其进行了匹配工作，将其匹配到LCAflow库里面相最符合的流，污染物指标备注为氨氮
- particles (PM2.5 - PM10): 17.8158
  the Technical of end-of-pipe management technology for pollution particles (PM2.5 - PM10)isWet precipitation (venturi)，Its Technical efficiency of end-of-pipe management90
  污染物指标颗粒物的末端治理技术是湿式除尘法（文丘里），其效率为90，末端治理设施实际运行率（k值）计算公式为k=治理设施运行时间（小时/年）/正常生产时间（小时/年）。原文件中描述污染物类别为废气，污染物指标为颗粒物，此处对其进行了匹配工作，将其匹配到LCAflow库里面相最符合的流，污染物指标备注为颗粒物
- Ammonia Nitrogen: 0.0206743
  the Technical of end-of-pipe management technology for pollution Ammonia NitrogenisNeutralization + redox process + chemical precipitation，Its Technical efficiency of end-of-pipe management62
  污染物指标氨氮的末端治理技术是中和法+氧化还原法+化学沉淀法，其效率为62，末端治理设施实际运行率（k值）计算公式为K=废水处理设施正常运行时间（小时/年）/企业正常生产时间（小时/年）。原文件中描述污染物类别为废水，污染物指标为氨氮，此处对其进行了匹配工作，将其匹配到LCAflow库里面相最符合的流，污染物指标备注为氨氮
- Ammonia Nitrogen: 0.0261149
  the Technical of end-of-pipe management technology for pollution Ammonia NitrogenisNeutralization + chemical precipitation，Its Technical efficiency of end-of-pipe management52
  污染物指标氨氮的末端治理技术是中和法+化学沉淀法，其效率为52，末端治理设施实际运行率（k值）计算公式为K=废水处理设施正常运行时间（小时/年）/企业正常生产时间（小时/年）。原文件中描述污染物类别为废水，污染物指标为氨氮，此处对其进行了匹配工作，将其匹配到LCAflow库里面相最符合的流，污染物指标备注为氨氮
- Nitrogen, organic bound: 0.030921
  the Technical of end-of-pipe management technology for pollution Nitrogen, organic boundisNeutralization + redox process + chemical precipitation + membrane separation，Its Technical efficiency of end-of-pipe management70
  污染物指标总氮的末端治理技术是中和法+氧化还原法+化学沉淀法+膜分离法，其效率为70，末端治理设施实际运行率（k值）计算公式为K=废水处理设施正常运行时间（小时/年）/企业正常生产时间（小时/年）。原文件中描述污染物类别为废水，污染物指标为总氮，此处对其进行了匹配工作，将其匹配到LCAflow库里面相最符合的流，污染物指标备注为总氮
- Ammonia Nitrogen: 0.0348198
  the Technical of end-of-pipe management technology for pollution Ammonia NitrogenisRedox process + chemical precipitation，Its Technical efficiency of end-of-pipe management36
  污染物指标氨氮的末端治理技术是氧化还原法+化学沉淀法，其效率为36，末端治理设施实际运行率（k值）计算公式为K=废水处理设施正常运行时间（小时/年）/企业正常生产时间（小时/年）。原文件中描述污染物类别为废水，污染物指标为氨氮，此处对其进行了匹配工作，将其匹配到LCAflow库里面相最符合的流，污染物指标备注为氨氮
- particles (PM2.5 - PM10): 35.6316
  the Technical of end-of-pipe management technology for pollution particles (PM2.5 - PM10)isWet precipitation (spray tower)，Its Technical efficiency of end-of-pipe management80
  污染物指标颗粒物的末端治理技术是湿式除尘法（喷淋塔），其效率为80，末端治理设施实际运行率（k值）计算公式为k=治理设施运行时间（小时/年）/正常生产时间（小时/年）。原文件中描述污染物类别为废气，污染物指标为颗粒物，此处对其进行了匹配工作，将其匹配到LCAflow库里面相最符合的流，污染物指标备注为颗粒物
- Nitrogen, organic bound: 0.0391666
  the Technical of end-of-pipe management technology for pollution Nitrogen, organic boundisNeutralization + redox process + chemical precipitation，Its Technical efficiency of end-of-pipe management62
  污染物指标总氮的末端治理技术是中和法+氧化还原法+化学沉淀法，其效率为62，末端治理设施实际运行率（k值）计算公式为K=废水处理设施正常运行时间（小时/年）/企业正常生产时间（小时/年）。原文件中描述污染物类别为废水，污染物指标为总氮，此处对其进行了匹配工作，将其匹配到LCAflow库里面相最符合的流，污染物指标备注为总氮
- particles (PM2.5 - PM10): 44.5395
  the Technical of end-of-pipe management technology for pollution particles (PM2.5 - PM10)isOrganic solution cycle absorption method, metal oxide absorption method, ammonia absorption method, sodium alkali method, hydrogen peroxide desulfurization method，Its Technical efficiency of end-of-pipe management75
  污染物指标颗粒物的末端治理技术是有机溶液循环吸收法、金属氧化物吸收法、氨法吸收法、钠碱法、双氧水脱硫法，其效率为75，末端治理设施实际运行率（k值）计算公式为k=治理设施运行时间（小时/年）/正常生产时间（小时/年）。原文件中描述污染物类别为废气，污染物指标为颗粒物，此处对其进行了匹配工作，将其匹配到LCAflow库里面相最符合的流，污染物指标备注为颗粒物
- Nitrogen, organic bound: 0.0494736
  the Technical of end-of-pipe management technology for pollution Nitrogen, organic boundisNeutralization + chemical precipitation，Its Technical efficiency of end-of-pipe management52
  污染物指标总氮的末端治理技术是中和法+化学沉淀法，其效率为52，末端治理设施实际运行率（k值）计算公式为K=废水处理设施正常运行时间（小时/年）/企业正常生产时间（小时/年）。原文件中描述污染物类别为废水，污染物指标为总氮，此处对其进行了匹配工作，将其匹配到LCAflow库里面相最符合的流，污染物指标备注为总氮
- particles (PM2.5 - PM10): 62.3553
  the Technical of end-of-pipe management technology for pollution particles (PM2.5 - PM10)isCyclone dust collection，Its Technical efficiency of end-of-pipe management65
  污染物指标颗粒物的末端治理技术是旋风收尘，其效率为65，末端治理设施实际运行率（k值）计算公式为k=治理设施运行时间（小时/年）/正常生产时间（小时/年）。原文件中描述污染物类别为废气，污染物指标为颗粒物，此处对其进行了匹配工作，将其匹配到LCAflow库里面相最符合的流，污染物指标备注为颗粒物
- Nitrogen, organic bound: 0.0659648
  the Technical of end-of-pipe management technology for pollution Nitrogen, organic boundisRedox process + chemical precipitation，Its Technical efficiency of end-of-pipe management36
  污染物指标总氮的末端治理技术是氧化还原法+化学沉淀法，其效率为36，末端治理设施实际运行率（k值）计算公式为K=废水处理设施正常运行时间（小时/年）/企业正常生产时间（小时/年）。原文件中描述污染物类别为废水，污染物指标为总氮，此处对其进行了匹配工作，将其匹配到LCAflow库里面相最符合的流，污染物指标备注为总氮
- particles (PM2.5 - PM10): 89.079
  the Technical of end-of-pipe management technology for pollution particles (PM2.5 - PM10)isLime/limestone-gypsum method, activated coke adsorption method，Its Technical efficiency of end-of-pipe management50
  污染物指标颗粒物的末端治理技术是石灰/石灰石-石膏法、活性焦吸附法、，其效率为50，末端治理设施实际运行率（k值）计算公式为k=治理设施运行时间（小时/年）/正常生产时间（小时/年）。原文件中描述污染物类别为废气，污染物指标为颗粒物，此处对其进行了匹配工作，将其匹配到LCAflow库里面相最符合的流，污染物指标备注为颗粒物
- cadmium: 0.122741
  the Technical of end-of-pipe management technology for pollution cadmiumisSame as PM
  污染物指标镉的末端治理技术是同颗粒物，末端治理设施实际运行率（k值）计算公式为k=治理设施运行时间（小时/年）/正常生产时间（小时/年）。原文件中描述污染物类别为废气，污染物指标为镉，此处对其进行了匹配工作，将其匹配到LCAflow库里面相最符合的流，污染物指标备注为镉
- chemical oxygen demand: 0.125196
  the Technical of end-of-pipe management technology for pollution chemical oxygen demandisNeutralization + redox process + chemical precipitation + membrane separation，Its Technical efficiency of end-of-pipe management70
  污染物指标化学需氧量的末端治理技术是中和法+氧化还原法+化学沉淀法+膜分离法，其效率为70，末端治理设施实际运行率（k值）计算公式为K=废水处理设施正常运行时间（小时/年）/企业正常生产时间（小时/年）。原文件中描述污染物类别为废水，污染物指标为化学需氧量，此处对其进行了匹配工作，将其匹配到LCAflow库里面相最符合的流，污染物指标备注为化学需氧量
- chemical oxygen demand: 0.158582
  the Technical of end-of-pipe management technology for pollution chemical oxygen demandisNeutralization + redox process + chemical precipitation，Its Technical efficiency of end-of-pipe management62
  污染物指标化学需氧量的末端治理技术是中和法+氧化还原法+化学沉淀法，其效率为62，末端治理设施实际运行率（k值）计算公式为K=废水处理设施正常运行时间（小时/年）/企业正常生产时间（小时/年）。原文件中描述污染物类别为废水，污染物指标为化学需氧量，此处对其进行了匹配工作，将其匹配到LCAflow库里面相最符合的流，污染物指标备注为化学需氧量
- chemical oxygen demand: 0.200314
  the Technical of end-of-pipe management technology for pollution chemical oxygen demandisNeutralization + chemical precipitation，Its Technical efficiency of end-of-pipe management52
  污染物指标化学需氧量的末端治理技术是中和法+化学沉淀法，其效率为52，末端治理设施实际运行率（k值）计算公式为K=废水处理设施正常运行时间（小时/年）/企业正常生产时间（小时/年）。原文件中描述污染物类别为废水，污染物指标为化学需氧量，此处对其进行了匹配工作，将其匹配到LCAflow库里面相最符合的流，污染物指标备注为化学需氧量
- chemical oxygen demand: 0.267085
  the Technical of end-of-pipe management technology for pollution chemical oxygen demandisRedox process + chemical precipitation，Its Technical efficiency of end-of-pipe management36
  污染物指标化学需氧量的末端治理技术是氧化还原法+化学沉淀法，其效率为36，末端治理设施实际运行率（k值）计算公式为K=废水处理设施正常运行时间（小时/年）/企业正常生产时间（小时/年）。原文件中描述污染物类别为废水，污染物指标为化学需氧量，此处对其进行了匹配工作，将其匹配到LCAflow库里面相最符合的流，污染物指标备注为化学需氧量
- arsenic: 0.2991
  the Technical of end-of-pipe management technology for pollution arsenicisSame as PM
  污染物指标砷的末端治理技术是同颗粒物，末端治理设施实际运行率（k值）计算公式为k=治理设施运行时间（小时/年）/正常生产时间（小时/年）。原文件中描述污染物类别为废气，污染物指标为砷，此处对其进行了匹配工作，将其匹配到LCAflow库里面相最符合的流，污染物指标备注为砷
- lead: 3.80625
  the Technical of end-of-pipe management technology for pollution leadisSame as PM
  污染物指标铅的末端治理技术是同颗粒物，末端治理设施实际运行率（k值）计算公式为k=治理设施运行时间（小时/年）/正常生产时间（小时/年）。原文件中描述污染物类别为废气，污染物指标为铅，此处对其进行了匹配工作，将其匹配到LCAflow库里面相最符合的流，污染物指标备注为铅
- Exhaust gas: 50900
  the Technical of end-of-pipe management technology for pollution Exhaust gasis/
  污染物指标工业废气量的末端治理技术是/，末端治理设施实际运行率（k值）计算公式为k=治理设施运行时间（小时/年）/正常生产时间（小时/年）。原文件中描述污染物类别为废气，污染物指标为工业废气量，此处对其进行了匹配工作，将其匹配到LCAflow库里面相最符合的流，污染物指标备注为工业废气量

## Use advice
This dataset is derived from the Pollution Source Census Report and contains information on pollution emissions and related products. However, it does not include data on energy or chemical consumption, nor does it provide information on waste or co-product generation. When utilizing this dataset, please supplement the missing data based on actual conditions before use
该数据集来源于污染源普查报告，包含污染物排放及相关产品信息，但不包含能源或化学品消耗数据，也不提供废弃物或共生产物产生信息。在使用该数据集时，请根据实际情况补充缺失数据后再使用。

## Review details
Inventory: The internal review was done by several iteration steps concerning raw data validation, raw data documentation, representativity, completeness and consistency of modelling with regard to ISO 14040 and 14044.
清单： 内部审查通过几个迭代步骤完成，涉及原始数据验证、原始数据记录、代表性、完整性、与 ISO 14040 和 14044 有关的建模的一致性。

## Data sources
- 第二次全国污染源普查产排污核算系数手册（试用版）,四级代码3212文件，在完整版文件中第4878页
