# Livestock and poultry breeding ; transportation stage ; live pig retail

Dataset: ILCD process, Unit process, single operation
Geography: SD-CN
Reference year: 2014
Classification: Unit processes / Transport services / Road
Functional unit: 1kg pork
Generated by: Rui Yang, 1632707028@qq.com
Owner: Tiangong LCI Data Working Group
Review: Dependent internal review by Tiangong LCI Data Working Group
Amounts: no units in this file; such an amount is in the reference unit of its flow, which a separate flow dataset defines
copyright: false
licenseType: Free of charge for all users and uses

## General comment
The transportation stage mainly considers the transportation of feed, and the transportation mode is mainly road transportation. The damage caused to the surrounding environment of the road during the transportation process, the feed loss generated during the transportation process and other service costs (such as: high-speed fees, refueling fees, repair costs, etc.) are not considered, and only the exhaust emission during the vehicle transportation process is considered.

## Geography
This study was conducted from 2014 to 2015, aiming at livestock and poultry feeding cycle, meat ratio, feed formula, feed consumption, coal and electricity consumption, etc. Has been to Shandong Gaomi Zhengda pig farm, Laixi City Zhishuang dairy farm, Jimo city Duan Bolan town Jiangjiapo village pig farm, Jimo City Liujiazhuang town livestock farm, Rizhao City Changling town Guanzhuang village, Juxian County Zhailihe town Dongxing Agriculture and animal husbandry company, Juxian Qiaoshan town east Chen dairy farm, Juxian Qiaoshan town Liu Jiayi water pig farm, Zhucheng Foreign Trade Co., LTD. Phoenix parents breeding duck farm, Xinjiang Fukang Hongfa Breeding professional cooperative, Jiuyun Street Town Xuhong laying Chicken cooperative, Jiuyun Street Town Liuyun Village self-contained breeding farm, China Australia Holding Group Co., LTD., Dezhou City Qingyun County Wayu Village, Shandong Province Qingyun County four Liu community beef cattle breeding base, Dezhou City Qingyun Qingnian chicken breeding base, Qingyun County Yongli Poultry layer breeding company, Qingyun County Xingchen youth chicken breeding Field research was carried out by professional breeding cooperatives, Qingyun Dongtai broiler breeding cooperatives, Hebei Yanshan Boyuan Feed Co., LTD., Yanshan Da Chinese Feed Co., LTD., Wudi Liuhe Feed Co., LTD., and China-Australia Oriental Hope Feed Co., LTD.

## Technology and included processes
In this paper, the life cycle of livestock and poultry farming is divided into six stages: feed crop planting, feed processing, livestock and poultry raising, manure treatment, slaughter and transportation. The specific life cycle process of livestock and poultry breeding is shown in Figure 2-1. Due to the lack of some data and the limitations of basic conditions, the production, transportation and use of pesticides, mulch and feed additives have not been analyzed, and the environmental impact caused by other related infrastructure construction, transport production and labor costs is no longer considered.

## Technical purpose
The industrial process described pertains to livestock and poultry breeding and is focused on the transportation stage of live pigs for retail purposes. The primary use of this data set is to assess the environmental impact of transporting feed for these animals, exclusively considering the road transport mechanism and its associated tailpipe emissions. Therefore, this data set may be used for environmental impact assessments in the agricultural sector, specifically regarding the transportation impacts on air quality due to exhaust emissions from vehicles used in the transport of livestock feed.

## Reference product
- feed: 3.99103; estimated
  假设运输过程中没有饲料的损耗

## Inputs
- feed: 3.99103; calculated
  生产 1 功能单位畜禽产品，所对应的运输阶段产生污染物排放量,通过污染物排放量和排放系数求得。

## Outputs
- carbon monoxide (fossil): 0.00178; measured
  Pig retail investors
- hydrocarbons (unspecified): 0.00029; measured
  Pig retail investors
- nitrogen, total (excluding N2): 0.00137; measured
  Pig retail investors

## Use advice
When utilizing this data set for life cycle assessment (LCA) of the transportation stage in live pig retail operations, researchers should note the following: 1. Only the exhaust emissions associated with road transportation of livestock feed are considered; other factors such as feed loss, road damage, and service costs are not included. 2. The data set pertains to the specific field research conducted between 2014 and 2015 and may not be reflective of other time periods or locations. 3. Proper allocation of impacts in multi-output processes should be ensured when using this data. 4. Assumptions made within the data set concerning energy consumption should be thoroughly reviewed and aligned with the specific circumstances of the assessment.

## Review details
Inventory: The internal review was done by several iteration steps concerning raw data validation, raw data documentation, representativity, completeness and consistency of modelling with regard to ISO 14040 and 14044.

## Data sources
- 周景月. 基于生命周期评价的畜禽养殖环境影响分析. (青岛科技大学, 2017).
