# Northwest (Gaotai, Zhangye) Corn Production ; Harvesting

Dataset: ILCD process, Unit process, single operation
Geography: ZY-GS-CN
Reference year: 2012
Valid until: 2012
Classification: Unit processes / Materials production / Food and renewable raw materials
Functional unit: 1 t
LCI method principle: Attributional
LCI method approaches: Consequential
Generated by: Haoran Zhang, hrzhang@whu.edu.cn
Owner: Tiangong LCI Data Working Group
Review: Dependent internal review by Tiangong LCI Data Working Group
Amounts: no units in this file; such an amount is in the reference unit of its flow, which a separate flow dataset defines
copyright: false
licenseType: Free of charge for all users and uses

## General comment
The article is based on research data collected from farmers and utilizes the theory of agricultural carbon footprint and life cycle assessment to quantitatively study the size and composition of the carbon footprint of the rice-wheat rotation system in the downstream area of the Yangtze River. Additionally, it further analyzes the factors that influence the carbon footprint.

## Geography
Gaotai County

## Technology and included processes
LCA method is used to evaluate the agricultural system of seed corn production, which takes the whole process of product treatment from input to final output as the research object to conduct quantitative analysis and comparison, so as to evaluate the environmental impact of seed corn production [13]. In this paper, the mass of seed corn 1 t is used as the functional unit. The boundary of the system starts from the production of fertilizer and electricity, and ends from the output of agricultural products and pollutants in the crop planting process. In other words, there are two production systems, namely the agricultural material production system and the crop production system

## Technical purpose
The data set is intended for use in the environmental impact assessment of agricultural processes, specifically focusing on the corn production process in the Gaotai County of the Zhangye City, northwest China. It is relevant for analyzing and optimizing the carbon footprint of corn cultivation, which is part of a cropping system in agricultural land use, particularly in the context of the rice-wheat rotation system prevalent in the downstream area of the Yangtze River.

## Reference product
- maize grain: 1; measured

## Inputs
- Electricity: 12399.9; measured
- unspecified: 800; measured
- water: 361.55; measured

## Outputs
All rows: measured
- carbon dioxide (fossil),carbon dioxide (fossil): 780.61
- carbon monoxide (fossil): 0.33
- nitrous oxide: 4.1
- particles (PM10): 0.37
- sulfur oxides: 2.31
- ammonia: 31.01
- Nitrogen oxides: 2.67
- atrazine: 0.12
- methyl parathion: 0.09
- dimethoate: 0.07
- copper: 0.0002
- cadmium: 1e-5
- lead: 5e-5
- zinc: 8e-5

## Deviations from the LCI method approaches
The system boundary starts with the production of chemical fertilizers and electricity, and the terminal boundary is the output of agricultural products and pollutants during the crop planting process. There are two production systems: the agricultural input production system and the crop production system.

## Data selection and combination
The data in this text comes from the statistical sampling survey of Zhangye city, and additional data obtained from a special survey conducted during the 2012 input-output table. In Ganzhou district, Jiantan town, Dangzhai village, and Xiaoman village were selected; in Linze county, Shahe town and Pingchuan town were selected; in Gaotai county, Xuanhua town, Xiangdao village, and Luotuo city township were chosen. After excluding incomplete data, a total of 72 household's effective data was obtained

## Data treatment and extrapolations
Using a combination of stratified random sampling and typical sample selection methods, data were collected through questionnaire surveys and structured interviews with typical samples. The survey content revolves around all input production elements and economic costs, as well as resource consumption, etc. The output mainly focuses on product yield and the current economic value, as well as the quantity of waste generated and its disposal methods.

## Sampling procedure
It is determined that the survey sample size in the three counties and districts of Zhangye city needs to add 80 household surveys. The composition of the samples maintains the principle of being consistent with the local agricultural added value ratio. The corresponding survey household numbers are determined according to the agricultural added value ratio of 7:5:8, that is, 28, 20, and 32 households are respectively drawn from the three counties and districts.

## Use advice
This data should be used with attention to the methodological framework outlined by agricultural carbon footprint theory and life cycle assessment practices. Ensure that all input production elements, economic costs, and resource consumption reported are contextually applicable to the geographical area and agricultural system studied. The system boundaries are defined from the production of chemical fertilizers and electricity to the output of crops and pollutants. Data users must consider appropriate allocation procedures when dealing with co-products or waste treatment and include these considerations when modeling the use phase behavior of the agricultural product.

## Review details
Inventory: The internal review was done by several iteration steps concerning raw data validation, raw data documentation, representativity, completeness and consistency of modelling with regard to ISO 14040 and 14044.

## Data sources
- 杨肖,钟方雷,郭爱君,王琼.干旱区绿洲制种玉米生命周期环境影响评价——以张掖市为例[J].农业环境科学学报,2017,36(8):1664-1671
