# cement production;cement, portland cement;new dry process precalciner kiln, 4000 t/d

Dataset: ILCD process, Unit process, black box
Geography: CN
Classification: Unit processes / Materials production / Other mineralic materials
Generated by: #REF!, ysqsophia@gmail.com
Owner: Tiangong LCI Data Working Group
Review: Dependent internal review by Tiangong LCI Data Working Group
Amounts: no units in this file; such an amount is in the reference unit of its flow, which a separate flow dataset defines
copyright: false
licenseType: Free of charge for all users and uses

## General comment
The new dry pre-decomposition cement production model is selected.

## Technology and included processes
This article selects a pre-decomposition kiln-drying cement production model. The new dry pre-decomposition cement production technology is based on suspension preheating and pre-decomposition technology. It is a production technology that is more in line with environmental protection requirements and meets high productivity requirements, and has become the future development trend of China's cement industry. Therefore, the selection of new dry pre-decomposition cement production technology as cement model production technology has advanced and environmentally friendly requirements.

## Technical purpose
The described process pertains to the production of Portland cement using the new dry process precalciner kiln technology, which is characterized by its suspension preheating and pre-decomposition. This technology meets environmental protection standards and high productivity demands, making it a preferred technique in China's cement industry. The Portland cement produced is typically used in construction as a major component in concrete, mortars, stucco, and non-specialty grouts.

## Model description
The life cycle functional unit is selected as 1t of cement to construct the life cycle model.The cement industry system boundary includes the production of cement, the production and transportation of raw materials, and the production of electricity, but does not include the use and processing of cement.

## Reference product
- cement, common portland cement: 1000
  Silicate cement

## Inputs
- limestone, crushed, for mill: 1264.08
  Limestone
- clay: 227.28
  Clay
- iron, powder: 35.8
  Iron powder
- gypsum stone (CaSO4-dihydrate): 50
  Gypsum. The standard values of GB-175-2007 General Portland Cement in China are used for each component of the cement.
- hard coal; 26.3 MJ/kg: 108.3
  Coal. The statistical values of Chinese production lines are used, and the standard coal consumption for large and medium-sized precalciner kilns is 114 kg/t clinker. The coal consumption can also be calculated based on the chemical composition of coal ash and the industrial analysis values of coal.
- Electricity: 459.36
  Electricity consumption. The average level of domestic electricity consumption in China is used. For dry-process cement production lines, the electricity consumption for milling operations accounts for more than 60% of the total electricity consumption, with raw material milling accounting for about 30% and cement milling accounting for about 40%. Due to limited data on raw material mining, a simplified treatment is adopted for various raw materials, and the electricity consumption data of 13.89 kWh/t raw materials are used. For different types of blended cement, the electricity consumption for milling different raw materials varies due to differences in their shapes and properties. The estimation is based on the percentage of electricity consumption for milling raw materials in the United States.

## Outputs
- carbon dioxide (fossil): 920
  CO2. The CO2 emissions during the cement production stage come from two parts: one is the decomposition of calcium carbonate and magnesium carbonate in the raw materials during the calcination process, and the other is the release of CO2 from coal combustion as fuel. The formulas for CO2 emissions from raw materials are: CaCO3→CaO+CO2; MgCO3→MgO+CO2. The emission factor for CO2 from coal combustion is based on the carbon emission coefficient from the Chinese Academy of Engineering, which is 2.4933 kg CO2 per kg of standard coal.
- sulfur dioxide: 0.497
  SO2. The emission of SO2 is based on the results of the first national survey of pollution sources in the Chinese cement industry (SO2 0.066kg/t clinker).
- Nitrogen oxides: 2.67
  NOx. The emission of NOx is based on the results of the first national survey of pollution sources in the Chinese cement industry (NOx 1.584kg/t clinker).
- particles (> PM10): 0.345
  Dust, with an unspecified particle size, is treated as PM > 10 micrometers in diameter. The emissions of dust during cement production are based on the upper limit values of the Chinese cement industry atmospheric pollutant emission standards. According to the dust emission concentration from different equipment in cement production, the dust emission quantity from each production stage can be calculated. Among them, the dust emission from raw material grinding accounts for approximately 55% of the total, cement grinding accounts for about 20%, coal preparation stage accounts for 13%, and clinker calcination process accounts for 12%.
- chemical oxygen demand: 0.0125
  COD. The emission of COD is based on the results of the first national survey of pollution sources in the Chinese cement industry (COD 0.06g/t clinker).
- Oils, unspecified: 0.373
  Oil
- methane (fossil): 1.04
  Methane
- mercury: 0.0126
  Mercury

## Data selection and combination
Pollutant emission data from limestone and gypsum mining come from the China Life Cycle Reference Database (CLCD). Due to the lack of mining data for clay and iron ore and the small amount of mining, the pollutant emission data from limestone mining were used as estimates. The pollutant emission data from coal mining adopt the raw coal mining data from the China Life Cycle Reference Database (CLCD).The power production pollutant emission data uses the national average grid power mixing and transmission data from the China Life Cycle Reference Database (CLCD).The transportation stage considers the transportation of all raw materials required for cement production, including limestone, clay, iron powder, gypsum, coal and industrial waste. For the convenience of calculation, a diesel truck with a load of 10t on highway transportation is taken as an example. It is assumed that the average transportation of all raw materials The distance is 100km. The pollutant emission inventory data of diesel trucks with a load of 10 tons in the China Life Cycle Reference Data (CLCD) are used.

## Use advice
To correctly apply the provided LCA data, users must adhere to the scope defined by the system boundary, which includes cement production, raw material production, and transportation, as well as electricity production. It is imperative to model the transportation phase based on an average distance of 100km for all raw materials using the reference emissions data for a 10-tonne diesel truck. Since only limestone emission data are available, these figures are used to estimate the emissions from the mining of less quantifiable materials like clay and iron ore. Users should apply the power production emissions data from the national average electric grid mix. Make sure to only include the stages mentioned and not the use and processing of cement when modeling the system.

## Review details
Inventory: The internal review was done by several iteration steps concerning raw data validation, raw data documentation, representativity, completeness and consistency of modelling with regard to ISO 14040 and 14044.

## Data sources
- 徐小宁. (2013). 中国水泥工业的生命周期评价 [硕士, 大连理工大学].
