# Naphtha fraction, diesel fraction, bitumen ; Coal tar, hydrogen ; Suspended bed hydrocracking process ; All sizes; NESPS2 / 石脑油组分、柴油组分、沥青 ; 煤焦油、氢气 ; 悬浮床加氢裂化工艺 ; 所有规模 ; 全国第二次污染普查数据

Dataset: ILCD process, Unit process, single operation
Geography: CN
Reference year: 2019
Classification: Reference Parameters / Energy carriers and technologies / Energetic raw materials
Generated by: The data was created by the Office of the Second National Pollution Source Census of the Ministry of Ecology and Environment, and the data was organized by the TianGong Plan team for ILCD format / 生态环境部第二次全国污染源普查工作办公室创建数据，天工计划团队常慧敏整理数据为ILCD格式
Owner: Tiangong LCI Data Working Group / 天工LCI数据工作小组
Review: Dependent internal review by Tiangong LCI Data Working Group / 天工LCI数据工作小组
Amounts: no units in this file; such an amount is in the reference unit of its flow, which a separate flow dataset defines
copyright: false
licenseType: Free of charge for all users and uses

## General comment
the Technical of end-of-pipe management technology for pollution Exhaust gasis/

## Technical purpose
本生命周期评估（LCA）数据集描述了悬浮床加氢裂化工艺在工业上的应用，用于从煤焦油生产石脑油、柴油和沥青等石油组分，同时产生氢气。工艺涉及各种规模的设施。数据集还包括治理污染的末端处理技术信息，如废水和化学需氧量、酚类物质、氨氮、石油相关废物、废气、颗粒物、氮氧化物、二氧化硫和挥发性有机化合物的排放。这些污染管理技术的效率不同，以生化处理为主，效率较高，除了部分直接排放或使用其他方法处理的废物流，效率较低或为零。

## Reference product
- Coal tar: 1000; input; calculated
  源文件中描述为为煤焦油、氢气，此处对其进行了匹配工作，将其匹配到LCAflow库里面相最符合的流，污染物指标备注为工业废水量

## Outputs
All rows: calculated
- Waste water: 438
  the Technical of end-of-pipe management technology for pollution Waste wateris/
  污染物指标工业废水量的末端治理技术是/，末端治理设施实际运行率（k值）计算公式为/。原文件中描述污染物类别为废水，污染物指标为工业废水量，此处对其进行了匹配工作，将其匹配到LCAflow库里面相最符合的流，污染物指标备注为工业废水量
- Petroleum-related waste: 0.00084
  the Technical of end-of-pipe management technology for pollution Petroleum-related wasteisOthers (biochemical treatment)，Its Technical efficiency of end-of-pipe management98
  污染物指标石油类的末端治理技术是其他（生化处理），其效率为98，末端治理设施实际运行率（k值）计算公式为k=污水治理设施运行时间（小时/年）/正常生产时间（小时/年）。原文件中描述污染物类别为废水，污染物指标为石油类，此处对其进行了匹配工作，将其匹配到LCAflow库里面相最符合的流，污染物指标备注为石油类
- volatile organic compound: 0.010643
  the Technical of end-of-pipe management technology for pollution volatile organic compoundisOthers (wastewater treatment station: capped collection + UV photocatalytic oxidation)，Its Technical efficiency of end-of-pipe management71
  污染物指标挥发性有机物的末端治理技术是其他（废水处理站：加盖收集+UV光催化氧化），其效率为71，末端治理设施实际运行率（k值）计算公式为k=废气治理设施运行时间（小时/年）/正常生产时间（小时/年）。原文件中描述污染物类别为废气，污染物指标为挥发性有机物，此处对其进行了匹配工作，将其匹配到LCAflow库里面相最符合的流，污染物指标备注为挥发性有机物
- Ammonia Nitrogen: 0.01134
  the Technical of end-of-pipe management technology for pollution Ammonia NitrogenisOthers (biochemical treatment)，Its Technical efficiency of end-of-pipe management98
  污染物指标氨氮的末端治理技术是其他（生化处理），其效率为98，末端治理设施实际运行率（k值）计算公式为k=污水治理设施运行时间（小时/年）/正常生产时间（小时/年）。原文件中描述污染物类别为废水，污染物指标为氨氮，此处对其进行了匹配工作，将其匹配到LCAflow库里面相最符合的流，污染物指标备注为氨氮
- particles (PM2.5 - PM10): 0.0128
  the Technical of end-of-pipe management technology for pollution particles (PM2.5 - PM10)isOthers (direct discharge)，Its Technical efficiency of end-of-pipe management0
  污染物指标颗粒物的末端治理技术是其他（直接排放），其效率为0，末端治理设施实际运行率（k值）计算公式为/。原文件中描述污染物类别为废气，污染物指标为颗粒物，此处对其进行了匹配工作，将其匹配到LCAflow库里面相最符合的流，污染物指标备注为颗粒物
- phenol: 0.01623
  the Technical of end-of-pipe management technology for pollution phenolisOthers (biochemical treatment)，Its Technical efficiency of end-of-pipe management99
  污染物指标挥发酚的末端治理技术是其他（生化处理），其效率为99，末端治理设施实际运行率（k值）计算公式为k=污水治理设施运行时间（小时/年）/正常生产时间（小时/年）。原文件中描述污染物类别为废水，污染物指标为挥发酚，此处对其进行了匹配工作，将其匹配到LCAflow库里面相最符合的流，污染物指标备注为挥发酚
- sulfur dioxide: 0.0267
  the Technical of end-of-pipe management technology for pollution sulfur dioxideisOthers (direct discharge)，Its Technical efficiency of end-of-pipe management0
  污染物指标二氧化硫的末端治理技术是其他（直接排放），其效率为0，末端治理设施实际运行率（k值）计算公式为/。原文件中描述污染物类别为废气，污染物指标为二氧化硫，此处对其进行了匹配工作，将其匹配到LCAflow库里面相最符合的流，污染物指标备注为二氧化硫
- volatile organic compound: 0.0367
  the Technical of end-of-pipe management technology for pollution volatile organic compoundisOthers (direct discharge)，Its Technical efficiency of end-of-pipe management0
  污染物指标挥发性有机物的末端治理技术是其他（直接排放），其效率为0。原文件中描述污染物类别为废气，污染物指标为挥发性有机物，此处对其进行了匹配工作，将其匹配到LCAflow库里面相最符合的流，污染物指标备注为挥发性有机物
- ammonia: 0.058898
  the Technical of end-of-pipe management technology for pollution ammoniaisOthers (wastewater treatment station: capped collection + biological method + adsorption)，Its Technical efficiency of end-of-pipe management2
  污染物指标氨的末端治理技术是其他（废水处理站：加盖收集+生物法+吸附），其效率为2，末端治理设施实际运行率（k值）计算公式为k=废气治理设施运行时间（小时/年）/正常生产时间（小时/年）。原文件中描述污染物类别为废气，污染物指标为氨，此处对其进行了匹配工作，将其匹配到LCAflow库里面相最符合的流，污染物指标备注为氨
- ammonia: 0.059499
  the Technical of end-of-pipe management technology for pollution ammoniaisOthers (wastewater treatment station: capped collection + UV photocatalytic oxidation)，Its Technical efficiency of end-of-pipe management1
  污染物指标氨的末端治理技术是其他（废水处理站：加盖收集+UV光催化氧化），其效率为1，末端治理设施实际运行率（k值）计算公式为k=废气治理设施运行时间（小时/年）/正常生产时间（小时/年）。原文件中描述污染物类别为废气，污染物指标为氨，此处对其进行了匹配工作，将其匹配到LCAflow库里面相最符合的流，污染物指标备注为氨
- ammonia: 0.0601
  the Technical of end-of-pipe management technology for pollution ammoniaisOthers (direct discharge)，Its Technical efficiency of end-of-pipe management0
  污染物指标氨的末端治理技术是其他（直接排放），其效率为0，末端治理设施实际运行率（k值）计算公式为/。原文件中描述污染物类别为废气，污染物指标为氨，此处对其进行了匹配工作，将其匹配到LCAflow库里面相最符合的流，污染物指标备注为氨
- Nitrogen oxides: 0.0623
  the Technical of end-of-pipe management technology for pollution Nitrogen oxidesisOthers (direct discharge)，Its Technical efficiency of end-of-pipe management0
  污染物指标氮氧化物的末端治理技术是其他（直接排放），其效率为0，末端治理设施实际运行率（k值）计算公式为/。原文件中描述污染物类别为废气，污染物指标为氮氧化物，此处对其进行了匹配工作，将其匹配到LCAflow库里面相最符合的流，污染物指标备注为氮氧化物
- chemical oxygen demand: 0.06389
  the Technical of end-of-pipe management technology for pollution chemical oxygen demandisOthers (biochemical treatment)，Its Technical efficiency of end-of-pipe management99
  污染物指标化学需氧量的末端治理技术是其他（生化处理），其效率为99，末端治理设施实际运行率（k值）计算公式为k=污水治理设施运行时间（小时/年）/正常生产时间（小时/年）。原文件中描述污染物类别为废水，污染物指标为化学需氧量，此处对其进行了匹配工作，将其匹配到LCAflow库里面相最符合的流，污染物指标备注为化学需氧量
- Exhaust gas: 746
  the Technical of end-of-pipe management technology for pollution Exhaust gasis/
  污染物指标工业废气量的末端治理技术是/，末端治理设施实际运行率（k值）计算公式为/。原文件中描述污染物类别为废气，污染物指标为工业废气量，此处对其进行了匹配工作，将其匹配到LCAflow库里面相最符合的流，污染物指标备注为工业废气量

## Use advice
This dataset is derived from the Pollution Source Census Report and contains information on pollution emissions and related products. However, it does not include data on energy or chemical consumption, nor does it provide information on waste or co-product generation. When utilizing this dataset, please supplement the missing data based on actual conditions before use
该数据集来源于污染源普查报告，包含污染物排放及相关产品信息，但不包含能源或化学品消耗数据，也不提供废弃物或共生产物产生信息。在使用该数据集时，请根据实际情况补充缺失数据后再使用。

## Review details
Inventory: The internal review was done by several iteration steps concerning raw data validation, raw data documentation, representativity, completeness and consistency of modelling with regard to ISO 14040 and 14044.
清单： 内部审查通过几个迭代步骤完成，涉及原始数据验证、原始数据记录、代表性、完整性、与 ISO 14040 和 14044 有关的建模的一致性。

## Data sources
- 第二次全国污染源普查产排污核算系数手册（试用版）,二级代码25,四级代码2519文件，在完整版文件中第4111页
