# Deactivation of active aluminum components ; Bauxite ; Ball mill ; Secondary aluminum slag

Dataset: ILCD process, Unit process, single operation
Geography: CN
Reference year: 2021
Classification: Unit processes / Materials production / Non-energetic raw materials
Generated by: Jinliang Xie, jinliang.research@gmail.com
Owner: Tiangong LCI Data Working Group
Review: Dependent internal review by Tiangong LCI Data Working Group
Amounts: no units in this file; such an amount is in the reference unit of its flow, which a separate flow dataset defines
copyright: false
licenseType: Free of charge for all users and uses

## General comment
The parameters such as temperature and yield of these three processes were based on experimental results. Life cycle inventory data were from the average data of aluminum industries in China and calculation based on material balance. The electricity type in this study was coal based, which is in line with the actual situation of China’s aluminum industry. The metal aluminum in secondary aluminum dross (SAD) can be recovered until 1 wt % is left through grinding and sieving. Chlorides in the solution were recovered through concentration and crystallization. Calcium chloride was used to remove fluoride. Ammonia was absorbed by sulfuric acid and used to produce ammonium sulfate. Ball milling was used to promote the direct reaction between active aluminum components and water. Therefore, the ball milling scenario avoided the use of acid or alkali and achieved the deactivation of SAD, except for the use of sulfuric acid to absorb the ammonia generated during the ball milling process. Alumina and other metal oxide (mainly basic oxide) remained in the dross, making the composition and content close to bauxite-like. Therefore, all remaining dross were reused as bauxite-like in the aluminum industry, without any solid waste generated in the ball milling scenario. In this scenario, the deactivation effect of the active aluminum component was about 95%.

## Time period
Date of publication

## Technical purpose
This industrial process is designed for the treatment and reuse of secondary aluminum dross (SAD) in the aluminum industry. The process involves the recovery of metallic aluminum and the deactivation of active aluminum components in SAD through ball milling, which promotes the direct reaction between active aluminum components and water. The resulting product has a bauxite-like composition and can be reused as an alternative raw material in the aluminum production process, effectively recirculating valuable resources and reducing waste.

## Reference product
- Secondary Aluminum Dross: 1000; input; measured
  secondary aluminium dross (SAD)

## Inputs
- electricity, high voltage, aluminium industry: 1015.52; measured
- sulfuric acid: 237.67; measured
- calcium chloride: 43.82; measured
- Water, unspecified natural origin: 738; measured
  water

## Outputs
All rows: measured
- Ammonia: 0.41
- Dust from Grinding and Sieving: 0.01
  dust from grinding and sieving
- aluminium: 45.9
  aluminium (recycled resources)
- ammonium sulfate: 320.2
- carbon dioxide (fossil),carbon dioxide (fossil): 43.11
- sodium chloride, powder: 81.73
  sodium chloride
- potassium chloride: 22.49
- fluorspar: 30.82
  calcium fluoride
- bauxite: 1088.77
  bauxite (recycled resources)

## Use advice
When utilizing the life cycle assessment data of this process, users must adhere to specific methodological guidelines, including: 1) Apply cut-off rules to focus only on the SAD recovery impacts within the aluminum life cycle; 2) Set system boundaries with a cradle-to-grave perspective that concentrates on the SAD recovery, omitting the environmental impact of transportation; 3) Ensure the correct application of material balance calculations for accurate inventory data, considering the use of coal-based electricity, consistent with China's aluminum industry practices.

## Review details
Inventory: The internal review was done by several iteration steps concerning raw data validation, raw data documentation, representativity, completeness and consistency of modelling with regard to ISO 14040 and 14044.

## Data sources
- Zhu, X. & Jin, Q. Comparison of Three Emerging Dross Recovery Processes in China’s Aluminum Industry from the Perspective of Life Cycle Assessment. ACS Sustainable Chem. Eng. 9, 6776–6787 (2021).
