# Rare Earth production;Nd metal production;In-situ leaching;neodymium iron boron (NdFeB) magnet

Dataset: ILCD process, Unit process, single operation
Geography: NMG-CN
Reference year: 2014
Classification: Unit processes / Materials production / Metals and semimetals
Functional unit: The functional unit is a 1 kg NdFeB magnet
LCI method principle: Attributional
LCI method approaches: Allocation - market value; Allocation - mass
Generated by: Tao Wang, twang@iue.ac.cn
Owner: Tiangong LCI Data Working Group
Review: Dependent internal review by Tiangong LCI Data Working Group
Amounts: no units in this file; such an amount is in the reference unit of its flow, which a separate flow dataset defines
copyright: false
licenseType: Free of charge for all users and uses

## General comment
The neodymium iron boron (NdFeB) magnet produced through this industrial process is intended for use in applications requiring high-strength permanent magnets. These magnets are commonly utilized in various technological devices such as hard disk drives, wind turbines, electric vehicles, and speakers due to their superior magnetic properties.

## Geography
Bayan Obo (China)

## Technology and included processes
The basic process for Nd and Pr production is the same at all three deposits. It is identical for Nd and Pr except for the last solvent extraction step (SX5) where both are separated.

## Reference product
- neodymium: 1; calculated
  After Obo

## Inputs
- Electricity: 37.44; calculated
  Bayan Obo: energy demand, amounts of electrolyte, anodes and cathodes are estimated from literature
- Neodymium fluoride: 0.048, 0.0003 (2 entries); calculated
  Neodymium fluoride. Bayan Obo: energy demand, amounts of electrolyte, anodes and cathodes are estimated from literature
- Lithium fluoride: 0.0044; calculated
  lithium fluoride. Bayan Obo: energy demand, amounts of electrolyte, anodes and cathodes are estimated from literature
- particles (> PM10),particles (> PM10),particles (>PM10): 0.00037; calculated
  (same comment as for Electricity)
- Neodymium oxide: 1.13; calculated
  Neodymium oxide. Bayan Obo: energy demand, amounts of electrolyte, anodes and cathodes are estimated from literature
- tungsten: 0.0027; calculated
  (same comment as for Electricity)
- Graphite (anode and melting pot): 0.17; calculated
  Graphite (anode and melting pot). Bayan Obo: energy demand, amounts of electrolyte, anodes and cathodes are estimated from literature
- Fire proof bricks: 0.09; calculated
  Fire proof bricks. Bayan Obo: energy demand, amounts of electrolyte, anodes and cathodes are estimated from literature
- transport in t*km,transport in t*km: 0.19; software or database
  Bayan Obo: calculated by www.google.de/maps

## Outputs
- Waste (solid): 0.217; calculated
  Bayan Obo: melting pot, tungsten cathode, graphite anode
- carbon dioxide (fossil): 0.055; calculated
  After Obo
- carbon monoxide,carbon monoxide (fossil): 0.211; calculated
  After Obo
- HFC-116: 1.2e-5; calculated
  Bayan Obo: assumption: 10 % of the CF4 value were emitted as C2F6
- particles (> PM10),particles (> PM10),particles (>PM10): 0.052; calculated
  After Obo
- FC-14: 0.00012
  Bayan Obo: based on PCF emissions of aluminum electrolysis
- hydrogen fluoride: 4e-5; calculated
  Bayan Obo: based on mass balance

## Deviations from the LCI method approaches
In this study, an allocation method based on the market prices of REOs28 is considered. To estimate uncertainties that refer to the allocation method, a mass-based allocation is undertaken as a sensitivity analysis

## Use advice
When using the data set for the rare earth production process of neodymium and praseodymium for NdFeB magnets, please note that the allocation method is based on market prices of rare earth oxides (REOs). For users concerned with methodological consistency, consider the sensitivity analysis using mass-based allocation to estimate the impact of the allocation method on uncertainty. Ensure proper interpretation by considering this allocation method and the specific final solvent extraction step (SX5) where Nd and Pr are separated. The data is defined per functional unit of 1 kg of NdFeB magnet.

## Review details
Inventory: The internal review was done by several iteration steps concerning raw data validation, raw data documentation, representativity, completeness and consistency of modelling with regard to ISO 14040 and 14044.

## Data sources
- Marx, J., Schreiber, A., Zapp, P. & Walachowicz, F. Comparative Life Cycle Assessment of NdFeB Permanent Magnet Production from Different Rare Earth Deposits. ACS Sustainable Chem. Eng. 6, 5858–5867 (2018).
