# cement production;cement, portland cement;solid waste

Dataset: ILCD process, Unit process, black box
Geography: CN
Reference year: 1998
Classification: Unit processes / Materials production / Other mineralic materials
Generated by: #REF!, ysqsophia@gmail.com
Owner: Tiangong LCI Data Working Group
Review: Dependent internal review by Tiangong LCI Data Working Group
Amounts: no units in this file; such an amount is in the reference unit of its flow, which a separate flow dataset defines
copyright: false
licenseType: Free of charge for all users and uses

## General comment
The research objects are portland cement. The raw materials use limestone, clay and gypsum. The 1 ton of cement materials consumption: limestone 1.3t, 0.3t of clay, and 50kg of gypsum. Without considering the use of industrial waste.

## Technical purpose
The data set describes the production process of portland cement, which is intended for the construction industry. Portland cement is a fundamental ingredient used in the creation of concrete and is essential for building infrastructure, such as buildings, bridges, and roads. It serves as a binding agent in concrete mixtures, which typically include aggregates and water. This industrial process is crucial for manufacturing concrete that meets the standard requirements for a variety of construction projects.

## Model description
The functional unit is the weight of cement used in 1m^3 standard concrete. The standard concrete ratio of 1m^3 is: 270kg cement, 60kg fly ash, 1850kg aggregate. Research scope: cement manufacturing.

## Reference product
- cement, common portland cement: 1000
  Silicate cement

## Inputs
- limestone, crushed, for mill: 1300
  Limestone
- clay: 300
  Clay
- gypsum stone (CaSO4-dihydrate): 50
  Gupsum
- Electricity: 443.867
  Electricity consumption. Cement production energy consumption data comes from literature, and coal heating value is calculated based on 5500 kcal/kg and fixed carbon content is assumed to be 50%. Pollutant data for electricity production is calculated based on the average energy consumption of China's power generation, which is 0.424 kg standard coal/kWh or 24244 kJ/kg of coal heating value.
- hard coal; 26.3 MJ/kg: 204.407
  Coal consumption (i.e. raw coal consumption). Cement production energy consumption data comes from literature, and coal heating value is calculated based on 5500 kcal/kg and fixed carbon content is assumed to be 50%.

## Outputs
- carbon dioxide (fossil): 885.185
  CO2. Coal-fired CO2 emissions are calculated based on the fixed carbon content, while CO2 emissions from raw materials are calculated based on the CaO content of calcium carbonate, assuming it is 50%.
- carbon monoxide (fossil): 0.0114815
  CO. Due to lack of source, other pollutant data is calculated based on coal-fired power plants and converted based on energy consumption.
- hydrocarbons (unspecified): 0.0274074
  CxHy. Due to lack of source, other pollutant data is calculated based on coal-fired power plants and converted based on energy consumption.
- Nitrogen oxides: 1.53333
  NOx. NOx and SO2 emissions are calculated based on the average emission factor of the building materials industry.
- sulfur dioxide: 0.355556
  SO2. NOx and SO2 emissions are calculated based on the average emission factor of the building materials industry.
- particles (> PM10): 40
  Solid waste (i.e. dust), with an unspecified particle size, is treated as PM > 10 micrometers in diameter. Solid waste produced during cement production is calculated as 4% of the cement yield.

## Use advice
When using this data set for Life Cycle Assessment, note the exclusion of the utilization of industrial waste in the cement production process. Care should be taken to represent the true nature and input ratios of raw materials used, specifically 1.3t of limestone, 0.3t of clay, and 50kg of gypsum to produce 1 ton of cement. The functional unit for LCA calculations should be the weight of cement required for 1m^3 of standard concrete, considering a mixture consisting of 270kg of cement, 60kg of fly ash, and 1850kg of aggregate. For accurate environmental impact assessments, users should confine their research scope strictly to cement manufacturing and not include downstream use phases or potential recycling.

## Review details
Inventory: The internal review was done by several iteration steps concerning raw data validation, raw data documentation, representativity, completeness and consistency of modelling with regard to ISO 14040 and 14044.

## Data sources
- 刘顺妮. (2003). 水泥-混凝土体系环境影响评价及其应用研究 [博士, 武汉理工大学].
