# Beef production ; Beef cattle production

Dataset: ILCD process, Unit process, single operation
Geography: ZY-GS-CN
Reference year: 2009
Classification: Unit processes / Materials production / Food and renewable raw materials
Functional unit: 1kg of beef is a functional unit (FU), and the system boundaries of beef production include fertilizer production, feed crop (wheat, corn, soybean) cultivation, and beef cattle feeding stage.
Generated by: Rui Yang, 1632707028@qq.com
Owner: Tiangong LCI Data Working Group
Review: Dependent internal review by Tiangong LCI Data Working Group
Amounts: no units in this file; such an amount is in the reference unit of its flow, which a separate flow dataset defines
copyright: false
licenseType: Free of charge for all users and uses

## General comment
The size of the beef cattle farm is generally about 1000, the weight of the shelf cattle is generally 350~400kg, the fattening period is generally three to four months, and the weight is 500~550kg when it comes out

## Geography
The average body weight of beef cattle was 500kg, and each beef cattle drank 20~30kg of water every day, with an average of 25kg. The meat yield was about 48% of body weight.

## Technology and included processes
LCA was used to evaluate the four livestock products, and to evaluate the resource consumption, product input and environmental emissions in the whole process from raw material production to final product production. The four livestock products were evaluated in the same evaluation model, and the impact degree of a certain type of environmental impact and its comprehensive impact on the environment were qualitatively and quantitatively assessed. Finally, the environmental impact indicators of producing 1kg beef, 1kg milk, 1kg pork and 1kg chicken eggs were obtained respectively. Through analyzing and comparing the environmental load of the production of four kinds of livestock products, suggestions were provided for the adjustment of the breeding structure of China's livestock industry and the production structure of livestock products. And through the field research of advancing animal husbandry in Zhangye City, learning from the development model of advancing animal husbandry cooperative, the development model of grassland agriculture in China was discussed.

## Technical purpose
The industrial process of beef cattle production typically involves large-scale operations with an average farm size housing approximately 1000 beef cattle. The cattle, which are generally raised on a shelf system, weight about 350 to 400 kg at the onset of the fattening period, which lasts for three to four months. By the time of market delivery, these shelf cattle have an average weight of 500 to 550 kg. This type of beef production is commonly utilized for commercial meat distribution, supplying beef to both local and larger-scale markets.

## Reference product
- beef: 1; measured

## Inputs
- water: 15.2; measured
- maize grain: 13.75; measured
  corn
- wheat: 1.31; measured
- soybean: 0.94; measured
  soybeans

## Outputs
- manure: 18.25; measured
  stool

## Data selection and combination
作者对甘肃省张掖市前进牧业石岗墩牧场调查得到出栏肉牛的出栏平均体 重为 500kg，每头肉牛平均每天饮水 20~30kg，取平均值 25kg，出肉率为体重的 48%左右。

## Use advice
When utilizing this set of LCA data for beef production, please consider the specific context of the advanced beef cattle production at the Zhangye Stony Dun Ranch in the Gansu Province. The functional unit is defined as 1 kg of beef, and the system boundary encompasses fertilizer production, the cultivation of feed crops such as wheat, corn, and soybeans, and the beef cattle feeding stage. The average daily water usage per cattle, as well as the expected meat yield, should be taken into account, with 25 kg for water consumption and a 48% yield based on the cattle's body weight. It is advisable to incorporate these details during the life cycle impact assessment to ensure a comprehensive analysis of the environmental impact of the specified beef production process.

## Review details
Inventory: The internal review was done by several iteration steps concerning raw data validation, raw data documentation, representativity, completeness and consistency of modelling with regard to ISO 14040 and 14044.

## Data sources
- 魏云. 基于生命周期评价的禽畜产品环境影响评价及对策探讨. (兰州大学, 2016).
