# Eaf steelmaking ; pig iron ; crude steel

Dataset: ILCD process, Unit process, single operation
Geography: CN
Reference year: 2020
Classification: Unit processes / Materials production / Metals and semimetals
Generated by: Jiwei, 1299801467@qq.com
Owner: Tiangong LCI Data Working Group
Review: Dependent internal review by Tiangong LCI Data Working Group
Amounts: no units in this file; such an amount is in the reference unit of its flow, which a separate flow dataset defines
copyright: false
licenseType: Free of charge for all users and uses

## General comment
The process data refers to the utilization of Electric Arc Furnaces (EAF) for steelmaking which involves the melting of pig iron into crude steel. This is a unit process (single operation) commonly employed in the steel industry, where EAF technology is applied mainly for production of steel from recycled scrap metal and is also used with direct reduced iron. The process is suitable for small-scale and modular production, making it flexible for different steel production capacities and is typically utilized in minimills.

## Time period
论文提到钢铁企业环境总体数据为1998年的吨钢环境基础数据。

## Reference product
- Molten Iron: 316.7; calculated

## Inputs
All rows: calculated
- Molten Iron: 87
- dolomite: 1.6
- quicklime: 27.9
- freshwater,freshwater: 200
- compressed air: 0.4
- Steel scrap (external supply): 230
- Cooling water: 5.7
- Electricity: 470.88

## Outputs
- Slag: 26; calculated
- carbon dioxide (fossil): 69.5; calculated
  原文未区分bio和fossil，根据专家判断此处为carbon dioxide (fossil)
- Sinter / Pellet Dust: 0.02; calculated

## Use advice
When using this dataset for Life Cycle Assessment purposes, it is crucial to ensure the EAF process is relevant to the assessed scenario. The dataset represents environmental base data per ton of steel corresponding to the year 1998. Therefore, it may not accurately reflect current technological efficiencies or environmental impacts. Users should consider technological advancements and regional differences in EAF operation since 1998. If more recent data is available, it should be used to ensure the accuracy of the assessment. Additionally, considerations such as electricity source and specific emission factors relevant to the geographic location of the EAF operation should be integrated into the LCA model.

## Review details
Inventory: The internal review was done by several iteration steps concerning raw data validation, raw data documentation, representativity, completeness and consistency of modelling with regard to ISO 14040 and 14044.

## Data sources
- 梁田. 基于生命周期评价的典型钢铁企业环境影响评估及绿色发展研究. (郑州大学, 2020).
