# Dispersed meat ; White meat ; Splitting ; >1500 heads/d; NESPS2 / 分割肉 ; 白条肉 ; 分割 ; 大于1500头/天 ; 全国第二次污染普查数据

Dataset: ILCD process, Unit process, single operation
Geography: CN
Reference year: 2019
Classification: Reference Parameters / Materials production / Food and renewable raw materials
Generated by: The data was created by the Office of the Second National Pollution Source Census of the Ministry of Ecology and Environment, and the data was organized by the TianGong Plan team for ILCD format / 生态环境部第二次全国污染源普查工作办公室创建数据，天工计划团队常慧敏整理数据为ILCD格式
Owner: Tiangong LCI Data Working Group / 天工LCI数据工作小组
Review: Dependent internal review by Tiangong LCI Data Working Group / 天工LCI数据工作小组
Amounts: no units in this file; such an amount is in the reference unit of its flow, which a separate flow dataset defines
copyright: false
licenseType: Free of charge for all users and uses

## General comment
the Technical of end-of-pipe management technology for pollution chemical oxygen demandisPrecipitation separation + anaerobic hydrolysis + bio-contact oxidation process，Its Technical efficiency of end-of-pipe management96，The formula for calculating the actual operation rate (k-value) of the end-of-pipe treatment facility is k = power consumption of treatment facilities (kWh) / (rated power of treatment facilities (kW) × operating hours of treatment facilities (hours))

## Technical purpose
该数据集涉及每天从1500头以上的牲畜中分割白肉的工业过程，制成分散的肉类产品。此外，数据还包括用于处理废水污染物的几种末端管理技术（如化学需氧量、氨氮、总磷和有机结合态氮）的描述和效率。提到的技术包括物理化学处理、厌氧生物处理、好氧生物处理、沉淀分离、厌氧水解、生物接触氧化和序批式反应器（SBR）。这些信息对于肉类加工行业中旨在最大限度地减少环境影响并遵守有关废物排放的法规要求的设施至关重要。

## Reference product
- Wholesale Cut: 1000; calculated
  源文件中描述为为分割肉，此处对其进行了匹配工作，将其匹配到LCAflow库里面相最符合的流

## Outputs
All rows: calculated
- Ammonia Nitrogen: 0.00014
  the Technical of end-of-pipe management technology for pollution Ammonia NitrogenisPhysicochemical treatment + anaerobic biological treatment + aerobic biological treatment，Its Technical efficiency of end-of-pipe management95
  污染物指标氨氮的末端治理技术是物理化学处理法+厌氧生物处理法+好氧生物处理法，其效率为95，末端治理设施实际运行率（k值）计算公式为k=污水治理设施耗电量（千瓦时/年）/污水治理设施运行时间（小时/年）/污水治理设施总功率（千瓦）。原文件中描述污染物类别为废水，污染物指标为氨氮，此处对其进行了匹配工作，将其匹配到LCAflow库里面相最符合的流
- phosphorus, total: 0.000165
  the Technical of end-of-pipe management technology for pollution phosphorus, totalisPhysicochemical treatment + anaerobic biological treatment + aerobic biological treatment②，Its Technical efficiency of end-of-pipe management95，The formula for calculating the actual operation rate (k-value) of the end-of-pipe treatment facility is k = power consumption of treatment facilities (kWh) / (rated power of treatment facilities (kW) × operating hours of treatment facilities (hours))
  污染物指标总磷的末端治理技术是物理化学处理法+厌氧生物处理法+好氧生物处理法②，其效率为95，末端治理设施实际运行率（k值）计算公式为k=污水治理设施耗电量（千瓦时/年）/污水治理设施运行时间（小时/年）/污水治理设施总功率（千瓦）。原文件中描述污染物类别为废水，污染物指标为总磷，此处对其进行了匹配工作，将其匹配到LCAflow库里面相最符合的流
- Ammonia Nitrogen: 0.00028
  the Technical of end-of-pipe management technology for pollution Ammonia NitrogenisPrecipitation separation + anaerobic hydrolysis + bio-contact oxidation process，Its Technical efficiency of end-of-pipe management90
  污染物指标氨氮的末端治理技术是沉淀分离+厌氧水解类+生物接触氧化法，其效率为90，末端治理设施实际运行率（k值）计算公式为k=污水治理设施耗电量（千瓦时/年）/污水治理设施运行时间（小时/年）/污水治理设施总功率（千瓦）。原文件中描述污染物类别为废水，污染物指标为氨氮，此处对其进行了匹配工作，将其匹配到LCAflow库里面相最符合的流
- phosphorus, total: 0.00066
  the Technical of end-of-pipe management technology for pollution phosphorus, totalisPrecipitation separation + anaerobic hydrolysis + bio-contact oxidation process，Its Technical efficiency of end-of-pipe management80，The formula for calculating the actual operation rate (k-value) of the end-of-pipe treatment facility is k = power consumption of treatment facilities (kWh) / (rated power of treatment facilities (kW) × operating hours of treatment facilities (hours))
  污染物指标总磷的末端治理技术是沉淀分离+厌氧水解类+生物接触氧化法，其效率为80，末端治理设施实际运行率（k值）计算公式为k=污水治理设施耗电量（千瓦时/年）/污水治理设施运行时间（小时/年）/污水治理设施总功率（千瓦）。原文件中描述污染物类别为废水，污染物指标为总磷，此处对其进行了匹配工作，将其匹配到LCAflow库里面相最符合的流
- Ammonia Nitrogen: 0.00084
  the Technical of end-of-pipe management technology for pollution Ammonia NitrogenisPrecipitation separation + SBR，Its Technical efficiency of end-of-pipe management70，The formula for calculating the actual operation rate (k-value) of the end-of-pipe treatment facility is k = power consumption of treatment facilities (kWh) / (rated power of treatment facilities (kW) × operating hours of treatment facilities (hours))
  污染物指标氨氮的末端治理技术是沉淀分离+SBR类，其效率为70，末端治理设施实际运行率（k值）计算公式为k=污水治理设施耗电量（千瓦时/年）/污水治理设施运行时间（小时/年）/污水治理设施总功率（千瓦）。原文件中描述污染物类别为废水，污染物指标为氨氮，此处对其进行了匹配工作，将其匹配到LCAflow库里面相最符合的流
- Waste water: 1340
  the Technical of end-of-pipe management technology for pollution Waste wateris/，The formula for calculating the actual operation rate (k-value) of the end-of-pipe treatment facility is k = power consumption of treatment facilities (kWh) / (rated power of treatment facilities (kW) × operating hours of treatment facilities (hours))
  污染物指标工业废水量的末端治理技术是/，末端治理设施实际运行率（k值）计算公式为/。原文件中描述污染物类别为废水，污染物指标为工业废水量，此处对其进行了匹配工作，将其匹配到LCAflow库里面相最符合的流
- phosphorus, total: 0.00198
  the Technical of end-of-pipe management technology for pollution phosphorus, totalisPrecipitation separation + SBR，Its Technical efficiency of end-of-pipe management40，The formula for calculating the actual operation rate (k-value) of the end-of-pipe treatment facility is k = power consumption of treatment facilities (kWh) / (rated power of treatment facilities (kW) × operating hours of treatment facilities (hours))
  污染物指标总磷的末端治理技术是沉淀分离+SBR类，其效率为40，末端治理设施实际运行率（k值）计算公式为k=污水治理设施耗电量（千瓦时/年）/污水治理设施运行时间（小时/年）/污水治理设施总功率（千瓦）。原文件中描述污染物类别为废水，污染物指标为总磷，此处对其进行了匹配工作，将其匹配到LCAflow库里面相最符合的流
- Nitrogen, organic bound: 0.0021
  the Technical of end-of-pipe management technology for pollution Nitrogen, organic boundisPhysicochemical treatment + anaerobic biological treatment + aerobic biological treatment，Its Technical efficiency of end-of-pipe management85，The formula for calculating the actual operation rate (k-value) of the end-of-pipe treatment facility is k = power consumption of treatment facilities (kWh) / (rated power of treatment facilities (kW) × operating hours of treatment facilities (hours))
  污染物指标总氮的末端治理技术是物理化学处理法+厌氧生物处理法+好氧生物处理法，其效率为85，末端治理设施实际运行率（k值）计算公式为k=污水治理设施耗电量（千瓦时/年）/污水治理设施运行时间（小时/年）/污水治理设施总功率（千瓦）。原文件中描述污染物类别为废水，污染物指标为总氮，此处对其进行了匹配工作，将其匹配到LCAflow库里面相最符合的流
- Nitrogen, organic bound: 0.0028
  the Technical of end-of-pipe management technology for pollution Nitrogen, organic boundisPrecipitation separation + anaerobic hydrolysis + bio-contact oxidation process，Its Technical efficiency of end-of-pipe management80，The formula for calculating the actual operation rate (k-value) of the end-of-pipe treatment facility is k = power consumption of treatment facilities (kWh) / (rated power of treatment facilities (kW) × operating hours of treatment facilities (hours))
  污染物指标总氮的末端治理技术是沉淀分离+厌氧水解类+生物接触氧化法，其效率为80，末端治理设施实际运行率（k值）计算公式为k=污水治理设施耗电量（千瓦时/年）/污水治理设施运行时间（小时/年）/污水治理设施总功率（千瓦）。原文件中描述污染物类别为废水，污染物指标为总氮，此处对其进行了匹配工作，将其匹配到LCAflow库里面相最符合的流
- Nitrogen, organic bound: 0.0084
  the Technical of end-of-pipe management technology for pollution Nitrogen, organic boundisPrecipitation separation + SBR，Its Technical efficiency of end-of-pipe management40，The formula for calculating the actual operation rate (k-value) of the end-of-pipe treatment facility is k = power consumption of treatment facilities (kWh) / (rated power of treatment facilities (kW) × operating hours of treatment facilities (hours))
  污染物指标总氮的末端治理技术是沉淀分离+SBR类，其效率为40，末端治理设施实际运行率（k值）计算公式为k=污水治理设施耗电量（千瓦时/年）/污水治理设施运行时间（小时/年）/污水治理设施总功率（千瓦）。原文件中描述污染物类别为废水，污染物指标为总氮，此处对其进行了匹配工作，将其匹配到LCAflow库里面相最符合的流
- chemical oxygen demand: 0.01143
  the Technical of end-of-pipe management technology for pollution chemical oxygen demandisPhysicochemical treatment + anaerobic biological treatment + aerobic biological treatment，Its Technical efficiency of end-of-pipe management97，The formula for calculating the actual operation rate (k-value) of the end-of-pipe treatment facility is k = power consumption of treatment facilities (kWh) / (rated power of treatment facilities (kW) × operating hours of treatment facilities (hours))
  污染物指标化学需氧量的末端治理技术是物理化学处理法+厌氧生物处理法+好氧生物处理法，其效率为97，末端治理设施实际运行率（k值）计算公式为k=污水治理设施耗电量（千瓦时/年）/污水治理设施运行时间（小时/年）/污水治理设施总功率（千瓦）。原文件中描述污染物类别为废水，污染物指标为化学需氧量，此处对其进行了匹配工作，将其匹配到LCAflow库里面相最符合的流
- chemical oxygen demand: 0.01528
  the Technical of end-of-pipe management technology for pollution chemical oxygen demandisPrecipitation separation + anaerobic hydrolysis + bio-contact oxidation process，Its Technical efficiency of end-of-pipe management96，The formula for calculating the actual operation rate (k-value) of the end-of-pipe treatment facility is k = power consumption of treatment facilities (kWh) / (rated power of treatment facilities (kW) × operating hours of treatment facilities (hours))
  污染物指标化学需氧量的末端治理技术是沉淀分离+厌氧水解类+生物接触氧化法，其效率为96，末端治理设施实际运行率（k值）计算公式为k=污水治理设施耗电量（千瓦时/年）/污水治理设施运行时间（小时/年）/污水治理设施总功率（千瓦）。原文件中描述污染物类别为废水，污染物指标为化学需氧量，此处对其进行了匹配工作，将其匹配到LCAflow库里面相最符合的流

## Use advice
This dataset is derived from the Pollution Source Census Report and contains information on pollution emissions and related products. However, it does not include data on energy or chemical consumption, nor does it provide information on waste or co-product generation. When utilizing this dataset, please supplement the missing data based on actual conditions before use
该数据集来源于污染源普查报告，包含污染物排放及相关产品信息，但不包含能源或化学品消耗数据，也不提供废弃物或共生产物产生信息。在使用该数据集时，请根据实际情况补充缺失数据后再使用。

## Review details
Inventory: The internal review was done by several iteration steps concerning raw data validation, raw data documentation, representativity, completeness and consistency of modelling with regard to ISO 14040 and 14044.
清单： 内部审查通过几个迭代步骤完成，涉及原始数据验证、原始数据记录、代表性、完整性、与 ISO 14040 和 14044 有关的建模的一致性。

## Data sources
- 第二次全国污染源普查产排污核算系数手册（试用版）,四级代码1351文件，在完整版文件中第2542页
