# Hydrofluoric acid alkylation plant ; Gasoline blending components ; C2-C5 ; Alkylation ; All sizes; NESPS2 / 氢氟酸法烷基化装置 ; 汽油调和组分 ; C2-C5 ; 烷基化 ; 所有规模 ; 全国第二次污染普查数据

Dataset: ILCD process, Unit process, single operation
Geography: CN
Reference year: 2019
Classification: Reference Parameters / Energy carriers and technologies / Other non-renewable fuels
Generated by: The data was created by the Office of the Second National Pollution Source Census of the Ministry of Ecology and Environment, and the data was organized by the TianGong Plan team for ILCD format / 生态环境部第二次全国污染源普查工作办公室创建数据，天工计划团队常慧敏整理数据为ILCD格式
Owner: Tiangong LCI Data Working Group / 天工LCI数据工作小组
Review: Dependent internal review by Tiangong LCI Data Working Group / 天工LCI数据工作小组
Amounts: no units in this file; such an amount is in the reference unit of its flow, which a separate flow dataset defines
copyright: false
licenseType: Free of charge for all users and uses

## General comment
the Technical of end-of-pipe management technology for pollution cyanideisPhysical treatment + biological treatment，Its Technical efficiency of end-of-pipe management79

## Technical purpose
氢氟酸烷基化工艺用于生产汽油调和组分，具体为C2-C5烷基化产品，适用于多种汽油级别的调和。该过程适用于石化行业内所有规模的装置。此外，所提到的末端治理技术用于通过物理、生物和物理化学（或化学）处理组合来减少含有化学需氧量（COD）、氨氮、有机结合氮、含石油废物、酚和氰化物的废水对环境的污染。

## Reference product
- Blend Labs: 1000; calculated
  源文件中描述为为汽油调和组分，此处对其进行了匹配工作，将其匹配到LCAflow库里面相最符合的流，污染物指标备注为工业废水量

## Outputs
All rows: calculated
- cyanide: 0
  the Technical of end-of-pipe management technology for pollution cyanideisPhysical treatment + biological treatment + physicochemical treatment (or physical treatment, chemical treatment)，Its Technical efficiency of end-of-pipe management88
  污染物指标氰化物的末端治理技术是物理处理法+生物处理法+物理化学处理法（或物理处理法、化学处理法），其效率为88，末端治理设施实际运行率（k值）计算公式为k=污水治理设施运行时间/正常生产时间。原文件中描述污染物类别为废水，污染物指标为氰化物，此处对其进行了匹配工作，将其匹配到LCAflow库里面相最符合的流，污染物指标备注为氰化物原文描述的产污系数为 未检出。请根据备注自行核算后修改对应的排放量。
- phenol: 1.442e-7
  the Technical of end-of-pipe management technology for pollution phenolisPhysical treatment + biological treatment + physicochemical treatment (or physical treatment, chemical treatment)，Its Technical efficiency of end-of-pipe management98
  污染物指标挥发酚的末端治理技术是物理处理法+生物处理法+物理化学处理法（或物理处理法、化学处理法），其效率为98，末端治理设施实际运行率（k值）计算公式为k=污水治理设施运行时间/正常生产时间。原文件中描述污染物类别为废水，污染物指标为挥发酚，此处对其进行了匹配工作，将其匹配到LCAflow库里面相最符合的流，污染物指标备注为挥发酚
- phenol: 2.163e-7
  the Technical of end-of-pipe management technology for pollution phenolisPhysical treatment + biological treatment，Its Technical efficiency of end-of-pipe management97
  污染物指标挥发酚的末端治理技术是物理处理法+生物处理法，其效率为97，末端治理设施实际运行率（k值）计算公式为k=污水治理设施运行时间/正常生产时间。原文件中描述污染物类别为废水，污染物指标为挥发酚，此处对其进行了匹配工作，将其匹配到LCAflow库里面相最符合的流，污染物指标备注为挥发酚
- Petroleum-related waste: 1.43e-6
  the Technical of end-of-pipe management technology for pollution Petroleum-related wasteisPhysical treatment + biological treatment + physicochemical treatment (or physical treatment, chemical treatment)，Its Technical efficiency of end-of-pipe management98
  污染物指标石油类的末端治理技术是物理处理法+生物处理法+物理化学处理法（或物理处理法、化学处理法），其效率为98，末端治理设施实际运行率（k值）计算公式为k=污水治理设施运行时间/正常生产时间。原文件中描述污染物类别为废水，污染物指标为石油类，此处对其进行了匹配工作，将其匹配到LCAflow库里面相最符合的流，污染物指标备注为石油类
- Petroleum-related waste: 5.005e-6
  the Technical of end-of-pipe management technology for pollution Petroleum-related wasteisPhysical treatment + biological treatment，Its Technical efficiency of end-of-pipe management93
  污染物指标石油类的末端治理技术是物理处理法+生物处理法，其效率为93，末端治理设施实际运行率（k值）计算公式为k=污水治理设施运行时间/正常生产时间。原文件中描述污染物类别为废水，污染物指标为石油类，此处对其进行了匹配工作，将其匹配到LCAflow库里面相最符合的流，污染物指标备注为石油类
- Ammonia Nitrogen: 0.00012675
  the Technical of end-of-pipe management technology for pollution Ammonia NitrogenisPhysical treatment + biological treatment + physicochemical treatment (or physical treatment, chemical treatment)，Its Technical efficiency of end-of-pipe management75
  污染物指标氨氮的末端治理技术是物理处理法+生物处理法+物理化学处理法（或物理处理法、化学处理法），其效率为75，末端治理设施实际运行率（k值）计算公式为k=污水治理设施运行时间/正常生产时间。原文件中描述污染物类别为废水，污染物指标为氨氮，此处对其进行了匹配工作，将其匹配到LCAflow库里面相最符合的流，污染物指标备注为氨氮
- Ammonia Nitrogen: 0.00012675
  the Technical of end-of-pipe management technology for pollution Ammonia NitrogenisPhysical treatment + biological treatment，Its Technical efficiency of end-of-pipe management75
  污染物指标氨氮的末端治理技术是物理处理法+生物处理法，其效率为75，末端治理设施实际运行率（k值）计算公式为k=污水治理设施运行时间/正常生产时间。原文件中描述污染物类别为废水，污染物指标为氨氮，此处对其进行了匹配工作，将其匹配到LCAflow库里面相最符合的流，污染物指标备注为氨氮
- Waste water: 153
  the Technical of end-of-pipe management technology for pollution Waste wateris/，Its Technical efficiency of end-of-pipe management0
  污染物指标工业废水量的末端治理技术是/，其效率为0，末端治理设施实际运行率（k值）计算公式为k=污水治理设施运行时间/正常生产时间。原文件中描述污染物类别为废水，污染物指标为工业废水量，此处对其进行了匹配工作，将其匹配到LCAflow库里面相最符合的流，污染物指标备注为工业废水量
- Nitrogen, organic bound: 0.0003857
  the Technical of end-of-pipe management technology for pollution Nitrogen, organic boundisPhysical treatment + biological treatment + physicochemical treatment (or physical treatment, chemical treatment)，Its Technical efficiency of end-of-pipe management71
  污染物指标总氮的末端治理技术是物理处理法+生物处理法+物理化学处理法（或物理处理法、化学处理法），其效率为71，末端治理设施实际运行率（k值）计算公式为k=污水治理设施运行时间/正常生产时间。原文件中描述污染物类别为废水，污染物指标为总氮，此处对其进行了匹配工作，将其匹配到LCAflow库里面相最符合的流，污染物指标备注为总氮
- Nitrogen, organic bound: 0.0004921
  the Technical of end-of-pipe management technology for pollution Nitrogen, organic boundisPhysical treatment + biological treatment，Its Technical efficiency of end-of-pipe management63
  污染物指标总氮的末端治理技术是物理处理法+生物处理法，其效率为63，末端治理设施实际运行率（k值）计算公式为k=污水治理设施运行时间/正常生产时间。原文件中描述污染物类别为废水，污染物指标为总氮，此处对其进行了匹配工作，将其匹配到LCAflow库里面相最符合的流，污染物指标备注为总氮
- chemical oxygen demand: 0.00342
  the Technical of end-of-pipe management technology for pollution chemical oxygen demandisPhysical treatment + biological treatment + physicochemical treatment (or physical treatment, chemical treatment)，Its Technical efficiency of end-of-pipe management88
  污染物指标化学需氧量的末端治理技术是物理处理法+生物处理法+物理化学处理法（或物理处理法、化学处理法），其效率为88，末端治理设施实际运行率（k值）计算公式为k=污水治理设施运行时间/正常生产时间。原文件中描述污染物类别为废水，污染物指标为化学需氧量，此处对其进行了匹配工作，将其匹配到LCAflow库里面相最符合的流，污染物指标备注为化学需氧量
- chemical oxygen demand: 0.004845
  the Technical of end-of-pipe management technology for pollution chemical oxygen demandisPhysical treatment + biological treatment，Its Technical efficiency of end-of-pipe management83
  污染物指标化学需氧量的末端治理技术是物理处理法+生物处理法，其效率为83，末端治理设施实际运行率（k值）计算公式为k=污水治理设施运行时间/正常生产时间。原文件中描述污染物类别为废水，污染物指标为化学需氧量，此处对其进行了匹配工作，将其匹配到LCAflow库里面相最符合的流，污染物指标备注为化学需氧量
- cyanide: 0
  the Technical of end-of-pipe management technology for pollution cyanideisPhysical treatment + biological treatment，Its Technical efficiency of end-of-pipe management79.The original article describes the pollution production coefficients as 0。Please revise the corresponding emissions after accounting for them according to the notes.。.The original article describes the pollution production coefficients as 0. Please revise the corresponding emissions after accounting for them according to the notes.
  污染物指标氰化物的末端治理技术是物理处理法+生物处理法，其效率为79，末端治理设施实际运行率（k值）计算公式为k=污水治理设施运行时间/正常生产时间。原文件中描述污染物类别为废水，污染物指标为氰化物，此处对其进行了匹配工作，将其匹配到LCAflow库里面相最符合的流，污染物指标备注为氰化物原文描述的产污系数为 0。请根据备注自行核算后修改对应的排放量。

## Use advice
This dataset is derived from the Pollution Source Census Report and contains information on pollution emissions and related products. However, it does not include data on energy or chemical consumption, nor does it provide information on waste or co-product generation. When utilizing this dataset, please supplement the missing data based on actual conditions before use
该数据集来源于污染源普查报告，包含污染物排放及相关产品信息，但不包含能源或化学品消耗数据，也不提供废弃物或共生产物产生信息。在使用该数据集时，请根据实际情况补充缺失数据后再使用。

## Review details
Inventory: The internal review was done by several iteration steps concerning raw data validation, raw data documentation, representativity, completeness and consistency of modelling with regard to ISO 14040 and 14044.
清单： 内部审查通过几个迭代步骤完成，涉及原始数据验证、原始数据记录、代表性、完整性、与 ISO 14040 和 14044 有关的建模的一致性。

## Data sources
- 第二次全国污染源普查产排污核算系数手册（试用版）,二级代码25,四级代码2511文件，在完整版文件中第4111页
