# Plexiglass ; laminated glass ; heating and pressurizing

Dataset: ILCD process, Unit process, single operation
Geography: SX-ZJ-CN
Reference year: 2004
Classification: Unit processes / Materials production / Glass and ceramics
Generated by: He xiaxia, 18616148319@163.com
Owner: Tiangong LCI Data Working Group
Review: Dependent internal review by Tiangong LCI Data Working Group
Amounts: no units in this file; such an amount is in the reference unit of its flow, which a separate flow dataset defines
copyright: false
licenseType: Free of charge for all users and uses

## General comment
This dataset represents the process of producing laminated glass which involves heating and pressurizing in the unit process. It is likely to be used in applications requiring safety and security features, such as in automotive windshields, architectural glazing, and protective glass for various transportation modes.

## Reference product
- Glass (formed & finished): 250000; measured

## Inputs
- Electricity: 1488.96; measured
- Glass (formed & finished): 250160; measured
  Laminated glass rough products

## Outputs
- cullet float glass: 160; measured

## Use advice
When applying this data set, users should ensure accurate modeling of energy consumption and emissions associated with the heating and pressurization steps of the laminated glass production process. Attention should be given to the geographical location and energy mix used, as well as potential end-of-life recycling processes that may affect the overall environmental impact. The data should be contextualized within a specific product's life cycle to correctly represent its sustainability performance.

## Review details
Inventory: The internal review was done by several iteration steps concerning raw data validation, raw data documentation, representativity, completeness and consistency of modelling with regard to ISO 14040 and 14044.

## Data sources
- 年产5600吨钢化玻璃及250吨夹层玻璃生产线建设项目环境影响报告
