# Wet steaming cotton dyeing and finishing processing ; printing and dyeing cotton ; cold stack

Dataset: ILCD process, Unit process, single operation
Geography: SZ-JS-CN
Reference year: 2012
Classification: Unit processes / Materials production / Organic chemicals
Generated by: Yingfan Duan, 1300925579@qq.com
Owner: Tiangong LCI Data Working Group
Review: Dependent internal review by Tiangong LCI Data Working Group
Amounts: no units in this file; such an amount is in the reference unit of its flow, which a separate flow dataset defines
copyright: false
licenseType: Free of charge for all users and uses

## General comment
"Cold piling" is a stage in the wet steaming dyeing process, occurring after the completion of dyeing. It involves accumulating or settling the dyed fabric at low temperatures, in contrast to the high temperatures used during steam fixation. The purpose of this process is to enhance the colorfastness of the dyeing, improving the stability of the color.

## Geography
The study focuses on a printing and dyeing enterprise in Jiangsu Province, located in Changshu within the Yangtze River Delta Economic Zone.

## Technical purpose
The cotton dyeing and finishing process described refers to the wet steaming method used in textile manufacturing, specifically for the treatment of cotton fabrics. This process is typically applied to enhance the color and finishing attributes of the cotton fabric for various textile products. It is mostly used in the production of high-quality printed and dyed cotton materials found in clothing, home textiles, and decorative fabrics.

## Reference product
- Cotton Fabric: 167; measured

## Inputs
- Electricity: 82.9; measured
- Crude coal: 27.1; calculated
- Cleaned coal: 67.2; calculated
- Fuel Oil: 0.579; calculated
- heavy fuel oil: 0.174; calculated
- Diesel: 0.796; calculated
- Coke Oven Gas: 1.06; calculated
- natural gas: 0.0136; calculated
- Hydrogen peroxide: 50; measured
- Amylase: 83.3; measured
- Stabilizer: 54.2; measured
- river water: 5160; measured
- freshwater: 1.29; measured

## Outputs
- carbon dioxide (fossil): 28; calculated
- carbon monoxide (fossil): 0.0678; calculated
- sulfur dioxide: 0.0238; calculated
- methane (fossil): 3.53e-5; calculated
- Nitrogen oxides: 0.138; calculated
- nitrous oxide: 3.3e-5; measured
- particles (> PM10): 0.221; calculated
- ammonia: 1.27e-5; measured
- non-methane volatile organic compounds: 0.00144; measured
- waste water - untreated: 3830; measured
- chemical oxygen demand: 4.36; calculated
- Suspended solids, unspecified,Suspended solids, unspecified: 0.471; calculated
- lead: 2.13e-6; calculated
- mercury: 4.48e-8; calculated
- fluorine: 4.03e-7; calculated
- cadmium: 7.9e-8; calculated
- arsenic: 1.82e-6; calculated

## Use advice
When utilizing this dataset for life cycle assessment (LCA), it is imperative to consider the technological applicability including the regional context, as the data is specific to a textile enterprise in Changshu within the Yangtze River Delta economic zone of Jiangsu Province. Ensure the inclusion of energy and water usage peculiar to the wet steaming process and the relevant treatment chemicals. Allocation of environmental impacts between the dyeing and finishing stages should be accounted for when applicable. Regional electricity grid mixes should be employed to assess the energy-related impacts accurately.

## Review details
Inventory: The internal review was done by several iteration steps concerning raw data validation, raw data documentation, representativity, completeness and consistency of modelling with regard to ISO 14040 and 14044.

## Data sources
- 朱亚楠. 棉布连续轧染工艺生命周期环境影响评价. (南京大学, 2012).
