# The production of CLT ; Cross-Laminated Timber (CLT) ; 1 m3 of CLT is comprised of the following: Softwood lumber: 428 odkg (462 kg @ 8% M.C.); Resins: 2.7 kg; Total mass: 464.7 kg

Dataset: ILCD process, Unit process, single operation
Geography: CA
Reference year: 2021
Valid until: 2022
Classification: Unit processes / Materials production / Wood
Functional unit: The purpose of the functional unit is to quantify the service delivered by the product system and provide a reference to which the inputs and outputs can be related. For EPDs covering the complete life cycle (based on a “cradle-to-grave” LCA study), a functional unit is defined. For EPDs not covering the complete life cycle (e.g. “cradle-to gate” LCA study -leaving out the use and/or the end of life), a declared unit is defined. The declared unit is defined as “the production of one cubic meter (1 m3) of CLT produced in British Columbia.”
LCI method principle: Attributional
LCI method approaches: Allocation - mass
Generated by: Wanyue Tan, wytan9@student.ubc.ca
Owner: Tiangong LCI Data Working Group
Review: Dependent internal review by Tiangong LCI Data Working Group
Amounts: no units in this file; such an amount is in the reference unit of its flow, which a separate flow dataset defines
copyright: false
licenseType: Free of charge for all users and uses

## General comment
The Athena Sustainable Materials Institute was commissioned by the Forestry Innovation Investment to conduct a cradle-to-gate LCA of BC CLT production. CLT is a category of framing styles characterized by the use of solid wood panels for wall, floor, and roof construction.

## Geography
“The surveyed data is representative of the BC CLT industry as the 3 surveyed facilities represent all currently operating CLT manufacturing facilities in BC.”

## Time period
Based on the secondary data sources part of the report, the data quality of Kiln-dried Softwood Lumber can be good within one year.

## Technology and included processes
The whole production process of CLT can be divided into three parts-A1, A2, and A3:“A1 includes the cradle-to-gate production of lumber and resins that are used in CLT manufacture. The upstream resource extraction includes removal of raw materials and processing, processing of secondary material input (e.g., recycling processes) after crossing the system boundary of the previous product system. A1 also includes reforestation processes that include nursery operations (which include fertilizer, irrigation, energy for greenhouses if applicable etc.), site preparation, as well as planting, fertilization, thinning and other management operations.”“For A2-Transportation to factory: Average or specific transportation of raw materials (including secondary materials and fuels) from extraction site or source to manufacturing site (including any recovered materials from source to be recycled in the process);”“In terms of A3, manufacturing of the CLT product, including packaging.”

## Technical purpose
Cross-Laminated Timber (CLT) is used as a structural material in building construction for walls, floors, and roofs. It is characterized by its solid wood panel composition, providing a sustainable and strong alternative in modern construction, suitable for residential, commercial, and institutional buildings.

## Reference product
- Cross-Laminated Timber (CLT): 1; measured

## Inputs
All rows: measured
- lumber: 1.09
  The "lumber" is selected here from the database, which substitutes for the "BC softwood lumber" in the report.
- Polyether Polyol: 2.36
  The "polyether polyol" is selected here from the database, which substitutes for the "Polyurethane" in the report.
- primer: 0.17
- Melamine Formaldehyde: 0.02
- Urea-formaldehyde resin: 0.0061
  The "Urea-formaldehyde" is selected here from the database, which substitutes for the "Resin Hardener (Melamine Formaldehyde Hardener" in the report. Urea-formaldehyde has similar properties to melamine formaldehyde hardener.
- freshwater: 0.01351
- transport in t*km: 169.62
  Refers to "lumber trucking" in the report.
- transport in t*km: 9.83
  Refers to the "Resins Trucking" in the report.
- Electricity: 304.92
- natural gas; 44.1 MJ/kg: 1.56
- Diesel: 0.00101
- Gasoline (regular): 8e-5
- Propane: 1.56
- Hog fuel: 40.06
- Lubricant: 1e-5
- Hydraulic Fluid: 1e-5
- Polyethylene: 0.01
  The "polyethylene" is selected here from the database, which substitutes for the "Packaging (Plastic strapping)" in the report. Based on the report, "Packaging (Plastic strapping)" refers to high density polyethylene resin.
- Polypropylene: 0.28
  The "polypropylene" is selected here from the database, which substitutes for the "Packaging (Lumber wrap)" in the report. Based on the report, "Packaging (Lumber wrap)" refers to polypropylene resin.
- transport in t*km: 0.23
  Refers to "Consumables Trucking" in the report.

## Outputs
All rows: measured
- wood waste: 38.52
  The "wood waste" is selected here from the database, which substitutes for the "Waste Transferred for Free (Recycled and Hogfuel)" in the report.
- particles (PM2.5): 0.00151
- particles (PM10): 0.00105
- Total particulate matter: 0.000284
  Refers to the "Particulates Other" flow in the report.
- Nitrogen oxides: 0.024
- sulfur oxides: 0.00126
- carbon monoxide,carbon monoxide (fossil): 0.0297
  原文未区分bio和fossil，根据专家判断此处为fossil
- Aldehydes: 0.0015
- formaldehyde: 8.89e-5
- methanol: 0.000259
- phenol: 0.000366
- butylene glycol: 0.00011
  Refers to "1,4-Butanediol" in the report.
- ethanol: 0.000257
- citric acid: 7.32e-5
- resorcinol: 0.000512
- formic acid: 0.000661
- caprolactam: 0.00011

## Deviations from the LCI method approaches
"Allocation is the method used to partition the environmental load of a process when several products or functions share the same process. CLT manufacturing is a single output process, where the CLT is the only product that is produced. The CLT manufacturing process does produce wood waste that is transferred for free to downstream users, but no environmental burden has been allocated to these wastes. The lumber input to the CLT manufacturing process is, however, a product that results from a multiple output process whereby valuable coproducts are produced and sold. In accordance with UL PCRs, “mass” was deemed as the most appropriate parameter for allocation of these inputs and thus the “mass allocation” results incorporate lumber data based on mass allocation. A detailed explanation of the lumber allocation methodology is provided in the lumber LCA project report” (Athena Sustainale Materials Institute, 2021, p. 8)

## Data selection and combination
There are three information modules accounted for in this LCA study."Extraction and upstream production” includes the cradle-to-gate production of the softwood lumber feedstock as well as the production of all resins and ancillary materials used in the production of CLT."Transportation to factory” for all plants was by diesel tractor-trailer truck. The participating CLT facilities provided the transportation distances and mode of transportation for the facility inputs."Manufacturing” LCI data was gathered from a total of three plants all currently operating in BC.

## Data treatment and extrapolations
“In the LCIA, the LCI flow of biogenic carbon removal is characterized with a factor of -1 kg CO2e/kg CO2 of biogenic carbon in the calculation of the GWP1. Likewise, the LCI flow of biogenic carbon emission is characterized with a factor of +1 kg CO2e/kg CO2 of biogenic carbon in the calculation of the GWP. Emissions other than CO2 associated with biomass combustion (e.g., methane or nitrogen oxides) are characterized by their specific radiative forcing factors in the calculation of the GWP.”“We have thus manually calculated the component of the global warming potential related to biogenic carbon separately.”“For this study, the impact categories and characterization factors (CF)2 from the mid-point indicators of the U.S. EPA Tool for the Reduction and Assessment of Chemical and Other Environmental Impacts – TRACI 2.1 [3] were applied. The TRACI methodologies were developed specifically for the US using input parameters consistent with US locations and are consistent with the wood product PCR Part A.”“The total primary energy consumption is tabulated from the LCI results based on the Cumulative Energy Demand Method published by ecoinvent3. Lower heating value of primary energy carriers is used to calculate the primary energy values reported in the study”“Other inventory parameters concerning material use, waste, water use and biogenic carbon were drawn from the LCI results. We followed the ACLCA’s Guidance to Calculating non-LCIA Inventory Metrics in Accordance with ISO 21930:2017”“Based on the data availability, an approach using average weighting factors was applied is this LCA study.”

## Use advice
Users of this data should consider the specific details of the CLT production process in British Columbia, including the materials and energy flows involved from cradle-to-gate. The data focuses on the production stages (upstream activities, transportation, and manufacturing, including packaging) but does not include use or end-of-life stages. Data users must ensure that recycling, energy recovery, and waste treatment processes for CLT are modeled according to local specificities if expanding beyond gate-to-gate. Environmental impacts from capital equipment and human activities are excluded and should be considered if relevant for the expanded system boundary. Always refer to the latest standards and apply up-to-date characterization factors when conducting an LCA with this data.

## Review details
Inventory: The internal review was done by several iteration steps concerning raw data validation, raw data documentation, representativity, completeness and consistency of modelling with regard to ISO 14040 and 14044.

## Data sources
- Athena Sustainale Materials Institute. A Cradle-to-Gate Life Cycle Assessment of CLT produced in British Columbia. (2021).
