# cement production;cement, ordinary portland cement, 42.5MPa;new dry process;mixed solid wastes

Dataset: ILCD process, Unit process, black box
Geography: CN
Reference year: 2004
Classification: Unit processes / Materials production / Other mineralic materials
Generated by: #REF!, ysqsophia@gmail.com
Owner: Tiangong LCI Data Working Group
Review: Dependent internal review by Tiangong LCI Data Working Group
Amounts: no units in this file; such an amount is in the reference unit of its flow, which a separate flow dataset defines
copyright: false
licenseType: Free of charge for all users and uses

## General comment
Assuming that the cement used for stabilizing gravel is P·O 42.5 Portland cement. Cement production adopts a new dry-process production method. Raw materials used include limestone, clay, gypsum, etc. Energy consumption during the production process includes electricity and coal consumption in various production processes. Pollutants include particulate matter, SO2, NOX, CO2, etc.

## Technical purpose
The P·O 42.5 Portland cement produced via the new dry process is intended for use in the stabilization of gravel as part of the construction materials industry. It is suitable for high-strength applications requiring a compressive strength of 42.5 MPa. The cement is composed of limestone, clay, gypsum, and incorporates mixed solid wastes, showcasing an environmental consideration in industrial processes.

## Model description
The functional unit is 1t P·O 42.5 Portland cement.

## Reference product
- cement, ordinary portland cement, 42.5MPa: 1000
  P.O.42.5 silicate cement

## Inputs
- limestone, crushed, for mill: 1073.7
  Limestone
- clay: 216.8
  Clay
- gypsum stone (CaSO4-dihydrate): 51.1
  Gupsum
- iron, powder: 28.5
  Iron powder
- ash: 98
  Fly ash
- blast furnace slag: 137.6
  Blast furnace slag
- Electricity: 350.64
  Power consumption
- hard coal; 26.3 MJ/kg: 116
  Coal consumption
- Diesel oil: 0.0002
  Diesel fuel. The fuel consumption of a 5-ton dump truck and a 5-ton diesel truck for transporting cement raw materials for 1 km is assumed to be 0.2L, and the transportation distance is assumed to be 1 km.

## Outputs
- carbon dioxide (fossil): 781
  CO2
- Nitrogen oxides: 1.53
  NxO
- methane (fossil): 3.414
  CH4

## Use advice
When using this dataset for Life Cycle Assessment (LCA), include the energy consumption (electricity and coal) for each production step. Account for the emissions such as particulate matter, SO2, NOX, and CO2. Ensure proper allocation of inputs and emissions where mixed solid wastes are utilized. Reflect the specific production method, i.e., new dry process, accurately in the LCA models. The dataset's functional unit is 1 tonne of P·O 42.5 Portland cement. When modeling, ensure that the system boundaries are well-defined and consider regional differences in energy supply and waste management practices.

## Review details
Inventory: The internal review was done by several iteration steps concerning raw data validation, raw data documentation, representativity, completeness and consistency of modelling with regard to ISO 14040 and 14044.

## Data sources
- 杜丽. (2012). 基于生命周期评价方法半刚性基层施工过程中温室气体排放分析研究 [硕士, 长安大学].
