# cement production|cement, portland-composite cement|dry rotary kiln|mixed solid wastes

Dataset: ILCD process, LCI结果
Geography: CN
Classification: Materials production / Other mineralic materials
LCI method principle: Other
Generated by: Siqi Yang
Amounts: no units in this file; such an amount is in the reference unit of its flow, which a separate flow dataset defines
copyright: false

## General comment
Over 90% of China's cement clinker was produced by applying dry rotary kiln technology in 2013 (China Cement Association, 2014). Therefore, only cement produced by applying dry rotary kiln technology was analyzed.
In this enterprise, the flying ash generated from cement production process is recycled as one alternative material for cement production. Wastewater is also recycled for watering local gardens after primary treatment.

## Model description
The system boundary of cement production was set up by using a cradle-to-gate approach, namely, cement consumption and final disposal are excluded.
1 ton of cement product was selected as the functional unit.

## Reference product
- cement, portland-composite cement: 1000
  Cement

## Inputs
All rows: article inperiodical
- calcium carbonate: 1050
  Limestone
- electricity, medium voltage: 295
  Electricity
- hard coal: 91.8105
  Soft Coal. The original data is 2.50E+9J, which is converted to hard coal. The conversion formula is 1 MJ = 27.23 kg of hard coal.
- gypsum: 50.5
  Gypsum
- sandstone: 54.8
  Sandstone
- Pyrite cinder: 14.6
- water: 360
  Water
- ash: 241
  Fly ash
- transport, freight, lorry, unspecified: 85.05
  Transport (truck)

## Outputs
- carbon dioxide: 620; article inperiodical
  CO2
- sulfur dioxide: 0.023; article inperiodical
  SO2
- Nitrogen oxides: 0.19; article inperiodical
  NOx
- particles (> PM10): 0.065; article inperiodical
  Particulates. The particle size is not specified. Here we treat it as PM>10.

## Data selection and combination
The data were obtained from one of China's top 50 cement production enterprises, which can represent the current cement production level in China. Annual monitoring data (i.e., raw materials and energy consumption, and air emission) were obtained from the annual operation data of this enterprise.

## Data sources
- Wei Chen, Wenjing Liu, Yong Geng, Satoshi Ohnishi, Lu Sun, Wenyi Han, Xu Tian, & Shaozhuo Zhong. (2016). Life cycle based emergy analysis on China’s cement production. JOURNAL OF CLEANER PRODUCTION, 131, 272–279.
