# Graphite anode production ; Graphite anode ; Graphite anode material, copper foil

Dataset: ILCD process, Unit process, single operation
Classification: Materials production / Non-energetic raw materials
Functional unit: Produce 1kg graphite anode
Generated by: Xin Chen, xinchen@mail.nankai.edu.cn
Owner: Tiangong LCI Data Working Group
Review: Dependent internal review by Tiangong LCI Data Working Group
Amounts: no units in this file; such an amount is in the reference unit of its flow, which a separate flow dataset defines
copyright: false
licenseType: Free of charge for all users and uses

## General comment
Apply the negative electrode slurry evenly on the copper foil to make the negative electrode sheet.

## Technology and included processes
The lithium-ion battery negative electrode slurry is evenly coated on the copper foil to make a negative electrode sheet.

## Reference product
- Graphite Electrode: 1; article inperiodical
  Data reference: Research by Ellingsen, L. A. et al. Life Cycle Assessment of a Lithium-Ion Battery Vehicle Pack.

## Inputs
- Graphite Electrode: 0.67; article inperiodical
  The data refers to the research Life Cycle Assessment of a Lithium-Ion Battery Vehicle Pack. by Ellingsen, L. A. et al. and the research Contribution of Li-Ion Batteries to the Environmental Impact of Electric Vehicles by A. Notter, D. et al.

## Data selection and combination
The data comes partly from the literature and partly from the ecoinvent database.

## Review details
Inventory: The internal review was done by several iteration steps concerning raw data validation, raw data documentation, representativity, completeness and consistency of modelling with regard to ISO 14040 and 14044.

## Data sources
- Le Varlet, T., Schmidt, O., Gambhir, A., Few, S. & Staffell, I. Comparative life cycle assessment of lithium-ion battery chemistries for residential storage. J. Energy Storage 28, 101230 (2020).
