# Pineapple production

Dataset: ILCD process, Unit process, black box
Geography: CR
Reference year: 2007
Valid until: 2008
Classification: Unit processes / Materials production / Food and renewable raw materials
Functional unit: 1 hectare pineapple garden
Generated by: zhu xian, zzhu0918@163.com
Owner: Tiangong LCI Data Working Group
Review: Dependent internal review by Tiangong LCI Data Working Group
Amounts: no units in this file; such an amount is in the reference unit of its flow, which a separate flow dataset defines
copyright: false
licenseType: Free of charge for all users and uses

## General comment
The pineapple seeds were sown, the chemical fertilizers and pesticides were applied morally in the growth stage, and the pineapple fruit was obtained in the harvest stage.

## Geography
The fresh pineapple supply chain was modeled from various pineapple farms in Costa Rica

## Technical purpose
This dataset describes the cultivation process for pineapple production on a 1-hectare farm in Costa Rica and is intended to be used for environmental impact assessments of fresh pineapple supply chains. It outlines the application of chemical fertilizers and pesticides during the growth stage and the acquisition of pineapple fruit during the harvest stage, which may be applicable for studies in agricultural efficiency, sustainable farming practices, and supply chain optimization.

## Reference product
- Pineapple: 57506; measured

## Inputs
All rows: measured
- diesel oil: 440
- Gasoline (regular): 37.4
- Nitrogenous fertilizer: 401
- Phosphate fertilizer: 61
- Potassium fertilizer: 998
- magnesium: 35
- Pesticide: 3227

## Use advice
When using this dataset for Life Cycle Assessment, consider the specific practices of chemical fertilizer and pesticide application detailed for the growth stage. Ensure that the moral aspect of chemical usage is understood as it pertains to regional guidelines and certifications. The dataset should be adjusted to reflect any changes in cultivation practices, and variations in yield due to climatic or regional differences. Exclude any post-harvest processes such as transportation, storage, and retail from this dataset to focus solely on the actual cultivation impacts during the specified life stages of pineapple production.

## Review details
Inventory: The internal review was done by several iteration steps concerning raw data validation, raw data documentation, representativity, completeness and consistency of modelling with regard to ISO 14040 and 14044.
