# Molten iron production;Molten iron;BF(Z11)

Dataset: ILCD process, Unit process, single operation
Geography: CN
Reference year: 1998
Classification: Materials production / Metals and semimetals
Generated by: Fuxiang, 1162850692@qq.com
Owner: Tiangong LCI Data Working Group
Review: Dependent internal review by Tiangong LCI Data Working Group
Amounts: no units in this file; such an amount is in the reference unit of its flow, which a separate flow dataset defines
copyright: false
licenseType: Free of charge for all users and uses

## General comment
来自表 4-15 Z11 钢厂生产吨材环境负荷编目表

## Time period
论文提到钢铁企业环境总体数据为1998年的吨钢环境基础数据。

## Technical purpose
The molten iron produced in this process is intended for use in the steel manufacturing industry. It serves as a raw material for further processing and refinement into various steel products. These products can range from construction materials to automotive parts, household appliances, and other goods requiring high-strength metal components.

## Reference product
- Molten Iron: 1054.46; measured
  molten iron

## Inputs
All rows: measured
- Energy, geothermal, converted: 14028.7
- water: 15585
- Sinter: 1906.46
- Metallurgical ash: 182
  Metallurgical white ash
- coke,Coke: 684
  Coke

## Outputs
All rows: measured
- Dust (unspecified, from stack): 4.133
- sulfur dioxide: 1.042
- cyanide: 0.002278
- phenol: 0.001497
  Volatile phenol
- Hydrocarbons, aliphatic, alkanes, unspecified: 0.063299
  Petro
- Suspended solids, unspecified: 7.78553
- chemical oxygen demand: 4.39024
- Dust (unspecified, from stack): 12.59
  dust collection
- Spoil (deposited, hibernating in ground, non elementary flow): 947.327

## Use advice
When using this dataset, it is important to consider the technological applicability as pertaining to the year 1998. The environmental data provided corresponds to iron and steel companies' baseline environmental data from that year and may not reflect current technologies or environmental standards. Users should carefully assess whether adjustments or updates to the data are necessary to align with current practices and regulations. Additionally, users should be aware of the scope of the dataset and consider the boundaries of the life cycle stages included, particularly with regard to the inclusion or exclusion of recycling processes.

## Review details
Inventory: The internal review was done by several iteration steps concerning raw data validation, raw data documentation, representativity, completeness and consistency of modelling with regard to ISO 14040 and 14044.

## Data sources
- 周和敏. 钢铁材料生产过程环境协调性评价研究. (北京工业大学, 2001).
