# clinker production;clinker;ordinary rotary kiln, wet process long kiln

Dataset: ILCD process, Unit process, single operation
Geography: CN
Classification: Unit processes / Materials production / Inorganic chemicals
Generated by: #REF!, ysqsophia@gmail.com
Owner: Tiangong LCI Data Working Group
Review: Dependent internal review by Tiangong LCI Data Working Group
Amounts: no units in this file; such an amount is in the reference unit of its flow, which a separate flow dataset defines
copyright: false
licenseType: Free of charge for all users and uses

## General comment
The ordinary rotary kiln is taken as the research object.

## Technical purpose
The ordinary rotary kiln process described is used for the production of cement clinker. This industrial process is typically employed in the cement industry for the calcination step, which is crucial for the transformation of raw materials into cement clinker. This type of kiln is appropriate for large-scale production and is known for being utilized in both wet and dry cement manufacturing processes.

## Model description
The functional unit is 1 ton of cement clinker. Research scope: cement calcination.

## Reference product
- clinker: 1000
  Clinker

## Inputs
- limestone, crushed, for mill: 1201.8
  Limestone
- clay: 267.8
  Clay
- iron, powder: 31
  Iron powder
- hard coal; 26.3 MJ/kg: 241.7
  Coal-fired. The energy consumption data comes from the literature. The coal -fired thermal value is calculated at 5500kcal/kg, and the fixed carbon is calculated at 50%.
- Electricity: 210.096
  Electric. The energy consumption data comes from the literature.

## Outputs
- carbon dioxide (fossil): 954.73
  CO2. Coal -fired CO2 is calculated from fixed carbon, and the raw material CO2 is calculated by 50%based on the content of calcium carbonate.
- carbon monoxide (fossil): 9.75
  CO. CO emissions are calculated according to the concentration of exhaust gas.
- sulfur dioxide: 2.1647
  SO2. The number of NOX and SO2 is calculated by the average emission factor of the building materials industry.
- Nitrogen oxides: 3.278
  NOx. The number of NOX and SO2 is calculated by the average emission factor of the building materials industry.
- hydrocarbons (unspecified): 0.041
  CxHy. Due to the lack of sources, other pollution data reference power plant coal-fired coal coal is converted by energy consumption.

## Use advice
The data set covering the ordinary rotary kiln process for clinker production is specific to the calcination of cement and is intended for the assessment of environmental impacts in Life Cycle Assessments (LCAs). Users should be aware that this data reflects a specific technological configuration and may not be applicable to other kiln types or differing operational settings. When utilizing this data, users should ensure that it matches the technological and geographical context of their assessment and account for any variations in fuel mix, raw material composition, or environmental regulations that may apply.

## Review details
Inventory: The internal review was done by several iteration steps concerning raw data validation, raw data documentation, representativity, completeness and consistency of modelling with regard to ISO 14040 and 14044.

## Data sources
- 刘顺妮. (2003). 水泥-混凝土体系环境影响评价及其应用研究 [博士, 武汉理工大学].
