# Alumina production ; Alumina for metallurgy ; Bauxite ; 2007

Dataset: ILCD process, Unit process, single operation
Geography: CN
Reference year: 2021
Classification: Unit processes / Materials production / Non-energetic raw materials
Generated by: Yuzhen Feng, fyz22
Owner: Tiangong LCI Data Working Group
Review: Dependent internal review by Tiangong LCI Data Working Group
Amounts: no units in this file; such an amount is in the reference unit of its flow, which a separate flow dataset defines
copyright: false
licenseType: Free of charge for all users and uses

## General comment
This dataset represents alumina produced for use in the metallurgical industry. Alumina sourced from bauxite in the data set is intended for applications such as the production of aluminum by electrolysis. The data is specific to the methodologies and practices used in 2007 and is applicable for LCA studies of aluminum production chains or any process where metallurgical grade alumina is a required input.

## Time period
Date of publication

## Reference product
- aluminium oxide, metallurgical: 1000; software or database
  alumina

## Inputs
All rows: software or database
- soda ash, dense: 107.21
  soda ash
- Petroleum Coke: 1806.4
  Energy sources proportion of energy consumption is coal: fuel oil: coke: natural gas: coke even gas=46.0%: 11.0%: 7.1%: 14.1%: 21.7%
- coal gas: 5520.96
  (same comment as for Petroleum Coke)
- natural gas, high pressure: 3587.35
  (same comment as for Petroleum Coke)
- fuel oil, unspecified: 2798.64
  (same comment as for Petroleum Coke)
- hard coal: 11703.4
  (same comment as for Petroleum Coke)
- Water, unspecified natural origin: 4.28
  water consumption

## Data selection and combination
The data in this study refers to the LCA data of PA, SA, electricity, and other background data. The PA data were obtained from statistical data sources, and the SA data were mainly obtained from the literatures. The background data were mainly derived from the Chinese localization LCA database CAS RCEES 2018, which was established by the Research Center for Eco-Environmental Sciences, Chinese Academy of Sciences and covers LCA data for energy, materials, transportation, waste management etc.

## Use advice
When using this LCA data for alumina production, the data set users should pay attention to the specific year it represents (2007), as methodologies and technological efficiencies change over time. The data should be used within the context of Chinese production practices as outlined by the CAS RCEES 2018 database. Users should be aware of the geographical and technological scope, ensuring they account for regional differences in energy generation and material processing when applying this data to broader LCA models. Additionally, any subsequent updates to the LCA database should be considered to maintain the relevancy of the assessment.

## Review details
Inventory: The internal review was done by several iteration steps concerning raw data validation, raw data documentation, representativity, completeness and consistency of modelling with regard to ISO 14040 and 14044.

## Data sources
- Ding, N., Liu, N., Lu, B. & Yang, J. Life cycle greenhouse gas emissions of aluminum based on regional industrial transfer in China. J. Ind. Ecol. 25, 1657–1672 (2021).
