# Water electrolysis

Dataset: ILCD process, Unit process, single operation
Geography: HEB-CN
Reference year: 2022
Classification: Unit processes / Energy carriers and technologies / Electricity
Functional unit: 1 kg H2
LCI method principle: Attributional
Generated by: Jinlu Gan, jinlu.gan1998@gmail.com
Owner: Tiangong LCI Data Working Group
Review: Dependent internal review by Tiangong LCI Data Working Group
Amounts: no units in this file; such an amount is in the reference unit of its flow, which a separate flow dataset defines
copyright: false
licenseType: Free of charge for all users and uses

## General comment
Reference to the Large Hydrogen Plant in Guyuan, a city in Hebei, China, the PEM electrolyzer equipment studied in this paper has the power consumption of 5 MW, with capacity of 90 kg/h H2, efficiency of 60%. The annual output of the equipment is 17.52 MNm3 H2. Considering the coupling between the electrolyzer and solar energy, the equipment is assumed to operate for 10 h per day, and the life of the entire hydrogen production plant is 30 years. For the full operation state, the energy consumption of the whole system is 54.81 kWh/kg H2. The cathode of the PEM electrolysis device is sprayed on the carbon brazing plate with platinum-based metal, and the anode is sprayed with iridium oxide. The membrane material is Nafion material from DuPont, which is obtained by Dr. Walther Grot to improve Teflon material. It is the most popular membrane material for PEM. The overall structure of the electrolysis device is composed of chamber structure and skeleton structure. Apart from the membrane and electrode, most of the chamber structures are constructed by stainless steel. The skeleton part is constructed by resin, stainless steel, and chloroprene rubber.

## Time period
the publication date of the article

## Technical purpose
The high-efficiency proton exchange membrane (PEM) electrolysis system described is designed for large-scale hydrogen production. It is used to generate high-purity hydrogen suitable for a variety of applications, including fuel for fuel cell vehicles, feedstock for the chemical industry, and energy storage. The PEM technology ensures production efficiency and integrates with renewable solar energy sources to enhance sustainability. The system's high production rate of 90 kg/h makes it ideal for implementation in industrial settings where demand for hydrogen is significant.

## Reference product
- Hydrogen: 1; measured

## Inputs
All rows: measured
- carbon: 9.94e-6
- aluminium: 2.98e-5
- copper: 4.97e-6
- Electricity: 216
- iridium: 8.3e-7
- platinum: 8e-8
- Secondary Steel Making Slag: 0.000111
  stainless steel
- titanium: 0.000583
- freshwater: 9
- Chemicals (unspecified): 1.76e-5
  Nafion, The membrane material is Nafion material from DuPont, which is obtained by Dr. Walther Grot to improve Teflon material

## Use advice
Data users must consider the operational parameters specific to the PEM electrolysis process when utilizing this dataset, including the power consumption of 5 MW, hydrogen production capability of 90 kg/h, and efficiency rate of 60%. Additionally, the system's assumed operation of 10 hours per day and the life span of 30 years should be used to model the total environmental impact over its lifetime. Attention should be given to the solar coupling aspect to evaluate the renewable energy integration. Take note that material construction involving Nafion membrane, platinum and iridium coatings, stainless steel, resin, and chloroprene rubber, may require specific consideration regarding their production and end-of-life treatment in the LCA.

## Review details
Inventory: The internal review was done by several iteration steps concerning raw data validation, raw data documentation, representativity, completeness and consistency of modelling with regard to ISO 14040 and 14044.

## Data sources
- Zhang, J., Ling, B., He, Y., Zhu, Y., & Wang, Z. (2022). Life cycle assessment of three types of hydrogen production methods using solar energy. International Journal of Hydrogen Energy, 47(30), 14158–14168.
