# Primary aluminum production ; Primary aluminum ingots ; Bauxite ; 2003

Dataset: ILCD process, Unit process, single operation
Geography: CN
Reference year: 2014
Classification: Unit processes / Materials production / Metals and semimetals
Generated by: Yuzhen Feng, fyz22
Owner: Tiangong LCI Data Working Group
Review: Dependent internal review by Tiangong LCI Data Working Group
Amounts: no units in this file; such an amount is in the reference unit of its flow, which a separate flow dataset defines
copyright: false
licenseType: Free of charge for all users and uses

## General comment
The primary aluminum ingots produced are used in various applications across industries. These include, but are not limited to, use in the manufacturing of automotive parts, aircraft structures, building materials such as window frames and doors, consumer electronics casings, packaging like cans and foils, and in electrical transmission lines. The data set described pertains specifically to the production of primary aluminum ingots from bauxite, as practiced in the year 2003.

## Time period
Date of publication

## Reference product
- aluminium, primary, ingot: 1000; missing unimportant

## Inputs
All rows: missing unimportant
- electricity, high voltage, aluminium industry: 59680.8
  电力
- hard coal: 1110
  煤炭
- Petroleum Coke: 87.7
  焦炭
- drying, natural gas: 42
  天然气
- coal gas: 1260
  煤气
- light fuel oil: 161
  燃料油

## Data selection and combination
The resource and energy consumption data of primary aluminum production are based on the statistical data in Fig. 1 System boundary of primary aluminum production. For some non-statistical process data, they were obtained from research on production processes and technical indicators of typical enterprises and published literature.

## Use advice
When using this data set, LCA practitioners should consider the temporal relevance of the data as it reflects primary aluminum production practices from 2003. Care should be taken in assuming technological advancements and efficiencies that may have occurred since the time of data publication. The resource and energy data provided are based on statistical data primarily from the 'Non-Ferrous Metals Industry Yearbook' with additional process data sourced from surveys and published literature from typical businesses. Use specific to environmental impact assessment may require the inclusion of system boundaries as shown in Figure 1. Future changes in technology, regulations, and market conditions should be considered when using this data in new LCA studies to ensure its continued applicability.

## Review details
Inventory: The internal review was done by several iteration steps concerning raw data validation, raw data documentation, representativity, completeness and consistency of modelling with regard to ISO 14040 and 14044.

## Data sources
- 郭杰, 高峰, 王志宏, 刘宇, & 龚先政. 原铝生产流程温室气体排放主要影响因素的关联度分析. 环境工程学报 8, 4858–4863 (2014).
