# Sediment remediation ; ex-situ remediation ; ex-situ thermal analysis ; engineering implementation ; semi-coke separation

Dataset: ILCD process, Unit process, single operation
Geography: CN
Classification: Other Services / Repair and maintenance
Generated by: Wang Feng, wangfeng@caep.org.cn
Owner: Tiangong LCI Data Working Group
Review: Dependent internal review by Tiangong LCI Data Working Group
Amounts: no units in this file; such an amount is in the reference unit of its flow, which a separate flow dataset defines
copyright: false
licenseType: Free of charge for all users and uses

## General comment
Taking the treatment of 1 t sediment as a functional unit, the gas produced by pyrolysis first passes through a cooling unit, condensing and collecting the liquid components mainly as bio-oil that can be recycled, recovering the separated flammable gas, and the solid semi-coke can be used as an adsorbent.

## Technology and included processes
The gas produced by pyrolysis first passes through the cooling device, and the liquid composition collected by condensation is mainly bio-oil that can be recycled. The separated combustible gas is recovered, and the solid semi-coke can be used as an adsorbent.

## Technical purpose
The described industrial process involves sediment remediation through ex situ thermal desorption. The process is implemented as an engineering project, with the function of treating 1 ton of sludge. The transportation of the sludge involves a 5-ton truck over a distance of 2 km. The drying step utilizes a hollow paddle dryer with a power capacity of 55 kW, operating on a 24-hour schedule with a system scale of 50 t/d. The pyrolysis step is conducted in a tubular furnace with a rated power of 4 kW and an idling power of 1.4 kW. Before the reaction, nitrogen is introduced for 2 to 3 minutes to ensure an oxygen-free environment. The final temperature of pyrolysis is 350°C, where gas products are first cooled, and the condensate is mainly collected as bio-oil with high heating value that can be recovered for reuse. This data set represents a single unit process (singular operation).

## Reference product
- tar: 100.32; calculated

## Inputs
- Remediated Sediment: 1000; calculated

## Outputs
- carbon monoxide: 12.07; calculated
- carbon dioxide: 6.15; calculated
- Oils (unspecified): 79.18; calculated

## Use advice
When utilizing this data set for Life Cycle Assessment (LCA), users must ensure that the process conditions match those described (e.g., equipment type and capacity, reaction parameters). The data set is specifically for a sediment remediation process using ex situ thermal desorption and should only be applied to similar scenarios. Consideration should be taken on the transportation distance in the model on a case-by-case basis, as the default is set to 2 km. Energy inputs for drying and pyrolysis phases should be accounted for as given and adjusted if scales differ. Users should note that the produced bio-oil recovery is part of the process and take its energy recovery potential into account in the impact assessment. The absence of oxygen is essential for the pyrolysis step and should be considered when adapting this process to other applications or when comparing to processes with different operating conditions.

## Review details
Inventory: The internal review was done by several iteration steps concerning raw data validation, raw data documentation, representativity, completeness and consistency of modelling with regard to ISO 14040 and 14044.

## Data sources
- 王久兵.污泥热解反应机制及其能源化工艺的全生命周期评价研究[D].浙江工业大学,2016.
