# Geological design of exploration well ;Different structural belts in Weining block ;Study on Profile Refinement

Dataset: ILCD process, Unit process, single operation
Geography: BJ-CN
Reference year: 2009
Classification: Other Services / Engineering and consulting
LCI method principle: Attributional
LCI method approaches: Consequential
Generated by: Shikang Kang, 908798159@qq.com
Owner: Tiangong LCI Data Working Group
Review: Dependent internal review by Tiangong LCI Data Working Group
Amounts: no units in this file; such an amount is in the reference unit of its flow, which a separate flow dataset defines
copyright: false
licenseType: Free of charge for all users and uses

## General comment
According to the difference of pressure system in different structural belts of Weining block, the fine study of three pressure profiles is carried out by synthesizing a number of data. On this basis, the wellbore structure of South Ayashi and Winnie structural belts is optimized by using the top-down wellbore structure design method, aiming at providing technical support for excellent and fast drilling in this exploration area.

## Geography
Data development site

## Time period
Data collection time

## Technology and included processes
Based on the data of rock mechanics experiment, logging, oil and gas test, MDT formation pressure test and formation integrity test, and considering the difference of formation pressure system in different structural zones in Weining block, three fine pressure profiles of South Ayashi structural zone and Wini structural zone are established respectively, and the wellbore structure and casing program system suitable for different structural zones are further optimized.

## Technical purpose
The data set represents geological and engineering methodologies used primarily in the exploration and drilling of oil and gas wells within varied structural belts of the Weining block. This includes optimization of wellbore structural design using a top-down approach influenced by rock mechanics, logging, and formation pressure tests specific to the South Ayashi and Winnie structural belts, enabling efficient and accurate drilling to achieve the desired depth and geological targets.

## Reference product
- process steam from natural gas: 1898; input; log-normal; article inperiodical
  Ø340mm technical set 1898m, the data is distribution, the data filled in the quantity is the result of average (median value)

## Inputs
- process steam from natural gas: 0.96; log-normal; article inperiodical
  Average drilling production time, the data is distribution, the data filled in the quantity is the average (median value) result

## Data selection and combination
Based on logging data, three pressure profiles of South Ayashi structural belt and Winnie structural belt in Weining block are established. After repeated checking and verification by test data, MDT data and formation integrity test data, three fine pressure profiles are finally formed in Weining block

## Data treatment and extrapolations
The geological understanding of exploration blocks is generally shallow, and the drilling success rate should be paid attention to in wellbore structure design. Therefore, the top-down design method combined with casing strength check is selected to make the upper large-size casing run as deep as possible, so as to ensure the drilling reach the target horizon and avoid the completion of slim hole drilling

## Use advice
Users of this data should consider the differences in formation pressure systems between various structural zones when applying wellbore structural designs outlined by the data set. The data is derived from detailed rock mechanics experiments, logging, and formation pressure tests, and should be used to tailor drilling parameters and casing programs for specific geological conditions in the Weining block. Utilization should involve a validation process against additional test data to ensure the reliability of the models and their applicability in actual drilling operations. Special attention should be given to the design for ensuring drilling success rates and the avoidance of slim hole drilling completion issues.

## Review details
Inventory: The internal review was done by several iteration steps concerning raw data validation, raw data documentation, representativity, completeness and consistency of modelling with regard to ISO 14040 and 14044.

## Data sources
- 沈海超;张华卫;刘畅;曲洪娜; 亚北极海域萨哈林维宁区块探井井身结构优化研究. 钻采工艺 96–98 (2016).
