# Bauxite Mining ; Bauxite ; Cradle ; 2014

Dataset: ILCD process, Unit process, single operation
Geography: CN
Reference year: 2021
Classification: Unit processes / Materials production / Non-energetic raw materials
Generated by: Zimeng Cai, caizm6178@163.com
Owner: Tiangong LCI Data Working Group
Review: Dependent internal review by Tiangong LCI Data Working Group
Amounts: no units in this file; such an amount is in the reference unit of its flow, which a separate flow dataset defines
copyright: false
licenseType: Free of charge for all users and uses

## General comment
氧化铝生产2017

## Time period
Date of publication

## Technical purpose
This data set describes the life cycle inventory (LCI) of bauxite mining and the production of alumina (aluminum oxide) as a primary processing step in the aluminum manufacturing industry. The bauxite material is typically used to produce aluminum metal, which is further utilized in various applications such as automotive, aerospace, construction, packaging, and electrical industries due to its lightweight, corrosion resistance, and high conductivity properties.

## Reference product
- bauxite: 5.99337e10; software or database

## Inputs
All rows: software or database
- electricity, high voltage, aluminium industry: 1.98486e8
  electricity
- Coal, brown, in ground: 3.76756e8
  coal
- natural gas, high pressure: 6.405e6
  coal
- Gasoline: 1.036e6
  gasoline
- Diesel oil: 2.0346e7
  diesel

## Data selection and combination
The data in this study refers to the LCA data of PA, SA, electricity, and other background data. The PA data were obtained from statistical data sources, and the SA data were mainly obtained from the literatures. The background data were mainly derived from the Chinese localization LCA database CAS RCEES 2018, which was established by the Research Center for Eco-Environmental Sciences, Chinese Academy of Sciences and covers LCA data for energy, materials, transportation, waste management etc.

## Use advice
When utilizing this data set for Life Cycle Assessment, it is important to ensure that the system boundaries for the assessment include the cradle stage of the bauxite mining. The data for PA (Process Analysis) should be referenced against statistical data sources for accuracy, while SA (Scenario Analysis) data should be compared with relevant literature for applicability. Users must also consider the technological context specific to 2014 and 2017, as provided, and incorporate background data from the Chinese localization LCA database CAS RCEES 2018 for a comprehensive assessment. Particular attention should be given to the methodological assumptions of energy consumption, material sourcing, transportation, and waste management practices prevalent in the Chinese context during these years.

## Review details
Inventory: The internal review was done by several iteration steps concerning raw data validation, raw data documentation, representativity, completeness and consistency of modelling with regard to ISO 14040 and 14044.

## Data sources
- Ding, N., Liu, N., Lu, B. & Yang, J. Life cycle greenhouse gas emissions of aluminum based on regional industrial transfer in China. J. Ind. Ecol. 25, 1657–1672 (2021).
