# Aluminum ingot casting ; Primary aluminum ingot ; Liquid primary aluminum ; 2008

Dataset: ILCD process, Unit process, single operation
Geography: CN
Reference year: 2021
Classification: Unit processes / Materials production / Metals and semimetals
Generated by: Zimeng Cai, caizm6178@163.com
Owner: Tiangong LCI Data Working Group
Review: Dependent internal review by Tiangong LCI Data Working Group
Amounts: no units in this file; such an amount is in the reference unit of its flow, which a separate flow dataset defines
copyright: false
licenseType: Free of charge for all users and uses

## General comment
This primary aluminum ingot casting process is used for producing high-purity aluminum ingots from liquid primary aluminum. These ingots are typically utilized in a variety of industries such as automotive, construction, and packaging, where they are further processed into components, structures, or packaging materials.

## Time period
Date of publication

## Reference product
- aluminium, primary, ingot: 1000; software or database

## Inputs
- aluminium, primary, liquid: 1027.16; software or database

## Data selection and combination
The data in this study refers to the LCA data of PA, SA, electricity, and other background data. The PA data were obtained from statistical data sources, and the SA data were mainly obtained from the literatures. The background data were mainly derived from the Chinese localization LCA database CAS RCEES 2018, which was established by the Research Center for Eco-Environmental Sciences, Chinese Academy of Sciences and covers LCA data for energy, materials, transportation, waste management etc.

## Use advice
The Life Cycle Assessment (LCA) data for this primary aluminum ingot casting process should be used with caution. Ensure that the scope of the LCA encompasses the entire lifecycle of the product, from raw material extraction through the end-of-life phase. It is paramount to consider the year of publication for data relevance and to rely on updated statistical data sources and literatures for process analysis. Background data is sourced from the CAS RCEES 2018 database; verify that this aligns with the geographical context of the assessment. Be aware of the methodological differences and ensure data consistency when integrating with other datasets.

## Review details
Inventory: The internal review was done by several iteration steps concerning raw data validation, raw data documentation, representativity, completeness and consistency of modelling with regard to ISO 14040 and 14044.

## Data sources
- Ding, N., Liu, N., Lu, B. & Yang, J. Life cycle greenhouse gas emissions of aluminum based on regional industrial transfer in China. J. Ind. Ecol. 25, 1657–1672 (2021).
