# Aluminum electrolysis ; Liquid primary aluminum ; Prebaking ; Alumina for metallurgy ; 2015

Dataset: ILCD process, Unit process, single operation
Geography: CN
Reference year: 2021
Classification: Unit processes / Materials production / Metals and semimetals
Generated by: Zimeng Cai, caizm6178@163.com
Owner: Tiangong LCI Data Working Group
Review: Dependent internal review by Tiangong LCI Data Working Group
Amounts: no units in this file; such an amount is in the reference unit of its flow, which a separate flow dataset defines
copyright: false
licenseType: Free of charge for all users and uses

## General comment
This LCA data set represents the aluminum electrolysis process used to produce liquid primary aluminum with a prebaking step, using metallurgical grade alumina. The process is applicable to the synthesis of high-purity aluminum used in various industries, such as aerospace, transportation, electronics, and building materials. The primary aluminum produced through this process would typically be cast into ingots, billets, or other forms for further fabrication or direct use in manufacturing.

## Time period
Date of publication

## Reference product
- aluminium, primary, liquid: 1000; software or database

## Inputs
All rows: software or database
- Integrated AC power consumption: 47652.2
- aluminium oxide, metallurgical: 1910.16
- fluoride salt: 18.19
- anode, prebake, for aluminium electrolysis: 450.79
- Water, unspecified natural origin: 1.58

## Data selection and combination
The data in this study refers to the LCA data of PA, SA, electricity, and other background data. The PA data were obtained from statistical data sources, and the SA data were mainly obtained from the literatures. The background data were mainly derived from the Chinese localization LCA database CAS RCEES 2018, which was established by the Research Center for Eco-Environmental Sciences, Chinese Academy of Sciences and covers LCA data for energy, materials, transportation, waste management etc.

## Use advice
When using this data set, it is critical to consider the specific year (2015) as the technology and energy efficiency may have evolved since then. As this data is region-specific (Chinese LCA context), it should be used for LCA studies within the corresponding geographical scope or with careful consideration for adjustment to represent other regions. For methodological consistency, users should note that PA data is derived from statistical data sources, SA data mainly from existing literature, and background data from the Chinese localised CAS RCEES 2018 database. Ensure that these data sources are compatible with the goal and scope of the LCA being conducted.

## Review details
Inventory: The internal review was done by several iteration steps concerning raw data validation, raw data documentation, representativity, completeness and consistency of modelling with regard to ISO 14040 and 14044.

## Data sources
- Ding, N., Liu, N., Lu, B. & Yang, J. Life cycle greenhouse gas emissions of aluminum based on regional industrial transfer in China. J. Ind. Ecol. 25, 1657–1672 (2021).
