# Remediated soil ; Ex-situ S/S ; cement, bentonite ; Soil in-situ remediation ; 5 months

Dataset: ILCD process, Unit process, black box
Geography: UM
Reference year: 2009
Classification: Unit processes / Other Services / Repair and maintenance
Functional unit: The functional unit is defined as remediation of 5000 yd 3 of soil. The design of the treatment options is generic, and lacks parameters such as site characteristics, hydrology and efficiency of technology.
Generated by: Yang Xintong, yangxt@caep.org.cn
Owner: Tiangong LCI Data Working Group
Review: Dependent internal review by Tiangong LCI Data Working Group
Amounts: no units in this file; such an amount is in the reference unit of its flow, which a separate flow dataset defines
copyright: false
licenseType: Free of charge for all users and uses

## General comment
Ex-situ (S/S) treatment where contaminated soil was excavated, blended in a pug-mill and disposed of off-site, which required transportation. The amount of binders required for the treatment was estimated from available reports on actual site applications. The transportation distances for suppliers, landfill and clean-fill source were assumed to be 75 km. An average time of operation, 5 months (US EPA, 2000).

## Geography
This study used a hypothetical site and did not specify the location of the site, therefore the author's area was used as the site location: Newark, the United States

## Technology and included processes
Mixer (Pug mill )；Excavator；Compactor；Front loader；Hopper & blower；Tipper truck (40 t)；Treatment time: 5 months；10 workers/d; The ransportation distance from the site to landfill and suppliers was assumed to be 75km.

## Technical purpose
The described process is utilized for the remediation of contaminated soil. It involves ex-situ solidification/stabilization (S/S) using cement and bentonite. The remediated soil is applicable for safe redistribution or reuse in construction, landscaping, or as material cover. It is not specific to any location but uses the Newark, USA area as a case study.

## Reference product
- Remediated soil: 3822.77; estimated
  功能单元定义为5000 yd 3土壤的修复（1yd3等于0.764554857984立方米,即修复方量约为3822.77 m3）。

## Inputs
All rows: estimated
- cement, unspecified: 1e6
- bentonite: 400000
- Electricity: 32400
- Diesel,Diesel: 57
- Road Transport,Road Transport: 6e7
- transport in t*km: 2.12e6
  运输总距离为450km，自卸车载重40吨
- contaminated soil: 3822.77

## Use advice
When utilizing this data for Life Cycle Assessment, include the transportation of materials and equipment during site preparation and dismantling stages. Consider the use of materials and electricity in the treatment stage. Note the generic design of the treatment options and lack of specific site characteristics. Use caution when generalizing results to other locations. The transportation distances for all stages are assumed to be 75 km.

## Review details
Inventory: The internal review was done by several iteration steps concerning raw data validation, raw data documentation, representativity, completeness and consistency of modelling with regard to ISO 14040 and 14044.

## Data sources
- Dhaliwal, Harnoor, "Sustainable site remediation : a life cycle assessment approach" (2009). Theses. 296.
