# Northwest (Gaotai, Zhangye) Corn Production ; Agricultural Data Production

Dataset: ILCD process, Unit process, single operation
Geography: ZY-GS-CN
Reference year: 2012
Valid until: 2012
Classification: Unit processes / Materials production / Agricultural production means
Functional unit: 1 t
LCI method principle: Attributional
LCI method approaches: Consequential
Generated by: Haoran Zhang, hrzhang@whu.edu.cn
Owner: Tiangong LCI Data Working Group
Review: Dependent internal review by Tiangong LCI Data Working Group
Amounts: no units in this file; such an amount is in the reference unit of its flow, which a separate flow dataset defines
copyright: false
licenseType: Free of charge for all users and uses

## General comment
The article is based on research data collected from farmers, using the theory of agricultural carbon footprint and life cycle assessment to quantitatively study the carbon footprint and its composition of the rice-wheat rotation system in the downstream area of the Yangtze River. It further analyzes the factors influencing the carbon footprint.

## Geography
Gaotai County

## Technology and included processes
LCA method is used to evaluate the agricultural system of seed corn production, which takes the whole process of product treatment from input to final output as the research object to conduct quantitative analysis and comparison, so as to evaluate the environmental impact of seed corn production [13]. In this paper, the mass of seed corn 1 t is used as the functional unit. The boundary of the system starts from the production of fertilizer and electricity, and ends from the output of agricultural products and pollutants in the crop planting process. In other words, there are two production systems, namely the agricultural material production system and the crop production system

## Technical purpose
The data represents the life cycle inventory of corn production in Gaotai, Zhangye, and it is intended for evaluating the environmental footprint, specifically the carbon footprint, of the corn production process. The corn produced can be utilized as a food source, for animal feed, or as a raw material for industrial processes such as biofuel production or bioplastic manufacturing. The research encompasses agricultural input production systems (including chemical fertilizers and electricity) and crop production systems, reflecting the full extent of resource inputs and pollutant outputs in agricultural practices.

## Reference product
- maize grain: 1000; measured

## Inputs
- Labor: 0.3; measured
  people
- Production Expenditure: 2176.05; calculated
  Yuan
- Electricity: 658.368; measured
  用于抽水

## Deviations from the LCI method approaches
The system boundary starts with the production of chemical fertilizers and electricity, and the terminal boundary is the output of agricultural products and pollutants during the crop planting process. There are two production systems: the agricultural input production system and the crop production system.

## Data selection and combination
The data in this text comes from the statistical sampling survey of Zhangye city, and additional data obtained from a special survey conducted during the 2012 input-output table. In Ganzhou district, Jiantan town, Dangzhai village, and Xiaoman village were selected; in Linze county, Shahe town and Pingchuan town were selected; in Gaotai county, Xuanhua town, Xiangdao village, and Luotuo city township were chosen. After excluding incomplete data, a total of 72 household's effective data was obtained

## Data treatment and extrapolations
Using a combination of stratified random sampling and typical sample selection methods, data were collected through questionnaire surveys and structured interviews with typical samples. The survey content revolves around all input production elements and economic costs, as well as resource consumption, etc. The output mainly focuses on product yield and the current economic value, as well as the quantity of waste generated and its disposal methods.

## Sampling procedure
It is determined that the survey sample size in the three counties and districts of Zhangye city needs to add 80 household surveys. The composition of the samples maintains the principle of being consistent with the local agricultural added value ratio. The corresponding survey household numbers are determined according to the agricultural added value ratio of 7:5:8, that is, 28, 20, and 32 households are respectively drawn from the three counties and districts.

## Use advice
Users should apply this data in the context of the life cycle assessment of agricultural crops, considering regional specificities such as Gaotai, Zhangye for more accurate environmental impact evaluations. Caution should be exercised in extrapolating results to different regions or agricultural systems without adjusting for local conditions. The LCA model should also take into account the type of fertilizers and electricity production used, as these are starting points of the system boundary. Assessments should be updated with local data when more recent statistics are available to ensure relevance and accuracy.

## Review details
Inventory: The internal review was done by several iteration steps concerning raw data validation, raw data documentation, representativity, completeness and consistency of modelling with regard to ISO 14040 and 14044.

## Data sources
- 杨肖,钟方雷,郭爱君,王琼.干旱区绿洲制种玉米生命周期环境影响评价——以张掖市为例[J].农业环境科学学报,2017,36(8):1664-1671
