# Remediated soil ; In situ chemical oxidation ; In situ soil remediation ; Fenton reagent ; 50 pairs of injection wells ; 1 year

Dataset: ILCD process, Unit process, black box
Geography: UM
Reference year: 2009
Classification: Unit processes / Other Services / Repair and maintenance
Functional unit: The functional unit is defined as remediation of 5000 yd 3 of soil. The design of the treatment options is generic, and lacks parameters such as site characteristics, hydrology and efficiency of technology.
Generated by: Yang Xintong, yangxt@caep.org.cn
Owner: Tiangong LCI Data Working Group
Review: Dependent internal review by Tiangong LCI Data Working Group
Amounts: no units in this file; such an amount is in the reference unit of its flow, which a separate flow dataset defines
copyright: false
licenseType: Free of charge for all users and uses

## General comment
Chemical oxidation has been used as an in-situ technology to destroy hydrocarbon contamination. The treatment time is usually a few months (US EPA, 1998). Hydrogen peroxide is one of the frequently used oxidizing agents among others such as KMnO4 and Ozone (ITRC, 2005). Once injected into the contaminated zone, peroxide disintegrates into oxygen and water within hours. The chemical reaction generated by this solution, originally described by Fenton, 1894, creates a hydroxyl radical that very effectively 19 oxidizes complex organic compounds. Typically, peroxide is used at remediation sites in liquid form at dose concentrations that range from five percent to fifty percent by weight.

## Geography
This study used a hypothetical site and did not specify the location of the site, therefore the author's area was used as the site location: Newark, the United States

## Technology and included processes
50 Paired injection steel wells (6 and 2 m deep, dia. 6.25 cm); Radius of Influence, 2 m; 4 monitoring wells (8 m deep, dia. 6.25 cm); Oxidizing agent: Fenton reagent; Pump (1kW); Tipper truck (20t); Treatment time: 1 year; 10 workers/d.

## Technical purpose
The data set describes an in situ soil remediation process using in situ chemical oxidation (ISCO) with Fenton reagent. ISCO is intended for the treatment of hydrocarbon contaminated soils through oxidative degradation. This process can be applied in environmental remediation projects where in situ treatment of contaminants is required without the need for soil excavation, commonly suitable for industrial sites or areas where contaminants have seeped deep into the ground.

## Reference product
- Remediated soil: 3822.77; estimated
  功能单元定义为5000 yd 3土壤的修复（1yd3等于0.764554857984立方米,即修复方量约为3822.77 m3）。

## Inputs
All rows: estimated
- bentonite: 530
- sand: 113
- Steel: 3400
- Mortar: 1600
- Hydrogen peroxide,Hydrogen peroxide: 10
- Ferrous sulfate,ferrous sulfate: 20000
- Electricity: 360
- Road Transport,Road Transport: 1.6e7
- transport in t*km: 9000
  运输总距离为450km，自卸车载重20吨
- contaminated soil: 3822.77

## Use advice
When utilizing this data set for a life cycle assessment, users must regard the hypothetical nature of the case study and account for the lack of specific site characteristics, hydrology, and technological efficiency. Assumptions based on the author's area, Newark, United States, have been used, and users should adjust the parameters to fit the specific conditions and location of their project. The functional unit described requires scaling based on the volume of soil in need of remediation. It is also critical to include transportation of material and equipment both in the preparation and the dismantling phases when modeling the environmental impacts.

## Review details
Inventory: The internal review was done by several iteration steps concerning raw data validation, raw data documentation, representativity, completeness and consistency of modelling with regard to ISO 14040 and 14044.

## Data sources
- Dhaliwal, Harnoor, "Sustainable site remediation : a life cycle assessment approach" (2009). Theses. 296.
