# cement production;cement, ordinary portland cement

Dataset: ILCD process, Partly terminated system
Geography: CN
Classification: Materials production / Other mineralic materials
LCI method principle: Other
Generated by: Siqi Yang, ysqsophia@gmail.com
Owner: Tiangong LCI Data Working Group
Review: Dependent internal review by Tiangong LCI Data Working Group
Amounts: no units in this file; such an amount is in the reference unit of its flow, which a separate flow dataset defines
copyright: false
licenseType: Free of charge for all users and uses

## General comment
Selecting the portland cement series as the research object, calculate the carbon emissions from the cement production process.

## Technical purpose
The ordinary Portland cement produced from this process is used for general construction purposes, including infrastructure, buildings, and as a fundamental ingredient in concrete, mortar, and grouts. Applicable for numerous construction applications requiring high strength.

## Model description
Portland series cement is selected as the research object. Industrial waste is not calculated for resource consumption. The waste generated from the mining of raw materials, preparation of raw materials, burning of clinker, grinding, homogenization, packaging and transportation are mainly examined. direct carbon emissions and energy consumption. It is assumed that all raw materials related to cement production are transported by diesel vehicles with a load capacity of 5t, and the average transportation distance is 100km. Other related impacts are not considered.

## Reference product
- cement, ordinary portland cement: 1000
  Ordinary Portland Cement

## Inputs
- limestone, crushed, for mill: 1300
  Limestone
- clay: 300
  Clay
- iron ore: 30
  Iron ore
- gypsum stone (CaSO4-dihydrate): 50
  Gypsum
- electricity, medium voltage: 435.237
  Electricity consumption
- hard coal: 100.831
  The original text is hot consumption (that is, coal consumption). The original data is 2745.617MJ heat consumption, here converted to hard coal, the conversion formula is 1kg hard coal = 27.23MJ heat consumption.
- diesel: 46.6099
  Diesel vehicle transportation energy consumption. Assuming that all raw materials related to cement production are transported by diesel vehicles with a load capacity of 5 tons, and the average transportation distance is 100 km, without considering other relevant factors.

## Outputs
- carbon dioxide: 870.306
  CO2

## Data selection and combination
Statistics from cement manufacturers.

## Use advice
When using this LCA dataset, ensure that the scope of the assessment includes the direct carbon emissions from the cement production process only. Do not account for the carbon emissions from the transport of raw materials or other indirect activities. Industrial wastes are excluded from resource consumption calculations. Caution should be applied if the data set is used for assessing impacts other than those stated, as transportation and additional environmental impacts are not considered in the data set.

## Review details
Inventory: The internal review was done by several iteration steps concerning raw data validation, raw data documentation, representativity, completeness and consistency of modelling with regard to ISO 14040 and 14044.

## Data sources
- 陈乔. (2014). 建筑工程建设过程碳排放计算方法研究 [硕士, 长安大学].
