# PVC production ; PVC ; dry acetylene production process 200000 t/a

Dataset: ILCD process, Unit process, black box
Geography: CN
Reference year: 2010
Classification: Materials production / Plastics
Functional unit: 1-ton polyvinyl chloride
Generated by: Xiaoyu Cheng, xiaoyucheng@email.ncu.edu.cn
Owner: Tiangong LCI Data Working Group
Review: Dependent internal review by Tiangong LCI Data Working Group
Amounts: no units in this file; such an amount is in the reference unit of its flow, which a separate flow dataset defines
copyright: false
licenseType: Free of charge for all users and uses

## General comment
The process flow includes dry acetylene production from calcium carbide, chlorination and hydrogenation of acetylene to produce vinyl chloride, suspension PVC production from vinyl chloride using Japanese CHISSO polymerization technology, and PVC production from resin paste using polymerization technology packages.

## Geography
PVC production subsidiary of a large petrochemical group in southeastern China

## Time period
Publication time of literature

## Technology and included processes
The technical links of this process include: dry process of acetylene by calcium carbide, electrolysis of salt water to produce hydrogen chloride, addition of acetylene and hydrogen chloride to produce vinyl chloride, and polymerization of vinyl chloride to produce polyvinyl chloride.

## Technical purpose
This polyvinyl chloride (PVC) production data set represents the processes involved in the manufacturing of PVC using a dry acetylene production process. The resulting PVC is commonly employed in construction for pipes, window frames, and flooring, in healthcare for blood bags and tubing, and in everyday products like credit cards and clothing. The CHISSO polymerization technology incorporated in this data set indicates advanced production techniques that are suitable for high-quality PVC applications.

## Reference product
- Polyvinyl Chloride: 1000; measured

## Inputs
All rows: measured
- Calcium carbide: 1440
- Water for industrial use: 11780
- acetylene: 440
- hydrogen chloride: 610
- vinyl chloride: 1010
- Electricity: 778.14
  Electric energy
- process steam: 240.2
  Steam consumption (coal consumption)

## Outputs
- carbon dioxide: 247.17; article inperiodical
- carbon monoxide: 1.1; article inperiodical
- Nitrogen oxides: 2.52; article inperiodical
- sulfur dioxide: 3.37; measured
- Flue dust: 2.2; article inperiodical
- hydrocarbons (unspecified): 0.0192; article inperiodical
- hydrogen chloride: 0.0046; article inperiodical
- acetylene: 0.096; article inperiodical
- Vinyl Chloride Monomer: 0.274, 0.00247 (2 entries); article inperiodical
- PVC Waste Gas: 0.441; article inperiodical
- chemical oxygen demand: 0.454; article inperiodical
- Divalent lead ion: 2e-5; article inperiodical
- Suspended solids, unspecified: 0.359; measured
- sulfide: 0.00147; article inperiodical
- gasoline (regular): 0.00894; article inperiodical
- Hg2+/Total Mercury: 7.25e-6; article inperiodical
- Ash: 0.00623; measured
- Dregs: 0.00367; article inperiodical
- Sludge (from processing): 4.18; measured
- Hazardous Solid Waste: 0.578; measured

## Use advice
Users of this data set should ensure proper representation of the unique production technology while leveraging the data for environmental impact assessment in life cycle assessments (LCA). It's important to factor in regional context, given that the production subsidiary is located in southeastern China. Lifecycle stages, such as raw material acquisition, manufacture, distribution, use, and end-of-life, should be modeled considering the specific impacts of each stage relevant to PVC production. Methodologically, attention should be given to potential impacts of chlorinated hydrocarbon emissions and energy consumption patterns.

## Review details
Inventory: The internal review was done by several iteration steps concerning raw data validation, raw data documentation, representativity, completeness and consistency of modelling with regard to ISO 14040 and 14044.

## Data sources
- 伍跃辉, 陈爱燕, 王震 & 孙德智. 聚氯乙烯生产过程生命周期评价. 环境科学与技术 33, 202–205 (2010).
