# Molten iron production;Molten iron;BF(D01)

Dataset: ILCD process, Unit process, single operation
Geography: CN
Reference year: 1998
Classification: Materials production / Metals and semimetals
Generated by: Fuxiang, 1162850692@qq.com
Owner: Tiangong LCI Data Working Group
Review: Dependent internal review by Tiangong LCI Data Working Group
Amounts: no units in this file; such an amount is in the reference unit of its flow, which a separate flow dataset defines
copyright: false
licenseType: Free of charge for all users and uses

## General comment
来自表 4-17 D01 钢厂生产吨材环境负荷编目表

## Time period
论文提到钢铁企业环境总体数据为1998年的吨钢环境基础数据。

## Technical purpose
Molten iron produced from BF (Blast Furnace) D01 process is primarily used for steelmaking. It is the essential intermediate product in the manufacture of steel and serves as a critical input in various steel industry sectors.

## Reference product
- Molten Iron: 1065; measured
  molten iron

## Inputs
All rows: measured
- Energy, geothermal, converted: 14698.6
- water: 54474
- Sinter: 1751
- Metallurgical ash: 173
  Metallurgical white ash
- coke,Coke: 489
  Coke

## Outputs
All rows: measured
- Dust (unspecified, from stack): 7.891
- Hydrocarbons, aliphatic, alkanes, unspecified: 0.002154
  Petro
- Suspended solids, unspecified: 0.513255
- chemical oxygen demand: 0.213927
- Dust (unspecified, from stack): 55.833
  dust collection
- Spoil (deposited, hibernating in ground, non elementary flow): 582.502

## Use advice
When utilizing the dataset for molten iron production from BF (Blast Furnace) D01, it is crucial to ensure the data corresponds to steel produced in the year 1998, as per the environmental load inventory for steel plant production provided by Table 4-17 D01. Care should be taken to account for technological changes in the steel industry since 1998 that could affect the relevance of the data. The environmental baseline data for tonne steel from that year should be used for comparative purposes and should include consideration of any subsequent improvements or changes in the process.

## Review details
Inventory: The internal review was done by several iteration steps concerning raw data validation, raw data documentation, representativity, completeness and consistency of modelling with regard to ISO 14040 and 14044.

## Data sources
- 周和敏. 钢铁材料生产过程环境协调性评价研究. (北京工业大学, 2001).
