# cement production;cement, common portland cement;shaft kiln;mixed solid wastes

Dataset: ILCD process, Unit process, black box
Geography: GS-CN
Classification: Materials production / Other mineralic materials
Generated by: Siqi Yang, ysqsophia@gmail.com
Owner: Tiangong LCI Data Working Group
Review: Dependent internal review by Tiangong LCI Data Working Group
Amounts: no units in this file; such an amount is in the reference unit of its flow, which a separate flow dataset defines
copyright: false
licenseType: Free of charge for all users and uses

## General comment
Shaft kiln. 100% cement dust was recycled.

## Geography
Yongjing County Jinhe Shunfa Building Materials Co., Ltd.

## Technical purpose
This dataset describes the production process of common Portland cement using a shaft kiln. The cement produced is primarily used for construction purposes and is fundamental in the manufacturing of concrete and other building materials. With ordinary Portland cement making up approximately 98% of the cement production in China, this data can be utilized to understand the environmental impact of large-scale cement production specific to China's standards and technologies.

## Model description
Taking the production of 1 ton of ordinary Portland cement as a functional unit, this type of cement accounts for approximately 98% of total production in China.System boundaries for shaft kilns. Three stages are usually considered, namely raw material crushing, clinker generation and cement mill. The clinker generation stage includes mixing water, pelletizing and firing in the kiln. Each process takes into account raw materials, energy consumption, road transport, direct emissions (i.e. carbon dioxide, sulfur dioxide, nitrogen oxides and particulate matter) and infrastructure.

## Reference product
- cement, common portland cement: 1000
  Common Portland cement

## Inputs
- calcium carbonate: 1180
  Limestone
- gypsum: 42.9
  Gypsum
- water: 850
  Water
- dolomite: 53.68
  Dolomite
- clay: 33.66
  Red clay
- iron, powder: 18.32
  Iron powder
- Magnesium slag: 71.01
- blast furnace slag: 32.17
  Slag
- hard coal; 26.3 MJ/kg: 183.63
  Coal
- electricity, medium voltage: 435.6
  Electricity

## Outputs
- carbon dioxide: 850
  CO2. CO2 emission was calculated according to Eq.(Wu et al., 2006): E = 3:67a x k x Mcoal x Q + 0.38 x Mlimestone, where E, a, k, Mcoal, Q, and Mlimestone represent the amount of CO2 emission per ton of cement production, carbon oxygenation efficiency of coal (0.93, National Development and Reform Commission, 2011), carbon emission factor of coal (26.1 x 10-3, National Development and Reform Commission, 2011), mass of coal consumption per ton of cement production, caloric value of coal, and mass of limestone consumption per ton of cement production, respectively. The caloric value of coal considered in the present study was 24.48 MJ/kg.
- electricity, medium voltage: 1.2
  SO2. Emission data from the Chinese standard for cleaner production in the cement industry (HJ 467-2009).
- Nitrogen oxides: 2.4
  NOx. Emission data from the Chinese standard for cleaner production in the cement industry (HJ 467-2009).
- particles (> PM10): 5.4
  Particulates. The particle size is not specified. Here we treat it as PM>10. Direct air emission data were obtained from the Hongda Cement Plant (Yunnan, China).
- Water (groundwater from technosphere, waste water): 0.71
  Wastewater. The wastewater generated from the shaft kiln was treated in a civilian wastewater treatment plant.

## Data selection and combination
Shaft kiln scheme, data taken from literature. The application research of cleaner production technology in the cement industry comes from a master's thesis of Lanzhou University. Due to the lack of information on the former, direct atmospheric emissions data come from Yunnan Hongda Cement Plant. In addition, the China Cement Industry Cleaner Production Standard (HJ 467-2009) is used to determine direct SO2 and NOx emissions.

## Use advice
When using this dataset for Life Cycle Assessment (LCA), pay particular attention to the system boundaries and stages defined within the shaft kiln cement production process. It includes stages such as raw material crushing, clinker generation, and the cement milling process. Ensure that transportation, direct emissions, energy consumption, and infrastructure are also included in the analysis, as they are critical for the LCA of cement production. Be sure to incorporate the provided recycling rates for cement dust and apply the specific direct emissions data accordingly. Utilize the China Cement Industry Cleaner Production Standard (HJ 467-2009) for direct SO2 and NOx emissions to ensure conformity with local regulations when assessing environmental impact.

## Review details
Inventory: The internal review was done by several iteration steps concerning raw data validation, raw data documentation, representativity, completeness and consistency of modelling with regard to ISO 14040 and 14044.

## Data sources
- Wei Chen, Jinglan Hong, & Changqing Xu. (2015). Pollutants generated by cement production in China, their impacts, and the potential for environmental improvement. JOURNAL OF CLEANER PRODUCTION, 103, 61–69.
