# Ironmaking accounting link ; Steelmaking pig iron ; Vanadium and titanium sinter ore, sinter ore, pellet ore, coke, coal dust ; Blast Furnace Method ; All sizes; NESPS2 / 炼铁核算环节 ; 炼钢生铁 ; 钒钛烧结矿、烧结矿、球团矿、焦炭、煤粉 ; 高炉法 ; 所有规模 ; 全国第二次污染普查数据

Dataset: ILCD process, Unit process, single operation
Geography: CN
Reference year: 2019
Classification: Reference Parameters / Materials production / Metals and semimetals
Generated by: The data was created by the Office of the Second National Pollution Source Census of the Ministry of Ecology and Environment, and the data was organized by the TianGong Plan team for ILCD format / 生态环境部第二次全国污染源普查工作办公室创建数据，天工计划团队常慧敏整理数据为ILCD格式
Owner: Tiangong LCI Data Working Group / 天工LCI数据工作小组
Review: Dependent internal review by Tiangong LCI Data Working Group / 天工LCI数据工作小组
Amounts: no units in this file; such an amount is in the reference unit of its flow, which a separate flow dataset defines
copyright: false
licenseType: Free of charge for all users and uses

## General comment
the treatment technology for the pollution of Iron and Steel Smeltingdidn't offered

## Technical purpose
该数据集描述了钢铁制造中生铁生产过程，利用含钒和钛的烧结矿、烧结矿、球团矿、焦炭和煤粉在高炉中的混合。它包括所有规模的炼铁过程，表明该数据适用于从小规模定制操作到大规模工业生产的应用。

## Reference product
- Iron and Steel Smelting: 1000; calculated
  源文件中描述为为炼钢生铁，此处对其进行了匹配工作，将其匹配到LCAflow库里面相最符合的流，污染物指标备注为无组织颗粒物①

## Outputs
- particles (PM2.5 - PM10): 0.016; calculated
  the treatment technology for the pollution of particles (PM2.5 - PM10)didn't offered
  污染物指标无组织颗粒物的末端治理技术未说明，优。原文件中描述污染物类别为废气，污染物指标为无组织颗粒物，此处对其进行了匹配工作，将其匹配到LCAflow库里面相最符合的流，污染物指标备注为无组织颗粒物①
- particles (PM2.5 - PM10): 0.156; calculated
  the treatment technology for the pollution of particles (PM2.5 - PM10)didn't offered
  污染物指标无组织颗粒物的末端治理技术未说明，良。原文件中描述污染物类别为废气，污染物指标为无组织颗粒物，此处对其进行了匹配工作，将其匹配到LCAflow库里面相最符合的流，污染物指标备注为无组织颗粒物①
- particles (PM2.5 - PM10): 0.295; calculated
  the treatment technology for the pollution of particles (PM2.5 - PM10)didn't offered
  污染物指标无组织颗粒物的末端治理技术未说明，中。原文件中描述污染物类别为废气，污染物指标为无组织颗粒物，此处对其进行了匹配工作，将其匹配到LCAflow库里面相最符合的流，污染物指标备注为无组织颗粒物①
- particles (PM2.5 - PM10): 0.82; calculated
  the treatment technology for the pollution of particles (PM2.5 - PM10)didn't offered
  污染物指标无组织颗粒物的末端治理技术未说明，差。原文件中描述污染物类别为废气，污染物指标为无组织颗粒物，此处对其进行了匹配工作，将其匹配到LCAflow库里面相最符合的流，污染物指标备注为无组织颗粒物①

## Use advice
This dataset is derived from the Pollution Source Census Report and contains information on pollution emissions and related products. However, it does not include data on energy or chemical consumption, nor does it provide information on waste or co-product generation. When utilizing this dataset, please supplement the missing data based on actual conditions before use
该数据集来源于污染源普查报告，包含污染物排放及相关产品信息，但不包含能源或化学品消耗数据，也不提供废弃物或共生产物产生信息。在使用该数据集时，请根据实际情况补充缺失数据后再使用。

## Review details
Inventory: The internal review was done by several iteration steps concerning raw data validation, raw data documentation, representativity, completeness and consistency of modelling with regard to ISO 14040 and 14044.
清单： 内部审查通过几个迭代步骤完成，涉及原始数据验证、原始数据记录、代表性、完整性、与 ISO 14040 和 14044 有关的建模的一致性。

## Data sources
- 第二次全国污染源普查产排污核算系数手册（试用版）,四级代码3110文件，在完整版文件中第4111页
