# Rare Earth leaching and inorganic pre-separation;Rare Earth;In-situ leaching;neodymium iron boron (NdFeB) magnet

Dataset: ILCD process, Unit process, single operation
Geography: NMG-CN
Reference year: 2014
Classification: Materials production / Inorganic chemicals
Functional unit: The functional unit is a 1 kg NdFeB magnet
LCI method principle: Attributional
LCI method approaches: Allocation - market value; Allocation - mass
Generated by: Tao Wang, twang@iue.ac.cn
Owner: Tiangong LCI Data Working Group
Review: Dependent internal review by Tiangong LCI Data Working Group
Amounts: no units in this file; such an amount is in the reference unit of its flow, which a separate flow dataset defines
copyright: false
licenseType: Free of charge for all users and uses

## General comment
This data set describes the leaching and inorganic pre-separation processes of rare earth elements, specifically targeting the production of neodymium iron boron (NdFeB) magnets. The process involves in-situ leaching of rare earths at the Bayan Obo mine in China, followed by separation of neodymium (Nd) and praseodymium (Pr) via solvent extraction. NdFeB magnets are critical components in various advanced technologies including electric vehicles, wind turbines, and electronic devices due to their strong magnetic properties.

## Geography
Bayan Obo (China)

## Technology and included processes
The basic process for Nd and Pr production is the same at all three deposits. It is identical for Nd and Pr except for the last solvent extraction step (SX5) where both are separated.

## Reference product
- RE chloride solution: 115; article inperiodical
  RE chloride solution. Bayan Obo: input for next process: Solvent extraction

## Inputs
- sulphuric acid: 7.58; article inperiodical
  Bayan Obo: based on annual demand
- hydrogen chloride: 6.32; calculated
  Bayan Obo: own calculation based on Xu
- Ammonium bicarbonate: 7.3; calculated
  Ammonium bicarbonate. Bayan Obo: calculated amount for a pH value adjustment to 4
- hydrated lime dry slaked: 4.92; calculated
  Bayan Obo: used for precipitation, calculation based on Xu
- Electricity: 0.9756; calculated
  Bayan Obo: used for treatment of wastewater filtrate precipitation, stoichiometric calculation based on wastewater concentration
- Water: 256.4; calculated
  Bayan Obo: estimation based on energy demand of solvent extraction
- transport in t*km,transport in t*km: 0.56; calculated
  Bayan Obo: own calculation, based on Xu and mass and humidity of REE carbonate for the leaching processes and on solubility of NH4HCO3 for precipitation

## Outputs
- Sludge: 6.97; article inperiodical
  Bayan Obo: Ecoinvent process (RER: aluminium hydroxide factory) adapted to lifetime and throughput
- waste water - treated: 153; calculated
  Bayan Obo: own calculation based on Xu
- ammonium: 6.12; calculated
  Bayan Obo: own calculation based on Xu
- sulfate: 1.15; calculated
  Bayan Obo: own calculation based on Xu
- carbon dioxide: 1.179; article inperiodical
  Bayan Obo: emitted during HCl leaching, stoichiometric calculation

## Deviations from the LCI method approaches
In this study, an allocation method based on the market prices of REOs28 is considered. To estimate uncertainties that refer to the allocation method, a mass-based allocation is undertaken as a sensitivity analysis

## Use advice
Users should apply the data specifically for life cycle assessment (LCA) of NdFeB magnets. The basic process described is applicable for all three deposits from which Nd and Pr are obtained, differing only in the final solvent extraction (SX5) step. For the purposes of LCA, an allocation based on market prices of rare earth oxides (REOs) is considered in this study. Sensitivity analysis should include a mass-based allocation to ascertain the robustness of the market price allocation method. The functional unit for analysis is defined as 1 kilogram of NdFeB magnet.

## Review details
Inventory: The internal review was done by several iteration steps concerning raw data validation, raw data documentation, representativity, completeness and consistency of modelling with regard to ISO 14040 and 14044.

## Data sources
- Marx, J., Schreiber, A., Zapp, P. & Walachowicz, F. Comparative Life Cycle Assessment of NdFeB Permanent Magnet Production from Different Rare Earth Deposits. ACS Sustainable Chem. Eng. 6, 5858–5867 (2018).
