# Soil In Situ Remediation ; Soil Bioventilation ; Equipment and Materials Arriving on Site

Dataset: ILCD process, Unit process, single operation
Geography: CA
Reference year: 2007
Classification: Unit processes / Other Services / Repair and maintenance
Generated by: Wang Ning, wang_ning@caep.org.cn
Owner: Tiangong LCI Data Working Group
Review: Dependent internal review by Tiangong LCI Data Working Group
Amounts: no units in this file; such an amount is in the reference unit of its flow, which a separate flow dataset defines
copyright: false
licenseType: Free of charge for all users and uses

## General comment
Transportation of required materials to the site

## Geography
The contaminated area was located 600 m from a river shore in the northern part of the prov-ince of Quebec， Canada.

## Technology and included processes
Consumption of diesel gasoline for transportation of equipment and materials to project sites

## Technical purpose
This soil remediation process, known as soil bioventilation, is intended for the decontamination of polluted sites particularly those proximal to sensitive ecosystems such as river shores. The equipment and materials are used exclusively for in situ treatment — meaning treating the soil without removing it from the site. It is especially applicable to locations like the one described in Quebec, Canada, where contamination is within an area requiring site-specific remediation without the disruption of relocating materials.

## Reference product
- Equipment and Materials Arriving on Site: 1; estimated
  到达现场的材料和设备

## Inputs
- Diesel: 0.5; estimated
  将所需材料和设备运至现场所需要的柴油

## Use advice
When utilizing this LCA data set, users must take into account the location-specific nature of the soil remediation project. The data is tailored for a scenario where the contaminated area is near a water body, and transport distance to the site is defined. Attention must be paid to the transport-related energy consumption, here assumed to be by diesel gasoline, and the efficiency of material usage. Users should adjust the data if the conditions differ significantly in terms of distance, transport type, or environmental sensitivity. This data should not be genericized without proper adjustments for different scenarios.

## Review details
Inventory: The internal review was done by several iteration steps concerning raw data validation, raw data documentation, representativity, completeness and consistency of modelling with regard to ISO 14040 and 14044.

## Data sources
- Cadotte, M., Deschênes, L. & Samson, R. Selection of a remediation scenario for a diesel-contaminated site using LCA. Int J Life Cycle Assess 12, 239–251 (2007).
