# raw meal preparation;raw meal, portland cement raw meal;new dry process, ≥4000 t/d

Dataset: ILCD process, Unit process, single operation
Geography: CN
Reference year: 2019
Classification: Materials production / Other mineralic materials
Generated by: Siqi Yang, ysqsophia@gmail.com
Owner: Tiangong LCI Data Working Group
Review: Dependent internal review by Tiangong LCI Data Working Group
Amounts: no units in this file; such an amount is in the reference unit of its flow, which a separate flow dataset defines
copyright: false
licenseType: Free of charge for all users and uses

## General comment
New dry process for cement raw meal production.

## Technical purpose
This data set pertains to the raw meal preparation process, specifically for the production of portland cement using the new dry process with a capacity of equal to or greater than 4000 tons/day. The described process is crucial in the production of cement clinker, a key intermediate in the manufacture of portland cement. This industrial process is generally applicable in large-scale cement production facilities.

## Model description
The LCA system boundary is the raw meal preparation unit process.

## Reference product
- raw meal: 1000
  Ordinary portlant cement raw material

## Inputs
- iron, powder: 32.5
  Iron powder. Upstream data source: CLCD-China-ECER 0.8.1.
- electricity, medium voltage: 79.2
  Electricity. Upstream data source: CLCD-China-ECER 0.8.1.
- limestone, crushed, for mill: 824.8
  Limestone. Upstream data source: CLCD-China-ECER 0.8.1.
- clay: 142.7
  Clay. Upstream data source: CLCD-China-ECER 0.8.1.

## Outputs
- Clean gas: 857
  Waste gas [emitted to atmosphere]
- particles (> PM10): 0.059
  Total particulate matter [emitted to atmosphere], with an unspecified particle size, is treated as PM > 10 micrometers in diameter.

## Deviations from the LCI method approaches
A cement clinker lifecycle model was developed using eFootprint software system from Integrated Knowledge for our Environment, combined with CLCD quality assessment method, and LCA results were calculated.

## Data selection and combination
The inventory data of each raw material involved in the raw meal preparation stage is provided by the background database.

## Use advice
When using this dataset for Life Cycle Assessment (LCA) of cement raw meal preparation, please note that the dataset is based on the cut-off criteria as recommended by the ISO140 series of international standards. Users should include all major raw materials that constitute more than 1% of the total raw material weight and any high-purity substances that constitute more than 0.1% of the total weight in their LCA model. Ignored materials' total mass should not exceed 5% of total raw material input. Any environmental emissions data with negligible contributions to LCA results may be omitted. Consideration should also be given to excluding upstream data for low-value waste materials used as raw materials from the LCA model, such as tailings.

## Review details
Inventory: The internal review was done by several iteration steps concerning raw data validation, raw data documentation, representativity, completeness and consistency of modelling with regard to ISO 14040 and 14044.

## Data sources
- 李畅. (2020). 江西省某铜尾矿资源化过程生命周期评价研究 [硕士, 江西理工大学].
