# Remediated soi l Lime ; Agricultural land remediation ; In-situ stabilization

Dataset: ILCD process, Unit process, single operation
Geography: HZ-GD-CN
Reference year: 2021
Classification: Unit processes / Other Services / Repair and maintenance
Functional unit: The functional unit of this study was set to equally remediate 0.07 ha (1 mu, Chinese area unit) of Cd contaminated paddy fields, and the remediation goal is to reduce the Cd concentration in rice to the national safe use threshold of rice (0.2 mg/kg), with a time horizon of 30 years to obtain long-term impacts.
Generated by: Yang Xintong, yangxt@caep.org.cn
Owner: Tiangong LCI Data Working Group
Review: Dependent internal review by Tiangong LCI Data Working Group
Amounts: no units in this file; such an amount is in the reference unit of its flow, which a separate flow dataset defines
copyright: false
licenseType: Free of charge for all users and uses

## General comment
Heavy metal stabilization and remediation refers to the addition of stabilization agents to soil to transform exchangeable heavy metals into residual states, reduce the solubility and migration performance of heavy metals, and reduce their toxicity to the ecological environment

## Geography
The study site is a paddy field contaminated by Cd, located inGongzhuang town, Huizhou city of the Pearl River Delta, Southern China.

## Technology and included processes
Lime addition does not reduce the total Cd content in soil but can reduce the bioavailability of soil Cd. As a result, the Cd content in rice plants decreases. The remediation reagent is fully mixed with the surface contaminated soil (depth: 0–20 cm) through mechanical mixing. After remedial action, the remediation reagent is not removed

## Technical purpose
The process described pertains to the agricultural industry, specifically aimed at reducing heavy metal toxicity in contaminated paddy fields. The use of lime for in-situ stabilization mitigates cadmium contamination through the stabilization of heavy metals. This process converts exchangeable heavy metals into residual states, thus lowering their bioavailability and mobility. It serves a critical role in ensuring the safety of agricultural produce, particularly rice, by attempting to meet national safety standards for heavy metal content in food crops.

## Reference product
- Remediated soil: 3822.77; measured

## Inputs
- Equipment and Materials Arriving on Site: 1; measured
  由于我国南方有早稻和晚稻两个生长季节，修复剂的施用量为3000公斤/公顷，施用频率为每年2次。从2017年到2018年，每个场景的整个修复时间为2年。总施加剂量=3000kg/ha*0.07ha*2次/年*2年≈800kg
- Diesel,Diesel: 17.4; measured
- contaminated soil: 666.67; measured
  由原文可知，污染区域为0.07公顷（1亩）

## Use advice
When utilizing this dataset, users should note that the process is specifically suitable for the treatment of cadmium contamination in paddy fields. Users should incorporate the lime treatment into the LCA only where similar environmental and soil conditions apply. It is important to understand that lime addition targets the bioavailability of cadmium, rather than its total concentration in the soil, and that the remediation agent remains in the soil post-treatment. As such, the modeling should consider a long-term horizon to capture the ongoing impact of the treatment over an indicated period of 30 years.

## Review details
Inventory: The internal review was done by several iteration steps concerning raw data validation, raw data documentation, representativity, completeness and consistency of modelling with regard to ISO 14040 and 14044.

## Data sources
- Kai L ,Liping F ,Fangbai L , et al. Sustainability assessment and carbon budget of chemical stabilization based multi-objective remediation of Cd contaminated paddy field. The Science of the total environment, 2021, 819 152022-152022.
