# Brick production ; permeable brick ; Curing process

Dataset: ILCD process, Unit process, single operation
Geography: JNA-SD-CN
Reference year: 2018
Classification: Unit processes / Materials production / Other mineralic materials
Functional unit: The functional unit is the area of 1 m2 brick products.
Generated by: Wang xiangjin, r99rt4@163.com
Owner: Tiangong LCI Data Working Group
Review: Dependent internal review by Tiangong LCI Data Working Group
Amounts: no units in this file; such an amount is in the reference unit of its flow, which a separate flow dataset defines
copyright: false
licenseType: Free of charge for all users and uses

## General comment
Production process of permeable bricks in non sintered bricks

## Technical purpose
The data set represents permeable concrete bricks produced by Jinan Shunde Cement Products Co. Ltd. These bricks are utilized primarily in the construction of pavement that allows water to pass through, reducing runoff and enabling groundwater recharge. The bricks are suitable for sidewalks, walkways, plazas, driveways and other outdoor surfaces where stormwater management and ecological considerations are essential.

## Reference product
- permeable brick: 1; measured

## Inputs
- green brick: 94; measured
- freshwater: 4.88; measured

## Deviations from the LCI method approaches
ReCiPe midpoint (H) model is applied in this study.

## Data selection and combination
In this study, the production energy consumption of concrete pavement brick and permeable brick as well as the relevant data of all kinds of raw materials and energy input and exhaust emissions are collected from Jinan Shunde Cement Products Co. Ltd. Shandong Province.

## Sampling procedure
Most data of raw materials, energy input and waste discharge were collected from the site investigation of manufacturer. Water reducer is also called water reducing agent, whose chemical constituents is the sodium salt of the sulfonate formaldehyde condensation

## Use advice
This data set is designed for use in Life Cycle Assessment (LCA) of pavement brick products, specifically concrete pavement brick and permeable brick. Users should apply the ReCiPe midpoint (H) model as a methodological framework for impact assessment. The functional unit for data interpretation is 1 square meter of brick product. When using this data, pay particular attention to the variations in input and output related to changes in key processes, adhering to the 5% change principle for sensitivity analysis. Data regarding raw material consumption, energy inputs, and exhaust emissions must be considered and factored into the assessment appropriately. The water reducer, as a raw material, must be accounted for based on its chemical composition as a sodium salt of the sulfonate formaldehyde condensate.

## Review details
Inventory: The internal review was done by several iteration steps concerning raw data validation, raw data documentation, representativity, completeness and consistency of modelling with regard to ISO 14040 and 14044.

## Data sources
- Yuan, X. et al. Environmental and economic impacts assessment of concrete pavement brick and permeable brick production process - A case study in China. Journal of Cleaner Production 171, 198–208 (2018).
