# Gluing|Bambooflooring,bamboopanels,etc.|Adhesives(solvent-based)|GlueMixing/GlueCoating/GlueDrenching/GlueDipping|All sizes / 施胶|竹地板、竹制人造板等|胶粘剂（溶剂型）|拌胶/涂胶/淋胶/浸胶|所有规模

Dataset: ILCD process, Partly terminated system
Geography: CN
Reference year: 2019
Classification: Materials production / Other mineralic materials
Generated by: The data was created by the Office of the Second National Pollution Source Census of the Ministry of Ecology and Environment, and the data was organized by the TianGong Plan team for ILCD format / 生态环境部第二次全国污染源普查工作办公室创建数据，天工计划团队常慧敏整理数据为ILCD格式
Amounts: no units in this file; such an amount is in the reference unit of its flow, which a separate flow dataset defines
copyright: false

## Technology and included processes
the treatment technology for the pollution of Bamboo Flooringdidn't offered，The formula for calculating the actual operation rate (k-value) of the end-of-pipe treatment facility is k = power consumption of dust removal equipment (kWh) / (rated power of dust removal equipment (kW) × dust removal equipment operating time (hours))
污染物指标工业废气量的末端治理技术未说明

## Reference product
- Bamboo Flooring: 1; calculated
  原文件中描述污染物类别为Product，污染物指标为竹地板、竹制人造板等，此处对其进行了匹配工作，将其匹配到LCAflow库里面相最符合的流

## Outputs
- Exhaust gas: 253; calculated
  原文件中描述污染物类别为废气，污染物指标为工业废气量，此处对其进行了匹配工作，将其匹配到LCAflow库里面相最符合的流
- volatile organic compound: 0.01125, 0.0045, 0.003375, 0.02115, 0.01575, 0.018, 0.0225 (7 entries); calculated
  原文件中描述污染物类别为废气，污染物指标为挥发性有机物，此处对其进行了匹配工作，将其匹配到LCAflow库里面相最符合的流
- Water (river water from technosphere, waste water): 33; calculated
  原文件中描述污染物类别为废气，污染物指标为工业废水量（拌胶机喷胶头清洗），此处对其进行了匹配工作，将其匹配到LCAflow库里面相最符合的流
- chemical oxygen demand: 0.00396, 0.0396 (2 entries); calculated
  原文件中描述污染物类别为废水，污染物指标为化学需氧量（拌胶机喷胶头清洗），此处对其进行了匹配工作，将其匹配到LCAflow库里面相最符合的流

## Data sources
- 第二次全国污染源普查产排污核算系数手册（试用版）,二级代码20,三级代码204.0文件，在完整版文件中第382页
