# Coke oven ; Coke ; Coking coal ; Top loading ; Carbonization chamber greater than or equal to6m; NESPS2 / 焦炉 ; 焦炭 ; 炼焦煤 ; 顶装 ; 炭化室大于等于6m ; 全国第二次污染普查数据

Dataset: ILCD process, Unit process, single operation
Geography: CN
Reference year: 2019
Classification: Reference Parameters / Energy carriers and technologies / Hard coal based fuels
Generated by: The data was created by the Office of the Second National Pollution Source Census of the Ministry of Ecology and Environment, and the data was organized by the TianGong Plan team for ILCD format / 生态环境部第二次全国污染源普查工作办公室创建数据，天工计划团队常慧敏整理数据为ILCD格式
Owner: Tiangong LCI Data Working Group / 天工LCI数据工作小组
Review: Dependent internal review by Tiangong LCI Data Working Group / 天工LCI数据工作小组
Amounts: no units in this file; such an amount is in the reference unit of its flow, which a separate flow dataset defines
copyright: false
licenseType: Free of charge for all users and uses

## General comment
the treatment technology for the pollution of Exhaust gasdidn't offered，The formula for calculating the actual operation rate (k-value) of the end-of-pipe treatment facility is k = annual power consumption of wastewater treatment facilities (kWh) / (total rated power (kW) × annual operating time (hours))

## Technical purpose
所描述的工业过程是一种使用顶装炭化室（高度大于或等于6米）的焦炭生产方法。这个过程主要应用于冶金行业，从炼焦煤中生产焦炭，这是铁和钢制造不可或缺的材料。提到的管道末端管理技术用于控制焦化过程中的颗粒物（PM2.5 - PM10）、二氧化硫、挥发性有机化合物（VOCs）和氮氧化物（NOx）的排放。这些技术对于满足环境法规和减少污染对空气质量影响至关重要。

## Reference product
- Coke: 1000; calculated
  源文件中描述为为焦炭，此处对其进行了匹配工作，将其匹配到LCAflow库里面相最符合的流，污染物指标备注为工业废气量，产污系数备注为以高炉煤气为燃料的产污系数；

## Outputs
All rows: calculated
- particles (PM2.5 - PM10): 3.2e-5
  the Technical of end-of-pipe management technology for pollution particles (PM2.5 - PM10)isBag filter，Its Technical efficiency of end-of-pipe management99
  污染物指标颗粒物的末端治理技术是袋式除尘，其效率为99，末端治理设施实际运行率（k值）计算公式为k=除尘设备耗电量（千瓦时）/（除尘设备额定功率（千瓦）×除尘设备运行时间（小时））。原文件中描述污染物类别为废气，污染物指标为颗粒物，此处对其进行了匹配工作，将其匹配到LCAflow库里面相最符合的流，污染物指标备注为颗粒物，产污系数备注为以焦炉煤气为燃料的产污系数；
- particles (PM2.5 - PM10): 0.000245
  the Technical of end-of-pipe management technology for pollution particles (PM2.5 - PM10)isBag filter，Its Technical efficiency of end-of-pipe management99，The formula for calculating the actual operation rate (k-value) of the end-of-pipe treatment facility is k = annual power consumption of wastewater treatment facilities (kWh) / (total rated power (kW) × annual operating time (hours))
  污染物指标颗粒物的末端治理技术是袋式除尘，其效率为99，末端治理设施实际运行率（k值）计算公式为k=除尘设备耗电量（千瓦时）/（除尘设备额定功率（千瓦）×除尘设备运行时间（小时））。原文件中描述污染物类别为废气，污染物指标为颗粒物，此处对其进行了匹配工作，将其匹配到LCAflow库里面相最符合的流，污染物指标备注为颗粒物，产污系数备注为以高炉煤气为燃料的产污系数；
- sulfur dioxide: 0.000695
  the Technical of end-of-pipe management technology for pollution sulfur dioxideisAmmonia method，Its Technical efficiency of end-of-pipe management95
  污染物指标二氧化硫的末端治理技术是氨法，其效率为95，末端治理设施实际运行率（k值）计算公式为k=工艺废气净化装置耗电量（千瓦时）/（工艺废气净化装置额定功率（千瓦）×工艺废气净化装置运行时间（小时））。原文件中描述污染物类别为废气，污染物指标为二氧化硫，此处对其进行了匹配工作，将其匹配到LCAflow库里面相最符合的流，污染物指标备注为二氧化硫，产污系数备注为以高炉煤气为燃料的产污系数；
- sulfur dioxide: 0.000695
  the Technical of end-of-pipe management technology for pollution sulfur dioxideisDouble alkali process，Its Technical efficiency of end-of-pipe management95
  污染物指标二氧化硫的末端治理技术是双碱法，其效率为95，末端治理设施实际运行率（k值）计算公式为k=工艺废气净化装置耗电量（千瓦时）/（工艺废气净化装置额定功率（千瓦）×工艺废气净化装置运行时间（小时））。原文件中描述污染物类别为废气，污染物指标为二氧化硫，此处对其进行了匹配工作，将其匹配到LCAflow库里面相最符合的流，污染物指标备注为二氧化硫，产污系数备注为以高炉煤气为燃料的产污系数；
- sulfur dioxide: 0.0014
  the Technical of end-of-pipe management technology for pollution sulfur dioxideisLimestone/gypsum method, lime/gypsum method，Its Technical efficiency of end-of-pipe management90
  污染物指标二氧化硫的末端治理技术是石灰石/石膏法、石灰/石膏法，其效率为90，末端治理设施实际运行率（k值）计算公式为k=工艺废气净化装置耗电量（千瓦时）/（工艺废气净化装置额定功率（千瓦）×工艺废气净化装置运行时间（小时））。原文件中描述污染物类别为废气，污染物指标为二氧化硫，此处对其进行了匹配工作，将其匹配到LCAflow库里面相最符合的流，污染物指标备注为二氧化硫，产污系数备注为以高炉煤气为燃料的产污系数；
- sulfur dioxide: 0.002115
  the Technical of end-of-pipe management technology for pollution sulfur dioxideisRotary spray drying method，Its Technical efficiency of end-of-pipe management85
  污染物指标二氧化硫的末端治理技术是旋转喷雾干燥法，其效率为85，末端治理设施实际运行率（k值）计算公式为k=工艺废气净化装置耗电量（千瓦时）/（工艺废气净化装置额定功率（千瓦）×工艺废气净化装置运行时间（小时））。原文件中描述污染物类别为废气，污染物指标为二氧化硫，此处对其进行了匹配工作，将其匹配到LCAflow库里面相最符合的流，污染物指标备注为二氧化硫，产污系数备注为以高炉煤气为燃料的产污系数；
- sulfur dioxide: 0.00213
  the Technical of end-of-pipe management technology for pollution sulfur dioxideisOthers (dry desulfurization)，Its Technical efficiency of end-of-pipe management85，The formula for calculating the actual operation rate (k-value) of the end-of-pipe treatment facility is k = operating time of wastewater terminal treatment facilities (hours) / normal production time (hours)
  污染物指标二氧化硫的末端治理技术是其他（干法脱硫），其效率为85，末端治理设施实际运行率（k值）计算公式为k=工艺废气净化装置耗电量（千瓦时）/（工艺废气净化装置额定功率（千瓦）×工艺废气净化装置运行时间（小时））。原文件中描述污染物类别为废气，污染物指标为二氧化硫，此处对其进行了匹配工作，将其匹配到LCAflow库里面相最符合的流，污染物指标备注为二氧化硫，产污系数备注为以高炉煤气为燃料的产污系数；
- particles (PM2.5 - PM10): 0.0032
  the Technical of end-of-pipe management technology for pollution particles (PM2.5 - PM10)isDirect discharge，Its Technical efficiency of end-of-pipe management0，The formula for calculating the actual operation rate (k-value) of the end-of-pipe treatment facility is k = annual power consumption of wastewater treatment facilities (kWh) / (total rated power (kW) × annual operating time (hours))
  污染物指标颗粒物的末端治理技术是直排，其效率为0，末端治理设施实际运行率（k值）计算公式为-。原文件中描述污染物类别为废气，污染物指标为颗粒物，此处对其进行了匹配工作，将其匹配到LCAflow库里面相最符合的流，污染物指标备注为颗粒物，产污系数备注为以焦炉煤气为燃料的产污系数；
- sulfur dioxide: 0.0046
  the Technical of end-of-pipe management technology for pollution sulfur dioxideisAmmonia method，Its Technical efficiency of end-of-pipe management95
  污染物指标二氧化硫的末端治理技术是氨法，其效率为95，末端治理设施实际运行率（k值）计算公式为k=工艺废气净化装置耗电量（千瓦时）/（工艺废气净化装置额定功率（千瓦）×工艺废气净化装置运行时间（小时））。原文件中描述污染物类别为废气，污染物指标为二氧化硫，此处对其进行了匹配工作，将其匹配到LCAflow库里面相最符合的流，污染物指标备注为二氧化硫，产污系数备注为以焦炉煤气为燃料的产污系数；
- sulfur dioxide: 0.0046
  the Technical of end-of-pipe management technology for pollution sulfur dioxideisDouble alkali process，Its Technical efficiency of end-of-pipe management95
  污染物指标二氧化硫的末端治理技术是双碱法，其效率为95，末端治理设施实际运行率（k值）计算公式为k=工艺废气净化装置耗电量（千瓦时）/（工艺废气净化装置额定功率（千瓦）×工艺废气净化装置运行时间（小时））。原文件中描述污染物类别为废气，污染物指标为二氧化硫，此处对其进行了匹配工作，将其匹配到LCAflow库里面相最符合的流，污染物指标备注为二氧化硫，产污系数备注为以焦炉煤气为燃料的产污系数；
- sulfur dioxide: 0.0092
  the Technical of end-of-pipe management technology for pollution sulfur dioxideisLimestone/gypsum method, lime/gypsum method，Its Technical efficiency of end-of-pipe management90
  污染物指标二氧化硫的末端治理技术是石灰石/石膏法、石灰/石膏法，其效率为90，末端治理设施实际运行率（k值）计算公式为k=工艺废气净化装置耗电量（千瓦时）/（工艺废气净化装置额定功率（千瓦）×工艺废气净化装置运行时间（小时））。原文件中描述污染物类别为废气，污染物指标为二氧化硫，此处对其进行了匹配工作，将其匹配到LCAflow库里面相最符合的流，污染物指标备注为二氧化硫，产污系数备注为以焦炉煤气为燃料的产污系数；
- sulfur dioxide: 0.0138
  the Technical of end-of-pipe management technology for pollution sulfur dioxideisOthers (dry desulfurization)，Its Technical efficiency of end-of-pipe management85
  污染物指标二氧化硫的末端治理技术是其他（干法脱硫），其效率为85，末端治理设施实际运行率（k值）计算公式为k=工艺废气净化装置耗电量（千瓦时）/（工艺废气净化装置额定功率（千瓦）×工艺废气净化装置运行时间（小时））。原文件中描述污染物类别为废气，污染物指标为二氧化硫，此处对其进行了匹配工作，将其匹配到LCAflow库里面相最符合的流，污染物指标备注为二氧化硫，产污系数备注为以焦炉煤气为燃料的产污系数；
- sulfur dioxide: 0.0138
  the Technical of end-of-pipe management technology for pollution sulfur dioxideisRotary spray drying method，Its Technical efficiency of end-of-pipe management85
  污染物指标二氧化硫的末端治理技术是旋转喷雾干燥法，其效率为85，末端治理设施实际运行率（k值）计算公式为k=工艺废气净化装置耗电量（千瓦时）/（工艺废气净化装置额定功率（千瓦）×工艺废气净化装置运行时间（小时））。原文件中描述污染物类别为废气，污染物指标为二氧化硫，此处对其进行了匹配工作，将其匹配到LCAflow库里面相最符合的流，污染物指标备注为二氧化硫，产污系数备注为以焦炉煤气为燃料的产污系数；
- sulfur dioxide: 0.0139
  the Technical of end-of-pipe management technology for pollution sulfur dioxideisDirect discharge，Its Technical efficiency of end-of-pipe management0
  污染物指标二氧化硫的末端治理技术是直排，其效率为0，末端治理设施实际运行率（k值）计算公式为-。原文件中描述污染物类别为废气，污染物指标为二氧化硫，此处对其进行了匹配工作，将其匹配到LCAflow库里面相最符合的流，污染物指标备注为二氧化硫，产污系数备注为以高炉煤气为燃料的产污系数；
- volatile organic compound: 0.0203
  the Technical of end-of-pipe management technology for pollution volatile organic compoundisDirect discharge，Its Technical efficiency of end-of-pipe management0，The formula for calculating the actual operation rate (k-value) of the end-of-pipe treatment facility is k = operating time of wastewater terminal treatment facilities (hours) / normal production time (hours)
  污染物指标挥发性有机物的末端治理技术是直排，其效率为0，末端治理设施实际运行率（k值）计算公式为-。原文件中描述污染物类别为废气，污染物指标为挥发性有机物，此处对其进行了匹配工作，将其匹配到LCAflow库里面相最符合的流，污染物指标备注为挥发性有机物
- particles (PM2.5 - PM10): 0.0245
  the Technical of end-of-pipe management technology for pollution particles (PM2.5 - PM10)isDirect discharge，Its Technical efficiency of end-of-pipe management0，The formula for calculating the actual operation rate (k-value) of the end-of-pipe treatment facility is k = annual power consumption of wastewater treatment facilities (kWh) / (total rated power (kW) × annual operating time (hours))
  污染物指标颗粒物的末端治理技术是直排，其效率为0，末端治理设施实际运行率（k值）计算公式为-。原文件中描述污染物类别为废气，污染物指标为颗粒物，此处对其进行了匹配工作，将其匹配到LCAflow库里面相最符合的流，污染物指标备注为颗粒物，产污系数备注为以高炉煤气为燃料的产污系数；
- Nitrogen oxides: 0.03975
  the Technical of end-of-pipe management technology for pollution Nitrogen oxidesisSCR，Its Technical efficiency of end-of-pipe management85，The formula for calculating the actual operation rate (k-value) of the end-of-pipe treatment facility is k = operating time of wastewater terminal treatment facilities (hours) / normal production time (hours)
  污染物指标氮氧化物的末端治理技术是SCR法，其效率为85，末端治理设施实际运行率（k值）计算公式为k=工艺废气净化装置耗电量（千瓦时）/（工艺废气净化装置额定功率（千瓦）×工艺废气净化装置运行时间（小时））。原文件中描述污染物类别为废气，污染物指标为氮氧化物，此处对其进行了匹配工作，将其匹配到LCAflow库里面相最符合的流，污染物指标备注为氮氧化物，产污系数备注为以高炉煤气为燃料的产污系数；
- Nitrogen oxides: 0.07185
  the Technical of end-of-pipe management technology for pollution Nitrogen oxidesisSCR，Its Technical efficiency of end-of-pipe management85，The formula for calculating the actual operation rate (k-value) of the end-of-pipe treatment facility is k = operating time of wastewater terminal treatment facilities (hours) / normal production time (hours)
  污染物指标氮氧化物的末端治理技术是SCR法，其效率为85，末端治理设施实际运行率（k值）计算公式为k=工艺废气净化装置耗电量（千瓦时）/（工艺废气净化装置额定功率（千瓦）×工艺废气净化装置运行时间（小时））。原文件中描述污染物类别为废气，污染物指标为氮氧化物，此处对其进行了匹配工作，将其匹配到LCAflow库里面相最符合的流，污染物指标备注为氮氧化物，产污系数备注为以焦炉煤气为燃料的产污系数；
- sulfur dioxide: 0.092
  the Technical of end-of-pipe management technology for pollution sulfur dioxideisDirect discharge，Its Technical efficiency of end-of-pipe management0
  污染物指标二氧化硫的末端治理技术是直排，其效率为0，末端治理设施实际运行率（k值）计算公式为-。原文件中描述污染物类别为废气，污染物指标为二氧化硫，此处对其进行了匹配工作，将其匹配到LCAflow库里面相最符合的流，污染物指标备注为二氧化硫，产污系数备注为以焦炉煤气为燃料的产污系数；
- Nitrogen oxides: 0.265
  the Technical of end-of-pipe management technology for pollution Nitrogen oxidesisDirect discharge，Its Technical efficiency of end-of-pipe management0，The formula for calculating the actual operation rate (k-value) of the end-of-pipe treatment facility is k = operating time of wastewater terminal treatment facilities (hours) / normal production time (hours)
  污染物指标氮氧化物的末端治理技术是直排，其效率为0，末端治理设施实际运行率（k值）计算公式为-。原文件中描述污染物类别为废气，污染物指标为氮氧化物，此处对其进行了匹配工作，将其匹配到LCAflow库里面相最符合的流，污染物指标备注为氮氧化物，产污系数备注为以高炉煤气为燃料的产污系数；
- Nitrogen oxides: 0.479
  the Technical of end-of-pipe management technology for pollution Nitrogen oxidesisDirect discharge，Its Technical efficiency of end-of-pipe management0，The formula for calculating the actual operation rate (k-value) of the end-of-pipe treatment facility is k = operating time of wastewater terminal treatment facilities (hours) / normal production time (hours)
  污染物指标氮氧化物的末端治理技术是直排，其效率为0，末端治理设施实际运行率（k值）计算公式为-。原文件中描述污染物类别为废气，污染物指标为氮氧化物，此处对其进行了匹配工作，将其匹配到LCAflow库里面相最符合的流，污染物指标备注为氮氧化物，产污系数备注为以焦炉煤气为燃料的产污系数；
- Exhaust gas: 1280
  the treatment technology for the pollution of Exhaust gasdidn't offered，The formula for calculating the actual operation rate (k-value) of the end-of-pipe treatment facility is k = annual power consumption of wastewater treatment facilities (kWh) / (total rated power (kW) × annual operating time (hours))
  污染物指标工业废气量的末端治理技术是-，末端治理设施实际运行率（k值）计算公式为-。原文件中描述污染物类别为废气，污染物指标为工业废气量，此处对其进行了匹配工作，将其匹配到LCAflow库里面相最符合的流，污染物指标备注为工业废气量，产污系数备注为以焦炉煤气为燃料的产污系数；
- Exhaust gas: 1830
  the treatment technology for the pollution of Exhaust gasdidn't offered，The formula for calculating the actual operation rate (k-value) of the end-of-pipe treatment facility is k = annual power consumption of wastewater treatment facilities (kWh) / (total rated power (kW) × annual operating time (hours))
  污染物指标工业废气量的末端治理技术是-，末端治理设施实际运行率（k值）计算公式为-。原文件中描述污染物类别为废气，污染物指标为工业废气量，此处对其进行了匹配工作，将其匹配到LCAflow库里面相最符合的流，污染物指标备注为工业废气量，产污系数备注为以高炉煤气为燃料的产污系数；

## Use advice
This dataset is derived from the Pollution Source Census Report and contains information on pollution emissions and related products. However, it does not include data on energy or chemical consumption, nor does it provide information on waste or co-product generation. When utilizing this dataset, please supplement the missing data based on actual conditions before use
该数据集来源于污染源普查报告，包含污染物排放及相关产品信息，但不包含能源或化学品消耗数据，也不提供废弃物或共生产物产生信息。在使用该数据集时，请根据实际情况补充缺失数据后再使用。

## Review details
Inventory: The internal review was done by several iteration steps concerning raw data validation, raw data documentation, representativity, completeness and consistency of modelling with regard to ISO 14040 and 14044.
清单： 内部审查通过几个迭代步骤完成，涉及原始数据验证、原始数据记录、代表性、完整性、与 ISO 14040 和 14044 有关的建模的一致性。

## Data sources
- 第二次全国污染源普查产排污核算系数手册（试用版）,二级代码25,四级代码2521文件，在完整版文件中第2881页
