# Refined iron ore production;Refined iron ore;Beneficiation(Z08)

Dataset: ILCD process, Unit process, single operation
Geography: CN
Reference year: 1998
Classification: Materials production / Metals and semimetals
Generated by: Fuxiang, 1162850692@qq.com
Owner: Tiangong LCI Data Working Group
Review: Dependent internal review by Tiangong LCI Data Working Group
Amounts: no units in this file; such an amount is in the reference unit of its flow, which a separate flow dataset defines
copyright: false
licenseType: Free of charge for all users and uses

## General comment
来自表 4-16 Z08 钢厂生产吨材环境负荷编目表

## Time period
论文提到钢铁企业环境总体数据为1998年的吨钢环境基础数据。

## Technical purpose
The refined iron ore produced from this beneficiation process is used in steel manufacturing industries. It serves as a primary raw material for producing various steel products, due to its enriched iron content and improved purity.

## Reference product
- Refined Iron Ore: 1990; measured
  Concentrated iron ore

## Inputs
- Energy, geothermal, converted: 3030.76; measured
- water: 37010; measured
- Iron ore: 5369; measured
  iron ore

## Outputs
All rows: measured
- Dust (unspecified, from stack): 0.312
  soot
- Dust (unspecified, from stack): 2.848
- sulfur dioxide: 0.679
- Suspended solids, unspecified: 0.20696
- Dust (unspecified, from stack): 73.63
  dust collection
- Spoil (deposited, hibernating in ground, non elementary flow): 2189

## Use advice
Data set users should note that this life cycle assessment information is based on the environmental load of a steel mill's production process for one ton of material from 1998. When applying this data, it's essential to consider the technological applicability and any changes in environmental standards or processes that have occurred since 1998. It is important to account for improvements in the refinement process, potential recycling of materials, as well as technological advancements that could affect the environmental impact.

## Review details
Inventory: The internal review was done by several iteration steps concerning raw data validation, raw data documentation, representativity, completeness and consistency of modelling with regard to ISO 14040 and 14044.

## Data sources
- 周和敏. 钢铁材料生产过程环境协调性评价研究. (北京工业大学, 2001).
