# PE production ; Total of all wind farm

Dataset: ILCD process, Unit process, single operation
Geography: SH-CN
Reference year: 2009
Classification: Unit processes / Energy carriers and technologies / Renewable fuels
Functional unit: The functional unit is 1 kWh on-grid electricity provision.
LCI method principle: Attributional
LCI method approaches: Allocation
Generated by: Yunzhi Zhao, ll10088@163.com
Owner: Tiangong LCI Data Working Group
Review: Dependent internal review by Tiangong LCI Data Working Group
Amounts: no units in this file; such an amount is in the reference unit of its flow, which a separate flow dataset defines
copyright: false
licenseType: Free of charge for all users and uses

## General comment
The polyethylene (PE) produced in the described industrial process is used in the construction and maintenance of the Donghai Bridge Offshore Wind Farm (DBOWF). The material functions as a component within the wind turbines, foundations, and cables, contributing to the generation of on-grid electricity through wind power. This industrial process is specific to the support of renewable energy infrastructure, particularly within the jurisdiction of Shanghai and may serve as a reference for similar offshore wind farm projects worldwide.

## Geography
The studied wind farm, the Donghai Bridge Offshore Wind Farm (DBOWF), is China's first offshore wind farm within the jurisdiction of Shanghai, as well as the first offshore wind farm outside Europe. The project has two-phases of construction, located on each side of the Donghai bridge (Fig. 1).

## Reference product
- polyethylene high density granulate (PE-HD): 257000; estimated

## Inputs
- Energy, geothermal, converted: 1.76e7; software or database

## Outputs
- carbon dioxide: 645000; software or database
- particles (PM2.5): 50; software or database
- sulfur dioxide: 870; software or database
- nitrous oxide: 1170; software or database

## Deviations from the LCI method approaches
The present study employed the PLCA modeling approach to calculate the energy and environmental emissions of a typical offshore wind farm in China. The cradle-to-grave process includes four stages, materials and equipment manufacturing, transportation and installation, operation and maintenance, and dismantling and recycling (Fig. 2).

## Data selection and combination
The technical parameters of wind turbines, foundations and cables are obtained from the design documents of the DBOWF (Table 2). The energy and emissions factors (i.e., the energy consumption and environmental emissions of per unit material and component production) are derived from the Ecoinvent 2.2 dataset (Ecoinvent Centre, 2009), and the coefficients of China's practices were preferentially referred. For key materials and equipment, their sea transportation energy is calculated from the transportation load and shipping energy intensity. The facility installation energy and emissions were estimated based on the construction plan. The wind farm's operation and maintenance data, such as the frequency and working time of maintenance, were obtained from site investigations with engineers and technicians. The uncertainties associated with model parameters and input data are illustrated in the sensitivity analysis section of this paper.

## Use advice
Users of this LCA data set should note that the energy and emission factors are specific to the DBOWF and are based on the Ecoinvent 2.2 dataset with a preference for coefficients pertaining to Chinese practices. Caution should be taken when extrapolating these findings to other contexts, as local conditions and construction practices might differ significantly. The energy required for sea transportation of materials to the offshore site has been specifically calculated for this project and may require adjustment for other sites. Users should also account for uncertainties and variability in parameters as discussed in the sensitivity analysis of the data. Finally, when using this data for comparison or integration into larger systems, ensure that upstream and downstream processes, such as materials and equipment manufacturing, transportation, installation, operation, maintenance, dismantling, and recycling, are fully considered.

## Review details
Inventory: The internal review was done by several iteration steps concerning raw data validation, raw data documentation, representativity, completeness and consistency of modelling with regard to ISO 14040 and 14044.

## Data sources
- Yang, J. et al. The life-cycle energy and environmental emissions of a typical offshore wind farm in China. Journal of Cleaner Production 180, 316–324 (2018).
