# Sulfuric acid ; Sulfur iron ore ; Two rotations and two suctions ; All sizes; NESPS2 / 硫酸 ; 硫铁矿 ; 两转两吸 ; 所有规模 ; 全国第二次污染普查数据

Dataset: ILCD process, Unit process, single operation
Geography: CN
Reference year: 2019
Classification: Reference Parameters / Materials production / Inorganic chemicals
Generated by: The data was created by the Office of the Second National Pollution Source Census of the Ministry of Ecology and Environment, and the data was organized by the TianGong Plan team for ILCD format / 生态环境部第二次全国污染源普查工作办公室创建数据，天工计划团队常慧敏整理数据为ILCD格式
Owner: Tiangong LCI Data Working Group / 天工LCI数据工作小组
Review: Dependent internal review by Tiangong LCI Data Working Group / 天工LCI数据工作小组
Amounts: no units in this file; such an amount is in the reference unit of its flow, which a separate flow dataset defines
copyright: false
licenseType: Free of charge for all users and uses

## General comment
the Technical of end-of-pipe management technology for pollution Exhaust gasis/，Its Technical efficiency of end-of-pipe management0

## Technical purpose
该工业过程数据集涉及从硫化矿石生产硫酸的过程，采用通常称为'两转两吸'的技术，适用于不同规模的设施。该过程包括先进的管道末端管理技术，用于处理废气和废水中的污染物，包括氨吸收法、过氧化氢法、碱法和硫化法等方法，以管理二氧化硫、砷、铅和氟化物的排放。

## Reference product
- Sulfuric acid: 1000; calculated
  源文件中描述为为硫酸，此处对其进行了匹配工作，将其匹配到LCAflow库里面相最符合的流，污染物指标备注为工业废气量

## Outputs
All rows: calculated
- arsenic: 1.78e-5
  the Technical of end-of-pipe management technology for pollution arsenicisAlkali neutralization，Its Technical efficiency of end-of-pipe management99.9
  污染物指标砷的末端治理技术是碱中和，其效率为99.9，末端治理设施实际运行率（k值）计算公式为k=治理设施运行时间(小时/年)/正常生产时间(小时/年)。原文件中描述污染物类别为废水，污染物指标为砷，此处对其进行了匹配工作，将其匹配到LCAflow库里面相最符合的流，污染物指标备注为砷
- arsenic: 1.78e-5
  the Technical of end-of-pipe management technology for pollution arsenicisLime and iron salt method，Its Technical efficiency of end-of-pipe management99.9
  污染物指标砷的末端治理技术是石灰铁盐法，其效率为99.9，末端治理设施实际运行率（k值）计算公式为k=治理设施运行时间(小时/年)/正常生产时间(小时/年)。原文件中描述污染物类别为废水，污染物指标为砷，此处对其进行了匹配工作，将其匹配到LCAflow库里面相最符合的流，污染物指标备注为砷
- arsenic: 1.78e-5
  the Technical of end-of-pipe management technology for pollution arsenicisVulcanization + gypsum + neutralization method，Its Technical efficiency of end-of-pipe management99.9
  污染物指标砷的末端治理技术是硫化+石膏+中和法，其效率为99.9，末端治理设施实际运行率（k值）计算公式为k=治理设施运行时间(小时/年)/正常生产时间(小时/年)。原文件中描述污染物类别为废水，污染物指标为砷，此处对其进行了匹配工作，将其匹配到LCAflow库里面相最符合的流，污染物指标备注为砷
- lead: 2.94e-5
  the Technical of end-of-pipe management technology for pollution leadisAlkali neutralization，Its Technical efficiency of end-of-pipe management94
  污染物指标铅的末端治理技术是碱中和，其效率为94，末端治理设施实际运行率（k值）计算公式为k=治理设施运行时间(小时/年)/正常生产时间(小时/年)。原文件中描述污染物类别为废水，污染物指标为铅，此处对其进行了匹配工作，将其匹配到LCAflow库里面相最符合的流，污染物指标备注为铅
- lead: 2.94e-5
  the Technical of end-of-pipe management technology for pollution leadisLime and iron salt method，Its Technical efficiency of end-of-pipe management94
  污染物指标铅的末端治理技术是石灰铁盐法，其效率为94，末端治理设施实际运行率（k值）计算公式为k=治理设施运行时间(小时/年)/正常生产时间(小时/年)。原文件中描述污染物类别为废水，污染物指标为铅，此处对其进行了匹配工作，将其匹配到LCAflow库里面相最符合的流，污染物指标备注为铅
- lead: 2.94e-5
  the Technical of end-of-pipe management technology for pollution leadisVulcanization + gypsum + neutralization method，Its Technical efficiency of end-of-pipe management94
  污染物指标铅的末端治理技术是硫化+石膏+中和法，其效率为94，末端治理设施实际运行率（k值）计算公式为k=治理设施运行时间(小时/年)/正常生产时间(小时/年)。原文件中描述污染物类别为废水，污染物指标为铅，此处对其进行了匹配工作，将其匹配到LCAflow库里面相最符合的流，污染物指标备注为铅
- Waste water: 0.29
  the Technical of end-of-pipe management technology for pollution Waste wateris/，Its Technical efficiency of end-of-pipe management0
  污染物指标工业废水量的末端治理技术是/，其效率为0。原文件中描述污染物类别为废水，污染物指标为工业废水量，此处对其进行了匹配工作，将其匹配到LCAflow库里面相最符合的流，污染物指标备注为工业废水量
- fluoride: 0.000524
  the Technical of end-of-pipe management technology for pollution fluorideisAlkali neutralization，Its Technical efficiency of end-of-pipe management98
  污染物指标氟化物的末端治理技术是碱中和，其效率为98，末端治理设施实际运行率（k值）计算公式为k=治理设施运行时间(小时/年)/正常生产时间(小时/年)。原文件中描述污染物类别为废水，污染物指标为氟化物，此处对其进行了匹配工作，将其匹配到LCAflow库里面相最符合的流，污染物指标备注为氟化物
- fluoride: 0.000524
  the Technical of end-of-pipe management technology for pollution fluorideisLime and iron salt method，Its Technical efficiency of end-of-pipe management98
  污染物指标氟化物的末端治理技术是石灰铁盐法，其效率为98，末端治理设施实际运行率（k值）计算公式为k=治理设施运行时间(小时/年)/正常生产时间(小时/年)。原文件中描述污染物类别为废水，污染物指标为氟化物，此处对其进行了匹配工作，将其匹配到LCAflow库里面相最符合的流，污染物指标备注为氟化物
- fluoride: 0.000524
  the Technical of end-of-pipe management technology for pollution fluorideisVulcanization + gypsum + neutralization method，Its Technical efficiency of end-of-pipe management98
  污染物指标氟化物的末端治理技术是硫化+石膏+中和法，其效率为98，末端治理设施实际运行率（k值）计算公式为k=治理设施运行时间(小时/年)/正常生产时间(小时/年)。原文件中描述污染物类别为废水，污染物指标为氟化物，此处对其进行了匹配工作，将其匹配到LCAflow库里面相最符合的流，污染物指标备注为氟化物
- sulfur dioxide: 0.5985
  the Technical of end-of-pipe management technology for pollution sulfur dioxideisAmmonia absorption，Its Technical efficiency of end-of-pipe management81
  污染物指标二氧化硫的末端治理技术是氨法吸收，其效率为81，末端治理设施实际运行率（k值）计算公式为k=治理设施运行时间(小时/年)/正常生产时间(小时/年)。原文件中描述污染物类别为废气，污染物指标为二氧化硫，此处对其进行了匹配工作，将其匹配到LCAflow库里面相最符合的流，污染物指标备注为二氧化硫
- sulfur dioxide: 0.5985
  the Technical of end-of-pipe management technology for pollution sulfur dioxideisHydrogen peroxide method，Its Technical efficiency of end-of-pipe management81
  污染物指标二氧化硫的末端治理技术是双氧水法，其效率为81，末端治理设施实际运行率（k值）计算公式为k=治理设施运行时间(小时/年)/正常生产时间(小时/年)。原文件中描述污染物类别为废气，污染物指标为二氧化硫，此处对其进行了匹配工作，将其匹配到LCAflow库里面相最符合的流，污染物指标备注为二氧化硫
- sulfur dioxide: 0.5985
  the Technical of end-of-pipe management technology for pollution sulfur dioxideisSodium alkali method，Its Technical efficiency of end-of-pipe management81
  污染物指标二氧化硫的末端治理技术是钠碱法，其效率为81，末端治理设施实际运行率（k值）计算公式为k=治理设施运行时间(小时/年)/正常生产时间(小时/年)。原文件中描述污染物类别为废气，污染物指标为二氧化硫，此处对其进行了匹配工作，将其匹配到LCAflow库里面相最符合的流，污染物指标备注为二氧化硫
- Exhaust gas: 2140
  the Technical of end-of-pipe management technology for pollution Exhaust gasis/，Its Technical efficiency of end-of-pipe management0
  污染物指标工业废气量的末端治理技术是/，其效率为0。原文件中描述污染物类别为废气，污染物指标为工业废气量，此处对其进行了匹配工作，将其匹配到LCAflow库里面相最符合的流，污染物指标备注为工业废气量

## Use advice
This dataset is derived from the Pollution Source Census Report and contains information on pollution emissions and related products. However, it does not include data on energy or chemical consumption, nor does it provide information on waste or co-product generation. When utilizing this dataset, please supplement the missing data based on actual conditions before use
该数据集来源于污染源普查报告，包含污染物排放及相关产品信息，但不包含能源或化学品消耗数据，也不提供废弃物或共生产物产生信息。在使用该数据集时，请根据实际情况补充缺失数据后再使用。

## Review details
Inventory: The internal review was done by several iteration steps concerning raw data validation, raw data documentation, representativity, completeness and consistency of modelling with regard to ISO 14040 and 14044.
清单： 内部审查通过几个迭代步骤完成，涉及原始数据验证、原始数据记录、代表性、完整性、与 ISO 14040 和 14044 有关的建模的一致性。

## Data sources
- 第二次全国污染源普查产排污核算系数手册（试用版）,二级代码26,四级代码2611文件，在完整版文件中第4111页
