# Hydrometallurgical recycling of waste power batteries to produce lithium nickel-cobalt-manganese oxide.

Dataset: ILCD process, Unit process, single operation
Geography: CN
Reference year: 2015
Classification: Unit processes / End-of-life treatment / Material recycling
Functional unit: 1 000 kg of lithium nickel cobalt manganese oxide (ternary material) as a functional unit.
Generated by: huzhikang, hzk2503593129@163.com
Owner: Tiangong LCI Data Working Group
Review: Dependent internal review by Tiangong LCI Data Working Group
Amounts: no units in this file; such an amount is in the reference unit of its flow, which a separate flow dataset defines
copyright: false
licenseType: Free of charge for all users and uses

## General comment
The method includes pretreatment, alkali washing, leaching, debinding, precipitation, and sintering processes.

## Technical purpose
This industrial process is used to recover valuable materials from end-of-life power batteries to produce lithium nickel-cobalt-manganese oxide (LNCMO), which is a critical component for the manufacturing of new lithium-ion batteries, particularly those used in electric vehicles and portable electronic devices.

## Reference product
- Ternary cathode material: 1000; measured
  Lithium nickel cobalt manganese oxide (ternary material)

## Inputs
All rows: measured
- Battery: 3330
  Waste Power Battery
- Sulfuric acid(98%): 3660
  H2SO4（98%）
- Hydrochloric acid (30%): 133.08
  HCl（30%）
- sodium hydroxide: 7260
  NaOH（30%）
- Sodium carbonate: 69.86
  Na2CO3
- Ammonia (28%): 373.35
- 2-ethylhexyl hydrogen -2-ethylhexylphosphonate: 6.66
  P507 Extractant
- Kerosene: 16.27
- Hydrogen peroxide: 1220
  H2O2
- freshwater: 46580
  Industrial water
- Lithium carbonate: 402.51
- Electricity: 27924
  electricity
- natural gas,natural gas: 465.79
  Natural Gas

## Outputs
All rows: measured
- Water,Water: 33270
  Waste Water
- Ammonia Nitrogen: 0.19962
- nickel: 0.013308
  Ni
- carbon dioxide (fossil): 224
  Carbon dioxide (The original article did not distinguish between bio and fossil, but according to experts, this is fossil.)
- Other Solid Waste: 1170
  Residue and ash
- Plastic (unspecified),Plastic (unspecified): 133.08
  Plastic PP
- copper: 332.7
  Copper
- iron: 598.86
  Steel

## Data selection and combination
The data are derived from field research and calculation by the authors.

## Use advice
When using this data set, ensure that the life cycle assessment accurately reflects the specific conditions of the recycling process, including any emissions and energy consumption associated with the pretreatment, alkali washing, leaching, debinding, precipitation, and sintering stages. Additionally, when modelling system boundaries, include the end-of-life phase for the power batteries, and consider the potential environmental benefits derived from the substitution of primary materials with recycled LNCMO.

## Review details
Inventory: The internal review was done by several iteration steps concerning raw data validation, raw data documentation, representativity, completeness and consistency of modelling with regard to ISO 14040 and 14044.

## Data sources
- 谢英豪, 余海军, 欧彦楠, & 李长东. 废旧动力电池回收的环境影响评价研究. 无机盐工业 47, 43-46+61 (2015).
