# LIB Hydrometallurgy--Inorganic acid leaching(Process D)

Dataset: ILCD process, Unit process, single operation
Geography: CN
Reference year: 2013
Valid until: 2017
Classification: Unit processes / End-of-life treatment / Material recycling
Functional unit: FU is a typical type of LIB electrode material of 100 kg
Generated by: maqingyuan, m1120498928@163.com
Owner: Tiangong LCI Data Working Group
Review: Dependent internal review by Tiangong LCI Data Working Group
Amounts: no units in this file; such an amount is in the reference unit of its flow, which a separate flow dataset defines
copyright: false
licenseType: Free of charge for all users and uses

## General comment
The leaching of waste electrode materials with strong acid and reducing agent is characterized by low price, but the strong acid is not selective for the leaching of various metals in the electrodes, and the subsequent separation process is difficult and the purity of the products is low, resulting in the waste of part of the valuable resources.

## Time period
Data source: 2013-2017

## Technical purpose
This hydrometallurgical process (Process D) utilizes a combination of strong inorganic acids and reducing agents to leach waste electrode materials from lithium-ion batteries (LIBs). Although the process is economical, it lacks selectivity in the leaching of metals from the electrodes, leading to challenging separation stages and lower purity of final products. The data set characterizes this process for its use in recycling and resource recovery industries, specifically applied to the recycling of LIB electrode materials. As such, Process D may serve as a feasible, though non-optimal, solution for businesses or facilities interested in cost-effective but less efficient resource recovery options.

## Reference product
- Electrolyte: 100; input; missing unimportant
  Electrode paste

## Inputs
All rows: missing unimportant
- Sulfuric acid: 78.2
- Hydrogen peroxide（25%）: 16
- sodium hydroxide: 5
- water,water: 420
- natural gas,natural gas: 0.00711739
  Natural gas:8500 kCal
- Electricity: 68.04

## Outputs
All rows: missing unimportant
- Lithium carbonate: 12.5
- Graphite: 17
  Graphite powder
- Al/Cu foil: 2.4
- Nickel salt: 14
  Ni salt、metal
- Cobalt salt: 17.5
  Co salt、metal
- Manganese salt: 13
  Mn salt、metal
- Ternary precursor: 5.3
- sodium sulfate: 57
- Sulfuric acid: 12
- Slags: 3
- carbon dioxide (fossil): 6
  The original text does not distinguish between bio and fossil, and according to experts, it is fossil here
- sulfur dioxide: 3
- waste water - treated: 400

## Data selection and combination
The input-output of the process comes from the average results of the data reported in the literature review, reflecting the representative process from "tomb" to "cradle". This study does not consider the recycling or treatment of plastic and metal shells, and labor costs, factory construction costs, and their impact on the environment are also not included in this analysis.

## Data treatment and extrapolations
It is worth noting that the EU's data is not specific to a specific industry, and some import and export data and recycling information are not suitable for China's situation. Therefore, the improved CRMs evaluation method also combines official Chinese data, literature reports, and data from other interest groups such as trade/industry associations to conduct the best estimation of data from major LIB manufacturers, recycling companies, official management agencies in China, and other stakeholders. In terms of data timeliness, the reference period used in the evaluation of CRMs is based on the latest 4-year average (i.e. 2013-2016).

## Use advice
The dataset for Process D should be implemented for Life Cycle Assessment (LCA) purposes with careful consideration of its limitations. Users need to be aware that the process data is derived from an average of reported literature data from 2013 to 2017, and may not include certain environmental impacts, labor costs, and infrastructure expenses. Recycling or treatment of plastics and metal casings are excluded from this study. Additionally, the data has regional specificity; it is adapted to Chinese conditions and may not reflect other geographic contexts accurately. The data should not be used indiscriminately for industries or regions other than those it was intended for, without appropriate adjustments for local circumstances. The baseline period for the referenced data is a 4-year average from 2013 to 2016, and may require updating for accuracy in future applications.

## Review details
Inventory: The internal review was done by several iteration steps concerning raw data validation, raw data documentation, representativity, completeness and consistency of modelling with regard to ISO 14040 and 14044.

## Data sources
- 宋佳丽. 面向能源金属高效回收的资源关键性评价模型与应用. (天津大学, 2019).
