# Oyster feed production | Oyster feed | Single-celled algae culture

Dataset: ILCD process, Unit process, black box
Geography: FJ-CN
Classification: Materials production / Other mineralic materials
Functional unit: 1 tonne of fresh oyster
Generated by: Kangni Wu, wukangni@xmu.stu.edu.cn
Review: Dependent internal review by Tiangong LCI Data Working Group
Amounts: no units in this file; such an amount is in the reference unit of its flow, which a separate flow dataset defines

## General comment
The scope of this carbon footprint is from ‘cradle to gate’, including all life cycle stages of the Pacific oyster until they were transported to the market for distribution and detail farming stages are showed in Fig. 1. Emissions from building and production of capital equipment such as vessels, factory, machinery and their maintenance are not considered in this study. Material input were divided by service time to average for each round of farming.

## Geography
The information was from 6 seedling plants in Fujian and 3-10 farmers from each province, from May to August 2021. After collection, the data were transferred to a single database so that they could be interpreted.

## Inputs
All rows: article inperiodical
- Electricity: 5.148
- Glass (formed & finished): 0.0004
- polymethyl methacrylate (PMMA) beads: 0.008
  丙烯酸桶
- polyethylene terephthalate fibres (PET): 0.01
- Sodium hypochlorite: 0.04
- sodium nitrate: 0.03
- sodium silicate: 0.0072
- ferric citrate: 0.0014
- sodium dihydrogen phosphate: 0.0016

## Review details
Inventory: The internal review was done by several iteration steps concerning raw data validation, raw data documentation, representativity, completeness and consistency of modelling with regard to ISO 14040 and 14044.; Documentation: The review of the documentation was performed by Ecobilan and is in compliance with ISO 14040 and 14044. The data set documentation is correct in view of the appropriateness of the information provided. It includes all relevant information in view of data quality and scope of application of the respective LCI result.

## Data sources
- Sun, L., Feng, J.-C. & Zhang, S. The Carbon Footprint of Pacific Oyster Farming in China. 19, (2021).
