# Electricity production ; Thermal power ; Shanghai

Dataset: ILCD process, Unit process, single operation
Geography: SH-CN
Reference year: 2019
Classification: Unit processes / Energy carriers and technologies / Electricity
Generated by: Ruoxi Xiong, xiongrx0126@163.com
Owner: Tiangong LCI Data Working Group
Review: Dependent internal review by Tiangong LCI Data Working Group
Amounts: no units in this file; such an amount is in the reference unit of its flow, which a separate flow dataset defines
copyright: false
licenseType: Free of charge for all users and uses

## General comment
Thermal power generation includes seventeen fossil fuels such as raw coal, washed coal, oil and natural gas. The process only considers the direct power generation process, not the upstream raw material extraction and processing and the downstream power consumption

## Time period
Calculated based on data from the 2019 Energy Statistics Yearbook

## Technical purpose
This industrial process describes the direct power generation using thermal power methods in Shanghai, which includes the combustion of a variety of fossil fuels such as raw coal, washed coal, oil, and natural gas. The data set specifically represents the use in power plants for electricity production intended for grid supply without consideration of upstream fuel extraction/processing and downstream power consumption by end users.

## Reference product
- electricity for thermal power: 3.6; calculated

## Inputs
All rows: calculated
- Raw coal: 0.338049
- Other Washed Coal: 0.00424364
- Coke oven gas: 0.001383
- blast furnace gas: 0.104889
- Converter gas: 0.009812
- Diesel: 2.484e-5
- fuel oil, unspecified: 2.69e-6
- Petroleum Coke: 1.701e-5
- refinery gas: 8.369e-5
- natural gas: 0.024948
- Natural gas, liquefied: 1.029e-5

## Outputs
- carbon dioxide (fossil): 0.768782; calculated
- sulfur dioxide: 0.000122021; calculated
- Nitrogen oxides: 0.000193985; calculated
- particles (> PM10): 2.69371e-5; calculated

## Data treatment and extrapolations
For the accounting method, please refer to the "Enterprise Greenhouse Gas Emissions Accounting Methods and Reporting Guidelines for Power Generation Facilities". Different forms of power generation and fuel consumption come from Chapter 3 (Energy Production) and Chapter 6 (Regional Energy Balance Sheet) in the "China Energy Statistical Yearbook 2020". The fuel parameters such as low calorific value and carbon content per unit calorific value used to calculate the carbon dioxide emission factor come from the "2019 China Regional Power Grid Carbon Dioxide Baseline Emission Factor Calculation Instructions OM" and the "Enterprise Greenhouse Gas Emission Accounting Method and Reporting Guide for Power Generation Facilities" 》

## Use advice
Users of this LCA data set should note that the data is calculated based on the 2019 Energy Statistics Yearbook and is specific to thermal power generation facilities in Shanghai. The data only covers direct emissions from power generation and does not account for upstream and downstream emissions. Therefore, users should ensure the exclusion of upstream and downstream processes when applying this data to avoid double counting. Additionally, regional variability should be considered when using this data for other locations. The guidelines from the 'Enterprise Greenhouse Gas Emissions Accounting Methods and Reporting Guidelines for Power Generation Facilities' should be followed for greenhouse gas emission accounting.

## Review details
Inventory: The internal review was done by several iteration steps concerning raw data validation, raw data documentation, representativity, completeness and consistency of modelling with regard to ISO 14040 and 14044.

## Data sources
- 熊若熙. 中国电力生产和消费二氧化碳与污染物排放因子核算. (清华大学, 2023).
