# clinker production;clinker, portland cement clinker, 52.5MPa;new dry process

Dataset: ILCD process, Unit process, black box
Geography: CN
Reference year: 2011
Classification: Unit processes / Materials production / Other mineralic materials
Generated by: #REF!, ysqsophia@gmail.com
Owner: Tiangong LCI Data Working Group
Review: Dependent internal review by Tiangong LCI Data Working Group
Amounts: no units in this file; such an amount is in the reference unit of its flow, which a separate flow dataset defines
copyright: false
licenseType: Free of charge for all users and uses

## General comment
New dry-process technology for producing Portland cement clinker. In 2011, the proportion of newly developed dry-process cement accounted for 89.0% of the national total, and it was still on the rise, thus basically representing the national level.

## Technical purpose
This dataset represents the Portland cement clinker production using the new dry process technology. Portland cement clinker is the essential component used in the production of Portland cement, which then can be used in the construction industry. It is applicable specifically to clinker with a strength rating of 52.5MPa, which is indicative of high-grade cement typically used for projects requiring a high level of structural integrity. Given the dominance of this process in China, it can be assumed to be reflective of the national production standard for high strength cement applications.

## Model description
The study only focuses on general cement, and selects the domestically produced 1kg cement clinker with a strength level of 52.5MPa using a new dry process (assuming the national average is 52.5MPa) as the functional unit. In addition, when establishing the life cycle model, the transportation process of raw materials is also considered.

## Reference product
- clinker, portland cement clinker, 52.5MPa: 1000
  Clinker, 52.5MPa

## Inputs
- hard coal; 26.3 MJ/kg: 156.8
  Raw coal. The input data for the benchmark scenario is based on the Level III benchmark value of the clean production indicator system.
- Electricity: 230.4
  Electricity. The input data for the benchmark scenario is based on the Level III benchmark value of the clean production indicator system.
- limestone, crushed, for mill: 1328
  Limestone. The input data for the benchmark scenario is based on the Level III benchmark value of the clean production indicator system.
- tap water: 750
  Industrial tap water. The input data for the benchmark scenario is based on the Level III benchmark value of the clean production indicator system.
- transport in t*km: 0.0141
  Road transportation. The input data for the benchmark scenario is based on the Level III benchmark value of the clean production indicator system.
- iron ore: 184.5
  Iron ore. The input data for the benchmark scenario is based on the Level III benchmark value of the clean production indicator system.
- clay: 180.9
  Clay. The input data for the benchmark scenario is based on the Level III benchmark value of the clean production indicator system.

## Outputs
- carbon dioxide (fossil): 832
  Carbon dioxide. Environmental emissions are mainly based on the emission factor manual and literature survey data.
- Nitrogen oxides: 1.67
  Nitrogen oxide. Environmental emissions are mainly based on the emission factor manual and literature survey data.
- sulfur dioxide: 0.21
  Sulfur dioxide. Environmental emissions are mainly based on the emission factor manual and literature survey data.

## Data selection and combination
By surveying relevant literature on domestic cement production, combined with the cement industry's cleaner production evaluation index system and the emission coefficient manual, inventory data of the clinker production and cement grinding processes were obtained.

## Use advice
Users of this LCA dataset should note that the information is specific to the production of 1kg of Portland cement clinker with a strength level of 52.5MPa using the new dry process technology. The data can be considered representative of the national average for this process in China as of 2011. Use this dataset for life cycle assessments of construction materials where this specific type of clinker is used. Care should be taken to consider the transportation of raw materials in the lifecycle analysis and to recognize that the dataset does not cover complete lifecycle data but is focused on inventory indicators relevant to ECER policy objectives. Users should supplement this dataset with additional specific data related to other lifecycle stages as necessary for their particular assessments.

## Review details
Inventory: The internal review was done by several iteration steps concerning raw data validation, raw data documentation, representativity, completeness and consistency of modelling with regard to ISO 14040 and 14044.

## Data sources
- 何晓雪, 张璐, & 王洪涛. (2014). 基于生命周期节能减排评价方法的水泥行业清洁生产评价指标权重的计算. 化学工程与装备, 4, 208–211.
