# Electric arc furnace steelmaking

Dataset: ILCD process, Unit process, single operation
Geography: CN
Classification: Unit processes / Energy carriers and technologies / Heat and steam
Generated by: Jiwei, 1299801467@qq.com
Owner: Tiangong LCI Data Working Group
Review: Dependent internal review by Tiangong LCI Data Working Group
Amounts: no units in this file; such an amount is in the reference unit of its flow, which a separate flow dataset defines
copyright: false
licenseType: Free of charge for all users and uses

## General comment
This dataset represents the electric arc furnace (EAF) steelmaking process, which is employed in the production of crude steel using a combination of pig iron and scrap steel. The process is typically used in steel mills for manufacturing structural steel products, tools, machinery, and vehicles.

## Reference product
- Steel hot rolled coil: 1000; measured

## Inputs
All rows: measured
- iron: 318.53
- Iron scrap: 738.29
- quicklime: 27.61
- oxygen: 30.29
- freshwater,freshwater: 62.65
- Electrode consumption: 1.16
- Electricity: 1061.93
- nitrous oxide: 0.1
- argon: 0.04
- Refractory consumption: 5.51

## Outputs
All rows: measured
- Slag: 61.94
- particles (> PM10): 22.82
- carbon monoxide (fossil): 29.63
  原文未区分bio和fossil，根据专家判断此处为carbon monoxide (fossil)
- carbon dioxide (fossil): 5.18
  原文未区分bio和fossil，根据专家判断此处为carbon dioxide (fossil)
- Iron splashing: 11.41

## Use advice
When utilizing this LCA dataset, ensure that the data reflects the specific technology and efficiency levels of the EAF process you are assessing. Exclude any potential recycling of steel at the end-of-life phase unless the steel recycling process is explicitly part of the scenario under study. Additionally, if modeling the use phase of the steel, consider specific behavioral factors such as maintenance, corrosion, and end-of-life recovery rates that match the intended application.

## Review details
Inventory: The internal review was done by several iteration steps concerning raw data validation, raw data documentation, representativity, completeness and consistency of modelling with regard to ISO 14040 and 14044.

## Data sources
- Yang, L. et al. Life cycle carbon footprint of electric arc furnace steelmaking processes under different smelting modes in China. Sustainable Materials and Technologies 35, e00564 (2023).
