# Foam ; Toluene diisocyanate, polyether polyol, PS, PE, blowing agent ; Mixing-Foaming-Cooking-Slicing ; All sizes; NESPS2 / 泡沫塑料 ; 甲苯二异氰酸酯，聚醚多元醇，PS,PE,发泡剂 ; 混合配料-发泡-熟化-裁边-切片 ; 所有规模 ; 全国第二次污染普查数据

Dataset: ILCD process, Unit process, single operation
Geography: CN
Reference year: 2019
Classification: Reference Parameters / Materials production / Plastics
Generated by: The data was created by the Office of the Second National Pollution Source Census of the Ministry of Ecology and Environment, and the data was organized by the TianGong Plan team for ILCD format / 生态环境部第二次全国污染源普查工作办公室创建数据，天工计划团队常慧敏整理数据为ILCD格式
Owner: Tiangong LCI Data Working Group / 天工LCI数据工作小组
Review: Dependent internal review by Tiangong LCI Data Working Group / 天工LCI数据工作小组
Amounts: no units in this file; such an amount is in the reference unit of its flow, which a separate flow dataset defines
copyright: false
licenseType: Free of charge for all users and uses

## General comment
the Technical of end-of-pipe management technology for pollution Exhaust gasis/，The formula for calculating the actual operation rate (k-value) of the end-of-pipe treatment facility is k = operating time of wastewater treatment facilities (hours/year) / normal production time (hours/year)

## Technical purpose
该聚氨酯泡沫塑料生产过程涉及混合甲苯二异氰酸酯、聚醚多元醇、聚苯乙烯（PS）、聚乙烯（PE）和发泡剂来生产各种规格的泡沫。此泡沫可用于隔热、缓冲、包装、汽车和建筑行业等多种应用。生产过程中排放的废气和挥发性有机化合物（VOCs）的末端处理技术包括活性炭吸附、低温等离子体、再生热燃烧、光催化、光解和它们的组合。

## Reference product
- Foamed Plastic: 1000; calculated
  源文件中描述为为泡沫塑料，此处对其进行了匹配工作，将其匹配到LCAflow库里面相最符合的流，污染物指标备注为工业废气量

## Outputs
All rows: calculated
- volatile organic compound: 1.5
  the Technical of end-of-pipe management technology for pollution volatile organic compoundisRegenerative thermal combustion method，Its Technical efficiency of end-of-pipe management95，The formula for calculating the actual operation rate (k-value) of the end-of-pipe treatment facility is k = operating time of wastewater treatment facilities (hours/year) / normal production time (hours/year)
  污染物指标挥发性有机物的末端治理技术是蓄热式热力燃烧法，其效率为95，末端治理设施实际运行率（k值）计算公式为k=废气治理设施运行时间（小时/年）/废气产污工段正常生产时间（小时/年）。原文件中描述污染物类别为废气，污染物指标为挥发性有机物，此处对其进行了匹配工作，将其匹配到LCAflow库里面相最符合的流，污染物指标备注为挥发性有机物
- volatile organic compound: 6
  the Technical of end-of-pipe management technology for pollution volatile organic compoundisLow temperature plasma + activated carbon adsorption，Its Technical efficiency of end-of-pipe management80，The formula for calculating the actual operation rate (k-value) of the end-of-pipe treatment facility is /
  污染物指标挥发性有机物的末端治理技术是低温等离子体+活性炭吸附，其效率为80，末端治理设施实际运行率（k值）计算公式为k=废气治理设施运行时间（小时/年）/废气产污工段正常生产时间（小时/年）。原文件中描述污染物类别为废气，污染物指标为挥发性有机物，此处对其进行了匹配工作，将其匹配到LCAflow库里面相最符合的流，污染物指标备注为挥发性有机物
- volatile organic compound: 6
  the Technical of end-of-pipe management technology for pollution volatile organic compoundisPhotocatalysis + activated carbon adsorption，Its Technical efficiency of end-of-pipe management80，The formula for calculating the actual operation rate (k-value) of the end-of-pipe treatment facility is /
  污染物指标挥发性有机物的末端治理技术是光催化+活性炭吸附，其效率为80，末端治理设施实际运行率（k值）计算公式为k=废气治理设施运行时间（小时/年）/废气产污工段正常生产时间（小时/年）。原文件中描述污染物类别为废气，污染物指标为挥发性有机物，此处对其进行了匹配工作，将其匹配到LCAflow库里面相最符合的流，污染物指标备注为挥发性有机物
- volatile organic compound: 9
  the Technical of end-of-pipe management technology for pollution volatile organic compoundisActivated carbon adsorption，Its Technical efficiency of end-of-pipe management70，The formula for calculating the actual operation rate (k-value) of the end-of-pipe treatment facility is /
  污染物指标挥发性有机物的末端治理技术是活性炭吸附，其效率为70，末端治理设施实际运行率（k值）计算公式为k=废气治理设施运行时间（小时/年）/废气产污工段正常生产时间（小时/年）。原文件中描述污染物类别为废气，污染物指标为挥发性有机物，此处对其进行了匹配工作，将其匹配到LCAflow库里面相最符合的流，污染物指标备注为挥发性有机物
- volatile organic compound: 9
  the Technical of end-of-pipe management technology for pollution volatile organic compoundisPhotocatalysis + low temperature plasma，Its Technical efficiency of end-of-pipe management70，The formula for calculating the actual operation rate (k-value) of the end-of-pipe treatment facility is k = operating time of wastewater treatment facilities (hours/year) / normal production time (hours/year)
  污染物指标挥发性有机物的末端治理技术是光催化+低温等离子体，其效率为70，末端治理设施实际运行率（k值）计算公式为k=废气治理设施运行时间（小时/年）/废气产污工段正常生产时间（小时/年）。原文件中描述污染物类别为废气，污染物指标为挥发性有机物，此处对其进行了匹配工作，将其匹配到LCAflow库里面相最符合的流，污染物指标备注为挥发性有机物
- volatile organic compound: 13.5
  the Technical of end-of-pipe management technology for pollution volatile organic compoundisLow temperature plasma，Its Technical efficiency of end-of-pipe management55，The formula for calculating the actual operation rate (k-value) of the end-of-pipe treatment facility is /
  污染物指标挥发性有机物的末端治理技术是低温等离子体，其效率为55，末端治理设施实际运行率（k值）计算公式为k=废气治理设施运行时间（小时/年）/废气产污工段正常生产时间（小时/年）。原文件中描述污染物类别为废气，污染物指标为挥发性有机物，此处对其进行了匹配工作，将其匹配到LCAflow库里面相最符合的流，污染物指标备注为挥发性有机物
- volatile organic compound: 18
  the Technical of end-of-pipe management technology for pollution volatile organic compoundisPhotocatalysis，Its Technical efficiency of end-of-pipe management40，The formula for calculating the actual operation rate (k-value) of the end-of-pipe treatment facility is /
  污染物指标挥发性有机物的末端治理技术是光催化，其效率为40，末端治理设施实际运行率（k值）计算公式为k=废气治理设施运行时间（小时/年）/废气产污工段正常生产时间（小时/年）。原文件中描述污染物类别为废气，污染物指标为挥发性有机物，此处对其进行了匹配工作，将其匹配到LCAflow库里面相最符合的流，污染物指标备注为挥发性有机物
- volatile organic compound: 18
  the Technical of end-of-pipe management technology for pollution volatile organic compoundisPhotolysis，Its Technical efficiency of end-of-pipe management40，The formula for calculating the actual operation rate (k-value) of the end-of-pipe treatment facility is /
  污染物指标挥发性有机物的末端治理技术是光解，其效率为40，末端治理设施实际运行率（k值）计算公式为k=废气治理设施运行时间（小时/年）/废气产污工段正常生产时间（小时/年）。原文件中描述污染物类别为废气，污染物指标为挥发性有机物，此处对其进行了匹配工作，将其匹配到LCAflow库里面相最符合的流，污染物指标备注为挥发性有机物
- volatile organic compound: 30
  the Technical of end-of-pipe management technology for pollution volatile organic compoundisOthers (direct discharge)，Its Technical efficiency of end-of-pipe management0，The formula for calculating the actual operation rate (k-value) of the end-of-pipe treatment facility is /
  污染物指标挥发性有机物的末端治理技术是其他（直排），其效率为0，末端治理设施实际运行率（k值）计算公式为k=废气治理设施运行时间（小时/年）/废气产污工段正常生产时间（小时/年）。原文件中描述污染物类别为废气，污染物指标为挥发性有机物，此处对其进行了匹配工作，将其匹配到LCAflow库里面相最符合的流，污染物指标备注为挥发性有机物
- Exhaust gas: 300000
  the Technical of end-of-pipe management technology for pollution Exhaust gasis/，The formula for calculating the actual operation rate (k-value) of the end-of-pipe treatment facility is k = operating time of wastewater treatment facilities (hours/year) / normal production time (hours/year)
  污染物指标工业废气量的末端治理技术是/，末端治理设施实际运行率（k值）计算公式为/。原文件中描述污染物类别为废气，污染物指标为工业废气量，此处对其进行了匹配工作，将其匹配到LCAflow库里面相最符合的流，污染物指标备注为工业废气量

## Use advice
This dataset is derived from the Pollution Source Census Report and contains information on pollution emissions and related products. However, it does not include data on energy or chemical consumption, nor does it provide information on waste or co-product generation. When utilizing this dataset, please supplement the missing data based on actual conditions before use
该数据集来源于污染源普查报告，包含污染物排放及相关产品信息，但不包含能源或化学品消耗数据，也不提供废弃物或共生产物产生信息。在使用该数据集时，请根据实际情况补充缺失数据后再使用。

## Review details
Inventory: The internal review was done by several iteration steps concerning raw data validation, raw data documentation, representativity, completeness and consistency of modelling with regard to ISO 14040 and 14044.
清单： 内部审查通过几个迭代步骤完成，涉及原始数据验证、原始数据记录、代表性、完整性、与 ISO 14040 和 14044 有关的建模的一致性。

## Data sources
- 第二次全国污染源普查产排污核算系数手册（试用版）,二级代码29,四级代码2924文件，在完整版文件中第3308页
