# Butyl rubber ; Isobutylene, isoprene ; Slurry method ; All sizes; NESPS2 / 丁基橡胶 ; 异丁烯、异戊二烯 ; 淤浆法 ; 所有规模 ; 全国第二次污染普查数据

Dataset: ILCD process, Unit process, single operation
Geography: CN
Reference year: 2019
Classification: Reference Parameters / Materials production / Organic chemicals
Generated by: The data was created by the Office of the Second National Pollution Source Census of the Ministry of Ecology and Environment, and the data was organized by the TianGong Plan team for ILCD format / 生态环境部第二次全国污染源普查工作办公室创建数据，天工计划团队常慧敏整理数据为ILCD格式
Owner: Tiangong LCI Data Working Group / 天工LCI数据工作小组
Review: Dependent internal review by Tiangong LCI Data Working Group / 天工LCI数据工作小组
Amounts: no units in this file; such an amount is in the reference unit of its flow, which a separate flow dataset defines
copyright: false
licenseType: Free of charge for all users and uses

## General comment
the Technical of end-of-pipe management technology for pollution Exhaust gasis/，Its Technical efficiency of end-of-pipe management0

## Technical purpose
此数据集涉及使用异丁烯和异戊二烯的淤浆法生产丁基橡胶。该工艺生产的橡胶通常用于需要气密和水密特性的应用，如轮胎内胎、密封剂和医药瓶盖。

## Reference product
- Butyl Rubber: 1000; calculated
  源文件中描述为为丁基橡胶，此处对其进行了匹配工作，将其匹配到LCAflow库里面相最符合的流，污染物指标备注为工业废水量

## Outputs
All rows: calculated
- particles (PM2.5 - PM10): 0.02745
  the Technical of end-of-pipe management technology for pollution particles (PM2.5 - PM10)isSingle cylinder cyclone dust removal method，Its Technical efficiency of end-of-pipe management91
  污染物指标废气颗粒物的末端治理技术是单筒旋风除尘法，其效率为91，末端治理设施实际运行率（k值）计算公式为k=设施年耗电量（千瓦时）/(设备功率(千瓦)×年运行小时数(时))。原文件中描述污染物类别为废气，污染物指标为废气颗粒物，此处对其进行了匹配工作，将其匹配到LCAflow库里面相最符合的流，污染物指标备注为废气颗粒物
- phosphorus, total: 0.0001164
  the Technical of end-of-pipe management technology for pollution phosphorus, totalisPhysicochemical treatment + aerobic biological treatment + activated sludge process，Its Technical efficiency of end-of-pipe management94
  污染物指标总磷的末端治理技术是物理化学法+好氧生物处理法+活性污泥法，其效率为94，末端治理设施实际运行率（k值）计算公式为k=设施年耗电量（千瓦时）/(设备功率(千瓦)×年运行小时数(时))。原文件中描述污染物类别为废水，污染物指标为总磷，此处对其进行了匹配工作，将其匹配到LCAflow库里面相最符合的流，污染物指标备注为总磷
- sulfur dioxide: 0.421
  the Technical of end-of-pipe management technology for pollution sulfur dioxideis/，Its Technical efficiency of end-of-pipe management0
  污染物指标二氧化硫的末端治理技术是/，其效率为0。原文件中描述污染物类别为废气，污染物指标为二氧化硫，此处对其进行了匹配工作，将其匹配到LCAflow库里面相最符合的流，污染物指标备注为二氧化硫
- Nitrogen oxides: 0.6162
  the Technical of end-of-pipe management technology for pollution Nitrogen oxidesisSNCR，Its Technical efficiency of end-of-pipe management61
  污染物指标氮氧化物的末端治理技术是选择性非催化还原技术，其效率为61，末端治理设施实际运行率（k值）计算公式为k=设施年耗电量（千瓦时）/(设备功率(千瓦)×年运行小时数(时))。原文件中描述污染物类别为废气，污染物指标为氮氧化物，此处对其进行了匹配工作，将其匹配到LCAflow库里面相最符合的流，污染物指标备注为氮氧化物
- volatile organic compound: 1.29
  the Technical of end-of-pipe management technology for pollution volatile organic compoundisRegenerative incineration，Its Technical efficiency of end-of-pipe management40
  污染物指标挥发性有机物的末端治理技术是蓄热式焚烧，其效率为40，末端治理设施实际运行率（k值）计算公式为k=设施年耗电量（千瓦时）/(设备功率(千瓦)×年运行小时数(时))。原文件中描述污染物类别为废气，污染物指标为挥发性有机物，此处对其进行了匹配工作，将其匹配到LCAflow库里面相最符合的流，污染物指标备注为挥发性有机物
- Waste water: 19500
  the Technical of end-of-pipe management technology for pollution Waste wateris/，Its Technical efficiency of end-of-pipe management0
  污染物指标工业废水量的末端治理技术是/，其效率为0。原文件中描述污染物类别为废水，污染物指标为工业废水量，此处对其进行了匹配工作，将其匹配到LCAflow库里面相最符合的流，污染物指标备注为工业废水量
- Nitrogen, organic bound: 0.02536
  the Technical of end-of-pipe management technology for pollution Nitrogen, organic boundisPhysicochemical treatment + aerobic biological treatment + activated sludge process，Its Technical efficiency of end-of-pipe management92
  污染物指标总氮的末端治理技术是物理化学法+好氧生物处理法+活性污泥法，其效率为92，末端治理设施实际运行率（k值）计算公式为k=设施年耗电量（千瓦时）/(设备功率(千瓦)×年运行小时数(时))。原文件中描述污染物类别为废水，污染物指标为总氮，此处对其进行了匹配工作，将其匹配到LCAflow库里面相最符合的流，污染物指标备注为总氮
- Ammonia Nitrogen: 0.0317
  the Technical of end-of-pipe management technology for pollution Ammonia NitrogenisPhysicochemical treatment + aerobic biological treatment + activated sludge process，Its Technical efficiency of end-of-pipe management90
  污染物指标氨氮的末端治理技术是物理化学法+好氧生物处理法+活性污泥法，其效率为90，末端治理设施实际运行率（k值）计算公式为k=设施年耗电量（千瓦时）/(设备功率(千瓦)×年运行小时数(时))。原文件中描述污染物类别为废水，污染物指标为氨氮，此处对其进行了匹配工作，将其匹配到LCAflow库里面相最符合的流，污染物指标备注为氨氮
- chemical oxygen demand: 1.896
  the Technical of end-of-pipe management technology for pollution chemical oxygen demandisPhysicochemical treatment + aerobic biological treatment + activated sludge process，Its Technical efficiency of end-of-pipe management92
  污染物指标化学需氧量的末端治理技术是物理化学法+好氧生物处理法+活性污泥法，其效率为92，末端治理设施实际运行率（k值）计算公式为k=设施年耗电量（千瓦时）/(设备功率(千瓦)×年运行小时数(时))。原文件中描述污染物类别为废水，污染物指标为化学需氧量，此处对其进行了匹配工作，将其匹配到LCAflow库里面相最符合的流，污染物指标备注为化学需氧量
- Exhaust gas: 21400
  the Technical of end-of-pipe management technology for pollution Exhaust gasis/，Its Technical efficiency of end-of-pipe management0
  污染物指标工业废气量的末端治理技术是/，其效率为0。原文件中描述污染物类别为废气，污染物指标为工业废气量，此处对其进行了匹配工作，将其匹配到LCAflow库里面相最符合的流，污染物指标备注为工业废气量

## Use advice
This dataset is derived from the Pollution Source Census Report and contains information on pollution emissions and related products. However, it does not include data on energy or chemical consumption, nor does it provide information on waste or co-product generation. When utilizing this dataset, please supplement the missing data based on actual conditions before use
该数据集来源于污染源普查报告，包含污染物排放及相关产品信息，但不包含能源或化学品消耗数据，也不提供废弃物或共生产物产生信息。在使用该数据集时，请根据实际情况补充缺失数据后再使用。

## Review details
Inventory: The internal review was done by several iteration steps concerning raw data validation, raw data documentation, representativity, completeness and consistency of modelling with regard to ISO 14040 and 14044.
清单： 内部审查通过几个迭代步骤完成，涉及原始数据验证、原始数据记录、代表性、完整性、与 ISO 14040 和 14044 有关的建模的一致性。

## Data sources
- 第二次全国污染源普查产排污核算系数手册（试用版）,二级代码26,四级代码2652文件，在完整版文件中第4111页
