# Highly Concentrated Brine Production ; Highly Concentrated Brine (6% Lithium) ; Solar Pond Evaporation ; Salar de Atacama, Chile (0.17% Lithium)

Dataset: ILCD process, Unit process, single operation
Geography: CL
Reference year: 2018
Classification: Unit processes / Materials production / Inorganic chemicals
Generated by: Sun Xin, xs389@cornell.edu
Owner: Tiangong LCI Data Working Group
Review: Dependent internal review by Tiangong LCI Data Working Group
Amounts: no units in this file; such an amount is in the reference unit of its flow, which a separate flow dataset defines
licenseType: Free of charge for all users and uses

## General comment
Lithium has historically been produced from subterranean brines in the Andean mountain region of Chile in the area known as the “Lithium Triangle,” which also includes parts of Bolivia and Argentina. There are also several other lithium-rich brine locations throughout the world, and each brine has a unique chemical composition, which necessitates different processes for isolating the desired end products (Wietelmann and Steinbild, 2014). This LCA considers the brines in the Atacama Desert of Chile, known as the Salar de Atacama. The brines are concentrated, processed into battery grade Li2CO3 and LiOH•H2O, and shipped worldwide for processing into battery cathode materials and, eventually, batteries.

## Technology and included processes
The Salar de Atacama basin receives between 5 and 120 mm of annual rainfall depending on the specific location. To produce concentrated brine, a low-concentration brine (~0.17% lithium concentration, which is 70% water by mass and the remainder other minerals) is pumped to the surface and into a drying pond where it can be exposed to the sun and heat to facilitate evaporation. These ponds are in the southern part of the Salar de Atacama, which receives less rain, thereby facilitating effective evaporation.

## Technical purpose
The process data represents the production of highly concentrated brine with a lithium content of 6% using solar pond evaporation methods at the Salar de Atacama in Chile. Such brine is typically used as a feedstock for the extraction and production of lithium compounds, which are essential in manufacturing batteries for electronic devices and electric vehicles, among other applications.

## Reference product
- Concentrated brine (6% Li): 1000; measured

## Inputs
- freshwater,freshwater: 5.94; measured
- Brine (0.17% Li): 24100; measured
- Electricity: 760; measured
- Diesel: 657; measured

## Outputs
- Lithium carbonate,Lithium carbonate: 800; measured
- Potash: 8520; measured

## Use advice
When utilizing this dataset for Life Cycle Assessment, take into account that the data excludes the production processes for raw materials and energy flows with very small amounts (less than 1%). This exclusion may be significant in certain contexts, particularly in fine-grained LCA studies where even small inputs could contribute to the overall environmental impact. Users should consider supplementing this dataset with additional information if these minor flows are deemed essential for their specific LCA.

## Review details
Inventory: The internal review was done by several iteration steps concerning raw data validation, raw data documentation, representativity, completeness and consistency of modelling with regard to ISO 14040 and 14044.

## Data sources
- Kelly, J. C., Wang, M., Dai, Q. & Winjobi, O. Energy, greenhouse gas, and water life cycle analysis of lithium carbonate and lithium hydroxide monohydrate from brine and ore resources and their use in lithium ion battery cathodes and lithium ion batteries. Resources, Conservation and Recycling 174, 105762 (2021).
