# Beneficiation of Rare Earth Elements (REE) Rare Earth Elements (REE);baseline;Rare Earth Elements (REE) containing ore

Dataset: ILCD process, Unit process, single operation
Geography: NMG-CN
Reference year: 2012
Classification: Unit processes / Materials production / Non-energetic raw materials
Functional unit: Not Mentationed
LCI method principle: Attributional
LCI method approaches: Allocation - market value
Generated by: Tao Wang, twang@iue.ac.cn
Owner: Tiangong LCI Data Working Group
Review: Dependent internal review by Tiangong LCI Data Working Group
Amounts: no units in this file; such an amount is in the reference unit of its flow, which a separate flow dataset defines
copyright: false
licenseType: Free of charge for all users and uses

## General comment
The rare earth element (REE) beneficiation process described is intended for the extraction and production of REEs from ore, which are critical components in various high technology and clean energy applications. REEs are essential in the manufacturing of permanent magnets (like NdFeB magnets), rechargeable batteries for electric and hybrid vehicles, advanced ceramics, electronics, and various other high-tech applications.

## Technology and included processes
Ore is recovered from the open pit mine using conventional surface mining techniques such as drilling and blasting. The mine contains 750 million tons of ore at 4.1% REO

## Reference product
- Rare Earth Oxides: 1; software or database
  LANGUAGE

## Inputs
All rows: software or database
- Sodium carbonate: 0.09
  Soda ash
- transport in t*km,transport in t*km: 0.021
  transport, lorry >16t, fleet average
- transport in t*km,transport in t*km: 0.378
  transport, freight, rail
- Sodium silicate: 0.09
- Fatty acid: 0.03
  fatty acids
- heavy fuel oil: 0.97
- process steam: 2.7
- Electricity: 1.2168
- transport in t*km,transport in t*km: 0.15
  transport, coal freight, rail
- Raw ore: 30

## Outputs
All rows: software or database
- Iron ore: 12.5
- water: 0.0275
- unspecified: 1
  Industrial area, built up
- waste heat: 1.22
- uranium-234: 0.022
  air_low population density
- thorium-232: 1
  water unspecified

## Deviations from the LCI method approaches
In this section, we discuss the life cycle inventory (LCI) in detail. Each subsection discusses one process of the LCA. Section 3.1 describes the conventional method of rare earths in China from mineral sources. Section 3.2 describes the production process used to transform neodymium oxide into an NdFeB magnet. Finally, section 3.3 describes two alternative recycling processes that could be used. Detailed information on the LCI, assumptions, and allocation choices can be found in the Supporting Information.

## Use advice
Users of this LCA data set should pay special attention to the methodological assumptions and allocation choices provided in the Supporting Information and ensure they are compatible with the goal and scope of their particular study. It is important to consider the technological applicability of the REE beneficiation process in relation to the intended application of the REEs. Users should be aware of the environmental impacts associated with conventional mining techniques such as drilling and blasting and include these impacts in their assessment. Additionally, when considering recycling alternatives for REEs, users should account for potential changes in environmental benefits or burdens.

## Review details
Inventory: The internal review was done by several iteration steps concerning raw data validation, raw data documentation, representativity, completeness and consistency of modelling with regard to ISO 14040 and 14044.

## Data sources
- Sprecher, B. et al. Life Cycle Inventory of the Production of Rare Earths and the Subsequent Production of NdFeB Rare Earth Permanent Magnets. Environ. Sci. Technol. 48, 3951–3958 (2014).
