# Northwest (Yangling) Wheat-Corn Production ; Wheat Cultivation

Dataset: ILCD process, Unit process, single operation
Geography: XY-SAX-CN
Reference year: 2013
Valid until: 2013
Classification: Unit processes / Materials production / Agricultural production means
Functional unit: 1t
LCI method principle: Attributional
LCI method approaches: Consequential
Generated by: Haoran Zhang, hrzhang@whu.edu.cn
Owner: Tiangong LCI Data Working Group
Review: Dependent internal review by Tiangong LCI Data Working Group
Amounts: no units in this file; such an amount is in the reference unit of its flow, which a separate flow dataset defines
copyright: false
licenseType: Free of charge for all users and uses

## General comment
The life cycle of winter wheats-summer maize rotation system mainly includes three stages: raw material mining and transportation, agricultural materials production and transportation, and crop planting, including coal, oil, natural gas, electricity and other raw materials mining and production, land resource utilization, fertilizer, pesticide and other agricultural materials production related energy consumption and pollutant emission. Including CO2, NH3, SO2, CH4, N2O and CO [11]. The environmental impact of plant equipment, construction facilities, production of transport tools and transportation of raw materials associated with the system is not considered.

## Geography
Yang Ling

## Technology and included processes
The research on the resource utilization and environmental emission of winter wheat-summer maize rotation system from raw material extraction, processing and transportation to agricultural materials production and crop planting process is to provide decision-making basis for the production and environmental management of the whole process of winter wheat-summer maize rotation system. The life cycle assessment of agricultural products starts from the mining of ore and energy and ends in the output of crop planting, including the output of agricultural products and pollutants. Land resources are the basis of all production activities and directly enter the agricultural system. In this study, 1 t of crops were evaluated as functional units

## Technical purpose
The data describes the life cycle of the winter wheat-summer maize rotation system in the Yangling district of Northwest China. The agricultural process is specifically used for the cultivation of winter wheat followed by summer maize, which is a common crop rotation in the region. This practice aids in soil fertility management and helps in providing food staples in the area. The process includes the extraction and transportation of raw materials, production and transportation of farming inputs such as fertilizers and pesticides, and ultimately the cultivation of these crops on the land.

## Reference product
- wheat: 1000; measured

## Inputs
- arable: 2008.62; measured
- water: 922.81; measured
- Electricity: 35736.6; measured
- Corn Seeds: 39.4; measured

## Outputs
All rows: measured
- carbon monoxide (fossil): 0.46929
- Nitrogen oxides: 3.1848
- sulfide: 2.50289
- carbon dioxide (fossil),carbon dioxide (fossil): 1021.03
- methane (biogenic),methane (biogenic): 0.0351
- nitrous oxide: 0.48018
- ammonium: 10.72
- phosphorus, total: 0.01874
- phosphoric acid: 0.06026
- sodium nitrate: 1.45758
- Insecticide: 0.10372
- heavy metals (unspecified): 0.00148

## Deviations from the LCI method approaches
The lifecycle evaluation of agricultural products starts from mining of ores and energy, terminated by the output of crops, including the output of agricultural products and pollutants. Land resources are the basis of all production activities and directly enter the agricultural production system."

## Data selection and combination
The data for the study mainly comes from field surveys conducted from August to September 2013, randomly surveying 30 farmers each in Fuping and Yangling, regarding the planting of winter wheat and summer corn.

## Data treatment and extrapolations
Impact assessment consists of four steps: impact categorization, characterization, normalization, and weighted assessment.

## Use advice
Users of this life cycle assessment data should consider the data within the context of agricultural production in the Northwest China region, especially in the analysis of farming systems involving crop rotation of winter wheat and summer maize. Attention should be paid to the boundaries of the system described, which includes raw material extraction, transportation, and crop cultivation, but excludes the environmental impacts of facility and equipment production, infrastructure building, and raw material transportation infrastructure. It is advisable for users to account for these exclusions in their overall environmental impact assessment and to not use this data in isolation when considering broader environmental implications.

## Review details
Inventory: The internal review was done by several iteration steps concerning raw data validation, raw data documentation, representativity, completeness and consistency of modelling with regard to ISO 14040 and 14044.

## Data sources
- 彭小瑜, 吴喜慧, 吴发启, 等. 陕西关中地区冬小麦-夏玉米轮作系统生命周期评价[J].农业环境科学学报, 2015, 34(4).
