# Earthquake prediction; Limestone reservoir of Taiyuan Formation; Fine characterization technology of micro-faults

Dataset: ILCD process, Unit process, single operation
Geography: EEDS-NMG-CN
Reference year: 1987
Valid until: 2022
Classification: Unit processes / Other Services / Research and development
LCI method principle: Attributional
LCI method approaches: Consequential
Generated by: Shikang Kang, 908798159@qq.com
Owner: Tiangong LCI Data Working Group
Review: Dependent internal review by Tiangong LCI Data Working Group
Amounts: no units in this file; such an amount is in the reference unit of its flow, which a separate flow dataset defines
copyright: false
licenseType: Free of charge for all users and uses

## General comment
The technical flow of micro-fault fine characterization seismic processing consists of three parts: ① the original seismic data are processed by structural guidance filtering under the constraint of horizon, and the interference of background noise is suppressed to highlight fault breakpoints; ② Carry out neural network deep learning to obtain deep learning coherence body (fault) and curvature body (fracture), and establish nonlinear mapping relationship from seismic data to micro-fault; Select the dominant information for weighted fusion to realize the fine identification of faults with small concealment and micro-faults.

## Geography
Limestone of Taiyuan Formation in Central and Eastern Ordos Basin

## Time period
Exploration began in the 1980s

## Technology and included processes
Seismic processing adopts the combination of "guided filtering + artificial intelligence + key seismic information fusion", and the fault prediction results have better continuity, clear boundary and higher confidence.

## Technical purpose
The seismic processing technology used in the prediction of earthquakes, and exploration and characterization of limestone reservoirs of the Taiyuan Formation is primarily intended for the identification and mapping of micro-faults within geological structures. This advanced technology is pivotal in enhancing the clarity, continuity, and confidence of fault predictions which has applications in the field of natural gas exploration, specifically in detecting and analyzing potential gas reservoirs with small concealment and micro-faults in the Ordos Basin.

## Reference product
- natural gas: 1.5e9; max 1.5e9; uniform; missing unimportant
  Fine characterization area of natural gas micro faults

## Inputs
- natural gas: 0.022; log-normal; missing unimportant
  Development of residual bioclastic cavities (dissolution pores) and algal framework (dissolution pores), with an average porosity of 2.2%

## Data selection and combination
The exploration of limestone natural gas in Taiyuan Formation of Ordos Basin began in 1980s, and the exploration process can be roughly divided into three stages. The initial exploration stage is from 1987 to 1999, the second exploration stage is from 2000 to 2005, and the third exploration stage is from 2019 to the present

## Data treatment and extrapolations
Through enlarging limestone coring of Taiyuan Formation in the middle and east of the basin, it is confirmed that limestone of Taiyuan Formation develops favorable facies belts of bioclastic beach and biological hill. Through secondary logging interpretation, more than 300 gas reservoir wells are re-examined, and combined with the analysis of reservoir forming conditions, it is considered that limestone of Taiyuan Formation has a superior "sandwich" reservoir forming model.

## Use advice
Users of this data set should explicitly account for the technological specificity of the micro-fault fine characterization seismic processing in their assessment models. Data application should consider the temporal exploration phases as influential factors affecting the reliability of the results. Take note of the non-linear mapping relationship established through deep learning for the identification of micro-faults and fractures, and the use of guided filtering combined with AI for seismic data interpretation. It is crucial to adapt and calibrate the LCA models to the complex 'sandwich' reservoir forming pattern indicated by this data set for the Taiyuan Formation limestone.

## Review details
Inventory: The internal review was done by several iteration steps concerning raw data validation, raw data documentation, representativity, completeness and consistency of modelling with regard to ISO 14040 and 14044.

## Data sources
- 刘新社;张涛;黄道军;董国栋;王康乐;付勋勋;赵小会;卢子兴;于洲;荆雪媛;张君莹; 鄂尔多斯盆地中东部太原组石灰岩天然气勘探新突破及勘探方向. 天然气工业 1–11 (2023).
