# Steam methane reforming

Dataset: ILCD process, Unit process, single operation
Geography: CN
Reference year: 2022
Classification: Energy carriers and technologies / Heat and steam
Functional unit: 1000 N m3 hydrogen
LCI method principle: Attributional
Generated by: Jinlu Gan, jinlu.gan1998@gmail.com
Owner: Tiangong LCI Data Working Group
Review: Dependent internal review by Tiangong LCI Data Working Group
Amounts: no units in this file; such an amount is in the reference unit of its flow, which a separate flow dataset defines
copyright: false
licenseType: Free of charge for all users and uses

## General comment
Steam methane reforming produces hydrogen from natural gas and steam at high temperatures.

## Time period
the publication date of the article

## Technical purpose
This process of steam methane reforming is used for the production of hydrogen. The hydrogen generated from this method is commonly employed in various industrial applications, including the synthesis of ammonia for fertilizer production, hydrocracking in petroleum refineries, and as a feedstock for the production of methanol. It may also be used in fuel cells or for hydrogenation processes in the food and chemical industries.

## Reference product
- Hydrogen: 1000; article inperiodical

## Inputs
All rows: article inperiodical
- natural gas; 44.1 MJ/kg: 480
  CH4 > 96.6% (volume fraction)min Source: 10.1177/0734242X211045004max Source: 10.1016/j.ijhydene.2012.03.028
- Natural gas, at consumer EU-27: 120
- process steam: 1.27
- de-ionised water: 1.7
  Soft water, boiler water standard
- electricity mix: 720
  380/220 V, 50 Hz, CN-grid mixmin Source: 10.1016/j.ijhydene.2012.03.028max Source: 10.24193/subbchem.2020.4.01
- Cooling water: 27000
  Circulating cooling water, Pressure: 0.3–0.4 MPa, temperature: 27 ◦C–32 ◦C
- compressed air: 42
  Instrument air

## Use advice
When using this data for Life Cycle Assessment, ensure that the scope of the LCA includes operations at similar high-temperature conditions for steam methane reforming. Take note of the publication date of the article to ensure that the data reflects contemporary technology. Account for the purity and the potential uses of the hydrogen produced, such as fuel or feedstock, and the fact this data represents the output of 1000 N m3 hydrogen. Consider the energy sources for the steam and any environmental impacts associated with natural gas extraction when assessing the system boundaries.

## Review details
Inventory: The internal review was done by several iteration steps concerning raw data validation, raw data documentation, representativity, completeness and consistency of modelling with regard to ISO 14040 and 14044.

## Data sources
- Chen, Y., Lan, L., Hao, Z. & Fu, P. Cradle-grave energy consumption, greenhouse gas and acidification emissions in current and future fuel cell vehicles: Study based on five hydrogen production methods in China. Energy Reports 8, 7931–7944 (2022).
