# Soil restoration ; ex-situ capping ; soil landfill ;pit backfill;construction site

Dataset: ILCD process, Unit process, single operation
Geography: ES
Reference year: 2022
Classification: Other Services / Repair and maintenance
Generated by: Sang Chunhui, sangch@mail.bnu.edu.cn
Owner: Tiangong LCI Data Working Group
Review: Dependent internal review by Tiangong LCI Data Working Group
Amounts: no units in this file; such an amount is in the reference unit of its flow, which a separate flow dataset defines
copyright: false
licenseType: Free of charge for all users and uses

## General comment
The clean foundation pit in the original site is backfilled with 3000 tons of sand, which comes from a quarry 30 km away

## Technical purpose
The described process is used for soil remediation, specifically ex-situ remediation where soil is excavated from the contaminated site, transported, and treated. In this scenario, clean sand from a quarry 30 km away is used to backfill an excavation pit in the original site after the removal of contaminated soil. This process is suitable for environmental restoration projects where soil contamination is present and the excavation of polluted soil is necessary.

## Reference product
- construction site: 10000; software or database

## Inputs
- Diesel: 112000; software or database
- sand: 3e6; software or database
- transport in t*km: 90000; software or database

## Use advice
When utilizing this data set, ensure that transportation impacts are included due to the distance of the sand source from the remediation site. The data set is defined for a single operation of using 3000 tonnes of sand for backfill. Adjustments should be made to reflect different quantities based on the specific project needs. Considerations regarding local environmental regulations, availability of alternative materials, and the possibility of recycling excavated soil after treatment should also be taken into account for a comprehensive assessment.

## Review details
Inventory: The internal review was done by several iteration steps concerning raw data validation, raw data documentation, representativity, completeness and consistency of modelling with regard to ISO 14040 and 14044.

## Data sources
- Espada et al. Coupling phytoremediation of Pb-contaminated soil and biomass energy production: A comparative Life Cycle Assessment. Science of the Total Environment 840 (2022) 156675
