# Alumina production ; Alumina for metallurgy ; Aluminum alloy wheel manufacturing process

Dataset: ILCD process, Unit process, single operation
Geography: CN
Reference year: 2018
Classification: Unit processes / Materials production / Metals and semimetals
Generated by: Chenling Fu, fu-chenling@tsinghua.edu.cn
Owner: Tiangong LCI Data Working Group
Review: Dependent internal review by Tiangong LCI Data Working Group
Amounts: no units in this file; such an amount is in the reference unit of its flow, which a separate flow dataset defines
copyright: false
licenseType: Free of charge for all users and uses

## General comment
氧化铝生产 ; 铝合金轮毂制造工艺

## Time period
Date of publication

## Technical purpose
The alumina produced in this process is specifically intended for use in metallurgy, particularly in the manufacturing of aluminum alloy wheels. This metallurgical-grade alumina is tailored to meet the rigorous specifications required for the production of high-quality, durable aluminum alloy wheels that are suitable for use in the automotive industry.

## Reference product
- aluminium oxide, metallurgical: 108.2; missing unimportant

## Inputs
All rows: missing unimportant
- electricity, high voltage, aluminium industry: 181.908
- bauxite: 296.5
- soda ash, dense: 7.08
- limestone, crushed, washed: 194.76
  Lime rock
- Water, unspecified natural origin: 908.88
  water
- hard coal: 57.45
- heavy fuel oil: 4.65
- Petroleum Coke: 4.87
- Gas, mine, off-gas, process, coal mining: 19.5

## Outputs
All rows: missing unimportant
- carbon dioxide (fossil),carbon dioxide (fossil): 259.68
- carbon monoxide (fossil),carbon monoxide (fossil): 0.26
- sulfur dioxide: 0.35
- Nitrogen oxides: 0.75
- methane (fossil): 0.24
- particles, unspecified: 0.77
- redmud from bauxite digestion: 154.73
- Oil Pollution: 0.0048
  oil pollution
- effluent: 2.25
- sodium hydroxide, without water, in 50% solution state: 2.43
  alkali

## Use advice
Users of this data set should note that the alumina produced is of metallurgical quality and should only be considered for applications requiring such specifications. The inclusion of recycling in the life cycle assessment of aluminum alloy wheels should be accounted for, as recycling can significantly affect the environmental impact results. Furthermore, modeling of the use phase behavior must reflect the actual conditions under which the aluminum wheels operate, including factors such as mileage, wear and tear, and potential refurbishment processes.

## Review details
Inventory: The internal review was done by several iteration steps concerning raw data validation, raw data documentation, representativity, completeness and consistency of modelling with regard to ISO 14040 and 14044.

## Data sources
- Yi Qiu-ping & Tang Chang-ping. Environmental impact assessment of magnesium alloy automobile hub based on life cycle assessment. JOURNAL OF CENTRAL SOUTH UNIVERSITY 25, 1870–1878 (2018).
