# Liquid milk ; Raw cow's milk ; Milk collection + cold storage + clean milk + pasteurization + blending + homogenization + cold storage + sterilization + filling ; less than 100 t/d; NESPS2 / 液体乳 ; 生鲜牛乳 ; 收奶+冷贮+净乳+巴氏杀菌+配料+均质+冷贮+杀菌+灌装 ; 小于100吨/天 ; 全国第二次污染普查数据

Dataset: ILCD process, Unit process, single operation
Geography: CN
Reference year: 2019
Classification: Reference Parameters / Materials production / Food and renewable raw materials
Generated by: The data was created by the Office of the Second National Pollution Source Census of the Ministry of Ecology and Environment, and the data was organized by the TianGong Plan team for ILCD format / 生态环境部第二次全国污染源普查工作办公室创建数据，天工计划团队常慧敏整理数据为ILCD格式
Owner: Tiangong LCI Data Working Group / 天工LCI数据工作小组
Review: Dependent internal review by Tiangong LCI Data Working Group / 天工LCI数据工作小组
Amounts: no units in this file; such an amount is in the reference unit of its flow, which a separate flow dataset defines
copyright: false
licenseType: Free of charge for all users and uses

## General comment
the Technical of end-of-pipe management technology for pollution chemical oxygen demandisPhysical treatment，Its Technical efficiency of end-of-pipe management0

## Technical purpose
该工艺在乳制品行业中使用，特别是用于从生鲜牛乳生产液体乳。它包括收奶、冷藏、净化、巴氏杀菌、混合、均质、进一步冷藏、灭菌和装入容器的步骤。这个过程适用于日产能量小于100吨的设施。此外，还暗示了用于处理废水和降低污染的各种尾端处理技术，特别是旨在降低化学需氧量(COD)和氨氮水平，以及通过厌氧和好氧生物处理和化学及物理处理管理有机结合氮。

## Reference product
- Emulsion: 1000; calculated
  源文件中描述为为液体乳，此处对其进行了匹配工作，将其匹配到LCAflow库里面相最符合的流，污染物指标备注为废水排放量

## Outputs
All rows: calculated
- Waste water: 5690
  the Technical of end-of-pipe management technology for pollution Waste wateris/，Its Technical efficiency of end-of-pipe management0
  污染物指标废水排放量的末端治理技术是/，其效率为0。原文件中描述污染物类别为废水，污染物指标为废水排放量，此处对其进行了匹配工作，将其匹配到LCAflow库里面相最符合的流，污染物指标备注为废水排放量
- Ammonia Nitrogen: 0.010324
  the Technical of end-of-pipe management technology for pollution Ammonia NitrogenisAnaerobic biological treatment + aerobic biological treatment，Its Technical efficiency of end-of-pipe management91.07
  污染物指标氨氮的末端治理技术是厌氧生物处理法+好氧生物处理法，其效率为91.07，末端治理设施实际运行率（k值）计算公式为k=污水处理设施耗电量（千瓦时/年）/(总额定功率(千瓦)×年运行时间(小时))。原文件中描述污染物类别为废水，污染物指标为氨氮，此处对其进行了匹配工作，将其匹配到LCAflow库里面相最符合的流，污染物指标备注为氨氮
- Ammonia Nitrogen: 0.0189138
  the Technical of end-of-pipe management technology for pollution Ammonia NitrogenisChemical treatment + anaerobic biological treatment + aerobic biological treatment，Its Technical efficiency of end-of-pipe management83.64
  污染物指标氨氮的末端治理技术是化学处理法+厌氧生物处理法+好氧生物处理法，其效率为83.64，末端治理设施实际运行率（k值）计算公式为k=污水处理设施耗电量（千瓦时/年）/(总额定功率(千瓦)×年运行时间(小时))。原文件中描述污染物类别为废水，污染物指标为氨氮，此处对其进行了匹配工作，将其匹配到LCAflow库里面相最符合的流，污染物指标备注为氨氮
- chemical oxygen demand: 0.0940656
  the Technical of end-of-pipe management technology for pollution chemical oxygen demandisChemical treatment + anaerobic biological treatment + aerobic biological treatment，Its Technical efficiency of end-of-pipe management98.89
  污染物指标化学需氧量的末端治理技术是化学处理法+厌氧生物处理法+好氧生物处理法，其效率为98.89，末端治理设施实际运行率（k值）计算公式为k=污水处理设施耗电量（千瓦时/年）/(总额定功率(千瓦)×年运行时间(小时))。原文件中描述污染物类别为废水，污染物指标为化学需氧量，此处对其进行了匹配工作，将其匹配到LCAflow库里面相最符合的流，污染物指标备注为化学需氧量
- chemical oxygen demand: 0.0991502
  the Technical of end-of-pipe management technology for pollution chemical oxygen demandisAnaerobic biological treatment + aerobic biological treatment，Its Technical efficiency of end-of-pipe management98.83
  污染物指标化学需氧量的末端治理技术是厌氧生物处理法+好氧生物处理法，其效率为98.83，末端治理设施实际运行率（k值）计算公式为k=污水处理设施耗电量（千瓦时/年）/(总额定功率(千瓦)×年运行时间(小时))。原文件中描述污染物类别为废水，污染物指标为化学需氧量，此处对其进行了匹配工作，将其匹配到LCAflow库里面相最符合的流，污染物指标备注为化学需氧量
- Nitrogen, organic bound: 0.104105
  the Technical of end-of-pipe management technology for pollution Nitrogen, organic boundisChemical treatment + anaerobic biological treatment + aerobic biological treatment，Its Technical efficiency of end-of-pipe management82.15
  污染物指标总氮的末端治理技术是化学处理法+厌氧生物处理法+好氧生物处理法，其效率为82.15，末端治理设施实际运行率（k值）计算公式为k=污水处理设施耗电量（千瓦时/年）/(总额定功率(千瓦)×年运行时间(小时))。原文件中描述污染物类别为废水，污染物指标为总氮，此处对其进行了匹配工作，将其匹配到LCAflow库里面相最符合的流，污染物指标备注为总氮
- Ammonia Nitrogen: 0.11561
  the Technical of end-of-pipe management technology for pollution Ammonia NitrogenisPhysical treatment，Its Technical efficiency of end-of-pipe management0
  污染物指标氨氮的末端治理技术是物理处理法，其效率为0。原文件中描述污染物类别为废水，污染物指标为氨氮，此处对其进行了匹配工作，将其匹配到LCAflow库里面相最符合的流，污染物指标备注为氨氮
- Nitrogen, organic bound: 0.115886
  the Technical of end-of-pipe management technology for pollution Nitrogen, organic boundisAnaerobic biological treatment + aerobic biological treatment，Its Technical efficiency of end-of-pipe management80.13
  污染物指标总氮的末端治理技术是厌氧生物处理法+好氧生物处理法，其效率为80.13，末端治理设施实际运行率（k值）计算公式为k=污水处理设施耗电量（千瓦时/年）/(总额定功率(千瓦)×年运行时间(小时))。原文件中描述污染物类别为废水，污染物指标为总氮，此处对其进行了匹配工作，将其匹配到LCAflow库里面相最符合的流，污染物指标备注为总氮
- Nitrogen, organic bound: 0.58322
  the Technical of end-of-pipe management technology for pollution Nitrogen, organic boundisPhysical treatment，Its Technical efficiency of end-of-pipe management0
  污染物指标总氮的末端治理技术是物理处理法，其效率为0。原文件中描述污染物类别为废水，污染物指标为总氮，此处对其进行了匹配工作，将其匹配到LCAflow库里面相最符合的流，污染物指标备注为总氮
- chemical oxygen demand: 8.47438
  the Technical of end-of-pipe management technology for pollution chemical oxygen demandisPhysical treatment，Its Technical efficiency of end-of-pipe management0
  污染物指标化学需氧量的末端治理技术是物理处理法，其效率为0。原文件中描述污染物类别为废水，污染物指标为化学需氧量，此处对其进行了匹配工作，将其匹配到LCAflow库里面相最符合的流，污染物指标备注为化学需氧量

## Use advice
This dataset is derived from the Pollution Source Census Report and contains information on pollution emissions and related products. However, it does not include data on energy or chemical consumption, nor does it provide information on waste or co-product generation. When utilizing this dataset, please supplement the missing data based on actual conditions before use
该数据集来源于污染源普查报告，包含污染物排放及相关产品信息，但不包含能源或化学品消耗数据，也不提供废弃物或共生产物产生信息。在使用该数据集时，请根据实际情况补充缺失数据后再使用。

## Review details
Inventory: The internal review was done by several iteration steps concerning raw data validation, raw data documentation, representativity, completeness and consistency of modelling with regard to ISO 14040 and 14044.
清单： 内部审查通过几个迭代步骤完成，涉及原始数据验证、原始数据记录、代表性、完整性、与 ISO 14040 和 14044 有关的建模的一致性。

## Data sources
- 第二次全国污染源普查产排污核算系数手册（试用版）,二级代码14,四级代码1441文件，在完整版文件中第3413页
