# Aluminum product processing ; Aluminum products ; Primary aluminum ingots and recycled aluminum

Dataset: ILCD process, Unit process, single operation
Geography: CN
Reference year: 2005
Classification: Unit processes / Materials production / Metals and semimetals
Generated by: Changqing Xu, xcq@bit.edu.cn
Owner: Tiangong LCI Data Working Group
Review: Dependent internal review by Tiangong LCI Data Working Group
Amounts: no units in this file; such an amount is in the reference unit of its flow, which a separate flow dataset defines
copyright: false
licenseType: Free of charge for all users and uses

## General comment
This aluminum product processing data set pertains to the manufacturing and handling of aluminum products derived from both primary aluminum ingots and recycled aluminum sources. The materials represented by this data set are utilized for the fabrication of a diverse range of aluminum items, including but not limited to construction materials, transportation components, packaging solutions, and electrical conductors due to aluminum's properties such as light weight, corrosion resistance, and high conductivity.

## Time period
The text indicates that it is based on 2005 data

## Reference product
- aluminium and aluminium alloy products: 7.84e9; missing unimportant

## Inputs
- aluminium, primary, ingot: 1.46e9; missing unimportant
- recycled aluminium, unspecified: 1.66e9; missing unimportant
- hard coal: 7.28e9; missing unimportant

## Use advice
The users of this data set should note that the information is based on processes and technology available in 2005, and therefore may not accurately reflect current practices or technological advancements. Users must take this into account when applying this data in life cycle assessments, particularly if aiming for contemporary relevance. It may be necessary to adjust for changes in technology, efficiency, and environmental regulations when using this data set for comparative purposes or integrating with newer data. The recycling content and practices should also be specifically considered in the context of the temporal data point.

## Review details
Inventory: The internal review was done by several iteration steps concerning raw data validation, raw data documentation, representativity, completeness and consistency of modelling with regard to ISO 14040 and 14044.

## Data sources
- Xue, J., Liu, G.,Brown, M. T. & Casazza, M. Trash or treasure? Prospects for full aluminumchain in China based on the recycling options. J. Clean. Prod. 193,217–227 (2018)
