# Inorganic pigment ; Cinnabar, red clay, andrographis, peacock green, calcium carbonate ; Physical method or chemical method ; All sizes; NESPS2 / 无机颜料 ; 朱砂、红土、雄黄、孔雀绿、碳酸钙 ; 物理法或化学法 ; 所有规模 ; 全国第二次污染普查数据

Dataset: ILCD process, Unit process, single operation
Geography: CN
Reference year: 2019
Classification: Reference Parameters / Materials production / Inorganic chemicals
Generated by: The data was created by the Office of the Second National Pollution Source Census of the Ministry of Ecology and Environment, and the data was organized by the TianGong Plan team for ILCD format / 生态环境部第二次全国污染源普查工作办公室创建数据，天工计划团队常慧敏整理数据为ILCD格式
Owner: Tiangong LCI Data Working Group / 天工LCI数据工作小组
Review: Dependent internal review by Tiangong LCI Data Working Group / 天工LCI数据工作小组
Amounts: no units in this file; such an amount is in the reference unit of its flow, which a separate flow dataset defines
copyright: false
licenseType: Free of charge for all users and uses

## General comment
the Technical of end-of-pipe management technology for pollution Exhaust gasis/，Its Technical efficiency of end-of-pipe management0

## Technical purpose
所述的无机颜料，如朱砂、红土、可能的翻译错误或非标准术语颜料的雄黄、孔雀绿和碳酸钙，可以通过物理方法或化学方法生产，适用于各种规模的工业应用。这些颜料可能用于制造油漆、涂料、塑料制品、建筑材料或其他需要着色的商品。物理方法可能指的是磨碎或研磨等过程，而化学方法可能涉及反应制造颜料。

## Reference product
- Inorganic Pigment: 1000; calculated
  源文件中描述为为无机颜料，此处对其进行了匹配工作，将其匹配到LCAflow库里面相最符合的流，污染物指标备注为工业废水量

## Outputs
- particles (> PM10): 2.565; calculated
  the Technical of end-of-pipe management technology for pollution particles (> PM10)isBag filter，Its Technical efficiency of end-of-pipe management95
  污染物指标固体颗粒物的末端治理技术是袋式除尘，其效率为95，末端治理设施实际运行率（k值）计算公式为k=设施年耗电量（千瓦时）/(设备功率(千瓦)×年运行小时数(时))。原文件中描述污染物类别为废气，污染物指标为固体颗粒物，此处对其进行了匹配工作，将其匹配到LCAflow库里面相最符合的流，污染物指标备注为固体颗粒物
- Waste water: 20800; calculated
  the Technical of end-of-pipe management technology for pollution Waste wateris/，Its Technical efficiency of end-of-pipe management0
  污染物指标工业废水量的末端治理技术是/，其效率为0。原文件中描述污染物类别为废水，污染物指标为工业废水量，此处对其进行了匹配工作，将其匹配到LCAflow库里面相最符合的流，污染物指标备注为工业废水量
- chemical oxygen demand: 1.54; calculated
  the Technical of end-of-pipe management technology for pollution chemical oxygen demandisPhysicochemical treatment + anaerobic biological treatment + activated sludge process，Its Technical efficiency of end-of-pipe management90
  污染物指标化学需氧量的末端治理技术是物理化学处理法+厌氧生物处理法+活性污泥法，其效率为90，末端治理设施实际运行率（k值）计算公式为k=设施年耗电量（千瓦时）/(设备功率(千瓦)×年运行小时数(时))。原文件中描述污染物类别为废水，污染物指标为化学需氧量，此处对其进行了匹配工作，将其匹配到LCAflow库里面相最符合的流，污染物指标备注为化学需氧量
- Exhaust gas: 93500; calculated
  the Technical of end-of-pipe management technology for pollution Exhaust gasis/，Its Technical efficiency of end-of-pipe management0
  污染物指标工业废气量的末端治理技术是/，其效率为0。原文件中描述污染物类别为废气，污染物指标为工业废气量，此处对其进行了匹配工作，将其匹配到LCAflow库里面相最符合的流，污染物指标备注为工业废气量

## Use advice
This dataset is derived from the Pollution Source Census Report and contains information on pollution emissions and related products. However, it does not include data on energy or chemical consumption, nor does it provide information on waste or co-product generation. When utilizing this dataset, please supplement the missing data based on actual conditions before use
该数据集来源于污染源普查报告，包含污染物排放及相关产品信息，但不包含能源或化学品消耗数据，也不提供废弃物或共生产物产生信息。在使用该数据集时，请根据实际情况补充缺失数据后再使用。

## Review details
Inventory: The internal review was done by several iteration steps concerning raw data validation, raw data documentation, representativity, completeness and consistency of modelling with regard to ISO 14040 and 14044.
清单： 内部审查通过几个迭代步骤完成，涉及原始数据验证、原始数据记录、代表性、完整性、与 ISO 14040 和 14044 有关的建模的一致性。

## Data sources
- 第二次全国污染源普查产排污核算系数手册（试用版）,二级代码26,四级代码2644文件，在完整版文件中第4111页
