# Wastewater collection, storage and disposal ; Synthetic ammonia ; Bituminous coal, lignite ; Dry pulverized coal gasification process ; All sizes; NESPS2 / 废水集输、储存、处置 ; 合成氨 ; 烟煤、褐煤 ; 干煤粉气化工艺 ; 所有规模 ; 全国第二次污染普查数据

Dataset: ILCD process, Unit process, single operation
Geography: CN
Reference year: 2019
Classification: Reference Parameters / Energy carriers and technologies / Energetic raw materials
Generated by: The data was created by the Office of the Second National Pollution Source Census of the Ministry of Ecology and Environment, and the data was organized by the TianGong Plan team for ILCD format / 生态环境部第二次全国污染源普查工作办公室创建数据，天工计划团队常慧敏整理数据为ILCD格式
Owner: Tiangong LCI Data Working Group / 天工LCI数据工作小组
Review: Dependent internal review by Tiangong LCI Data Working Group / 天工LCI数据工作小组
Amounts: no units in this file; such an amount is in the reference unit of its flow, which a separate flow dataset defines
copyright: false
licenseType: Free of charge for all users and uses

## General comment
the Technical of end-of-pipe management technology for pollution volatile organic compoundis/，Its Technical efficiency of end-of-pipe management0

## Technical purpose
该数据集描述了涉及通过干燥煤粉烟煤和褐煤气化生产合成氨的废水收集、储存和处置的工业过程。该过程适用于采用这项特定技术的所有规模的设施。该数据集可能与化学工业中的利益相关者相关，尤其是那些参与氨的合成和煤气化过程中废水管理的人员。

## Reference product
- Ammonia Nitrogen: 1000; calculated
  源文件中描述为为合成氨，此处对其进行了匹配工作，将其匹配到LCAflow库里面相最符合的流，污染物指标备注为挥发性有机物

## Outputs
- volatile organic compound: 1.91; calculated
  the Technical of end-of-pipe management technology for pollution volatile organic compoundis/，Its Technical efficiency of end-of-pipe management0
  污染物指标挥发性有机物的末端治理技术是/，其效率为0。原文件中描述污染物类别为废气，污染物指标为挥发性有机物，此处对其进行了匹配工作，将其匹配到LCAflow库里面相最符合的流，污染物指标备注为挥发性有机物

## Use advice
This dataset is derived from the Pollution Source Census Report and contains information on pollution emissions and related products. However, it does not include data on energy or chemical consumption, nor does it provide information on waste or co-product generation. When utilizing this dataset, please supplement the missing data based on actual conditions before use
该数据集来源于污染源普查报告，包含污染物排放及相关产品信息，但不包含能源或化学品消耗数据，也不提供废弃物或共生产物产生信息。在使用该数据集时，请根据实际情况补充缺失数据后再使用。

## Review details
Inventory: The internal review was done by several iteration steps concerning raw data validation, raw data documentation, representativity, completeness and consistency of modelling with regard to ISO 14040 and 14044.
清单： 内部审查通过几个迭代步骤完成，涉及原始数据验证、原始数据记录、代表性、完整性、与 ISO 14040 和 14044 有关的建模的一致性。

## Data sources
- 第二次全国污染源普查产排污核算系数手册（试用版）,二级代码26,四级代码2621文件，在完整版文件中第4111页
