# Lithium ion battery monomer ; Lithium iron phosphate ; Cylinder ; All sizes; NESPS2 / 锂离子电池单体 ; 磷酸铁锂 ; 圆柱 ; 所有规模 ; 全国第二次污染普查数据

Dataset: ILCD process, Unit process, single operation
Geography: CN
Reference year: 2019
Classification: Reference Parameters / Energy carriers and technologies / Electricity
Generated by: The data was created by the Office of the Second National Pollution Source Census of the Ministry of Ecology and Environment, and the data was organized by the TianGong Plan team for ILCD format / 生态环境部第二次全国污染源普查工作办公室创建数据，天工计划团队常慧敏整理数据为ILCD格式
Owner: Tiangong LCI Data Working Group / 天工LCI数据工作小组
Review: Dependent internal review by Tiangong LCI Data Working Group / 天工LCI数据工作小组
Amounts: no units in this file; such an amount is in the reference unit of its flow, which a separate flow dataset defines
copyright: false
licenseType: Free of charge for all users and uses

## General comment
the treatment technology for the pollution of Exhaust gasdidn't offered

## Technical purpose
该数据集描述的所有规格磷酸铁锂（LiFePO4）圆柱形电池单体，应用范围广泛，包括便携式电子产品、电动车辆和固定式能量存储系统。这些电池单体代表具有相对稳定的电化学性质和长循环寿命的能量存储解决方案。适合对高能量密度和安全性有要求的场景，如医疗设备或航空航天应用。

## Reference product
- Lithium Ion Battery: 3.6; calculated
  源文件中描述为为锂离子电池单体，此处对其进行了匹配工作，将其匹配到LCAflow库里面相最符合的流，污染物指标备注为工业废水量

## Outputs
- Waste water: 0.005; calculated
  the treatment technology for the pollution of Waste waterdidn't offered
  污染物指标工业废水量的末端治理技术是－。原文件中描述污染物类别为废水，污染物指标为工业废水量，此处对其进行了匹配工作，将其匹配到LCAflow库里面相最符合的流，污染物指标备注为工业废水量
- chemical oxygen demand: 0.0001695; calculated
  the Technical of end-of-pipe management technology for pollution chemical oxygen demandisNeutralization method, others (chemical flocculation precipitation)，Its Technical efficiency of end-of-pipe management85
  污染物指标化学需氧量的末端治理技术是中和法、其他（化学凝絮沉淀），其效率为85，末端治理设施实际运行率（k值）计算公式为k=废水处理设备正常运转时间（小时/年）/正常生产时间（小时/年）。原文件中描述污染物类别为废水，污染物指标为化学需氧量，此处对其进行了匹配工作，将其匹配到LCAflow库里面相最符合的流，污染物指标备注为化学需氧量
- volatile organic compound: 0.000945; calculated
  the Technical of end-of-pipe management technology for pollution volatile organic compoundisCondensation recovery，Its Technical efficiency of end-of-pipe management99.5
  污染物指标挥发性有机物的末端治理技术是冷凝回收，其效率为99.5，末端治理设施实际运行率（k值）计算公式为k=废气处理设备耗电量（千瓦时/年）/(废气处理设备额定功率（千瓦）×废气处理设备运行时间（小时/年）)。原文件中描述污染物类别为废气，污染物指标为挥发性有机物，此处对其进行了匹配工作，将其匹配到LCAflow库里面相最符合的流，污染物指标备注为挥发性有机物
- Exhaust gas: 21; calculated
  the treatment technology for the pollution of Exhaust gasdidn't offered
  污染物指标工业废气量的末端治理技术是－。原文件中描述污染物类别为废气，污染物指标为工业废气量，此处对其进行了匹配工作，将其匹配到LCAflow库里面相最符合的流，污染物指标备注为工业废气量

## Use advice
This dataset is derived from the Pollution Source Census Report and contains information on pollution emissions and related products. However, it does not include data on energy or chemical consumption, nor does it provide information on waste or co-product generation. When utilizing this dataset, please supplement the missing data based on actual conditions before use
该数据集来源于污染源普查报告，包含污染物排放及相关产品信息，但不包含能源或化学品消耗数据，也不提供废弃物或共生产物产生信息。在使用该数据集时，请根据实际情况补充缺失数据后再使用。

## Review details
Inventory: The internal review was done by several iteration steps concerning raw data validation, raw data documentation, representativity, completeness and consistency of modelling with regard to ISO 14040 and 14044.
清单： 内部审查通过几个迭代步骤完成，涉及原始数据验证、原始数据记录、代表性、完整性、与 ISO 14040 和 14044 有关的建模的一致性。

## Data sources
- 第二次全国污染源普查产排污核算系数手册（试用版）,二级代码38,四级代码3841文件，在完整版文件中第3413页
