# Electricity transmission and distribution｜electricity ｜ no process

Dataset: ILCD process, Unit process, single operation
Geography: CN
Reference year: 2020
Classification: Unit processes / Energy carriers and technologies / Electricity
Functional unit: Taking 1 ton of straw as the functional unit
LCI method principle: Consequential
Generated by: Chaoshuo Liu, liucs22@mails.jlu.edu.cn
Owner: Tiangong LCI Data Working Group
Review: Dependent internal review by Tiangong LCI Data Working Group
Amounts: no units in this file; such an amount is in the reference unit of its flow, which a separate flow dataset defines
copyright: false
licenseType: Free of charge for all users and uses

## General comment
Straw moisture content is 14%

## Technical purpose
The industrial process described pertains to the transmission and distribution of electricity. This utility process serves to deliver electricity from generation facilities to end-users. Additionally, the data set identifies that the process involves handling straw with a moisture content of 14%, suggesting that the straw may be used as a biomass source in energy production, possibly to create electricity. The functional unit here is defined as the operations conducted to process 1 ton of straw, which might include its collection, processing, and usage as fuel in a power generation context.

## Reference product
- electricity from waste incineration: 435.276; measured

## Outputs
All rows: measured
- carbon dioxide (biogenic),carbon dioxide (biogenic): 4.353
  The expert notes that the original text does not differentiate between biogenic and fossil sources of emissions, and in their opinion, the emissions in question are biogenic.
- volatile organic compound: 0.00051
- carbon monoxide (biogenic): 0.00054
  (same comment as for carbon dioxide (biogenic),carbon dioxide (biogenic))
- nitrous oxide: 0.00435, 0.0001 (2 entries)
- particles (> PM10),particles (> PM10): 0.00094
- Particles (PM0.2 - PM2.5): 0.00037
- sulfur oxides: 0.01306
- methane (biogenic),methane (biogenic): 0.00871
  (same comment as for carbon dioxide (biogenic),carbon dioxide (biogenic))

## Use advice
The data set users should consider the scope of electricity transmission and distribution specific to the region or grid they are assessing. The use phase behavior modeling should include losses and efficiencies typical of the regional transmission and distribution infrastructure. As the straw moisture content is 14%, it should be accounted for in the energy conversion efficiency calculations when straw is used as biomass for energy production. It is essential to use this data set representing the handling of 1 ton of straw in the context of its energy potential, emissions during processing, and transportation impacts. Users should also take note of methodological boundaries when incorporating this data set into broader LCA studies.

## Review details
Inventory: The internal review was done by several iteration steps concerning raw data validation, raw data documentation, representativity, completeness and consistency of modelling with regard to ISO 14040 and 14044.

## Data sources
- Yang, Y., Ni, J.-Q., Zhou, S. & Xie, G. H. Comparison of energy performance and environmental impacts of three corn stover-based bioenergy pathways. Journal of Cleaner Production 272, 122631 (2020).
