# Chinese pastry ; Wheat flour ; Dough mixing+fermentation+baking ; greater than or equal to5000 t/a; NESPS2 / 中式糕点 ; 小麦粉 ; 和面+发酵+烘焙 ; 大于等于0.5万吨/年 ; 全国第二次污染普查数据

Dataset: ILCD process, Unit process, single operation
Geography: CN
Reference year: 2019
Classification: Reference Parameters / Materials production / Food and renewable raw materials
Generated by: The data was created by the Office of the Second National Pollution Source Census of the Ministry of Ecology and Environment, and the data was organized by the TianGong Plan team for ILCD format / 生态环境部第二次全国污染源普查工作办公室创建数据，天工计划团队常慧敏整理数据为ILCD格式
Owner: Tiangong LCI Data Working Group / 天工LCI数据工作小组
Review: Dependent internal review by Tiangong LCI Data Working Group / 天工LCI数据工作小组
Amounts: no units in this file; such an amount is in the reference unit of its flow, which a separate flow dataset defines
copyright: false
licenseType: Free of charge for all users and uses

## General comment
the Technical of end-of-pipe management technology for pollution chemical oxygen demandisAnaerobic biological treatment + aerobic biological treatment，Its Technical efficiency of end-of-pipe management98.6

## Technical purpose
该数据集涉及中式糕点的生产过程，年生产规模涉及混合、发酵和烘烤小麦粉，以生产至少5000吨/年的产品。该信息对食品工业了解中式糕点大批量生产过程非常有用。

## Reference product
- Chinese Pastry: 1000; calculated
  源文件中描述为为中式糕点，此处对其进行了匹配工作，将其匹配到LCAflow库里面相最符合的流，污染物指标备注为化学需氧量

## Outputs
All rows: calculated
- Ammonia Nitrogen: 7.5845e-5
  the Technical of end-of-pipe management technology for pollution Ammonia NitrogenisPhysical treatment + bio-contact oxidation process + aerobic biological treatment，Its Technical efficiency of end-of-pipe management99.75
  污染物指标氨氮的末端治理技术是物理处理法+生物接触氧化法+好氧生物处理法，其效率为99.75，末端治理设施实际运行率（k值）计算公式为k=污水处理设施年耗电量（千瓦时）/(总额定功率(千瓦)×年运行时间(小时)。原文件中描述污染物类别为废水，污染物指标为氨氮，此处对其进行了匹配工作，将其匹配到LCAflow库里面相最符合的流，污染物指标备注为氨氮
- Nitrogen, organic bound: 0.000258439
  the Technical of end-of-pipe management technology for pollution Nitrogen, organic boundisPhysical treatment + bio-contact oxidation process + aerobic biological treatment，Its Technical efficiency of end-of-pipe management99.89
  污染物指标总氮的末端治理技术是物理处理法+生物接触氧化法+好氧生物处理法，其效率为99.89，末端治理设施实际运行率（k值）计算公式为k=污水处理设施年耗电量（千瓦时）/(总额定功率(千瓦)×年运行时间(小时)。原文件中描述污染物类别为废水，污染物指标为总氮，此处对其进行了匹配工作，将其匹配到LCAflow库里面相最符合的流，污染物指标备注为总氮
- Petroleum-related waste: 0.000563047
  the Technical of end-of-pipe management technology for pollution Petroleum-related wasteisPhysical treatment + bio-contact oxidation process + aerobic biological treatment，Its Technical efficiency of end-of-pipe management98.92
  污染物指标石油类的末端治理技术是物理处理法+生物接触氧化法+好氧生物处理法，其效率为98.92，末端治理设施实际运行率（k值）计算公式为k=污水处理设施年耗电量（千瓦时）/(总额定功率(千瓦)×年运行时间(小时)。原文件中描述污染物类别为废水，污染物指标为石油类，此处对其进行了匹配工作，将其匹配到LCAflow库里面相最符合的流，污染物指标备注为石油类
- Petroleum-related waste: 0.00166307
  the Technical of end-of-pipe management technology for pollution Petroleum-related wasteisAnaerobic biological treatment + aerobic biological treatment，Its Technical efficiency of end-of-pipe management96.81
  污染物指标石油类的末端治理技术是厌氧生物处理法+好氧生物处理法，其效率为96.81，末端治理设施实际运行率（k值）计算公式为k=污水处理设施年耗电量（千瓦时）/(总额定功率(千瓦)×年运行时间(小时)。原文件中描述污染物类别为废水，污染物指标为石油类，此处对其进行了匹配工作，将其匹配到LCAflow库里面相最符合的流，污染物指标备注为石油类
- Waste water: 1754
  the Technical of end-of-pipe management technology for pollution Waste wateris/，Its Technical efficiency of end-of-pipe management0
  污染物指标工业废水量的末端治理技术是/，其效率为0。原文件中描述污染物类别为废水，污染物指标为工业废水量，此处对其进行了匹配工作，将其匹配到LCAflow库里面相最符合的流，污染物指标备注为工业废水量
- Ammonia Nitrogen: 0.00285177
  the Technical of end-of-pipe management technology for pollution Ammonia NitrogenisAnaerobic biological treatment + activated sludge process，Its Technical efficiency of end-of-pipe management90.6
  污染物指标氨氮的末端治理技术是厌氧生物处理法+活性污泥法，其效率为90.6，末端治理设施实际运行率（k值）计算公式为k=污水处理设施年耗电量（千瓦时）/(总额定功率(千瓦)×年运行时间(小时)。原文件中描述污染物类别为废水，污染物指标为氨氮，此处对其进行了匹配工作，将其匹配到LCAflow库里面相最符合的流，污染物指标备注为氨氮
- chemical oxygen demand: 0.00839637
  the Technical of end-of-pipe management technology for pollution chemical oxygen demandisPhysical treatment + bio-contact oxidation process + aerobic biological treatment，Its Technical efficiency of end-of-pipe management99.88
  污染物指标化学需氧量的末端治理技术是物理处理法+生物接触氧化法+好氧生物处理法，其效率为99.88，末端治理设施实际运行率（k值）计算公式为k=污水处理设施年耗电量（千瓦时）/(总额定功率(千瓦)×年运行时间(小时)。原文件中描述污染物类别为废水，污染物指标为化学需氧量，此处对其进行了匹配工作，将其匹配到LCAflow库里面相最符合的流，污染物指标备注为化学需氧量
- Nitrogen, organic bound: 0.00841103
  the Technical of end-of-pipe management technology for pollution Nitrogen, organic boundisAnaerobic biological treatment + activated sludge process，Its Technical efficiency of end-of-pipe management96.42
  污染物指标总氮的末端治理技术是厌氧生物处理法+活性污泥法，其效率为96.42，末端治理设施实际运行率（k值）计算公式为k=污水处理设施年耗电量（千瓦时）/(总额定功率(千瓦)×年运行时间(小时)。原文件中描述污染物类别为废水，污染物指标为总氮，此处对其进行了匹配工作，将其匹配到LCAflow库里面相最符合的流，污染物指标备注为总氮
- phosphorus, total: 0.0196482
  the Technical of end-of-pipe management technology for pollution phosphorus, totalisPhysical treatment + bio-contact oxidation process + aerobic biological treatment，Its Technical efficiency of end-of-pipe management90.86
  污染物指标总磷的末端治理技术是物理处理法+生物接触氧化法+好氧生物处理法，其效率为90.86，末端治理设施实际运行率（k值）计算公式为k=污水处理设施年耗电量（千瓦时）/(总额定功率(千瓦)×年运行时间(小时)。原文件中描述污染物类别为废水，污染物指标为总磷，此处对其进行了匹配工作，将其匹配到LCAflow库里面相最符合的流，污染物指标备注为总磷
- phosphorus, total: 0.0224858
  the Technical of end-of-pipe management technology for pollution phosphorus, totalisAnaerobic biological treatment + activated sludge process，Its Technical efficiency of end-of-pipe management89.54
  污染物指标总磷的末端治理技术是厌氧生物处理法+活性污泥法，其效率为89.54，末端治理设施实际运行率（k值）计算公式为k=污水处理设施年耗电量（千瓦时）/(总额定功率(千瓦)×年运行时间(小时)。原文件中描述污染物类别为废水，污染物指标为总磷，此处对其进行了匹配工作，将其匹配到LCAflow库里面相最符合的流，污染物指标备注为总磷
- chemical oxygen demand: 0.0979577
  the Technical of end-of-pipe management technology for pollution chemical oxygen demandisAnaerobic biological treatment + aerobic biological treatment，Its Technical efficiency of end-of-pipe management98.6
  污染物指标化学需氧量的末端治理技术是厌氧生物处理法+好氧生物处理法，其效率为98.6，末端治理设施实际运行率（k值）计算公式为k=污水处理设施年耗电量（千瓦时）/(总额定功率(千瓦)×年运行时间(小时)。原文件中描述污染物类别为废水，污染物指标为化学需氧量，此处对其进行了匹配工作，将其匹配到LCAflow库里面相最符合的流，污染物指标备注为化学需氧量

## Use advice
This dataset is derived from the Pollution Source Census Report and contains information on pollution emissions and related products. However, it does not include data on energy or chemical consumption, nor does it provide information on waste or co-product generation. When utilizing this dataset, please supplement the missing data based on actual conditions before use
该数据集来源于污染源普查报告，包含污染物排放及相关产品信息，但不包含能源或化学品消耗数据，也不提供废弃物或共生产物产生信息。在使用该数据集时，请根据实际情况补充缺失数据后再使用。

## Review details
Inventory: The internal review was done by several iteration steps concerning raw data validation, raw data documentation, representativity, completeness and consistency of modelling with regard to ISO 14040 and 14044.
清单： 内部审查通过几个迭代步骤完成，涉及原始数据验证、原始数据记录、代表性、完整性、与 ISO 14040 和 14044 有关的建模的一致性。

## Data sources
- 第二次全国污染源普查产排污核算系数手册（试用版）,二级代码14,四级代码1411文件，在完整版文件中第3413页
