# Injection well ; Din=0.15m,L=50m ; Groundwater in-situ remediation ; Enhanced bioremediation ;Construction of injection wells and monitoring wells

Dataset: ILCD process, Unit process, single operation
Geography: SH-CN
Reference year: 2020
Classification: Unit processes / Other Services / Repair and maintenance
Generated by: Yang Xintong, yangxt@caep.org.cn
Owner: Tiangong LCI Data Working Group
Review: Dependent internal review by Tiangong LCI Data Working Group
Amounts: no units in this file; such an amount is in the reference unit of its flow, which a separate flow dataset defines
copyright: false
licenseType: Free of charge for all users and uses

## General comment
CHC+ISB（加热-冷却系统+原位生物修复）用于现场修复，在施工准备阶段，修建注入井和监测井。

## Geography
The aquifer in a certain area in Shanghai, China, is uniformly contaminated with chlorinated volatile organic compounds (CVOCs), with a surface area of 20,000 m2 and a depth of 50 m, with the water table located at a depth of 30 m.

## Technical purpose
The given industrial process describes the construction and utilization of injection wells and monitoring wells with dimensions of 0.15 meters in diameter and 50 meters in length. These are specifically designed for in-situ groundwater remediation in contaminated regions. The process involves enhanced bioremediation, and the Combined Heat and Cooling System (CHC) with In-Situ Bioremediation (ISB) is implemented for the on-site cleanup of chlorinated volatile organic compounds (CVOCs). This setup is used in the construction preparation stage for environmental remediation of an aquifer encompassing an area of 20,000 square meters up to a depth of 50 meters underneath Shanghai, where the water table is located at a depth of 30 meters.

## Reference product
- injection well: 272
  文中仅给出监测井和注入井一共544口，没有给出单独的监测井和注入井数量，这里填报人简单估计两种监测井数量各半。

## Inputs
- Gravel Sand: 178145; calculated
- bentonite: 75216.2; calculated
- Steel: 1360; software or database
- Polyethylene,Polyethylene: 13600; software or database
- Electricity: 846029; software or database

## Outputs
- Waste (solid): 245130
  每口井约产生钻井废土0.9012吨

## Use advice
Users incorporating this data set into a Life Cycle Assessment (LCA) should ensure that system boundaries include the construction phase of injection wells and monitoring wells. Attention should be given to the specific methodology around assessing environmental impacts of in-situ remediation techniques, especially pertaining to the degradation of CVOCs. It is also advisable to include potential emissions during the operation of CHC+ISB systems. When modeling the use phase behavior, consider the unique characteristics of groundwater flow and contaminant dispersion in the affected area.

## Review details
Inventory: The internal review was done by several iteration steps concerning raw data validation, raw data documentation, representativity, completeness and consistency of modelling with regard to ISO 14040 and 14044.

## Data sources
- Ni, Z. et al. Comparative Life-Cycle Assessment of Aquifer Thermal Energy Storage Integrated with in Situ Bioremediation of Chlorinated Volatile Organic Compounds. Environ. Sci. Technol. 54, 3039–3049 (2020).
