# cement production;cement, ordinary portland cement;traditional shaft kiln / 水泥生产;水泥, 普通硅酸盐水泥;传统立窑

Dataset: ILCD process, Unit process, black box
Geography: CN
Classification: Materials production / Other mineralic materials
Generated by: Siqi Yang, ysqsophia@gmail.com / 杨思琪, ysqsophia@gmail.com
Owner: Tiangong LCI Data Working Group / 天工LCI数据工作小组
Review: Dependent internal review by Tiangong LCI Data Working Group / 天工LCI数据工作小组
Amounts: no units in this file; such an amount is in the reference unit of its flow, which a separate flow dataset defines
copyright: false
licenseType: Free of charge for all users and uses

## General comment
The impact of a typical traditional shaft kiln process on the resource consumption, energy consumption and environmental emissions involved in the cement production life cycle was quantified using 1t of ordinary silicate cement as a functional unit.
以1t普通硅酸盐水泥为功能单位，对传统立窑典型工艺对水泥生产生命周期中所涉及的资源消耗、能源消耗及环境排放的影响进行量化。

## Technical purpose
Ordinary Portland cement produced through the traditional shaft kiln process is primarily used in construction applications including the making of concrete, mortar, and stucco. It serves as a fundamental component in masonry and civil engineering projects.
通过传统立窑工艺生产的普通硅酸盐水泥主要用于建筑应用，包括制作混凝土、砂浆和灰泥。它是砌筑和土木工程项目中的基础组成部分。

## Model description
Taking 1 ton of ordinary Portland cement as the functional unit. The scope of the research is defined as four processes: raw meal preparation, clinker burning, cement grinding, and packaging and delivery.
以 1 t 普通硅酸盐水泥为功能单位。研究范围界定为生料制备、熟料烧成、水泥粉磨、包装出厂四个工艺过程。

## Reference product
- cement, ordinary portland cement: 1000
  Ordinary Portland Cement
  普通硅酸盐水泥

## Inputs
- limestone, crushed, for mill: 1133.26
  Limestone. The resource consumption data is based on the research results of Li Songbing.
  石灰石。资源消耗数据采用李松炳的研究成果。
- hard coal; 26.3 MJ/kg: 191
  Heat consumption (converted to standard coal consumption). Standard coal is not an actual substance, but a conversion method.Data processing: The original literature states a heat consumption of 133.7 kgce/t clinker, and since 1 ton of cement contains 0.7 tons of clinker, it is converted to kgce/t cement for data input.Due to the lack of data on natural gas, petroleum coke, alternative fuels, and fuel oil consumption, it is assumed that all heat consumption comes from coal combustion. The conversion factor between raw coal and standard coal is 1 kg raw coal = 0.7143 kg standard coal.
  热耗。标准煤并非实际存在的物质，为折算方法。原文献为133.7kgce/t熟料，1t水泥含0.7t熟料，折算为kgce/t水泥录入。由于数据缺乏，假设五种工艺熟料/水泥配比系数均为0.7，即生产1吨水泥需要掺加0.7吨熟料。能源消耗来自水泥工业协会公布的数据并参考《2010年水泥行业风险分析报告》。
- electricity, medium voltage: 345.6
  Electricity consumption. China's power industry is mainly based on thermal power generation, with the proportion of thermal power generation always above 80%. To simplify the calculation, it is assumed that all purchased electricity for cement enterprises comes from thermal power generation, and the electricity consumption is converted into coal consumption using the coal consumption coefficient of 0.349 kgce/kWh for thermal power generation in 2008. The energy consumption comes from data published by the Cement Industry Association and referenced in the "2010 Risk Analysis Report of the Cement Industry."
  电耗。我国电力行业以火电发电为主，火力发电的比例一直在80%以上，为了简化计算，假设水泥企业外购电力全部来自火力发电，电力消耗按2008年火力发电煤耗系数0.349kgce/kwh转化为标煤的消耗。能源消耗来自水泥工业协会公布的数据并参考《2010年水泥行业风险分析报告》。

## Outputs
- particles (> PM10): 0.634
  Dust and particulate matter, with an unspecified particle size, is treated as PM > 10 micrometers in diameter. The emission factor of particulate matter (PM) pollutant in flue gas is based on the statistical results of the 2008 China Pollution Source Census.
  烟尘和粉尘，未标明粒径，按PM>10处理。粉（烟）尘排放系数采用2008年中国污染源普查统计结果。
- sulfur dioxide: 0.352
  SO2. The emission factor of SO2 pollutant in flue gas is based on the statistical results of the 2008 China Pollution Source Census.
  SO2。废气中的SO2污染物排放系数采用2008年中国污染源普查统计结果。
- Nitrogen oxides: 0.175
  NOx. The emission factor of NOx pollutant in flue gas is based on the statistical results of the 2008 China Pollution Source Census.
  NOx。废气中的NOx污染物排放系数采用2008年中国污染源普查统计结果。
- carbon dioxide: 650.88
  CO2. CO2 emissions are estimated based on their sources. The specific estimation method is as follows:①CO2 produced from carbonate decomposition. During the cement production process, the decomposition of limestone to produce cement clinker requires CaO, which also generates CO2. The chemical reaction is as follows: CaCO3→CaO+CO2↑. The chemical equation for the decomposition of CaCO3 shows that for every 1 part of CaO produced, 0.7857 parts of CO2 are also generated. Based on the average content of CaO in the main mineral components of ordinary Portland cement in China, which ranges from 62% to 67%, assuming 65%, the CO2 produced from the decomposition of CaCO3 for every ton of cement clinker produced is: 1 ton × 0.7857 × 65% = 0.5071 ton. In addition, cement raw materials usually contain a small amount of magnesium carbonate, which also decomposes and produces CO2 during calcination. The chemical reaction is as follows: MgCO3→MgO+CO2↑. The chemical equation for the decomposition of MgCO3 shows that for every 1 part of MgO produced, 1.1 parts of CO2 are also generated. Based on the average content of MgO in the main mineral components of ordinary Portland cement in China, which ranges from 1% to 3%, assuming 1.5%, the CO2 produced from the decomposition of magnesium carbonate for every ton of cement clinker produced is: 1 ton × 1.1 × 1.5% = 0.0165 ton. In summary, the total amount of CO2 produced from carbonate decomposition during cement clinker production is: 0.5071 ton + 0.0165 ton = 0.5236 ton.②CO2 emitted from cement kiln fuel combustion. The formation of cement clinker requires high-temperature calcination, during which CO2 is generated from fuel combustion to provide high temperature. According to research results from the IPCC, the carbon emission factor of raw coal in China is 2.7715 kg CO2/kg of raw coal.
  CO2。CO2排放按其来源进行估算。具体估算方法如下：①碳酸分解产生的CO2。水泥生产过程中石灰石的分解生成水泥熟料必须的Cao同时会生成CO2，其化学反应式为： CaCO3→Cao+CO2 ↑。CaCO3分解的化学反应式表明：每生成1份的Cao，同时会生成0.7857份的 CO2，根据国内的平均水平，我国普通硅酸盐水泥的主要矿物化学成分中CaO含量的大致波动范围为：62-67％，如果按65%计算，每生产1吨水泥熟料，由CaCO3分解产生CO2为：1t×0.7857×65％=0.5071t。 另外，水泥生料中通常含有少量的碳酸镁，碳酸镁在煅烧过程中分解也会产 生CO2，其化学反应式为：MgCO3→Mgo+CO2↑。MgCO3分解的化学反应式表明：每生成1份的 Mgo，同时会生成1.1份的CO2，根据国内的平均水平，我国普通硅酸盐水泥的主要矿物化学成分中MgO含量的大致波动范围为：1-3％，如果按1.5%计算，每生产1t水泥熟料，由碳酸镁分解产生的CO2为：1t×1.1×1.5％＝0.0165t。 综合计算，在水泥熟料生产过程中，由碳酸盐分解产生的CO2总量为：0.5107t + 0.0165t=0.5272t。②水泥窑燃料燃烧排放的CO2。水泥熟料的形成需要高温煅烧，煅烧过程中燃料燃烧提供高温的过程中会生成CO2，根据IPCC的研究成果，我国原煤的碳排放系数为2.7715kgCO2/kg原煤。

## Data selection and combination
The resource consumption data adopts the research results of Li Songbing. The energy consumption comes from the data published by the Cement Industry Association and refers to the "2010 Cement Industry Risk Analysis Report". The emission coefficients of powder (smoke) dust and SO2 and NOx pollutants in the exhaust gas adopt the 2008 China Statistical results of pollution source census; CO2 emissions are estimated according to their sources.
资源消耗数据采用李松炳的研究成果，能源消耗来自水泥工业协会公布的数据并参考《2010年水泥行业风险分析报告》，粉（烟）尘以及废气中的SO2、NOx污染物排放系数采用2008年中国污染源普查统计结果；CO2排放按其来源进行估算。

## Data treatment and extrapolations
Heat consumption: Divide 0.7 and convert to unit cement heat consumption.
热耗：除0.7，换算为单位水泥热耗。

## Use advice
When utilizing the data set for life cycle assessment, it is important to consider the energy consumption and emissions specific to the traditional shaft kiln technology. Recycling of materials, if any, should be considered in the assessment. The data regarding resource and energy consumption, as well as emission factors, should be interpreted in the context of existing standards and the specific technological process for producing ordinary Portland cement in the traditional shaft kiln. Users should update the dataset with the most recent emission factors and technological advances when available. The unit process (black box) approach should be used with the understanding that inputs and outputs are quantified, without detailed insight into the process itself.
在使用数据集进行生命周期评估时，需要特别考虑传统立窑技术特有的能源消耗和排放。如有材料回收，应在评估中考虑。资源消耗、能耗以及排放系数数据应在现有标准和传统立窑工艺生产普通硅酸盐水泥的特定技术过程的背景下进行解读。用户在有新的排放因子和技术进步时，应更新数据集。单元过程（黑箱）方法应在理解输入和输出被量化的情况下使用，而无需深入了解过程本身。

## Review details
Inventory: The internal review was done by several iteration steps concerning raw data validation, raw data documentation, representativity, completeness and consistency of modelling with regard to ISO 14040 and 14044.
清单： 内部审查通过几个迭代步骤完成，涉及原始数据验证、原始数据记录、代表性、完整性、与 ISO 14040 和 14044 有关的建模的一致性。

## Data sources
- 周志刚. (2011). 水泥工业物质代谢及生态化转型研究 [博士, 天津大学].
