# cement production;cement, ordinary portland cement, 52.4MPa;wet long kiln;blast furnace slag

Dataset: ILCD process, Unit process, black box
Geography: CN
Reference year: 2001
Classification: Materials production / Other mineralic materials
Generated by: Siqi Yang, ysqsophia@gmail.com
Owner: Tiangong LCI Data Working Group
Review: Dependent internal review by Tiangong LCI Data Working Group
Amounts: no units in this file; such an amount is in the reference unit of its flow, which a separate flow dataset defines
copyright: false
licenseType: Free of charge for all users and uses

## General comment
The wet process plant is a secondary key enterprise, and its technological process is relatively mature, with main production processes including slurry preparation and storage, raw material grinding, slurry preparation, and clinker sintering, etc.

## Technology and included processes
The wet process plant is a second-level key enterprise, and the process is relatively mature. The main production process includes mud preparation and storage, raw material grinding, slurry preparation, clinker calcining, etc. The schematic diagram of the process is shown in Figure 3.3.

## Technical purpose
This data set represents the production process of ordinary Portland cement with a strength of 52.4MPa. This type of cement is commonly used in various construction projects requiring high strength materials, such as infrastructure buildings, bridges, and residential structures. The wet process method and the inclusion of blast furnace slag indicate this cement could also have applications in sustainable building practices where material recycling and waste utilization are emphasized.

## Model description
The research scope is defined as raw material entering the plant, raw material pretreatment, raw meal grinding, raw meal calcination, clinker grinding, until cement homogenization and storage. Specific processes such as mining, transportation, and cement packaging are not included.

## Reference product
- cement, ordinary portland cement, 52.4MPa: 1000
  The average grade of cement is 524.

## Inputs
- limestone, crushed, for mill: 1243.89
  Limestone
- clay: 129.923
  Clay
- iron, powder: 21.472
  Iron powder
- gypsum stone (CaSO4-dihydrate): 44.3374
  Gupsum
- fluorspar: 3.00822
  Fluorspar
- blast furnace slag: 88.8605
  The original literature was labeled with water slag (i.e., ironmarking blast furnace slag).
- Water (fresh water): 1262.36
  Fresh water
- hard coal: 194.117
  The original data is 75.742kt standard coal, here converted to hard coal, the conversion formula is 1kg hard coal = 0.929kg standard coal.
- electricity, medium voltage: 399.572
  Electricity

## Outputs
- particles (> PM10): 5.69176
  Dust, with an unspecified particle size, is treated as PM > 10 micrometers in diameter.
- particles (> PM10): 0.0256521
  Smoke, with an unspecified particle size, is treated as PM > 10 micrometers in diameter.
- sulfur dioxide: 0.0574254
  Sulfur dioxide
- Nitrogen oxides: 0.0162439
- carbon dioxide: 1073.45
  Carbon dioxide

## Data treatment and extrapolations
CO2 data processing: Based on the CO2 emission data of one functional unit, the CO2 emissions of producing 419,849 tons of cement were calculated.

## Use advice
Users of this data set should consider the following methodological advice: CO2 emission calculations correspond to the production of 419,849 tons of cement and should be scaled accordingly for different production volumes. The research scope of this data omits certain processes such as mining, transportation, and cement packaging; therefore, users must include these activities separately if required by their study. When applying this data, attention to specific local regulations on waste use and environmental impacts is advised. The technological applicability of this data should align with the relatively mature wet long kiln process described.

## Review details
Inventory: The internal review was done by several iteration steps concerning raw data validation, raw data documentation, representativity, completeness and consistency of modelling with regard to ISO 14040 and 14044.

## Data sources
- 狄向华. (2001). 材料环境协调性评价的标准流程方法研究 [硕士, 北京工业大学].
