# Municipal sludge treatment and disposal;wet sludge moisture content 80%;aerobic fermentation

Dataset: ILCD process, Unit process, single operation
Geography: QHD-HEB-CN
Classification: Unit processes / End-of-life treatment / Waste water treatment
Functional unit: The system boundary is defined as the transport of wet sludge (80% moisture content) to the sludge treatment or disposal point to form a complete process route.
Generated by: Jin Sitian, 2331276@tongji.edu.cn
Owner: Tiangong LCI Data Working Group
Review: Dependent internal review by Tiangong LCI Data Working Group
Amounts: no units in this file; such an amount is in the reference unit of its flow, which a separate flow dataset defines
copyright: ['opt4ROkqig']
licenseType: Free of charge for all users and uses

## General comment
In the whole process route, the floor space, energy consumption, greenhouse gases, and gas pollutant emissions of each link are included in the scope of environmental impact assessment.

## Technology and included processes
According to accurate accounting, the mechanical equipment involved in the intelligent aerobic fermentation process includes homogenizing machines, blowers, mixers, belt conveyors, etc.

## Technical purpose
The municipal sludge treatment and disposal process described is intended for the management of wet sludge with a high moisture content (80%). This process specifically utilizes aerobic fermentation technology to treat the sludge, which is suitable for municipal wastewater treatment plants aiming to stabilize and reduce the volume of wet sludge before its final disposal or potential utilization as a soil amendment.

## Reference product
- Sludge: 1000; input; estimated
  1t wet sludge (moisture content 80%)

## Inputs
- Electricity: 103.68; measured
- Diesel: 0.22; measured

## Outputs
- ammonia: 0.0032; measured
- hydrogen sulfide: 0.011; measured
- carbon dioxide (biogenic): 42; measured
  The original text does not distinguish between biogenic and fossil, and according to experts, it is biogenic here.

## Use advice
When utilizing this dataset, users should be aware that the system boundary is confined to the transport of wet sludge with 80% moisture content to treatment or disposal sites. Care should be taken to ensure that the data is applicable to the specific local context in which aerobic fermentation is used for sludge treatment. Additionally, when modelling the life cycle impact, consider the emissions related to the transportation of the sludge and the efficiency of the aerobic fermentation process in reducing sludge mass and volume.

## Review details
Inventory: The internal review was done by several iteration steps concerning raw data validation, raw data documentation, representativity, completeness and consistency of modelling with regard to ISO 14040 and 14044.

## Data sources
- 刘洪涛,郑海霞,陈俊,等. 城镇污水处理厂污泥处理处置工艺生命周期评价[J]. 中国给水排水,2013,29(6):11-13. DOI:10.3969/j.issn.1000-4602.2013.06.003.
