# Silicon ore mining; Silicon ore ; Open pit mining

Dataset: ILCD process, Unit process, single operation
Geography: GS-CN
Reference year: 2013
Classification: Unit processes / Materials production / Non-energetic raw materials
Functional unit: 1 kg solar grade multi-Si
LCI method principle: Attributional
LCI method approaches: Allocation
Generated by: Jinfeng Yang, yjfzfshn@163.com
Owner: Tiangong LCI Data Working Group
Review: Dependent internal review by Tiangong LCI Data Working Group
Amounts: no units in this file; such an amount is in the reference unit of its flow, which a separate flow dataset defines
copyright: false
licenseType: Free of charge for all users and uses

## General comment
Multi-Si

## Geography
There are many silicon mining enterprises in Gansu province, and the mining technology is more advanced, in the domestic silicon mining enterprises have a good representation

## Time period
Available online

## Technology and included processes
The main production process of the enterprise is the use of small submerged drilling rigs for perforation, the use of medium-depth holes in multi-row micro-differential blasting method for ore mining, crushing of larger pieces of ore in the explosive pile, smaller ores using an excavator, loaded into a car and transported to the temporary stockpile, crushing and beneficiation in the temporary stockpile, and ultimately will meet the specifications of the cinnamon stone storage to be sold

## Technical purpose
This dataset pertains to the open-pit mining of silicon ore with a silicon dioxide content between 98.02% and 98.52%. The mined material is suited for the production of solar-grade multi-crystalline silicon (multi-Si) used as a key material in photovoltaic cells for solar panels.

## Reference product
- quartz sand: 9e7; measured
  silica ore

## Inputs
- freshwater: 1.0185e7; measured
  water
- Explosive: 5e6; measured
  dynamite
- Gasoline: 36000; measured
  Petrol and diesel
- Electricity: 1.944e6; measured
  Electric energy

## Outputs
All rows: measured
- carbon monoxide,carbon monoxide (fossil): 374364
  CO
- sulfur dioxide: 855690
- Nitrogen oxides: 615027
- hydrogen sulfide: 427845
- ammonia: 227292
  Ammonia
- particles (> PM10),particles (>PM10): 14727
  dust
- industrial waste (unspecified): 6000
  Solid Waste

## Deviations from the LCI method approaches
In this paper, solar-grade polysilicon is taken as the research object, and the value of resource, energy input and environment emission of solar-grade polysilicon life cycle process at domestic and general production level is calculated quantitatively by using LCA evaluation method

## Data selection and combination
According to the enterprise production process data collection and collation

## Use advice
When using this dataset for life cycle assessment (LCA) of solar-grade multi-Si, ensure that the methodology is consistent with the advanced mining techniques, as represented by operations in Gansu province. The extraction and subsequent processing steps, including medium-depth hole multi-row microdifferential blasting, crushing, and beneficiation, should be modeled accurately to assess the environmental impact correctly. Special attention should be paid to the representativeness of the data, and energy consumption and emissions should be calculated based on the actual production levels of the enterprise.

## Review details
Inventory: The internal review was done by several iteration steps concerning raw data validation, raw data documentation, representativity, completeness and consistency of modelling with regard to ISO 14040 and 14044.

## Data sources
- 何洋. 太阳能级多晶硅的生命周期评价. (西南交通大学, 2013).
