# Iron phosphate production ; Iron phosphate ; Ferrous sulfate, phosphoric acid, sodium hydroxide, hydrogen peroxide

Dataset: ILCD process, Unit process, single operation
Geography: AH-CN
Classification: Materials production / Inorganic chemicals
Functional unit: Produce 1kg iron phosphate
LCI method principle: Attributional
Generated by: Xin Chen, xinchen@mail.nankai.edu.cn
Owner: Tiangong LCI Data Working Group
Review: Dependent internal review by Tiangong LCI Data Working Group
Amounts: no units in this file; such an amount is in the reference unit of its flow, which a separate flow dataset defines
copyright: false
licenseType: Free of charge for all users and uses

## General comment
Iron phosphate is produced by ferrous sulfate and phosphoric acid reaction under hydrogen peroxide and then filtered and dried by water washing.

## Geography
Anhui Annada Titanium Industry Co.

## Technical purpose
Iron phosphate produced by this process is often used as a cathode material for lithium-ion batteries, due to its stability and environmental friendliness. It can also be applied as a pigment, in fertilizer production, or as an iron supplement in feed and food industries.

## Reference product
- Iron phosphate: 1
  The inventory data here are from a project with an annual capacity of 5000 tons of ferric phosphate in Anhui(Anhui Annada Titanium Industry Co., 2015)

## Inputs
- ferrous sulfate: 0.808
  (same comment as for Iron phosphate)
- phosphoric acid: 1.8
  (same comment as for Iron phosphate)
- hydrogen peroxide: 0.0331
  (same comment as for Iron phosphate)
- sodium hydroxide: 1.85
  (same comment as for Iron phosphate)
- water: 50
  (same comment as for Iron phosphate)
- Electricity: 3.4992
  (same comment as for Iron phosphate)
- Natural gas, at consumer EU-27: 0.206
  (same comment as for Iron phosphate)

## Outputs
- chemical oxygen demand: 0.00114
  (same comment as for Iron phosphate)
- ammonium: 6e-6
  (same comment as for Iron phosphate)
- sulfur dioxide: 2.06e-5
  (same comment as for Iron phosphate)
- nitrogen dioxide: 0.000126
  (same comment as for Iron phosphate)
- Soot: 4.8e-9
  (same comment as for Iron phosphate)
- Dust: 0.0006
  (same comment as for Iron phosphate)

## Data selection and combination
The data comes from the 2015 production data of Anhui Annada Titanium Industry Co..

## Use advice
The LCA data for iron phosphate production should include the environmental impacts of sourcing all raw materials and the energy consumed during the production process. Care should be taken to ensure that emissions are accurately accounted for. It is important to consider potential recycling or secondary usage scenarios for iron phosphate at the end-of-life phase when applying this data.

## Review details
Inventory: The internal review was done by several iteration steps concerning raw data validation, raw data documentation, representativity, completeness and consistency of modelling with regard to ISO 14040 and 14044.

## Data sources
- Feng, T., Guo, W., Li, Q., Meng, Z. & Liang, W. Life cycle assessment of lithium nickel cobalt manganese oxide batteries and lithium iron phosphate batteries for electric vehicles in China. Journal of Energy Storage52, 104767 (2022).
