# 钻井｜固井｜水力压裂｜放喷测试求产｜生产

Dataset: ILCD process, Unit process, single operation
Geography: CQ-CN
Reference year: 2015
Classification: Materials production / Other mineralic materials
LCI method principle: Attributional
LCI method approaches: Consequential
Generated by: XIAOQI WANG, vickyo3ww@gmail.com
Review: Dependent internal review by Tiangong LCI Data Working Group
Amounts: no units in this file; such an amount is in the reference unit of its flow, which a separate flow dataset defines

## Geography
涪陵

## Time period
本文中的中国ＩＯ－ＬＣＡ 方法 基 于 ２０１５ 年 中 国 投 入产出（ＩＯ）表

## Technology and included processes
混合生命 周 期 评 价 （Ｈｙｂｒｉｄ　ＬＣＡ，Ｈ－ＬＣＡ）模 型 结合了过 程生命 周 期 评 价 方 法 （Ｐｒｏｃｅｓｓｅｄ　ｂａｓｅｄ　ＬＣＡ， Ｐ－ＬＣＡ）和 投 入 产 出 分 析 方 法 （Ｉｎｐｕｔ　ｏｕｔｐｕｔ　ＬＣＡ， ＩＯ－ＬＣＡ），在 估 算 温 室 气 体 （ＧＨＧ）排 放 模 型 中 既 包 含了由燃料燃烧造成 的 直 接 ＧＨＧ 排 放，也 包 含 了 来 自原料和燃料上游生产的间接 ＧＨＧ 排 放。 该 方 法 避免了 Ｐ－ＬＣＡ 法由于人为划定系统边界产生的阶段 误差，同时保证了系统完 整 性［５］。

## Inputs
All rows: uniform; article inperiodical
- Diesel: 221040; min 168280; max 314860
  钻井｜钻井设备用量
- Diesel: 460; min 330; max 560
  钻井｜运输用量
- bentonite: 410; min 270; max 540
  钻井｜水基钻井液用量
- Diesel: 70; min 30; max 80
  固井｜注水泥用量
- Diesel: 2680; min 1910; max 3190
  固井｜运输用量
- Diesel: 215150; min 155380; max 310770
  水力压裂｜压裂装备用量
- Diesel: 1780; min 970; max 2530
  水力压裂｜运输用量

## Data selection and combination
涪陵页岩气田是我国首个大型页岩气田，也 是 全 球除北美之外最大的页岩气田，故 本 文 以 涪 陵 页 岩 气 田为研究 对 象，

## Data treatment and extrapolations
本 文 采 用 Ｈ－ＬＣＡ 模 型 （详 情 参 照 Ｗａｎｇ等［８］研 究）对 涪 陵 页 岩 气 开 发 进 行 ＧＨＧ 排 放 估 算 ，钻井现场消耗的材料和燃料均按就近原则采 购，结合井场位 置 和 原 料 购 买 地 点，用 百 度 地 图 估 算 运输距离均值。

## Review details
Inventory: The internal review was done by several iteration steps concerning raw data validation, raw data documentation, representativity, completeness and consistency of modelling with regard to ISO 14040 and 14044.; Documentation: The review of the documentation was performed by Ecobilan and is in compliance with ISO 14040 and 14044. The data set documentation is correct in view of the appropriateness of the information provided. It includes all relevant information in view of data quality and scope of application of the respective LCI result.

## Data sources
- 李琋, 毛红敏 & 王兵. 涪陵页岩气开发生命周期温室气体排放估算. 油气田环境保护 31, 1–7 (2021).
