# Double stripping/gasoline oxidation desulfurization unit ; Desulfurized dry gas, liquefied gas/refined gasoline ; Crude gasoline, refinery gas, liquefied gas ; Double desulfurization/gasoline oxidative desulfanization ; All sizes; NESPS2 / 双脱/汽油氧化脱硫醇装置 ; 脱硫干气、液化气/精制汽油 ; 粗汽油、炼厂气、液化气 ; 双脱/汽油氧化脱硫醇 ; 所有规模 ; 全国第二次污染普查数据

Dataset: ILCD process, Unit process, single operation
Geography: CN
Reference year: 2019
Classification: Reference Parameters / Energy carriers and technologies / Crude oil based fuels
Generated by: The data was created by the Office of the Second National Pollution Source Census of the Ministry of Ecology and Environment, and the data was organized by the TianGong Plan team for ILCD format / 生态环境部第二次全国污染源普查工作办公室创建数据，天工计划团队常慧敏整理数据为ILCD格式
Owner: Tiangong LCI Data Working Group / 天工LCI数据工作小组
Review: Dependent internal review by Tiangong LCI Data Working Group / 天工LCI数据工作小组
Amounts: no units in this file; such an amount is in the reference unit of its flow, which a separate flow dataset defines
copyright: false
licenseType: Free of charge for all users and uses

## General comment
the Technical of end-of-pipe management technology for pollution chemical oxygen demandisPhysical treatment + biological treatment，Its Technical efficiency of end-of-pipe management83

## Technical purpose
本工业过程涉及双脱/汽油氧化脱硫装置，用于生产脱硫干气、液化气和精制汽油。处理过程包括对原油汽油、炼厂气和液化气进行双重脱硫和汽油氧化脱硫，适用于所有规模的操作。应用包括为处理废水和排放控制中的污染物实施的末端处理技术，专门针对化学需氧量、氨氮、有机结合氮、与石油有关的废物、酚和氰化物等污染物。

## Reference product
- Crude Gasoline: 1000; input; calculated
  源文件中描述为为粗汽油、炼厂气、液化气，此处对其进行了匹配工作，将其匹配到LCAflow库里面相最符合的流，污染物指标备注为工业废水量

## Outputs
All rows: calculated
- cyanide: 4.38e-8
  the Technical of end-of-pipe management technology for pollution cyanideisPhysical treatment + biological treatment + physicochemical treatment (or physical treatment, chemical treatment)，Its Technical efficiency of end-of-pipe management88
  污染物指标氰化物的末端治理技术是物理处理法+生物处理法+物理化学处理法（或物理处理法、化学处理法），其效率为88，末端治理设施实际运行率（k值）计算公式为k=污水治理设施运行时间/正常生产时间。原文件中描述污染物类别为废水，污染物指标为氰化物，此处对其进行了匹配工作，将其匹配到LCAflow库里面相最符合的流，污染物指标备注为氰化物
- cyanide: 7.665e-8
  the Technical of end-of-pipe management technology for pollution cyanideisPhysical treatment + biological treatment，Its Technical efficiency of end-of-pipe management79
  污染物指标氰化物的末端治理技术是物理处理法+生物处理法，其效率为79，末端治理设施实际运行率（k值）计算公式为k=污水治理设施运行时间/正常生产时间。原文件中描述污染物类别为废水，污染物指标为氰化物，此处对其进行了匹配工作，将其匹配到LCAflow库里面相最符合的流，污染物指标备注为氰化物
- phenol: 2.66e-5
  the Technical of end-of-pipe management technology for pollution phenolisPhysical treatment + biological treatment + physicochemical treatment (or physical treatment, chemical treatment)，Its Technical efficiency of end-of-pipe management98
  污染物指标挥发酚的末端治理技术是物理处理法+生物处理法+物理化学处理法（或物理处理法、化学处理法），其效率为98，末端治理设施实际运行率（k值）计算公式为k=污水治理设施运行时间/正常生产时间。原文件中描述污染物类别为废水，污染物指标为挥发酚，此处对其进行了匹配工作，将其匹配到LCAflow库里面相最符合的流，污染物指标备注为挥发酚
- phenol: 3.99e-5
  the Technical of end-of-pipe management technology for pollution phenolisPhysical treatment + biological treatment，Its Technical efficiency of end-of-pipe management97
  污染物指标挥发酚的末端治理技术是物理处理法+生物处理法，其效率为97，末端治理设施实际运行率（k值）计算公式为k=污水治理设施运行时间/正常生产时间。原文件中描述污染物类别为废水，污染物指标为挥发酚，此处对其进行了匹配工作，将其匹配到LCAflow库里面相最符合的流，污染物指标备注为挥发酚
- Waste water: 66.8
  the Technical of end-of-pipe management technology for pollution Waste wateris/，Its Technical efficiency of end-of-pipe management0
  污染物指标工业废水量的末端治理技术是/，其效率为0，末端治理设施实际运行率（k值）计算公式为k=污水治理设施运行时间/正常生产时间。原文件中描述污染物类别为废水，污染物指标为工业废水量，此处对其进行了匹配工作，将其匹配到LCAflow库里面相最符合的流，污染物指标备注为工业废水量
- Petroleum-related waste: 0.000798
  the Technical of end-of-pipe management technology for pollution Petroleum-related wasteisPhysical treatment + biological treatment + physicochemical treatment (or physical treatment, chemical treatment)，Its Technical efficiency of end-of-pipe management98
  污染物指标石油类的末端治理技术是物理处理法+生物处理法+物理化学处理法（或物理处理法、化学处理法），其效率为98，末端治理设施实际运行率（k值）计算公式为k=污水治理设施运行时间/正常生产时间。原文件中描述污染物类别为废水，污染物指标为石油类，此处对其进行了匹配工作，将其匹配到LCAflow库里面相最符合的流，污染物指标备注为石油类
- Ammonia Nitrogen: 0.000875
  the Technical of end-of-pipe management technology for pollution Ammonia NitrogenisPhysical treatment + biological treatment + physicochemical treatment (or physical treatment, chemical treatment)，Its Technical efficiency of end-of-pipe management75
  污染物指标氨氮的末端治理技术是物理处理法+生物处理法+物理化学处理法（或物理处理法、化学处理法），其效率为75，末端治理设施实际运行率（k值）计算公式为k=污水治理设施运行时间/正常生产时间。原文件中描述污染物类别为废水，污染物指标为氨氮，此处对其进行了匹配工作，将其匹配到LCAflow库里面相最符合的流，污染物指标备注为氨氮
- Ammonia Nitrogen: 0.000875
  the Technical of end-of-pipe management technology for pollution Ammonia NitrogenisPhysical treatment + biological treatment，Its Technical efficiency of end-of-pipe management75
  污染物指标氨氮的末端治理技术是物理处理法+生物处理法，其效率为75，末端治理设施实际运行率（k值）计算公式为k=污水治理设施运行时间/正常生产时间。原文件中描述污染物类别为废水，污染物指标为氨氮，此处对其进行了匹配工作，将其匹配到LCAflow库里面相最符合的流，污染物指标备注为氨氮
- Nitrogen, organic bound: 0.0024418
  the Technical of end-of-pipe management technology for pollution Nitrogen, organic boundisPhysical treatment + biological treatment + physicochemical treatment (or physical treatment, chemical treatment)，Its Technical efficiency of end-of-pipe management71
  污染物指标总氮的末端治理技术是物理处理法+生物处理法+物理化学处理法（或物理处理法、化学处理法），其效率为71，末端治理设施实际运行率（k值）计算公式为k=污水治理设施运行时间/正常生产时间。原文件中描述污染物类别为废水，污染物指标为总氮，此处对其进行了匹配工作，将其匹配到LCAflow库里面相最符合的流，污染物指标备注为总氮
- Petroleum-related waste: 0.002793
  the Technical of end-of-pipe management technology for pollution Petroleum-related wasteisPhysical treatment + biological treatment，Its Technical efficiency of end-of-pipe management93
  污染物指标石油类的末端治理技术是物理处理法+生物处理法，其效率为93，末端治理设施实际运行率（k值）计算公式为k=污水治理设施运行时间/正常生产时间。原文件中描述污染物类别为废水，污染物指标为石油类，此处对其进行了匹配工作，将其匹配到LCAflow库里面相最符合的流，污染物指标备注为石油类
- Nitrogen, organic bound: 0.0031154
  the Technical of end-of-pipe management technology for pollution Nitrogen, organic boundisPhysical treatment + biological treatment，Its Technical efficiency of end-of-pipe management63
  污染物指标总氮的末端治理技术是物理处理法+生物处理法，其效率为63，末端治理设施实际运行率（k值）计算公式为k=污水治理设施运行时间/正常生产时间。原文件中描述污染物类别为废水，污染物指标为总氮，此处对其进行了匹配工作，将其匹配到LCAflow库里面相最符合的流，污染物指标备注为总氮
- chemical oxygen demand: 0.007344
  the Technical of end-of-pipe management technology for pollution chemical oxygen demandisPhysical treatment + biological treatment + physicochemical treatment (or physical treatment, chemical treatment)，Its Technical efficiency of end-of-pipe management88
  污染物指标化学需氧量的末端治理技术是物理处理法+生物处理法+物理化学处理法（或物理处理法、化学处理法），其效率为88，末端治理设施实际运行率（k值）计算公式为k=污水治理设施运行时间/正常生产时间。原文件中描述污染物类别为废水，污染物指标为化学需氧量，此处对其进行了匹配工作，将其匹配到LCAflow库里面相最符合的流，污染物指标备注为化学需氧量
- chemical oxygen demand: 0.010404
  the Technical of end-of-pipe management technology for pollution chemical oxygen demandisPhysical treatment + biological treatment，Its Technical efficiency of end-of-pipe management83
  污染物指标化学需氧量的末端治理技术是物理处理法+生物处理法，其效率为83，末端治理设施实际运行率（k值）计算公式为k=污水治理设施运行时间/正常生产时间。原文件中描述污染物类别为废水，污染物指标为化学需氧量，此处对其进行了匹配工作，将其匹配到LCAflow库里面相最符合的流，污染物指标备注为化学需氧量

## Use advice
This dataset is derived from the Pollution Source Census Report and contains information on pollution emissions and related products. However, it does not include data on energy or chemical consumption, nor does it provide information on waste or co-product generation. When utilizing this dataset, please supplement the missing data based on actual conditions before use
该数据集来源于污染源普查报告，包含污染物排放及相关产品信息，但不包含能源或化学品消耗数据，也不提供废弃物或共生产物产生信息。在使用该数据集时，请根据实际情况补充缺失数据后再使用。

## Review details
Inventory: The internal review was done by several iteration steps concerning raw data validation, raw data documentation, representativity, completeness and consistency of modelling with regard to ISO 14040 and 14044.
清单： 内部审查通过几个迭代步骤完成，涉及原始数据验证、原始数据记录、代表性、完整性、与 ISO 14040 和 14044 有关的建模的一致性。

## Data sources
- 第二次全国污染源普查产排污核算系数手册（试用版）,二级代码25,四级代码2511文件，在完整版文件中第4111页
