# Milk production ; Manure treatment ; Non-integrated maize silage planting and dairy cow breeding system (non-IPBS)

Dataset: ILCD process, Unit process, single operation
Geography: QD-SD-CN
Reference year: 2016
Classification: Unit processes / End-of-life treatment / Material recycling
Functional unit: The 1t FPCM corrected for protein and fat content was selected as the evaluation unit
Generated by: Rui Yang, 1632707028@qq.com
Owner: Tiangong LCI Data Working Group
Review: Dependent internal review by Tiangong LCI Data Working Group
Amounts: no units in this file; such an amount is in the reference unit of its flow, which a separate flow dataset defines
copyright: false
licenseType: Free of charge for all users and uses

## General comment
In the process of manure treatment, the two modes of manure treatment are the same. Manure is made into organic fertilizer by compost, and urine sewage is put into the oxidation pond for harmless treatment to make liquid fertilizer. The main inputs in this process are electricity and diesel oil (Table 8). The discharge of this link includes the storage and discharge of manure and the energy consumption of organic fertilizer production. The greenhouse gas emission of urine polluted water in oxidation ponds is small [25] and can be ignored.

## Geography
A questionnaire survey was conducted on dairy farms in Qingdao, Shandong Province from July to August 2020.

## Time period
From 2016, Shandong began to implement the silage corn planting subsidy policy, is one of the earliest provinces to implement the subsidy policy, the subsidy standard is 20~50 yuan /t. In 2019, Shandong Province silage corn planting area reached 14,100 hm2, accounting for 7.3% of the country.

## Technology and included processes
In the study area, there are mainly two milk production modes :IPBS and non-IPBS. In non-IPBS, the farms only have feeding links and manure treatment links, all the feed is purchased, and the manure pile fertilizer is made into organic fertilizer and sold to fruit and vegetable farmers. In IPBS, the silage corn planting process is increased in the farm, organic fertilizer and liquid fertilizer are mainly applied to the farm field, and the remaining part is sold to fruit farmers and vegetable farmers, etc. The differences between the two models are as follows :1) the sources of silage corn in the farm are different, resulting in different feed transportation distances and feed costs; 2) The use of organic fertilizer and liquid fertilizer is different, and the transportation distance is different. A total of 109 dairy farms were investigated in this study, and 83 valid questionnaires were obtained after excluding non-conforming questionnaires, among which 38 were non-IPBS and 45 were IPBS.

## Technical purpose
The data set represents the process of milk production and manure treatment in a non-integrated planting and dairy cow breeding system (non-IPBS) in Shandong Province, China. Non-IPBS farms source all feed externally and sell the composted manure to fruit and vegetable growers. This process differs from integrated planting and breeding systems (IPBS) in the origin of silage maize, feeding costs, and the transportation and application of organic and liquid fertilizers to the fields.

## Reference product
- milk: 1000; estimated
  作为参考定量，非实际输出

## Inputs
All rows: measured
- manure: 1931
  Feces (non-IPBS mode)
- waste water - untreated: 11215
  Urine sewage (non-IPBS mode)
- Electricity: 4.8672
- Diesel: 0.002577
- unspecified: 1.7
  Land occupation (non-IPBS mode)

## Outputs
- organic fertilizer: 751; measured
  Organic fertilizer (non-IPBS mode)
- Fertilizer: 10654; measured
  Liquid fertilizer (non-IPBS mode)

## Data treatment and extrapolations
The values in the table are the total input and output of each farm evenly distributed to FPCM per ton, and then the average value of each farm is taken. All input-output list data are calculated according to this method. The value in "()" is the average input per hectare, for the convenience of comparison with relevant studies; "a" Because the mechanical operation of farm tillage is mainly substitute tillage operation, the farmer is not clear about the diesel consumption in this link, and this data is based on relevant research [20]. "b" This value is the output of the process and is ultimately used entirely inside the system.

## Sampling procedure
研究地区主要有 2 种牛奶生产模式:IPBS 和 non-IPBS,具体见图 1.non-IPBS 中,养殖场只有饲养 环节和粪污处理环节,饲料全部来源于购买,粪便堆 肥制成有机肥后全销售给果农和菜农.IPBS 中,养殖 场增加青贮玉米种植环节,有机肥、液体肥主要施用 于场内农田,剩余部分销售给果农和菜农等.2 种模 式的区别:1)养殖场青贮玉米的来源不同,导致饲料 运输距离和饲料成本不同;2)有机肥、液体肥的利用 途径不同,运输距离不同.本研究共调研奶牛场 109 家,剔除不符合研究问卷后,得 83 份有效问卷,其中 non-IPBS 为 38 家,IPBS 为 45 家.

## Use advice
Data users should take note of the following methodological advice: Account for the specific process of composting manure into organic fertilizer and the treatment of urine sewage in oxidation ponds when modeling the manure treatment process. Electricity and diesel oil are the main inputs in this process, which might need allocation when assessing environmental impacts. Emissions from manure storage and energy consumption for producing organic fertilizer, as well as the negligible greenhouse gas emission from the oxidation ponds, should be included in the life cycle assessment. The data set is calculated on the basis of total input and output per ton of Fat-and-Protein-Corrected Milk (FPCM) for a standard comparison across farms.

## Review details
Inventory: The internal review was done by several iteration steps concerning raw data validation, raw data documentation, representativity, completeness and consistency of modelling with regard to ISO 14040 and 14044.

## Data sources
- 黄显雷, 师博扬, 张英楠, 龙昭宇, & 尹昌斌. 基于生命周期视角的种养一体化奶牛场环境经济效益评估. 中国环境科学 41, 3944–3955 (2021).
