# hot mix asphalt

Dataset: ILCD process, Unit process, single operation
Geography: CN
Classification: Unit processes / Materials production / Other mineralic materials
Generated by: Zhaoxing Wang, zhaoxing.wang@uantwerpen.be
Owner: Tiangong LCI Data Working Group
Review: Dependent internal review by Tiangong LCI Data Working Group
Amounts: no units in this file; such an amount is in the reference unit of its flow, which a separate flow dataset defines
licenseType: Free of charge for all users and uses

## General comment
This data set pertains to the unit process for the production of a hot mix asphalt, which is used for constructing and maintaining roads, parking areas, and airports. The hot asphalt mix is made through a single operation of combining aggregates, asphalt binder, and filler, to be laid down in layers and compacted.

## Reference product
- Asphalt mixture: 1000; calculated
  1 ton of hot mix asphalt

## Inputs
- natural gas; 44.1 MJ/kg: 5.374; calculated
  Natural gas for drying aggregates
- natural gas; 44.1 MJ/kg: 0.368; calculated
  Natural gas for heating asphalt
- Electricity: 5.2056; calculated
  Electricity for hot mixing asphalt

## Use advice
Users of this LCA data should note the specific context of the asphalt production process, including the type and source of the raw materials, energy consumption, and emissions associated with the production. Users should ensure the data's compatibility with the regional and technological context of the intended application. Considerations regarding the end-of-life phase, such as recycling or disposal of the asphalt material, should be taken into account for comprehensive assessment.

## Review details
Inventory: The internal review was done by several iteration steps concerning raw data validation, raw data documentation, representativity, completeness and consistency of modelling with regard to ISO 14040 and 14044.

## Data sources
- Modeling and Validation of Energy Consumption in Asphalt Mixture Production
