# Dry Sand Production;Vibrating Screen Screening

Dataset: ILCD process, Unit process, single operation
Geography: HAIN-CN
Reference year: 2020
Classification: Unit processes / Materials production / Other mineralic materials
Generated by: Cui hang, Cuihang0716@163.com
Owner: Tiangong LCI Data Working Group
Review: Dependent internal review by Tiangong LCI Data Working Group
Amounts: no units in this file; such an amount is in the reference unit of its flow, which a separate flow dataset defines
copyright: false
licenseType: Free of charge for all users and uses

## General comment
Screening of sand and gravel of different grain sizes

## Technical purpose
The dry sand production and vibrating screen screening process is designed for the grading and sorting of sand and gravel into different grain sizes. This industrial operation is typically used in the construction industry for the production of various types of aggregates that are essential for concrete, asphalt and other construction materials.

## Reference product
- gravel: 41870; measured

## Inputs
- gravel: 41870; measured
- Electricity: 360; measured

## Use advice
When using this data set for life cycle assessment purposes, ensure that the scope of the LCA matches the operational parameters of the dry sand production process. Consider geographical, technological, and time-related representativeness. The system boundary should include upstream processes like raw material extraction. Exclude processes such as transportation unless the study's goal includes these aspects. Pay attention to the potential for recycling sand and gravel in the intended application and adjust the inventory accordingly.

## Review details
Inventory: The internal review was done by several iteration steps concerning raw data validation, raw data documentation, representativity, completeness and consistency of modelling with regard to ISO 14040 and 14044.

## Data sources
- 陵水海岛混凝土有限公司干法制砂项目
