# Electricity production ; Thermal power ; Zhejiang

Dataset: ILCD process, Unit process, single operation
Geography: ZJ-CN
Reference year: 2019
Classification: Unit processes / Energy carriers and technologies / Electricity
Generated by: Ruoxi Xiong, xiongrx0126@163.com
Owner: Tiangong LCI Data Working Group
Review: Dependent internal review by Tiangong LCI Data Working Group
Amounts: no units in this file; such an amount is in the reference unit of its flow, which a separate flow dataset defines
copyright: false
licenseType: Free of charge for all users and uses

## General comment
Thermal power generation includes seventeen fossil fuels such as raw coal, washed coal, oil and natural gas. The process only considers the direct power generation process, not the upstream raw material extraction and processing and the downstream power consumption

## Time period
Calculated based on data from the 2019 Energy Statistics Yearbook

## Technical purpose
The described industrial process pertains to thermal power generation in Zhejiang, China, utilizing a variety of fossil fuels such as raw coal, washed coal, oil, and natural gas for the production of electricity. The data set focuses on the direct electricity generation stage and is suitable for application in life cycle assessments of electric power produced by thermal power stations in the Zhejiang region.

## Reference product
- electricity for thermal power: 3.6; calculated

## Inputs
All rows: calculated
- Raw coal: 0.382277
- Other Washed Coal: 0.00556688
- hard coal briquettes: 0.00149514
- Gangue, in ground: 0.00796593
- Coke oven gas: 0.002481
- blast furnace gas: 0.044621
- Converter gas: 0.005499
- Diesel: 1.426e-5
- natural gas: 0.000642

## Outputs
- carbon dioxide (fossil): 0.661256; calculated
- sulfur dioxide: 0.000112897; calculated
- Nitrogen oxides: 0.00017546; calculated
- particles (> PM10): 2.2349e-5; calculated

## Data treatment and extrapolations
For the accounting method, please refer to the "Enterprise Greenhouse Gas Emissions Accounting Methods and Reporting Guidelines for Power Generation Facilities". Different forms of power generation and fuel consumption come from Chapter 3 (Energy Production) and Chapter 6 (Regional Energy Balance Sheet) in the "China Energy Statistical Yearbook 2020". The fuel parameters such as low calorific value and carbon content per unit calorific value used to calculate the carbon dioxide emission factor come from the "2019 China Regional Power Grid Carbon Dioxide Baseline Emission Factor Calculation Instructions OM" and the "Enterprise Greenhouse Gas Emission Accounting Method and Reporting Guide for Power Generation Facilities" 》

## Use advice
Users should adhere to the methodology outlined in the 'Enterprise Greenhouse Gas Emissions Accounting Methods and Reporting Guidelines for Power Generation Facilities' when utilizing this data set. It is important to consider that the data set does not include upstream raw material extraction and processing, nor downstream power consumption. Given that the statistics are based on 2019 figures, users must be cautious when applying the data to future scenarios or different time frames. Adjustments may be necessary to account for technological developments or changes in fuel mix. The given CO2 emission factors are calculated using fuel parameters specific to the year and region covered in the data set.

## Review details
Inventory: The internal review was done by several iteration steps concerning raw data validation, raw data documentation, representativity, completeness and consistency of modelling with regard to ISO 14040 and 14044.

## Data sources
- 熊若熙. 中国电力生产和消费二氧化碳与污染物排放因子核算. (清华大学, 2023).
