# Remediated soil ; In-situ S/S ; cement, bentonite ; Soil in-situ remediation ; 5 months

Dataset: ILCD process, Unit process, black box
Geography: UM
Reference year: 2009
Classification: Unit processes / Other Services / Repair and maintenance
Functional unit: The functional unit is defined as remediation of 5000 yd 3 of soil. The design of the treatment options is generic, and lacks parameters such as site characteristics, hydrology and efficiency of technology.
Generated by: Yang Xintong, yangxt@caep.org.cn
Owner: Tiangong LCI Data Working Group
Review: Dependent internal review by Tiangong LCI Data Working Group
Amounts: no units in this file; such an amount is in the reference unit of its flow, which a separate flow dataset defines
copyright: false
licenseType: Free of charge for all users and uses

## General comment
In-situ (S/S), involves use of cement and bentonite as binders to solidify and stabilize the contaminated soil. On-site mixing machinery — auger/caisson system was assumed to be used. The amount of binders required for the treatment was estimated from available reports on actual site applications. The transportation distances for suppliers, landfill and clean-fill source were assumed to be 75 km. An average time of operation, 5 months (US EPA, 2000).

## Geography
This study used a hypothetical site and did not specify the location of the site, therefore the author's area was used as the site location: Newark, the United States

## Technology and included processes
Auger; Tipper truck (40 t); Treatment time: 5 months; 8 workers/d. The ransportation distance from the site to suppliers was assumed to be 75km.

## Technical purpose
The industrial process described is an in-situ solidification and stabilization (S/S) remediation technique used for treating contaminated soil with cement and bentonite as binding agents. This method, suitable for application at hypothetical sites similar to the one assumed in Newark, USA, is used to remediate soils using on-site mixing machinery such as an auger/caisson system. The process is designed to be generic and could potentially be utilized in a range of soil remediation projects lacking detailed site-specific characteristics, hydrology, and technical efficiencies.

## Reference product
- Remediated soil: 3822.77; estimated
  功能单元定义为5000 yd 3土壤的修复（1yd3等于0.764554857984立方米,即修复方量约为3822.77 m3）。

## Inputs
All rows: estimated
- cement, unspecified: 1e6
- bentonite: 400000
- Diesel,Diesel: 38
- Road Transport,Road Transport: 4.8e7
- transport in t*km: 18000
  运输总距离为5550km，自卸车载重40吨
- contaminated soil: 3822.77

## Use advice
For users of this LCA data set, it is recommended to apply it to similar in-situ S/S soil remediation scenarios, factoring in adjustments for specific site conditions and transport distances. It is important to note that the assumed operational time is based on a 5-month period with 8 workers per day, and all transport distances for supplies are standardized at 75km, which might not reflect actual distances in future applications. Users should ensure the congruency of these assumptions with their specific case. Additionally, users should consider expanding the scope of the LCA to encompass any site-specific characteristics, hydrological conditions, and technological efficiencies not covered within this generic data set.

## Review details
Inventory: The internal review was done by several iteration steps concerning raw data validation, raw data documentation, representativity, completeness and consistency of modelling with regard to ISO 14040 and 14044.

## Data sources
- Dhaliwal, Harnoor, "Sustainable site remediation : a life cycle assessment approach" (2009). Theses. 296.
