# Tire production; Fiber fabric,Steel fabric;Rolling and extrusion;Blended compound

Dataset: ILCD process, Unit process, single operation
Geography: CN
Reference year: 2014
Classification: Unit processes / Materials production / Other materials
Generated by: Cui, di, 2806553850@qq.com
Owner: Tiangong LCI Data Working Group
Review: Dependent internal review by Tiangong LCI Data Working Group
Amounts: no units in this file; such an amount is in the reference unit of its flow, which a separate flow dataset defines
copyright: false
licenseType: Free of charge for all users and uses

## General comment
the production stage is quite complex andincludes the processes of compound blending, rolling, extrusion, packet ring production, cutting and forming, vulcanizing, and testing. We combined closely related processes toavoid allocation. The following four main production processes were identified: compound blending, rolling and extrusion,cutting and forming, and vulcanizing and testin

## Time period
“Data collected onsite in 2014 by one of the largest Chinese tire companies were used in the assessment. ”The article has stated that the data is related to 2014, but there is no specific time, so the time is set on January 1, 2014.

## Technical purpose
The data set describes the production process of tires, which includes blending of compounds, rolling, extrusion, production of packet rings, cutting and forming, vulcanizing, and testing. These processes are designed for the manufacturing of different types of tires, making use of fiber and steel fabrics. Such tires are intended for various vehicles, ranging from passenger cars to heavy-duty trucks, addressing the demand for both standard and specialized tire performance characteristics.

## Reference product
- Tire: 9.497; measured

## Inputs
All rows: measured
- Steel wire: 1.048
- Nylon 6-6: 0.083
- polyethylene terephthalate fibres (PET): 0.309
- Electricity: 4.57
- steam: 0.2

## Outputs
- Waste wire cord fabric,Waste steel wire: 0.002, 0.001 (2 entries); measured
- Waste rubber,Waste fiber fabric: 0.001, 0.001 (2 entries); measured
- Waste cord thread ,Waste tire: 0.01; measured

## Data selection and combination
The data on the raw materials used in the investigated tire product were sourced from on-site investigations of one of the largest Chinese tire companies. The data were collected in 2014 during the manufacture of the target tire product.Other materials, such as active clay, zinc oxide, stearic acid, processing agent, and lubricating oil, were also considered.Life cycle background data on these other materials were obtained from the global average LCI data of Ecoinvent 3.0

## Use advice
Users should note that the data were collected in 2014 and pertain to production technologies and practices specific to that time. Changes in production processes or materials used in the period since then may affect the relevancy of the data. When applying this data set, it is recommended to consider the technological applicability and to update the inventory to reflect any advancements or changes in the raw material sourcing or tire production processes. Pay attention to the inclusion or exclusion of recycling processes and the use of global average LCI data from Ecoinvent 3.0 for background materials. The data should be used in conjunction with applicable scope, functional unit definitions, and any assumptions concerning end-of-life treatment of tires.

## Review details
Inventory: The internal review was done by several iteration steps concerning raw data validation, raw data documentation, representativity, completeness and consistency of modelling with regard to ISO 14040 and 14044.

## Data sources
- Sun X, Liu J, Hong J, et al. Life cycle assessment of Chinese radial passenger vehicle tire[J]. The International Journal of Life Cycle Assessment, 2016, 21: 1749-1758.
