# cement production;cement, portland fly-ash cement, 44.6MPa;dry process precalciner kiln;fly ash

Dataset: ILCD process, Unit process, black box
Geography: CN
Reference year: 2001
Classification: Materials production / Other mineralic materials
Generated by: Siqi Yang, ysqsophia@gmail.com
Owner: Tiangong LCI Data Working Group
Review: Dependent internal review by Tiangong LCI Data Working Group
Amounts: no units in this file; such an amount is in the reference unit of its flow, which a separate flow dataset defines
copyright: false
licenseType: Free of charge for all users and uses

## General comment
Dry precalciner kilns produce cement. The new dry pre-decomposition technology is adopted, the main production facility is a 2,000-ton-per-day clinker dry precalciner production line, with a design capacity of 700,000 tons of cement per year.

## Technology and included processes
The cement production of Dry Process Plant B adopts new dry process pre-decomposition technology. The main production facility is an external kiln decomposition production line with a daily output of 2,000 tons of clinker. The design capacity is an annual cement output of 700,000 tons. The process flow is roughly the same as that of Dry Process Plant A. The factory's production process layout is reasonable, the host equipment is mainly domestically produced, and key components are imported from abroad. The automation control level of the entire production line has reached the international advanced level in the early 1990s. The factory cement qualification rate and first-class product rate, rich labeling rate, bag weight qualification rate, uniformity qualification rate, etc. have always maintained 100%. In the first half of 1998, the No. 425 and No. 525 cement produced by Dry Process Plant B passed the product certification of the National Product Certification Center. In the second half of the year, the measurement confirmation system passed the ISO10012 on-site audit.

## Technical purpose
This dataset describes the production of Portland fly-ash cement with a strength of 44.6MPa, using a dry process precalciner kiln technology. The cement produced is suitable for construction purposes and is intended to be used in large-scale civil engineering projects and buildings requiring high-strength cement. These include high-rise structures, bridges, roadways, and other infrastructure.

## Model description
The research scope is defined as raw material entering the plant, raw material pretreatment, raw meal grinding, raw meal calcination, clinker grinding, until cement homogenization and storage. Specific processes such as mining, transportation, and cement packaging are not included.

## Reference product
- cement, portland fly-ash cement, 44.6MPa: 1000
  The average grade of cement is 446.

## Inputs
- limestone, crushed, for mill: 1199.08
  limestone
- sandstone: 0.0082496
- iron, powder: 28.5861
  Iron powder
- gypsum stone (CaSO4-dihydrate): 52.917
  gupsum
- ash: 159.373
  Fly ash
- Water (fresh water): 402.239
  Fresh water
- hard coal: 139.857
  The original data is 93.882kt standard coal, here converted to hard coal, the conversion formula is 1kg hard coal = 0.929kg standard coal.
- electricity, medium voltage: 396.406
  Electricity

## Outputs
- particles (> PM10): 0.0188322
  Dust, with an unspecified particle size, is treated as PM > 10 micrometers in diameter.
- particles (> PM10): 0.00844125
  Smoke, with an unspecified particle size, is treated as PM > 10 micrometers in diameter.
- sulfur dioxide: 0.00930531
  Sulfur dioxide
- Nitrogen oxides: 0.0150381
- carbon monoxide: 0.0135564
  Carbon dioxide
- carbon dioxide: 886.733
- Water (groundwater from technosphere, waste water): 157.581
  The original text is industrial wastewater (i.e. wastewater from cement production).

## Data treatment and extrapolations
CO2 data processing: Based on the CO2 emission data of one functional unit, the CO2 emissions of producing 722,168 tons of cement were calculated.

## Use advice
When applying this LCA data, users should note that the dataset is specific to dry process precalciner cement production lines with an output of 2,000 tons of clinker per day, achieving a yearly production of 700,000 tons of cement. Ensure that the use of this data aligns with the scope of the construction project in question and adheres to its technological and capacity specifications. Consider that the production process described excludes mining, transportation, and packaging of cement. Therefore, if a full life cycle assessment is required for your project, additional data for these excluded stages will need to be sourced and included. Lastly, emissions data within the dataset pertains to a specific volume of production, so for different production volumes, emissions data should be scaled appropriately.

## Review details
Inventory: The internal review was done by several iteration steps concerning raw data validation, raw data documentation, representativity, completeness and consistency of modelling with regard to ISO 14040 and 14044.

## Data sources
- 狄向华. (2001). 材料环境协调性评价的标准流程方法研究 [硕士, 北京工业大学].
