# Bioethanol ; Collection and transportation ; Acid

Dataset: ILCD process
Geography: GLO
Classification: Energy carriers and technologies / Renewable fuels
Generated by: Jiayi Yuan, jiayi_y@mail.bnu.edu.cn
Owner: Tiangong LCI Data Working Group
Review: Dependent internal review by Tiangong LCI Data Working Group
Amounts: no units in this file; such an amount is in the reference unit of its flow, which a separate flow dataset defines
licenseType: Free of charge for all users and uses

## General comment
The provided life cycle assessment data set pertains to the collection and transportation phase of bioethanol production, which involves acid pretreatment. The data represents a key component in the evaluation of environmental impact for the overall life cycle of bioethanol, a renewable fuel. After the pretreatment, the subsequent technological steps are aligned, enabling comparisons and integrations across different studies. This bioethanol is applicable for use as a sustainable alternative to fossil fuels, particularly in the transportation sector where it is combusted in vehicles designed to run on this biofuel.

## Technology and included processes
Through data quality evaluation, 141 datasets with high completeness and consistency were selected from the reported 561 datasets in 474 published papers and classified into eight technological configurations determined by the pretreatment technology. The technological steps following pretreatment were all the same, although actual flows and parameter values vary, as observed in the literature

## Inputs
- Diesel: 0.0006; missing unimportant
  L/kg

## Data selection and combination
Global datasets were used where possible, since the study does not apply to any specific region. LCI data for one external process named “Combustion of bioethanol in car” were obtained from the GREET database

## Data treatment and extrapolations
We assessed the robustness of the modeling results through uncertainty propagation (Monte Carlo), discernibility analysis, global sensitivity analysis, and scenario variation.

## Use advice
When utilizing this data set, it is critical to recognize its global scope, which does not cater to any specific geographical region. Users should ensure that local conditions are considered if regional specificity is important for their assessment. The integrity of the transition to the use phase should be preserved by including data for 'Combustion of bioethanol in car' from the GREET database. Users are advised to account for uncertainty and variability by considering the robustness indicators provided, such as results from uncertainty propagation (Monte Carlo simulations), discernibility analysis, global sensitivity analysis, and scenario variations. The application of these methodologies ensures more reliable and comprehensive LCA outcomes.

## Review details
Inventory: The internal review was done by several iteration steps concerning raw data validation, raw data documentation, representativity, completeness and consistency of modelling with regard to ISO 14040 and 14044.
