# cement production|cement, ordinary portland cement|new dry, 2500 t/d

Dataset: ILCD process, LCI结果
Geography: CN
Classification: Materials production / Other mineralic materials
LCI method principle: Other
Generated by: Siqi Yang
Amounts: no units in this file; such an amount is in the reference unit of its flow, which a separate flow dataset defines
copyright: false

## General comment
Traditional Portland cement (TPC) production.
The content of slag in slag-based cement (SBC) was about 10%. The slag can replace the clay in cement production, and also effect the energy consumption during grinding process due to its poor grindability.

## Model description
The functional unit was 1 kilogram of cement with compressive strength as 42.5MPa. The system boundary includes covering mining, cement production, power generation, coal production and transportation.

## Reference product
- cement, ordinary portland cement: 1000
  Traditional Portland cement (TPC)

## Inputs
All rows: measured
- clay: 250
  Clay
- sandstone: 29.7
  Sandstone
- limestone, crushed, for mill: 1170
  Limestone
- gypsum: 50.5
  Gypsum
- hard coal, run-of-mine: 155
  Raw coal production
- electricity, medium voltage: 317.16
  Electricity production

## Outputs
- carbon dioxide: 822; measured
  CO2
- methane: 0.00207; measured
  CH4
- dinitrogen: 0.000483; measured
  N2O

## Data selection and combination
The data of cement production was obtained from typical cement plants with similar production scale and technological level in China (new dry process, production scale 2500 ton/day).

## Data sources
- Yao Li, Yu Liu, Fei Fei Shi, Zhi Hong Wang, & Xian Zheng Gong. (2015). Life Cycle Analysis on Carbon Emission Reduction and Energy Saving by Using Slag as Alternative Materials in Cement Production. Materials Science Forum 814, 411–417.
