# Wet steaming cotton dyeing and finishing processing ; printing and dyeing cotton ; final disposal ; sanitary landfill

Dataset: ILCD process, Unit process, black box
Geography: CN
Reference year: 2012
Classification: Unit processes / End-of-life treatment / Landfilling
Generated by: Yingfan Duan, 1300925579@qq.com
Owner: Tiangong LCI Data Working Group
Review: Dependent internal review by Tiangong LCI Data Working Group
Amounts: no units in this file; such an amount is in the reference unit of its flow, which a separate flow dataset defines
copyright: false
licenseType: Free of charge for all users and uses

## General comment
"Due to uncertainties in product consumption and the ultimate disposal location, this study omits the transportation process from the research subject to the final disposal site. The final disposal process of the product is based on a disposal model in a specific city in China (Yang Jianxin, Xu Cheng, Wang Rusong. Methods and Applications of Life Cycle Assessment [M]. Beijing: Meteorological Press, 2002, 6.). Due to a lack of sufficiently reliable data, this study neglects energy consumption in the final disposal process of the product and assumes an equal distribution of sanitary landfilling and incineration, each accounting for 50%."

## Geography
"China is the world's largest production base for printing and dyeing, but rapid development is accompanied by severe environmental issues. Currently, the printing and dyeing industry primarily addresses environmental problems through clean production audits, implementing research on low-toxicity and low-pollution raw materials, resource utilization of waste, equipment upgrades and renovations, recycling of water and steam, and improvements in production processes. However, existing clean production schemes often focus on specific environmental issues without considering the interconnections between industrial systems."

## Technical purpose
The wet steaming cotton dyeing and finishing process is applied to the textile industry, specifically for processing printed and dyed cotton fabrics. These fabrics are often used in the production of clothing, home textiles, and other cotton-based products. After consumer use, the cotton material is eventually directed to final disposal, which includes sanitary landfill as one of the methods.

## Reference product
- Cotton Fabric: 1000; input; estimated

## Outputs
All rows: estimated
- carbon monoxide (fossil): 0.204
- carbon dioxide (fossil): 120
- methane (fossil): 26.3
- Chlorinated Hydrocarbon: 0.00279
- Nitrogen oxides: 0.235
- sulfur dioxide: 0.275
- hydrogen chloride: 0.00523
- hydrogen sulfide: 0.0134
- ammonia: 4.61e-7
- chemical oxygen demand: 0.0641
- cadmium: 6.31e-7
- lead: 2.87e-6
- mercury: 0.27

## Use advice
The data set does not include transportation to the final disposal site due to the uncertainty of the location of product consumption and final disposal. The final disposal process is based on a disposal model of a city in China and does not account for energy consumption during the disposal process due to a lack of reliable data. The assumptions made are that the proportions of sanitary landfill and incineration as disposal methods are equal, each at 50%. Caution should be exercised when applying this data to life cycle assessments as transportation and energy consumption during disposal could significantly affect the overall environmental impact profile of the cotton product lifecycle. Methodological choices and assumptions like these should be properly justified in the study context.

## Review details
Inventory: The internal review was done by several iteration steps concerning raw data validation, raw data documentation, representativity, completeness and consistency of modelling with regard to ISO 14040 and 14044.

## Data sources
- 朱亚楠. 棉布连续轧染工艺生命周期环境影响评价. (南京大学, 2012).
