# copper production;Primary copper;Hydrometallurgy;sulfide copper concentrates

Dataset: ILCD process, Unit process, single operation
Geography: CN
Reference year: 2010
Classification: Unit processes / Materials production / Metals and semimetals
Functional unit: Functional unit: 1 kg copper
LCI method principle: Attributional
LCI method approaches: Allocation - market value
Generated by: Peng Wang, 2867919560@qq.com
Owner: Tiangong LCI Data Working Group
Review: Dependent internal review by Tiangong LCI Data Working Group
Amounts: no units in this file; such an amount is in the reference unit of its flow, which a separate flow dataset defines
copyright: false
licenseType: Free of charge for all users and uses

## General comment
Primary copper produced using hydrometallurgical processes from sulfide copper concentrates is typically used in various industrial sectors, including electronics for manufacturing electrical wires, and construction for making plumbing pipes and roofing materials. It's also commonly used in the production of industrial machinery and in transport equipment manufacturing.

## Geography
the present study included the data of imported copper and statistical data that represents China’s average situation instead of a typical enterprise for each constituent process of the three copper production routes, especially with respect to energy and resource use in foreground processes and electricity production in background processes.

## Time period
Chinese copper demand projections from 2010 to 2050.

## Reference product
- Refined copper: 1; software or database

## Inputs
All rows: software or database
- Electricity: 14.292
- Diesel: 1.86
- Limestone: 1.11
- sulphuric acid: 0.0111
  Sulfuric acid
- Copper extractant: 0.00619
  Copper extractant needs to be supplemented
- copper sulfide ore: 307
  Copper ore
- water: 0.022

## Outputs
All rows: software or database
- Sulfidic tailing: 554
  Sulfidic tailing needs to be supplemented
- waste water - untreated: 0.141
  Waste water
- carbon dioxide (fossil): 7.37
  原文未区分bio和fossil，根据专家判断此处为fossil
- sulfur dioxide: 0.068
- water: 0.166

## Deviations from the LCI method approaches
The life cycle environmental impacts were conducted using the CMLCA 6.0 software and the CML2001 impact categories

## Data selection and combination
Data sources were summarized in Tables 2 and 3 The data on electricity production and other processes related to copper production in the background system were derived from the ecoinvent v3.4 database,

## Data treatment and extrapolations
Ecoinvent v3.4 database-cradle to gate

## Use advice
When using this life cycle assessment data for hydrometallurgical copper production, it is essential to consider that the data represents the average situation in China rather than that of a specific enterprise. The data encompasses the entire supply chain from cradle to gate, including energy and resource use in the foreground processes and electricity production in the background processes. The data is based on the Ecoinvent v3.4 database and should be used in conjunction with the CMLCA 6.0 software and CML2001 impact categories. For methodological consistency, apply this data only to copper demand projections within the time frame from 2010 to 2050 and ensure that all comparisons are made using the functional unit of 1 kg copper.

## Review details
Inventory: The internal review was done by several iteration steps concerning raw data validation, raw data documentation, representativity, completeness and consistency of modelling with regard to ISO 14040 and 14044.

## Data sources
- Dong, D., Van Oers, L., Tukker, A. & Van Der Voet, E. Assessing the future environmental impacts of copper production in China: Implications of the energy transition. Journal of Cleaner Production 274, 122825 (2020).
