# Soil remediation ; In-situ remediation ; Multi-phase extraction ; Construction preparation ; Material transportation

Dataset: ILCD process, Unit process, single operation
Geography: KR
Reference year: 2011
Classification: Other Services / Repair and maintenance
Generated by: Zhang Jianbin, zhangjb@caep.org.cn
Owner: Tiangong LCI Data Working Group
Review: Dependent internal review by Tiangong LCI Data Working Group
Amounts: no units in this file; such an amount is in the reference unit of its flow, which a separate flow dataset defines
copyright: false
licenseType: Free of charge for all users and uses

## General comment
All materials 99.8 ton, 30km round

## Technical purpose
This industrial process data set describes the use of a soil remediation technique specifically for in-situ treatment via multi-phase extraction. It is applicable for environmental engineering projects aimed at cleaning 1000 cubic meters of Total Petroleum Hydrocarbon (TPH) contaminated soil. The process involves the preparation of the construction site and the transportation of necessary materials and reagents totaling 99.8 tons over a round trip distance of 30 kilometers.

## Reference product
- Equipment and Materials Arriving on Site: 99800; measured

## Inputs
- transport in t*km: 2994; measured

## Use advice
When utilizing this data for Life Cycle Assessment, users must consider the specific context of the remediation project, such as the localized soil conditions, type of contaminants, and regulatory requirements. It's important to adjust the data to include transportation emissions, energy consumption for the extraction process, and any potential chemical use during site preparation. Note that this data set reflects only the operational phase of the remediation process, and users may need to complement it with data on upstream and downstream processes, including material production and post-remediation land use.

## Review details
Inventory: The internal review was done by several iteration steps concerning raw data validation, raw data documentation, representativity, completeness and consistency of modelling with regard to ISO 14040 and 14044.

## Data sources
- Seung-Woo Jeong, Sangwon Suh. Assessment of Environmental Impacts and CO2 Emissions from Soil Remediation Technologies using Life Cycle Assessment - Case Studies on SVE and Biopile Systems -. 大韓環境工學會誌
