# Life cycle inventory for average rare earth oxide;Rare Earth Elements (REE) Seven Southern Provinces (in-situ leaching) Rare Earth Elements (REE) containing ore

Dataset: ILCD process, Unit process, single operation
Geography: CN
Reference year: 2012
Valid until: 2014
Classification: Unit processes / Materials production / Non-energetic raw materials
Functional unit: 1 kg REO at 100% purity
LCI method principle: Attributional
LCI method approaches: Allocation - mass
Generated by: Tao Wang, twang@iue.ac.cn
Owner: Tiangong LCI Data Working Group
Review: Dependent internal review by Tiangong LCI Data Working Group
Amounts: no units in this file; such an amount is in the reference unit of its flow, which a separate flow dataset defines
copyright: false
licenseType: Free of charge for all users and uses

## General comment
The rare earth oxides (REOs) described in this dataset are intended for applications where high purity is critical. These may include the production of high-strength magnets, specialized alloys, ceramics, electronics, and glass polishing compounds. Since the dataset specifies a location in the 'Seven Southern Provinces' and mentions 'in-situ leaching,' it suggests the REOs are sourced using this environmentally-sensitive extraction method, characteristic of the region's mining capabilities.

## Geography
Seven Southern Provinces

## Technology and included processes
The LCA model was constructed using eBalance Professional 4.7 (IT & Knowledge for Environment, Sichuan, China). We chose to construct an attributional model because it aligned more with the aims of our research, although we adopted a contributional approach to the scenarios sensitivity analysis. Life cycle environmental impacts were assessed using the CML2002 method (CML 2015). Eleven mid-point impact categories were selected based on suggested LCA practice (Hauschild et al. 2013) and previously identified environmental harms in the industry.

## Reference product
- Rare Earth Oxides: 1; calculated
  LANGUAGE

## Inputs
- Ammonium sulfate: 9.07; measured
- sulphuric acid: 1.16; calculated
- Ammonium bicarbonate: 4.78; measured
- Lime: 3.37; calculated
- Hydrochloric acid: 10; measured
- phosphoric acid: 0.004; measured
- ammonia: 11; software or database
- Kerosene: 0.01; measured
- Sodium carbonate: 1.05; measured
- Charcoal: 0.04; measured
- water: 893.8; calculated
- Electricity: 44.496; calculated

## Outputs
All rows: calculated
- Spray mold: 1.08
  Ammonium chloride
- ammonia: 0.219
- sulfur dioxide: 0.029
- carbon dioxide (fossil): 1.235
  原文未区分bio和fossil，根据专家判断此处为fossil
- Ammonium sulfate: 7.5

## Deviations from the LCI method approaches
The LCI is first described individually for the three REO production chains, followed by a section on metal refining. Aggregated modeling data are also included for the industry average REO production in tabular form (Tables 1, 2, and 3). A more in-depth description of the processes, LCI, and modeling data used for the entire study (including metal refining) is available in section 1 in supporting information S1 on the Web.

## Use advice
Users of this LCA dataset should follow the attributional approach to model the environmental impact of REO production accurately, keeping the mid-point impact categories in mind. When applying scenario sensitivity analysis, a contributional approach should be considered. The CML2002 method must be utilized for assessing life cycle environmental impacts. It's important to note that the dataset represents an average across multiple production chains within the 'Seven Southern Provinces,' thus individuals results for specific mines or methods may vary. Inclusion of recycling in the model should be considered cautiously, based on the latest practices and expert advice in REO recycling. For comprehensive results, users are advised to refer to detailed processes and LCI data available in supporting information S1 on the Web and to factor in the metal refining phase which is provided separately.

## Review details
Inventory: The internal review was done by several iteration steps concerning raw data validation, raw data documentation, representativity, completeness and consistency of modelling with regard to ISO 14040 and 14044.

## Data sources
- Lee, J. C. K. & Wen, Z. Rare Earths from Mines to Metals: Comparing Environmental Impacts from China’s Main Production Pathways: Environmental Impacts of Rare Earths in China. Journal of Industrial Ecology 21, 1277–1290 (2017).
