# cement production|cement, portland blastfurnace-slag cement, 32.5MPa|new dry process, 2000 t/d|mixed solid wastes

Dataset: ILCD process, LCI结果
Geography: CN
Classification: Materials production / Other mineralic materials
Generated by: Siqi Yang
Amounts: no units in this file; such an amount is in the reference unit of its flow, which a separate flow dataset defines
copyright: false

## General comment
The new dry process produces portland blastfurnace-slag cement by mixing solid waste materials, namely fly ash and slag.

## Model description
The functional unit is 1 ton of cement. The system boundary is the cement production process.

## Reference product
- cement, portland blastfurnace-slag cement, 32.5MPa: 1000
  P.S.32.5

## Inputs
All rows: measured
- limestone, crushed, for mill: 761.36
  Limestone
- sandstone: 49.47
  Sandstone
- iron, powder: 20.27
  Iron powder
- gypsum (desulphurized): 51.06
  Gupsum
- ash: 69.51
  Fly ash
- blast furnace slag: 411.54
  Blast furnace slag
- hard coal, run-of-mine: 92.3
  Coal. The original text also provides a heat consumption (coal consumption) of 1946889 KJ. The coal's air-received low heating value is calculated at 23301 KJ/kg. Each ton of clinker requires 139.7 kg of coal for burning, and 2.5 kg of coal for drying (assuming the coal is dry). Since the coal for drying accounts for only 1.76% of the total coal consumption, for the sake of calculation convenience, it is assumed that all the coal is used for clinker burning.
- electricity, medium voltage: 355.427
  Power consumption

## Outputs
All rows: missing unimportant
- carbon dioxide: 517.1
  CO2
- sulfur dioxide: 0.047
  SO2
- Nitrogen oxides: 0.558
  NOx
- Carbon monoxide, non-fossil: 0.00182
  CO
- chemical oxygen demand: 0.0183
  COD
- Suspended solids, unspecified: 0.0139
  SS
- Oils, unspecified: 5.9e-5
  Oil
- particles (> PM10): 0.571
  Dust, with an unspecified particle size, is treated as PM > 10 micrometers in diameter.

## Sampling procedure
A certain cement plant has two new dry production lines with a capacity of 2000 tons per day each.

## Data sources
- 龚志起 & 张智慧. (2004). 水泥生命周期中物化环境状况的研究. 土木工程学报, 5, 86–91.
