# Aluminum Electrolysis Carbon Anode Production ; Carbon Anode ; Petroleum Coke ; 2016

Dataset: ILCD process, Unit process, single operation
Geography: CN
Reference year: 2021
Classification: Materials production / Non-energetic raw materials
Generated by: Zimeng Cai, caizm6178@163.com
Owner: Tiangong LCI Data Working Group
Review: Dependent internal review by Tiangong LCI Data Working Group
Amounts: no units in this file; such an amount is in the reference unit of its flow, which a separate flow dataset defines
copyright: false
licenseType: Free of charge for all users and uses

## General comment
The carbon anode production process using petroleum coke described in this dataset is intended for use in aluminum electrolysis. As an essential component in the aluminum smelting process, carbon anodes are consumed to facilitate the electrical conductivity in the electrolytic cells where aluminum oxide is reduced to aluminum metal.

## Time period
Date of publication

## Reference product
- aluminium, primary, liquid: 1000; article inperiodical
  liquid Al

## Inputs
- electricity, medium voltage: 748.8; software or database
  electricty
- Integrated AC power consumption: 47726.9; article inperiodical
- heavy fuel oil: 65; software or database
  fuel oil
- coal tar: 214; software or database
  coal tar pitch
- petroleum coke: 1089; software or database
  petroleum coak
- sodium aluminate, powder: 1913.11; article inperiodical
  alumina
- Fluoride: 18.02; article inperiodical
  fluoride salt
- anode, for metal electrolysis: 401.32; article inperiodical
  anode
- coal gas: 1277; software or database
- Water: 1.22; article inperiodical
  water consumption

## Outputs
- anode, for metal electrolysis: 1000; software or database
  anode

## Data selection and combination
The data in this study refers to the LCA data of PA, SA, electricity, and other background data. The PA data were obtained from statistical data sources, and the SA data were mainly obtained from the literatures. The background data were mainly derived from the Chinese localization LCA database CAS RCEES 2018, which was established by the Research Center for Eco-Environmental Sciences, Chinese Academy of Sciences and covers LCA data for energy, materials, transportation, waste management etc.

## Use advice
Users should take note that the life cycle assessment data presented here includes the production of prebaked anodes (PA), the sourcing of anodes (SA), electricity, and other background processes. The PA data should be referenced from statistical data sources, and the SA data primarily from the literature. Background data has been sourced from the CAS RCEES 2018 database, which must be considered to accurately reflect the Chinese context in terms of energy, materials, transportation, waste management, etc. Methodological consideration should include the year of the data as operational parameters and environmental impacts could have changed significantly. Data users must ensure methodological consistency when incorporating this data set into a broader LCA study.

## Review details
Inventory: The internal review was done by several iteration steps concerning raw data validation, raw data documentation, representativity, completeness and consistency of modelling with regard to ISO 14040 and 14044.

## Data sources
- Ding, N., Liu, N., Lu, B. & Yang, J. Life cycle greenhouse gas emissions of aluminum based on regional industrial transfer in China. J. Ind. Ecol. 25, 1657–1672 (2021).
