# Shale gas production;Site preparation stage;Road repair&construction

Dataset: ILCD process, Unit process, black box
Geography: SC-CN
Reference year: 2014
Valid until: 2016
Classification: Systems / Construction
Generated by: Pu Hong, 15695258655@163.com
Owner: Tiangong LCI Data Working Group
Review: Dependent internal review by Tiangong LCI Data Working Group
Amounts: no units in this file; such an amount is in the reference unit of its flow, which a separate flow dataset defines
licenseType: Free of charge for all users and uses

## General comment
The described industrial process pertains to the site preparation stage for the extraction of shale gas, which includes road repair and construction activities. The data set is specifically used for life cycle assessment calculations in the context of China's shale gas extraction, which is concentrated in the Sichuan and Chongqing regions. This process data can be applied to environmental impact assessments, policy-making, and optimization of shale gas extraction projects within these locales.

## Geography
China's shale gas extraction work is currently concentrated in the Sichuan and Chongqing areas, and the data from Sichuan and Chongqing are selected for LCA calculations.

## Time period
Raw data dates between 2014-2016

## Reference product
- Road: 2200; min 22; max 7664; uniform; measured
  场地准备阶段--道路维修及新建道路的长度

## Inputs
- gravel: 163000; min 12000; max 359000; uniform; measured
  Gravel used for road construction
- Diesel: 1050; min 50; max 2877; uniform; measured
  Transportation of equipment and gravel

## Use advice
When utilizing this data set for LCA calculations, it is important to ensure the geographic scope of the study matches the data provided, as they are representative of the Sichuan and Chongqing areas. The raw data time frame between 2014-2016 should be considered; thus, any significant changes in technology, regulations, or site conditions post-2016 may necessitate an update of the data. The black-box unit process approach used here may require additional data for the full transparency of inputs and outputs if used for detailed environmental impact analyses. Consideration of technological applicability and potential need for region-specific calibration should be made.

## Review details
Inventory: The internal review was done by several iteration steps concerning raw data validation, raw data documentation, representativity, completeness and consistency of modelling with regard to ISO 14040 and 14044.

## Data sources
- Wang, J., Liu, M., McLellan, B. C., Tang, X. & Feng, L. Environmental impacts of shale gas development in China: A hybrid life cycle analysis. Resources, Conservation and Recycling 120, 38–45 (2017).
