# DRI production;DRI;NG-DR (MID)

Dataset: ILCD process, Unit process, single operation
Geography: CN
Classification: Energy carriers and technologies / Natural gas based fuels
Generated by: Fuxiang, 1162850692@qq.com
Owner: Tiangong LCI Data Working Group
Review: Dependent internal review by Tiangong LCI Data Working Group
Amounts: no units in this file; such an amount is in the reference unit of its flow, which a separate flow dataset defines
copyright: false
licenseType: Free of charge for all users and uses

## General comment
Direct Reduced Iron (DRI) produced using the Natural Gas Direct Reduction (NG-DR) method, specifically the MID process, is used primarily as a raw material for steelmaking. In contrast to traditional blast furnace methods, NG-DR offers a cleaner and more energy-efficient means of producing iron units for use in electric arc furnaces (EAFs) or for further processing into various steel products.

## Geography
The average operating data of Coal-DR, NG-DR (MID), and NG-DR (ENE) demonstration projects in China are used as the benchmark for the LCI of DR routes.

## Reference product
- Direct Reduced Iron: 1000; calculated
  The average operating data of Coal-DR, NG-DR (MID), and NG-DR (ENE) demonstration projects in China are used as the benchmark for the LCI of DR routes. LCI of COG-DR and H-DR routes, which is not scaled-up in China are estimated based on Coal-DR routes combined with literature data from simulations, laboratory tests, and process modeling in

## Inputs
All rows: calculated
- Pellet: 1357.3
  (same comment as for Direct Reduced Iron)
- Water (fresh water): 300
  (same comment as for Direct Reduced Iron)
- oxygen: 50
  (same comment as for Direct Reduced Iron)
- Natural gas, at consumer EU-27: 293.8
  (same comment as for Direct Reduced Iron)
- Electricity: 446.4
  (same comment as for Direct Reduced Iron)

## Outputs
- Dust (unspecified, from stack): 0.1; calculated
  (same comment as for Direct Reduced Iron)
- carbon dioxide: 298.1; calculated
  (same comment as for Direct Reduced Iron)

## Data treatment and extrapolations
LCI of COG-DR and H-DR routes, which is not scaled-up in China are estimated based on Coal-DR routes combined with literature data from simulations, laboratory tests, and process modeling in Table 9 [49,50]. The LCI of Coal-DR is obtai

## Use advice
When utilizing the Life Cycle Inventory (LCI) data of Direct Reduced Iron production routes, ensure appropriate modeling of the specific technology (Coal-DR, NG-DR (MID), NG-DR (ENE), COG-DR, H-DR) adapted in the process. Since LCI is based on the average operating data from demonstration projects and supplemented by literature data from simulations, laboratory tests, and process modeling, users should confirm the alignment of their context with the Chinese benchmarks provided. Considerations of scaled-up feasibility, technology maturity, and regional variability must be taken into account for accuracy. For routes not fully scaled-up in China, such as COG-DR and H-DR routes, additional care should be taken to adapt the LCI data to the specific context of deployment.

## Review details
Inventory: The internal review was done by several iteration steps concerning raw data validation, raw data documentation, representativity, completeness and consistency of modelling with regard to ISO 14040 and 14044.

## Data sources
- The carbon reduction potential of hydrogen in the low carbon transition of the iron and steel industry: The case of China
