# Wastepaper pulp to make paper;white kraft paper

Dataset: ILCD process, Unit process, black box
Geography: SD-CN
Classification: Unit processes / Materials production / Paper and cardboards
Functional unit: In this study, one tonne of waste paper feedstock was collected as a functional unit.
LCI method principle: Attributional
Generated by: Yixiang Gao, 22210740040@m.fudan.edu.cn
Owner: Tiangong LCI Data Working Group
Review: Dependent internal review by Tiangong LCI Data Working Group
Amounts: no units in this file; such an amount is in the reference unit of its flow, which a separate flow dataset defines
copyright: false
licenseType: Free of charge for all users and uses

## General comment
In a production scenario, processes such as pulping, papermaking, transport of raw materials, transport of auxiliary chemicals, wastewater treatment, and solid waste disposal are all included within the system boundary.

## Technology and included processes
在制浆工段，废纸经过链板输送机送到水力碎浆机，碎解后的浆料进入粗筛选系统(高浓除渣器和粗筛系统):粗筛后的浆料再通过分级筛系统，筛分为短纤维和长纤维，其中短纤维通过低浓除砂器除渣和浓缩机浓缩处理后进入抄前池;而长纤维通过低浓除砂器和精饰系统处理后再通过浓缩机、热分散系统和磨浆机后进入抄前池，抄前池的浆料再送往抄纸车间。此外，浆料浓缩过程中产生的白水部分回用于制浆工段。在造纸工段中，四种再生纸生产方案的流程基本相同分成打浆、抄纸、烘干三个工段。浆料经过调浆箱、浓白水塔及冲浆泵进入网前压力筛,后进入面层流浆箱上网。在再生白牛卡纸方案中，原生木浆与废纸浆按一定配浆比例混合后分别送至配浆池中，经多段除砂器低浓净化后，再进入机外白水槽的另一侧冲浆;各层浆经压力筛筛选，后进入流浆箱上网。上网的浆料经三长网成型部脱水成型，再经过由直通式靴压组成的压榨部进步脱水，通过于燥部烘缸干燥、硬压光、表面施胶、后干燥部干燥、涂布、再经水平复卷机复卷，后包装入库送至成品库储存。在废弃物处置环节，对再生纸生产制造中产生的一般固体废弃物、城市生活垃圾处理进行了安全填埋处置;而对浮选脱墨系统产生的工业危险废弃物脱墨渣收集后统一进行焚烧处置。再生白牛卡纸方案中，对碎浆系统和除渣系统产生的废渣使用重力脱水机和污泥压榨机进行收集，后送至焚烧厂进行焚烧处理。

## Technical purpose
This white kraft paper production process is designed for the manufacturing of recycled kraft paper. The white kraft paper produced can be used in packaging, including heavyweight packaging applications, shopping bags, and other applications requiring high strength and durability. The paper qualities are suitable for further surface treatments such as printing, coating, and lamination.

## Reference product
- Cardboard: 1090; measured
  Recycled white ox cardboard

## Inputs
All rows: measured
- Oxidized starch: 37.62
- Modified Starch: 4.51
  Cationic starch
- calcium carbonate: 18.81
- Inorganic Chemical Reagents: 0.06
  Inorganic chemical reagents
- Wood Pulp: 374.8
  Purchased wood pulp
- Polyester Mesh Fabric: 0.03
  polyester mesh
- Blanket: 0.07496
  blanket
- water: 10.54
- process steam: 1480
  steam
- Electricity: 907.2
  electricity
- chemical oxygen demand: 0.6
  CODcr

## Outputs
All rows: measured
- Ammonia Nitrogen: 0.00795
  NH3-N
- waste water - untreated: 7.91
  waste water disposal
- Plastic Waste: 3.83
  Plastic and metal waste
- Waste Residue: 2.9
  Waste residue
- sludge (paper production): 35.65
  sludge
- Waste solid: 2.68
  General solid waste

## Data selection and combination
The inventory data for the recycled white kraft paper programme were obtained from a field study at a paper company in Shandong Province. Secondly, the vast majority of the background data involved in this study was obtained from the China Localised Process-based Life Cycle Inventory Database (CPLCID).

## Use advice
For performing Life Cycle Assessment (LCA) of recycled white kraft paper, users should consider the system boundary including pulping, papermaking, raw material transportation, auxiliary chemical transportation, wastewater treatment, and solid waste management. The inventory data is based on field research from a comprehensive papermaking enterprise in Shandong Province. Users should note that the study uses a truncation approach, excluding the economic and environmental impacts of the recovery or reuse of recyclable solid waste such as coal slag, polyester resin, and cotton fibers. Users should quantify all inputs and outputs of the system in terms of the functional unit, which is the collection of one ton of waste paper raw material, in accordance with ISO 14040 standards.

## Review details
Inventory: The internal review was done by several iteration steps concerning raw data validation, raw data documentation, representativity, completeness and consistency of modelling with regard to ISO 14040 and 14044.

## Data sources
- 杨冬璐. 典型再生纸产品的生命周期环境与经济影响评价. (山东大学, 2019).
