# Cement production;Ordinary Portland Cement 32.5MPa;new suspension preheater production

Dataset: ILCD process, Unit process, black box
Geography: CN
Reference year: 2017
Classification: Materials production / Other mineralic materials
Functional unit: 1t cement with strength grade of 32.5Mpa
Generated by: Rui Song, 2120230927@mail.nankai.edu
Owner: Tiangong LCI Data Working Group
Review: Dependent internal review by Tiangong LCI Data Working Group
Amounts: no units in this file; such an amount is in the reference unit of its flow, which a separate flow dataset defines
licenseType: Free of charge for all users and uses

## General comment
the number of 5000t/d and 2500t/d cement product lines using new suspension preheater (NSP) technology accounts or 56.1% and 28.3%, respectively, of all cement product lines in China. The product lines of the 5000t/d and 2500t/d scales chosen in this study may have relative accuracy, reflecting the main features of cement manufacturing in China.

## Technology and included processes
There are three primary production processes: The pulverized coal and raw material preparation process, including the transfer, grinding, homogenization, and storage of raw materials, and the grinding and storage of coal. In the incineration process, the ground and mixed raw materials are inputted into the preheater and then the calciner and decomposed with 60% coal at 950 ◦C. The limestone decomposes to about 95% in the calciner and 5% in the kiln. The decomposed materials fall into the kiln and are incinerated to clinker with 40% coal at a temperature of over 1400 ◦C. In the finishing process, the cement is produced when the clinker, mineral additions, and gypsum are granulated finely by a grinding mill. The raw materials are suspended and heated by recycled hot air in the preheater

## Technical purpose
The data set describes the usage of Ordinary Portland Cement 32.5 MPa as an essential building material manufactured through a high-temperature process involving new suspension preheater (NSP) technology. This type of cement is commonly applied in construction projects such as residential and commercial buildings, infrastructures like roads and bridges, and other civil engineering works due to its moderate strength grade. The described manufacturing process reflects the typical large-scale production lines in China, indicating its relevance for a broad range of structural applications in the region.

## Reference product
- cement: 1000; calculated

## Inputs
- Limestone: 811.32; measured
- Gypsum: 44.35; measured
- Red mud (dry): 36.06; measured
- silica sand: 26.63; measured
- Slag: 58.01; measured
- shale: 7.78; measured
- Fly ash: 272.51; measured
- Coal Gangue: 2.7; measured
- Sediment and Sludge: 4.24; measured
- ammonia: 0.57; measured
- water: 290; measured
- Electricity: 200.916; calculated
- Standard coal: 72.74; calculated
- transport in t*km: 268.03

## Outputs
All rows: calculated
- carbon dioxide: 440.61
- sulfur dioxide: 0.075
- nitrous oxide: 0.15
- Dust: 0.094
- fluoride: 0.00186
- ammonia: 0.00586
- mercury: 7.801e-5
- Water (groundwater from technosphere, waste water): 0.023

## Data selection and combination
The annual average data for the operation processes of different kinds of cement manufacturing were acquired from a survey of the China United Cement Corporation, which accounts for 9.45% of the Chinese cement market.The LCI data for electricity and coal were collected from the literature.According to the survey, the transport distance of raw materials in the cement production is about 200 km. In this study, the environmental impacts of road transportation were taken from the literature.

## Use advice
The LCA data set incorporates annual average operational data and should be utilized to evaluate the environmental impact of Ordinary Portland Cement production using NSP technology in China. Users should ensure that the data is relevant for their specific project's geographic and technological context. Attention should be given to the inclusion of transportation impacts due to raw material hauling over 200 km, as prescribed in the data set. The use of this data for other types of cement or production processes may require adjustments for accurate impact assessment.

## Review details
Inventory: The internal review was done by several iteration steps concerning raw data validation, raw data documentation, representativity, completeness and consistency of modelling with regard to ISO 14040 and 14044.

## Data sources
- Yang, D., Fan, L., Shi, F., Liu, Q. & Wang, Y. Comparative study of cement manufacturing with different strength grades using the coupled LCA and partial LCC methods—A case study in China. Resour. Conserv. Recycl. 119, 60–68 (2017).
