# Brick production ; concrete pavement brick ; Base blending process

Dataset: ILCD process, Unit process, single operation
Geography: JNA-SD-CN
Reference year: 2018
Classification: Unit processes / Materials production / Other mineralic materials
Functional unit: The functional unit is the area of 1 m2 brick products.
Generated by: Wang xiangjin, r99rt4@163.com
Owner: Tiangong LCI Data Working Group
Review: Dependent internal review by Tiangong LCI Data Working Group
Amounts: no units in this file; such an amount is in the reference unit of its flow, which a separate flow dataset defines
copyright: false
licenseType: Free of charge for all users and uses

## General comment
Non sintering process of concrete pavement bricks

## Technical purpose
Concrete pavement bricks produced by the industrial process are typically used for the construction of durable surfaces such as roads, sidewalks, and other pedestrian areas. Additionally, permeable bricks are utilized in areas requiring water permeability to enhance drainage and reduce runoff.

## Reference product
- brickbat aggregate: 102; measured
  Basic mix

## Inputs
- basalt: 81.48; measured
- freshwater: 6.17; measured
- portland cement: 14.81; measured
- Electricity: 0.4392; measured

## Outputs
- particles (PM10): 9e-5; measured

## Deviations from the LCI method approaches
ReCiPe midpoint (H) model is applied in this study.

## Data selection and combination
In this study, the production energy consumption of concrete pavement brick and permeable brick as well as the relevant data of all kinds of raw materials and energy input and exhaust emissions are collected from Jinan Shunde Cement Products Co. Ltd. Shandong Province.

## Sampling procedure
Most data of raw materials, energy input and waste discharge were collected from the site investigation of manufacturer. Water reducer is also called water reducing agent, whose chemical constituents is the sodium salt of the sulfonate formaldehyde condensation

## Use advice
The life cycle assessment data collected from Jinan Shunde Cement Products Co. Ltd should be carefully evaluated for the energy consumption, raw material inputs, and exhaust emissions specifically in the production of concrete pavement and permeable bricks. Users of this data should apply the ReCiPe midpoint (H) model as per the study and consider the functional unit of 1 m2 brick products when assessing environmental impacts. Sensitivity analysis should be conducted when variations of 5% or more in the inputs and outputs occur during the key processes.

## Review details
Inventory: The internal review was done by several iteration steps concerning raw data validation, raw data documentation, representativity, completeness and consistency of modelling with regard to ISO 14040 and 14044.

## Data sources
- Yuan, X. et al. Environmental and economic impacts assessment of concrete pavement brick and permeable brick production process - A case study in China. Journal of Cleaner Production 171, 198–208 (2018).
