# clinker production|clinker|the kiln tail waste heat pre-drying|mixed solid wastes

Dataset: ILCD process, LCI结果
Geography: SD-CN
Classification: Materials production / Other mineralic materials
LCI method principle: Other
Generated by: Siqi Yang
Amounts: no units in this file; such an amount is in the reference unit of its flow, which a separate flow dataset defines
copyright: false

## General comment
Calcium carbide sludge isthe co-product of acetylene generation from carbide in chemical industry, whosemain chemical composition is calcium hydrate. Before it is transported tocement industry, the moisture content of calcium carbide sludge produced fromthe acetylene generator is about 35%. However, it still can’ t meet therequirement of cement production; therefore, it needs further pre-drying tomake sure the moisture content of calcium carbide sludge reduce to 15%.
Pre-drying process by waste heat from kiln tail. There is a process which is using cement kiln tail waste gas to pre-dry calcium carbide sludge to save coal consumed in this stage. One cement industry from Shandong consumes 1.2t calcium carbide sludge whose moisture content is 35% when produces 1t cement clinker. If calcium carbide sludge is pre-dried to 15%, it needs the temperature of gas from kiln tail about 700°C. Therefore, it can change the pre-heater from 5-stage to 2-stage so that make sure it has enough gas to pre-dry. However, with the decline of pre-heater stage, the clinker heat consumption will increase 1100KJ/kg, and the electricity reduced by 30%.

## Model description
The functional unit is set as 1 ton of cement clinker with compressive strength as high as 42.5MPa.
The life cycle of cement clinker production can be subdivided into six stages: mining, transportation, energy production, the production of calcium carbide sludge, the handle of calcium carbide sludge and the production of cement clinker.

## Reference product
- clinker: 1000
  Clinker

## Inputs
All rows: measured
- calcium carbonate: 1200
  Limestone
- Carbide slag: 291
  Carbide Slag
- clay: 148
  Clay
- sandstone: 99
  Sandstone
- Sulfate slag: 29.2
  Sulfuric acid residue
- hard coal, run-of-mine: 437
  Raw coal
- crude oil; 42.3 MJ/kg: 2.96
  Crude oil
- natural gas; 44.1 MJ/kg: 0.557
  Natural gas

## Outputs
All rows: measured
- carbon dioxide: 552
  CO2
- nitrogen dioxide: 2.18
  NOX
- sulfur dioxide: 1.53
  SO2
- methane: 2.04
  CH4
- non-methane volatile organic compounds: 0.147
  NMVOC
- particles (> PM10): 5.08
  PM. The particle size is not specified. Here we treat it as PM>10.

## Data selection and combination
The data of production process of using calcium carbide sludge to substitute limestone was obtained from one cement factory in Shan Dong province that uses the coal-fired pre-drying process and the coal consumption of pre-drying stage is 50.4kg. Under the premise of raw materials and other production processes without changing, when using the kiln tail waste heat pre-drying process, the coal transferred from waste heat is 55.16kg, which was obtained from one cement industry of Jiao Zuo.
Power generation process. The life cycle inventory of power generation including resource/energy consumption and pollutant emission is sited from the Sinocenter database.
Mineral mining process. The life cycle inventory related to Limestone is derived from the Sinocenter material life cycle data of Beijing University of Technology, while the inventories of clay, sandstone are from Ecoinvent database.
Road transportation process. The average distance from limestone mine or calcium carbide sludge to cement plant is 2 km. Moreover, the transport distances of raw coal and other raw materials are assumed to 179km and 177km respectively referred to the average transport distance of raw coal and merchandise in China. The life cycle inventory of transportation is also from the Sinocenter database.
Carbide slag production process. Generally speaking, 1.2t calcium carbide sludge (dry basis) and 300L acetylene can be produced by per ton calcium carbide hydrolysis. Therefore, it is necessary to allocate the environment impact during this process into these two products i.e. calcium carbide sludge and acetylene. According to allocation rule of economy value, the calcium carbide sludge should undertake 0.74% of the total environment load. The inventory of calcium carbide sludge production comes from references.

## Data sources
- Jia Ping Cui et al. (2014). Life Cycle Assessment of Silicate Cementitious Material Production Using Calcium Carbide Sludge. Key Engineering Materials 599, 324–327.
