# Livestock and poultry breeding ; feed crop planting stage ; pig scale

Dataset: ILCD process, Unit process, single operation
Geography: CN
Reference year: 2014
Classification: Unit processes / Materials production / Agricultural production means
Functional unit: 1kg pork
Generated by: Rui Yang, 1632707028@qq.com
Owner: Tiangong LCI Data Working Group
Review: Dependent internal review by Tiangong LCI Data Working Group
Amounts: no units in this file; such an amount is in the reference unit of its flow, which a separate flow dataset defines
copyright: false
licenseType: Free of charge for all users and uses

## General comment
The feed described in this paper is mainly energy feed, including: corn, wheat, soybean, sorghum, rice. In fact, in the process of livestock breeding, livestock feed is mainly composed of corn, wheat and soybeans. Feed crop planting stage mainly includes fertilizer production stage, corn, soybean, wheat planting stage.

## Geography
This study was conducted from 2014 to 2015, aiming at livestock and poultry feeding cycle, meat ratio, feed formula, feed consumption, coal and electricity consumption, etc. Has been to Shandong Gaomi Zhengda pig farm, Laixi City Zhishuang dairy farm, Jimo city Duan Bolan town Jiangjiapo village pig farm, Jimo City Liujiazhuang town livestock farm, Rizhao City Changling town Guanzhuang village, Juxian County Zhailihe town Dongxing Agriculture and animal husbandry company, Juxian Qiaoshan town east Chen dairy farm, Juxian Qiaoshan town Liu Jiayi water pig farm, Zhucheng Foreign Trade Co., LTD. Phoenix parents breeding duck farm, Xinjiang Fukang Hongfa Breeding professional cooperative, Jiuyun Street Town Xuhong laying Chicken cooperative, Jiuyun Street Town Liuyun Village self-contained breeding farm, China Australia Holding Group Co., LTD., Dezhou City Qingyun County Wayu Village, Shandong Province Qingyun County four Liu community beef cattle breeding base, Dezhou City Qingyun Qingnian chicken breeding base, Qingyun County Yongli Poultry layer breeding company, Qingyun County Xingchen youth chicken breeding Field research was carried out by professional breeding cooperatives, Qingyun Dongtai broiler breeding cooperatives, Hebei Yanshan Boyuan Feed Co., LTD., Yanshan Da Chinese Feed Co., LTD., Wudi Liuhe Feed Co., LTD., and China-Australia Oriental Hope Feed Co., LTD.

## Technology and included processes
In this paper, the life cycle of livestock and poultry farming is divided into six stages: feed crop planting, feed processing, livestock and poultry raising, manure treatment, slaughter and transportation. The specific life cycle process of livestock and poultry breeding is shown in Figure 2-1. Due to the lack of some data and the limitations of basic conditions, the production, transportation and use of pesticides, mulch and feed additives have not been analyzed, and the environmental impact caused by other related infrastructure construction, transport production and labor costs is no longer considered.

## Technical purpose
The data set describes the feed crop planting stage for livestock and poultry breeding, focusing on energy feeds such as corn, wheat, soybean, sorghum, and rice. This information is relevant for enterprises involved in industrial-scale pig farming and may extend to the breeding of other livestock and poultry animals where similar feedstocks are utilized. It is applicable to organizations engaged in agricultural production, livestock feed manufacturing, as well as environmental impact assessment of agriculture and animal husbandry operations.

## Reference product
- pig: 1; measured
  作为参考定量，非实际输出

## Inputs
- Fertilizer: 0.186524; calculated
- hard coal: 0.0116633; calculated

## Outputs
All rows: measured
- nitrous oxide: 0.0044116
  Pig scale
- nitrogen, total (excluding N2): 0.0132976
  Pig scale
- Nitrogen trioxide: 0.00377
  Pig scale
- ammonia: 0.010723
  Pig scale
- hydrocarbons (unspecified): 9.99e-5
  Pig scale
- carbon monoxide (fossil): 0.000741
  Pig scale
- sulfur dioxide: 0.0008983
  Pig scale
- carbon dioxide (fossil),carbon dioxide (fossil): 1.79087
  Pig scale

## Data selection and combination
直接数据：畜禽饲养阶段数据皆来自实地调研，通过现场收集及企业可公开 数据获得。背景数据：化肥、电力、燃煤等数据来自相关统计年鉴及国家统计局、农业 部网站的公开数据。

## Use advice
Users employing this data set should ensure accurate representation of the feed crop cultivation phase in lifecycle assessments of pork production. Data originates from on-site field studies and should be used mindfully considering the specific contexts of the sampled farms. Attention should be paid to region-specific agricultural practices, such as fertilizer application and irrigation, as well as to the temporal relevance of the dataset (2014-2015) - newer practices and efficiencies may need to be considered. Methodological considerations should include accounting for direct emissions from fertilizer use and fuel consumption, and indirect emissions from electricity use. Data for background resources like electricity and fertilizers should be used in conjunction with the latest available databases to reflect current production methods and energy mixes.

## Review details
Inventory: The internal review was done by several iteration steps concerning raw data validation, raw data documentation, representativity, completeness and consistency of modelling with regard to ISO 14040 and 14044.

## Data sources
- 周景月. 基于生命周期评价的畜禽养殖环境影响分析. (青岛科技大学, 2017).
