# Painting ; Coated parts ; Primer, middle coat, top coat, overcoat, color striping paint, thinner ; Spray painting (high solids paint) ; All sizes; NESPS2 / 涂装 ; 涂装件 ; 底漆、中涂漆、面漆、罩光漆、彩条漆、稀释剂 ; 喷漆（高固体份涂料） ; 所有规模 ; 全国第二次污染普查数据

Dataset: ILCD process, Unit process, single operation
Geography: CN
Reference year: 2019
Classification: Reference Parameters / Systems / Paints and chemical preparations
Generated by: The data was created by the Office of the Second National Pollution Source Census of the Ministry of Ecology and Environment, and the data was organized by the TianGong Plan team for ILCD format / 生态环境部第二次全国污染源普查工作办公室创建数据，天工计划团队常慧敏整理数据为ILCD格式
Owner: Tiangong LCI Data Working Group / 天工LCI数据工作小组
Review: Dependent internal review by Tiangong LCI Data Working Group / 天工LCI数据工作小组
Amounts: no units in this file; such an amount is in the reference unit of its flow, which a separate flow dataset defines
copyright: false
licenseType: Free of charge for all users and uses

## General comment
the treatment technology for the pollution of Exhaust gasdidn't offered

## Technical purpose
所描述的工业过程涉及涂装作业，包括底漆、中间层、面漆、过光漆和彩色条纹漆的涂覆以及使用高固体分涂料的稀释处理，适用于所有规模的涂装部件。这一流程通常用于需要涂覆零件的制造业领域，例如汽车、航空航天、家电制造和重型机械工业。

## Reference product
- Base Coat: 1000; input; calculated
  源文件中描述为为底漆、中涂漆、面漆、罩光漆、彩条漆、稀释剂，此处对其进行了匹配工作，将其匹配到LCAflow库里面相最符合的流

## Outputs
All rows: calculated
- chemical oxygen demand: 1.578
  the Technical of end-of-pipe management technology for pollution chemical oxygen demandisMembrane separation + anaerobic hydrolysis + bio-contact oxidation process，Its Technical efficiency of end-of-pipe management98
  污染物指标化学需氧量的末端治理技术是膜分离+厌氧水解类+生物接触氧化法，其效率为98，末端治理设施实际运行率（k值）计算公式为k=污水治理设施运行时间（小时）/正常生产时间（小时）。原文件中描述污染物类别为废水，污染物指标为化学需氧量，此处对其进行了匹配工作，将其匹配到LCAflow库里面相最符合的流
- chemical oxygen demand: 1.578
  the Technical of end-of-pipe management technology for pollution chemical oxygen demandisMembrane separation + anaerobic hydrolysis + MBR，Its Technical efficiency of end-of-pipe management98，The formula for calculating the actual operation rate (k-value) of the end-of-pipe treatment facility is /
  污染物指标化学需氧量的末端治理技术是膜分离+厌氧水解类+MBR类，其效率为98，末端治理设施实际运行率（k值）计算公式为k=污水治理设施运行时间（小时）/正常生产时间（小时）。原文件中描述污染物类别为废水，污染物指标为化学需氧量，此处对其进行了匹配工作，将其匹配到LCAflow库里面相最符合的流
- chemical oxygen demand: 1.578
  the Technical of end-of-pipe management technology for pollution chemical oxygen demandisMembrane separation + anaerobic hydrolysis + SBR，Its Technical efficiency of end-of-pipe management98，The formula for calculating the actual operation rate (k-value) of the end-of-pipe treatment facility is /
  污染物指标化学需氧量的末端治理技术是膜分离+厌氧水解类+SBR类，其效率为98，末端治理设施实际运行率（k值）计算公式为k=污水治理设施运行时间（小时）/正常生产时间（小时）。原文件中描述污染物类别为废水，污染物指标为化学需氧量，此处对其进行了匹配工作，将其匹配到LCAflow库里面相最符合的流
- chemical oxygen demand: 2.367
  the Technical of end-of-pipe management technology for pollution chemical oxygen demandisMembrane separation + bio-contact oxidation process，Its Technical efficiency of end-of-pipe management97，The formula for calculating the actual operation rate (k-value) of the end-of-pipe treatment facility is k = power consumption of wastewater treatment facilities (kWh/year) / operating time of wastewater treatment facilities (hours/year) / total power of wastewater treatment facilities (kW)
  污染物指标化学需氧量的末端治理技术是膜分离+生物接触氧化法，其效率为97，末端治理设施实际运行率（k值）计算公式为k=污水治理设施运行时间（小时）/正常生产时间（小时）。原文件中描述污染物类别为废水，污染物指标为化学需氧量，此处对其进行了匹配工作，将其匹配到LCAflow库里面相最符合的流
- chemical oxygen demand: 2.367
  the Technical of end-of-pipe management technology for pollution chemical oxygen demandisMembrane separation + MBR，Its Technical efficiency of end-of-pipe management97，The formula for calculating the actual operation rate (k-value) of the end-of-pipe treatment facility is k = power consumption of wastewater treatment facilities (kWh/year) / operating time of wastewater treatment facilities (hours/year) / total power of wastewater treatment facilities (kW)
  污染物指标化学需氧量的末端治理技术是膜分离+MBR类，其效率为97，末端治理设施实际运行率（k值）计算公式为k=污水治理设施运行时间（小时）/正常生产时间（小时）。原文件中描述污染物类别为废水，污染物指标为化学需氧量，此处对其进行了匹配工作，将其匹配到LCAflow库里面相最符合的流
- chemical oxygen demand: 2.367
  the Technical of end-of-pipe management technology for pollution chemical oxygen demandisMembrane separation + SBR，Its Technical efficiency of end-of-pipe management97，The formula for calculating the actual operation rate (k-value) of the end-of-pipe treatment facility is k = power consumption of wastewater treatment facilities (kWh/year) / operating time of wastewater treatment facilities (hours/year) / total power of wastewater treatment facilities (kW)
  污染物指标化学需氧量的末端治理技术是膜分离+SBR类，其效率为97，末端治理设施实际运行率（k值）计算公式为k=污水治理设施运行时间（小时）/正常生产时间（小时）。原文件中描述污染物类别为废水，污染物指标为化学需氧量，此处对其进行了匹配工作，将其匹配到LCAflow库里面相最符合的流
- chemical oxygen demand: 7.89
  the Technical of end-of-pipe management technology for pollution chemical oxygen demandisMembrane separation，Its Technical efficiency of end-of-pipe management90，The formula for calculating the actual operation rate (k-value) of the end-of-pipe treatment facility is k = 1
  污染物指标化学需氧量的末端治理技术是膜分离，其效率为90，末端治理设施实际运行率（k值）计算公式为k=污水治理设施运行时间（小时）/正常生产时间（小时）。原文件中描述污染物类别为废水，污染物指标为化学需氧量，此处对其进行了匹配工作，将其匹配到LCAflow库里面相最符合的流
- Waste water: 7890
  the treatment technology for the pollution of Waste waterdidn't offered，The formula for calculating the actual operation rate (k-value) of the end-of-pipe treatment facility is /
  污染物指标工业废水量的末端治理技术未说明。原文件中描述污染物类别为废水，污染物指标为工业废水量，此处对其进行了匹配工作，将其匹配到LCAflow库里面相最符合的流
- chemical oxygen demand: 9.468
  the Technical of end-of-pipe management technology for pollution chemical oxygen demandisChemical coagulation + anaerobic hydrolysis + bio-contact oxidation process，Its Technical efficiency of end-of-pipe management88，The formula for calculating the actual operation rate (k-value) of the end-of-pipe treatment facility is /
  污染物指标化学需氧量的末端治理技术是化学混凝法+厌氧水解类+生物接触氧化法，其效率为88，末端治理设施实际运行率（k值）计算公式为k=污水治理设施运行时间（小时）/正常生产时间（小时）。原文件中描述污染物类别为废水，污染物指标为化学需氧量，此处对其进行了匹配工作，将其匹配到LCAflow库里面相最符合的流
- chemical oxygen demand: 9.468
  the Technical of end-of-pipe management technology for pollution chemical oxygen demandisChemical coagulation + anaerobic hydrolysis + MBR，Its Technical efficiency of end-of-pipe management88，The formula for calculating the actual operation rate (k-value) of the end-of-pipe treatment facility is /
  污染物指标化学需氧量的末端治理技术是化学混凝法+厌氧水解类+MBR类，其效率为88，末端治理设施实际运行率（k值）计算公式为k=污水治理设施运行时间（小时）/正常生产时间（小时）。原文件中描述污染物类别为废水，污染物指标为化学需氧量，此处对其进行了匹配工作，将其匹配到LCAflow库里面相最符合的流
- chemical oxygen demand: 9.468
  the Technical of end-of-pipe management technology for pollution chemical oxygen demandisChemical coagulation + anaerobic hydrolysis + SBR，Its Technical efficiency of end-of-pipe management88
  污染物指标化学需氧量的末端治理技术是化学混凝法+厌氧水解类+SBR类，其效率为88，末端治理设施实际运行率（k值）计算公式为k=污水治理设施运行时间（小时）/正常生产时间（小时）。原文件中描述污染物类别为废水，污染物指标为化学需氧量，此处对其进行了匹配工作，将其匹配到LCAflow库里面相最符合的流
- chemical oxygen demand: 14.202
  the Technical of end-of-pipe management technology for pollution chemical oxygen demandisChemical coagulation + bio-contact oxidation process，Its Technical efficiency of end-of-pipe management82，The formula for calculating the actual operation rate (k-value) of the end-of-pipe treatment facility is k = power consumption of wastewater treatment facilities (kWh/year) / operating time of wastewater treatment facilities (hours/year) / total power of wastewater treatment facilities (kW)
  污染物指标化学需氧量的末端治理技术是化学混凝法+生物接触氧化法，其效率为82，末端治理设施实际运行率（k值）计算公式为k=污水治理设施运行时间（小时）/正常生产时间（小时）。原文件中描述污染物类别为废水，污染物指标为化学需氧量，此处对其进行了匹配工作，将其匹配到LCAflow库里面相最符合的流
- chemical oxygen demand: 14.202
  the Technical of end-of-pipe management technology for pollution chemical oxygen demandisChemical coagulation + MBR，Its Technical efficiency of end-of-pipe management82，The formula for calculating the actual operation rate (k-value) of the end-of-pipe treatment facility is k = power consumption of wastewater treatment facilities (kWh/year) / operating time of wastewater treatment facilities (hours/year) / total power of wastewater treatment facilities (kW)
  污染物指标化学需氧量的末端治理技术是化学混凝法+MBR类，其效率为82，末端治理设施实际运行率（k值）计算公式为k=污水治理设施运行时间（小时）/正常生产时间（小时）。原文件中描述污染物类别为废水，污染物指标为化学需氧量，此处对其进行了匹配工作，将其匹配到LCAflow库里面相最符合的流
- chemical oxygen demand: 14.202
  the Technical of end-of-pipe management technology for pollution chemical oxygen demandisChemical coagulation + SBR，Its Technical efficiency of end-of-pipe management82，The formula for calculating the actual operation rate (k-value) of the end-of-pipe treatment facility is k = power consumption of wastewater treatment facilities (kWh/year) / operating time of wastewater treatment facilities (hours/year) / total power of wastewater treatment facilities (kW)
  污染物指标化学需氧量的末端治理技术是化学混凝法+SBR类，其效率为82，末端治理设施实际运行率（k值）计算公式为k=污水治理设施运行时间（小时）/正常生产时间（小时）。原文件中描述污染物类别为废水，污染物指标为化学需氧量，此处对其进行了匹配工作，将其匹配到LCAflow库里面相最符合的流
- volatile organic compound: 14.45
  the Technical of end-of-pipe management technology for pollution volatile organic compoundisCatalytic combustion method，Its Technical efficiency of end-of-pipe management95，The formula for calculating the actual operation rate (k-value) of the end-of-pipe treatment facility is k = 1
  污染物指标挥发性有机物的末端治理技术是催化燃烧法，其效率为95，末端治理设施实际运行率（k值）计算公式为k=工艺废气净化装置耗电量（千瓦时）/(工艺废气净化装置额定功率（千瓦）×工艺废气净化装置运行时间（小时）)。原文件中描述污染物类别为废气，污染物指标为挥发性有机物，此处对其进行了匹配工作，将其匹配到LCAflow库里面相最符合的流
- volatile organic compound: 14.45
  the Technical of end-of-pipe management technology for pollution volatile organic compoundisDirect combustion，Its Technical efficiency of end-of-pipe management95，The formula for calculating the actual operation rate (k-value) of the end-of-pipe treatment facility is /
  污染物指标挥发性有机物的末端治理技术是直接燃烧法，其效率为95，末端治理设施实际运行率（k值）计算公式为k=工艺废气净化装置耗电量（千瓦时）/(工艺废气净化装置额定功率（千瓦）×工艺废气净化装置运行时间（小时）)。原文件中描述污染物类别为废气，污染物指标为挥发性有机物，此处对其进行了匹配工作，将其匹配到LCAflow库里面相最符合的流
- volatile organic compound: 14.45
  the Technical of end-of-pipe management technology for pollution volatile organic compoundisRegenerative catalytic combustion method，Its Technical efficiency of end-of-pipe management95，The formula for calculating the actual operation rate (k-value) of the end-of-pipe treatment facility is k = 1
  污染物指标挥发性有机物的末端治理技术是蓄热式催化燃烧法，其效率为95，末端治理设施实际运行率（k值）计算公式为k=工艺废气净化装置耗电量（千瓦时）/(工艺废气净化装置额定功率（千瓦）×工艺废气净化装置运行时间（小时）)。原文件中描述污染物类别为废气，污染物指标为挥发性有机物，此处对其进行了匹配工作，将其匹配到LCAflow库里面相最符合的流
- volatile organic compound: 14.45
  the Technical of end-of-pipe management technology for pollution volatile organic compoundisRegenerative thermal combustion method，Its Technical efficiency of end-of-pipe management95，The formula for calculating the actual operation rate (k-value) of the end-of-pipe treatment facility is /
  污染物指标挥发性有机物的末端治理技术是蓄热式热力燃烧法，其效率为95，末端治理设施实际运行率（k值）计算公式为k=工艺废气净化装置耗电量（千瓦时）/(工艺废气净化装置额定功率（千瓦）×工艺废气净化装置运行时间（小时）)。原文件中描述污染物类别为废气，污染物指标为挥发性有机物，此处对其进行了匹配工作，将其匹配到LCAflow库里面相最符合的流
- volatile organic compound: 14.45
  the Technical of end-of-pipe management technology for pollution volatile organic compoundisThermal combustion，Its Technical efficiency of end-of-pipe management95
  污染物指标挥发性有机物的末端治理技术是热力燃烧法，其效率为95，末端治理设施实际运行率（k值）计算公式为k=工艺废气净化装置耗电量（千瓦时）/(工艺废气净化装置额定功率（千瓦）×工艺废气净化装置运行时间（小时）)。原文件中描述污染物类别为废气，污染物指标为挥发性有机物，此处对其进行了匹配工作，将其匹配到LCAflow库里面相最符合的流
- chemical oxygen demand: 15.78
  the Technical of end-of-pipe management technology for pollution chemical oxygen demandisAnaerobic hydrolysis + bio-contact oxidation process，Its Technical efficiency of end-of-pipe management80
  污染物指标化学需氧量的末端治理技术是厌氧水解类+生物接触氧化法，其效率为80，末端治理设施实际运行率（k值）计算公式为k=污水治理设施运行时间（小时）/正常生产时间（小时）。原文件中描述污染物类别为废水，污染物指标为化学需氧量，此处对其进行了匹配工作，将其匹配到LCAflow库里面相最符合的流
- chemical oxygen demand: 15.78
  the Technical of end-of-pipe management technology for pollution chemical oxygen demandisAnaerobic hydrolysis + MBR，Its Technical efficiency of end-of-pipe management80，The formula for calculating the actual operation rate (k-value) of the end-of-pipe treatment facility is k = power consumption of wastewater treatment facilities (kWh/year) / operating time of wastewater treatment facilities (hours/year) / total power of wastewater treatment facilities (kW)
  污染物指标化学需氧量的末端治理技术是厌氧水解类+MBR类，其效率为80，末端治理设施实际运行率（k值）计算公式为k=污水治理设施运行时间（小时）/正常生产时间（小时）。原文件中描述污染物类别为废水，污染物指标为化学需氧量，此处对其进行了匹配工作，将其匹配到LCAflow库里面相最符合的流
- chemical oxygen demand: 15.78
  the Technical of end-of-pipe management technology for pollution chemical oxygen demandisAnaerobic hydrolysis + SBR，Its Technical efficiency of end-of-pipe management80，The formula for calculating the actual operation rate (k-value) of the end-of-pipe treatment facility is k = power consumption of wastewater treatment facilities (kWh/year) / operating time of wastewater treatment facilities (hours/year) / total power of wastewater treatment facilities (kW)
  污染物指标化学需氧量的末端治理技术是厌氧水解类+SBR类，其效率为80，末端治理设施实际运行率（k值）计算公式为k=污水治理设施运行时间（小时）/正常生产时间（小时）。原文件中描述污染物类别为废水，污染物指标为化学需氧量，此处对其进行了匹配工作，将其匹配到LCAflow库里面相最符合的流
- chemical oxygen demand: 23.67
  the Technical of end-of-pipe management technology for pollution chemical oxygen demandisAerobic biological treatment，Its Technical efficiency of end-of-pipe management70，The formula for calculating the actual operation rate (k-value) of the end-of-pipe treatment facility is k = power consumption of wastewater treatment facilities (kWh/year) / operating time of wastewater treatment facilities (hours/year) / total power of wastewater treatment facilities (kW)
  污染物指标化学需氧量的末端治理技术是好氧生物处理法，其效率为70，末端治理设施实际运行率（k值）计算公式为k=污水治理设施运行时间（小时）/正常生产时间（小时）。原文件中描述污染物类别为废水，污染物指标为化学需氧量，此处对其进行了匹配工作，将其匹配到LCAflow库里面相最符合的流
- chemical oxygen demand: 23.67
  the Technical of end-of-pipe management technology for pollution chemical oxygen demandisBio-contact oxidation process，Its Technical efficiency of end-of-pipe management70，The formula for calculating the actual operation rate (k-value) of the end-of-pipe treatment facility is k = power consumption of wastewater treatment facilities (kWh/year) / operating time of wastewater treatment facilities (hours/year) / total power of wastewater treatment facilities (kW)
  污染物指标化学需氧量的末端治理技术是生物接触氧化法，其效率为70，末端治理设施实际运行率（k值）计算公式为k=污水治理设施运行时间（小时）/正常生产时间（小时）。原文件中描述污染物类别为废水，污染物指标为化学需氧量，此处对其进行了匹配工作，将其匹配到LCAflow库里面相最符合的流
- chemical oxygen demand: 23.67
  the Technical of end-of-pipe management technology for pollution chemical oxygen demandisMBR，Its Technical efficiency of end-of-pipe management70，The formula for calculating the actual operation rate (k-value) of the end-of-pipe treatment facility is k = power consumption of wastewater treatment facilities (kWh/year) / operating time of wastewater treatment facilities (hours/year) / total power of wastewater treatment facilities (kW)
  污染物指标化学需氧量的末端治理技术是MBR类，其效率为70，末端治理设施实际运行率（k值）计算公式为k=污水治理设施运行时间（小时）/正常生产时间（小时）。原文件中描述污染物类别为废水，污染物指标为化学需氧量，此处对其进行了匹配工作，将其匹配到LCAflow库里面相最符合的流
- chemical oxygen demand: 23.67
  the Technical of end-of-pipe management technology for pollution chemical oxygen demandisSBR，Its Technical efficiency of end-of-pipe management70，The formula for calculating the actual operation rate (k-value) of the end-of-pipe treatment facility is k = power consumption of wastewater treatment facilities (kWh/year) / operating time of wastewater treatment facilities (hours/year) / total power of wastewater treatment facilities (kW)
  污染物指标化学需氧量的末端治理技术是SBR类，其效率为70，末端治理设施实际运行率（k值）计算公式为k=污水治理设施运行时间（小时）/正常生产时间（小时）。原文件中描述污染物类别为废水，污染物指标为化学需氧量，此处对其进行了匹配工作，将其匹配到LCAflow库里面相最符合的流
- chemical oxygen demand: 39.45
  the Technical of end-of-pipe management technology for pollution chemical oxygen demandisChemical coagulation + floating separation，Its Technical efficiency of end-of-pipe management50，The formula for calculating the actual operation rate (k-value) of the end-of-pipe treatment facility is k = power consumption of wastewater treatment facilities (kWh/year) / operating time of wastewater treatment facilities (hours/year) / total power of wastewater treatment facilities (kW)
  污染物指标化学需氧量的末端治理技术是化学混凝法+上浮分离，其效率为50，末端治理设施实际运行率（k值）计算公式为k=污水治理设施运行时间（小时）/正常生产时间（小时）。原文件中描述污染物类别为废水，污染物指标为化学需氧量，此处对其进行了匹配工作，将其匹配到LCAflow库里面相最符合的流
- volatile organic compound: 43.35
  the Technical of end-of-pipe management technology for pollution volatile organic compoundisAdsorption/catalytic combustion method，Its Technical efficiency of end-of-pipe management85，The formula for calculating the actual operation rate (k-value) of the end-of-pipe treatment facility is k = 1
  污染物指标挥发性有机物的末端治理技术是吸附/催化燃烧法，其效率为85，末端治理设施实际运行率（k值）计算公式为k=工艺废气净化装置耗电量（千瓦时）/(工艺废气净化装置额定功率（千瓦）×工艺废气净化装置运行时间（小时）)。原文件中描述污染物类别为废气，污染物指标为挥发性有机物，此处对其进行了匹配工作，将其匹配到LCAflow库里面相最符合的流
- volatile organic compound: 43.35
  the Technical of end-of-pipe management technology for pollution volatile organic compoundisAdsorption/thermal combustion method，Its Technical efficiency of end-of-pipe management85，The formula for calculating the actual operation rate (k-value) of the end-of-pipe treatment facility is /
  污染物指标挥发性有机物的末端治理技术是吸附/热力燃烧法，其效率为85，末端治理设施实际运行率（k值）计算公式为k=工艺废气净化装置耗电量（千瓦时）/(工艺废气净化装置额定功率（千瓦）×工艺废气净化装置运行时间（小时）)。原文件中描述污染物类别为废气，污染物指标为挥发性有机物，此处对其进行了匹配工作，将其匹配到LCAflow库里面相最符合的流
- chemical oxygen demand: 47.34
  the Technical of end-of-pipe management technology for pollution chemical oxygen demandisChemical coagulation，Its Technical efficiency of end-of-pipe management40，The formula for calculating the actual operation rate (k-value) of the end-of-pipe treatment facility is k = 1
  污染物指标化学需氧量的末端治理技术是化学混凝法，其效率为40，末端治理设施实际运行率（k值）计算公式为k=污水治理设施运行时间（小时）/正常生产时间（小时）。原文件中描述污染物类别为废水，污染物指标为化学需氧量，此处对其进行了匹配工作，将其匹配到LCAflow库里面相最符合的流
- chemical oxygen demand: 47.34
  the Technical of end-of-pipe management technology for pollution chemical oxygen demandisPhysicochemical treatment，Its Technical efficiency of end-of-pipe management40，The formula for calculating the actual operation rate (k-value) of the end-of-pipe treatment facility is k = 1
  污染物指标化学需氧量的末端治理技术是物理化学处理法，其效率为40，末端治理设施实际运行率（k值）计算公式为k=污水治理设施运行时间（小时）/正常生产时间（小时）。原文件中描述污染物类别为废水，污染物指标为化学需氧量，此处对其进行了匹配工作，将其匹配到LCAflow库里面相最符合的流
- chemical oxygen demand: 51.285
  the Technical of end-of-pipe management technology for pollution chemical oxygen demandisAnaerobic biological treatment，Its Technical efficiency of end-of-pipe management35，The formula for calculating the actual operation rate (k-value) of the end-of-pipe treatment facility is k = power consumption of wastewater treatment facilities (kWh/year) / operating time of wastewater treatment facilities (hours/year) / total power of wastewater treatment facilities (kW)
  污染物指标化学需氧量的末端治理技术是厌氧生物处理法，其效率为35，末端治理设施实际运行率（k值）计算公式为k=污水治理设施运行时间（小时）/正常生产时间（小时）。原文件中描述污染物类别为废水，污染物指标为化学需氧量，此处对其进行了匹配工作，将其匹配到LCAflow库里面相最符合的流
- chemical oxygen demand: 51.285
  the Technical of end-of-pipe management technology for pollution chemical oxygen demandisAnaerobic hydrolysis，Its Technical efficiency of end-of-pipe management35，The formula for calculating the actual operation rate (k-value) of the end-of-pipe treatment facility is k = power consumption of wastewater treatment facilities (kWh/year) / operating time of wastewater treatment facilities (hours/year) / total power of wastewater treatment facilities (kW)
  污染物指标化学需氧量的末端治理技术是厌氧水解类，其效率为35，末端治理设施实际运行率（k值）计算公式为k=污水治理设施运行时间（小时）/正常生产时间（小时）。原文件中描述污染物类别为废水，污染物指标为化学需氧量，此处对其进行了匹配工作，将其匹配到LCAflow库里面相最符合的流
- chemical oxygen demand: 55.23
  the Technical of end-of-pipe management technology for pollution chemical oxygen demandisFilter separation，Its Technical efficiency of end-of-pipe management30，The formula for calculating the actual operation rate (k-value) of the end-of-pipe treatment facility is /
  污染物指标化学需氧量的末端治理技术是过滤分离，其效率为30，末端治理设施实际运行率（k值）计算公式为k=污水治理设施运行时间（小时）/正常生产时间（小时）。原文件中描述污染物类别为废水，污染物指标为化学需氧量，此处对其进行了匹配工作，将其匹配到LCAflow库里面相最符合的流
- chemical oxygen demand: 55.23
  the Technical of end-of-pipe management technology for pollution chemical oxygen demandisPhysical treatment，Its Technical efficiency of end-of-pipe management30
  污染物指标化学需氧量的末端治理技术是物理处理法，其效率为30，末端治理设施实际运行率（k值）计算公式为k=污水治理设施运行时间（小时）/正常生产时间（小时）。原文件中描述污染物类别为废水，污染物指标为化学需氧量，此处对其进行了匹配工作，将其匹配到LCAflow库里面相最符合的流
- chemical oxygen demand: 78.9
  the Technical of end-of-pipe management technology for pollution chemical oxygen demandisDirect discharge，The formula for calculating the actual operation rate (k-value) of the end-of-pipe treatment facility is /
  污染物指标化学需氧量的末端治理技术是直排，末端治理设施实际运行率（k值）计算公式为k=污水治理设施运行时间（小时）/正常生产时间（小时）。原文件中描述污染物类别为废水，污染物指标为化学需氧量，此处对其进行了匹配工作，将其匹配到LCAflow库里面相最符合的流
- volatile organic compound: 115.6
  the Technical of end-of-pipe management technology for pollution volatile organic compoundisOthers (adsorption)，Its Technical efficiency of end-of-pipe management60，The formula for calculating the actual operation rate (k-value) of the end-of-pipe treatment facility is k = power consumption of wastewater treatment facilities (kWh/year) / operating time of wastewater treatment facilities (hours/year) / total power of wastewater treatment facilities (kW)
  污染物指标挥发性有机物的末端治理技术是其他（吸附法），其效率为60，末端治理设施实际运行率（k值）计算公式为k=工艺废气净化装置耗电量（千瓦时）/(工艺废气净化装置额定功率（千瓦）×工艺废气净化装置运行时间（小时）)。原文件中描述污染物类别为废气，污染物指标为挥发性有机物，此处对其进行了匹配工作，将其匹配到LCAflow库里面相最符合的流
- volatile organic compound: 202.3
  the Technical of end-of-pipe management technology for pollution volatile organic compoundisLow temperature plasma，Its Technical efficiency of end-of-pipe management30，The formula for calculating the actual operation rate (k-value) of the end-of-pipe treatment facility is k = power consumption of wastewater treatment facilities (kWh/year) / operating time of wastewater treatment facilities (hours/year) / total power of wastewater treatment facilities (kW)
  污染物指标挥发性有机物的末端治理技术是低温等离子体，其效率为30，末端治理设施实际运行率（k值）计算公式为k=工艺废气净化装置耗电量（千瓦时）/(工艺废气净化装置额定功率（千瓦）×工艺废气净化装置运行时间（小时）)。原文件中描述污染物类别为废气，污染物指标为挥发性有机物，此处对其进行了匹配工作，将其匹配到LCAflow库里面相最符合的流
- volatile organic compound: 202.3
  the Technical of end-of-pipe management technology for pollution volatile organic compoundisPhotocatalysis，Its Technical efficiency of end-of-pipe management30，The formula for calculating the actual operation rate (k-value) of the end-of-pipe treatment facility is k = power consumption of wastewater treatment facilities (kWh/year) / operating time of wastewater treatment facilities (hours/year) / total power of wastewater treatment facilities (kW)
  污染物指标挥发性有机物的末端治理技术是光催化，其效率为30，末端治理设施实际运行率（k值）计算公式为k=工艺废气净化装置耗电量（千瓦时）/(工艺废气净化装置额定功率（千瓦）×工艺废气净化装置运行时间（小时）)。原文件中描述污染物类别为废气，污染物指标为挥发性有机物，此处对其进行了匹配工作，将其匹配到LCAflow库里面相最符合的流
- volatile organic compound: 202.3
  the Technical of end-of-pipe management technology for pollution volatile organic compoundisPhotolysis，Its Technical efficiency of end-of-pipe management30，The formula for calculating the actual operation rate (k-value) of the end-of-pipe treatment facility is k = power consumption of wastewater treatment facilities (kWh/year) / operating time of wastewater treatment facilities (hours/year) / total power of wastewater treatment facilities (kW)
  污染物指标挥发性有机物的末端治理技术是光解，其效率为30，末端治理设施实际运行率（k值）计算公式为k=工艺废气净化装置耗电量（千瓦时）/(工艺废气净化装置额定功率（千瓦）×工艺废气净化装置运行时间（小时）)。原文件中描述污染物类别为废气，污染物指标为挥发性有机物，此处对其进行了匹配工作，将其匹配到LCAflow库里面相最符合的流
- volatile organic compound: 289
  the Technical of end-of-pipe management technology for pollution volatile organic compoundisDirect discharge，The formula for calculating the actual operation rate (k-value) of the end-of-pipe treatment facility is /
  污染物指标挥发性有机物的末端治理技术是直排，末端治理设施实际运行率（k值）计算公式为k=工艺废气净化装置耗电量（千瓦时）/(工艺废气净化装置额定功率（千瓦）×工艺废气净化装置运行时间（小时）)。原文件中描述污染物类别为废气，污染物指标为挥发性有机物，此处对其进行了匹配工作，将其匹配到LCAflow库里面相最符合的流
- Exhaust gas: 5.6125e6
  the treatment technology for the pollution of Exhaust gasdidn't offered
  污染物指标工业废气量的末端治理技术未说明。原文件中描述污染物类别为废气，污染物指标为工业废气量，此处对其进行了匹配工作，将其匹配到LCAflow库里面相最符合的流

## Use advice
This dataset is derived from the Pollution Source Census Report and contains information on pollution emissions and related products. However, it does not include data on energy or chemical consumption, nor does it provide information on waste or co-product generation. When utilizing this dataset, please supplement the missing data based on actual conditions before use
该数据集来源于污染源普查报告，包含污染物排放及相关产品信息，但不包含能源或化学品消耗数据，也不提供废弃物或共生产物产生信息。在使用该数据集时，请根据实际情况补充缺失数据后再使用。

## Review details
Inventory: The internal review was done by several iteration steps concerning raw data validation, raw data documentation, representativity, completeness and consistency of modelling with regard to ISO 14040 and 14044.
清单： 内部审查通过几个迭代步骤完成，涉及原始数据验证、原始数据记录、代表性、完整性、与 ISO 14040 和 14044 有关的建模的一致性。

## Data sources
- 第二次全国污染源普查产排污核算系数手册（试用版）,二级代码33-37文件，在完整版文件中第1010页
