# Electricity production ; Thermal power ; Qinghai

Dataset: ILCD process, Unit process, single operation
Geography: QH-CN
Reference year: 2019
Classification: Unit processes / Energy carriers and technologies / Electricity
Generated by: Ruoxi Xiong, xiongrx0126@163.com
Owner: Tiangong LCI Data Working Group
Review: Dependent internal review by Tiangong LCI Data Working Group
Amounts: no units in this file; such an amount is in the reference unit of its flow, which a separate flow dataset defines
copyright: false
licenseType: Free of charge for all users and uses

## General comment
Thermal power generation includes seventeen fossil fuels such as raw coal, washed coal, oil and natural gas. The process only considers the direct power generation process, not the upstream raw material extraction and processing and the downstream power consumption

## Time period
Calculated based on data from the 2019 Energy Statistics Yearbook

## Technical purpose
This dataset represents the use of a variety of fossil fuels for thermal power generation in Qinghai, including raw coal, washed coal, oil, and natural gas. It is specifically applied to the analysis of the direct power generation process within thermal power plants. This data is crucial for industries that require assessments of power generation efficiency and environmental impact, particularly sectors focusing on energy production and sustainability.

## Reference product
- electricity for thermal power: 3.6; calculated

## Inputs
- Raw coal: 0.44653; calculated
- Diesel: 2.88e-5; calculated
- natural gas: 0.000192; calculated

## Outputs
- carbon dioxide (fossil): 0.821871; calculated
- sulfur dioxide: 0.000142115; calculated
- Nitrogen oxides: 0.000223345; calculated
- particles (> PM10): 2.6859e-5; calculated

## Data treatment and extrapolations
For the accounting method, please refer to the "Enterprise Greenhouse Gas Emissions Accounting Methods and Reporting Guidelines for Power Generation Facilities". Different forms of power generation and fuel consumption come from Chapter 3 (Energy Production) and Chapter 6 (Regional Energy Balance Sheet) in the "China Energy Statistical Yearbook 2020". The fuel parameters such as low calorific value and carbon content per unit calorific value used to calculate the carbon dioxide emission factor come from the "2019 China Regional Power Grid Carbon Dioxide Baseline Emission Factor Calculation Instructions OM" and the "Enterprise Greenhouse Gas Emission Accounting Method and Reporting Guide for Power Generation Facilities" 》

## Use advice
Users of this dataset should note that it is calculated based on the 2019 Energy Statistics Yearbook and applies specifically to Qinghai's thermal power generation without considering upstream raw material extraction and processing or downstream power consumption. The dataset should be used for LCA within the scope of direct emissions from thermal power plants. Methodology for greenhouse gas (GHG) emissions accounting follows the 'Enterprise Greenhouse Gas Emissions Accounting Methods and Reporting Guidelines for Power Generation Facilities'. Users must refer to this for accurate emissions accounting and ensuring comparability with other datasets. It is also advised to consult the 'China Energy Statistical Yearbook 2020' for detailed figures on energy production and the regional energy balance sheet when applying this dataset.

## Review details
Inventory: The internal review was done by several iteration steps concerning raw data validation, raw data documentation, representativity, completeness and consistency of modelling with regard to ISO 14040 and 14044.

## Data sources
- 熊若熙. 中国电力生产和消费二氧化碳与污染物排放因子核算. (清华大学, 2023).
