# NCM hydrometallurgical recycling

Dataset: ILCD process, Unit process, single operation
Geography: CN
Reference year: 2020
Classification: Unit processes / End-of-life treatment / Material recycling
Functional unit: The product systems evaluated in this study are EB batteries. The service provided by these batteries is the distance driven; thus, the functional unit in this study is defined as an overall 100-km driving distance of a typical EB driven by a group of batteries (4 × 12 V, 20 Ah). According to the data of EB manufacturers, LFP, and NCM batteries can support a typical EB to travel for approximately 45 km and 50 km with one charge, the calculated lifetime distance is of 36, 000 km, and 30,000 km, respectively.
Generated by: maqingyuan, m1120498928@163.com
Owner: Tiangong LCI Data Working Group
Review: Dependent internal review by Tiangong LCI Data Working Group
Amounts: no units in this file; such an amount is in the reference unit of its flow, which a separate flow dataset defines
copyright: false
licenseType: Free of charge for all users and uses

## General comment
Recycle the precursor material (lithium nickel cobalt manganate oxide) from NCM batteries.

## Technical purpose
The NCM hydrometallurgical recycling process is utilized for the recovery of precursor materials, specifically lithium nickel cobalt manganate oxide (NCM), from spent NCM batteries. This enables the reclamation of valuable metals for use in new battery production. This process is relevant to industries involved in battery production, recycling, and material recovery, particularly for the restoration of raw materials for lithium-ion batteries.

## Reference product
- Ni-Co-Mn precursor: 0.604; measured
  Lithium nickel cobalt manganese

## Inputs
All rows: measured
- sulfate: 7.69
  Sulfate (98%)
- magnesium chloride: 0.0009
- potassium chloride: 0.0004
- sodium chloride: 0.0005
- Lithium carbonate: 0.846
- Heavy oil: 0.016
- silicon: 0.021
- Light gas oil: 0.013
- natural gas,natural gas: 0.979
- Water for industrial use: 98
- Electricity: 48.6
- carbon: 0.002
- Sodium carbonate: 0.147
- Ammonia (28%): 0.785
- Hydrochloric acid (30%): 0.28
- 2-ethylhexyl hydrogen -2-ethylhexylphosphonate: 7.69
- Hydrogen peroxide (27.5%): 9.31

## Outputs
All rows: measured
- Secondary Synthetic Graphite: 1.21
- Secondary Aluminum: 0.35
- Secondary copper: 0.324
- Recycled Polypropylene: 0.198
- carbon dioxide (fossil): 0.471
  The original text does not distinguish between bio and fossil, and according to experts, it is fossil here
- nickel: 2.8e-5
- Total particulate matter: 1e-5
- sulfur dioxide: 4.16e-6
- nitrogen monoxide: 1.5e-5
- aluminium: 0.005
- Waste Graphite: 5.1e-5
- chemical oxygen demand: 9.4e-8
- hazardous waste (unspecified): 0.0523
- waste incineration of plastics (PE, PP, PS, PB): 0.005
- Ammonia Nitrogen: 0.00042

## Data selection and combination
The life cycle inventories of NCM and LFP batteries were established based on the survey data from 2018 to 2019, representing the current status of the lithium-ion battery technology.

## Sampling procedure
The LCI of battery recycling is established based on the survey data of several battery recyclers in China, including Chunxing, Yuguang Gold Lead (for LABs), GEM, and Brunp (for LIBs). The distance from the waste battery collection site to the battery recycling plant is assumed to be 100 km.

## Use advice
When using the Life Cycle Inventory (LCI) data for NCM and LFP batteries, users should take into account that the data represents the technological landscape of lithium-ion battery technology as of 2018 to 2019. Additionally, the LCI for battery recycling is based on survey data from specific Chinese battery recyclers and assumes a transport distance of 100 km from collection point to the recycling plant. Utilization of this data should consider updates in technology and regional practices that may have occurred since the data collection period. Users must also acknowledge the functional unit of the product systems evaluated—distance traveled by electric bicycles (EBs)—when applying the data to other contexts or comparative studies.

## Review details
Inventory: The internal review was done by several iteration steps concerning raw data validation, raw data documentation, representativity, completeness and consistency of modelling with regard to ISO 14040 and 14044.

## Data sources
- Liu, W., Liu, H., Liu, W. & Cui, Z. Life cycle assessment of power batteries used in electric bicycles in China. RENEWABLE & SUSTAINABLE ENERGY REVIEWS 139, (2021).
