# Steel ; production ; steel ; rolling ; billets

Dataset: ILCD process, Unit process, single operation
Geography: CN
Reference year: 2006
Classification: Unit processes / Materials production / Metals and semimetals
Generated by: Wanghuanyu, wanghuanyu00@126.com
Owner: Tiangong LCI Data Working Group
Review: Dependent internal review by Tiangong LCI Data Working Group
Amounts: no units in this file; such an amount is in the reference unit of its flow, which a separate flow dataset defines
copyright: false
licenseType: Free of charge for all users and uses

## General comment
The steel produced in the described process is intended for use in manufacturing where steel billets are a primary input. Examples include construction where steel of specified strengths and dimensions is necessary, as well as use in the automotive industry for vehicle frame components.

## Geography
Z19工厂同一名称的工艺过程

## Reference product
- phenol,Sulphur oxides (as SO2): 0.0002; measured

## Inputs
All rows: measured
- Electricity: 136.8
- freshwater,freshwater: 35
- Concentrate powder: 950
- hard coal,hard coal: 28
  coal powder
- soil: 7
  Bentonite
- dolomite: 20
- Limestone: 55
  limestone

## Outputs
- Flue dust: 1.8e-5; measured
- nitrogen monoxide: 9.5e-5; measured

## Use advice
Users of this data set should be aware of the specific grade and quality of steel described. Appropriate allocation methods must be used when co-products are present. The impact of transportation of steel billets to the final manufacturing location should be considered. The data set should be used within the context of the technological applicability of the specific rolling process at the Z19 facility and is not necessarily representative of other steel rolling processes.

## Review details
Inventory: The internal review was done by several iteration steps concerning raw data validation, raw data documentation, representativity, completeness and consistency of modelling with regard to ISO 14040 and 14044.

## Data sources
- 刘微. LCI数据质量体系中的分析方法研究. (北京工业大学, 2006).
