# Electricity production ; Electricity mix ; Heilongjiang

Dataset: ILCD process, Unit process, single operation
Geography: HLJ-CN
Reference year: 2019
Classification: Unit processes / Energy carriers and technologies / Electricity
Generated by: Ruoxi Xiong, xiongrx0126@163.com
Owner: Tiangong LCI Data Working Group
Review: Dependent internal review by Tiangong LCI Data Working Group
Amounts: no units in this file; such an amount is in the reference unit of its flow, which a separate flow dataset defines
copyright: false
licenseType: Free of charge for all users and uses

## General comment
Electricity mix includes thermal, hydro, wind, nuclear and solar generation

## Technical purpose
The electricity mix from Heilongjiang is generated through multiple forms, including thermal power, hydroelectric power, wind power, nuclear power, and solar power. This mix is indicative of a varied energy portfolio and is used for general electricity supply within the region to cater to industrial, commercial, residential, and other requirements.

## Reference product
- Electricity: 3.6; missing unimportant
  [{'text': '能量', 'type': 'text'}]

## Inputs
All rows: missing unimportant
- electricity for thermal power: 2.95149
  [{'text': '能量', 'type': 'text'}]
- electricity from hydroelectric power plant: 0.090792
  [{'text': '能量', 'type': 'text'}]
- electricity for nuclear power: 0
  [{'text': '能量', 'type': 'text'}]
- electricity from wind power: 0.45396
  [{'text': '能量', 'type': 'text'}]
- electricity for solar power: 0.103763
  [{'text': '能量', 'type': 'text'}]

## Use advice
When utilizing this data set for Life Cycle Assessment, consider the proportion of each power source in the mix and its corresponding environmental impacts. Variations in the mix over time should be accounted for when modeling the electricity supply in this region. Ensure any assumptions about the energy mix are clearly stated and that the data is used appropriately for the intended scope, taking into consideration technological applicability and temporal alignment.

## Review details
Inventory: The internal review was done by several iteration steps concerning raw data validation, raw data documentation, representativity, completeness and consistency of modelling with regard to ISO 14040 and 14044.

## Data sources
- 能源统计年鉴2020
