# Farmland remediation ; In-situ remediation ; Solidification/stabilization ; Construction preparation ; Equipment transportation

Dataset: ILCD process, Unit process, single operation
Geography: NJ-YN-CN
Classification: Other Services / Repair and maintenance
Generated by: Xiao Meng, xiaomeng@mail
Owner: Tiangong LCI Data Working Group
Review: Dependent internal review by Tiangong LCI Data Working Group
Amounts: no units in this file; such an amount is in the reference unit of its flow, which a separate flow dataset defines
licenseType: Free of charge for all users and uses

## General comment
The process described is intended for the environmental rehabilitation of farmland contaminated by lead and zinc mining activities. This remediation process utilizes in-situ solidification/stabilization techniques during the construction preparation stage, which includes the transportation of necessary equipment. It is specifically applied within a unit process aimed at treating 16 hectares of heavy metal-contaminated farmland in Nujiang, Yunnan Province, China. The primary goal is to reduce the bioavailable concentrations of Cadmium (Cd) and Lead (Pb) in the soil by more than 70%, ensuring that the concentrations of these metals in crops meet the required safety standards by 100%.

## Geography
云南省怒江州受铅锌矿污染某耕地土壤 污染修复工程

## Reference product
- Equipment and Materials Arriving on Site: 2050; measured
  运输到场的设备

## Inputs
- transport in t*km: 10.25; measured

## Use advice
When utilizing this dataset, it is important to consider the specificity of the location and the contaminants involved. The dataset is only applicable for lead and zinc mine-polluted farmland and specifically for in-situ soil stabilization construction processes. Users should not generalize the data for other types of environmental remediation or geographical locations without careful consideration and potential adjustment. Attention should be given to the baseline contamination levels and the efficacy of the method for varying concentrations of heavy metals. It is also recommended to consider the long-term effectiveness and potential environmental impacts of the solidification/stabilization process. In terms of modeling, accurate representation of the in-situ stabilization process and transport of heavy metals within the soil should be emphasized.

## Review details
Inventory: The internal review was done by several iteration steps concerning raw data validation, raw data documentation, representativity, completeness and consistency of modelling with regard to ISO 14040 and 14044.

## Data sources
- 肖萌 et al. 农田污染钝化修复环境影响定量评估方法与案例分析. 中国环境科学 43, 3571–3581 (2023).
