# Aluminum Electrolysis Carbon Anode Production ; Carbon Anode ; Petroleum Coke ; 2012

Dataset: ILCD process, Unit process, single operation
Geography: CN
Reference year: 2021
Classification: Unit processes / Materials production / Non-energetic raw materials
Generated by: Zimeng Cai, caizm6178@163.com
Owner: Tiangong LCI Data Working Group
Review: Dependent internal review by Tiangong LCI Data Working Group
Amounts: no units in this file; such an amount is in the reference unit of its flow, which a separate flow dataset defines
copyright: false
licenseType: Free of charge for all users and uses

## General comment
The provided life cycle assessment (LCA) data set pertains to the production of carbon anodes utilizing petroleum coke, a process specifically designed for the aluminium electrolysis industry. Carbon anodes produced in the year 2012 are intended for use as a key component in the electrochemical process to reduce aluminium oxide into aluminium metal. They have applications within sectors that require high thermal-electrical conductivity and structural durability.

## Time period
Date of publication

## Reference product
- anode, for metal electrolysis: 1000; software or database
  anode

## Inputs
All rows: software or database
- electricity, high voltage, aluminium industry: 748.8
  electricty
- heavy fuel oil: 65
  fuel oil
- coal tar: 214
  coal tar pitch
- Petroleum Coke: 1089
  petroleum coak
- coal gas: 1277

## Data selection and combination
The data in this study refers to the LCA data of PA, SA, electricity, and other background data. The PA data were obtained from statistical data sources, and the SA data were mainly obtained from the literatures. The background data were mainly derived from the Chinese localization LCA database CAS RCEES 2018, which was established by the Research Center for Eco-Environmental Sciences, Chinese Academy of Sciences and covers LCA data for energy, materials, transportation, waste management etc.

## Use advice
When utilizing this data set, users must acknowledge that the data pertains to carbon anode production processes as of the year 2012, and consider any technological advancements or changes in the industry since that time. The primary data for prebaked anodes (PA) is obtained from statistical data sources, while the supplementary anode (SA) information is primarily derived from literature. Background data should be assumed to be region-specific, sourced from the CAS RCEES 2018 LCA database, focusing on Chinese localizations. Methodological considerations must include the appropriateness of this data for the specific context of application, and whether updates or regional adjustments are necessary to reflect current practices. Users must also determine if the inclusion or exclusion of recycling is applicable to their LCA model.

## Review details
Inventory: The internal review was done by several iteration steps concerning raw data validation, raw data documentation, representativity, completeness and consistency of modelling with regard to ISO 14040 and 14044.

## Data sources
- Ding, N., Liu, N., Lu, B. & Yang, J. Life cycle greenhouse gas emissions of aluminum based on regional industrial transfer in China. J. Ind. Ecol. 25, 1657–1672 (2021).
