# Remediated soil ; Off-site soil remediation ; Excavation and Ex-situ Treatment of Soil

Dataset: ILCD process, Unit process, black box
Geography: BE
Reference year: 2015
Classification: Unit processes / Other Services / Repair and maintenance
Functional unit: The functional unit in this study is the removal of approximately 80% of the estimated 500 metric tons of contaminant mass from a subsurface soil volume of approximately 40,000 cubic meters and can be achieved.
Generated by: Yang Xintong, yangxt@caep.org.cn
Owner: Tiangong LCI Data Working Group
Review: Dependent internal review by Tiangong LCI Data Working Group
Amounts: no units in this file; such an amount is in the reference unit of its flow, which a separate flow dataset defines
copyright: false
licenseType: Free of charge for all users and uses

## General comment
Excavate the soil and transport it to an off-site heat thermal facility for soil remediation.

## Geography
SRI Biochim is a 2 ha site located in the 250 ha industrial zone of Vilvoorde-Machelen just north east of Brussels.

## Time period
Publication time of literature

## Technology and included processes
The site is covered with a layer of 17-25cm thick concrete, which will be cleared using an excavator equipped with a hydraulic hammer. The removal of the concrete layer and excavation of the soil will be carried out in a large activity shed covering an area of 400 square meters on site. The air inside the greenhouse is purified and discharged. Excavation of soil to a depth of 3.7 m below the surface requires lowering the groundwater level by approximately 1.5 meters below the surface. The extracted groundwater also needs to be treated. Both air and groundwater purification processes will use granular activated carbon. The soil needs to be transported by truck to a site 110 kilometers away for heat treatment.

## Technical purpose
The data set describes the process of off-site soil remediation specifically where contaminated soil is excavated and treated in an off-site thermal facility. This process is applicable in environmental engineering and is typically used for the remediation of contaminated industrial sites where soil contaminants need to be substantially reduced or eliminated to meet regulatory or safety standards.

## Reference product
- Remediated soil: 7.708e7; measured

## Inputs
All rows: measured
- Cast Iron: 2.4
  For Centrifugal pump, the amount of original useage is0.024t. Percentage of service life consumedis 0.1
- Stainless Steel: 3
  For Blower, the amount of original useage is0.03t. Percentage of service life consumedis 0.1
- Stainless Steel: 10.75
  For Fog Cannon, the amount of original useage is0.1075t. Percentage of service life consumedis 0.1
- Cast Iron: 81.6
  For Granular Activated Carbon (GAC) vessel for gas-phase treatment, the amount of original useage is1.632t. Percentage of service life consumedis 0.05
- Cast Iron: 55.8
  For Granular Activated Carbon vessel (GAC) for liquid-phase treatment, the amount of original useage is1.116t. Percentage of service life consumedis 0.05
- Aluminum oxide (alumina): 2.7306
  For 50 L pressurized air container, the amount of original useage is0.082t. Percentage of service life consumedis 0.0333
- Aluminum oxide (alumina): 2.9304
  For 6 L SCBA, the amount of original useage is0.088t. Percentage of service life consumedis 0.0333
- Cast Iron: 21.3
  For Air compressor, the amount of original useage is0.213t. Percentage of service life consumedis 0.1
- Galvanized Corrugated Iron: 332
  For Shed, the amount of original useage is20t. Percentage of service life consumedis 0.0166
- Steel: 1400
  For Hydraulic Excavators, the amount of original useage is28t. Percentage of service life consumedis 0.05
- Steel: 5
  For Hydraulic Jackhammers, the amount of original useage is0.05t. Percentage of service life consumedis 0.1
- polyvinylchloride resin (S-PVC): 127
  For piping, the amount of original useage is25.4t. Percentage of service life consumedis 0.005
- Activated Carbon: 250000
- transport in t*km: 16229.7
  Transport of Assembly
- transport in t*km: 16130
  Disposal of components and GAC
- transport in t*km: 1.29769e7
  Transport of soil and backfill
- Light fuel oil: 3469
- Electricity: 28750.3
- Diesel,Diesel: 748323
- contaminated soil: 7.708e7

## Use advice
Users integrating this data set should ensure the inclusion of all stages of soil remediation, from excavation, transport, to ex-situ treatment. Attention should be paid to the proper accounting of energy consumption and treatment of materials, and the use of granular activated carbon in air and groundwater purification processes. The dataset usage must consider local regulatory requirements for transport and disposal of hazardous materials. Sensitivity analyses regarding the removal efficiency and variability in contaminant mass may be essential for the validity and reliability of the LCA results.

## Review details
Inventory: The internal review was done by several iteration steps concerning raw data validation, raw data documentation, representativity, completeness and consistency of modelling with regard to ISO 14040 and 14044.

## Data sources
- Beames B., et al. Accounting for land-use efficiency and temporal variations between brownfield remediation alternatives in life-cycle assessment. Journal of Cleaner Production 101 (2015) 109e117
