# Coal Handling Point ; Lignite ; Lignite ; Underground machine mining ; greater than or equal to1.2 million t/a; NESPS2 / 煤炭装卸点 ; 褐煤 ; 褐煤 ; 井工机采 ; 大于等于120万吨/年 ; 全国第二次污染普查数据

Dataset: ILCD process, Unit process, single operation
Geography: CN
Reference year: 2019
Classification: Reference Parameters / Energy carriers and technologies / Lignite based fuels
Generated by: The data was created by the Office of the Second National Pollution Source Census of the Ministry of Ecology and Environment, and the data was organized by the TianGong Plan team for ILCD format / 生态环境部第二次全国污染源普查工作办公室创建数据，天工计划团队常慧敏整理数据为ILCD格式
Owner: Tiangong LCI Data Working Group / 天工LCI数据工作小组
Review: Dependent internal review by Tiangong LCI Data Working Group / 天工LCI数据工作小组
Amounts: no units in this file; such an amount is in the reference unit of its flow, which a separate flow dataset defines
copyright: false
licenseType: Free of charge for all users and uses

## General comment
the Technical of end-of-pipe management technology for pollution particles (PM2.5 - PM10)isDirect discharge，The formula for calculating the actual operation rate (k-value) of the end-of-pipe treatment facility is k = operating time of wastewater treatment facilities / normal production time

## Technical purpose
本煤炭装卸点用于大型褐煤地下机械开采，典型地涉及机械设备。本设施专为开采作业设计，产量等于或大于每年120万吨。此外，该过程包括喷雾和直接排放等末端管理技术，旨在控制PM2.5至PM10范围内的污染颗粒物，这对于大规模能源生产或重工业中的原材料供应尤为相关。

## Reference product
- brown coal; 11.9 MJ/kg: 1000; input; calculated
  源文件中描述为为褐煤，此处对其进行了匹配工作，将其匹配到LCAflow库里面相最符合的流

## Outputs
- particles (PM2.5 - PM10): 0.552; calculated
  the Technical of end-of-pipe management technology for pollution particles (PM2.5 - PM10)isSpray，Its Technical efficiency of end-of-pipe management80，The formula for calculating the actual operation rate (k-value) of the end-of-pipe treatment facility is k = operating time of wastewater treatment facilities / normal production time
  污染物指标颗粒物的末端治理技术是喷淋，其效率为80，末端治理设施实际运行率（k值）计算公式为k=喷淋设备运行时间（天/年）/企业正常运转天数（天/年）。原文件中描述污染物类别为废气，污染物指标为颗粒物，此处对其进行了匹配工作，将其匹配到LCAflow库里面相最符合的流
- particles (PM2.5 - PM10): 2.76; calculated
  the Technical of end-of-pipe management technology for pollution particles (PM2.5 - PM10)isDirect discharge，The formula for calculating the actual operation rate (k-value) of the end-of-pipe treatment facility is k = operating time of wastewater treatment facilities / normal production time
  污染物指标颗粒物的末端治理技术是直排，末端治理设施实际运行率（k值）计算公式为k=喷淋设备运行时间（天/年）/企业正常运转天数（天/年）。原文件中描述污染物类别为废气，污染物指标为颗粒物，此处对其进行了匹配工作，将其匹配到LCAflow库里面相最符合的流

## Use advice
This dataset is derived from the Pollution Source Census Report and contains information on pollution emissions and related products. However, it does not include data on energy or chemical consumption, nor does it provide information on waste or co-product generation. When utilizing this dataset, please supplement the missing data based on actual conditions before use
该数据集来源于污染源普查报告，包含污染物排放及相关产品信息，但不包含能源或化学品消耗数据，也不提供废弃物或共生产物产生信息。在使用该数据集时，请根据实际情况补充缺失数据后再使用。

## Review details
Inventory: The internal review was done by several iteration steps concerning raw data validation, raw data documentation, representativity, completeness and consistency of modelling with regard to ISO 14040 and 14044.
清单： 内部审查通过几个迭代步骤完成，涉及原始数据验证、原始数据记录、代表性、完整性、与 ISO 14040 和 14044 有关的建模的一致性。

## Data sources
- 第二次全国污染源普查产排污核算系数手册（试用版）,二级代码06,三级代码62.0,四级代码620文件，在完整版文件中第30页
