# White granulated sugar, sheep sugar ; Sugar beet ; Carbonation ; The daily processing volume of sugar beet is less than 3000 t; NESPS2 / 白砂糖、绵白糖 ; 甜菜 ; 碳酸法 ; 日加工甜菜量3000吨以下 ; 全国第二次污染普查数据

Dataset: ILCD process, Unit process, single operation
Geography: CN
Reference year: 2019
Classification: Reference Parameters / Materials production / Food and renewable raw materials
Generated by: The data was created by the Office of the Second National Pollution Source Census of the Ministry of Ecology and Environment, and the data was organized by the TianGong Plan team for ILCD format / 生态环境部第二次全国污染源普查工作办公室创建数据，天工计划团队常慧敏整理数据为ILCD格式
Owner: Tiangong LCI Data Working Group / 天工LCI数据工作小组
Review: Dependent internal review by Tiangong LCI Data Working Group / 天工LCI数据工作小组
Amounts: no units in this file; such an amount is in the reference unit of its flow, which a separate flow dataset defines
copyright: false
licenseType: Free of charge for all users and uses

## General comment
the Technical of end-of-pipe management technology for pollution chemical oxygen demandisPrecipitation separation + anaerobic biological treatment + aerobic biological treatment，Its Technical efficiency of end-of-pipe management98

## Technical purpose
该数据集代表了使用碳酸法从甜菜中提取白颗粒糖和绵白糖的生产过程。该过程每日处理的甜菜容量少于3000吨。通过该方法生产的白颗粒糖和绵白糖可应用于各种食品工业，包括但不限于糖果、烘焙、饮料和罐装食品行业。此外，该数据可能与原料供应商、制造商以及关心甜菜种植的农业部门相关。

## Reference product
- White Granulated Sugar: 1000; calculated
  源文件中描述为为白砂糖、绵白糖，此处对其进行了匹配工作，将其匹配到LCAflow库里面相最符合的流，污染物指标备注为工业废水量

## Outputs
All rows: calculated
- phosphorus, total: 0.00675
  the Technical of end-of-pipe management technology for pollution phosphorus, totalisPrecipitation separation + anaerobic biological treatment + aerobic biological treatment，Its Technical efficiency of end-of-pipe management85
  污染物指标总磷的末端治理技术是沉淀分离+厌氧生物处理法+好氧生物处理法，其效率为85，末端治理设施实际运行率（k值）计算公式为k=污水处理设施正常运行时间（天/年）/开榨天数（天/年）。原文件中描述污染物类别为废水，污染物指标为总磷，此处对其进行了匹配工作，将其匹配到LCAflow库里面相最符合的流，污染物指标备注为总磷
- Waste water: 17350
  the Technical of end-of-pipe management technology for pollution Waste wateris/，Its Technical efficiency of end-of-pipe management0
  污染物指标工业废水量的末端治理技术是/，其效率为0，末端治理设施实际运行率（k值）计算公式为/。原文件中描述污染物类别为废水，污染物指标为工业废水量，此处对其进行了匹配工作，将其匹配到LCAflow库里面相最符合的流，污染物指标备注为工业废水量
- Ammonia Nitrogen: 0.06555
  the Technical of end-of-pipe management technology for pollution Ammonia NitrogenisPrecipitation separation + anaerobic biological treatment + aerobic biological treatment，Its Technical efficiency of end-of-pipe management85
  污染物指标氨氮的末端治理技术是沉淀分离+厌氧生物处理法+好氧生物处理法，其效率为85，末端治理设施实际运行率（k值）计算公式为k=污水处理设施正常运行时间（天/年）/开榨天数（天/年）。原文件中描述污染物类别为废水，污染物指标为氨氮，此处对其进行了匹配工作，将其匹配到LCAflow库里面相最符合的流，污染物指标备注为氨氮
- Nitrogen, organic bound: 0.1406
  the Technical of end-of-pipe management technology for pollution Nitrogen, organic boundisPrecipitation separation + anaerobic biological treatment + aerobic biological treatment，Its Technical efficiency of end-of-pipe management80
  污染物指标总氮的末端治理技术是沉淀分离+厌氧生物处理法+好氧生物处理法，其效率为80，末端治理设施实际运行率（k值）计算公式为k=污水处理设施正常运行时间（天/年）/开榨天数（天/年）。原文件中描述污染物类别为废水，污染物指标为总氮，此处对其进行了匹配工作，将其匹配到LCAflow库里面相最符合的流，污染物指标备注为总氮
- chemical oxygen demand: 1.20288
  the Technical of end-of-pipe management technology for pollution chemical oxygen demandisPrecipitation separation + anaerobic biological treatment + aerobic biological treatment，Its Technical efficiency of end-of-pipe management98
  污染物指标化学需氧量的末端治理技术是沉淀分离+厌氧生物处理法+好氧生物处理法，其效率为98，末端治理设施实际运行率（k值）计算公式为k=污水处理设施正常运行时间（天/年）/开榨天数（天/年）。原文件中描述污染物类别为废水，污染物指标为化学需氧量，此处对其进行了匹配工作，将其匹配到LCAflow库里面相最符合的流，污染物指标备注为化学需氧量

## Use advice
This dataset is derived from the Pollution Source Census Report and contains information on pollution emissions and related products. However, it does not include data on energy or chemical consumption, nor does it provide information on waste or co-product generation. When utilizing this dataset, please supplement the missing data based on actual conditions before use
该数据集来源于污染源普查报告，包含污染物排放及相关产品信息，但不包含能源或化学品消耗数据，也不提供废弃物或共生产物产生信息。在使用该数据集时，请根据实际情况补充缺失数据后再使用。

## Review details
Inventory: The internal review was done by several iteration steps concerning raw data validation, raw data documentation, representativity, completeness and consistency of modelling with regard to ISO 14040 and 14044.
清单： 内部审查通过几个迭代步骤完成，涉及原始数据验证、原始数据记录、代表性、完整性、与 ISO 14040 和 14044 有关的建模的一致性。

## Data sources
- 第二次全国污染源普查产排污核算系数手册（试用版）,二级代码13,四级代码1340文件，在完整版文件中第3413页
