# Waste water treatment plant ; Wastewater treatment volume ; Wastewater treatment ; All sizes; NESPS2 / 污水处理场 ; 污水处理量 ; 污水处理 ; 所有规模 ; 全国第二次污染普查数据

Dataset: ILCD process, Unit process, single operation
Geography: CN
Reference year: 2019
Classification: Reference Parameters / End-of-life treatment / Waste water treatment
Generated by: The data was created by the Office of the Second National Pollution Source Census of the Ministry of Ecology and Environment, and the data was organized by the TianGong Plan team for ILCD format / 生态环境部第二次全国污染源普查工作办公室创建数据，天工计划团队常慧敏整理数据为ILCD格式
Owner: Tiangong LCI Data Working Group / 天工LCI数据工作小组
Review: Dependent internal review by Tiangong LCI Data Working Group / 天工LCI数据工作小组
Amounts: no units in this file; such an amount is in the reference unit of its flow, which a separate flow dataset defines
copyright: false
licenseType: Free of charge for all users and uses

## General comment
the Technical of end-of-pipe management technology for pollution Wastewater FlowisMembrane separation，Its Technical efficiency of end-of-pipe management95

## Technical purpose
所述污水处理场可以处理各种污水处理量，适合各种规模的污水管理需求。提到的末端技术，包括膜分离、直接燃烧、热燃烧、吸附/热燃烧、再生热燃烧、催化燃烧、吸附/催化燃烧、再生催化燃烧、生物过滤、生物滴滤和悬浮洗涤用于处理挥发性有机化合物(VOC)污染，具有不同的效率。这些技术适用于需要管理VOC排放的工业环境。

## Reference product
- Wastewater Flow: 1; input; calculated
  源文件中描述为为污水处理量，此处对其进行了匹配工作，将其匹配到LCAflow库里面相最符合的流，污染物指标备注为挥发性有机物

## Outputs
All rows: calculated
- volatile organic compound: 0.002205
  the Technical of end-of-pipe management technology for pollution volatile organic compoundisMembrane separation，Its Technical efficiency of end-of-pipe management95
  污染物指标挥发性有机物的末端治理技术是膜分离法，其效率为95，末端治理设施实际运行率（k值）计算公式为k=工艺废气净化装置运行时间/正常生产时间。原文件中描述污染物类别为废气，污染物指标为挥发性有机物，此处对其进行了匹配工作，将其匹配到LCAflow库里面相最符合的流，污染物指标备注为挥发性有机物
- volatile organic compound: 0.00441
  the Technical of end-of-pipe management technology for pollution volatile organic compoundisAdsorption/catalytic combustion method，Its Technical efficiency of end-of-pipe management90
  污染物指标挥发性有机物的末端治理技术是吸附/催化燃烧法，其效率为90，末端治理设施实际运行率（k值）计算公式为k=工艺废气净化装置运行时间/正常生产时间。原文件中描述污染物类别为废气，污染物指标为挥发性有机物，此处对其进行了匹配工作，将其匹配到LCAflow库里面相最符合的流，污染物指标备注为挥发性有机物
- volatile organic compound: 0.00441
  the Technical of end-of-pipe management technology for pollution volatile organic compoundisAdsorption/thermal combustion method，Its Technical efficiency of end-of-pipe management90
  污染物指标挥发性有机物的末端治理技术是吸附/热力燃烧法，其效率为90，末端治理设施实际运行率（k值）计算公式为k=工艺废气净化装置运行时间/正常生产时间。原文件中描述污染物类别为废气，污染物指标为挥发性有机物，此处对其进行了匹配工作，将其匹配到LCAflow库里面相最符合的流，污染物指标备注为挥发性有机物
- volatile organic compound: 0.00441
  the Technical of end-of-pipe management technology for pollution volatile organic compoundisThermal combustion，Its Technical efficiency of end-of-pipe management90
  污染物指标挥发性有机物的末端治理技术是热力燃烧法，其效率为90，末端治理设施实际运行率（k值）计算公式为k=工艺废气净化装置运行时间/正常生产时间。原文件中描述污染物类别为废气，污染物指标为挥发性有机物，此处对其进行了匹配工作，将其匹配到LCAflow库里面相最符合的流，污染物指标备注为挥发性有机物
- volatile organic compound: 0.006615
  the Technical of end-of-pipe management technology for pollution volatile organic compoundisRegenerative catalytic combustion method，Its Technical efficiency of end-of-pipe management85
  污染物指标挥发性有机物的末端治理技术是蓄热式催化燃烧法，其效率为85，末端治理设施实际运行率（k值）计算公式为k=工艺废气净化装置运行时间/正常生产时间。原文件中描述污染物类别为废气，污染物指标为挥发性有机物，此处对其进行了匹配工作，将其匹配到LCAflow库里面相最符合的流，污染物指标备注为挥发性有机物
- volatile organic compound: 0.006615
  the Technical of end-of-pipe management technology for pollution volatile organic compoundisRegenerative thermal combustion method，Its Technical efficiency of end-of-pipe management85
  污染物指标挥发性有机物的末端治理技术是蓄热式热力燃烧法，其效率为85，末端治理设施实际运行率（k值）计算公式为k=工艺废气净化装置运行时间/正常生产时间。原文件中描述污染物类别为废气，污染物指标为挥发性有机物，此处对其进行了匹配工作，将其匹配到LCAflow库里面相最符合的流，污染物指标备注为挥发性有机物
- volatile organic compound: 0.00882
  the Technical of end-of-pipe management technology for pollution volatile organic compoundisCatalytic combustion method，Its Technical efficiency of end-of-pipe management80
  污染物指标挥发性有机物的末端治理技术是催化燃烧法，其效率为80，末端治理设施实际运行率（k值）计算公式为k=工艺废气净化装置运行时间/正常生产时间。原文件中描述污染物类别为废气，污染物指标为挥发性有机物，此处对其进行了匹配工作，将其匹配到LCAflow库里面相最符合的流，污染物指标备注为挥发性有机物
- volatile organic compound: 0.00882
  the Technical of end-of-pipe management technology for pollution volatile organic compoundisDirect combustion，Its Technical efficiency of end-of-pipe management80
  污染物指标挥发性有机物的末端治理技术是直接燃烧法，其效率为80，末端治理设施实际运行率（k值）计算公式为k=工艺废气净化装置运行时间/正常生产时间。原文件中描述污染物类别为废气，污染物指标为挥发性有机物，此处对其进行了匹配工作，将其匹配到LCAflow库里面相最符合的流，污染物指标备注为挥发性有机物
- volatile organic compound: 0.01323
  the Technical of end-of-pipe management technology for pollution volatile organic compoundisBiological filtration method，Its Technical efficiency of end-of-pipe management70
  污染物指标挥发性有机物的末端治理技术是生物过滤法，其效率为70，末端治理设施实际运行率（k值）计算公式为k=工艺废气净化装置运行时间/正常生产时间。原文件中描述污染物类别为废气，污染物指标为挥发性有机物，此处对其进行了匹配工作，将其匹配到LCAflow库里面相最符合的流，污染物指标备注为挥发性有机物
- volatile organic compound: 0.01323
  the Technical of end-of-pipe management technology for pollution volatile organic compoundisBiological trickling filtration，Its Technical efficiency of end-of-pipe management70
  污染物指标挥发性有机物的末端治理技术是生物滴滤法，其效率为70，末端治理设施实际运行率（k值）计算公式为k=工艺废气净化装置运行时间/正常生产时间。原文件中描述污染物类别为废气，污染物指标为挥发性有机物，此处对其进行了匹配工作，将其匹配到LCAflow库里面相最符合的流，污染物指标备注为挥发性有机物
- volatile organic compound: 0.01323
  the Technical of end-of-pipe management technology for pollution volatile organic compoundisSuspension washing method，Its Technical efficiency of end-of-pipe management70
  污染物指标挥发性有机物的末端治理技术是悬浮洗涤法，其效率为70，末端治理设施实际运行率（k值）计算公式为k=工艺废气净化装置运行时间/正常生产时间。原文件中描述污染物类别为废气，污染物指标为挥发性有机物，此处对其进行了匹配工作，将其匹配到LCAflow库里面相最符合的流，污染物指标备注为挥发性有机物
- volatile organic compound: 0.03969
  the Technical of end-of-pipe management technology for pollution volatile organic compoundisOther，Its Technical efficiency of end-of-pipe management10
  污染物指标挥发性有机物的末端治理技术是其他，其效率为10，末端治理设施实际运行率（k值）计算公式为k=工艺废气净化装置运行时间/正常生产时间。原文件中描述污染物类别为废气，污染物指标为挥发性有机物，此处对其进行了匹配工作，将其匹配到LCAflow库里面相最符合的流，污染物指标备注为挥发性有机物

## Use advice
This dataset is derived from the Pollution Source Census Report and contains information on pollution emissions and related products. However, it does not include data on energy or chemical consumption, nor does it provide information on waste or co-product generation. When utilizing this dataset, please supplement the missing data based on actual conditions before use
该数据集来源于污染源普查报告，包含污染物排放及相关产品信息，但不包含能源或化学品消耗数据，也不提供废弃物或共生产物产生信息。在使用该数据集时，请根据实际情况补充缺失数据后再使用。

## Review details
Inventory: The internal review was done by several iteration steps concerning raw data validation, raw data documentation, representativity, completeness and consistency of modelling with regard to ISO 14040 and 14044.
清单： 内部审查通过几个迭代步骤完成，涉及原始数据验证、原始数据记录、代表性、完整性、与 ISO 14040 和 14044 有关的建模的一致性。

## Data sources
- 第二次全国污染源普查产排污核算系数手册（试用版）,二级代码25,四级代码2511文件，在完整版文件中第4090页
