# Dye manufacture ; VAT indigo

Dataset: ILCD process, Unit process, black box
Geography: CN
Reference year: 2021
Classification: Unit processes / Materials production / Organic chemicals
Functional unit: the production of 1 ton indigo
Generated by: Kailingli Liao, calinly@163.com
Owner: Tiangong LCI Data Working Group
Review: Dependent internal review by Tiangong LCI Data Working Group
Amounts: no units in this file; such an amount is in the reference unit of its flow, which a separate flow dataset defines
copyright: false
licenseType: Free of charge for all users and uses

## General comment
without flow chart

## Geography
This manual is only used for industrial enterprises that use coefficient method in dye manufacturing industry (code number of 2645) in the Classification of Industries of National Economy (GB/T 4754-2017) to calculate the amount of industrial pollutants produced and emissions.

## Time period
Manual issue date

## Technical purpose
The dye manufacturing process described refers to the production of VAT indigo, a pigment commonly used in the textile industry, particularly for dying denim. The process is typically situated within industrial settings adhering to the national industry classification code 2645 for dye manufacture.

## Model description
Average removal efficiency of terminal treatment technology (%):1) COD-physical treatment method + aerobic biological treatment method + anaerobic biological treatment method: 90%;2) Total nitrogen-physical treatment method + aerobic biological treatment method + anaerobic biological treatment method: 65%;3) Ammonia nitrogen-physical treatment method + chemical treatment method + aerobic biological treatment method + anaerobic biological treatment method: 70%;4) Particles - cyclone dust removal + bag dust removal + wet dust removal: 95%;5) Sulfur dioxide-limestone/gypsum method: 75%;6) Nitrogen oxides - selective catalytic reduction (SCR): 70%.

## Reference product
- indigo: 1000; software or database

## Outputs
All rows: software or database
- Exhaust gas: 124000
  Industrial waste gas volume
- waste water - untreated: 80000
  Industrial waste
- chemical oxygen demand: 320
  Cod
- nitrogen, total (excluding N2): 52
  total nitrogen
- Ammonia Nitrogen: 26
  Ammonia nitrogen
- particles (PM10): 10
  particulates
- sulfur dioxide: 0.22
- nitrogen dioxide: 0.84
  Nitrogen oxides
- industrial waste (unspecified): 40
  General industrial solid waste
- hazardous waste (unspecified): 10
  Hazardous waste (dye waste HW12)

## Use advice
When using the data set for this VAT indigo dye manufacturing process, it is important to consider that the information is tailored for the calculation of industrial pollutants through a coefficient method specific to code 2645. The data should be utilized to model emissions and removal efficiencies effectively within environmental management systems, incorporating average removal efficiencies for pollution control technologies as provided. Note that the set does not include data regarding energy, water, raw material inputs, or transportation; therefore, if a full LCA study is required, additional data collection for these aspects is necessary.

## Review details
Inventory: The internal review was done by several iteration steps concerning raw data validation, raw data documentation, representativity, completeness and consistency of modelling with regard to ISO 14040 and 14044.

## Data sources
- 生态环境部.2645染料制造行业系数手册.(2021).
