# Lithium Carbonate Production ; Battery Grade Lithium Carbonate ; Adsorption ; Brine, Chaerhan salt lake, China

Dataset: ILCD process, Unit process, single operation
Geography: QH-CN
Reference year: 2022
Classification: Unit processes / Materials production / Inorganic chemicals
Generated by: Sun Xin, xs389@cornell.edu
Owner: Tiangong LCI Data Working Group
Review: Dependent internal review by Tiangong LCI Data Working Group
Amounts: no units in this file; such an amount is in the reference unit of its flow, which a separate flow dataset defines
licenseType: Free of charge for all users and uses

## General comment
The goal is to quantify environmental impacts of Li2CO3 (battery grade) production from brine operations. Such a quantification allows a comparison among sites in terms of related environmental impacts. Additionally, the implications for LCA of Li-ion battery production can be assessed in high resolution. An attributional LCA with the cut-off allocation approach from ecoinvent (Wernet et al., 2016) was performed. The functional unit was 1 kg Li2CO3 (battery grade). We used a cradle-to-gate approach. The system boundaries from pumping the brine to the surface until the final product (Li2CO3, battery grade) leaves the processing plants of the South American salt lakes. At Chaerhan salt lake, the brine is first sent to a K-fertilizer plant, and Li2CO3 production uses the effluent, which is considered a waste stream and therefore without burden in the cut-off allocation approach. Since only Li2CO3 (technical grade) is produced (Gansu United testing services Co Ltd(2018), Lanke Lithium (2018)), we added the processes (dilution and re-heating the Li-bearing solution) required to manufacture Li2CO3 (battery grade).

## Technology and included processes
This Li2CO3 production plant uses the residual K-depleted pulp of a K fertilizer production plant. This pulp contains 0.022 wt.% Li . The first step is a Li-adsorption technique, where alumina hydroxide is used as a resin to adsorb Li selectively. Deionized water is used to remove Li from the adsorbent again. The Li-containing solution is sent through ion exchangers to remove still-present impurities. Nanofiltration and reverse osmosis are then required to reduce the volume of the Li-containing solution. Solar evaporation continuously reduces the brine volume from which subsequently Li2CO3 (technical grade) is produced. To allow comparability among sites, we added the process sequence for Li2CO3 (battery grade).

## Technical purpose
Battery-grade lithium carbonate produced through brine adsorption at China's Chaerhan salt lake is primarily used in lithium-ion batteries, which are widely used in portable electronic devices, electric vehicles and grid energy storage solutions.

## Reference product
- Lithium carbonate,Lithium carbonate: 1; measured

## Inputs
All rows: measured
- Brine (0.022% Li): 927
- Electricity: 100.8
- natural gas,natural gas: 298
- freshwater,freshwater: 474
- sodium carbonate: 1.6

## Use advice
When using this data set for life cycle assessment, please take into account that the production processes for raw materials and any associated energy flows less than 1% are not included in the system boundary. This omission should be kept in mind for the completeness of the assessment and when comparing with data sets with different system boundaries. Users should also consider the geographical specificity of the data as it pertains to lithium spodumene sourced from Finland.

## Review details
Inventory: The internal review was done by several iteration steps concerning raw data validation, raw data documentation, representativity, completeness and consistency of modelling with regard to ISO 14040 and 14044.

## Data sources
- Schenker, V., Oberschelp, C. & Pfister, S. Regionalized life cycle assessment of present and future lithium production for Li-ion batteries. Resources, Conservation and Recycling 187, 106611 (2022).
