# Sanitarymaterialsandmedicalsupplies|Boilingandliftingproducts|SolidPreparation|200less than or equal toyieldless than1000 t/a / 卫生材料及医药用品|煮提产物|固体制剂|200小于等于产量小于1000吨/年

Dataset: ILCD process, Unit process, single operation
Geography: CN
Reference year: 2019
Classification: Materials production / Non-energetic raw materials
Generated by: The data was created by the Office of the Second National Pollution Source Census of the Ministry of Ecology and Environment, and the data was organized by the TianGong Plan team for ILCD format / 生态环境部第二次全国污染源普查工作办公室创建数据，天工计划团队常慧敏整理数据为ILCD格式
Owner: Tiangong LCI Data Working Group / 天工LCI数据工作小组
Review: Dependent internal review by Tiangong LCI Data Working Group / 天工LCI数据工作小组
Amounts: no units in this file; such an amount is in the reference unit of its flow, which a separate flow dataset defines
copyright: false
licenseType: Free of charge for all users and uses

## General comment
the Technical of end-of-pipe management technology for pollution particles (PM2.5 - PM10)isCyclone dust removal + bag filter，Its Technical efficiency of end-of-pipe management99，The formula for calculating the actual operation rate (k-value) of the end-of-pipe treatment facility is k = annual operating time of waste gas treatment facilities (hours) / annual normal production time of enterprises (hours)

## Reference product
- Health and Medical Supplies: 1000; calculated
  源文件中描述为为卫生材料及医药用品，此处对其进行了匹配工作，将其匹配到LCAflow库里面相最符合的流，污染物指标备注为废水量

## Outputs
All rows: calculated
- Waste water: 7.99
  污染物指标废水量的末端治理技术是/，末端治理设施实际运行率（k值）计算公式为/。原文件中描述污染物类别为废水，污染物指标为废水量，此处对其进行了匹配工作，将其匹配到LCAflow库里面相最符合的流，污染物指标备注为废水量
- chemical oxygen demand: 1.442
  污染物指标化学需氧量的末端治理技术是无末端处理设施，其效率为0，末端治理设施实际运行率（k值）计算公式为/。原文件中描述污染物类别为废水，污染物指标为化学需氧量，此处对其进行了匹配工作，将其匹配到LCAflow库里面相最符合的流，污染物指标备注为化学需氧量
- chemical oxygen demand: 0.38934
  污染物指标化学需氧量的末端治理技术是好氧生物处理法，其效率为73，末端治理设施实际运行率（k值）计算公式为k=治理设施运行时间（天）/正常生产时间（天）。原文件中描述污染物类别为废水，污染物指标为化学需氧量，此处对其进行了匹配工作，将其匹配到LCAflow库里面相最符合的流，污染物指标备注为化学需氧量
- chemical oxygen demand: 0.18746
  污染物指标化学需氧量的末端治理技术是厌氧生物处理法+好氧生物处理法，其效率为87，末端治理设施实际运行率（k值）计算公式为k=治理设施运行时间（天）/正常生产时间（天）。原文件中描述污染物类别为废水，污染物指标为化学需氧量，此处对其进行了匹配工作，将其匹配到LCAflow库里面相最符合的流，污染物指标备注为化学需氧量
- Ammonia Nitrogen: 0.149
  污染物指标氨氮的末端治理技术是无末端处理设施，其效率为0，末端治理设施实际运行率（k值）计算公式为/。原文件中描述污染物类别为废水，污染物指标为氨氮，此处对其进行了匹配工作，将其匹配到LCAflow库里面相最符合的流，污染物指标备注为氨氮
- Ammonia Nitrogen: 0.0298
  污染物指标氨氮的末端治理技术是好氧生物处理法，其效率为80，末端治理设施实际运行率（k值）计算公式为k=治理设施运行时间（天）/正常生产时间（天）。原文件中描述污染物类别为废水，污染物指标为氨氮，此处对其进行了匹配工作，将其匹配到LCAflow库里面相最符合的流，污染物指标备注为氨氮
- Ammonia Nitrogen: 0.01639
  污染物指标氨氮的末端治理技术是厌氧生物处理法+好氧生物处理法，其效率为89，末端治理设施实际运行率（k值）计算公式为k=治理设施运行时间（天）/正常生产时间（天）。原文件中描述污染物类别为废水，污染物指标为氨氮，此处对其进行了匹配工作，将其匹配到LCAflow库里面相最符合的流，污染物指标备注为氨氮
- phosphorus, total: 0.052
  污染物指标总磷的末端治理技术是无末端处理设施，其效率为0，末端治理设施实际运行率（k值）计算公式为/。原文件中描述污染物类别为废水，污染物指标为总磷，此处对其进行了匹配工作，将其匹配到LCAflow库里面相最符合的流，污染物指标备注为总磷
- phosphorus, total: 0.0078
  污染物指标总磷的末端治理技术是好氧生物处理法+物理化学处理法，其效率为85，末端治理设施实际运行率（k值）计算公式为k=治理设施运行时间（天）/正常生产时间（天）。原文件中描述污染物类别为废水，污染物指标为总磷，此处对其进行了匹配工作，将其匹配到LCAflow库里面相最符合的流，污染物指标备注为总磷
- phosphorus, total: 0.00416
  污染物指标总磷的末端治理技术是厌氧生物处理法+好氧生物处理法+物理化学处理法，其效率为92，末端治理设施实际运行率（k值）计算公式为k=治理设施运行时间（天）/正常生产时间（天）。原文件中描述污染物类别为废水，污染物指标为总磷，此处对其进行了匹配工作，将其匹配到LCAflow库里面相最符合的流，污染物指标备注为总磷
- Nitrogen, organic bound: 0.184
  污染物指标总氮的末端治理技术是无末端处理设施，其效率为0，末端治理设施实际运行率（k值）计算公式为/。原文件中描述污染物类别为废水，污染物指标为总氮，此处对其进行了匹配工作，将其匹配到LCAflow库里面相最符合的流，污染物指标备注为总氮
- Nitrogen, organic bound: 0.04048
  污染物指标总氮的末端治理技术是好氧生物处理法，其效率为78，末端治理设施实际运行率（k值）计算公式为k=治理设施运行时间（天）/正常生产时间（天）。原文件中描述污染物类别为废水，污染物指标为总氮，此处对其进行了匹配工作，将其匹配到LCAflow库里面相最符合的流，污染物指标备注为总氮
- Nitrogen, organic bound: 0.02208
  污染物指标总氮的末端治理技术是厌氧生物处理法+好氧生物处理法，其效率为88，末端治理设施实际运行率（k值）计算公式为k=治理设施运行时间（天）/正常生产时间（天）。原文件中描述污染物类别为废水，污染物指标为总氮，此处对其进行了匹配工作，将其匹配到LCAflow库里面相最符合的流，污染物指标备注为总氮
- Exhaust gas: 35419
  污染物指标废气量的末端治理技术是/，末端治理设施实际运行率（k值）计算公式为/。原文件中描述污染物类别为废气，污染物指标为废气量，此处对其进行了匹配工作，将其匹配到LCAflow库里面相最符合的流，污染物指标备注为废气量
- particles (PM2.5 - PM10): 0.06
  污染物指标颗粒物的末端治理技术是袋式除尘，其效率为98，末端治理设施实际运行率（k值）计算公式为k=治理设施运行时间（小时）/正常生产时间（小时）。原文件中描述污染物类别为废气，污染物指标为颗粒物，此处对其进行了匹配工作，将其匹配到LCAflow库里面相最符合的流，污染物指标备注为颗粒物
- particles (PM2.5 - PM10): 0.03
  污染物指标颗粒物的末端治理技术是旋风除尘+袋式除尘，其效率为99，末端治理设施实际运行率（k值）计算公式为k=治理设施运行时间（小时）/正常生产时间（小时）。原文件中描述污染物类别为废气，污染物指标为颗粒物，此处对其进行了匹配工作，将其匹配到LCAflow库里面相最符合的流，污染物指标备注为颗粒物

## Use advice
This dataset is derived from the Pollution Source Census Report and contains information on pollution emissions and related products. However, it does not include data on energy or chemical consumption, nor does it provide information on waste or co-product generation. When utilizing this dataset, please supplement the missing data based on actual conditions before use
该数据集来源于污染源普查报告，包含污染物排放及相关产品信息，但不包含能源或化学品消耗数据，也不提供废弃物或共生产物产生信息。在使用该数据集时，请根据实际情况补充缺失数据后再使用。

## Review details
Inventory: The internal review was done by several iteration steps concerning raw data validation, raw data documentation, representativity, completeness and consistency of modelling with regard to ISO 14040 and 14044.
清单： 内部审查通过几个迭代步骤完成，涉及原始数据验证、原始数据记录、代表性、完整性、与 ISO 14040 和 14044 有关的建模的一致性。

## Data sources
- 第二次全国污染源普查产排污核算系数手册（试用版）,二级代码27,三级代码277.0文件，在完整版文件中第3237页
