# Paraxylene Production | Paraxylene | Naphtha Route | Naphtha

Dataset: ILCD process
Geography: CN
Reference year: 2022
Classification: Materials production / Other mineralic materials
Functional unit: A functional unit is defined as 1 ton of p-xylene product
LCI method principle: Attributional
LCI method approaches: Allocation - mass
Generated by: Yanan Ren, renyn15@tsinghua.org.cn
Review: Dependent internal review by Tiangong LCI Data Working Group
Amounts: no units in this file; such an amount is in the reference unit of its flow, which a separate flow dataset defines
copyright: false

## General comment
The aromatics complex produces p-xylene and by-products such as raffinate, benzene, and heavy aromatics, including xylene fractionation units, adsorption separation units, isomerization units, disproportionation transalkylation units and aromatics extraction units.

## Geography
A domestic refinery company

## Time period
Not mentioned, replaced by the publication time of the document

## Reference product
- p-xylene: 1000; measured
  对二甲苯

## Outputs
- carbon dioxide: 828.29; measured
  CO2

## Deviations from the LCI method approaches
For the material system whose evaluation products are mostly petroleum hydrocarbons, their physical properties and composition are similar, so the greenhouse gas emissions can be allocated according to the mass allocation method.

## Review details
Inventory: The internal review was done by several iteration steps concerning raw data validation, raw data documentation, representativity, completeness and consistency of modelling with regard to ISO 14040 and 14044.; Documentation: The review of the documentation was performed by Ecobilan and is in compliance with ISO 14040 and 14044. The data set documentation is correct in view of the appropriateness of the information provided. It includes all relevant information in view of data quality and scope of application of the respective LCI result.

## Data sources
- 田涛, 朱明璋, & 姜晔. 石化产品碳足迹评价研究与实践. 油气与新能源 34, 100–108 (2022).
