# Soil Remediation;In-situ Remediation;Electrical Remediation;Long-term Monitoring;Online Monitoring Results

Dataset: ILCD process, Unit process, single operation
Geography: KR
Reference year: 2014
Classification: Unit processes / Other Services / Repair and maintenance
Generated by: Wang Yipeng, wangyp@caep.org.cn
Owner: Tiangong LCI Data Working Group
Review: Dependent internal review by Tiangong LCI Data Working Group
Amounts: no units in this file; such an amount is in the reference unit of its flow, which a separate flow dataset defines
copyright: false
licenseType: Free of charge for all users and uses

## General comment
System monitoring

## Technology and included processes
Online real-time monitoring of contaminants in the site

## Technical purpose
This industrial process is used for in-situ soil remediation through electrical methods. It involves the application of electric currents to the contaminated site to remove pollutants. This process includes long-term and online monitoring of contaminants, ensuring continuous assessment of the remediation's effectiveness. It is typically used in scenarios where soil contamination poses environmental and health risks and where traditional excavation and off-site treatment are not feasible or practical.

## Reference product
- Online monitoring results: 1; measured

## Inputs
- Electricity: 720; measured
  Equipment etc

## Outputs
- Greenhouse Gases: 90; measured
- Nitrogen oxides: 0.239; measured
- SOx: 0.326; measured

## Use advice
Data users must account for the methodological boundaries of the in-situ electrical soil remediation process when integrating this data into a Life Cycle Assessment. Attention should be given to the specifics of the long-term and online monitoring components, as they could impact the overall evaluation of environmental performance. It's essential to consider the range of contaminants this process can address and the energy consumption over the remediation's life cycle. Data users should ensure the proper allocation of input-output flows for all major raw materials and energy consumption in their LCA models.

## Review details
Inventory: The internal review was done by several iteration steps concerning raw data validation, raw data documentation, representativity, completeness and consistency of modelling with regard to ISO 14040 and 14044.

## Data sources
- Kim, DH., Yoo, JC., Hwang, BR. et al. Environmental assessment on electrokinetic remediation of multimetal-contaminated site: a case study. Environ Sci Pollut Res 21, 6751–6758 (2014).
