# Bauxite Mining ; Bauxite ; Cradle

Dataset: ILCD process, Unit process, single operation
Geography: HEN-CN
Reference year: 2018
Classification: Materials production / Non-energetic raw materials
Generated by: Changqing Xu, xcq@bit.edu.cn
Owner: Tiangong LCI Data Working Group
Review: Dependent internal review by Tiangong LCI Data Working Group
Amounts: no units in this file; such an amount is in the reference unit of its flow, which a separate flow dataset defines
copyright: false
licenseType: Free of charge for all users and uses

## General comment
The process described represents the extraction of bauxite ore from the earth, which is the primary raw material used in the production of aluminum. This extracted bauxite can be further processed to produce alumina, which is then used to manufacture various aluminum products such as cans, foils, components in the automotive and aerospace industries, and construction materials.

## Time period
Year of Dissertation Publication

## Reference product
- bauxite: 1000; article inperiodical
  铝土矿

## Inputs
- electricity, medium voltage, aluminium industry: 58.32; article inperiodical
- light fuel oil: 1.38; article inperiodical
  燃料油

## Outputs
All rows: article inperiodical
- carbon dioxide (fossil): 16.1
- carbon monoxide: 0.018
- sulfur dioxide: 0.024
- Nitrogen oxides: 0.04
- methane: 0.0007

## Use advice
When utilizing the bauxite mining process data set, researchers and industry professionals should account for the potential environmental impacts of the extraction. This includes considerations of land use changes, emissions to air and water, and energy consumption associated with mining operations. It is also important to note the year of publication of the related dissertation, as the data might not reflect advancements or process changes made after that year. The data might not include downstream processing such as refining and should be used with caution for full life cycle assessments without additional information.

## Review details
Inventory: The internal review was done by several iteration steps concerning raw data validation, raw data documentation, representativity, completeness and consistency of modelling with regard to ISO 14040 and 14044.

## Data sources
- 王姗姗, 刘赛男, 王灿, & 张瑞芹. 基于生命周期评价的河南省原铝生产环境影响分析. 轻金属 1-7+16 (2018)
