# Alumina production ; Alumina for metallurgy ; Bauxite ; 2010

Dataset: ILCD process, Unit process, single operation
Geography: CN
Reference year: 2021
Classification: Unit processes / Materials production / Non-energetic raw materials
Generated by: Yuzhen Feng, fyz22
Owner: Tiangong LCI Data Working Group
Review: Dependent internal review by Tiangong LCI Data Working Group
Amounts: no units in this file; such an amount is in the reference unit of its flow, which a separate flow dataset defines
copyright: false
licenseType: Free of charge for all users and uses

## General comment
Alumina produced from this process is intended for use in the metallurgy industry, particularly in the production of aluminum. The high purity alumina obtained from bauxite through this process is predominantly used for smelting aluminum metals.

## Time period
Date of publication

## Reference product
- aluminium oxide, metallurgical: 1000; software or database
  alumina

## Inputs
All rows: software or database
- soda ash, dense: 147.28
  soda ash
- Petroleum Coke: 1229.01
  Energy sources proportion of energy consumption is coal: fuel oil: coke: natural gas: coke even gas=46.0%: 11.0%: 7.1%: 14.1%: 21.7%
- coal gas: 3756.26
  (same comment as for Petroleum Coke)
- natural gas, high pressure: 2440.7
  (same comment as for Petroleum Coke)
- fuel oil, unspecified: 1904.09
  (same comment as for Petroleum Coke)
- hard coal: 7962.58
  (same comment as for Petroleum Coke)
- Water, unspecified natural origin: 2.7
  water consumption

## Data selection and combination
The data in this study refers to the LCA data of PA, SA, electricity, and other background data. The PA data were obtained from statistical data sources, and the SA data were mainly obtained from the literatures. The background data were mainly derived from the Chinese localization LCA database CAS RCEES 2018, which was established by the Research Center for Eco-Environmental Sciences, Chinese Academy of Sciences and covers LCA data for energy, materials, transportation, waste management etc.

## Use advice
The LCA data provided is specific to the production of alumina for use in metallurgy as of 2010. Users must attribute the data accurately to the production phase of aluminum and take into consideration the regional aspects of the Chinese market. When applying the data, it should be ensured that it is relevant for the given time frame and applicable to the scale and location of the industrial process in question. Furthermore, updates in the CAS RCEES LCA database should be monitored for new or revised data that could affect the assessment.

## Review details
Inventory: The internal review was done by several iteration steps concerning raw data validation, raw data documentation, representativity, completeness and consistency of modelling with regard to ISO 14040 and 14044.

## Data sources
- Ding, N., Liu, N., Lu, B. & Yang, J. Life cycle greenhouse gas emissions of aluminum based on regional industrial transfer in China. J. Ind. Ecol. 25, 1657–1672 (2021).
