# Liquid Aluminum Electrolytic Capacitors (LAEC) Scrap ; Aluminum Powder ; Used Capacitors

Dataset: ILCD process, Unit process, single operation
Geography: CN
Reference year: 2022
Classification: Unit processes / Materials production / Metals and semimetals
Generated by: Huimin Chang, huiminchang@tsinghua.edu.cn
Owner: Tiangong LCI Data Working Group
Review: Dependent internal review by Tiangong LCI Data Working Group
Amounts: no units in this file; such an amount is in the reference unit of its flow, which a separate flow dataset defines
copyright: false
licenseType: Free of charge for all users and uses

## General comment
The described industrial process pertains to the recycling of Liquid Aluminum Electrolytic Capacitors (LAEC) into aluminum powder. The obtained aluminum powder can potentially be reused in various manufacturing processes where high-grade aluminum is requisite, such as in the production of new electronic components, aerospace materials, and other high-precision aluminum applications.

## Time period
Literature published on 2022-11-15 in Literature The reference year of the elementary data (alumminum ingots, separator paper, tansport, electricity, and water) is around 2016 and qcruired from the Gabi database (Version: 10.6.1.35)

## Reference product
- used capacitor: 1e6; input; measured
  Capacitors (waste)

## Outputs
All rows: measured
- electricity, high voltage, aluminium industry: 440.28
  Electricity
- Mixture of plastic and paper with electrolyte: 359.62
- iron, powder: 1.96
  Iron powder
- Aluminum powder: 739.9
- Rubber Powder: 121.52
  Rubber powder
- Dust: 0.1223

## Data selection and combination
The material information and performance parameters of the three types of AECs are from the investigated manufacturer. Moreover, through the field research of several factories in the AEC industry, the original data on aluminum blank foil fabrication (made from aluminum ingots), anode/cathode foil fabrication (made from aluminum blank foil), and capacitor fabrication were obtained. Due to technical confidentiality, the LCI data of the fabrication of the cathode foil for PHAECs cannot be obtained directly from the supplier. Therefore, the manufacturing LCI of aluminum cathode foil in PHAECs is adjusted according to the coating process data of cathode foil of PAECs, considering their similarity. In the transportation stage, the data of the main raw materials from the material origin to the capacitor manufacturer and the data of the manufactured capacitor products from the manufacturer to the customers are from the supply chain system of the manufacturer. The energy consumption in the use stage is calculated based on the physical equations and the electrical parameters of the AECs. To ensure the completeness of the analysis, the data of the end-of-life stage is obtained based on the analysis and calculation.The reference year of the elementary data is around 2016. The elementary data (i.e., aluminum ingots, separator paper, transport, electricity, and water) are acquired from the Gabi database (Version: 10.6.1.35). In addition, some background data, including 3, 4-ethylene dioxythiophene (EDOT), ammonium adipate, ammonium citrate, etc., are not available in the Gabi database. They are estimated based on the chemical reactions with the material preparation process from the existing raw materials in the Gabi database. The data on the preparation process of the dispersive solution (PEDOT:PSS, 1%wt) for PHAECs' fabrication are scaled from the lab data. The detailed LCI data of the three types of AEC and unit impact of the substance flow is provided in Sheets 5–7 and Sheet 2 of Supporting Info B.

## Use advice
When using the dataset, attention should be paid to the reference year of the elementary data, which is around 2016, and derived from the Gabi database (Version: 10.6.1.35). Users should ensure that this data is compatible with their assessment period and methodological frameworks. In cases where the data for certain components (e.g., cathode foil in PHAECs) are adjusted due to technical confidentiality, users should be aware of the assumptions and adjustments made. For the transportation and use stages, users must consider the specific supply chain system of the manufacturer and the energy consumption calculated from the physical equations and the electrical parameters of the AECs. The end-of-life stage data should be incorporated into the life cycle assessment to ensure completeness. For any materials not available in the Gabi database, such as EDOT and ammonium salts, estimations are made based on chemical reactions and users should treat these with caution.

## Review details
Inventory: The internal review was done by several iteration steps concerning raw data validation, raw data documentation, representativity, completeness and consistency of modelling with regard to ISO 14040 and 14044.

## Data sources
- Zhang, C., Zheng, Y., Jing, J., Liu, Y. & Huang, H. A comparative LCA study on aluminum electrolytic capacitors: From liquid-state electrolyte, solid-state polymer to their hybrid. J. Clean. Prod. 375, (2022).
