# Groundwater ex-situ remediation ; Pump and treat ; Remediated groundwater

Dataset: ILCD process, Unit process, single operation
Geography: CA
Reference year: 2007
Classification: Unit processes / Other Services / Repair and maintenance
Generated by: Wang Ning, wang_ning@caep.org.cn
Owner: Tiangong LCI Data Working Group
Review: Dependent internal review by Tiangong LCI Data Working Group
Amounts: no units in this file; such an amount is in the reference unit of its flow, which a separate flow dataset defines
copyright: false
licenseType: Free of charge for all users and uses

## General comment
Consumption of electricity to operate extraction wells and wastewater disposal facilities

## Geography
The contaminated area was located 600 m from a river shore in the northern part of the prov-ince of Quebec， Canada.

## Technology and included processes
Remediation of contaminated groundwater through the use of electrically powered groundwater pump-and-treat systems

## Technical purpose
This process describes an ex-situ groundwater remediation method, particularly the 'pump and treat' technique which is used to decontaminate groundwater. The described use is for areas where groundwater has been polluted and needs remediation, such as the specified location 600 meters from a river shore in northern Quebec, Canada. Electrically powered extraction wells and wastewater disposal facilities are utilized to pump the contaminated water, treat it to remove pollutants, and then return the remediated water to the environment or to the groundwater system.

## Reference product
- Remediated groundwater: 4.2705e6; estimated
  得到修复的地下水

## Inputs
- Electricity: 6.701e7; estimated
  消耗电力使抽出-处理系统运行
- contaminated groundwater: 4.2705e6; estimated
  受污染的地下水
- Extraction wel: 3; estimated
- Treatment facilities: 1; estimated

## Use advice
When utilizing this data set, users should consider the specific conditions under which the pump-and-treat system operates, including the electrical power consumption and efficiency, the nature and level of groundwater contamination, and the proximity to sensitive ecosystems such as rivers. The technological applicability must be ensured by verifying that the remediation technology is suitable for the types and concentrations of pollutants present. It is also important to account for potential changes in the remediation effectiveness due to seasonal or climatic variations. Additionally, users must ensure that the treatment and disposal of the extracted water do not cause secondary pollution.

## Review details
Inventory: The internal review was done by several iteration steps concerning raw data validation, raw data documentation, representativity, completeness and consistency of modelling with regard to ISO 14040 and 14044.

## Data sources
- Cadotte, M., Deschênes, L. & Samson, R. Selection of a remediation scenario for a diesel-contaminated site using LCA. Int J Life Cycle Assess 12, 239–251 (2007).
