# Hydrolysis of cellulose directed synthesis of cycloalkanes

Dataset: ILCD process, Unit process, black box
Geography: CN
Classification: Unit processes / Energy carriers and technologies / Renewable fuels
Functional unit: 1 MJ aviation fuel
LCI method principle: Attributional
LCI method approaches: Allocation - gross calorific value
Generated by: Zhang Yixuan, zhangyixuan0444@igsnrr.ac.cn
Owner: Tiangong LCI Data Working Group
Review: Dependent internal review by Tiangong LCI Data Working Group
Amounts: no units in this file; such an amount is in the reference unit of its flow, which a separate flow dataset defines
licenseType: Free of charge for all users and uses

## General comment
Biomass aviation fuel is prepared by pretreatment, pyrolysis, alkylation reaction, hydrotreatment and rectification. This alternative jet fuel production process primarily serves the aviation industry by providing a renewable fuel source with lower potential greenhouse gas emissions compared to traditional fossil fuel-based jet fuels.

## Model description
Build a simulation model of the complete process using Aspen Plus software and perform simulation calculations to obtain the mass flow, energy flow, thermodynamic parameters, and reactor power consumption of each process based on mass balance

## Reference product
- carbon dioxide (biogenic): 1.5; calculated
  The original article does not distinguish between bio and fossil, and experts judge that this is bio

## Inputs
- Electricity: 0.1836, 0.504, 0.396 (3 entries); calculated

## Outputs
- waste water - untreated: 1.5; calculated

## Deviations from the LCI method approaches
Allocate environmental impact values according to energy allocation, that is, during the emission allocation process, allocate the energy of aviation fuel and other fuels to each MJ of aviation fuel production

## Use advice
When utilizing this data set for life cycle assessment, it is crucial to consider energy allocation principles. The environmental impacts must be allocated based on the energy content of the bio-aviation fuel and any other co-produced fuels. The allocation should be proportionate to the energy provided by each MJ of bio-aviation fuel produced. It is important to ensure that methodological consistency is maintained with the system boundaries, and that the selection of allocation method is justified and in line with the goals of the study.

## Review details
Inventory: The internal review was done by several iteration steps concerning raw data validation, raw data documentation, representativity, completeness and consistency of modelling with regard to ISO 14040 and 14044.

## Data sources
- 龙柯沅. 生物质定向合成航煤环烷烃的模拟及生命周期评价(东南大学, 2021).
