# Farmland remediation ; In-situ remediation ; Solidification/stabilization ; End-of disposal ; Sample testing

Dataset: ILCD process, Unit process, single operation
Geography: NJ-YN-CN
Classification: Other Services / Repair and maintenance
Generated by: Xiao Meng, xiaomeng@mail
Owner: Tiangong LCI Data Working Group
Review: Dependent internal review by Tiangong LCI Data Working Group
Amounts: no units in this file; such an amount is in the reference unit of its flow, which a separate flow dataset defines
licenseType: Free of charge for all users and uses

## General comment
The process described is for the remediation of farmland soil contaminated by lead-zinc mining in Nujiang Prefecture, Yunnan Province. It covers an area of 16 hectares and utilizes stabilization techniques during the end-of-pipe disposal stage to ensure that concentrations of Cd and Pb in crops meet required standards and that the bioavailable concentrations of Cd and Pb in the soil are reduced by over 70%. The process involves in-situ and solidification/stabilization remediation methods, followed by sample testing using Flame Atomic Absorption Spectrophotometry to validate the remediation effectiveness.

## Geography
云南省怒江州受铅锌矿污染某耕地土壤 污染修复工程

## Reference product
- Soil Sample: 1000; input; measured
  运输到场检测的样土

## Inputs
- calcium chloride: 0.5; measured
- Electricity: 2880; measured

## Outputs
- Soil complete test: 1000; measured
  检测完成的土壤

## Use advice
Data set users should note that the remediation process covered by this data is tailored for heavy metal-contaminated farmland specific to conditions found in lead-zinc mining areas of Yunnan Province. The applied stabilization technology should be contextualized within the regional parameters, crop types, and contamination levels. Users need to adjust the procedural details and outcome expectations when applying this data set to different regions or contamination scenarios. Additionally, the validity of the remediation should be certified through the use of Flame Atomic Absorption Spectrophotometry as documented in the process, ensuring compliance with the Cd and Pb concentration standards in both crops and soil.

## Review details
Inventory: The internal review was done by several iteration steps concerning raw data validation, raw data documentation, representativity, completeness and consistency of modelling with regard to ISO 14040 and 14044.

## Data sources
- 肖萌 et al. 农田污染钝化修复环境影响定量评估方法与案例分析. 中国环境科学 43, 3571–3581 (2023).
