# cement production;cement, ordinary portland cement, 42.5MPa;new dry process, 2000 t/d;fly ash

Dataset: ILCD process, Unit process, black box
Geography: CN
Reference year: 2005
Classification: Unit processes / Materials production / Other mineralic materials
Generated by: #REF!, ysqsophia@gmail.com
Owner: Tiangong LCI Data Working Group
Review: Dependent internal review by Tiangong LCI Data Working Group
Amounts: no units in this file; such an amount is in the reference unit of its flow, which a separate flow dataset defines
copyright: false
licenseType: Free of charge for all users and uses

## General comment
Two 2000t/d new dry process production lines.

## Time period
2005-2006

## Technology and included processes
Two 2000t/d new dry production lines

## Technical purpose
The industrial process described is the production of 42.5MPa ordinary Portland cement using the new dry method, which involves two 2000 tonnes per day production lines. This type of cement is predominantly utilized in the construction industry for creating concrete structures and products that require a high level of strength and durability. It is suitable for a broad range of applications including the construction of buildings, bridges, highways, and other infrastructure projects.

## Model description
The performance of 1 ton of 42.5# ordinary Portland cement with a 28-day compressive strength of 42.5MPa is selected as a functional unit. The 32.5# cement is converted into 42.5# cement according to the ratio of 1:1.25, which is regarded as 1 One unit of 32.5# cement has a similar environmental impact as 1.25 units of 42.5# cement. The scope of the study is raw meal preparation, clinker calcination and cement grinding. The rest are excluded from the system boundary. The main raw material consumption involved is limestone, clay raw materials, gypsum, etc. The energy consumed includes coal, electricity and a certain amount of fuel oil, and emit dust and environmentally polluting gases such as carbon dioxide and sulfur dioxide.

## Reference product
- cement, ordinary portland cement, 42.5MPa: 1000
  Cement

## Inputs
- limestone, crushed, for mill: 1270
  Limestone
- clay: 70.4
  Clay-based raw materials
- iron, powder: 25.1
  Iron correction raw material
- gypsum stone (CaSO4-dihydrate): 57.9
  Gupsum
- ash: 139
  Fly ash
- Electricity: 388.8
- hard coal; 26.3 MJ/kg: 134
  Raw coal
- heavy fuel oil: 0.0455
  The original literature is fuel oil (i.e., heavy oil)

## Outputs
- carbon dioxide (fossil): 798
  CO2. Due to the lack of a perfect monitoring mechanism and statistical system, there are many deficiencies in the filling of pollutant emissions by some enterprises in the research data sheet, focusing on the missing quantities of CO2, SO2, NOx and CO emissions. For life cycle assessment, the missing quantity of major pollutant emissions seriously affects the accuracy of the assessment, so certain estimation methods need to be used for estimation. In this paper, we use current or relevant literature on pollutant emissions in cement production to estimate the emissions of several major pollutants, in order to compensate for the deficiencies in the survey data.
- carbon monoxide (biogenic),carbon monoxide (biogenic): 4.17
  CO. Due to the lack of a perfect monitoring mechanism and statistical system, there are many deficiencies in the filling of pollutant emissions by some enterprises in the research data sheet, focusing on the missing quantities of CO2, SO2, NOx and CO emissions. For life cycle assessment, the missing quantity of major pollutant emissions seriously affects the accuracy of the assessment, so certain estimation methods need to be used for estimation. In this paper, we use current or relevant literature on pollutant emissions in cement production to estimate the emissions of several major pollutants, in order to compensate for the deficiencies in the survey data.
- Nitrogen oxides: 1.34
  NOx. Due to the lack of a perfect monitoring mechanism and statistical system, there are many deficiencies in the filling of pollutant emissions by some enterprises in the research data sheet, focusing on the missing quantities of CO2, SO2, NOx and CO emissions. For life cycle assessment, the missing quantity of major pollutant emissions seriously affects the accuracy of the assessment, so certain estimation methods need to be used for estimation. In this paper, we use current or relevant literature on pollutant emissions in cement production to estimate the emissions of several major pollutants, in order to compensate for the deficiencies in the survey data.
- sulfur dioxide: 1.25
  SO2. Due to the lack of a perfect monitoring mechanism and statistical system, there are many deficiencies in the filling of pollutant emissions by some enterprises in the research data sheet, focusing on the missing quantities of CO2, SO2, NOx and CO emissions. For life cycle assessment, the missing quantity of major pollutant emissions seriously affects the accuracy of the assessment, so certain estimation methods need to be used for estimation. In this paper, we use current or relevant literature on pollutant emissions in cement production to estimate the emissions of several major pollutants, in order to compensate for the deficiencies in the survey data.
- particles (> PM10): 1.25
  Dust, with an unspecified particle size, is treated as PM > 10 micrometers in diameter.

## Sampling procedure
It mainly investigates the environmental load information of its material production from 2004 to 2007, and takes one or multiple production lines that can be inspected every year as the research object. According to statistics, a total of 115 building materials companies were surveyed, with a total of 234 research objects. Specifically, there are 37 companies in the cement industry, including 32 new dry process companies and 5 vertical kiln companies, with a total of 96 research objects.

## Use advice
The data set provided represents the environmental impact of producing 42.5# ordinary Portland cement using a new dry process and is based on the performance of 1 ton of cement with a 28-day compressive strength of 42.5MPa as well as the proportional impact of 32.5# cement. it is advised that users apply this data for life cycle assessments of projects where this type of cement is utilized, taking care to adjust the values based on the specific amount and type of cement used in the project. The study scope includes raw meal preparation, clinker calcination, cement grinding, while excluding other stages beyond the system boundary like transportation and installation. It also includes raw material consumption and energy use, considering emissions like dust, CO2, and SO2. Users should pay attention to the methodology of converting 32.5# cement into 42.5# cement for their assessment purposes.

## Review details
Inventory: The internal review was done by several iteration steps concerning raw data validation, raw data documentation, representativity, completeness and consistency of modelling with regard to ISO 14040 and 14044.

## Data sources
- 张群. (2009). 材料生命周期分析网络数据库的研究与开发 [硕士, 北京工业大学].
