# Municipal sludge treatment and disposal;wet sludge moisture content 70%-75%;co-incineration with coal to generate electricity

Dataset: ILCD process, Unit process, single operation
Geography: CN
Classification: Unit processes / End-of-life treatment / Waste water treatment
Functional unit: The life cycle study boundary starts from the wet sludge (moisture content is about 70% ~ 75%) after mechanical compression and dewatering in the sewage treatment plant to the final disposal functional unit adopts 1t wet sludge after mechanical compression.
Generated by: Jin Sitian, 2331276@tongji.edu.cn
Owner: Tiangong LCI Data Working Group
Review: Dependent internal review by Tiangong LCI Data Working Group
Amounts: no units in this file; such an amount is in the reference unit of its flow, which a separate flow dataset defines
copyright: ['opt4ROkqig']
licenseType: Free of charge for all users and uses

## General comment
A 25MW co-firing power generation system is analyzed, and the sludge is directly dried by using the heat of boiler exhaust gas with a circulating fluidized bed system with an evaporation capacity of 130t/h for sludge co-burning power generation.

## Technology and included processes
The flue gas inlet temperature is 160°C, the flue gas outlet temperature is 85°C, and the flue gas volume is 173000m³/h. The wet sludge (70.5% moisture content) is dried to about 30% moisture content and discharged out of the drying system by using the dry material backmix drying system, and then enters the boiler and coal for co-firing power generation, the boiler efficiency is 85.58%, the sludge treatment capacity reaches 10.49t/h, and the dry sludge output after drying treatment is 4.42t/h. In order to ensure the stability of combustion in the furnace, the combustion temperature is controlled at 900~950°C, and the mass ratio of dried sludge and coal blending is 20:80.

## Technical purpose
The described industrial process pertains to municipal sludge treatment and disposal. The process targets the handling of wet sludge with a moisture content of 70%-75% retrieved from sewage treatment facilities. This waste product undergoes drying and mechanical compression before being co-incinerated with coal as a means to generate electricity. It is primarily applied in waste-to-energy plants for the conversion of wet sludge into usable energy, thereby serving both waste management and energy production sectors.

## Reference product
- Sludge: 1000; input; estimated
  1t wet sludge (moisture content around 70% to 75%)

## Inputs
- hard coal; 26.3 MJ/kg: 1685; measured

## Outputs
All rows: measured
- carbon monoxide (fossil): 0.21
  The original text does not distinguish between biogenic and fossil, and according to experts, it is fossil here.
- carbon dioxide (fossil): 175.09
  (same comment as for carbon monoxide (fossil))
- Nitrogen oxides: 6.19801
- sulfur oxides: 0.53477
- hydrogen chloride: 0.10707
- Flue dust: 0.24
  soot
- Electricity: 219.816

## Use advice
Users of this Life Cycle Assessment data set for municipal sludge treatment and disposal should acknowledge the boundary limits from the dewatered wet sludge post mechanical compression at the sewage treatment plant to the final disposal. The functional unit is the amount of mechanical compressed 1 ton of wet sludge, which implies that all calculations and analysis should be normalized to this quantity. When applying this data, considerations for methodological consistency with regard to co-incineration emissions, transportation of sludge, and any upstream processing impacts should be included. Due to the varied nature of sewage sludge characteristics, local adaptation of the data may be necessary. Attention should also be given to regulations and environmental impacts associated with the co-incineration process.

## Review details
Inventory: The internal review was done by several iteration steps concerning raw data validation, raw data documentation, representativity, completeness and consistency of modelling with regard to ISO 14040 and 14044.

## Data sources
- 廖艳芬,漆雅庆,马晓茜.城市污水污泥焚烧处理环境影响分析[J].环境科学学报,2009,29(11):2359-2365.DOI:10.13671/j.hjkxxb.2009.11.015.
