# cement production|cement, portland cement|mixed solid wastes

Dataset: ILCD process, LCI结果
Geography: CN
Classification: Materials production / Other mineralic materials
Generated by: Siqi Yang
Amounts: no units in this file; such an amount is in the reference unit of its flow, which a separate flow dataset defines
copyright: false

## General comment
The term mixed solid waste refers to waste cement and cement reinforcer.

## Model description
One tonne of cement and solid waste cement was used as a functional unit. The system boundary was defined as “cradle to gate” with partial closure, which considered the process of the material mining, raw material preparation, clinker calcination, grinding and transportation, excluding cement use and waste stage. Solid waste initiated its life cycle from the abandonment stage.

## Reference product
- cement, portland cement: 1000
  Cement

## Inputs
- calcium carbonate: 612.895; measured
  Limestone. Material mining 570. Waste cement 12.25.
- clay: 300; measured
  Clay. Material mining 285.
- iron: 100; measured
  Iron. Material mining 95.
- gypsum: 65.5263; measured
  Gypsum. Clinker Calcination 50. Waste cement 12.25.
- diesel: 1.89474; measured
  Diesel. Material mining 1.8.
- admixture: 10.5263
  Cement reinforcer. Waste cement 10. Cement reinforcing agent with silica fume and sodium silicate as main components was prepared in the laboratory.
- transport, freight, lorry, unspecified: 393684; measured
  Transportation. Material mining 270. Waste cement 104.
- electricity, medium voltage: 329.684; measured
  Electricity. Material mining 14.8. Raw meal preparation 18.9. Clinker Calcination 16.3. Grinding 37.

## Outputs
All rows: measured
- carbon dioxide: 758.186
  CO2. Material mining 36.7. Raw meal preparation 178.94. Clinker Calcination 154.327. Grinding 350.31.
- sulfur dioxide: 0.444695
  SO2. Material mining 0.258. Raw meal preparation 0.043. Clinker Calcination 0.0371. Grinding 0.08436.
- nitrogen dioxide: 1.18325
  NO2. Material mining 0.0581. Raw meal preparation 0.279. Clinker Calcination 0.24069. Grinding 0.5463.
- particles (> PM10): 0.0644087
  TSP. total suspended particulate. The particle size is not specified. Here we treat it as PM>10. Material mining 0.03. Raw meal preparation 60. Clinker Calcination 0.354. Grinding 0.8043.
- carbon monoxide: 0.298389
  CO. Material mining 0.00137. Raw meal preparation 0.0738. Clinker Calcination 0.0637. Grinding 0.1446.
- methane: 5.4
  CH4. Material mining 5.13.
- mercury: 6.3158e-8
  Hg. Material mining 0.06.
- Nitrogen oxides: 0.555789
  NOx. Clinker Calcination 0.528.
- wastewater, unpolluted: 347.368
  H2O. Cement production 200. Waste cement 130.
- chemical oxygen demand: 1.09837
  COD. Material mining 1.02. Raw meal preparation 0.00615. Clinker Calcination 0.0053. Grinding 0.012.
- iron sulfate: 0.915789
  FeSO4. Clinker Calcination 0.87.
- chromium VI: 2.5263e-5
  Cr6+. Clinker Calcination 24.
- Oils, unspecified: 2.18433
  Waste oil. Material mining 2.02. Raw meal preparation 0.0026. Clinker Calcination 2.3E-4. Grinding 0.05228.
- Waste, solid, from cement production: 513.421
  Solid waste. Waste cement -487.75. Negative value indicates that the input or output values represent environmental gains.
- waste cement, hydrated: 52.6316
  Waste cement. Cement production 50.

## Data selection and combination
The production data of 2 million tons of cement plant was investigated, including the input and output directly related to cement production in each process, and the rest data came from background database.

## Data sources
- Ming Tao, Daoming Lu, Ying Shi, & Chengqing Wu. (2022). Utilization and life cycle assessment of low activity solid waste as cementitious materials: A case study of titanium slag and granulated blast furnace slag. Science of The Total Environment, 849, 157797.
