# Brick production ; sintered bricks ; Raw materials processing (crushing, mixing)

Dataset: ILCD process, Unit process, single operation
Geography: ZG-SC-CN
Reference year: 2020
Classification: Unit processes / Materials production / Other mineralic materials
Functional unit: 1t WDC were chosen as the functional unit
Generated by: Wang xiangjin, r99rt4@163.com
Owner: Tiangong LCI Data Working Group
Review: Dependent internal review by Tiangong LCI Data Working Group
Amounts: no units in this file; such an amount is in the reference unit of its flow, which a separate flow dataset defines
copyright: false
licenseType: Free of charge for all users and uses

## General comment
Using shale ore, coal, and water-based drilling chips as raw materials

## Technology and included processes
WDC（water-based drilling cuttings） were used as a replacement for natural clay to prepare sintered bricks. The water content of the WDC can be reduced from 80% to 20% through press filter pretreatment, which can meet the requirements of external delivery for recycling. The remaining water in the WDC can be used directly to make bricks (240 mm × 115 mm × 53 mm) to reduce the consumption of water resources. The entire production process includes raw material preparation, mixing, pressing, drying and sintering (temperature of 800–1000 °C; time for 1-4 h)

## Technical purpose
This data set pertains to the production of sintered bricks using shale ore, coal, and water-based drilling chips (WDC) as alternatives to natural clay. WDC is pre-treated to reduce moisture content, facilitating its use in sintered brick fabrication. The process is designed to minimize water consumption by reusing the water from WDC in the brick-making process. The bricks produced have dimensions of 240 mm × 115 mm × 53 mm and are suitable for construction and building applications. The utilization project is capable of producing up to 30 million sintered bricks annually.

## Reference product
- clay: 1000; input; measured
  In the original literature, natural clay was used to replace water-based rock debris, but no corresponding flow was found, so clay was used instead for the time being.

## Inputs
- shale: 3500; measured
  Original text: Shale ore
- hard coal: 375; measured
  The original article did not indicate the specific type of coal.
- freshwater: 300; measured
- Electricity: 360; measured

## Outputs
- particles (> PM10): 0.0294; measured
- brickbat aggregate: 5175; measured
  brick rough material

## Deviations from the LCI method approaches
The eFootprint online analysis platform developed by IKE Environmental Technology Co. was used to perform quantitative analysis of the full life cycle process, as part of the LCA

## Data selection and combination
The foreground data of raw materials, energy input, and exhaust emissions were obtained from a case study enterprise in Zigong (Sichuan, China), Chuangqi Environmental Protection Building Materials Co., Ltd., which has undertaken the utilization project of WDC used as a raw material for sintered bricks, with an annual output of 30 million bricks.

## Sampling procedure
Besides, 1t WDC were chosen as the functional unit and all the input parameters of raw materials, auxiliary materials, energy consumption, transportation, and direct emissions were calculated in accordance with the functional unit.

## Use advice
When employing the data set for Life Cycle Assessment (LCA), it is important to adhere to the functional unit defined as 1 ton of WDC. The cut-off rule must be applied, allowing the exclusion of low-value materials, like fly ash, that constitute less than 1% of the final product's weight from the inventory. The data is contextualized for sintered brick production in Zigong, Sichuan, and should be used with consideration for regional and technological specifics. Users should refer to Zhao et al., 2020 for methodological details on the cut-off rule.

## Review details
Inventory: The internal review was done by several iteration steps concerning raw data validation, raw data documentation, representativity, completeness and consistency of modelling with regard to ISO 14040 and 14044.

## Data sources
- Liu, W. et al. Comparative life cycle assessment of cement, sintered bricks and non-sintered bricks manufacturing using water-based drilling cuttings from shale gas production in the Sichuan Basin, China. J. Environ. Manage. 314, 115135 (2022).
