# Wet sand Production;Coarse Crushing;Jaw Crushing Technology

Dataset: ILCD process, Unit process, single operation
Geography: CS-HUN-CN
Reference year: 2020
Classification: Unit processes / Materials production / Other mineralic materials
Generated by: Cui hang, Cuihang0716@163.com
Owner: Tiangong LCI Data Working Group
Review: Dependent internal review by Tiangong LCI Data Working Group
Amounts: no units in this file; such an amount is in the reference unit of its flow, which a separate flow dataset defines
copyright: false
licenseType: Free of charge for all users and uses

## General comment
Primary crushing (jaw crushing) and screening

## Technology and included processes
Feed first, then jaw crusher crushing, after crushing into the vibrating screen screening, the obtained 2~4cm crushed stone through the conveyor belt into the finished product yard. Other parts after screening are sent to cone crusher (secondary crushing) through conveyor belt

## Technical purpose
This industrial process, utilizing jaw crushing technology, applies primarily to wet sand production and coarse crushing of aggregates. The material produced, generally 2~4cm crushed stone, is typically employed in construction applications, including concrete mixing, road base layers, and other infrastructure projects. It's also the initial step in aggregate preparation for further processing or use.

## Reference product
- gravel: 166667; measured
  Sand and gravel produced after coarse crushing

## Inputs
- gravel: 204400; measured
- Electricity: 792; measured
  Electricity used by vibrating feed screens and jaw crushers

## Outputs
- sand: 33333; measured
  Gravel produced after coarse crushing
- Sludge: 1310; measured
  Sludge produced after coarse crushing
- particles (> PM10),particles (> PM10): 8; measured
  Dust particles generated during production

## Data selection and combination
The process and inventory data for wet sand are derived from empirical data provided by the project

## Use advice
When utilizing the life cycle assessment data of this process, consider the specific context of the wet sand production, including any regional environmental impacts and the energy consumption specific to jaw crushing technology. Accurately account for the emissions and resource use in subsequent stages if the crushed stone enters further processing loops such as secondary crushing or has application-specific demands that affect its environmental footprint. Ensure that the empirical data from the project reflects current technology and practices, and update the dataset periodically to reflect technological advancements.

## Review details
Inventory: The internal review was done by several iteration steps concerning raw data validation, raw data documentation, representativity, completeness and consistency of modelling with regard to ISO 14040 and 14044.

## Data sources
- 年产 60 万吨机制砂建设项目环评报告
