# waste Polyethylene terephthalate recycling; the recycled Polyethylene terephthalate; mechanical recycling ; waste Polyethylene terephthalate

Dataset: ILCD process, Unit process, black box
Geography: TJ-CN
Reference year: 2016
Valid until: 2016
Classification: Unit processes / End-of-life treatment / Material recycling
Functional unit: 1 ton of waste Polyethylene terephthalate
Generated by: Xiaoyu Cheng, xiaoyucheng@email.ncu.edu.cn
Owner: Tiangong LCI Data Working Group
Review: Dependent internal review by Tiangong LCI Data Working Group
Amounts: no units in this file; such an amount is in the reference unit of its flow, which a separate flow dataset defines
copyright: false
licenseType: Free of charge for all users and uses

## General comment
After calibration, the respective process data in 2016 were selected to assess the environmental impacts of mechanical recycling of waste plastics.

## Geography
The ZEDA is located in southwest of Tianjin, which is the largest renewable resource processing industrial park in China.

## Time period
The literature only states that it was in 2016.

## Technical purpose
The recycled polyethylene terephthalate (PET) described in this dataset is used for the production of various plastic products after mechanical recycling. The material is suitable for applications requiring lower grades of PET, typically found in consumer packaging, textile fibers, or construction materials.

## Reference product
- Waste Polyethylene terephthalate: 1000; input; measured

## Inputs
- Water for industrial use: 372; measured
- Electricity: 898.2; measured
- natural gas; 44.1 MJ/kg: 54.9; measured

## Outputs
All rows: measured
- particles (>PM10): 0.55
- non-methane volatile organic compounds: 0.38
- Suspended solids, unspecified,Suspended solids, unspecified: 0.0101
- chemical oxygen demand: 0.09048
- biological oxygen demand: 0.01522
- Ammonia Nitrogen: 0.00556
- Phosphorus: 0.00022
- Oils, unspecified: 0.0002
- waste water - untreated: 240
- General Solid Waste: 73.29
- Hazardous Solid Waste: 2.58
- Recycled Polyethylene Terephthalate Granules: 923.2

## Data selection and combination
In 2016, the recycled plastics production was 327 kilotons, covering all major categories of plastics.

## Data treatment and extrapolations
calibration

## Use advice
When using this dataset for life cycle assessment, ensure that the scope of your study matches the mechanical recycling process of the waste PET described for the year 2016. Consider geographical and technological relevance to the ZEDA industrial park in Tianjin, China. Pay special attention to the recycling rates and the purity of recycled PET as these factors may significantly influence the environmental impact assessment.

## Review details
Inventory: The internal review was done by several iteration steps concerning raw data validation, raw data documentation, representativity, completeness and consistency of modelling with regard to ISO 14040 and 14044.

## Data sources
- Chen, Y. et al. Life cycle assessment of end-of-life treatments of waste plastics in China. Resources, Conservation and Recycling 146, 348–357 (2019).
