# open-pit coal mining ; coal mining

Dataset: ILCD process, Unit process, black box
Geography: CN
Reference year: 2005
Classification: Energy carriers and technologies / Energetic raw materials
Generated by: Linlin Yin, yinlinlin0623@163.com
Owner: Tiangong LCI Data Working Group
Review: Dependent internal review by Tiangong LCI Data Working Group
Amounts: no units in this file; such an amount is in the reference unit of its flow, which a separate flow dataset defines
licenseType: Free of charge for all users and uses

## General comment
The data set represents open-pit coal mining operations that produce coal primarily for use as an energy source in power generation, steel production, cement manufacturing, and as a raw material for various industrial processes. Open-pit mining is suitable where the coal deposits are near the surface, favoring lower extraction costs and less mining-induced land subsidence compared to deep mining.

## Geography
According to the statistics of open-pit coal production in China Coal Industry Yearbook in 2000. There is no gas disaster and no measured data of methane emission in open-pit coal mine. Considering that the mining depth of this kind of coal mine is small and the gas content of coal seam is low, when estimating the methane emission coefficient, it is taken as half of the methane emission coefficient of the low gas mine in the state-owned key coal mine.

## Technology and included processes
There is no gas disaster in open-pit coal mine. When estimating the methane emission coefficient, it is taken as half of the methane emission coefficient of low gas mine in state-owned key coal mine.

## Reference product
- Hard coal, at consumer EU-27: 4.061e10; uniform; software or database
  According to the ' China Coal Industry Yearbook ', the open-pit coal output was 40.61 Mt ( 2000 ).

## Outputs
- methane (fossil): 0.00165; uniform; estimated
  The emission factor, the estimated methane emission coefficient of open-pit coal mines in 2000, is taken as one-half of the methane emission coefficient of low-gas mines in key state-owned coal mines across the country, that is, the volume of methane released per kilogram of coal mined - the methane emission factor.
- methane (fossil): 6.7e7; uniform; calculated
  Methane emission during open-pit coal mining in 2000.

## Use advice
When using this data set for life cycle assessment, it is important to consider that the methane emission coefficient is based on open-pit mines without gas disasters and is estimated as half of that from low gas mines of state-owned key coal mines. The lack of methane emissions and disaster-related data should be taken into account when modeling the environmental impacts, particularly global warming potential. For impact assessment purposes, it is also advised to update the emission factors with more recent data if available.

## Review details
Inventory: The internal review was done by several iteration steps concerning raw data validation, raw data documentation, representativity, completeness and consistency of modelling with regard to ISO 14040 and 14044.
