# Brick production ; permeable brick ; Base blending process

Dataset: ILCD process, Unit process, single operation
Geography: JNA-SD-CN
Reference year: 2018
Classification: Materials production / Other mineralic materials
Functional unit: The functional unit is the area of 1 m2 brick products.
Generated by: Wang xiangjin, r99rt4@163.com
Owner: Tiangong LCI Data Working Group
Review: Dependent internal review by Tiangong LCI Data Working Group
Amounts: no units in this file; such an amount is in the reference unit of its flow, which a separate flow dataset defines
licenseType: Free of charge for all users and uses

## General comment
The permeable bricks produced are primarily used for paving outdoor spaces, including sidewalks, plazas, and other areas requiring high water permeability to support effective drainage and reduce runoff. They serve as a functional and environmentally-friendly paving option for urban infrastructure and green building projects.

## Reference product
- brickbat aggregate: 104; measured
  Basic mix

## Inputs
All rows: measured
- Rolling gravel: 76.54
- Water reducer: 0.309
- portland cement: 20.99
- Water (fresh water): 6.17
- electricity mix: 0.49248

## Outputs
- particles (PM10): 7.5e-5; measured

## Deviations from the LCI method approaches
ReCiPe midpoint (H) model is applied in this study.

## Data selection and combination
本研究从济南顺德水泥制品有限公司收集了混凝土路面砖和透水砖的生产能耗以及各种原材料、能源投入和废气排放的相关数据。济南顺德水泥制品有限公司 山东省。

## Sampling procedure
Most data of raw materials, energy input and waste discharge were collected from the site investigation of manufacturer. Water reducer is also called water reducing agent, whose chemical constituents is the sodium salt of the sulfonate formaldehyde condensation

## Use advice
When utilizing the LCA data of concrete pavement brick and permeable brick, it's critical to analyze the entire lifecycle of the product, including raw material extraction, production, usage, and disposal phases. Special attention should be given to the inclusion or exclusion of the energy consumed during the production process and subsequent emissions. It is also important to ensure that the base blending process is accurately represented in the assessment. When applying the ReCiPe midpoint (H) model, users must strictly adhere to the functional unit of 1 m2 brick products to maintain consistency in comparative assessments. Sensitivity analysis should consider a 5% variation in inputs and outputs based on changes in key processes.

## Review details
Inventory: The internal review was done by several iteration steps concerning raw data validation, raw data documentation, representativity, completeness and consistency of modelling with regard to ISO 14040 and 14044.

## Data sources
- Yuan, X. et al. Environmental and economic impacts assessment of concrete pavement brick and permeable brick production process - A case study in China. Journal of Cleaner Production 171, 198–208 (2018).
