# Repairwelding|Metalproductsrepairparts,generalequipmentrepairparts,specialequipmentrepairpartsweldingparts|Replacementparts,steel(includingplates,components,etc.),aluminum(includingplates,components,etc.),aluminumalloy(includingplates,components,etc.)|Dismantling,cleaning,welding,installation,inspectiontest|All sizes / 修理焊接|金属制品修理件、通用设备修理件、专用设备修理件焊接件|更换备件、钢材（含板材、构件等）、铝材（含板材、构件等）、铝合金（含板材、构件等）|拆除、清洗、焊接、安装、检测试验|所有规模

Dataset: ILCD process, Partly terminated system
Geography: CN
Reference year: 2019
Classification: Materials production / Other mineralic materials
Generated by: The data was created by the Office of the Second National Pollution Source Census of the Ministry of Ecology and Environment, and the data was organized by the TianGong Plan team for ILCD format / 生态环境部第二次全国污染源普查工作办公室创建数据，天工计划团队常慧敏整理数据为ILCD格式
Amounts: no units in this file; such an amount is in the reference unit of its flow, which a separate flow dataset defines
copyright: false

## Technology and included processes
the Technical of end-of-pipe management technology for pollution Petroleum-related wasteisAnaerobic hydrolysis + bio-contact oxidation process，Its Technical efficiency of end-of-pipe management80，The formula for calculating the actual operation rate (k-value) of the end-of-pipe treatment facility is k = 1
污染物指标石油类的末端治理技术是厌氧水解类+生物接触氧化法，其效率为80，末端治理设施实际运行率（k值）计算公式为k=污水治理设施运行时间（小时）/正常生产时间（小时）

## Reference product
- Metal Parts: 1000; calculated
  原文件中描述污染物类别为Product，污染物指标为金属制品修理件、通用设备修理件、专用设备修理件焊接件，此处对其进行了匹配工作，将其匹配到LCAflow库里面相最符合的流

## Outputs
- Waste water: 19.7; calculated
  原文件中描述污染物类别为废水，污染物指标为工业废水量，此处对其进行了匹配工作，将其匹配到LCAflow库里面相最符合的流
- chemical oxygen demand: 0.355, 0.2485, 0.2485, 0.0355, 0.213, 0.213, 0.1065, 0.1065, 0.1065, 0.1065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 (27 entries); calculated
  原文件中描述污染物类别为废水，污染物指标为化学需氧量，此处对其进行了匹配工作，将其匹配到LCAflow库里面相最符合的流
- Petroleum-related waste: 0.0632, 0.04424, 0.04424, 0.00632, 0.03792, 0.0316, 0.0316, 0.01896, 0.01896, 0.01896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 (29 entries); calculated
  原文件中描述污染物类别为废水，污染物指标为石油类，此处对其进行了匹配工作，将其匹配到LCAflow库里面相最符合的流

## Data sources
- 第二次全国污染源普查产排污核算系数手册（试用版）,二级代码431-434文件，在完整版文件中第1027页
