# coal mining ; lifting out of the mine ; storage of coal

Dataset: ILCD process, Unit process, single operation
Geography: CN
Reference year: 2005
Classification: Unit processes / Energy carriers and technologies / Energetic raw materials
Generated by: Linlin Yin, yinlinlin0623@163.com
Owner: Tiangong LCI Data Working Group
Review: Dependent internal review by Tiangong LCI Data Working Group
Amounts: no units in this file; such an amount is in the reference unit of its flow, which a separate flow dataset defines
licenseType: Free of charge for all users and uses

## General comment
The post-mine active gas emission refers to the amount of gas discharged during storage, transportation and stacking after the coal is lifted out of the mine, that is, the gas content remaining in the coal.

## Geography
The post-mine active gas emission refers to the amount of gas discharged during storage, transportation and stacking after the coal is lifted out of the mine, that is, the gas content remaining in the coal. Our country has conducted a special study on the residual gas content of coal in high gas and outburst mines. The residual gas content of coal with different metamorphic degrees is different.

## Technology and included processes
Post-mine activity gas emission : The amount of gas discharged during storage, transportation, and stacking after the coal is lifted out of the mine.

## Technical purpose
This dataset describes the emissions associated with coal mining post-extraction activities, including the storage, transportation, and stacking of coal. It can be applied to assess the environmental impact in lifecycle assessments for products where coal is used as a primary source of energy or as a material for various applications such as electricity generation, steel production, and as a reduction agent in metallurgical processes.

## Reference product
- Hard coal, at consumer EU-27: 2.09121e10; uniform; measured
  Emission factor, gas emissions from post-mine activities refer to the amount of gas emitted during the storage, transportation, and stacking processes after the coal is lifted out of the mine, that is, the gas content remaining in the coal. Our country has conducted special research on the residual gas content of coal with high gas and outburst mines. The residual gas content of coal with different degrees of metamorphosis varies. For low gas and open-pit mines, 0.5m3/t is 0.5*10^-3m3/kg.

## Inputs
- Hard coal, at consumer EU-27: 2.09121e10; uniform; estimated
  The literature does not explain the amount of coal input. Assume : the amount of coal input : output = 1 : 1.

## Outputs
- methane (fossil): 2.09121e7; uniform; calculated
  The gas emission of post-mine active coal in Jincheng City was 20.91Mm3 (million cubic meters) in 1994 (the result of gas emission coefficient 1m3/t * coal production 20.9121Mt); the original text does not distinguish the flow of bio and fossil, and it is judged by experts to be fossil.

## Use advice
When utilizing this dataset for lifecycle assessment, users should take into account the specific characteristics of the coal being assessed, such as its gas content and the degree of metamorphism, as these factors can significantly affect the emission factors. It is important to ensure that the geographic and technological scope of the study reflects the conditions of the mines assessed. Additionally, when applying this data to lifecycle models, the inclusion or exclusion of subsequent coal usage (e.g., combustion or chemical processing) should be clearly defined to avoid double counting of emissions.

## Review details
Inventory: The internal review was done by several iteration steps concerning raw data validation, raw data documentation, representativity, completeness and consistency of modelling with regard to ISO 14040 and 14044.

## Data sources
- 程建军. 煤矿瓦斯排放现状及利用. 煤矿开采 24–26 (2007).
