# Lithium Carbonate Production ; Battery Grade Lithium Carbonate ; Precipitation ; Concentrated Brine, Atacama Salt Lake, Chile

Dataset: ILCD process, Unit process, single operation
Geography: CL
Reference year: 2018
Classification: Unit processes / Materials production / Inorganic chemicals
Generated by: Sun Xin, xs389@cornell.edu
Owner: Tiangong LCI Data Working Group
Review: Dependent internal review by Tiangong LCI Data Working Group
Amounts: no units in this file; such an amount is in the reference unit of its flow, which a separate flow dataset defines
licenseType: Free of charge for all users and uses

## General comment
Lithium has historically been produced from subterranean brines in the Andean mountain region of Chile in the area known as the “Lithium Triangle,” which also includes parts of Bolivia and Argentina. There are also several other lithium-rich brine locations throughout the world, and each brine has a unique chemical composition, which necessitates different processes for isolating the desired end products (Wietelmann and Steinbild, 2014). This LCA considers the brines in the Atacama Desert of Chile, known as the Salar de Atacama. The brines are concentrated, processed into battery grade Li2CO3 and LiOH•H2O, and shipped worldwide for processing into battery cathode materials and, eventually, batteries.

## Technology and included processes
At the Salar de Atacama operation, there are two separate pathways: lithium and potash separation. The lithium pathway has two flows of potassium into the potash pathway, while the potash pathway has no flows back to the lithium pathway. Because potash is a coproduct of the overall system, we need to allocate the energy consumed in the production of potash into our modeling. While we largely focus on the specifics of the lithium production pathway, we also track the flow of potassium chloride (KCl) to the potash pathways. We also need to allocate energy and water associated with the various site operations not specific to either lithium or potash production that were detailed by the lithium producer. After the brine is pumped to the surface, it flows through several ponds before final dispatch as lithium chloride brine with a lithium concentration of ~6%. The extracted brine is managed in the pond system for approximately one year while water is successively evaporated and lithium is concentrated. In the process, various salts are extracted from the ponds, which facilitates the removal of impurities from the brine and further increases the lithium concentration. The final brine is shipped for conversion to Li2CO3. We tracked the flow of LiCl brine and KCl, the value products for this system. Proprietary information from the producer specifies the quantity of KCl associated with the flows. In addition to the flow of KCl as a valuable coproduct, there are losses of lithium, along with water and other minerals in the system, to system infiltration (i.e., the flow of brine back into the earth). Lithium is also stored within the system in the form of brine, harvested salt, and impregnated salts. We obtained data for the input and output flows for 2018 for each pond, allowing process -level analysis of this LCA effort

## Technical purpose
This dataset describes the production of battery-grade lithium carbonate, primarily through the precipitation method using concentrated brine from the Atacama Salt Lake in Chile. The lithium carbonate produced is mainly used in the manufacture of lithium-ion batteries, which are essential components for electric vehicles, portable electronics, and energy storage systems.

## Reference product
- Lithium carbonate,Lithium carbonate: 1000; measured

## Inputs
All rows: measured
- Concentrated brine (6% Li): 4000
- sodium carbonate: 2000
- hydrogen chloride: 40
- Sulfuric acid: 20
- Calcium Oxide: 10
- Extraction agent,extractant: 5
- Ethanol: 5
- Electricity: 1500
- Diesel: 400
- Natural gas, at consumer EU-27: 2800

## Outputs
- particles (PM10): 0.7; measured
- particles (PM2.5): 0.4; measured

## Use advice
When using this dataset for life cycle assessment, please note that it does not include the production processes for raw materials or the energy flows that account for less than 1% of the total process. Users should consider these exclusions in their assessment and, if necessary, supplement the data with information on the production of raw materials and minor energy flows. Careful attention should be given to the methodological boundaries of the dataset to ensure consistency with the goal and scope of the intended LCA study.

## Review details
Inventory: The internal review was done by several iteration steps concerning raw data validation, raw data documentation, representativity, completeness and consistency of modelling with regard to ISO 14040 and 14044.

## Data sources
- Kelly, J. C., Wang, M., Dai, Q. & Winjobi, O. Energy, greenhouse gas, and water life cycle analysis of lithium carbonate and lithium hydroxide monohydrate from brine and ore resources and their use in lithium ion battery cathodes and lithium ion batteries. Resources, Conservation and Recycling 174, 105762 (2021).
