# Purified exhaust gas ; Soil in situ remediation ; In situ bioventing ; Exhaust gas treatment

Dataset: ILCD process, Unit process, single operation
Geography: CN
Reference year: 2022
Classification: Unit processes / Other Services / Repair and maintenance
Generated by: Yang Xintong, yangxt@caep.org.cn
Owner: Tiangong LCI Data Working Group
Review: Dependent internal review by Tiangong LCI Data Working Group
Amounts: no units in this file; such an amount is in the reference unit of its flow, which a separate flow dataset defines
copyright: false
licenseType: Free of charge for all users and uses

## General comment
Using activated carbon tanks for exhaust gas absorption, the purified exhaust gas is absorbed and discharged into the atmosphere.

## Time period
Article submission time

## Technical purpose
The process described by this data set involves using activated carbon tanks to absorb exhaust gases, typically in an industrial setting. Once purified, the cleaned exhaust gases are released into the atmosphere. It's a part of a broader soil in situ remediation process, specifically bioventing, which utilizes natural biological processes to degrade harmful pollutants in the soil. This type of exhaust gas treatment system is usually employed in environmental remediation projects, where the purification of contaminants is necessary before the exhaust can be safely emitted.

## Reference product
- Purified exhaust gas (produced by thermal desorption of 1 m3 soil): 1; measured

## Inputs
All rows: measured
- Exhaust gas: 1
- natural gas,natural gas: 15600
- Electricity: 864000
- Diesel,Diesel: 0.708, 0.698 (2 entries)
- Tap Water: 414

## Use advice
Users of this dataset should ensure that they apply the data within the correct context of soil remediation and exhaust purification by activated carbon absorption. Since the process pertains to environmental procedures, it's paramount to integrate the data following local environmental regulations and standards. Considerations should be made for the capture efficiency and saturation point of activated carbon tanks, and emissions should be monitored to guarantee they meet emission standards post-treatment. The dataset may not be appropriate for scenarios with different contaminants or processes that don't align with bioventing remediation practices.

## Review details
Inventory: The internal review was done by several iteration steps concerning raw data validation, raw data documentation, representativity, completeness and consistency of modelling with regard to ISO 14040 and 14044.

## Data sources
- 刘文晓等.基于修复效果的污染土壤修复工程环境足迹分析[J].环境科学研究 35,2367-2377（2022）.
