# Solar grade multi-Si ingot casting ; Multi-Si ingot ; Melt, solidification and anneal

Dataset: ILCD process, Unit process, single operation
Geography: CN
Reference year: 2017
Classification: Energy carriers and technologies / Other non-renewable fuels
Functional unit: In this paper, a 1 kWp solar PV system consisting of five 200 Wmodules made of 54 multi-Si cells, each with a size of 156*156 mm2 and 16% efficiency, was used as the primary study object
LCI method principle: Attributional
LCI method approaches: Allocation
Generated by: Jinfeng Yang, yjfzfshn@163.com
Owner: Tiangong LCI Data Working Group
Review: Dependent internal review by Tiangong LCI Data Working Group
Amounts: no units in this file; such an amount is in the reference unit of its flow, which a separate flow dataset defines
copyright: false
licenseType: Free of charge for all users and uses

## General comment
Multi-Si

## Geography
Environmental effects of China's solar photovoltaic industry during2011e2016: A life cycle assessment approach

## Time period
Available online

## Technology and included processes
After the melt, solidifi-cation and anneal of solar grade multi-Si in quartz crucible, the ingot will be produced

## Technical purpose
The solar grade multi-Si ingot casting process described is used for the manufacturing of multi-crystalline silicon (multi-Si) cells, which are a primary component in the construction of solar photovoltaic (PV) modules. These modules are then assembled to create solar PV systems capable of converting solar energy into electricity. In this specific case, the ingots are utilized to produce cells for a 1 kWp solar PV system, comprised of five 200 W modules with each module containing 54 multi-Si cells measuring 156*156 mm2 with an efficiency of 16%. The process is relevant for the solar energy industry, specifically in the context of the life cycle environmental impact assessment of the Chinese solar photovoltaic industry between 2011 and 2016.

## Reference product
- Multi-Si ingot: 5.6014; article inperiodical
  multi-Si ingot (Multi-Si ingot)

## Inputs
All rows: article inperiodical
- Solar grade multi-Si: 5.6519
- electricity: 199.968
  Electricity
- argon: 10.752
  Argon
- fluorine: 0.2599
  hydrofluoric acid (49%)
- sodium hydroxide: 0.0482
  Sodium hydroxide

## Outputs
- hydrogen fluoride: 0.0056; article inperiodical
  Hydrogen fluoride

## Deviations from the LCI method approaches
Building on the existing literature on LCA of China's solar PVsystem (Fu et al., 2015; He, 2013; Hong et al., 2016; Li and Yu, 2014; Li and Chang, 2012; Liang, 2012; Yang et al., 2015; Yu et al., 2017; Xie et al., 2015), the LCI is obtained for this study.

## Use advice
When utilizing the life cycle inventory (LCI) data derived from this study, users should ensure that the specific processes captured reflect the environmental effects associated with the production of multi-Si ingots for solar application within the Chinese context from 2011 to 2016, as documented in the referenced literature. Consideration should be given to technological changes that may have occurred post-2016, which might alter the impact assessment outcomes. It is essential to account for methodological assumptions such as the inclusion or exclusion of recycling processes and the modelling of specific use-phase behaviors in the system under study. Users should also verify the consistency of the data with any updated national or international standards and regulations relevant to solar PV system manufacturing.

## Review details
Inventory: The internal review was done by several iteration steps concerning raw data validation, raw data documentation, representativity, completeness and consistency of modelling with regard to ISO 14040 and 14044.

## Data sources
- Xu, L., Zhang, S., Yang, M., Li, W. & Xu, J. Environmental effects of China’s solar photovoltaic industry during 2011–2016: A life cycle assessment approach. Journal of Cleaner Production 170, 310–329 (2018).
