# Frozen dumplings ; Wheat flour, stuffing ; Filling processing + automatic filling ; greater than or equal to30000 t/a; NESPS2 / 速冻饺子 ; 小麦粉、馅料 ; 馅料加工+自动包陷 ; 大于等于30000吨/年 ; 全国第二次污染普查数据

Dataset: ILCD process, Unit process, single operation
Geography: CN
Reference year: 2019
Classification: Reference Parameters / Materials production / Food and renewable raw materials
Generated by: The data was created by the Office of the Second National Pollution Source Census of the Ministry of Ecology and Environment, and the data was organized by the TianGong Plan team for ILCD format / 生态环境部第二次全国污染源普查工作办公室创建数据，天工计划团队常慧敏整理数据为ILCD格式
Owner: Tiangong LCI Data Working Group / 天工LCI数据工作小组
Review: Dependent internal review by Tiangong LCI Data Working Group / 天工LCI数据工作小组
Amounts: no units in this file; such an amount is in the reference unit of its flow, which a separate flow dataset defines
copyright: false
licenseType: Free of charge for all users and uses

## General comment
the Technical of end-of-pipe management technology for pollution chemical oxygen demandisPhysical treatment + A/O + bio-contact oxidation process，Its Technical efficiency of end-of-pipe management94.55

## Technical purpose
该工业流程描述的是大规模生产速冻饺子，特别侧重于馅料加工和自动包陷，其生产能力大于或等于每年30,000吨。该过程使用食品工业的高产量制造技术，包括小麦粉和馅料的准备。还指定了用于处理不同类型污染物（化学需氧量、氨氮、有机结合氮、总磷、石油相关废物和废水）的各种末端处理技术的有效性，表明这些处理在食品加工设施中的应用，以最小化环境影响。

## Reference product
- Quick-Frozen Dumpling: 1000; calculated
  源文件中描述为为速冻饺子，此处对其进行了匹配工作，将其匹配到LCAflow库里面相最符合的流，污染物指标备注为化学需氧量

## Outputs
All rows: calculated
- phosphorus, total: 0.00072632
  the Technical of end-of-pipe management technology for pollution phosphorus, totalisPhysical treatment + aerobic biological treatment，Its Technical efficiency of end-of-pipe management72
  污染物指标总磷的末端治理技术是物理处理法+好氧生物处理法，其效率为72，末端治理设施实际运行率（k值）计算公式为k=污水处理设施年耗电量（千瓦时）/(总额定功率(千瓦)×年运行时间(小时)。原文件中描述污染物类别为废水，污染物指标为总磷，此处对其进行了匹配工作，将其匹配到LCAflow库里面相最符合的流，污染物指标备注为总磷
- Nitrogen, organic bound: 0.00074728
  the Technical of end-of-pipe management technology for pollution Nitrogen, organic boundisPhysical treatment + aerobic biological treatment，Its Technical efficiency of end-of-pipe management98
  污染物指标总氮的末端治理技术是物理处理法+好氧生物处理法，其效率为98，末端治理设施实际运行率（k值）计算公式为k=污水处理设施年耗电量（千瓦时）/(总额定功率(千瓦)×年运行时间(小时)。原文件中描述污染物类别为废水，污染物指标为总氮，此处对其进行了匹配工作，将其匹配到LCAflow库里面相最符合的流，污染物指标备注为总氮
- Petroleum-related waste: 0.000882176
  the Technical of end-of-pipe management technology for pollution Petroleum-related wasteisPhysical treatment + aerobic biological treatment，Its Technical efficiency of end-of-pipe management83.33
  污染物指标石油类的末端治理技术是物理处理法+好氧生物处理法，其效率为83.33，末端治理设施实际运行率（k值）计算公式为k=污水处理设施年耗电量（千瓦时）/(总额定功率(千瓦)×年运行时间(小时)。原文件中描述污染物类别为废水，污染物指标为石油类，此处对其进行了匹配工作，将其匹配到LCAflow库里面相最符合的流，污染物指标备注为石油类
- phosphorus, total: 0.000892336
  the Technical of end-of-pipe management technology for pollution phosphorus, totalisPhysical treatment + A/O + bio-contact oxidation process，Its Technical efficiency of end-of-pipe management65.6
  污染物指标总磷的末端治理技术是物理处理法+A/0+生物接触氧化法，其效率为65.6，末端治理设施实际运行率（k值）计算公式为k=污水处理设施年耗电量（千瓦时）/(总额定功率(千瓦)×年运行时间(小时)。原文件中描述污染物类别为废水，污染物指标为总磷，此处对其进行了匹配工作，将其匹配到LCAflow库里面相最符合的流，污染物指标备注为总磷
- Ammonia Nitrogen: 0.00109428
  the Technical of end-of-pipe management technology for pollution Ammonia NitrogenisPhysical treatment + aerobic biological treatment，Its Technical efficiency of end-of-pipe management95.16
  污染物指标氨氮的末端治理技术是物理处理法+好氧生物处理法，其效率为95.16，末端治理设施实际运行率（k值）计算公式为k=污水处理设施年耗电量（千瓦时）/(总额定功率(千瓦)×年运行时间(小时)。原文件中描述污染物类别为废水，污染物指标为氨氮，此处对其进行了匹配工作，将其匹配到LCAflow库里面相最符合的流，污染物指标备注为氨氮
- Petroleum-related waste: 0.00137645
  the Technical of end-of-pipe management technology for pollution Petroleum-related wasteisPhysical treatment + A/O + bio-contact oxidation process，Its Technical efficiency of end-of-pipe management73.99
  污染物指标石油类的末端治理技术是物理处理法+A/0+生物接触氧化法，其效率为73.99，末端治理设施实际运行率（k值）计算公式为k=污水处理设施年耗电量（千瓦时）/(总额定功率(千瓦)×年运行时间(小时)。原文件中描述污染物类别为废水，污染物指标为石油类，此处对其进行了匹配工作，将其匹配到LCAflow库里面相最符合的流，污染物指标备注为石油类
- Nitrogen, organic bound: 0.00156182
  the Technical of end-of-pipe management technology for pollution Nitrogen, organic boundisPhysical treatment + A/O + bio-contact oxidation process，Its Technical efficiency of end-of-pipe management95.82
  污染物指标总氮的末端治理技术是物理处理法+A/0+生物接触氧化法，其效率为95.82，末端治理设施实际运行率（k值）计算公式为k=污水处理设施年耗电量（千瓦时）/(总额定功率(千瓦)×年运行时间(小时)。原文件中描述污染物类别为废水，污染物指标为总氮，此处对其进行了匹配工作，将其匹配到LCAflow库里面相最符合的流，污染物指标备注为总氮
- Ammonia Nitrogen: 0.00182229
  the Technical of end-of-pipe management technology for pollution Ammonia NitrogenisPhysical treatment + A/O + bio-contact oxidation process，Its Technical efficiency of end-of-pipe management91.94
  污染物指标氨氮的末端治理技术是物理处理法+A/0+生物接触氧化法，其效率为91.94，末端治理设施实际运行率（k值）计算公式为k=污水处理设施年耗电量（千瓦时）/(总额定功率(千瓦)×年运行时间(小时)。原文件中描述污染物类别为废水，污染物指标为氨氮，此处对其进行了匹配工作，将其匹配到LCAflow库里面相最符合的流，污染物指标备注为氨氮
- Waste water: 3386
  the Technical of end-of-pipe management technology for pollution Waste wateris/，Its Technical efficiency of end-of-pipe management0
  污染物指标工业废水量的末端治理技术是/，其效率为0。原文件中描述污染物类别为废水，污染物指标为工业废水量，此处对其进行了匹配工作，将其匹配到LCAflow库里面相最符合的流，污染物指标备注为工业废水量
- chemical oxygen demand: 0.0704323
  the Technical of end-of-pipe management technology for pollution chemical oxygen demandisPhysical treatment + aerobic biological treatment，Its Technical efficiency of end-of-pipe management96.34
  污染物指标化学需氧量的末端治理技术是物理处理法+好氧生物处理法，其效率为96.34，末端治理设施实际运行率（k值）计算公式为k=污水处理设施年耗电量（千瓦时）/(总额定功率(千瓦)×年运行时间(小时)。原文件中描述污染物类别为废水，污染物指标为化学需氧量，此处对其进行了匹配工作，将其匹配到LCAflow库里面相最符合的流，污染物指标备注为化学需氧量
- chemical oxygen demand: 0.104879
  the Technical of end-of-pipe management technology for pollution chemical oxygen demandisPhysical treatment + A/O + bio-contact oxidation process，Its Technical efficiency of end-of-pipe management94.55
  污染物指标化学需氧量的末端治理技术是物理处理法+A/0+生物接触氧化法，其效率为94.55，末端治理设施实际运行率（k值）计算公式为k=污水处理设施年耗电量（千瓦时）/(总额定功率(千瓦)×年运行时间(小时)。原文件中描述污染物类别为废水，污染物指标为化学需氧量，此处对其进行了匹配工作，将其匹配到LCAflow库里面相最符合的流，污染物指标备注为化学需氧量

## Use advice
This dataset is derived from the Pollution Source Census Report and contains information on pollution emissions and related products. However, it does not include data on energy or chemical consumption, nor does it provide information on waste or co-product generation. When utilizing this dataset, please supplement the missing data based on actual conditions before use
该数据集来源于污染源普查报告，包含污染物排放及相关产品信息，但不包含能源或化学品消耗数据，也不提供废弃物或共生产物产生信息。在使用该数据集时，请根据实际情况补充缺失数据后再使用。

## Review details
Inventory: The internal review was done by several iteration steps concerning raw data validation, raw data documentation, representativity, completeness and consistency of modelling with regard to ISO 14040 and 14044.
清单： 内部审查通过几个迭代步骤完成，涉及原始数据验证、原始数据记录、代表性、完整性、与 ISO 14040 和 14044 有关的建模的一致性。

## Data sources
- 第二次全国污染源普查产排污核算系数手册（试用版）,二级代码14,四级代码1431文件，在完整版文件中第3413页
