# Bearing manufacture ; Pitch Bearing (Three) of a 1.5 MW wind turbine

Dataset: ILCD process, Unit process, single operation
Geography: NMG-CN
Reference year: 2017
Classification: Unit processes / Systems / Other machines
Functional unit: The functional unit is 1.5 MW wind turbine
LCI method principle: Attributional
LCI method approaches: Allocation
Generated by: Yunzhi Zhao, ll10088@163.com
Owner: Tiangong LCI Data Working Group
Review: Dependent internal review by Tiangong LCI Data Working Group
Amounts: no units in this file; such an amount is in the reference unit of its flow, which a separate flow dataset defines
copyright: false
licenseType: Free of charge for all users and uses

## General comment
The bearings manufactured are specifically designed for use in the pitch systems of 1.5 MW wind turbines. These pitch bearings help in adjusting the angle of the blades to optimize the wind turbine's performance and are an essential component for the operation of wind farms, particularly those located in the high-wind-power-capacity province of Inner Mongolia.

## Geography
The data regarding the parameters of wind power has been collected from Wang (2012). A wind farm equipped with 33 domestic 1.5 megawatts (MW) wind turbines is regarded as a case study to analyze the environmental impact and its substitution effects. The wind farm is located in the northeast of Inner Mongolia, the province in which most of China’s wind power is installed (Xia and Song, 2017).

## Reference product
- Rotors pitch bearing of wind turbine: 3; estimated

## Inputs
- iron: 3600; calculated
  Steel and iron

## Deviations from the LCI method approaches
The life cycle inventory for wind power is illustrated as follows. The production and manufacturing stage include the production of wind turbines, substations, and cables, which consume a large amount of energy and emit pollutants (Xue et al., 2015).

## Use advice
When utilizing this data set, it is necessary to consider the full life cycle inventory of wind power, which encompasses the production of wind turbines and related sub-systems such as substations and cables. The environmental impacts of energy consumption and pollutant emissions during the manufacturing phase need to be assessed. Additionally, the substitution effects of wind power in comparison to conventional energy sources should be analyzed. The findings from Wang (2012) and Xue et al. (2015) should be integrated into the life cycle assessment, specifically focusing on the production and environmental footprint of the 1.5 MW wind turbine and its subsystems, such as the pitch bearings examined in this study.

## Review details
Inventory: The internal review was done by several iteration steps concerning raw data validation, raw data documentation, representativity, completeness and consistency of modelling with regard to ISO 14040 and 14044.

## Data sources
- Li, H., Jiang, H.-D., Dong, K.-Y., Wei, Y.-M. & Liao, H. A comparative analysis of the life cycle environmental emissions from wind and coal power: Evidence from China. Journal of Cleaner Production 248, 119192 (2020).
