# Dry distillation ; Coal gas ; Coal ; Coal retorting ; All sizes; NESPS2 / 干馏 ; 煤制气 ; 煤炭 ; 煤炭干馏 ; 所有规模 ; 全国第二次污染普查数据

Dataset: ILCD process, Unit process, single operation
Geography: CN
Reference year: 2019
Classification: Reference Parameters / Energy carriers and technologies / Hard coal based fuels
Generated by: The data was created by the Office of the Second National Pollution Source Census of the Ministry of Ecology and Environment, and the data was organized by the TianGong Plan team for ILCD format / 生态环境部第二次全国污染源普查工作办公室创建数据，天工计划团队常慧敏整理数据为ILCD格式
Owner: Tiangong LCI Data Working Group / 天工LCI数据工作小组
Review: Dependent internal review by Tiangong LCI Data Working Group / 天工LCI数据工作小组
Amounts: no units in this file; such an amount is in the reference unit of its flow, which a separate flow dataset defines
copyright: false
licenseType: Free of charge for all users and uses

## General comment
the Technical of end-of-pipe management technology for pollution Exhaust gasisDirect discharge，The formula for calculating the actual operation rate (k-value) of the end-of-pipe treatment facility is k = equipment operating time (hours) / total production time (hours)

## Technical purpose
该数据集描述了适用于所有规模的煤炭干馏工艺，用于生产煤气。提到的末端治理技术用于控制该过程中的颗粒物（PM2.5 - PM10）、二氧化硫和氮氧化物排放。袋式过滤器的效率为97％，用于颗粒物处理，而二氧化硫使用石灰石/石膏法、石灰/石膏法、氨法和双碱法管理，效率范围为84％至92％。氮氧化物通过选择性催化还原（SCR）进行处理，效率为85％。这些污染控制技术对于最小化环境影响和符合工业排放标准至关重要。

## Reference product
- Coal Gasification: 10000; calculated
  源文件中描述为为煤制气，此处对其进行了匹配工作，将其匹配到LCAflow库里面相最符合的流

## Outputs
All rows: calculated
- volatile organic compound: 1.28
  the Technical of end-of-pipe management technology for pollution volatile organic compoundisDirect discharge
  污染物指标挥发性有机物的末端治理技术是直排。原文件中描述污染物类别为废气，污染物指标为挥发性有机物，此处对其进行了匹配工作，将其匹配到LCAflow库里面相最符合的流
- sulfur dioxide: 2.032
  the Technical of end-of-pipe management technology for pollution sulfur dioxideisLime/gypsum method，Its Technical efficiency of end-of-pipe management92，The formula for calculating the actual operation rate (k-value) of the end-of-pipe treatment facility is /
  污染物指标二氧化硫的末端治理技术是石灰/石膏法，其效率为92，末端治理设施实际运行率（k值）计算公式为k=除尘设备耗电量（千瓦时/年）/（除尘设备额定功率（千瓦）×除尘设备运行时间（小时/年））。原文件中描述污染物类别为废气，污染物指标为二氧化硫，此处对其进行了匹配工作，将其匹配到LCAflow库里面相最符合的流
- sulfur dioxide: 2.032
  the Technical of end-of-pipe management technology for pollution sulfur dioxideisLimestone/gypsum method，Its Technical efficiency of end-of-pipe management92
  污染物指标二氧化硫的末端治理技术是石灰石/石膏法，其效率为92，末端治理设施实际运行率（k值）计算公式为k=除尘设备耗电量（千瓦时/年）/（除尘设备额定功率（千瓦）×除尘设备运行时间（小时/年））。原文件中描述污染物类别为废气，污染物指标为二氧化硫，此处对其进行了匹配工作，将其匹配到LCAflow库里面相最符合的流
- sulfur dioxide: 2.286
  the Technical of end-of-pipe management technology for pollution sulfur dioxideisAmmonia method，Its Technical efficiency of end-of-pipe management91，The formula for calculating the actual operation rate (k-value) of the end-of-pipe treatment facility is /
  污染物指标二氧化硫的末端治理技术是氨法，其效率为91，末端治理设施实际运行率（k值）计算公式为k=除尘设备耗电量（千瓦时/年）/（除尘设备额定功率（千瓦）×除尘设备运行时间（小时/年））。原文件中描述污染物类别为废气，污染物指标为二氧化硫，此处对其进行了匹配工作，将其匹配到LCAflow库里面相最符合的流
- sulfur dioxide: 4.064
  the Technical of end-of-pipe management technology for pollution sulfur dioxideisDouble alkali process，Its Technical efficiency of end-of-pipe management84
  污染物指标二氧化硫的末端治理技术是双碱法，其效率为84，末端治理设施实际运行率（k值）计算公式为k=除尘设备耗电量（千瓦时/年）/（除尘设备额定功率（千瓦）×除尘设备运行时间（小时/年））。原文件中描述污染物类别为废气，污染物指标为二氧化硫，此处对其进行了匹配工作，将其匹配到LCAflow库里面相最符合的流
- Nitrogen oxides: 7.11
  the Technical of end-of-pipe management technology for pollution Nitrogen oxidesisSCR，Its Technical efficiency of end-of-pipe management85
  污染物指标氮氧化物的末端治理技术是选择性催化还原法（SCR），其效率为85，末端治理设施实际运行率（k值）计算公式为k=除尘设备耗电量（千瓦时/年）/（除尘设备额定功率（千瓦）×除尘设备运行时间（小时/年））。原文件中描述污染物类别为废气，污染物指标为氮氧化物，此处对其进行了匹配工作，将其匹配到LCAflow库里面相最符合的流
- particles (PM2.5 - PM10): 13.08
  the Technical of end-of-pipe management technology for pollution particles (PM2.5 - PM10)isBag filter，Its Technical efficiency of end-of-pipe management97，The formula for calculating the actual operation rate (k-value) of the end-of-pipe treatment facility is k = equipment operating time (hours) / total production time (hours)
  污染物指标颗粒物的末端治理技术是袋式除尘，其效率为97，末端治理设施实际运行率（k值）计算公式为k=除尘设备耗电量（千瓦时/年）/（除尘设备额定功率（千瓦）×除尘设备运行时间（小时/年））。原文件中描述污染物类别为废气，污染物指标为颗粒物，此处对其进行了匹配工作，将其匹配到LCAflow库里面相最符合的流
- sulfur dioxide: 25.4
  the Technical of end-of-pipe management technology for pollution sulfur dioxideisDirect discharge，The formula for calculating the actual operation rate (k-value) of the end-of-pipe treatment facility is k = activated carbon consumption (tons) / standard activated carbon consumption (tons)
  污染物指标二氧化硫的末端治理技术是直排。原文件中描述污染物类别为废气，污染物指标为二氧化硫，此处对其进行了匹配工作，将其匹配到LCAflow库里面相最符合的流
- Nitrogen oxides: 47.4
  the Technical of end-of-pipe management technology for pollution Nitrogen oxidesisDirect discharge
  污染物指标氮氧化物的末端治理技术是直排。原文件中描述污染物类别为废气，污染物指标为氮氧化物，此处对其进行了匹配工作，将其匹配到LCAflow库里面相最符合的流
- particles (PM2.5 - PM10): 436
  the Technical of end-of-pipe management technology for pollution particles (PM2.5 - PM10)isDirect discharge，The formula for calculating the actual operation rate (k-value) of the end-of-pipe treatment facility is k = equipment operating time (hours) / total production time (hours)
  污染物指标颗粒物的末端治理技术是直排。原文件中描述污染物类别为废气，污染物指标为颗粒物，此处对其进行了匹配工作，将其匹配到LCAflow库里面相最符合的流
- Exhaust gas: 70500
  the Technical of end-of-pipe management technology for pollution Exhaust gasisDirect discharge，The formula for calculating the actual operation rate (k-value) of the end-of-pipe treatment facility is k = equipment operating time (hours) / total production time (hours)
  污染物指标工业废气量的末端治理技术是直排。原文件中描述污染物类别为废气，污染物指标为工业废气量，此处对其进行了匹配工作，将其匹配到LCAflow库里面相最符合的流

## Use advice
This dataset is derived from the Pollution Source Census Report and contains information on pollution emissions and related products. However, it does not include data on energy or chemical consumption, nor does it provide information on waste or co-product generation. When utilizing this dataset, please supplement the missing data based on actual conditions before use
该数据集来源于污染源普查报告，包含污染物排放及相关产品信息，但不包含能源或化学品消耗数据，也不提供废弃物或共生产物产生信息。在使用该数据集时，请根据实际情况补充缺失数据后再使用。

## Review details
Inventory: The internal review was done by several iteration steps concerning raw data validation, raw data documentation, representativity, completeness and consistency of modelling with regard to ISO 14040 and 14044.
清单： 内部审查通过几个迭代步骤完成，涉及原始数据验证、原始数据记录、代表性、完整性、与 ISO 14040 和 14044 有关的建模的一致性。

## Data sources
- 第二次全国污染源普查产排污核算系数手册（试用版）,二级代码45,四级代码4513文件，在完整版文件中第2493页
