# Mining ; Gold Ore ; Gold ore ; Pit mining ; All sizes; NESPS2 / 采矿 ; 金矿石 ; 金矿 ; 坑采 ; 所有规模 ; 全国第二次污染普查数据

Dataset: ILCD process, Unit process, single operation
Geography: CN
Reference year: 2019
Classification: Reference Parameters / Materials production / Non-energetic raw materials
Generated by: The data was created by the Office of the Second National Pollution Source Census of the Ministry of Ecology and Environment, and the data was organized by the TianGong Plan team for ILCD format / 生态环境部第二次全国污染源普查工作办公室创建数据，天工计划团队常慧敏整理数据为ILCD格式
Owner: Tiangong LCI Data Working Group / 天工LCI数据工作小组
Review: Dependent internal review by Tiangong LCI Data Working Group / 天工LCI数据工作小组
Amounts: no units in this file; such an amount is in the reference unit of its flow, which a separate flow dataset defines
copyright: false
licenseType: Free of charge for all users and uses

## General comment
the Technical of end-of-pipe management technology for pollution Exhaust gasis/

## Technical purpose
所描述的工业过程涉及从各种规模的金矿坑中开采金矿石，采用尾端治理技术来控制污染。这些技术专门用于处理废水并管理化学需氧量、氨氮及包括汞、镉、铅、砷、铬在内的各种重金属。采用化学混凝和沉淀分离技术来处理污染物，不同污染物处理效率各异。此外，还有用于处理废气和颗粒物质（PM2.5 - PM10）的技术。

## Reference product
- Gold Ore: 1000; calculated
  源文件中描述为为金矿石，此处对其进行了匹配工作，将其匹配到LCAflow库里面相最符合的流，污染物指标备注为工业废水量

## Outputs
All rows: calculated
- Mercury: 1.104e-8
  the Technical of end-of-pipe management technology for pollution MercuryisChemical coagulation，Its Technical efficiency of end-of-pipe management88
  污染物指标汞的末端治理技术是化学混凝法，其效率为88，末端治理设施实际运行率（k值）计算公式为k=废水治理设施运行时间（小时/年）/企业年正常生产时间（小时/年）。原文件中描述污染物类别为废水，污染物指标为汞，此处对其进行了匹配工作，将其匹配到LCAflow库里面相最符合的流，污染物指标备注为汞
- Mercury: 5.98e-8
  the Technical of end-of-pipe management technology for pollution MercuryisPrecipitation separation，Its Technical efficiency of end-of-pipe management35
  污染物指标汞的末端治理技术是沉淀分离，其效率为35，末端治理设施实际运行率（k值）计算公式为k=废水治理设施运行时间（小时/年）/企业年正常生产时间（小时/年）。原文件中描述污染物类别为废水，污染物指标为汞，此处对其进行了匹配工作，将其匹配到LCAflow库里面相最符合的流，污染物指标备注为汞
- Chromium: 7.56e-8
  the Technical of end-of-pipe management technology for pollution ChromiumisChemical coagulation，Its Technical efficiency of end-of-pipe management88
  污染物指标铬的末端治理技术是化学混凝法，其效率为88，末端治理设施实际运行率（k值）计算公式为k=废水治理设施运行时间（小时/年）/企业年正常生产时间（小时/年）。原文件中描述污染物类别为废水，污染物指标为铬，此处对其进行了匹配工作，将其匹配到LCAflow库里面相最符合的流，污染物指标备注为铬
- cadmium: 2.76e-7
  the Technical of end-of-pipe management technology for pollution cadmiumisChemical coagulation，Its Technical efficiency of end-of-pipe management88
  污染物指标镉的末端治理技术是化学混凝法，其效率为88，末端治理设施实际运行率（k值）计算公式为k=废水治理设施运行时间（小时/年）/企业年正常生产时间（小时/年）。原文件中描述污染物类别为废水，污染物指标为镉，此处对其进行了匹配工作，将其匹配到LCAflow库里面相最符合的流，污染物指标备注为镉
- lead: 3.6e-7
  the Technical of end-of-pipe management technology for pollution leadisChemical coagulation，Its Technical efficiency of end-of-pipe management88
  污染物指标铅的末端治理技术是化学混凝法，其效率为88，末端治理设施实际运行率（k值）计算公式为k=废水治理设施运行时间（小时/年）/企业年正常生产时间（小时/年）。原文件中描述污染物类别为废水，污染物指标为铅，此处对其进行了匹配工作，将其匹配到LCAflow库里面相最符合的流，污染物指标备注为铅
- Chromium: 4.095e-7
  the Technical of end-of-pipe management technology for pollution ChromiumisPrecipitation separation，Its Technical efficiency of end-of-pipe management35
  污染物指标铬的末端治理技术是沉淀分离，其效率为35，末端治理设施实际运行率（k值）计算公式为k=废水治理设施运行时间（小时/年）/企业年正常生产时间（小时/年）。原文件中描述污染物类别为废水，污染物指标为铬，此处对其进行了匹配工作，将其匹配到LCAflow库里面相最符合的流，污染物指标备注为铬
- arsenic: 7.32e-7
  the Technical of end-of-pipe management technology for pollution arsenicisChemical coagulation，Its Technical efficiency of end-of-pipe management88
  污染物指标砷的末端治理技术是化学混凝法，其效率为88，末端治理设施实际运行率（k值）计算公式为k=废水治理设施运行时间（小时/年）/企业年正常生产时间（小时/年）。原文件中描述污染物类别为废水，污染物指标为砷，此处对其进行了匹配工作，将其匹配到LCAflow库里面相最符合的流，污染物指标备注为砷
- cadmium: 1.495e-6
  the Technical of end-of-pipe management technology for pollution cadmiumisPrecipitation separation，Its Technical efficiency of end-of-pipe management35
  污染物指标镉的末端治理技术是沉淀分离，其效率为35，末端治理设施实际运行率（k值）计算公式为k=废水治理设施运行时间（小时/年）/企业年正常生产时间（小时/年）。原文件中描述污染物类别为废水，污染物指标为镉，此处对其进行了匹配工作，将其匹配到LCAflow库里面相最符合的流，污染物指标备注为镉
- lead: 1.95e-6
  the Technical of end-of-pipe management technology for pollution leadisPrecipitation separation，Its Technical efficiency of end-of-pipe management35
  污染物指标铅的末端治理技术是沉淀分离，其效率为35，末端治理设施实际运行率（k值）计算公式为k=废水治理设施运行时间（小时/年）/企业年正常生产时间（小时/年）。原文件中描述污染物类别为废水，污染物指标为铅，此处对其进行了匹配工作，将其匹配到LCAflow库里面相最符合的流，污染物指标备注为铅
- arsenic: 3.965e-6
  the Technical of end-of-pipe management technology for pollution arsenicisPrecipitation separation，Its Technical efficiency of end-of-pipe management35
  污染物指标砷的末端治理技术是沉淀分离，其效率为35，末端治理设施实际运行率（k值）计算公式为k=废水治理设施运行时间（小时/年）/企业年正常生产时间（小时/年）。原文件中描述污染物类别为废水，污染物指标为砷，此处对其进行了匹配工作，将其匹配到LCAflow库里面相最符合的流，污染物指标备注为砷
- particles (PM2.5 - PM10): 0.016
  the Technical of end-of-pipe management technology for pollution particles (PM2.5 - PM10)is/
  污染物指标颗粒物的末端治理技术是/，末端治理设施实际运行率（k值）计算公式为/。原文件中描述污染物类别为废气，污染物指标为颗粒物，此处对其进行了匹配工作，将其匹配到LCAflow库里面相最符合的流，污染物指标备注为颗粒物
- Ammonia Nitrogen: 2.56e-5
  the Technical of end-of-pipe management technology for pollution Ammonia NitrogenisChemical coagulation，Its Technical efficiency of end-of-pipe management20
  污染物指标氨氮的末端治理技术是化学混凝法，其效率为20，末端治理设施实际运行率（k值）计算公式为k=废水治理设施运行时间（小时/年）/企业年正常生产时间（小时/年）。原文件中描述污染物类别为废水，污染物指标为氨氮，此处对其进行了匹配工作，将其匹配到LCAflow库里面相最符合的流，污染物指标备注为氨氮
- Ammonia Nitrogen: 2.88e-5
  the Technical of end-of-pipe management technology for pollution Ammonia NitrogenisPrecipitation separation，Its Technical efficiency of end-of-pipe management10
  污染物指标氨氮的末端治理技术是沉淀分离，其效率为10，末端治理设施实际运行率（k值）计算公式为k=废水治理设施运行时间（小时/年）/企业年正常生产时间（小时/年）。原文件中描述污染物类别为废水，污染物指标为氨氮，此处对其进行了匹配工作，将其匹配到LCAflow库里面相最符合的流，污染物指标备注为氨氮
- Waste water: 850
  the Technical of end-of-pipe management technology for pollution Waste wateris/
  污染物指标工业废水量的末端治理技术是/，末端治理设施实际运行率（k值）计算公式为k=废水治理设施运行时间（小时/年）/企业年正常生产时间（小时/年）。原文件中描述污染物类别为废水，污染物指标为工业废水量，此处对其进行了匹配工作，将其匹配到LCAflow库里面相最符合的流，污染物指标备注为工业废水量
- chemical oxygen demand: 0.003885
  the Technical of end-of-pipe management technology for pollution chemical oxygen demandisChemical coagulation，Its Technical efficiency of end-of-pipe management70
  污染物指标化学需氧量的末端治理技术是化学混凝法，其效率为70，末端治理设施实际运行率（k值）计算公式为k=废水治理设施运行时间（小时/年）/企业年正常生产时间（小时/年）。原文件中描述污染物类别为废水，污染物指标为化学需氧量，此处对其进行了匹配工作，将其匹配到LCAflow库里面相最符合的流，污染物指标备注为化学需氧量
- chemical oxygen demand: 0.009065
  the Technical of end-of-pipe management technology for pollution chemical oxygen demandisPrecipitation separation，Its Technical efficiency of end-of-pipe management30
  污染物指标化学需氧量的末端治理技术是沉淀分离，其效率为30，末端治理设施实际运行率（k值）计算公式为k=废水治理设施运行时间（小时/年）/企业年正常生产时间（小时/年）。原文件中描述污染物类别为废水，污染物指标为化学需氧量，此处对其进行了匹配工作，将其匹配到LCAflow库里面相最符合的流，污染物指标备注为化学需氧量
- Exhaust gas: 7057
  the Technical of end-of-pipe management technology for pollution Exhaust gasis/
  污染物指标工业废气量的末端治理技术是/，末端治理设施实际运行率（k值）计算公式为/。原文件中描述污染物类别为废气，污染物指标为工业废气量，此处对其进行了匹配工作，将其匹配到LCAflow库里面相最符合的流，污染物指标备注为工业废气量

## Use advice
This dataset is derived from the Pollution Source Census Report and contains information on pollution emissions and related products. However, it does not include data on energy or chemical consumption, nor does it provide information on waste or co-product generation. When utilizing this dataset, please supplement the missing data based on actual conditions before use
该数据集来源于污染源普查报告，包含污染物排放及相关产品信息，但不包含能源或化学品消耗数据，也不提供废弃物或共生产物产生信息。在使用该数据集时，请根据实际情况补充缺失数据后再使用。

## Review details
Inventory: The internal review was done by several iteration steps concerning raw data validation, raw data documentation, representativity, completeness and consistency of modelling with regard to ISO 14040 and 14044.
清单： 内部审查通过几个迭代步骤完成，涉及原始数据验证、原始数据记录、代表性、完整性、与 ISO 14040 和 14044 有关的建模的一致性。

## Data sources
- 第二次全国污染源普查产排污核算系数手册（试用版）,二级代码09,四级代码0921文件，在完整版文件中第3413页
