# Beneficiation ; Cerium Fluorocarbon Concentrate ; Cerium fluorocarbon ore ; Grinding-flotation ; All sizes; NESPS2 / 选矿 ; 氟碳铈精矿 ; 氟炭铈矿石 ; 磨浮 ; 所有规模 ; 全国第二次污染普查数据

Dataset: ILCD process, Unit process, single operation
Geography: CN
Reference year: 2019
Classification: Reference Parameters / Materials production / Other mineralic materials
Generated by: The data was created by the Office of the Second National Pollution Source Census of the Ministry of Ecology and Environment, and the data was organized by the TianGong Plan team for ILCD format / 生态环境部第二次全国污染源普查工作办公室创建数据，天工计划团队常慧敏整理数据为ILCD格式
Owner: Tiangong LCI Data Working Group / 天工LCI数据工作小组
Review: Dependent internal review by Tiangong LCI Data Working Group / 天工LCI数据工作小组
Amounts: no units in this file; such an amount is in the reference unit of its flow, which a separate flow dataset defines
copyright: false
licenseType: Free of charge for all users and uses

## General comment
the Technical of end-of-pipe management technology for pollution Exhaust gasis/

## Technical purpose
氟碳铈精矿的选矿过程包括氟碳铈矿石的破碎和磨碎，接着是浮选过程，以将有价矿物从脉石中分离出来。这种加工材料对于需要铈的应用至关重要，比如用于玻璃、陶瓷、催化剂的制造，以及用于抛光复合材料。所使用的末端污染物管理技术，包括氧化还原过程和化学混凝方法，旨在处理废水，降低化学需氧量，并将氨氮、有机氮、总磷、铅、砷和镉等污染物去除至允许水平。此外，袋式过滤器用于捕获排放气体中的颗粒物（PM2.5 - PM10），确保排放符合环境标准。

## Reference product
- bastnasite: 1000; input; calculated
  源文件中描述为为氟炭铈矿石，此处对其进行了匹配工作，将其匹配到LCAflow库里面相最符合的流，污染物指标备注为工业废水量

## Outputs
All rows: calculated
- cadmium: 6e-7
  the Technical of end-of-pipe management technology for pollution cadmiumisRedox process + chemical coagulation method，Its Technical efficiency of end-of-pipe management90
  污染物指标镉的末端治理技术是氧化还原法+化学混凝法，其效率为90，末端治理设施实际运行率（k值）计算公式为k=废水治理设施年运行时间（小时/年）/企业年正常生产时间（小时/年）。原文件中描述污染物类别为废水，污染物指标为镉，此处对其进行了匹配工作，将其匹配到LCAflow库里面相最符合的流，污染物指标备注为镉
- lead: 1.8e-6
  the Technical of end-of-pipe management technology for pollution leadisRedox process + chemical coagulation method，Its Technical efficiency of end-of-pipe management90
  污染物指标铅的末端治理技术是氧化还原法+化学混凝法，其效率为90，末端治理设施实际运行率（k值）计算公式为k=废水治理设施年运行时间（小时/年）/企业年正常生产时间（小时/年）。原文件中描述污染物类别为废水，污染物指标为铅，此处对其进行了匹配工作，将其匹配到LCAflow库里面相最符合的流，污染物指标备注为铅
- arsenic: 1.9e-6
  the Technical of end-of-pipe management technology for pollution arsenicisRedox process + chemical coagulation method，Its Technical efficiency of end-of-pipe management90
  污染物指标砷的末端治理技术是氧化还原法+化学混凝法，其效率为90，末端治理设施实际运行率（k值）计算公式为k=废水治理设施年运行时间（小时/年）/企业年正常生产时间（小时/年）。原文件中描述污染物类别为废水，污染物指标为砷，此处对其进行了匹配工作，将其匹配到LCAflow库里面相最符合的流，污染物指标备注为砷
- particles (PM2.5 - PM10): 0.01709
  the Technical of end-of-pipe management technology for pollution particles (PM2.5 - PM10)isBag filter，Its Technical efficiency of end-of-pipe management99
  污染物指标颗粒物的末端治理技术是袋式除尘，其效率为99，末端治理设施实际运行率（k值）计算公式为k=废气治理设施年运行时间（小时/年）/企业年正常生产时间（小时/年）。原文件中描述污染物类别为废气，污染物指标为颗粒物，此处对其进行了匹配工作，将其匹配到LCAflow库里面相最符合的流，污染物指标备注为颗粒物
- phosphorus, total: 5.67e-5
  the Technical of end-of-pipe management technology for pollution phosphorus, totalisRedox process + chemical coagulation method，Its Technical efficiency of end-of-pipe management90
  污染物指标总磷的末端治理技术是氧化还原法+化学混凝法，其效率为90，末端治理设施实际运行率（k值）计算公式为k=废水治理设施年运行时间（小时/年）/企业年正常生产时间（小时/年）。原文件中描述污染物类别为废水，污染物指标为总磷，此处对其进行了匹配工作，将其匹配到LCAflow库里面相最符合的流，污染物指标备注为总磷
- Ammonia Nitrogen: 0.0028047
  the Technical of end-of-pipe management technology for pollution Ammonia NitrogenisRedox process + chemical coagulation method，Its Technical efficiency of end-of-pipe management90
  污染物指标氨氮的末端治理技术是氧化还原法+化学混凝法，其效率为90，末端治理设施实际运行率（k值）计算公式为k=废水治理设施年运行时间（小时/年）/企业年正常生产时间（小时/年）。原文件中描述污染物类别为废水，污染物指标为氨氮，此处对其进行了匹配工作，将其匹配到LCAflow库里面相最符合的流，污染物指标备注为氨氮
- Waste water: 3619
  the Technical of end-of-pipe management technology for pollution Waste waterisRedox process + chemical coagulation method
  污染物指标工业废水量的末端治理技术是氧化还原法+化学混凝法，末端治理设施实际运行率（k值）计算公式为k=废水治理设施年运行时间（小时/年）/企业年正常生产时间（小时/年）。原文件中描述污染物类别为废水，污染物指标为工业废水量，此处对其进行了匹配工作，将其匹配到LCAflow库里面相最符合的流，污染物指标备注为工业废水量
- Nitrogen, organic bound: 0.037636
  the Technical of end-of-pipe management technology for pollution Nitrogen, organic boundisRedox process + chemical coagulation method，Its Technical efficiency of end-of-pipe management60
  污染物指标总氮的末端治理技术是氧化还原法+化学混凝法，其效率为60，末端治理设施实际运行率（k值）计算公式为k=废水治理设施年运行时间（小时/年）/企业年正常生产时间（小时/年）。原文件中描述污染物类别为废水，污染物指标为总氮，此处对其进行了匹配工作，将其匹配到LCAflow库里面相最符合的流，污染物指标备注为总氮
- chemical oxygen demand: 0.0604373
  the Technical of end-of-pipe management technology for pollution chemical oxygen demandisRedox process + chemical coagulation method，Its Technical efficiency of end-of-pipe management90
  污染物指标化学需氧量的末端治理技术是氧化还原法+化学混凝法，其效率为90，末端治理设施实际运行率（k值）计算公式为k=废水治理设施年运行时间（小时/年）/企业年正常生产时间（小时/年）。原文件中描述污染物类别为废水，污染物指标为化学需氧量，此处对其进行了匹配工作，将其匹配到LCAflow库里面相最符合的流，污染物指标备注为化学需氧量
- Exhaust gas: 1223
  the Technical of end-of-pipe management technology for pollution Exhaust gasis/
  污染物指标工业废气量的末端治理技术是/，末端治理设施实际运行率（k值）计算公式为/。原文件中描述污染物类别为废气，污染物指标为工业废气量，此处对其进行了匹配工作，将其匹配到LCAflow库里面相最符合的流，污染物指标备注为工业废气量

## Use advice
This dataset is derived from the Pollution Source Census Report and contains information on pollution emissions and related products. However, it does not include data on energy or chemical consumption, nor does it provide information on waste or co-product generation. When utilizing this dataset, please supplement the missing data based on actual conditions before use
该数据集来源于污染源普查报告，包含污染物排放及相关产品信息，但不包含能源或化学品消耗数据，也不提供废弃物或共生产物产生信息。在使用该数据集时，请根据实际情况补充缺失数据后再使用。

## Review details
Inventory: The internal review was done by several iteration steps concerning raw data validation, raw data documentation, representativity, completeness and consistency of modelling with regard to ISO 14040 and 14044.
清单： 内部审查通过几个迭代步骤完成，涉及原始数据验证、原始数据记录、代表性、完整性、与 ISO 14040 和 14044 有关的建模的一致性。

## Data sources
- 第二次全国污染源普查产排污核算系数手册（试用版）,二级代码09,四级代码0932文件，在完整版文件中第3413页
