# Cobalt Sulfate Production ; Battery Grade Cobalt Sulfate ; Hydrometallurgy ; Nickel-Copper-Cobalt Ore in Xinjiang Province

Dataset: ILCD process, Unit process, single operation
Geography: XJ-CN
Reference year: 2020
Classification: Unit processes / Materials production / Inorganic chemicals
Generated by: Sun Xin, xs389@cornell.edu
Owner: Tiangong LCI Data Working Group
Review: Dependent internal review by Tiangong LCI Data Working Group
Amounts: no units in this file; such an amount is in the reference unit of its flow, which a separate flow dataset defines
licenseType: Free of charge for all users and uses

## General comment
This study used the actual operation data in the ore mining and beneficiation stages of an enterprise in Xinjiang, which is a major source of cobalt in China. Data of the cobalt concentration stage came from the experiment. Data on refining used the annual operating data from a cobalt refinery in Southeastern China in 2019. This company is one of China’s five largest cobalt refineries. The technology selected in this study is hydrometallurgical refining, which is consistent with all the five projects. This technology has been mentioned in many papers as an international mainstream cobalt refining technology. The Chinese process-based life cycle inventory database provides secondary data support to ensure consistency with China’s status quo . Production data for several chemicals are not available (e.g., Z-200, O-ethyl potassium carbonodithioate, carboxymethyl cellulose, butyl xanthate, butylamine aerofloat, P204, and P507).Therefore, the Ecoinvent database was used to bridge the missing data gap . China’s state quo (e.g., waste disposal, transportation, and energy) was used to adjust the European data to reduce the regionalized effect from Europe.

## Technology and included processes
The system boundary is described as all activities within the cobalt sulfate production process. “Cradle-to-gate” LCA research includes all relevant life cycle stages from ore mining to beneficiation, primary extraction, and refining processes. The selected mine site is a nickel–copper–cobalt mine with 0.04% cobalt content in Xinjiang Province, China. After cobalt ore was concentrated through the beneficiation process, the concentrate can reach a cobalt content level of 0.3%. The standard for cobalt concentrate (i.e., 9.69% cobalt content) can be achieved after screening three times with the flotation method. Cobalt concentrate will be made into various forms of refined cobalt products through the refining process. Cobalt refining adopts hydrometallurgy technology, which mainly contains ball milling, leaching, iron removal, P204 extraction, P507 extraction, back extraction, and evaporative crystallization processes.

## Technical purpose
This dataset represents the production of battery-grade cobalt sulfate, which is commonly used in the manufacture of lithium-ion batteries for various applications such as electric vehicles, portable electronics, and energy storage systems. The cobalt sulfate is produced through a hydrometallurgical process from nickel-copper-cobalt ore located in Xinjiang Province.

## Reference product
- Cobalt Sulfate: 1000; measured

## Inputs
All rows: measured
- industrial area: 22.23
- cobalt: 210
- transport in t*km: 1530.6
- sodium carbonate: 860
- Limestone: 50
- sodium hydroxide: 400
- Kerosene: 5.13
- Electricity: 41488.2
- Natural gas, at consumer EU-27: 71.11
- water: 104140
- Light fuel oil: 41.73
- steel rebar: 840
- Hard coal, at consumer EU-27: 2650
- to urban, discontinuously built: 1.32
- Isopropyl Ethyl Thionocarbamate: 2.57
- O-ethyl potassium carbonodithioate: 2.57
- Sodium hydrosulfide: 7.35
- Butylamine aerofloat: 8.75
- Sulfuric acid: 380
- hydrogen chloride: 1190
- Ammonia (28%): 7.6
- Ammonium bicarbonate: 240
- Calcium Oxide: 510
- Carboxymethyl cellulose: 10.3
- Butyl xanthate: 150
- Sodium Hydrosulphite: 110.91
- Sodium sulfide: 12.45
- Oxalic acid: 18.98
- Copper extractant: 1.01
- Disooctyl Phosphate (P204): 0.6
- 2-ethylhexyl hydrogen -2-ethylhexylphosphonate: 1.2

## Outputs
All rows: measured
- waste water - untreated: 14940
- municipal solid waste deposition: 4.39
- waste incineration of municipal solid waste (MSW): 1.06
- Suspended solids, unspecified: 0.04201
- chemical oxygen demand: 0.0733
- decane: 0.00413
- nickel: 0.00133
- arsenic: 0.00958
- mercury: 0.00029
- cobalt: 0.00038
- copper: 7e-5
- manganese: 0.00452
- zinc: 6e-5
- sulfide: 1e-5
- carbon dioxide (fossil): 71.66
- particles (PM10): 0.66
- sulfur dioxide: 0.00049
- nitrous oxide: 0.03939
- hydrogen chloride: 0.00167
- hydrogen sulfide: 5.42e-6

## Use advice
When using this data for life cycle assessment, special attention should be given to the regional specificity of the data as the process is based on ore extraction from Xinjiang Province. Users must consider the technological applicability of the process such as the hydrometallurgical method used, and ensure that it aligns with other processes within the system boundary. Inclusion or exclusion of recycling activities should be noted as well, particularly if secondary materials (recycled cobalt) are considered within the scope of the assessment.

## Review details
Inventory: The internal review was done by several iteration steps concerning raw data validation, raw data documentation, representativity, completeness and consistency of modelling with regard to ISO 14040 and 14044.

## Data sources
- Zhang, T. et al. Cradle-to-gate life cycle assessment of cobalt sulfate production derived from a nickel–copper–cobalt mine in China. Int J Life Cycle Assess 26, 1198–1210 (2021).
