# Pyrometallurgical technology for ternary lithium batteries

Dataset: ILCD process, Unit process, single operation
Geography: CN
Reference year: 2022
Classification: Unit processes / End-of-life treatment / Material recycling
Functional unit: Functional unit is a 12.717g used lithium battery
Generated by: Pengfei, pengfei24@email.ncu.edu.cn
Owner: Tiangong LCI Data Working Group
Review: Dependent internal review by Tiangong LCI Data Working Group
Amounts: no units in this file; such an amount is in the reference unit of its flow, which a separate flow dataset defines
copyright: false
licenseType: Free of charge for all users and uses

## General comment
Pyrometallurgical recycling only requires simple disassembly and discharge of the waste LIBs and direct hightemperature smelting. Cobalt, nickel, copper, and other metal alloys are obtained by adding slag forming agent and reducing agent, while aluminum, lithium, and other metal elements enter the slag.

## Technology and included processes
The organic binder is removed by calcination, the lithium iron phosphate powder is separated from the aluminum foil, and the lithium iron phosphate material is obtained, and then an appropriate amount of raw material is added to it to obtain the required molar ratio of lithium, iron and phosphorus, and a new lithium iron phosphate is synthesized by high temperature solid phase method.

## Technical purpose
The pyrometallurgical technology for ternary lithium batteries described in this dataset is used in the recycling of waste lithium-ion batteries (LIBs). The recycling process primarily allows for the recovery of valuable metals such as cobalt, nickel, and copper, which are typically found in ternary lithium batteries. These recycled metals are used for the production of new battery cells and other industrial applications where high-purity metal alloys are required.

## Reference product
- spent LIBs: 0.012717; input; measured
  Spent LIBs

## Inputs
All rows: measured
- sodium hydroxide: 2.92
- Coke powder: 1.1
- Limestone: 1
- Slag: 1
  Slagging agent
- Electricity: 24.012

## Outputs
All rows: measured
- particles (> PM10): 8.03e-5
- Fly ash: 4.38e-6
- sulphuric acid: 0.025
- hydrogen chloride: 0.0167
- sulfur dioxide: 2e-5
- Carbon dioxide (fossil): 2.03
  The original text does not distinguish between bio and fossil, and according to experts, it is fossil here
- Nickel and Cobalt Alloy: 3.69
  Nickel and cobalt alloy

## Use advice
This dataset is intended for life cycle assessment practitioners assessing the environmental impact of battery recycling processes. When using the data, ensure to consider the simplified disassembly and discharge stage of the waste lithium batteries prior to the high-temperature smelting process. Inclusion or exclusion of the energy and emissions associated with the smelting operation and the subsequent separation and refining of metals should be critically evaluated. It is also essential to account for the fate of metals like aluminum, lithium, and others that enter the slag, their potential environmental impacts, and any considerations for slag processing or disposal.

## Review details
Inventory: The internal review was done by several iteration steps concerning raw data validation, raw data documentation, representativity, completeness and consistency of modelling with regard to ISO 14040 and 14044.

## Data sources
- Lai, X. et al. Critical review of life cycle assessment of lithium-ion batteries for electric vehicles: A lifespan perspective. eTransportation 12, 100169 (2022).
