# Molten iron production;Molten iron;BF(Z08)

Dataset: ILCD process, Unit process, single operation
Geography: CN
Reference year: 1998
Classification: Materials production / Metals and semimetals
Generated by: Fuxiang, 1162850692@qq.com
Owner: Tiangong LCI Data Working Group
Review: Dependent internal review by Tiangong LCI Data Working Group
Amounts: no units in this file; such an amount is in the reference unit of its flow, which a separate flow dataset defines
copyright: false
licenseType: Free of charge for all users and uses

## General comment
来自表 4-16 Z08 钢厂生产吨材环境负荷编目表

## Time period
论文提到钢铁企业环境总体数据为1998年的吨钢环境基础数据。

## Technical purpose
The technical application for this industrial process is the production of molten iron using a blast furnace, which is a critical preliminary step in steelmaking. This high-temperature process involves reducing iron ore into molten iron (pig iron) and forms the basis for the mass production of various steel products.

## Reference product
- Molten Iron: 1061; measured
  molten iron

## Inputs
All rows: measured
- Energy, geothermal, converted: 15068.8
- water: 33556
- Sinter: 1869
- Metallurgical ash: 57.2
  Metallurgical white ash
- coke,Coke: 635.5
  Coke

## Outputs
All rows: measured
- Dust (unspecified, from stack): 0.095
  soot
- Dust (unspecified, from stack): 1.856
- sulfur dioxide: 0.013
- cyanide: 5.9e-5
- phenol: 3.2e-5
  Volatile phenol
- Hydrocarbons, aliphatic, alkanes, unspecified: 0.013652
  Petro
- Suspended solids, unspecified: 0.263149
- chemical oxygen demand: 0.14262
- Dust (unspecified, from stack): 49.612
  dust collection
- Spoil (deposited, hibernating in ground, non elementary flow): 658.032

## Use advice
Users of this data should consider the technological specificity of the data, which pertains to the blast furnace (BF) method identified with the code Z08, as reported in the environmental load inventory for the production of steel in 1998. This data might not be representative of current or alternative iron and steel production technologies. Users should assess whether adjustments are needed to apply this data to contemporary or different technological contexts or when modeling the environmental impacts of steel production processes.

## Review details
Inventory: The internal review was done by several iteration steps concerning raw data validation, raw data documentation, representativity, completeness and consistency of modelling with regard to ISO 14040 and 14044.

## Data sources
- 周和敏. 钢铁材料生产过程环境协调性评价研究. (北京工业大学, 2001).
