# waste polyethylene recycling; the recycled polyethylene; mechanical recycling ; waste polyethylene

Dataset: ILCD process, Unit process, black box
Geography: TJ-CN
Reference year: 2016
Valid until: 2016
Classification: Unit processes / End-of-life treatment / Material recycling
Functional unit: 1 ton of waste polyethylene
Generated by: Xiaoyu Cheng, xiaoyucheng@email.ncu.edu.cn
Owner: Tiangong LCI Data Working Group
Review: Dependent internal review by Tiangong LCI Data Working Group
Amounts: no units in this file; such an amount is in the reference unit of its flow, which a separate flow dataset defines
copyright: false
licenseType: Free of charge for all users and uses

## General comment
After calibration, the respective process data in 2016 were selected to assess the environmental impacts of mechanical recycling of waste plastics.

## Geography
The ZEDA is located in southwest of Tianjin, which is the largest renewable resource processing industrial park in China.

## Time period
The literature only states that it was in 2016.

## Technical purpose
The recycled polyethylene obtained from mechanical recycling of waste polyethylene is used in various applications, such as manufacturing of plastic lumber, containers, and new packaging materials. Focusing on the mechanical recycling process ensures that the polyethylene maintains suitable properties for these applications, supporting the circular economy through material recovery.

## Reference product
- Waste Polyethylene: 1000; input; measured

## Inputs
- Water for industrial use: 388; measured
- Electricity: 920.52; measured
- natural gas; 44.1 MJ/kg: 54.3; measured

## Outputs
All rows: measured
- particles (>PM10): 0.52
- non-methane volatile organic compounds: 0.26
- Suspended solids, unspecified,Suspended solids, unspecified: 0.01089
- chemical oxygen demand: 0.08536
- biological oxygen demand: 0.01334
- Ammonia Nitrogen: 0.00427
- Phosphorus: 0.00031
- Oils, unspecified: 0.0002
- waste water - untreated: 286
- General Solid Waste: 78.02
- Hazardous Solid Waste: 4.21
- Recycled Polyethylene Granules: 917

## Data selection and combination
In 2016, the recycled plastics production was 327 kilotons, covering all major categories of plastics.

## Data treatment and extrapolations
calibration

## Use advice
When using the dataset from the ZEDA mechanical recycling process of waste polyethylene, take note that the data is specific to processes in 2016. Calibration should be considered if applying the data to other time periods. Environmental impact assessments should include all major plastic categories reported in this dataset. It is advised to consider the technological advancements and possible changes in material properties over time when utilizing this data for future projections.

## Review details
Inventory: The internal review was done by several iteration steps concerning raw data validation, raw data documentation, representativity, completeness and consistency of modelling with regard to ISO 14040 and 14044.

## Data sources
- Chen, Y. et al. Life cycle assessment of end-of-life treatments of waste plastics in China. Resources, Conservation and Recycling 146, 348–357 (2019).
