# Eggplant production in solar greenhouse ; Agricultural Inputs Production (General)

Dataset: ILCD process, Unit process, single operation
Geography: HD-HEB-CN
Reference year: 2002
Valid until: 2017
Classification: Materials production / Agricultural production means
Functional unit: 1T eggplant
Generated by: Haoran Zhang, hrzhang@whu.edu.cn
Owner: Tiangong LCI Data Working Group
Review: Dependent internal review by Tiangong LCI Data Working Group
Amounts: no units in this file; such an amount is in the reference unit of its flow, which a separate flow dataset defines
copyright: false
licenseType: Free of charge for all users and uses

## General comment
The solar greenhouse used in the experiment is an arch type with a length of 60 m and a width of 7 m. In the greenhouse, a variety of vegetables were rotated (two crops a year). In this study, eggplant seeds grew from March to August every year, and the experiment was carried out for the period of 4 years (2013 to 2016). Three treatment modes were set up in the experiment: (1) Conventional mode: the traditional greenhouse management mode of local farmers was adopted, mainly chemical fertilizer was applied, and a small amount of organic fertilizer was applied. ② Comprehensive mode: the amount of organic fertilizer and chemical fertilizer applied is 50% of the amount applied in organic and conventional mode, respectively. The biological control method is mainly used for disease and pest control, and low-toxicity and low-residue chemical pesticides are used for treatment in severe cases. (3) Organic mode: According to the production standards of organic vegetables, only organic fertilizers (compost and chicken manure) are applied, and chemical fertilizers and pesticides are not used. Agricultural measures and physical control of pests and diseases are mainly used (such as using yellow board to lure and kill, insect control nets, etc.). The nitrogen application amount of the integrated and organic models was the same as that of the normal scale model, and the irrigation conditions of each treatment were consistent. The irrigation method was large flood irrigation (Table 1).

## Geography
Qu Zhou

## Time period
The long-term positioning experiment for greenhouse vegetables started in March 2002.

## Technology and included processes
The experiment used a 60 m long and 7 m wide arched greenhouse for the cultivation of various vegetables in rotation (two crops per year). The study focused on the growth of eggplants from March to August each year, conducting a 4-year experiment from 2013 to 2016. Three treatments were applied: conventional, integrated, and organic.

## Technical purpose
This dataset focuses on the application of different treatment methods (conventional, integrated, and organic) in greenhouse vegetable production with an emphasis on eggplant growth. The arched greenhouse, which is 60 m in length and 7 m in width, facilitates the rotation of various vegetable crops twice a year, particularly nurturing eggplants from March to August over a 4-year period. Such data can inform agricultural best practices and sustainability assessments for both the local Chinese context and broader regions engaged in similar production techniques.

## Reference product
- eggplant: 1000; calculated
  comprehensive

## Inputs
- Electricity: 633.58; calculated
  comprehensive
- water: 0.9177; calculated
  comprehensive

## Outputs
All rows: calculated
- Hydrocarbons, aliphatic, alkanes, unspecified: 0.0055
  comprehensive
- carbon monoxide: 0.0221
  comprehensive
- carbon dioxide (fossil): 46.82
  comprehensive
- ammonium: 0.0418
  comprehensive
- nitrous oxide: 0.0008
  comprehensive
- Nitrogen oxides: 0.1826
  comprehensive
- sulfide: 0.1472
  comprehensive
- methane: 0.0226
  comprehensive
- phosphorus, total: 0.0045
  comprehensive
- Ammonia (NH4+, NH3, as N): 0.0789
  comprehensive
- chemical oxygen demand: 0.4015
  comprehensive
- cadmium: 3.98e-8
  comprehensive
- lead-210: 6.21e-7
  comprehensive
- copper: 3.11e-7
  comprehensive
- zinc: 1.55e-6
  comprehensive

## Deviations from the LCI method approaches
Life cycle assessment includes the following 4 steps: goal definition and scope delineation, inventory analysis, impact assessment, and result interpretation. Brief descriptions of the main steps are given below.

## Data selection and combination
The inventory analysis includes the collection of data and quantitative processing of the data. In the agricultural input production subsystem, the pollutants produced by fertilizers, organic fertilizers, insecticides, mulching films, and diesel, etc., (including CO, CO2, NOx, SO2, CH4, N2O, and COD, etc.) and energy consumption are calculated referring to the research results of Liang Long [22].

## Data treatment and extrapolations
Nitrous oxide collection uses the static chamber method [19], and the measurement is conducted using the Agilent 7890A gas chromatograph. Soil nitrate nitrogen (NO3-N) and total phosphorus leaching are collected using a free-flow underground leaching collection device in agricultural fields, and after each irrigation, leachate is extracted using a pump within 3 to 5 days, and measured with a flow analyzer (TRAACS2000). The extraction of heavy metals (mainly considering Cu, Zn, Pb, and Cd) in organic fertilizers uses the nitric acid-hydrochloric acid-hydrofluoric acid digestion method, and the test liquid is measured by ICP-MS. When the crops are harvested, each harvest is weighed and recorded, taking the average of three times. Detailed measurement processes for each indicator are referenced in the literature [19].

## Use advice
When using this dataset for life cycle assessment, consider the system boundary as defined from cradle to farm gate. This includes agricultural input production, crop production, and transportation subsystems. Exclude the processes related to infrastructure construction, agricultural machinery production, vegetable consumption, and waste emissions. Pay attention to the methodological details provided for data collection and measurements, such as the static chamber method for nitrous oxide, free-flow leaching for soil nutrients, and ICP-MS for heavy metals in organic fertilizers. Ensure correct referencing of the research results from the provided literature for inventory analysis, specifically Liang Long [22] and [19] for detailed measurement processes.

## Review details
Inventory: The internal review was done by several iteration steps concerning raw data validation, raw data documentation, representativity, completeness and consistency of modelling with regard to ISO 14040 and 14044.

## Data sources
- 徐强,胡克林,李季等.华北平原不同生产模式设施蔬菜生命周期环境影响评价[J].环境科学,2018,39(05):2480-2488.
