# Rare Earth magnetic separation;Rare Earth;In-situ leaching;neodymium iron boron (NdFeB) magnet

Dataset: ILCD process, Unit process, single operation
Geography: NMG-CN
Reference year: 2014
Classification: Materials production / Non-energetic raw materials
Functional unit: The functional unit is a 1 kg NdFeB magnet
LCI method principle: Attributional
LCI method approaches: Allocation - market value; Allocation - mass
Generated by: Tao Wang, twang@iue.ac.cn
Owner: Tiangong LCI Data Working Group
Review: Dependent internal review by Tiangong LCI Data Working Group
Amounts: no units in this file; such an amount is in the reference unit of its flow, which a separate flow dataset defines
copyright: false
licenseType: Free of charge for all users and uses

## General comment
The rare earth magnetic separation and in-situ leaching processes described are utilized for the production of neodymium iron boron (NdFeB) magnets. These magnets are commonly used in various high-tech applications including in the manufacturing of electronic devices, wind turbines, electric vehicle motors, and other advanced technological equipment where strong permanent magnets are required.

## Geography
Bayan Obo (China)

## Technology and included processes
The basic process for Nd and Pr production is the same at all three deposits. It is identical for Nd and Pr except for the last solvent extraction step (SX5) where both are separated.

## Reference product
- Ore pulp: 724; article inperiodical
  Ore pulp. Bayan Obo: input for next process: Flotation

## Inputs
- Electricity: 0.3276; article inperiodical
  Bayan Obo: calculation based on Selection Guide for Process Equipment3

## Outputs
- Iron oxide: 265.6; article inperiodical
  Iron oxide. Bayan Obo: calculation based on ore concentration and yield
- Niobium oxide: 0.76; article inperiodical
  Niobium oxide. Bayan Obo: calculation based on ore concentration and yield
- tailings (unspecified): 158.7; article inperiodical
  Bayan Obo: estimated by experts from RWTH Aachen University

## Deviations from the LCI method approaches
In this study, an allocation method based on the market prices of REOs28 is considered. To estimate uncertainties that refer to the allocation method, a mass-based allocation is undertaken as a sensitivity analysis

## Use advice
When utilizing this life cycle assessment data for the production of NdFeB magnets, ensure to consider the allocation method based on market prices of rare earth oxides (REOs). Be aware that, for a comprehensive understanding of environmental impacts, a sensitivity analysis through mass-based allocation should also be carried out. This data set is specific to a functional unit of 1 kg NdFeB magnet, and any extrapolation should maintain equivalent ratios or be adjusted according to the actual weight of magnets being assessed.

## Review details
Inventory: The internal review was done by several iteration steps concerning raw data validation, raw data documentation, representativity, completeness and consistency of modelling with regard to ISO 14040 and 14044.

## Data sources
- Marx, J., Schreiber, A., Zapp, P. & Walachowicz, F. Comparative Life Cycle Assessment of NdFeB Permanent Magnet Production from Different Rare Earth Deposits. ACS Sustainable Chem. Eng. 6, 5858–5867 (2018).
