# Coking;Coke;Coking;CDQ(CWQ)

Dataset: ILCD process, Unit process, single operation
Geography: CN
Classification: Unit processes / Energy carriers and technologies / Hard coal based fuels
Generated by: Fuxiang, 1162850692@qq.com
Owner: Tiangong LCI Data Working Group
Review: Dependent internal review by Tiangong LCI Data Working Group
Amounts: no units in this file; such an amount is in the reference unit of its flow, which a separate flow dataset defines
copyright: false
licenseType: Free of charge for all users and uses

## General comment
The described process is used in the production of coke through coking and CDQ (Coke Dry Quenching) technology. This coke is primarily used as a reducing agent and energy source in blast furnaces (BF) during ironmaking, which precedes the basic oxygen furnace (BOF) steelmaking process. It is also used in Electric Arc Furnaces (EAF) for steel production at integrated steel plants.

## Geography
The data of the BF-BOF pathway were obtained from the large-scale integrated steel plants in China with an attached coking plant and EAF plant.

## Reference product
- coke,Coke: 342.6; measured
  Coke

## Inputs
All rows: measured
- freshwater,freshwater: 400
- Circulating water: 100
- process steam: 50.7
- compressed air: 3.5
- Coke oven gas: 7.4
  COG
- Blast furnace gas: 290.6
  BFG
- sulphuric acid: 2.9
- Cleaned coal: 384.2
  Clean coal
- Electricity: 43.2

## Outputs
- Coke oven gas: 152.6; measured
  COG
- tar: 13.8; measured
- sulfur: 0.4; measured
- benzene: 3.8; measured

## Use advice
When utilizing this data set, it is important to include emissions from coke production as part of the upstream process for iron and steel production. Modelers should ensure that the system boundaries include both the coking plant and EAF operations if assessing the entire steel production route. Differences in technology variations across different integrated plants should be considered, and region-specific emissions factors must be used when applying this data set to other locations.

## Review details
Inventory: The internal review was done by several iteration steps concerning raw data validation, raw data documentation, representativity, completeness and consistency of modelling with regard to ISO 14040 and 14044.

## Data sources
- The carbon reduction potential of hydrogen in the low carbon transition of the iron and steel industry: The case of China
