# Aluminum electrolysis ; Liquid primary aluminum ; Aluminum alloy wheel manufacturing process ; Alumina for metallurgy

Dataset: ILCD process, Unit process, single operation
Geography: CN
Reference year: 2018
Classification: Unit processes / Materials production / Metals and semimetals
Generated by: Chenling Fu, fu-chenling@tsinghua.edu.cn
Owner: Tiangong LCI Data Working Group
Review: Dependent internal review by Tiangong LCI Data Working Group
Amounts: no units in this file; such an amount is in the reference unit of its flow, which a separate flow dataset defines
copyright: false
licenseType: Free of charge for all users and uses

## General comment
电解铝 ; 铝合金轮毂制造工艺

## Time period
Date of Publication

## Technical purpose
The technical application of the data described pertains to the manufacturing process of aluminum alloy wheels. The primary aluminum obtained through the electrolysis of alumina is used in the production of aluminum alloy wheels, a key component in automotive manufacturing. The wheels produced are utilized for their strength-to-weight ratio, corrosion resistance, and aesthetic appeal in various types of vehicles.

## Reference product
- aluminium, primary, liquid: 55.5; missing unimportant

## Inputs
All rows: missing unimportant
- Carbon anode: 52.95
- aluminium oxide, metallurgical: 108.2
  Alumina
- cryolite: 0.66
  Cryolite
- aluminium fluoride: 0.93
  Aluminum fluoride
- Magnesium fluoride: 0.15
- other fluorides: 0.19
  Other fluorides

## Outputs
All rows: missing unimportant
- Nitrogen oxides: 3.69
- methane (fossil): 1.98
- hydrogen fluoride: 0.94
  HF
- carbon dioxide (fossil),carbon dioxide (fossil): 677.1
- carbon monoxide (fossil),carbon monoxide (fossil): 19.26
- sulfur dioxide: 4.17
- FC-14: 0.02
  CF4
- hexafluoroethane: 0.002
  C2F6
- particles, unspecified: 4.87

## Use advice
When utilizing this data set for Life Cycle Assessment (LCA), it is important to ensure that the boundaries of the aluminum alloy wheel manufacturing process are clearly defined, including electricity consumption and any potential emissions during the electrolysis phase. Attention should be given to the allocation of environmental impacts during the production, as well as the end-of-life recycling capabilities of the aluminum alloy wheels. Make sure to consider industry-specific usage patterns and technological applicability especially related to metallurgical grade alumina used in the electrolysis process.

## Review details
Inventory: The internal review was done by several iteration steps concerning raw data validation, raw data documentation, representativity, completeness and consistency of modelling with regard to ISO 14040 and 14044.

## Data sources
- Yi Qiu-ping & Tang Chang-ping. Environmental impact assessment of magnesium alloy automobile hub based on life cycle assessment. JOURNAL OF CENTRAL SOUTH UNIVERSITY 25, 1870–1878 (2018).
