# Large-scale pig farming

Dataset: ILCD process, Unit process, black box
Geography: HS-HEB-CN
Reference year: 2012
Classification: Unit processes / Materials production / Agricultural production means
Functional unit: The functional unit for the case is 1000 pigs so as to be affiliated with the EME results.
Generated by: Rui Yang, 1632707028@qq.com
Owner: Tiangong LCI Data Working Group
Review: Dependent internal review by Tiangong LCI Data Working Group
Amounts: no units in this file; such an amount is in the reference unit of its flow, which a separate flow dataset defines
copyright: false
licenseType: Free of charge for all users and uses

## General comment
The annual production of pigs in the farm is 100,000. It takes approximately six months to raise a pig from farrow to finish at a mean final weight of 100 kg. All pigs are raised in indoor barns and the pig farming includes the rearing of breeding and commercial pigs. The manure of pigs is pushed into a covered anaerobic lagoon for storage. In this study, the pig production process is divided into seven steps to find out the key points affecting the sustainability of the process based on the “life cycle thinking” (Fig. 1). It should be noted that the data of sows and boars on inputs and outputs are average to each commercial pig (Appendix A).

## Geography
This study takes an intensive pig farming system as the representative which locates on a large-scale farm (Jinlong Company) in Jing County , Hebei Province, China.

## Time period
All of the raw data are obtained by formal survey questionnaires from the farm manager and worker, on-site observations and measurements from the authors in 2012.

## Technology and included processes
This study takes an intensive pig farming system as the representative which locates on a large-scale farm (Jinlong Company) in Jing County (37580N, 115990E), Hebei Province, China. The annual production of pigs in the farm is 100,000. It takes approximately six months to raise a pig from farrow to finish at a mean final weight of 100 kg. All pigs are raised in indoor barns and the pig farming includes the rearing of breeding and commercial pigs. The manure of pigs is pushed into a covered anaerobic lagoon for storage. In this study, the pig production process is divided into seven steps to find out the key points affecting the sustainability of the process based on the “life cycle thinking” (Fig. 1). It should be noted that the data of sows and boars on inputs and outputs are average to each commercial pig (Appendix A). All of the raw data are obtained by formal survey questionnaires from the farm manager and worker, on-site observations and measurements from the authors in 2012.

## Technical purpose
This intensive pig farming system is primarily used for the large-scale production of pigs, both for breeding purposes and for commercial meat production. The process includes the rearing of pigs from birth to a final weight of approximately 100 kg over a span of six months. The operations are conducted indoors, which encompasses the management of breeding sows and boars, as well as commercial pigs. A notable feature is the handling of pig manure, which is stored in a covered anaerobic lagoon, indicating a potential integration of waste management within the pig farming process.

## Reference product
- pig: 2.08e6; measured
  pork

## Inputs
All rows: measured
- Water (rain water): 833
- ground water: 8670
- feed: 1820
  Concentrated feeds
- hard coal: 67.2
- Electricity: 6330
- Diesel: 7730
- steel rebar: 21.5
  The original text is steel, which cannot be matched.
- Glass (formed & finished): 33.2
- Wood: 51200

## Outputs
- manure: 189000; measured
  pig manure

## Deviations from the LCI method approaches
Life cycle impact assessment (LCIA) is the phase in which the results of the inventory analysis are further processed and interpreted in terms of environmental impacts and societal preferences (Khoshnevisan et al., 2014). In this study, the CML2001 (Guin et al., 2001) is selected and seven environmental impact categories related to pig farming closely are involved as follows: water depletion (WD), land use (LU), global warming potential (GWP), eutrophication potential (EP), acidification potential (AP), soil toxicity (ST) and malodors air (MA). Moreover, normalization step is necessary for comparison of the environmental profiles. The normalization factors of world per-capita environmental impact for the year 2000 (Sleeswijk et al., 2008) are involved to calculate the normalization results in this study.

## Data selection and combination
All of the raw data are obtained by formal survey questionnaires from the farm manager and worker, on-site observations and measurements from the authors in 2012. The data of emissions deriving from combustion of coal are from study (Liang, 2009). Those on the production of manure and the emissions of total nitrogen (TN), total phosphorus (TP), Cu and Zn from manure are from CAAS (Chinese academy of agricultural sciences) and MEP (Ministry of Environmental Protection) of China. The data on other metal pollutants such as Cd, Pb, As, Cr and Ni are obtained from Liu et al. (2005). The Data concerning air emissions (i.e., emission factors and coefficients) in the gastrointestinal fermentation of pig and manure management are obtained from IPCC (2006). Ammonia emissions due to the pig manure are estimated according to Liu et al. (2007). Data on the odor emissions from manure are obtained based on Zeng et al. (2003).

## Use advice
When utilizing this LCA dataset, data users must consider 'life cycle thinking' and focus on the sustainability of the pig production process. For accurate environmental impact assessments, it is important to account for all inputs and outputs associated with each production step, treating the system as a 'black box'. Data on sows and boars should be adjusted to represent average inputs and outputs per commercial pig, as specified in Appendix A. Moreover, users should also include emissions from coal combustion and manure management, which may involve pollutants such as nitrogen, phosphorus, metals, and also consider the impact of odors. For impact analysis, users should apply the CML2001 methodology and use normalization factors for appropriate environmental impact comparisons. Lastly, it is critical to note that data is farm-specific and may not be representative for all farming operations, additionally, the data was collected in 2012 and may not reflect current conditions.

## Review details
Inventory: The internal review was done by several iteration steps concerning raw data validation, raw data documentation, representativity, completeness and consistency of modelling with regard to ISO 14040 and 14044.

## Data sources
- Wang, X. et al. Sustainability evaluation of the large-scale pig farming system in North China: an emergy analysis based on life cycle assessment. Journal of Cleaner Production 102, 144–164 (2015).
