# Drilling Stage-Well drilling process

Dataset: ILCD process
Geography: SC-CN
Reference year: 2014
Valid until: 2016
Classification: Materials production / Other mineralic materials
Generated by: Pu Hong, 15695258655@163.com
Review: Dependent internal review by Tiangong LCI Data Working Group
Amounts: no units in this file; such an amount is in the reference unit of its flow, which a separate flow dataset defines

## Geography
China's shale gas extraction work is currently concentrated in the Sichuan and Chongqing areas, and the data from Sichuan and Chongqing are selected for LCA calculations.

## Time period
Raw data dates between 2014-2016

## Inputs
All rows: uniform; article inperiodical
- freshwater: 627000; min 849000; max 330000
  Components of water-based and oil-based drilling fluids
- Diesel: 330; min 432; max 267
  Oil-based drilling fluid components
- bentonite: 21000; min 30000; max 12000
  Oil-based drilling fluid components
- Limestone: 42000; min 54000; max 34000
  Oil-based drilling fluid components
- calcium chloride: 61000; min 80000; max 50000
  Oil-based drilling fluid components
- Diesel: 395000; min 522000; max 220000
  Drilling equipment
- Diesel: 2596; min 3642; max 1453
  Material transportation

## Review details
Inventory: The internal review was done by several iteration steps concerning raw data validation, raw data documentation, representativity, completeness and consistency of modelling with regard to ISO 14040 and 14044.

## Data sources
- Wang, J., Liu, M., McLellan, B. C., Tang, X. & Feng, L. Environmental impacts of shale gas development in China: A hybrid life cycle analysis. Resources, Conservation and Recycling 120, 38–45 (2017).
