# Municipal sludge treatment and disposal;dry sludge;press filter dewatering

Dataset: ILCD process, Unit process, single operation
Geography: CN
Classification: Unit processes / End-of-life treatment / Waste water treatment
Functional unit: One ton of sludge on a dry basis (1 t-DS) is defined as the functional unit.
Generated by: Jin Sitian, 2331276@tongji.edu.cn
Owner: Tiangong LCI Data Working Group
Review: Dependent internal review by Tiangong LCI Data Working Group
Amounts: no units in this file; such an amount is in the reference unit of its flow, which a separate flow dataset defines
copyright: ['opt4ROkqig']
licenseType: Free of charge for all users and uses

## General comment
Several typical sludge treatment facilities in China, representing anaerobic digestion, composting, co-combustion, thermal drying-incineration, and cement production, respectively, are selected to carry out the inventory. Data are mainly taken from the site-specific measurement, either by field survey or by operation report. Sludge characteristics are based on the average values of the sites investigated.

## Technology and included processes
It is then dewatered by belt filter. Polymer flocculation (polyacrylamide, PAM) is added to improve the dewatering ability, and the moisture content is further reduced to 78%.

## Technical purpose
This dataset represents the process used for the treatment and disposal of municipal sludge. The resulting dry sludge, obtained through press filter dewatering, can be utilized in various applications such as landscaping, construction materials, and as a soil conditioner in agricultural fields. It is specifically designed for scenarios where one ton of dry sludge (1 t-DS) is treated as the functional unit.

## Reference product
- Sludge: 1000; input; estimated
  a dry basis (1 t-DS)

## Inputs
- Electricity: 175.68; measured
- Polyacrylamide: 5; measured
  PAM(kg/t DS)

## Use advice
When using this dataset, data users should pay attention to the specific regional regulations and environmental standards applicable to the disposal and utilization of dewatered municipal sludge. Ensure the correct functional unit (1 t-DS) is used in the life cycle assessment models, and consider the technological applicability of the process in relation to the timeframe, scale, and local treatment technologies.

## Review details
Inventory: The internal review was done by several iteration steps concerning raw data validation, raw data documentation, representativity, completeness and consistency of modelling with regard to ISO 14040 and 14044.

## Data sources
- Dong, J., Chi, Y., Tang, Y., Wang, F. & Huang, Q. Combined Life Cycle Environmental and Exergetic Assessment of Four Typical Sewage Sludge Treatment Techniques in China. Energy Fuels 28, 2114–2122 (2014).
