# Fruit and vegetable concentrates ; Apple ; Juicing, concentration ; All sizes; NESPS2 / 浓缩果蔬 ; 苹果 ; 榨汁、浓缩 ; 所有规模 ; 全国第二次污染普查数据

Dataset: ILCD process, Unit process, single operation
Geography: CN
Reference year: 2019
Classification: Reference Parameters / Materials production / Food and renewable raw materials
Generated by: The data was created by the Office of the Second National Pollution Source Census of the Ministry of Ecology and Environment, and the data was organized by the TianGong Plan team for ILCD format / 生态环境部第二次全国污染源普查工作办公室创建数据，天工计划团队常慧敏整理数据为ILCD格式
Owner: Tiangong LCI Data Working Group / 天工LCI数据工作小组
Review: Dependent internal review by Tiangong LCI Data Working Group / 天工LCI数据工作小组
Amounts: no units in this file; such an amount is in the reference unit of its flow, which a separate flow dataset defines
copyright: false
licenseType: Free of charge for all users and uses

## General comment
the Technical of end-of-pipe management technology for pollution Waste waterisPhysicochemical treatment + anaerobic biological treatment + aerobic biological treatment，Its Technical efficiency of end-of-pipe management95，The formula for calculating the actual operation rate (k-value) of the end-of-pipe treatment facility is k = annual operating time of spray facility (hours) / annual operating time of drying system (hours)

## Technical purpose
所描述的工业流程涉及水果和蔬菜浓缩物的生产，特别是苹果榨汁和浓缩，适用于所有规模的操作。尾端处理技术对于通过物理化学、厌氧生物、好氧生物和物理处理组合，处理如废水、化学需氧量、氨氮、总磷和有机结合氮等污染至关重要。

## Reference product
- Concentrated Fruits and Vegetables: 1000; calculated
  源文件中描述为为浓缩果蔬，此处对其进行了匹配工作，将其匹配到LCAflow库里面相最符合的流

## Outputs
All rows: calculated
- Waste water: 10000
  the Technical of end-of-pipe management technology for pollution Waste wateris/，The formula for calculating the actual operation rate (k-value) of the end-of-pipe treatment facility is k = annual power consumption of wastewater treatment facilities (kWh) / (total rated power (kW) × annual operating time (hours))
  污染物指标工业废水量的末端治理技术是/，末端治理设施实际运行率（k值）计算公式为/。原文件中描述污染物类别为废水，污染物指标为工业废水量，此处对其进行了匹配工作，将其匹配到LCAflow库里面相最符合的流
- Ammonia Nitrogen: 0.01525
  the Technical of end-of-pipe management technology for pollution Ammonia NitrogenisPhysicochemical treatment + anaerobic biological treatment + aerobic biological treatment + physical treatment，Its Technical efficiency of end-of-pipe management95
  污染物指标氨氮的末端治理技术是物理化学处理法+厌氧生物处理法+好氧生物处理法+物理处理法，其效率为95，末端治理设施实际运行率（k值）计算公式为k=污水处理设施耗电量（千瓦时）/设备额定功率（千瓦）/设备运行时间(小时）。原文件中描述污染物类别为废水，污染物指标为氨氮，此处对其进行了匹配工作，将其匹配到LCAflow库里面相最符合的流
- phosphorus, total: 0.022
  the Technical of end-of-pipe management technology for pollution phosphorus, totalisPhysicochemical treatment + anaerobic biological treatment + aerobic biological treatment + physical treatment，Its Technical efficiency of end-of-pipe management60
  污染物指标总磷的末端治理技术是物理化学处理法+厌氧生物处理法+好氧生物处理法+物理处理法，其效率为60，末端治理设施实际运行率（k值）计算公式为k=污水处理设施耗电量（千瓦时）/设备额定功率（千瓦）/设备运行时间(小时）。原文件中描述污染物类别为废水，污染物指标为总磷，此处对其进行了匹配工作，将其匹配到LCAflow库里面相最符合的流
- phosphorus, total: 0.0275
  the Technical of end-of-pipe management technology for pollution phosphorus, totalisPhysicochemical treatment + anaerobic biological treatment + aerobic biological treatment，Its Technical efficiency of end-of-pipe management50，The formula for calculating the actual operation rate (k-value) of the end-of-pipe treatment facility is k = annual operating time of dust removal facilities (hours) / annual operating time of hot blast stove (hours)
  污染物指标总磷的末端治理技术是物理化学处理法+厌氧生物处理法+好氧生物处理法，其效率为50，末端治理设施实际运行率（k值）计算公式为k=污水处理设施耗电量（千瓦时）/设备额定功率（千瓦）/设备运行时间(小时）。原文件中描述污染物类别为废水，污染物指标为总磷，此处对其进行了匹配工作，将其匹配到LCAflow库里面相最符合的流
- Nitrogen, organic bound: 0.0403
  the Technical of end-of-pipe management technology for pollution Nitrogen, organic boundisPhysicochemical treatment + anaerobic biological treatment + aerobic biological treatment + physical treatment，Its Technical efficiency of end-of-pipe management90，The formula for calculating the actual operation rate (k-value) of the end-of-pipe treatment facility is k = annual operating time of dust removal facilities (hours) / annual operating time of hot blast stove (hours)
  污染物指标总氮的末端治理技术是物理化学处理法+厌氧生物处理法+好氧生物处理法+物理处理法，其效率为90，末端治理设施实际运行率（k值）计算公式为k=污水处理设施耗电量（千瓦时）/设备额定功率（千瓦）/设备运行时间(小时）。原文件中描述污染物类别为废水，污染物指标为总氮，此处对其进行了匹配工作，将其匹配到LCAflow库里面相最符合的流
- Ammonia Nitrogen: 0.061
  the Technical of end-of-pipe management technology for pollution Ammonia NitrogenisPhysicochemical treatment + anaerobic biological treatment + aerobic biological treatment，Its Technical efficiency of end-of-pipe management80
  污染物指标氨氮的末端治理技术是物理化学处理法+厌氧生物处理法+好氧生物处理法，其效率为80，末端治理设施实际运行率（k值）计算公式为k=污水处理设施耗电量（千瓦时）/设备额定功率（千瓦）/设备运行时间(小时）。原文件中描述污染物类别为废水，污染物指标为氨氮，此处对其进行了匹配工作，将其匹配到LCAflow库里面相最符合的流
- Nitrogen, organic bound: 0.10075
  the Technical of end-of-pipe management technology for pollution Nitrogen, organic boundisPhysicochemical treatment + anaerobic biological treatment + aerobic biological treatment，Its Technical efficiency of end-of-pipe management75，The formula for calculating the actual operation rate (k-value) of the end-of-pipe treatment facility is k = annual operating time of dust removal facilities (hours) / annual operating time of hot blast stove (hours)
  污染物指标总氮的末端治理技术是物理化学处理法+厌氧生物处理法+好氧生物处理法，其效率为75，末端治理设施实际运行率（k值）计算公式为k=污水处理设施耗电量（千瓦时）/设备额定功率（千瓦）/设备运行时间(小时）。原文件中描述污染物类别为废水，污染物指标为总氮，此处对其进行了匹配工作，将其匹配到LCAflow库里面相最符合的流
- chemical oxygen demand: 2.40666
  the Technical of end-of-pipe management technology for pollution chemical oxygen demandisPhysicochemical treatment + anaerobic biological treatment + aerobic biological treatment + physical treatment，Its Technical efficiency of end-of-pipe management98，The formula for calculating the actual operation rate (k-value) of the end-of-pipe treatment facility is k = annual power consumption of wastewater treatment facilities (kWh) / (total rated power (kW) × annual operating time (hours))
  污染物指标化学需氧量的末端治理技术是物理化学处理法+厌氧生物处理法+好氧生物处理法+物理处理法，其效率为98，末端治理设施实际运行率（k值）计算公式为k=污水处理设施耗电量（千瓦时）/设备额定功率（千瓦）/设备运行时间(小时）。原文件中描述污染物类别为废水，污染物指标为化学需氧量，此处对其进行了匹配工作，将其匹配到LCAflow库里面相最符合的流
- Waste water: 6.01665e6
  the Technical of end-of-pipe management technology for pollution Waste waterisPhysicochemical treatment + anaerobic biological treatment + aerobic biological treatment，Its Technical efficiency of end-of-pipe management95，The formula for calculating the actual operation rate (k-value) of the end-of-pipe treatment facility is k = annual operating time of spray facility (hours) / annual operating time of drying system (hours)
  污染物指标工业废水量的末端治理技术是物理化学处理法+厌氧生物处理法+好氧生物处理法，其效率为95，末端治理设施实际运行率（k值）计算公式为k=污水处理设施耗电量（千瓦时）/设备额定功率（千瓦）/设备运行时间(小时）。原文件中描述污染物类别为废水，污染物指标为工业废水量，此处对其进行了匹配工作，将其匹配到LCAflow库里面相最符合的流

## Use advice
This dataset is derived from the Pollution Source Census Report and contains information on pollution emissions and related products. However, it does not include data on energy or chemical consumption, nor does it provide information on waste or co-product generation. When utilizing this dataset, please supplement the missing data based on actual conditions before use
该数据集来源于污染源普查报告，包含污染物排放及相关产品信息，但不包含能源或化学品消耗数据，也不提供废弃物或共生产物产生信息。在使用该数据集时，请根据实际情况补充缺失数据后再使用。

## Review details
Inventory: The internal review was done by several iteration steps concerning raw data validation, raw data documentation, representativity, completeness and consistency of modelling with regard to ISO 14040 and 14044.
清单： 内部审查通过几个迭代步骤完成，涉及原始数据验证、原始数据记录、代表性、完整性、与 ISO 14040 和 14044 有关的建模的一致性。

## Data sources
- 第二次全国污染源普查产排污核算系数手册（试用版）,四级代码1523文件，在完整版文件中第2661页
