# Soil Remediation;In-situ Remediation;Bioreactor;Transportation;Equipment and Materials Arriving on Site

Dataset: ILCD process, Unit process, single operation
Geography: IT
Reference year: 2018
Classification: Unit processes / Other Services / Repair and maintenance
Generated by: Wang Ning, wang_ning@caep.org.cn
Owner: Tiangong LCI Data Working Group
Review: Dependent internal review by Tiangong LCI Data Working Group
Amounts: no units in this file; such an amount is in the reference unit of its flow, which a separate flow dataset defines
copyright: false
licenseType: Free of charge for all users and uses

## General comment
Transport of materials and equipment for the construction of the bioreactor facility to the site

## Technical purpose
This process data represents the transport of materials and equipment necessary for the construction of a bioreactor facility, which is part of an in-situ soil remediation procedure. The bioreactor is utilized for biological treatment of contaminated soil, providing an eco-friendly solution for restoring soil health.

## Reference product
- Equipment and Materials Arriving on Site: 16600; measured

## Inputs
- transport in t*km: 996; measured

## Use advice
When using this data set, ensure to account for the transport distance, mode of transportation, and the efficiency of vehicles used, as these factors significantly impact the environmental profile. Include this data in the life cycle inventory (LCI) phase of an LCA, and consider potential variations in transport scenarios to ensure a comprehensive analysis. Users should also be aware of the system boundaries and ensure consistency with the technological time frame of the application.

## Review details
Inventory: The internal review was done by several iteration steps concerning raw data validation, raw data documentation, representativity, completeness and consistency of modelling with regard to ISO 14040 and 14044.

## Data sources
- D’Imporzano, G. et al. OPTIMIZING BIOREMEDIATION OF HYDROCARBON POLLUTED SOIL BY LIFE CYCLE ASSESSMENT (LCA) APPROACH. Environmental Engineering and Management Journal (2019).
