# SoG-Si ingot casting ; Directional solidification and wafer fabrication ; Multi-wire cutting

Dataset: ILCD process, Unit process, single operation
Geography: CN
Reference year: 2014
Classification: Unit processes / Materials production / Metals and semimetals
Functional unit: The functional unit selected for this paper is a 1 kWp
LCI method principle: Attributional
LCI method approaches: Allocation
Generated by: Jinfeng Yang, yjfzfshn@163.com
Owner: Tiangong LCI Data Working Group
Review: Dependent internal review by Tiangong LCI Data Working Group
Amounts: no units in this file; such an amount is in the reference unit of its flow, which a separate flow dataset defines
copyright: false
licenseType: Free of charge for all users and uses

## General comment
Multi-Si

## Geography
Life cycle assessment of mono-Si and multi-Si photovoltaic systems produced in China

## Time period
Available online

## Technology and included processes
Most domestic polysilicon ingots are manufactured by directional solidification, and wafers are prepared by multi-wire cutting.

## Technical purpose
The multi-Si ingot casting and wafer fabrication process using directional solidification and multi-wire cutting is intended for the production of multi-Si photovoltaic systems in China. These systems are utilized in the construction of solar power installations capable of generating electricity. The wafers produced from this process are a crucial component in the manufacture of solar panels for both commercial and residential renewable energy solutions.

## Reference product
- Multi-Si wafer,Multi-Si wafer,Multi-Si wafer: 1; measured
  Polycrystalline silicon ingots and wafers

## Inputs
All rows: measured
- Solar grade multi-Si: 2.74
  Solar grade silicon
- Silicon carbide,Silicon carbide: 4.72
  silicon carbide
- Quartz Crucible,Quartz Crucible: 0.7
  quartz crucible
- Steel Wire,Cable: 2.67
  steel wire
- argon: 0.75
  Argon
- Polyethylene glycol: 4.2
  polyethylene glycol
- Dipropylene glycol monomethyl ether: 0.54
  DMP
- Electricity: 298.8
  Power consumption

## Outputs
All rows: measured
- carbon dioxide (fossil): 114
  CO2
- carbon monoxide,carbon monoxide (fossil): 0.15
  carbon monoxide
- methane (fossil): 0.28
  Methane
- Nitrogen oxides: 0.5
- sulfur dioxide: 0.83
- particles (> PM10),particles (>PM10): 1.4
  dust
- biological oxygen demand: 0.16
- chemical oxygen demand: 0.15
  Cod
- DOC, Dissolved Organic Carbon: 0.05
  DOC
- total organic carbon: 0.05
  TOC

## Deviations from the LCI method approaches
The objective of this paper is to conduct a life cycle assessment of monocrystalline and multi-Si photovoltaic (PV) systems produced in China, and to analyze the methods of disposal and the environmental impacts of different methods of disposal.

## Data selection and combination
For data, here we refer to Hu Runqing, Diao Zhouwei and Scholten et al.

## Use advice
When using the LCA data set for multi-Si ingot casting and wafer fabrication, users should ensure that the system boundaries are well-defined and include all relevant processes, from the production of polysilicon to the end of life of the photovoltaic panels. Special attention should be paid to the environmental impacts of the disposal methods. The chosen functional unit for assessing impact is 1 kWp, and users should uniformly apply this unit to maintain consistency in comparisons and analyses. Referencing the cited works of Hu Runqing, Diao Zhouwei, and Scholten et al. is recommended for supplemental information on methodologies and data specifics.

## Review details
Inventory: The internal review was done by several iteration steps concerning raw data validation, raw data documentation, representativity, completeness and consistency of modelling with regard to ISO 14040 and 14044.

## Data sources
- 李鹞 & 于随然. 中国光伏系统的生命周期评价. 环境工程 32, 119–124 (2014).
