# cement production;cement, portland fly-ash cement;new dry process precalciner kiln, 4000 t/d;fly ash

Dataset: ILCD process, Unit process, black box
Geography: CN
Classification: Unit processes / Materials production / Other mineralic materials
Generated by: #REF!, ysqsophia@gmail.com
Owner: Tiangong LCI Data Working Group
Review: Dependent internal review by Tiangong LCI Data Working Group
Amounts: no units in this file; such an amount is in the reference unit of its flow, which a separate flow dataset defines
copyright: false
licenseType: Free of charge for all users and uses

## General comment
The new dry pre-decomposition cement production model is selected.

## Technology and included processes
This article selects a pre-decomposition kiln-drying cement production model. The new dry pre-decomposition cement production technology is based on suspension preheating and pre-decomposition technology. It is a production technology that is more in line with environmental protection requirements and meets high productivity requirements, and has become the future development trend of China's cement industry. Therefore, the selection of new dry pre-decomposition cement production technology as cement model production technology has advanced and environmentally friendly requirements.

## Technical purpose
The portland fly-ash cement produced using the new dry process precalciner kiln technology is designed for large-scale construction projects. It is intended for use in concrete mixtures suitable for buildings, bridges, roads, and other infrastructure developments. This cement is particularly applicable in regions seeking environmentally friendlier options due to its production process, which meets high productivity requirements while adhering to environmental protection standards.

## Model description
The life cycle functional unit is selected as 1t of cement to construct the life cycle model.The cement industry system boundary includes the production of cement, the production and transportation of raw materials, and the production of electricity, but does not include the use and processing of cement.For auxiliary materials such as fly ash, only the transportation and preparation process will be considered, and the production process will not be considered.

## Reference product
- cement, portland fly-ash cement: 1000
  portland fly ash cement

## Inputs
- limestone, crushed, for mill: 864.9
  Limestone
- clay: 155.51
  Clay
- iron, powder: 28.21
  Iron powder
- gypsum stone (CaSO4-dihydrate): 50
  Gypsum. The standard values of GB-175-2007 General Portland Cement in China are used for each component of the cement.
- hard coal; 26.3 MJ/kg: 74.1
  Coal. The statistical values of Chinese production lines are used, and the standard coal consumption for large and medium-sized precalciner kilns is 114 kg/t clinker. The coal consumption can also be calculated based on the chemical composition of coal ash and the industrial analysis values of coal.
- ash: 300
  Fly ash. Each general-purpose cement component uses China GB-175-2007 general-purpose silicate cement standard value.
- Electricity: 340.092
  Electricity consumption. The average level of domestic electricity consumption in China is used. For dry-process cement production lines, the electricity consumption for milling operations accounts for more than 60% of the total electricity consumption, with raw material milling accounting for about 30% and cement milling accounting for about 40%. Due to limited data on raw material mining, a simplified treatment is adopted for various raw materials, and the electricity consumption data of 13.89 kWh/t raw materials are used. For different types of blended cement, the electricity consumption for milling different raw materials varies due to differences in their shapes and properties. The estimation is based on the percentage of electricity consumption for milling raw materials in the United States.

## Outputs
- carbon dioxide (fossil): 642
  CO2. The CO2 emissions during the cement production stage come from two parts: one is the decomposition of calcium carbonate and magnesium carbonate in the raw materials during the calcination process, and the other is the release of CO2 from coal combustion as fuel. The formulas for CO2 emissions from raw materials are: CaCO3→CaO+CO2; MgCO3→MgO+CO2. The emission factor for CO2 from coal combustion is based on the carbon emission coefficient from the Chinese Academy of Engineering, which is 2.4933 kg CO2 per kg of standard coal.
- sulfur dioxide: 0.365
  SO2. The emission of SO2 is based on the results of the first national survey of pollution sources in the Chinese cement industry (SO2 0.066kg/t clinker).
- Nitrogen oxides: 2
  NOx. The emission of NOx is based on the results of the first national survey of pollution sources in the Chinese cement industry (NOx 1.584kg/t clinker).
- particles (> PM10): 0.341
  Dust, with an unspecified particle size, is treated as PM > 10 micrometers in diameter. The emissions of dust during cement production are based on the upper limit values of the Chinese cement industry atmospheric pollutant emission standards. According to the dust emission concentration from different equipment in cement production, the dust emission quantity from each production stage can be calculated. Among them, the dust emission from raw material grinding accounts for approximately 55% of the total, cement grinding accounts for about 20%, coal preparation stage accounts for 13%, and clinker calcination process accounts for 12%.
- chemical oxygen demand: 0.0102
  COD. The emission of COD is based on the results of the first national survey of pollution sources in the Chinese cement industry (COD 0.06g/t clinker).
- Oils, unspecified: 0.269
  Oil
- methane (fossil): 0.754
  Methane
- mercury: 0.0086
  Mercury

## Deviations from the LCI method approaches
Using GaBi4 professional life cycle assessment software, a life cycle model will be established to conduct a life cycle assessment of cement. GaBi4 software will be utilized to divide the entire life cycle of cement into five major modules, with each module being a plan model. Each plan model will include data inputs for various stages of cement production.

## Data selection and combination
Pollutant emission data from limestone and gypsum mining come from the China Life Cycle Reference Database (CLCD). Due to the lack of mining data for clay and iron ore and the small amount of mining, the pollutant emission data from limestone mining were used as estimates. The pollutant emission data from coal mining adopt the raw coal mining data from the China Life Cycle Reference Database (CLCD).The power production pollutant emission data uses the national average grid power mixing and transmission data from the China Life Cycle Reference Database (CLCD).The transportation stage considers the transportation of all raw materials required for cement production, including limestone, clay, iron powder, gypsum, coal and industrial waste. For the convenience of calculation, a diesel truck with a load of 10t on highway transportation is taken as an example. It is assumed that the average transportation of all raw materials The distance is 100km. The pollutant emission inventory data of diesel trucks with a load of 10 tons in the China Life Cycle Reference Data (CLCD) are used.

## Use advice
Users of this LCA data should conduct life cycle assessments using the GaBi4 software, following the system boundary that includes cement production, raw material production and transportation, and electricity production. It is crucial to note that the system boundary does not include the usage and disposal of cement. For materials such as fly ash, only the transportation and preparation stages should be considered, omitting the production phase. Emission data for limestone, gypsum mining, and coal mining should be derived from the China Life Cycle Reference Database (CLCD). When modelling transportation, the default settings of using a 10t diesel truck over an average distance of 100km should be applied. The environmental impact data allocation for industrial waste should only account for its transportation and preparation, with the waste production impact responsibility resting on the original producer.

## Review details
Inventory: The internal review was done by several iteration steps concerning raw data validation, raw data documentation, representativity, completeness and consistency of modelling with regard to ISO 14040 and 14044.

## Data sources
- 徐小宁. (2013). 中国水泥工业的生命周期评价 [硕士, 大连理工大学].
