# Remediated soil ; Soil remediation ; In situ remediation ; Thermal treatment ; In situ thermal desorption (ISTD)

Dataset: ILCD process, Unit process, black box
Geography: DK
Reference year: 2010
Classification: Unit processes / Other Services / Repair and maintenance
Functional unit: The functional unit provided by all options compared in this study is the treatment of the 700 m3 of contaminated soil with a 98% removal of the contaminant mass within this volume. The estimated mass of TCE in the ap proximately 700 m3 of contaminated soil is 40 kg.
Generated by: Yang Xintong, yangxt@caep.org.cn
Owner: Tiangong LCI Data Working Group
Review: Dependent internal review by Tiangong LCI Data Working Group
Amounts: no units in this file; such an amount is in the reference unit of its flow, which a separate flow dataset defines
copyright: false
licenseType: Free of charge for all users and uses

## General comment
In situ thermal desorption (ISTD) involves the heating of the contaminated clay till by electri cally powered heating elements submersed in heater wells. This causes a fast transfer of the chlorinated ethenes to the vapor phase, which is then extracted using vacuum extraction wells and treated on-site by adsorption to activated carbon.

## Geography
A TCE-contaminated site in central Copenhagen is situated within the catchment of a water supply

## Technical purpose
The soil remediation process described here is used for the decontamination of soil through in situ thermal desorption (ISTD). This method is particularly applicable for treating chlorinated solvent contamination, such as trichloroethylene (TCE) in clay till. The process is suitable for sites like urban areas where the contaminated soil is located within water supply catchment regions. ISTD is designed for high-efficiency remediation, aiming for a significant removal of contaminants without the need to excavate and transport the affected soil.

## Reference product
- Remediated soil: 700; measured

## Inputs
All rows: measured
- Steel: 1200
  Installation——20 heater wells (total depth 8 meter). Steel use for outer pipe:(Ø80 mm, thickness 4 mm, density 7850 kg/m3): 7.5 kg/m.
- Stainless Steel: 1088
  Installation——20 heater wells (total depth 8 meter). Stainless steel use for inner pipes (Ø72 mm, thickness 4 mm, density 8000 kg/m3): 6.8 kg/m
- Gravel Sand: 2840
  Installation——20 heater wells (total depth 8 meter). Gravel use per well: 142 kg(7.5 meter of gravel pack in Ø150 mm boring)
- Concrete: 300
  Installation——20 heater wells (total depth 8 meter). Concrete use per well: 15 kg (0.5 meter of concrete)
- Stainless Steel: 128
  Stainless steel use for filter (Ø20 mm, thickness 4 mm, density 8000 kg/m3): 1.6 kg/m
- Stainless Steel: 96
  Installation——20 heaters; Stainless steel use for heater (Ø10 mm, solid and U-shape, density 8000 kg/m3): 1.2 kg/m
- Stainless Steel: 48
  Installation——10 temperature sensors; Stainless steel use for temperature sensor (Ø10 mm, solid, density 8000 kg/m3): 0.6 kg/m
- Road Transport,Road Transport: 1.35e6
  Distance of round trip for consultants for supervision and monitoring is set to 90 km based on the actual distance between the site and the consultant.
- polystyrene (general purpose) granulate (GPPS): 560
  560 kg expanded polystyrene insulation
- Steel: 166
  Steelfor aboveground gas collection pipes:12 meter of Ø80 mm pipes: 90 kg; 48 meter of Ø20 mm pipes: 76 kg
- Activated Carbon: 260
- Electricity: 6372
  Estimated electricity use for pumping of groundwater during heating (0.75 kW, 2356 h, 3.3months): 1770 kWh
- Electricity: 1.008e6
  Energy for heating of soil: 400 kWh/m3 of soil
- Electricity: 50400
  Electricity use for ventilation, cooling, condensation: 20 kWh/m3 of soil
- waste water - treated: 60
  Water treatment: 60 kg (assumed to absorb 3% of weight = 1.8 kg TCE)
- Exhaust gases treated: 200
  Vapor treatment: 200 kg (assumed to absorb 20% of weight = 40 kg TCE)
- contaminated soil: 700

## Use advice
When applying this LCA data for soil remediation processes, ensure that the scope of your assessment includes only scenarios where in situ thermal treatment is technologically feasible and effective against specific contaminants like TCE. It is important to account for on-site energy consumption and the on-site treatment of removed vapors by adsorption to activated carbon. End-of-life processes for spent activated carbon and infrastructure should also be considered. Consider the requirement for a high contaminant removal efficiency (98%) as a baseline for comparison with alternative remediation techniques. The data is specific to the treatment of 700 m3 of contaminated soil, and variations in soil composition or contaminant concentration should be factored into the assessment.

## Review details
Inventory: The internal review was done by several iteration steps concerning raw data validation, raw data documentation, representativity, completeness and consistency of modelling with regard to ISO 14040 and 14044.

## Data sources
- Gitte L ,Z M H ,Julie C , et al. Environmental impacts of remediation of a trichloroethene-contaminated site: life cycle assessment of remediation alternatives. Environmental science & technology, 2010, 44 (23): 9163-9.
