# cement production;cement, portland cement;oxy-combustion CO2 capture

Dataset: ILCD process, Unit process, black box
Geography: CN
Reference year: 2008
Classification: Unit processes / Materials production / Other mineralic materials
Generated by: #REF!, ysqsophia@gmail.com
Owner: Tiangong LCI Data Working Group
Review: Dependent internal review by Tiangong LCI Data Working Group
Amounts: no units in this file; such an amount is in the reference unit of its flow, which a separate flow dataset defines
copyright: false
licenseType: Free of charge for all users and uses

## General comment
Cement production with oxy-combustion carbon capture and storage (CCS).For oxy-combustion CO2 capture technology, fuel is burnt in almost pure oxygen rather than air. This requires an on-site ar separation unit (ASU) to deliver oxygen to the oxy-combustion process. The concentration of CO2 in the flue gas produced by oxy-combustion is higher (about 80 mol%, dryoasis) than that of post-combustion, so the flue gas can be transported and stored after a relativelsimple purification and compression processes instead of the separation process.

## Geography
http://documents.ieaghg.org/index.php/s/YKm6B7zikUpPgGA?path=%2F2008

## Technology and included processes
For oxy-combustion CO, capture technology, fuel is burnt in almost pure oxygen rather than airThis requires an on-site ar separation unit (ASU) to deliver oxygen to the oxy-combustion processThe concentration of CO, in the flue gas produced by oxy-combustion is higher (about 80 mol%, dryoasis) than that of post-combustion, so the flue gas can be transported and stored after a relativelsimple purification and compression processes instead of the separation process.

## Technical purpose
The described industrial process is for cement production using oxy-combustion CO2 capture and storage technology. This process is specifically implemented to produce Portland cement, a common type of cement used in the construction industry for various applications, such as in the making of concrete, mortar, stucco, and non-specialty grout.

## Reference product
- cement, portland cement: 1000
  Cement products. Data taken from the technical report, IEA Greenhous Gas R&D Programme (IEA GHG). CO2 Capture in the Cement Industry. 2008. Available online: http://documents.ieaghg.org/index.php/s/YKm6B7zikUpPgGA?path=%2F2008 (accessed on 5 September 2017).

## Inputs
- hard coal; 26.3 MJ/kg: 72.06
  Coal. Data taken from the technical report, IEA Greenhous Gas R&D Programme (IEA GHG). CO2 Capture in the Cement Industry. 2008. Available online: http://documents.ieaghg.org/index.php/s/YKm6B7zikUpPgGA?path=%2F2008 (accessed on 5 September 2017).
- Petroleum Coke: 27.09
  Petroleum coke. Data taken from the technical report, IEA Greenhous Gas R&D Programme (IEA GHG). CO2 Capture in the Cement Industry. 2008. Available online: http://documents.ieaghg.org/index.php/s/YKm6B7zikUpPgGA?path=%2F2008 (accessed on 5 September 2017).
- Electricity: 628.416
  Electricity. Data taken from the technical report, IEA Greenhous Gas R&D Programme (IEA GHG). CO2 Capture in the Cement Industry. 2008. Available online: http://documents.ieaghg.org/index.php/s/YKm6B7zikUpPgGA?path=%2F2008 (accessed on 5 September 2017).
- limestone, crushed, for mill: 1256.74
  Limestone. Data taken from the technical report, IEA Greenhous Gas R&D Programme (IEA GHG). CO2 Capture in the Cement Industry. 2008. Available online: http://documents.ieaghg.org/index.php/s/YKm6B7zikUpPgGA?path=%2F2008 (accessed on 5 September 2017).
- ferric oxide: 7.54
  Iron oxide. Data taken from the technical report, IEA Greenhous Gas R&D Programme (IEA GHG). CO2 Capture in the Cement Industry. 2008. Available online: http://documents.ieaghg.org/index.php/s/YKm6B7zikUpPgGA?path=%2F2008 (accessed on 5 September 2017).
- gypsum stone (CaSO4-dihydrate): 40
  Gypsum. Data taken from the technical report, IEA Greenhous Gas R&D Programme (IEA GHG). CO2 Capture in the Cement Industry. 2008. Available online: http://documents.ieaghg.org/index.php/s/YKm6B7zikUpPgGA?path=%2F2008 (accessed on 5 September 2017).

## Outputs
- carbon dioxide (fossil): 465.01
  CO2 captured. Data taken from the technical report, IEA Greenhous Gas R&D Programme (IEA GHG). CO2 Capture in the Cement Industry. 2008. Available online: http://documents.ieaghg.org/index.php/s/YKm6B7zikUpPgGA?path=%2F2008 (accessed on 5 September 2017).
- carbon dioxide (fossil): 282.85
  CO2 emitted. Data taken from the technical report, IEA Greenhous Gas R&D Programme (IEA GHG). CO2 Capture in the Cement Industry. 2008. Available online: http://documents.ieaghg.org/index.php/s/YKm6B7zikUpPgGA?path=%2F2008 (accessed on 5 September 2017).
- sulfur dioxide: 2.57
  SO2 emitted. Data were calculated according to the design of the technical report, IEA Greenhous Gas R&D Programme (IEA GHG). CO2 Capture in the Cement Industry. 2008. Available online: http://documents.ieaghg.org/index.php/s/YKm6B7zikUpPgGA?path=%2F2008 (accessed on 5 September 2017).
- nitrogen dioxide: 2.57
  NO2 emitted. Data were calculated according to the design of the technical report, IEA Greenhous Gas R&D Programme (IEA GHG). CO2 Capture in the Cement Industry. 2008. Available online: http://documents.ieaghg.org/index.php/s/YKm6B7zikUpPgGA?path=%2F2008 (accessed on 5 September 2017).
- particles (PM2.5): 0.0219
  Particulates, <2.5um. Data taken from ecoinvent database, Ecoinvent Database v3. Available online: http://www.ecoinvent.org/database/ecoinvent-33/ecoinvent-33.html (accessed on 15 April 2018).
- particles (> PM10): 0.0052
  Particulates, >10um. Data taken from ecoinvent database, Ecoinvent Database v3. Available online: http://www.ecoinvent.org/database/ecoinvent-33/ecoinvent-33.html (accessed on 15 April 2018).
- particles (PM2.5 - PM10): 0.0072
  Particulates, >2.5 um, and <10 um. Data taken from ecoinvent database, Ecoinvent Database v3. Available online: http://www.ecoinvent.org/database/ecoinvent-33/ecoinvent-33.html (accessed on 15 April 2018).

## Sampling procedure
The production capacity is set to produce 1 million tons of cement per year, with the proportion of clinker in cement products being 91%.

## Use advice
When utilizing this dataset for Life Cycle Assessment, ensure that the environmental impacts of the on-site air separation unit (ASU) and the relatively simple purification and compression processes for flue gas are included. Consider the high CO2 concentration caused by oxy-combustion and adjust the system boundary to include the transportation and storage of captured CO2. This data is based on a production capacity of 1 million tons of cement annually, with a clinker proportion of 91% in cement products.

## Review details
Inventory: The internal review was done by several iteration steps concerning raw data validation, raw data documentation, representativity, completeness and consistency of modelling with regard to ISO 14040 and 14044.

## Data sources
- Jing An, Richard S. Middleton, & Yingnan Li. (2019). Environmental Performance Analysis of Cement Production with CO2 Capture and Storage Technology in a Life-Cycle Perspective. Sustainability 11, 2626.
