# Equipment and Materials Arriving on Site ; Biochar ; Coconut shell as raw material ; Agricultural land remediation ; In-situ stabilization

Dataset: ILCD process, Unit process, single operation
Geography: HZ-GD-CN
Reference year: 2021
Classification: Unit processes / Other Services / Repair and maintenance
Functional unit: 800kg of biochar is transported from the production site to the repair site.
Generated by: Yang Xintong, yangxt@caep.org.cn
Owner: Tiangong LCI Data Working Group
Review: Dependent internal review by Tiangong LCI Data Working Group
Amounts: no units in this file; such an amount is in the reference unit of its flow, which a separate flow dataset defines
copyright: false
licenseType: Free of charge for all users and uses

## General comment
The process of transporting repair reagents to the site.

## Geography
The study site is a paddy field contaminated by Cd, located inGongzhuang town, Huizhou city of the Pearl River Delta, Southern China.

## Technology and included processes
The biochar transport distance data is calculated based on the production address of the reagent and remediation site.

## Technical purpose
This dataset pertains to an industrial process involving the production and transportation of biochar, specifically derived from coconut shells, for the purpose of in-situ stabilization and remediation of cadmium-contaminated paddy fields. The repair reagents, in this case, biochar, are used for agricultural land remediation, which helps to improve soil quality and reduce contaminant levels. This process is relevant for environmental initiatives focused on the restoration of agricultural land, particularly in areas affected by heavy metal pollution.

## Reference product
- Equipment and Materials Arriving on Site: 1; measured

## Inputs
- Biochar: 800; measured
- transport in t*km: 136; measured

## Use advice
When using this dataset, it is crucial to account for the transport distance of biochar as it significantly affects the environmental impact assessment in the life cycle analysis. Users should also consider the specificity of the site, i.e., the cadmium-contaminated paddy fields in Gongzhuang town, Huizhou city of the Pearl River Delta, Southern China, as the dataset is tailored to this particular context. Additionally, attention must be given to each stage's inputs and outputs, which include materials, energy, resources, emissions, and carbon, to ensure comprehensive life cycle assessment.

## Review details
Inventory: The internal review was done by several iteration steps concerning raw data validation, raw data documentation, representativity, completeness and consistency of modelling with regard to ISO 14040 and 14044.

## Data sources
- Kai L ,Liping F ,Fangbai L , et al. Sustainability assessment and carbon budget of chemical stabilization based multi-objective remediation of Cd contaminated paddy field. The Science of the total environment, 2021, 819 152022-152022.
