# Molten steel production;Molten steel;BOF(Z08)

Dataset: ILCD process, Unit process, single operation
Geography: CN
Reference year: 1998
Classification: Materials production / Metals and semimetals
Generated by: Fuxiang, 1162850692@qq.com
Owner: Tiangong LCI Data Working Group
Review: Dependent internal review by Tiangong LCI Data Working Group
Amounts: no units in this file; such an amount is in the reference unit of its flow, which a separate flow dataset defines
copyright: false
licenseType: Free of charge for all users and uses

## General comment
来自表 4-16 Z08 钢厂生产吨材环境负荷编目表

## Time period
论文提到钢铁企业环境总体数据为1998年的吨钢环境基础数据。

## Technical purpose
The steel refining process described is used to produce molten steel in a basic oxygen furnace (BOF), designated as process Z08. This specific dataset pertains to environmental load figures for the production of steel per ton at a plant employing the BOF method. Typically, the steel produced from this process would be utilized in various construction and manufacturing sectors, including infrastructure, automotive, and machinery industries, where high-grade steel is required.

## Reference product
- Crude Steel: 1059.3; measured
  crude steel

## Inputs
- Energy, geothermal, converted: 1126.97; measured
- water: 12239; measured
- Molten Iron: 1061; measured
  molten iron

## Outputs
All rows: measured
- Dust (unspecified, from stack): 0.153
  soot
- Dust (unspecified, from stack): 0.074
- sulfur dioxide: 0.003
- cyanide: 7.6e-5
- phenol: 6.8e-5
  Volatile phenol
- Hydrocarbons, aliphatic, alkanes, unspecified: 0.049351
  Petro
- Suspended solids, unspecified: 0.652953
- chemical oxygen demand: 0.304532
- Dust (unspecified, from stack): 1.921
  dust collection
- Spoil (deposited, hibernating in ground, non elementary flow): 183.153

## Use advice
When using this LCA dataset, users should consider the specificity of the data being representative of the environmental burdens associated with steel production in a BOF steel plant as of 1998. It is important to note that these figures may not apply to other steel production methods or reflect advancements and changes made in the industry after 1998. When modeling use-phase behavior, take into account the technological variances and improvements in steel manufacturing processes. Update the dataset with current technology figures when possible to maintain accuracy in environmental impact assessments.

## Review details
Inventory: The internal review was done by several iteration steps concerning raw data validation, raw data documentation, representativity, completeness and consistency of modelling with regard to ISO 14040 and 14044.

## Data sources
- 周和敏. 钢铁材料生产过程环境协调性评价研究. (北京工业大学, 2001).
