# Municipal sludge treatment and disposal;dry sludge;brick manufacturing

Dataset: ILCD process, Unit process, single operation
Geography: CN
Classification: Unit processes / End-of-life treatment / Waste water treatment
Functional unit: The functional unit used for GHGs in this LCA is one dry ton (DT) of sludge.
Generated by: Jin Sitian, 2331276@tongji.edu.cn
Owner: Tiangong LCI Data Working Group
Review: Dependent internal review by Tiangong LCI Data Working Group
Amounts: no units in this file; such an amount is in the reference unit of its flow, which a separate flow dataset defines
copyright: ['opt4ROkqig']
licenseType: Free of charge for all users and uses

## General comment
The main data sources used in our study are as follows: 1) Energy consumption and material inputs are obtained from investigations in Tai Lake Watershed; 2) The energy use emission factor is obtained from our own calculation, IPCC, and the literature.3) The fugitive emissions during landfilling, incineration, and composting are mainly determined by the model given in the other study as well as by the IPCC factors (2006), except for the CH4 emission in landfilling, which is obtained from study.4) Data from theoretical calculations (see Incineration section).

## Geography
Tai Lake Watershed

## Technology and included processes
At a substitution rate of 10% (10 tons of brick/cement will be produced by 1 DT of sludge and other raw materials), only 0.3 tons of ash from 1 DT of sludge is integrated into the products, thus substituting the same amount of raw materials.

## Technical purpose
This LCA data set describes the use of dry sludge from municipal sludge treatment and disposal as an additive material in brick manufacturing. Specifically, the dry sludge is sourced from procedures conducted within the Tai Lake Watershed area. It is utilized to produce bricks, possibly serving as a partial substitute for traditional raw materials such as clay, helping to improve sustainability in brick production.

## Reference product
- Sludge: 1000; input; estimated
  one dry ton (DT) of sludge

## Inputs
- Electricity: 252; measured

## Use advice
When utilizing this data set for LCA, it is important to consider the specific properties and context of the dry sludge as used within the Tai Lake Watershed area's brick manufacturing process. Users should account for any variations in GHG emissions based on the local practices and technologies employed. Attention should be given to system boundaries, ensuring that the use phase and end-of-life phase of the bricks, including potential recycling, are consistently modeled according to LCA standards.

## Review details
Inventory: The internal review was done by several iteration steps concerning raw data validation, raw data documentation, representativity, completeness and consistency of modelling with regard to ISO 14040 and 14044.

## Data sources
- Liu, B., Wei, Q., Zhang, B. & Bi, J. Life cycle GHG emissions of sewage sludge treatment and disposal options in Tai Lake Watershed, China. Science of The Total Environment 447, 361–369 (2013).
