# Electricity production ; Electricity mix ; Qinghai

Dataset: ILCD process, Unit process, single operation
Geography: QH-CN
Reference year: 2019
Classification: Unit processes / Energy carriers and technologies / Electricity
Generated by: Ruoxi Xiong, xiongrx0126@163.com
Owner: Tiangong LCI Data Working Group
Review: Dependent internal review by Tiangong LCI Data Working Group
Amounts: no units in this file; such an amount is in the reference unit of its flow, which a separate flow dataset defines
copyright: false
licenseType: Free of charge for all users and uses

## General comment
Electricity mix includes thermal, hydro, wind, nuclear and solar generation

## Technical purpose
The electricity produced from this mix in Qinghai province is intended for general application across various sectors. It provides power for residential, commercial, and industrial activities. The mix includes a diverse set of sources such as thermal, hydro, wind, nuclear, and solar generation, ensuring a stable and potentially cleaner supply of energy.

## Reference product
- Electricity: 3.6; missing unimportant
  [{'text': '能量', 'type': 'text'}]

## Inputs
All rows: missing unimportant
- electricity for thermal power: 0.425102
  [{'text': '能量', 'type': 'text'}]
- electricity from hydroelectric power plant: 2.26079
  [{'text': '能量', 'type': 'text'}]
- electricity for nuclear power: 0
  [{'text': '能量', 'type': 'text'}]
- electricity from wind power: 0.269338
  [{'text': '能量', 'type': 'text'}]
- electricity for solar power: 0.644774
  [{'text': '能量', 'type': 'text'}]

## Use advice
When utilizing this data set, users should consider the specific mix of energy sources in Qinghai's electricity production for accurate lifecycle assessment. It is crucial to account for the different environmental impacts associated with each generation method. Additional attention should be paid to regional factors such as the availability of renewable resources and the performance of renewable energy technologies in Qinghai.

## Review details
Inventory: The internal review was done by several iteration steps concerning raw data validation, raw data documentation, representativity, completeness and consistency of modelling with regard to ISO 14040 and 14044.

## Data sources
- 能源统计年鉴2020
