# Purified exhaust gas ; Soil remediation ; In Situ Thermal Desorption ; Exhaust gas and wastewater disposal

Dataset: ILCD process, Unit process, black box
Geography: CN
Reference year: 2022
Classification: Unit processes / Other Services / Repair and maintenance
Generated by: Zhang Jinying, zhangjy@caep.org.cn
Owner: Tiangong LCI Data Working Group
Review: Dependent internal review by Tiangong LCI Data Working Group
Amounts: no units in this file; such an amount is in the reference unit of its flow, which a separate flow dataset defines
copyright: false
licenseType: Free of charge for all users and uses

## General comment
② Wastewater and exhaust gas treatment, including the installation and operation of wastewater and exhaust gas equipment.

## Technical purpose
This industrial process is designed for soil remediation via In Situ Thermal Desorption (ISTD) technique. It entails the purification of exhaust gases generated during the desorption process and the proper treatment and disposal of byproduct wastewater. Additionally, it involves the use of mechanical equipment and infrastructure such as those made from concrete and steel, and the operation requires energy inputs including fuel, electricity, and natural gas. It has applicability in environmental engineering projects aiming to recover contaminated soils.

## Reference product
- Purified exhaust gas (produced by thermal desorption of 1 m3 soil): 1; missing unimportant
  文章中没有给出具体的废气和废水处置量，这里采用项目为单位计量

## Inputs
- natural gas,natural gas: 28800; measured
- Electricity: 2.016e6; measured
- Diesel: 8.906; measured
- Tap Water: 3477; measured
- Steel: 20367; measured
- Diesel,Diesel: 0.813; measured
- Exhaust gas: 1; missing unimportant
  文章中没有给出具体的废气和废水处置量，这里采用项目为单位计量
- waste water - untreated: 1; missing unimportant
  文章中没有给出具体的废气和废水处置量，这里采用项目为单位计量

## Outputs
- waste water - treated: 1; missing unimportant
  文章中没有给出具体的废气和废水处置量，这里采用项目为单位计量

## Use advice
When using this data set for Life Cycle Assessment, users should ensure that the system boundary includes the installation and operation of wastewater and exhaust gas treatment equipment. Users must account for the energy and material inputs, particularly fuel, electricity, natural gas, concrete, and steel, as well as the environmental impact of transporting these materials and equipment. For accurate assessment, the inclusion of potential emissions during the ISTD process and their treatment must be reflected. The data set is specific to contexts where soil contamination is present and should not be generalized to untargeted remediation applications.

## Review details
Inventory: The internal review was done by several iteration steps concerning raw data validation, raw data documentation, representativity, completeness and consistency of modelling with regard to ISO 14040 and 14044.

## Data sources
- 刘文晓等.基于修复效果的污染土壤修复工程环境足迹分析[J].环境科学研究 35,2367-2377（2022）.
