# Livestock and poultry breeding ; feed processing stage ; layer retail

Dataset: ILCD process, Unit process, single operation
Geography: CN
Reference year: 2014
Classification: Unit processes / Materials production / Agricultural production means
Functional unit: 1kg eggs
Generated by: Rui Yang, 1632707028@qq.com
Owner: Tiangong LCI Data Working Group
Review: Dependent internal review by Tiangong LCI Data Working Group
Amounts: no units in this file; such an amount is in the reference unit of its flow, which a separate flow dataset defines
copyright: false
licenseType: Free of charge for all users and uses

## General comment
Livestock and poultry feed processing mainly consumes electricity and coal.

## Geography
This study was conducted from 2014 to 2015, aiming at livestock and poultry feeding cycle, meat ratio, feed formula, feed consumption, coal and electricity consumption, etc. Has been to Shandong Gaomi Zhengda pig farm, Laixi City Zhishuang dairy farm, Jimo city Duan Bolan town Jiangjiapo village pig farm, Jimo City Liujiazhuang town livestock farm, Rizhao City Changling town Guanzhuang village, Juxian County Zhailihe town Dongxing Agriculture and animal husbandry company, Juxian Qiaoshan town east Chen dairy farm, Juxian Qiaoshan town Liu Jiayi water pig farm, Zhucheng Foreign Trade Co., LTD. Phoenix parents breeding duck farm, Xinjiang Fukang Hongfa Breeding professional cooperative, Jiuyun Street Town Xuhong laying Chicken cooperative, Jiuyun Street Town Liuyun Village self-contained breeding farm, China Australia Holding Group Co., LTD., Dezhou City Qingyun County Wayu Village, Shandong Province Qingyun County four Liu community beef cattle breeding base, Dezhou City Qingyun Qingnian chicken breeding base, Qingyun County Yongli Poultry layer breeding company, Qingyun County Xingchen youth chicken breeding Field research was carried out by professional breeding cooperatives, Qingyun Dongtai broiler breeding cooperatives, Hebei Yanshan Boyuan Feed Co., LTD., Yanshan Da Chinese Feed Co., LTD., Wudi Liuhe Feed Co., LTD., and China-Australia Oriental Hope Feed Co., LTD.

## Technology and included processes
In this paper, the life cycle of livestock and poultry farming is divided into six stages: feed crop planting, feed processing, livestock and poultry raising, manure treatment, slaughter and transportation. The specific life cycle process of livestock and poultry breeding is shown in Figure 2-1. Due to the lack of some data and the limitations of basic conditions, the production, transportation and use of pesticides, mulch and feed additives have not been analyzed, and the environmental impact caused by other related infrastructure construction, transport production and labor costs is no longer considered.

## Technical purpose
The data set represents the feed processing stage within the life cycle of layer hen farming. This process is applicable for producing feed for livestock and poultry including layer hens in small retail operations. The derived feed is essential for the production of eggs in the agricultural sector.

## Reference product
- feed: 4.67997; calculated

## Inputs
- Electricity: 0.421197; calculated
- hard coal: 0.0561596; calculated
- maize grain: 3.4; measured
- soybean: 1.36; measured
- wheat: 1.35; measured

## Outputs
- carbon dioxide (fossil),carbon dioxide (fossil): 0.23424; measured
  Laying hen retail investors
- sulfur dioxide: 0.0041; measured
  Laying hen retail investors
- nitrogen, total (excluding N2): 0.00065; measured
  Laying hen retail investors
- carbon monoxide (fossil): 0.000106; measured
  Laying hen retail investors

## Use advice
Users should note that this data is specific to the feed processing stage of layer hens and should not be generalized to other types of livestock and poultry feed processing. Attention must be paid to the regional scope and time frame of the data (2014-2015) as results may differ in other regions or time periods. The energy sources (electricity and coal) and specific farms investigated are integral to data interpretation. Exclusion of impacts from upstream or downstream processes such as feed ingredient production or egg processing is necessary for accurate lifecycle assessment of the feed processing stage alone.

## Review details
Inventory: The internal review was done by several iteration steps concerning raw data validation, raw data documentation, representativity, completeness and consistency of modelling with regard to ISO 14040 and 14044.

## Data sources
- 周景月. 基于生命周期评价的畜禽养殖环境影响分析. (青岛科技大学, 2017).
