# Dry sand Production;Sand and gravel sand making;Sand making machine sand making

Dataset: ILCD process, Unit process, single operation
Geography: HAIN-CN
Reference year: 2020
Classification: Unit processes / Materials production / Other mineralic materials
Generated by: Cui hang, Cuihang0716@163.com
Owner: Tiangong LCI Data Working Group
Review: Dependent internal review by Tiangong LCI Data Working Group
Amounts: no units in this file; such an amount is in the reference unit of its flow, which a separate flow dataset defines
copyright: false
licenseType: Free of charge for all users and uses

## General comment
The belt transports the smaller gravel to the sand making machine to produce coarse sand.

## Technology and included processes
The belt transports the medium crushed gravel to the sand making machine to produce coarse sand.

## Technical purpose
The described process refers to the production of coarse sand from smaller gravel aggregates using a dry sand making machine. This coarse sand produced via this method is likely to be utilized in construction activities, such as concrete making, road building, or other civil engineering projects that require sand with a specific level of coarseness.

## Reference product
- sand: 41870; measured

## Inputs
- gravel: 41870; measured
- Electricity: 144; measured

## Outputs
- Fly ash: 3000; measured

## Use advice
When utilizing this data set, users should ensure that they are applying it in the context of the specific construction or manufacturing process that requires coarse sand of particular characteristics. It is crucial to assess whether the granularity and composition of the product fit the requirements of the intended application. To support a comprehensive Life Cycle Assessment, users must also consider the energy usage and potential emissions during the dry sand making process. Any recycling or reclamation of materials should be documented and included in the assessment to ensure an accurate environmental impact evaluation.

## Review details
Inventory: The internal review was done by several iteration steps concerning raw data validation, raw data documentation, representativity, completeness and consistency of modelling with regard to ISO 14040 and 14044.

## Data sources
- 陵水海岛混凝土有限公司干法制砂项目
