# Remediated groundwater ; Groundwater ex-situ remediation ; Pump and treatment

Dataset: ILCD process, Unit process, single operation
Geography: JS-CN
Reference year: 2022
Classification: Other Services / Repair and maintenance
Generated by: Wang Ning, wang_ning@caep.org.cn
Owner: Tiangong LCI Data Working Group
Review: Dependent internal review by Tiangong LCI Data Working Group
Amounts: no units in this file; such an amount is in the reference unit of its flow, which a separate flow dataset defines
copyright: false
licenseType: Free of charge for all users and uses

## General comment
Groundwater pump and treat system operation

## Geography
a closed pesticide manufacturing plant located in Jiangsu Province, China.

## Technical purpose
The industrial process described refers to the operation of a pump and treatment (P&T) system for the remediation of contaminated groundwater. This system is typically applied in the environmental industry, specifically for groundwater decontamination at sites afflicted by hazardous materials, such as a closed pesticide manufacturing plant. The operation uses electric power to extract the contaminated groundwater, treat it to remove pollutants, and ultimately discharge the cleaned water back to the environment or for further use.

## Reference product
- Remediated groundwater: 1184.85; measured

## Inputs
All rows: measured
- Electricity: 80293.6
- contaminated groundwater: 1184.85
- Grout curtains: 25
- Extraction wel: 1
- Air stripping unit,Catalytic oxidation unit: 1
- Air stripping unit: 1
- Granular active carbon unit: 1
- Groundwater sample and TVOC analysis: 6

## Use advice
When utilizing this data set, ensure proper modeling of the energy consumption associated with the pump and treatment system's operation. Account for the specific contaminants in the groundwater and the efficiency of the remediation process. Exclude any external water sources or discharges not directly related to the system's operation from the assessment. Adapt the data for local technological variations, energy mix, and specific environmental regulations associated with groundwater remediation in Jiangsu Province or similar locations.

## Review details
Inventory: The internal review was done by several iteration steps concerning raw data validation, raw data documentation, representativity, completeness and consistency of modelling with regard to ISO 14040 and 14044.

## Data sources
- Ding, D. et al. Assessing the environmental impacts and costs of biochar and monitored natural attenuation for groundwater heavily contaminated with volatile organic compounds. Science of The Total Environment 846, 157316 (2022).
