# NCM hydrometallurgical recycling technology（HRT）

Dataset: ILCD process, Unit process, single operation
Geography: HUN-CN
Reference year: 2021
Classification: End-of-life treatment / Material recycling
Functional unit: Based on market data, the prismatic LFP and NMC are used as a reference, with energy densities of 120 Wh/kg and 150 Wh/kg, respectively. Values are scaled into 1 kg of battery cell.
Generated by: maqingyuan, m1120498928@163.com
Owner: Tiangong LCI Data Working Group
Review: Dependent internal review by Tiangong LCI Data Working Group
Amounts: no units in this file; such an amount is in the reference unit of its flow, which a separate flow dataset defines
copyright: false
licenseType: Free of charge for all users and uses

## General comment
The treatment process of NCM is similar to that of LFP in the early stage of hydrometallurgical recycling. First, the battery pack is discharged and disassembled, and the cell is crushed in a ball mill. Then, the powder is heated at a temperature of 400–600 ◦C. Copper, aluminum, and electrode materials are separated by physical methods such as flotation and magnetic separation, followed by grinding and acid leaching of the electrode materials. For NCM, the electrode material reacts with an H2SO4 aqueous solution and is leached by adding NaOH, HCl, and an extractant. After washing and drying, CoSO4, MnSO4, and NiSO4 crystals are separated. Finally, Na2CO3 was added to the extraction solution to obtain Li2CO3 crystal.

## Technical purpose
Hydrometallurgical recycling technology (HRT) for NCM is employed in recovering valuable materials from spent lithium-ion batteries. This process is important for sustainable waste management and material reclamation. The technology supports the advancing circular economy by providing materials that can be used again in battery production, contributing to reduced environmental impact and dependence on virgin material extraction.

## Reference product
- EoL NCM battery: 1; input

## Inputs
All rows: normal; measured
- sodium chloride: 0.00735
- Sulfuric acid(98%): 0.912
- P204（95%）P507（95%）: 6.47e-5
- Kerosene: 0.000324
- Hydrochloric acid (32%): 0.259
- Sodium carbonate（95%）: 0.0224
- Sodium chlorate（96%）: 0.000141
- sodium hydroxide: 0.654
- electricity mix: 0.7416, 0.9144 (2 entries)
- process steam: 1.91
- natural gas: 0.785
- water,water: 6.47
- Infrastructure: 4.6e-10, 4.6e-10 (2 entries)
- Freight rail: 2.26
- Freight Truck: 0.226

## Outputs
All rows: normal; measured
- Nickel sulfate: 0.179
- Manganese Sulfate Monohydrate: 0.179
- Cobalt Sulfate: 0.175
- Lithium carbonate: 0.209
- Copper Scrap: 0.114
- Aluminum scrap: 0.0831
- sodium sulfate: 0.5
- sodium chloride: 0.28
- Dust (unspecified, from stack),Dust (unspecified, from stack): 0.000735, 0.000135 (2 entries)
- sulphuric acid: 3.57e-5, 0.000357 (2 entries)
- hydrogen chloride: 7.09e-5, 0.000709 (2 entries)
- non-methane volatile organic compounds: 7.35e-5, 6.07e-5 (2 entries)
- Water (river water from technosphere, waste water): 0.185
- chemical oxygen demand: 5.54e-5
- Suspended solids, unspecified: 2.76e-5
- ammonia: 3.68e-6
- Residue to landfill: 0.0294, 0.613 (2 entries)

## Data selection and combination
Using a top-down approach, the one-year period material, energy, waste, and emission fluxes are collected from the four companies at the company level and then scaled into the functional unit by dividing with throughput.

## Data treatment and extrapolations
The steam and natural gas collected are in the unit of weight and volume, which are converted to MJ by a factor of 2.8 MJ/kg and 35.6 MJ/kg to match their unit in the Ecoinvent database. GHG emissions from natural gas are not listed in LCIs as they are modeled using the burning process in Ecoinvent.

## Sampling procedure
The amounts of sulfuric acid and hydrochloric acid entering the wastewater are not monitored by the companies investigated, which would emit to water bodies after treatment. Here, we provide an aggressive estimate of them that is 10-fold of the corresponding amounts emitted to the atmosphere.

## Use advice
When utilizing this data set in Life Cycle Assessment (LCA), users should include all relevant upstream and downstream processes in their analysis to accurately represent the entire life cycle of the material. The energy conversions provided should be used to harmonize data with the Ecoinvent database for consistency. GHG emissions from energy consumption should be calculated using emission factors for the specific energy type in the relevant geographic context. Assumptions and estimates used in wastewater treatment must be noted and justified in the LCA report to ensure transparency and validity of the results.

## Review details
Inventory: The internal review was done by several iteration steps concerning raw data validation, raw data documentation, representativity, completeness and consistency of modelling with regard to ISO 14040 and 14044.

## Data sources
- Jiang, S. et al. Environmental impacts of hydrometallurgical recycling and reusing for manufacturing of lithium-ion traction batteries in China. Science of The Total Environment 811, 152224 (2022).
