# Overhead cables manufacture ; 14 km of Inside

Dataset: ILCD process, Unit process, single operation
Geography: NMG-CN
Reference year: 2017
Classification: Systems / Electrics and electronics
Functional unit: The functional unit is 1.5 MW wind turbine
LCI method principle: Attributional
LCI method approaches: Allocation
Generated by: Yunzhi Zhao, ll10088@163.com
Owner: Tiangong LCI Data Working Group
Review: Dependent internal review by Tiangong LCI Data Working Group
Amounts: no units in this file; such an amount is in the reference unit of its flow, which a separate flow dataset defines
copyright: false
licenseType: Free of charge for all users and uses

## General comment
The overhead cables manufactured for 14km, as discussed, are intended for use within wind farms, specifically the ones established with wind turbines of 1.5MW capacity. These cables are designed to withstand the environmental conditions prevalent in the northeastern part of Inner Mongolia, a region with significant wind power installations. They are used to connect wind turbines to substations, enabling the transmission of electrical power generated by the wind turbines.

## Geography
The data regarding the parameters of wind power has been collected from Wang (2012). A wind farm equipped with 33 domestic 1.5 megawatts (MW) wind turbines is regarded as a case study to analyze the environmental impact and its substitution effects. The wind farm is located in the northeast of Inner Mongolia, the province in which most of China’s wind power is installed (Xia and Song, 2017).

## Reference product
- Steel Wire,Cable: 14000; article inperiodical

## Inputs
- aluminium: 49000; article inperiodical

## Deviations from the LCI method approaches
The life cycle inventory for wind power is illustrated as follows. The production and manufacturing stage include the production of wind turbines, substations, and cables, which consume a large amount of energy and emit pollutants (Xue et al., 2015).

## Use advice
When utilizing this LCA dataset for assessing the environmental impact of a wind farm, users must account for the entire life cycle of the overhead cables including their production, installation, use phase, and end-of-life management. It is imperative to understand the regional context of the wind farm, as climate and local environmental conditions can significantly influence the performance and degradation of the overhead cables. Users should consider local energy mix, potential recycling processes, and maintenance practices for the cables when conducting their assessment.

## Review details
Inventory: The internal review was done by several iteration steps concerning raw data validation, raw data documentation, representativity, completeness and consistency of modelling with regard to ISO 14040 and 14044.

## Data sources
- Li, H., Jiang, H.-D., Dong, K.-Y., Wei, Y.-M. & Liao, H. A comparative analysis of the life cycle environmental emissions from wind and coal power: Evidence from China. Journal of Cleaner Production 248, 119192 (2020).
