# Installation ; Wind turbine (The categories of wind turbine : 27×3.6MW+1×5MW)

Dataset: ILCD process, Unit process, single operation
Geography: SH-CN
Reference year: 2009
Classification: Unit processes / Energy carriers and technologies / Renewable fuels
Functional unit: The functional unit is 1 kWh on-grid electricity provision.
LCI method principle: Consequential
LCI method approaches: Allocation
Generated by: Yunzhi Zhao, ll10088@163.com
Owner: Tiangong LCI Data Working Group
Review: Dependent internal review by Tiangong LCI Data Working Group
Amounts: no units in this file; such an amount is in the reference unit of its flow, which a separate flow dataset defines
copyright: false
licenseType: Free of charge for all users and uses

## General comment
The wind turbines described are implemented in constructing the Donghai Bridge Offshore Wind Farm (DBOWF), which serves as a renewable energy generation facility. This infrastructure harnesses wind power to provide on-grid electricity. These specific turbines, totalling 27 units of 3.6MW and a single unit of 5MW capacity, are designed for large-scale energy production and are installed offshore to capitalize on the wind resources available at sea.

## Geography
The studied wind farm, the Donghai Bridge Offshore Wind Farm (DBOWF), is China's first offshore wind farm within the jurisdiction of Shanghai, as well as the first offshore wind farm outside Europe. The project has two-phases of construction, located on each side of the Donghai bridge (Fig. 1).

## Reference product
- Wind tower foundation: 28; measured
  27 3.6-MW wind turbines and one 5-MW prototype wind turbine.

## Inputs
- Diesel: 487000; calculated
- Energy, geothermal, converted: 3.25e7; calculated

## Outputs
- carbon dioxide: 2.1962e6; calculated
- particles (PM2.5): 2300; calculated
- sulfur dioxide: 3400; calculated
- nitrous oxide: 24400; calculated

## Deviations from the LCI method approaches
The present study employed the PLCA modeling approach to calculate the energy and environmental emissions of a typical offshore wind farm in China. The cradle-to-grave process includes four stages, materials and equipment manufacturing, transportation and installation, operation and maintenance, and dismantling and recycling (Fig. 2).

## Data selection and combination
The technical parameters of wind turbines, foundations and cables are obtained from the design documents of the DBOWF (Table 2). The energy and emissions factors (i.e., the energy consumption and environmental emissions of per unit material and component production) are derived from the Ecoinvent 2.2 dataset (Ecoinvent Centre, 2009), and the coefficients of China's practices were preferentially referred. For key materials and equipment, their sea transportation energy is calculated from the transportation load and shipping energy intensity. The facility installation energy and emissions were estimated based on the construction plan. The wind farm's operation and maintenance data, such as the frequency and working time of maintenance, were obtained from site investigations with engineers and technicians. The uncertainties associated with model parameters and input data are illustrated in the sensitivity analysis section of this paper.

## Use advice
When utilizing this life cycle assessment data, users should account for regional specificity such as China's unique energy mix and environmental conditions, which may influence the environmental impact of the wind farm. It is also essential to note that the energy and emission factors are based on the Ecoinvent 2.2 dataset and should be updated if more recent or region-specific data becomes available. Users should consider the transportation of materials and components, the specific installation energy consumption and emissions as described in the DBOWF construction plan, and include operation and maintenance practices in the impact analysis. Sensitivity analysis should be conducted to understand the influence of uncertainties in model parameters and input data.

## Review details
Inventory: The internal review was done by several iteration steps concerning raw data validation, raw data documentation, representativity, completeness and consistency of modelling with regard to ISO 14040 and 14044.

## Data sources
- Yang, J. et al. The life-cycle energy and environmental emissions of a typical offshore wind farm in China. Journal of Cleaner Production 180, 316–324 (2018).
