# Electricity production ; Electricity mix ; Hainan

Dataset: ILCD process, Unit process, single operation
Geography: HAIN-CN
Reference year: 2019
Classification: Unit processes / Energy carriers and technologies / Electricity
Generated by: Ruoxi Xiong, xiongrx0126@163.com
Owner: Tiangong LCI Data Working Group
Review: Dependent internal review by Tiangong LCI Data Working Group
Amounts: no units in this file; such an amount is in the reference unit of its flow, which a separate flow dataset defines
copyright: false
licenseType: Free of charge for all users and uses

## General comment
Electricity mix includes thermal, hydro, wind, nuclear and solar generation

## Technical purpose
This electricity mix, generated through thermal, hydro, wind, nuclear, and solar power, is used for general consumption in residential, commercial, and industrial sectors across Hainan.

## Reference product
- Electricity: 3.6; missing unimportant
  [{'text': '能量', 'type': 'text'}]

## Inputs
All rows: missing unimportant
- electricity for thermal power: 2.21402
  [{'text': '能量', 'type': 'text'}]
- electricity from hydroelectric power plant: 0.177156
  [{'text': '能量', 'type': 'text'}]
- electricity for nuclear power: 1.01083
  [{'text': '能量', 'type': 'text'}]
- electricity from wind power: 0.0521028
  [{'text': '能量', 'type': 'text'}]
- electricity for solar power: 0.145894
  [{'text': '能量', 'type': 'text'}]

## Use advice
When utilizing this dataset for Life Cycle Assessment, it is important to account for the specific mix of generation sources in the Hainan electricity grid. Ensure that the proportion of thermal, hydro, wind, nuclear, and solar power accurately reflects the current energy mix. Consider regional differences in generation and potential shifts in the energy mix over time. Methodological considerations should include the lifecycle stages of different generation technologies and impacts of transmission losses.

## Review details
Inventory: The internal review was done by several iteration steps concerning raw data validation, raw data documentation, representativity, completeness and consistency of modelling with regard to ISO 14040 and 14044.

## Data sources
- 能源统计年鉴2020
