# Transport of module waste;PV module waste;transport;Diesel consumption

Dataset: ILCD process, Unit process, single operation
Geography: CN
Classification: Unit processes / Transport services / Road
Generated by: Nan Wang, 1209824595@qq.com
Owner: Tiangong LCI Data Working Group
Review: Dependent internal review by Tiangong LCI Data Working Group
Amounts: no units in this file; such an amount is in the reference unit of its flow, which a separate flow dataset defines
copyright: false
licenseType: Free of charge for all users and uses

## General comment
The collection stage considers removing the PV module wastes from the power stations, excluding the removal of modules from the brackets. The transportation stage involves carrying PV waste components by diesel trucks from power stations to the nearest waste treatment plants.

## Technical purpose
The given data describes the process involved in the collection and transportation of photovoltaic (PV) module waste. The industrial application of this process is specific to the solar energy sector, where it is used for the proper disposal and handling of end-of-life PV modules. The transportation only involves the movement of PV waste components by diesel-powered trucks from the solar power stations to the nearest waste treatment facilities.

## Reference product
- PV Module Waste: 1000; input; estimated

## Inputs
- Diesel: 0.02149; calculated
  Unit description: 1km consumes 21.49kg of diesel fuel

## Outputs
All rows: software or database
- PV Module Waste: 1000
- Nitrogen oxides: 0.382
- sulfur dioxide: 1.379
- carbon dioxide: 67
- methane: 0.091
- particles (> PM10),particles (>PM10): 0.14

## Use advice
Users of this dataset should ensure they accurately account for the collection and diesel-based transport of PV module waste in their LCA. It is essential to note that the data excludes the energy and processes involved in removing the modules from their mounting structures. Data users should consider system boundaries that include transportation to waste treatment facilities but not de-installation from mounting hardware. Furthermore, users should be aware of the limitations regarding only diesel transport is accounted for, and alternative or additional means of transportation should be treated separately.

## Review details
Inventory: The internal review was done by several iteration steps concerning raw data validation, raw data documentation, representativity, completeness and consistency of modelling with regard to ISO 14040 and 14044.

## Data sources
- Li, J. et al. Life cycle analysis of the economic costs and environmental benefits of photovoltaic module waste recycling in China. (2023).
