# Copper slag Recycling;Cement;production of cement after Floatation;Copper Slag

Dataset: ILCD process, Unit process, single operation
Geography: CN
Reference year: 2010
Classification: Unit processes / Materials production / Other mineralic materials
Functional unit: The functional unit was defined as the recycling of 1 ton of copper slag from copper smelting process.
LCI method principle: Attributional
LCI method approaches: Substitution
Generated by: Peng Wang, 2867919560@qq.com
Owner: Tiangong LCI Data Working Group
Review: Dependent internal review by Tiangong LCI Data Working Group
Amounts: no units in this file; such an amount is in the reference unit of its flow, which a separate flow dataset defines
copyright: false
licenseType: Free of charge for all users and uses

## General comment
Recycled copper slag is utilized for cement production in various processes including direct cement production, post-electric furnace treatment, post-floatation, as well as for creating unfired bricks following floatation. This reflects a range of secondary applications for copper slag, a by-product of copper smelting, tailored to reduce waste and leverage its material properties in the construction industry.

## Geography
a dominant copper company in China.

## Time period
were obtained from internal report of relevant company in 2010.

## Technology and included processes
four scenarios of copper slag recycling were developed in terms of technological availability: (1) production of cement directly, (2) production of cement after Electric Furnace treatment, (3) production of cement after Floatation, and (4) production of unfired brick after Floatation.

## Reference product
- Refined copper: 1000; measured

## Inputs
All rows: measured
- hard coal,hard coal,hard coal: 650
  Hard coal
- crude oil; 42.3 MJ/kg: 19
  Crude oil
- natural gas; 44.1 MJ/kg: 14.9
  Natural gas
- Limestone: 2518.3
- clay: 504.2
  Clay
- gypsum: 155.7
  Gypsum

## Outputs
All rows: measured
- carbon dioxide (fossil): 2066.7
  原文未区分bio和fossil，根据专家判断此处为fossil
- carbon monoxide,carbon monoxide (fossil): 1.4
  原文未区分bio和fossil，根据专家判断此处为fossil
- sulfur dioxide: 4.9
  SO2
- Nitrogen oxides: 6.8
  NOx needs to be supplemented
- particles (PM2.5 - PM10): 9.1
  Dust needs to be replenished

## Deviations from the LCI method approaches
characterization, normalization and weighting, after the allocation procedure by using the avoided burdens method.

## Data selection and combination
The data of copper slag treatment were mainly derived from a dominant copper company in China. The production data of cement and brick mostly came from real plant that adopts advanced equipment and processes, supplemented by published literature.

## Data treatment and extrapolations
GaBi 4 software was used to model the copper recycling system and determine the environmental impacts in this study. The Eco-Indicator 99 (EI99) was applied for the life cycle impact assessment

## Use advice
When using the provided LCA data for recycled copper slag in cement and brick production, practitioners should apply the data corresponding to the specific recycling scenario relevant to their study. The use phase behavior and methodological considerations such as allocation procedures and the avoided burden method must be carefully followed as outlined by the Eco-Indicator 99 (EI99) approach. The functional unit for the assessment is 1 ton of recycled copper slag from the copper smelting process. Ensure compliance with the technological applicability relevant to the region's standards and practices.

## Review details
Inventory: The internal review was done by several iteration steps concerning raw data validation, raw data documentation, representativity, completeness and consistency of modelling with regard to ISO 14040 and 14044.

## Data sources
- Song, X. L., Yang, J. X., Wang, J. W. & Wu, W. J. Assessing the Life Cycle Environmental and Economic Performance of Copper Slag Recycling. AMR 878, 219–225 (2014).
