# cement production;cement, common portland cement;dry rotary kiln, 1000-2000 t/d;mixed solid wastes

Dataset: ILCD process, Unit process, black box
Geography: GS-CN
Classification: Materials production / Other mineralic materials
Generated by: Siqi Yang, ysqsophia@gmail.com
Owner: Tiangong LCI Data Working Group
Review: Dependent internal review by Tiangong LCI Data Working Group
Amounts: no units in this file; such an amount is in the reference unit of its flow, which a separate flow dataset defines
copyright: false
licenseType: Free of charge for all users and uses

## General comment
Small (dry rotary kiln with a production capacity between 1000 tons and 2000 tons clinker/day).100% cement dust was recycled. 100% wastewater was reused on site.

## Geography
Jinchang Cement Group Co., Ltd. (Gansu, China)

## Technical purpose
This data set describes the use of a small-scale dry rotary kiln for the production of common Portland cement with a production capacity ranging between 1000 to 2000 tons of clinker per day. The cement produced is typically used for construction purposes as it makes up approximately 98% of the total cement production in China. The process emphasizes the principles of waste minimization with 100% cement dust recycling and on-site wastewater reuse.

## Model description
Taking the production of 1 ton of ordinary Portland cement as a functional unit, this type of cement accounts for approximately 98% of total production in China.Dry rotary kiln system boundary. Three stages are usually considered, namely raw material crushing, clinker generation and cement mill. The clinker generation stage includes homogenization, preheating and precalcining as well as firing in the kiln. Each process takes into account raw materials, energy consumption, road transport, direct emissions (i.e. carbon dioxide, sulfur dioxide, nitrogen oxides and particulate matter) and infrastructure.

## Reference product
- cement, common portland cement: 1000
  Common Portland cement

## Inputs
- calcium carbonate: 840
  Limestone
- gypsum: 71
  Gypsum
- water: 3730
  Water
- sandstone: 76
  Sandstone
- shale: 28
  Shale
- nickel smelter slag: 18
  Nickle slag
- blast furnace slag: 41
  Blast furnace slag
- ash: 208
  Fly ash
- hard coal; 26.3 MJ/kg: 113
  Coal
- electricity, medium voltage: 367.524
  Electricity

## Outputs
- carbon dioxide: 560
  CO2. CO2 emission was calculated according to Eq.(Wu et al., 2006): E = 3:67a x k x Mcoal x Q + 0.38 x Mlimestone, where E, a, k, Mcoal, Q, and Mlimestone represent the amount of CO2 emission per ton of cement production, carbon oxygenation efficiency of coal (0.93, National Development and Reform Commission, 2011), carbon emission factor of coal (26.1 x 10-3, National Development and Reform Commission, 2011), mass of coal consumption per ton of cement production, caloric value of coal, and mass of limestone consumption per ton of cement production, respectively. The caloric value of coal considered in the present study was 24.48 MJ/kg.
- electricity, medium voltage: 0.04
  SO2. Direct air emission data were obtained from the Hongda Cement Plant (Yunnan, China).
- Nitrogen oxides: 0.18
  NOx. Direct air emission data were obtained from the Hongda Cement Plant (Yunnan, China).
- particles (> PM10): 0.16
  Particulates. The particle size is not specified. Here we treat it as PM>10. Direct air emission data were obtained from the Hongda Cement Plant (Yunnan, China).

## Data selection and combination
For the small-scale production scenario, data from Jinchang Cement Group Co., Ltd. in Gansu Province, China, are used. Due to the lack of information on the former, direct atmospheric emission data come from Yunnan Hongda Cement Plant.

## Use advice
When utilizing this data set for Life Cycle Assessment (LCA) of cement production, it is important to ensure that the boundaries of the system are well-defined, including raw material crushing, clinker generation, and cement milling stages. Additionally, the users should consider the homogenization, preheating, precalcining, and firing processes within the kiln. Attention must be paid to the inclusion of raw materials, energy consumption, road transportation, direct emissions, and infrastructure in the model. It is crucial to maintain consistent methodological approaches when integrating this dataset into broader assessments, especially concerning waste management practices such as dust recycling and wastewater reuse.

## Review details
Inventory: The internal review was done by several iteration steps concerning raw data validation, raw data documentation, representativity, completeness and consistency of modelling with regard to ISO 14040 and 14044.

## Data sources
- Wei Chen, Jinglan Hong, & Changqing Xu. (2015). Pollutants generated by cement production in China, their impacts, and the potential for environmental improvement. JOURNAL OF CLEANER PRODUCTION, 103, 61–69.
