# Citrus production

Dataset: ILCD process, Unit process, black box
Geography: IR
Reference year: 2019
Valid until: 2020
Classification: Unit processes / Materials production / Agricultural production means
Functional unit: One hectare of citrus orchard
Generated by: zhu xian, zzhu0918@163.com
Owner: Tiangong LCI Data Working Group
Review: Dependent internal review by Tiangong LCI Data Working Group
Amounts: no units in this file; such an amount is in the reference unit of its flow, which a separate flow dataset defines
copyright: false
licenseType: Free of charge for all users and uses

## General comment
Cultivate citrus seedlings, apply pesticides, chemical fertilizers, farm manure and water, and use manual and machine to harvest citrus products，and produce emissions to the air, soil and water, respectively.

## Geography
in Mazandaran Province, Iran

## Technical purpose
The citrus production process described is intended for the cultivation and harvesting of citrus plants over a one-hectare orchard. It includes propagation of citrus seedlings, application of pesticides, chemical fertilizers, and farmyard manures, as well as irrigation. Harvesting is performed with a combination of manual labor and machinery. This process is applicable for the supply of citrus fruits to the food industry, as well as for fresh consumption in the market.

## Reference product
- Citrus: 150; measured

## Inputs
All rows: measured
- diesel oil: 0.1628
- Nitrogenous fertilizer: 86.6
- Phosphate fertilizer: 47.1
- Potassium fertilizer: 30.8
- Pesticide: 39
- Electricity: 326.88
- water: 359.6
- Labor: 4.2
- Farmyard manure: 600

## Outputs
All rows: measured
- carbon dioxide (biogenic): 772.54
  The original text does not distinguish between biogenic and fossil, which in the expert's judgment is biogenic here.
- dinitrogen: 0.801
- methane (biogenic): 0.029
  (same comment as for carbon dioxide (biogenic))
- sulfur dioxide: 3.848
- ammonia: 11.022
- particles (PM10): 0.981
- carbon monoxide (biogenic): 1.375
- nitrate: 58.486
- phosphate: 0.196

## Use advice
Users of this LCA data set should consider the geographic specificity of the data, as it is representative of citrus production in Mazandaran Province, Iran. Specific attention should be paid to the local agricultural practices and environmental conditions outlined in the data. Furthermore, when integrating this data into wider LCA studies, users should account for any subsequent processes such as transportation, processing, packaging, and their associated environmental impacts. The inclusion or exclusion of emissions from recycling processes should be decided based on the goal and scope of the study. Methodological consistency is vital when combining this data with other datasets.

## Review details
Inventory: The internal review was done by several iteration steps concerning raw data validation, raw data documentation, representativity, completeness and consistency of modelling with regard to ISO 14040 and 14044.
