# Basin Modeling;Source rock and crude oil samples;Rock–Eval pyrolysis, GC/GC–MS, vitrinite reflectance measurements, and basin modeling

Dataset: ILCD process, Unit process, single operation
Geography: CN
Reference year: 2023
Classification: Unit processes / Energy carriers and technologies / Energetic raw materials
LCI method principle: Attributional
LCI method approaches: Consequential
Generated by: Shikang Kang, 908798159@qq.com
Owner: Tiangong LCI Data Working Group
Review: Dependent internal review by Tiangong LCI Data Working Group
Amounts: no units in this file; such an amount is in the reference unit of its flow, which a separate flow dataset defines
copyright: false
licenseType: Free of charge for all users and uses

## General comment
Evaluate pyrolysis of rocks by GC/GC-MS, vitrinite reflectivity measurement and basin simulation

## Geography
Regions of China

## Time period
Publication time of literature

## Technology and included processes
using analytical techniques such as Rock–Eval pyrolysis, GC/GC–MS, vitrinite reflectance measurements, and basin modeling

## Technical purpose
The technical usage of the described industrial process involves characterizing the oil and gas generation potential of source rocks and crude oil samples. Specifically, it is used for the evaluation of hydrocarbon potential and maturity levels in formations by employing methods like Rock–Eval pyrolysis, Gas Chromatography/Gas Chromatography-Mass Spectrometry (GC/GC-MS), vitrinite reflectance measurements, and basin modeling. This type of analysis is crucial for the petroleum industry to guide exploration and evaluate the feasibility of resource extraction.

## Reference product
- natural gas: 216000; input; max 216000; uniform; calculated
  Peak 60mW/m2

## Outputs
- carbon dioxide (biogenic): 4.925e-5; min 1.216e-5; max 4.925e-5; uniform; calculated
  The original text did not distinguish between Bio and Fossil. According to experts, this is Bio. The (S2) value range of Sokor-2 sample is 12.16-49.25 milligrams of hydrocarbons per gram of rock
- methane (fossil): 60; max 60; uniform; calculated
  There is no mining output of natural gas in the literature. Assume that the input in the process of natural gas production: output=1:1

## Data selection and combination
Results indicate that the Upper Cretaceous (Donga and Yogou formations) and the Eocene Sokor-1 Formation have oil and gas generation potential with II/III and III type kerogens.

## Use advice
When using this data set within the context of a Life Cycle Assessment, it is advised to consider the precise geological context and time of sample collection as these factors can significantly impact analytical results. Additionally, it is crucial to account for methodological consistency when comparing data from different regions or periods. The inclusion of uncertainties in measurements and the representativeness of samples for larger formations should be clearly documented. Users should also be aware of the technological applicability and limitations of the analytical techniques, ensuring appropriate extrapolation and interpretation of data.

## Review details
Inventory: The internal review was done by several iteration steps concerning raw data validation, raw data documentation, representativity, completeness and consistency of modelling with regard to ISO 14040 and 14044.

## Data sources
- Moussa, H. A., Bohari, A. D., Ahmed, K. S. & Harouna, M. Thermal maturity evolution and hydrocarbon generation in the Dibeilla oil field, Termit Basin, Eastern Niger: an organic geochemical and basin modeling approach. Arab J Geosci 16, 338 (2023).
