# cement production;cement, common portland cement;shaft kiln, <2000 t-cl/d

Dataset: ILCD process, Unit process, black box
Geography: CN
Reference year: 2010
Classification: Materials production / Other mineralic materials
Generated by: Jing Guo, jingguo92@gmail.com
Owner: Tiangong LCI Data Working Group
Review: Dependent internal review by Tiangong LCI Data Working Group
Amounts: no units in this file; such an amount is in the reference unit of its flow, which a separate flow dataset defines
copyright: false
licenseType: Free of charge for all users and uses

## General comment
The shaft kiln holds a market share of 38.18%, and the scale of the clinker production less than 2000 tons per day accounts for 38.18%. In order to reflect the present environmental impact of China's cement industry, taking into account the adjustment of the industry structure and development status in recent years, and considering the differences in cement production technology and the size of different enterprises, China's cement industry is classified into four categories: large new dry process (>4000 tons of clinker per day), medium new dry process (2000~4000 tons of clinker per day), small new dry process (<2000 tons of clinker per day), and shaft kiln (<2001 tons of clinker per day).

## Technology and included processes
For shaft kilns, the market share accounts for 38.18%; for <2000 tons-clinker/day, the scale share accounts for 38.18%. In order to reflect the environmental impact of China's cement industry at this stage, combined with the structural adjustment and development status of China's cement industry in recent years, and taking into account the level of cement production technology and the differences between cement companies of different sizes, this study divides China's cement industry into the following four categories : Large new dry process (>4000 tons-clinker/day), medium-sized new dry process (2000~4000 tons-clinker/day), small new dry process (<2000 tons-clinker/day) and vertical kiln ( <2000 tons-clinker/day).

## Technical purpose
Common Portland cement produced via the shaft kiln process is primarily designed for general construction purposes such as the creation of concrete, mortar, and stucco. This type of cement is utilized in various construction activities, including residential, commercial, and infrastructure projects. The cement's production scale in this dataset is characterized by a daily output of less than 2000 tons of clinker, reflecting medium- to small-scale cement plants.

## Model description
Take 1 ton of general cement produced in China with a clinker content of 70% as the functional unit. Cement production includes raw meal preparation, clinker calcination and cement grinding.

## Reference product
- cement, common portland cement: 1000
  General cement with a clinker content of 70%.

## Inputs
- limestone, crushed, for mill: 910
  Limestone
- clay: 120
  Clay
- gypsum stone (CaSO4-dihydrate): 50
  Gypsum
- hard coal; 26.3 MJ/kg: 141.12
  Coal consumption during clinker burning. The coal consumption during burning is calculated based on the standard coal consumption per ton of clinker of different production processes and scales.
- hard coal; 26.3 MJ/kg: 3.5
  Coal consumption during raw material drying. The research takes the coal consumption for drying as 3.50kg/t-cement.
- electricity, medium voltage: 209.16
  Electricity consumption during clinker burning. The electricity consumption is calculated based on the comprehensive electricity consumption for different production processes and scales.
- electricity, medium voltage: 118.44
  Other electricity consumption. Electricity is mainly used for the drive of raw material crushing, raw mill, cement mill, dust removal equipment and other machinery. Electricity consumption is calculated according to the comprehensive electricity consumption of different production processes and scales.

## Outputs
- carbon dioxide: 619.01
  The CO2 emissions are calculated theoretically and consist of two aspects: on the one hand from the use of coal for calcining clinker and on the other hand from the decomposition of carbonates during the calcination of raw materials such as limestone (CaCO3) to produce lime (CaO).
- sulfur dioxide: 0.29
  SO2. SO2, NOX, and COD emissions were obtained from the results of the recent China Cement Industry Pollution Source Survey.
- Nitrogen oxides: 0.16
  NOX. SO2, NOX, and COD emissions were obtained from the results of the recent China Cement Industry Pollution Source Survey.
- particles (PM2.5): 0.6168
  <PM2.5. The graded emissions of particulate matter from cement products in functional units were calculated based on the investigation of particulate matter production coefficients of different cement production processes and scales by the pollution source census, as well as the proportion of particulate matter generated by different cement production equipment and the share of dust removal technology application and graded dust removal efficiency.
- particles (PM2.5 - PM10): 0.3
  PM2.5-10. The graded emissions of particulate matter from cement products in functional units were calculated based on the investigation of particulate matter production coefficients of different cement production processes and scales by the pollution source census, as well as the proportion of particulate matter generated by different cement production equipment and the share of dust removal technology application and graded dust removal efficiency.
- particles (> PM10): 0.1523
  >PM10. The graded emissions of particulate matter from cement products in functional units were calculated based on the investigation of particulate matter production coefficients of different cement production processes and scales by the pollution source census, as well as the proportion of particulate matter generated by different cement production equipment and the share of dust removal technology application and graded dust removal efficiency.
- chemical oxygen demand: 0.00021
  COD. SO2, NOX, and COD emissions were obtained from the results of the recent China Cement Industry Pollution Source Survey.

## Use advice
For Life Cycle Assessment purposes, the data set corresponding to cement production via shaft kiln with a clinker output of less than 2000 tons per day should be applied cautiously. Consider the technological applicability and ensure that it aligns with the detailed scope of the assessed system, especially given the market and scale share presented. Users should account for the specific environmental impacts associated with this type of production process and adjust their assessment models accordingly. The differentiated approach within China's cement industry—considering large, medium, and small new dry processes—should be reflected accurately in LCA studies. Ensure consideration of industry structure adjustments and technological development variances over recent years.

## Review details
Inventory: The internal review was done by several iteration steps concerning raw data validation, raw data documentation, representativity, completeness and consistency of modelling with regard to ISO 14040 and 14044.

## Data sources
- 姜睿 & 王洪涛. (2010). 中国水泥工业的生命周期评价. 化学工程与装备, 4, 183–187.
