# Electricity production ; Thermal power ; Hebei

Dataset: ILCD process, Unit process, single operation
Geography: HEB-CN
Reference year: 2019
Classification: Unit processes / Energy carriers and technologies / Electricity
Generated by: Ruoxi Xiong, xiongrx0126@163.com
Owner: Tiangong LCI Data Working Group
Review: Dependent internal review by Tiangong LCI Data Working Group
Amounts: no units in this file; such an amount is in the reference unit of its flow, which a separate flow dataset defines
copyright: false
licenseType: Free of charge for all users and uses

## General comment
Thermal power generation includes seventeen fossil fuels such as raw coal, washed coal, oil and natural gas. The process only considers the direct power generation process, not the upstream raw material extraction and processing and the downstream power consumption

## Time period
Calculated based on data from the 2019 Energy Statistics Yearbook

## Technical purpose
The data set describes the application of thermal power generation in Hebei province, which utilizes multiple fossil fuels, including raw coal, washed coal, oil, and natural gas, to generate electricity. This process is specifically focused on the generation of electricity and does not encompass upstream activities related to raw material extraction and processing, nor downstream activities such as power consumption by end-users. It is relevant for the evaluation of direct emissions of greenhouse gases associated with electricity generation facilities.

## Reference product
- electricity for thermal power: 3.6; calculated

## Inputs
All rows: calculated
- Raw coal: 0.328252
- Other Washed Coal: 0.00882072
- Gangue, in ground: 0.010969
- Coke oven gas: 0.007217
- blast furnace gas: 0.382394
- Converter gas: 0.045697
- Diesel: 3.556e-5
- fuel oil, unspecified: 1.06e-6
- Petroleum Coke: 3.87e-6
- refinery gas: 5.492e-5
- natural gas: 0.000278

## Outputs
- carbon dioxide (fossil): 1.01824; calculated
- sulfur dioxide: 0.000152338; calculated
- Nitrogen oxides: 0.000260582; calculated
- particles (> PM10): 3.80603e-5; calculated

## Data treatment and extrapolations
For the accounting method, please refer to the "Enterprise Greenhouse Gas Emissions Accounting Methods and Reporting Guidelines for Power Generation Facilities". Different forms of power generation and fuel consumption come from Chapter 3 (Energy Production) and Chapter 6 (Regional Energy Balance Sheet) in the "China Energy Statistical Yearbook 2020". The fuel parameters such as low calorific value and carbon content per unit calorific value used to calculate the carbon dioxide emission factor come from the "2019 China Regional Power Grid Carbon Dioxide Baseline Emission Factor Calculation Instructions OM" and the "Enterprise Greenhouse Gas Emission Accounting Method and Reporting Guide for Power Generation Facilities" 》

## Use advice
Users should adopt this data with caution, considering only the direct power generation emissions while excluding upstream and downstream processes. The accounting method for greenhouse gas emissions needs to reference the 'Enterprise Greenhouse Gas Emissions Accounting Methods and Reporting Guidelines for Power Generation Facilities.' Users should correlate the consumption of different fossil fuel forms with the power generated, as outlined in Chapter 3 (Energy Production) and Chapter 6 (Regional Energy Balance Sheet) of the 'China Energy Statistical Yearbook 2020.' Fuel parameters like low calorific value and carbon content per unit of heat must be calculated based on '2019 China Regional Power Grid Carbon Dioxide Baseline Emission Factor Calculation Instructions OM.' Ensure that proper regional parameters are applied to maintain data accuracy and relevance.

## Review details
Inventory: The internal review was done by several iteration steps concerning raw data validation, raw data documentation, representativity, completeness and consistency of modelling with regard to ISO 14040 and 14044.

## Data sources
- 熊若熙. 中国电力生产和消费二氧化碳与污染物排放因子核算. (清华大学, 2023).
