# Production and use of virgin aluminum alloy body in white ; Virgin aluminum alloy body in white ; Bauxite

Dataset: ILCD process, Unit process, single operation
Geography: CN
Reference year: 2011
Classification: Unit processes / Materials production / Metals and semimetals
Generated by: Huimin Chang, huiminchang@tsinghua.edu.cn
Owner: Tiangong LCI Data Working Group
Review: Dependent internal review by Tiangong LCI Data Working Group
Amounts: no units in this file; such an amount is in the reference unit of its flow, which a separate flow dataset defines
copyright: false
licenseType: Free of charge for all users and uses

## General comment
The virgin aluminum alloy body in white represents the foundational metal structure of a vehicle before being painted, which is typically used in the automotive industry for the production of car bodies. The material processed originates from bauxite and is primarily utilized in the manufacturing of new vehicles.

## Time period
Year of publication

## Reference product
- primary aluminum alloy body-in-white: 375.3; measured
  原生铝合金白车身

## Inputs
All rows: measured
- bauxite: 6831
  铝土矿
- soda ash, dense: 195
  (1)纯碱
- calcium carbonate: 891
  (2)石灰石
- hard coal: 128.5
  (3)无烟煤
- Sodium bicarbonate: 41
  (4)苏打粉
- redmud from bauxite digestion: 2680.88
  (5)拜耳赤泥
- anode, prebake, for aluminium electrolysis: 759
  (6)炭极
- cryolite: 22.1
  (7)冰晶石
- aluminium fluoride: 35
  (8)氟化铝
- fluorspar: 4.1
  (9)氟化钙
- Magnesium fluoride: 5.5
  (10)氟化镁
- sodium chloride, powder: 27
  (11)NaCl
- potassium chloride, industrial grade: 27
  (12)KCl
- Water, unspecified natural origin: 41068
  (13)水
- Diesel oil: 6.33
  (1)柴油
- hard coal: 950.3
  (3)大同统煤
- Petroleum Coke: 75
  (4)冶金焦
- heavy fuel oil: 561.69
  (5)重油
- natural gas, liquefied: 201.25
  (6)天然气
- electricity, high voltage, aluminium industry: 20536.5
  (9)电力
- petrol, unleaded: 16775.7
  (10)汽油

## Outputs
All rows: measured
- carbon dioxide (fossil),carbon dioxide (fossil): 60488.1
  (1)CO2kg
- carbon monoxide (fossil),carbon monoxide (fossil): 4400.76
  (2)CO
- sulfur dioxide: 116.67
  (3)SO2kg
- Nitrogen oxides: 546.85
  (4)NOxkg
- hydrocarbons (unspecified): 770.85
  (5)CxHy
- hydrocarbons (unspecified): 0.02
  (6)HC
- particles, unspecified: 0.02
  (7)PM
- hydrogen fluoride: 17.3
  (8)HF
- Dust: 42
  (9)粉尘

## Use advice
Users of this data set should note the year of publication and ensure the data represents current technology and industry practices. Consideration should be given to technological updates and market changes that may have occurred since the year of publication. If the data are used for assessing the environmental impact in Life Cycle Assessment studies, ensure that the scope of the LCA includes the production phase of the aluminum and its end-of-life stage, potentially including recycling processes if applicable.

## Review details
Inventory: The internal review was done by several iteration steps concerning raw data validation, raw data documentation, representativity, completeness and consistency of modelling with regard to ISO 14040 and 14044.

## Data sources
- 刘海东. 乘用车轻量化绿色效应评价理论与方法研究. (吉林大学, 2011).
