# Soil and groundwater remediation;Ex-situ;Soil washing;Site foundation

Dataset: ILCD process, Unit process, single operation
Geography: KR
Reference year: 2023
Classification: Other Services / Repair and maintenance
Generated by: Huang Yue, huangyue@caep.org.cn
Owner: Tiangong LCI Data Working Group
Review: Dependent internal review by Tiangong LCI Data Working Group
Amounts: no units in this file; such an amount is in the reference unit of its flow, which a separate flow dataset defines
copyright: false
licenseType: Free of charge for all users and uses

## General comment
include excavation of soil, transportation of soil and washing equipment, installation of washing equipment, and ground foundation

## Geography
Incheon City, approximately 50 km east of Seoul, South Korea

## Technology and included processes
SiteWiseTM ver. 2

## Technical purpose
The process described is an ex-situ soil washing technique for soil and groundwater remediation primarily used in environmental engineering and site restoration. This process is intended for the decontamination of soil to prepare it for a new site foundation or to revive an ecosystem. It involves excavation, transportation to a treatment site, and cleaning of the soil using specialized washing equipment.

## Reference product
- soil: 4275; input; missing unimportant

## Inputs
- Diesel: 0.1; missing unimportant
- water: 60; missing unimportant

## Outputs
- carbon dioxide: 43100; missing unimportant
- particles (PM10): 2.76; missing unimportant
- sulfur oxides: 8; missing unimportant
- nitrous oxide: 31.5; missing unimportant

## Data treatment and extrapolations
The total footprint was analyzed by calculating the footprints of each stage separately using SiteWiseTM ver.2

## Use advice
When utilizing this LCA data, ensure that the scope of your assessment matches the methodological framework used in the data set (SiteWiseTM ver.2). Consider the geographic specificity of the data, as the provided information pertains to operations conducted in Incheon City, approximately 50 km east of Seoul, South Korea. The footprint calculations are site-specific and may not represent conditions in other locations. Users need to consider if the process stages and conditions align with the characteristics of their own project when applying this data.

## Review details
Inventory: The internal review was done by several iteration steps concerning raw data validation, raw data documentation, representativity, completeness and consistency of modelling with regard to ISO 14040 and 14044.

## Data sources
- Kim, D.-H., Hwang, B.-R., Moon, D.-H., Kim, Y.-S. & Baek, K. Environmental assessment on a soil washing process of a Pb-contaminated shooting range site: a case study. ENVIRONMENTAL POLLUTION AND RISK ASSESSMENTS (2013) doi:
