# Scrap Aluminum Melting and Ingot Casting ; Recycled Aluminum Ingots ; New Aluminum Scrap

Dataset: ILCD process, Unit process, single operation
Geography: CN
Reference year: 2013
Classification: Unit processes / Materials production / Metals and semimetals
Generated by: Huimin Chang, huiminchang@tsinghua.edu.cn
Owner: Tiangong LCI Data Working Group
Review: Dependent internal review by Tiangong LCI Data Working Group
Amounts: no units in this file; such an amount is in the reference unit of its flow, which a separate flow dataset defines
copyright: false
licenseType: Free of charge for all users and uses

## General comment
This process describes the recycling of scrap aluminum to produce recycled aluminum ingots. Recycled aluminum ingots can potentially be used in various industries including automotive, construction, and packaging, for the manufacturing of components that do not require primary aluminum's high purity level.

## Reference product
- secondary aluminium ingot: 1000; software or database
  Aluminium ingot (secondary) [kg]

## Inputs
- electricity, high voltage, aluminium industry: 397.166; software or database
  Electricity [kWh]
- aluminium scrap, new: 1047.51; software or database
  Processed aluminium scrap [kg]
- argon, liquid: 0.4666; software or database
  Argon [kg]
- chlorine, liquid: 2.0646; estimated
  Chlorine [kg] ; EU-28 used as no specific data for CN and NO available
- quicklime, in pieces, loose: 3.9872; estimated
  Quicklime [kg] ; EU-28 used as no specific data for CN and NO available
- nitrogen, liquid: 16.2689; estimated
  Nitrogen [kg] ; EU-28 used as no specific data for CN and NO available
- oxygen, liquid: 0.1566; estimated
  Oxygen gaseous [kg] ; EU-28 used as no specific data for CN and NO available
- potassium chloride: 122.281; estimated
  Potassium chloride [kg] ; German dataset used as no specific data for CN and NO available
- sodium chloride, powder: 285.323; estimated
  Sodium chloride (salt) [kg] ; EU-28 used as no specific data for CN and NO available
- sodium hydroxide, without water, in 50% solution state: 0.1918; estimated
  Caustic soda (100%) [kg] ; EU-28 used as no specific data for CN and NO available
- sulfuric acid: 0.0303; estimated
  Sulphuric acid (96%) [kg] ; EU-28 used as no specific data for CN and NO available
- freshwater: 331.175; software or database
  Water (fresh water) [kg]
- heat, district or industrial, natural gas: 4789.42; software or database
  Thermal energy from natural gas [MJ]

## Outputs
All rows: software or database
- chloride: 0.02272
  Chloride (to fresh water) [kg]
- Chemical Oxygen Demand (COD): 0.00121
  Chemical oxygen demand (COD) [kg]
- BOD5, Biological Oxygen Demand: 0.00032
  Biological oxygen demand (BOD) [kg]
- Heavy metals to water: 5.3e-5
  Heavy metals to water [kg]
- carbon dioxide (fossil),carbon dioxide (fossil): 0.00729
  Carbon dioxide [kg]
- Chlorine: 0.00237
  Chlorine [kg]
- Dust: 0.2829
  Dust [Particles to air]
- hydrogen chloride: 0.0881
  Hydrogen chloride [kg]
- hydrogen fluoride: 0.02577
  Hydrogen fluoride [kg]
- lead: 0.00108
  Lead (+II) [kg]
- mercury: 7.96e-8
  Mercury (+II) [kg]
- methane (fossil): 0.00039
  Methane [kg] ; Methane [Organic emissions to air (group VOC)]
- Nitrogen oxides: 0.21237
  Nitrogen dioxide [kg]
- Nitrogen oxides: 0.00037
  Nitrous oxide [kg]
- sulfur dioxide: 0.02377
  Sulphur dioxide [kg]
- VOC, volatile organic compounds, unspecified origin: 0.0882
  VOC [kg]
- aluminium: 0.0763
  Aluminium [kg]
- Copper: 0.0021
  Copper (+II) [kg]
- Lead: 3.81e-5
  Lead (+II) [kg]
- Zinc: 0.00127
  Zinc (+II) [kg]

## Data selection and combination
For reliable findings, the most recent and representative data were considered. Regional or country-specific data were used when provided in the GaBi© “professional and extension” database (SP 39) or in the literature. If location-specific data were not found, either comparable data for the country or global data were used. For consistency, data from the same source and year were used if available. Due to data availability, the study did not consider some inputs and background processes if they contributed less than 1% to the total input mass. In contrast, no established production process for secondary production exists as numerous different collectors, processors, and refiners apply various recycling methods (Green et al., 2007). The study used LCI data provided by the Aluminum Association from 2013 for secondary production (Aluminum Association, 2013; International Aluminium Institute, 2017a, International Aluminium Institute, 2017b). An exemplary case was examined, justifying the consideration of a specific dataset. In this study, two main changes were made: 1) a separate aluminium scrap collection process was added; 2) a higher salt input was assumed because many sources stated the large quantities of salt slag often remaining at the end of the recycling process (European Aluminium Association, 2018; Tsakiridis, 2012).

## Use advice
When utilizing this dataset, incorporate it for processes involving secondary aluminum production. Ensure methodological consistency by using data from the same sources and years. Take note that some inputs and background processes contributing less than 1% to total mass were not considered. For secondary production, refer to data provided by the Aluminum Association from 2013, and account for the changes such as separate aluminum scrap collection and increased salt input in the recycling process. Recall that location-specific data should be prioritized if available; however, country or global data may be used as substitutes if regional data is not accessible.

## Review details
Inventory: The internal review was done by several iteration steps concerning raw data validation, raw data documentation, representativity, completeness and consistency of modelling with regard to ISO 14040 and 14044.

## Data sources
- Luthin, A., Backes, J. G. & Traverso, M. A framework to identify environmental-economic trade-offs by combining life cycle assessment and life cycle costing – A case study of aluminium production. Journal of Cleaner Production 321, 128902 (2021).
