# cement production;cement, portland-composite cement, 32.5RMPa;modern dry process, rotary kiln, 5000 t/d

Dataset: ILCD process, Unit process, black box
Geography: DL-LN-CN
Classification: Materials production / Other mineralic materials
Generated by: Siqi Yang, ysqsophia@gmail.com
Owner: Tiangong LCI Data Working Group
Review: Dependent internal review by Tiangong LCI Data Working Group
Amounts: no units in this file; such an amount is in the reference unit of its flow, which a separate flow dataset defines
copyright: false
licenseType: Free of charge for all users and uses

## General comment
The company currently has a modern dry process production line with a capacity of 5000t/d. The raw material mill adopts an advanced vertical four-roller mill from Germany's Loesche, with specifications of LM60.4. Advanced new technology is employed for the clinker calcination using an external decomposition kiln.

## Geography
Dalian Cement Company

## Technology and included processes
The company currently has a modern dry production line with a capacity of 5000t/d, as shown in Figure 6.5. The raw material mill adopts the advanced vertical four-roller mill of Loesche Company of Germany, with specification of LM60.4, as shown in Figure 6.6. Clinker burning adopts advanced new kiln decomposition technology.

## Technical purpose
This data set describes the Portland-composite cement (32.5RMPa) production process on a modern dry process production line with a rotary kiln capacity of 5000 tonnes per day. This cement is typically used in construction applications, where moderate strength development is adequate, such as in residential buildings, pavements, and where sulfate resistance is not a primary concern. The unique composition is suitable for general concrete construction, precast units, masonry units, and for specific works such as dam construction or oil well cementing, according to the different product types manufactured by the company.

## Model description
LCA method was not used for modeling.

## Reference product
- cement, portland-composite cement, 32.5RMPa: 1000
  Cement, PC32.5R

## Inputs
- limestone, crushed, for mill: 856.2
  Limestone
- clay: 160
  Clay
- iron, powder: 33.4
  Iron powder
- gypsum stone (CaSO4-dihydrate): 30
  Gupsum
- electricity, medium voltage: 309.348
  Electricity
- hard coal: 109
  Coal

## Outputs
- sulfur dioxide: 0.3859
  SO2. The main source of SO2 emissions in the production of building materials is from sulfides contained in fuels and raw materials.
- Nitrogen oxides: 0.2368
  NOX. The emissions of NOx in the production of building materials come from two main sources. The first is the combination of N and O2 in the air at high temperatures, which is directly related to the temperature. The second is the low-temperature combination of N and O2 in the fuel, which is related to the concentration of O2.
- carbon dioxide: 558.702
  CO2. The main sources of CO2 emissions in the building materials industry are from fuel combustion and raw material decomposition.
- particles (> PM10): 0.516
  Dust, with an unspecified particle size, is treated as PM > 10 micrometers in diameter. The production of dust in the production of building materials is related to the content of powdered materials in the raw materials.
- chemical oxygen demand: 3.4835e-5
  COD (chemical oxygen demand) (mg/l). Chemical oxygen demand (COD) refers to the amount of oxidant consumed when treating wastewater with a strong oxidant. It is used to measure the degree of organic pollution in wastewater. The larger the COD value, the more severe the wastewater pollution.
- Suspended solids, unspecified: 1.2121e-5
  SS (suspended solids) (mg/l). The suspended solids in the wastewater discharged from the building materials industry mainly refer to inorganic substances, organic substances, sediment, clay, microorganisms, and other substances that are insoluble in water.
- Oils, unspecified: 1.8e-8
  Petroleum (mg/l). Oil pollution in wastewater mainly comes from production enterprises such as steel, coking, and petrochemicals. According to the size of the oil droplet diameter, there are three forms of oil substances in wastewater: floating oil, dispersed oil, and emulsified oil, and the difficulty of separation from wastewater increases in that order.
- particles (> PM10): 64.4161
  Solid waste refers to the solid waste generated during the production process, such as dust (with an unspecified particle size, is treated as PM > 10 micrometers in diameter).

## Data selection and combination
Cement product evaluation index data is obtained through on-site surveys at cement production enterprises, and the index data comes from enterprise production process data.Due to the lack of specific industrial pollutant emission statistics, the data collection process is very difficult, and some data cannot be obtained directly, so it is obtained by converting related energy and raw materials.

## Sampling procedure
DCGC was founded in 1907 and is one of the key national cement enterprises. The production line has a designed production capacity of 5,500 tons of clinker per day and an annual output of more than 2 million tons of cement. The main products include "Seagull Brand" PO32.5R type, PO42.5R type ordinary Portland cement, A-grade oil well cement, G-grade medium and high sulfur-resistant oil well cement, and dam cement. "Wuyang Brand" Portland cement: "Ocean Brand" PO32.5R type, PO42.5R type ordinary Portland cement, PS32.5R type cement. DCGC has a registered capital of RMB 4.89 billion and a factory area of ​​370,000 square meters. The company currently has 434 employees. The annual output of clinker is 155 tons and the annual output of cement is 1.82 million tons.

## Use advice
When utilizing this data set for Life Cycle Assessment (LCA) or other environmental studies, please take into consideration that the LCA method was not used for modeling, indicating that the environmental impacts may not be comprehensive. It is advised to supplement this data with additional emission statistics and product-specific information when available. The data is based on the production technology of Dalian Cement Company as of the information cutoff date and does not consider future technological changes or improvements. Ensure to account for the technological applicability of the data to your specific context and update the data as required for accuracy. Recycling and end-of-life considerations are not included in this data set, so these should be accounted for separately if relevant to the intended use.

## Review details
Inventory: The internal review was done by several iteration steps concerning raw data validation, raw data documentation, representativity, completeness and consistency of modelling with regard to ISO 14040 and 14044.

## Data sources
- 李礼. (2012). 建筑材料绿色性的6E综合评价体系研究 [博士, 大连理工大学].
