# Aluminum Recycling ; Recycled Aluminum Ingots ; Scrap Aluminum ; 2009

Dataset: ILCD process, Unit process, single operation
Geography: CN
Reference year: 2021
Classification: Unit processes / Materials production / Metals and semimetals
Generated by: Zimeng Cai, caizm6178@163.com
Owner: Tiangong LCI Data Working Group
Review: Dependent internal review by Tiangong LCI Data Working Group
Amounts: no units in this file; such an amount is in the reference unit of its flow, which a separate flow dataset defines
copyright: false
licenseType: Free of charge for all users and uses

## General comment
The recycled aluminum ingots obtained from the process are employed in various sectors including automotive, construction, electronics, and packaging industries. These ingots are manufactured from scrap aluminum through a recycling operation and serve as a raw material for producing aluminum products which require lower energy consumption compared with primary aluminum production.

## Time period
Date of publication

## Reference product
- secondary aluminium ingot: 1000; missing unimportant
  ingot

## Inputs
- electricity, high voltage, aluminium industry: 925.2; missing unimportant
  electricity
- aluminium scrap, unspecified: 1350; missing unimportant
  aluminum scrap

## Data selection and combination
The data in this study refers to the LCA data of PA, SA, electricity, and other background data. The PA data were obtained from statistical data sources, and the SA data were mainly obtained from the literatures. The background data were mainly derived from the Chinese localization LCA database CAS RCEES 2018, which was established by the Research Center for Eco-Environmental Sciences, Chinese Academy of Sciences and covers LCA data for energy, materials, transportation, waste management etc.

## Use advice
When using this LCA dataset, please ensure that all modeling aligns with the technological scope provided by the dataset, taking into consideration the usage of technology in the year 2009. Since the PA and SA data are drawn from statistical sources and literature, respectively, it is advisable to verify the relevance and update the data if necessary to reflect current practices. Background data from the CAS RCEES 2018 database should be used with an understanding of the regional context, as it is specific to China. The methodological guidance provided must be rigorously followed, especially in terms of system boundaries, allocation procedures, and the treatment of recycling in the life cycle analysis.

## Review details
Inventory: The internal review was done by several iteration steps concerning raw data validation, raw data documentation, representativity, completeness and consistency of modelling with regard to ISO 14040 and 14044.

## Data sources
- Ding, N., Liu, N., Lu, B. & Yang, J. Life cycle greenhouse gas emissions of aluminum based on regional industrial transfer in China. J. Ind. Ecol. 25, 1657–1672 (2021).
