# End-of-life ternary lithium batteries Existing hydrometallurgy process

Dataset: ILCD process, Unit process, single operation
Geography: CN
Reference year: 2018
Classification: Unit processes / End-of-life treatment / Material recycling
Functional unit: using 1 kWh as the functionalunit
Generated by: Pengfei, pengfei24@email.ncu.edu.cn
Owner: Tiangong LCI Data Working Group
Review: Dependent internal review by Tiangong LCI Data Working Group
Amounts: no units in this file; such an amount is in the reference unit of its flow, which a separate flow dataset defines
copyright: false
licenseType: Free of charge for all users and uses

## General comment
First, the EoL LFP batteries were disassembled and crushed. The processed battery material was then dissolved in an acid-base solution to extract some of the valuable metal elements. Finally, decontamination and purification were performed to obtain Li(NixCoyMn1-x-y)O2.

## Technology and included processes
The waste battery undergoes disassembly, dry pyrolysis, crushing and mechanical sorting, acid leaching, copper removal, iron and aluminum removal, rough extraction, fine extraction, and alkali aging to obtain a ternary precursor.

## Technical purpose
The described hydrometallurgy process for ternary lithium batteries is used for the recycling and recovery of valuable metals from end-of-life (EoL) NCM (nickel, cobalt, manganese) cathode materials. Specifically, this process enables the extraction and purification of Li(NixCoyMn1-x-y)O2 compounds, which are vital for manufacturing new lithium-ion batteries or for other industrial applications requiring high-grade metal oxides.

## Reference product
- EoL NCM battery: 3.6; input; software or database

## Inputs
All rows: software or database
- Sulphuric acid: 9.54
- sodium hydroxide: 5.79
- Hydrogen peroxide (30%): 3.25
  Hydrogen peroxide production mix/DE
- Lithium carbonate: 0.39
  Lithium carbonate, production mix/CN
- Electricity: 11.83
- natural gas,natural gas: 6.81

## Outputs
- Carbon dioxide (fossil): 0.18; software or database
  The original text does not distinguish between bio and fossil, and according to experts, it is fossil here
- copper: 0.04; software or database
- Ni-rich NMC: 2.63; software or database
- aluminium: 0.14; software or database

## Data selection and combination
The data come from multiple papers and are difficult to distinguish.

## Use advice
When utilizing this lifecycle assessment data, users should ensure that the methodological boundaries correspond to their specific application. Pay attention to the functional unit of 1 kWh as the reference basis for energy content comparison. This data is sourced from multiple papers, so practitioners must ensure consistency and relevance to their context. Exclusion of steps not applicable to the specific recycling process in question, such as processes for different battery chemistries, may be needed, and users should account for technological variations and regional practices in their assessments.

## Review details
Inventory: The internal review was done by several iteration steps concerning raw data validation, raw data documentation, representativity, completeness and consistency of modelling with regard to ISO 14040 and 14044.

## Data sources
- Wang, Y. et al. Environmental impact assessment of second life and recycling for LiFePO4 power batteries in China. Journal of Environmental Management 314, 115083 (2022).
