# Electricity production ; Thermal power ; Jiangxi

Dataset: ILCD process, Unit process, single operation
Geography: JX-CN
Reference year: 2019
Classification: Unit processes / Energy carriers and technologies / Electricity
Generated by: Ruoxi Xiong, xiongrx0126@163.com
Owner: Tiangong LCI Data Working Group
Review: Dependent internal review by Tiangong LCI Data Working Group
Amounts: no units in this file; such an amount is in the reference unit of its flow, which a separate flow dataset defines
copyright: false
licenseType: Free of charge for all users and uses

## General comment
Thermal power generation includes seventeen fossil fuels such as raw coal, washed coal, oil and natural gas. The process only considers the direct power generation process, not the upstream raw material extraction and processing and the downstream power consumption

## Time period
Calculated based on data from the 2019 Energy Statistics Yearbook

## Technical purpose
This data set represents the thermal power generation process for direct electricity production in Jiangxi province, China, which includes the combustion of seventeen types of fossil fuels such as raw coal, washed coal, oil, and natural gas. This thermal power is primarily utilized to meet the electricity demands of the province and can include applications such as residential, commercial, and industrial energy supply.

## Reference product
- electricity for thermal power: 3.6; calculated

## Inputs
All rows: calculated
- Raw coal: 0.374701
- Other Washed Coal: 0.0128343
- hard coal briquettes: 7.387e-5
- Gangue, in ground: 0.0045782
- Coke: 0.000478
- Coke oven gas: 0.002961
- blast furnace gas: 0.056215
- Converter gas: 0.00273
- Diesel: 3.306e-5
- fuel oil, unspecified: 8.31e-6
- Petroleum Coke: 0.00033819
- refinery gas: 3.155e-5
- natural gas: 2.83e-5

## Outputs
- carbon dioxide (fossil): 0.789762; calculated
- sulfur dioxide: 0.000131134; calculated
- Nitrogen oxides: 0.000211507; calculated
- particles (> PM10): 2.72185e-5; calculated

## Data treatment and extrapolations
For the accounting method, please refer to the "Enterprise Greenhouse Gas Emissions Accounting Methods and Reporting Guidelines for Power Generation Facilities". Different forms of power generation and fuel consumption come from Chapter 3 (Energy Production) and Chapter 6 (Regional Energy Balance Sheet) in the "China Energy Statistical Yearbook 2020". The fuel parameters such as low calorific value and carbon content per unit calorific value used to calculate the carbon dioxide emission factor come from the "2019 China Regional Power Grid Carbon Dioxide Baseline Emission Factor Calculation Instructions OM" and the "Enterprise Greenhouse Gas Emission Accounting Method and Reporting Guide for Power Generation Facilities" 》

## Use advice
Users of this data set should note that it only includes the direct electricity generation process and excludes upstream activities such as the extraction and processing of raw materials, as well as downstream power consumption. The data should be used in Life Cycle Assessments where the scope is limited to direct power generation. Data on fuel consumption and power generation should be referenced from the 2019 Energy Statistics Yearbook, and methodological guidance can be found in the 'Enterprise Greenhouse Gas Emissions Accounting Methods and Reporting Guidelines for Power Generation Facilities'. CO2 emission factors should be calculated using parameters like low calorific value and carbon content per unit calorific value from additional resources specified, including the '2019 China Regional Power Grid Carbon Dioxide Baseline Emission Factor Calculation Instructions OM'. It's crucial to ensure that regional data corresponds accurately for the specific context of Jiangxi province.

## Review details
Inventory: The internal review was done by several iteration steps concerning raw data validation, raw data documentation, representativity, completeness and consistency of modelling with regard to ISO 14040 and 14044.

## Data sources
- 熊若熙. 中国电力生产和消费二氧化碳与污染物排放因子核算. (清华大学, 2023).
