# Polyester cotton production;Polyester cotton

Dataset: ILCD process, Unit process, black box
Geography: CN
Reference year: 2018
Classification: Unit processes / Materials production / Other materials
Generated by: Yingfan Duan, 1300925579@qq.com
Owner: Tiangong LCI Data Working Group
Review: Dependent internal review by Tiangong LCI Data Working Group
Amounts: no units in this file; such an amount is in the reference unit of its flow, which a separate flow dataset defines
copyright: false
licenseType: Free of charge for all users and uses

## General comment
Including cotton cultivation, spinning, dyeing and printing, and final disposal. The dyeing and printing stage involves several production steps, further categorized as singeing, desizing, silk finishing, pre-setting, pad dyeing, heat setting, reduction cleaning, fixing, and pre-shrinking processes. Assuming that the raw materials are all upland cotton and not considering the environmental impact of synthetic fiber production processes.

## Geography
"China is the world's largest production base for printing and dyeing, but rapid development is accompanied by severe environmental issues. Currently, the printing and dyeing industry primarily addresses environmental problems through clean production audits, implementing research on low-toxicity and low-pollution raw materials, resource utilization of waste, equipment upgrades and renovations, recycling of water and steam, and improvements in production processes. However, existing clean production schemes often focus on specific environmental issues without considering the interconnections between industrial systems."

## Technical purpose
Polyester cotton, a blend of polyester and cotton fibers, is commonly utilized in the textile industry for the production of a wide variety of garments and home furnishing items due to its combined characteristics of strength, durability, and comfort. The material undergoes processes including cotton cultivation, spinning, dyeing, printing, and final disposal, which are integral for producing the final fabric with desired properties.

## Reference product
- Polyester Cotton: 2000; measured

## Inputs
- freshwater: 1e7; missing unimportant
  Cotton planting
- Pesticide: 8.8; missing unimportant
  Cotton planting
- Fertilizer: 3437.5; missing unimportant
  Cotton planting
- Yarn: 101000; measured
  Spinning and textile
- freshwater: 24200; measured
  Spinning and textile
- Electricity: 20253.6; software or database
  Spinning and textile
- Crude coal: 10200; software or database
  Spinning and textile
- Electricity: 60.12; software or database
  Printing and dyeing - Singeing
- freshwater: 1.207e6; measured
  Printing and dyeing - Desizing
- Electricity: 24827.8; software or database
  Printing and dyeing - Desizing
- Crude coal: 1.724e6; software or database
  Printing and dyeing - Desizing
- sodium hydroxide: 10000; measured
  Printing and dyeing - Desizing
- freshwater: 24000; measured
  Printing and dyeing - Mercerizing
- Electricity: 748.8; software or database
  Printing and dyeing - Mercerizing
- Crude coal: 20800; software or database
  Printing and dyeing - Mercerizing
- sodium hydroxide: 4000; measured
  Printing and dyeing - Mercerizing
- Electricity: 3103.2; software or database
  Printing and dyeing - Preliminary finish
- Crude coal: 900; software or database
  Printing and dyeing - Preliminary finish
- freshwater: 23800; measured
  Printing and dyeing - Pad dyeing
- Electricity: 3257.28; software or database
  Printing and dyeing - Pad dyeing
- Crude coal: 7000; software or database
  Printing and dyeing - Pad dyeing
- Dye: 66; measured
  Printing and dyeing - Pad dyeing
- Crude coal: 370; software or database
  Printing and dyeing - Hot melt fixation
- freshwater: 44700; measured
  Printing and dyeing - Reduction fixation
- Electricity: 631.44; software or database
  Printing and dyeing - Reduction fixation
- Crude coal: 15800; software or database
  Printing and dyeing - Reduction fixation
- Electricity: 1599.98; software or database
  Printing and dyeing - Heating setting
- Crude coal: 470; software or database
  Printing and dyeing - Heating setting
- freshwater: 1100; measured
  Printing and dyeing - Pre-shrinking
- Crude coal: 3300; software or database
  Printing and dyeing - Pre-shrinking

## Outputs
- Pesticide: 7; missing unimportant
  Cotton planting
- Fertilizer: 2062.5; missing unimportant
  Cotton planting
- particles (> PM10): 2040; measured
  Spinning and textile
- carbon dioxide (fossil): 26724; measured
  Spinning and textile
- sulfur dioxide: 86.7; measured
  Spinning and textile
- Nitrogen oxides: 75.5; measured
  Spinning and textile
- carbon dioxide (fossil): 300; measured
  Printing and dyeing - Singeing
- particles (> PM10): 344800; measured
  Printing and dyeing - Desizing
- carbon dioxide (fossil): 4.517e6; measured
  Printing and dyeing - Desizing
- sulfur dioxide: 14700; measured
  Printing and dyeing - Desizing
- Nitrogen oxides: 12760; measured
  Printing and dyeing - Desizing
- waste water - untreated: 698650; measured
  Printing and dyeing - Desizing
- chemical oxygen demand: 282.8; measured
  Printing and dyeing - Desizing
- sodium hydroxide: 4.83e7; measured
  Printing and dyeing - Desizing
- Suspended solids, unspecified,Suspended solids, unspecified: 34.5; measured
  Printing and dyeing - Desizing
- particles (> PM10): 4200; measured
  Printing and dyeing - Mercerizing
- carbon dioxide (fossil): 54600; measured
  Printing and dyeing - Mercerizing
- sulfur dioxide: 177; measured
  Printing and dyeing - Mercerizing
- Nitrogen oxides: 154; measured
  Printing and dyeing - Mercerizing
- particles (> PM10): 180; measured
  Printing and dyeing - Preliminary finish
- carbon dioxide (fossil): 2400; measured
  Printing and dyeing - Preliminary finish
- sulfur dioxide: 7.8; measured
  Printing and dyeing - Preliminary finish
- Nitrogen oxides: 6.8; measured
  Printing and dyeing - Preliminary finish
- particles (> PM10): 1430; measured
  Printing and dyeing - Pad dyeing
- carbon dioxide (fossil): 18700; measured
  Printing and dyeing - Pad dyeing
- sulfur dioxide: 60; measured
  Printing and dyeing - Pad dyeing
- Nitrogen oxides: 53; measured
  Printing and dyeing - Pad dyeing
- particles (> PM10): 74; measured
  Printing and dyeing - Hot melt fixation
- carbon dioxide (fossil): 970; measured
  Printing and dyeing - Hot melt fixation
- sulfur dioxide: 3; measured
  Printing and dyeing - Hot melt fixation
- Nitrogen oxides: 2.7; measured
  Printing and dyeing - Hot melt fixation
- particles (> PM10): 3160; measured
  Printing and dyeing - Reduction fixation
- carbon dioxide (fossil): 41370; measured
  Printing and dyeing - Reduction fixation
- sulfur dioxide: 143; measured
  Printing and dyeing - Reduction fixation
- Nitrogen oxides: 117; measured
  Printing and dyeing - Reduction fixation
- waste water - untreated: 39500; measured
  Printing and dyeing - Reduction fixation
- chemical oxygen demand: 16.2; measured
  Printing and dyeing - Reduction fixation
- sodium hydroxide: 2.766e6; measured
  Printing and dyeing - Reduction fixation
- Suspended solids, unspecified,Suspended solids, unspecified: 2; measured
  Printing and dyeing - Reduction fixation
- particles (> PM10): 95; measured
  Printing and dyeing - Heating setting
- carbon dioxide (fossil): 1240; measured
  Printing and dyeing - Heating setting
- sulfur dioxide: 4; measured
  Printing and dyeing - Heating setting
- Nitrogen oxides: 3.5; measured
  Printing and dyeing - Heating setting
- particles (> PM10): 670; measured
  Printing and dyeing - Pre-shrinking
- carbon dioxide (fossil): 8730; measured
  Printing and dyeing - Pre-shrinking
- sulfur dioxide: 28; measured
  Printing and dyeing - Pre-shrinking
- Nitrogen oxides: 25; measured
  Printing and dyeing - Pre-shrinking
- carbon dioxide (fossil): 421; missing unimportant
  Waste disposal
- sulfur dioxide: 0.7; missing unimportant
  Waste disposal
- Nitrogen oxides: 0.4; missing unimportant
  Waste disposal
- methane (fossil): 13.2; missing unimportant
  Waste disposal
- mercury: 0.4; missing unimportant
  Waste disposal

## Use advice
When utilizing this dataset for Life Cycle Assessment (LCA), analyze each stage of polyester cotton production separately while considering the specific procedures involved, such as singeing, desizing, etc. During analysis, assume that all raw materials are upland cotton and exclude the environmental impact of the synthetic fiber production process. Ensure methodological consistency by considering the system boundaries defined and following standardized LCA protocols when determining environmental impacts.

## Review details
Inventory: The internal review was done by several iteration steps concerning raw data validation, raw data documentation, representativity, completeness and consistency of modelling with regard to ISO 14040 and 14044.

## Data sources
- 康宏. 基于LCA的棉印染生产过程改进设计研究. (大连理工大学, 2018).
