# Wood pulp paper production;copy paper

Dataset: ILCD process, Unit process, single operation
Geography: SD-CN
Classification: Materials production / Paper and cardboards
LCI method principle: Attributional
Generated by: Yixiang Gao, 22210740040@m.fudan.edu.cn
Owner: Tiangong LCI Data Working Group
Review: Dependent internal review by Tiangong LCI Data Working Group
Amounts: no units in this file; such an amount is in the reference unit of its flow, which a separate flow dataset defines
copyright: false
licenseType: Free of charge for all users and uses

## General comment
The data set representing wood pulp paper production for copy paper is used to quantify the resource consumption and environmental impact associated with the production of 1 ton of copy paper. The process is relevant for life cycle assessment studies and includes pulp making, paper forming, transportation, and waste treatment as its major components. Copy paper produced using wood pulp technology is significant within the paper production industry in Shandong Province, highlighting its importance and representativeness for such studies. The high standards for hardness and brightness in copy paper production justify the selection of wood pulp processes over others.

## Geography
一方面以复印纸为代表的文化纸产量在山东省造纸业产品 总产量中占有重要比重；另一方面结合复印纸生产的实际特点，由于复印纸产品 对硬度和亮度的要求较高，山东省复印纸生产多是采用木浆工艺。因此，选择复 印纸生命周期过程作为研究木浆生产工艺的对象更具有典型性和代表性。

## Inputs
- hard coal: 6.17; article inperiodical
  coal(pulping stage)
- natural gas: 18.4; article inperiodical
  natural gas(pulping stage)
- water: 26.54; article inperiodical
  water(pulping stage)
- Fuel Oil: 80.33; article inperiodical
  Oil(pulping stage)
- Wood: 1381.72; article inperiodical
  forest(pulping stage)
- sodium hydroxide: 18; article inperiodical
  sodium hydroxide(pulping stage)
- hydrogen peroxide: 6; article inperiodical
  hydrogen peroxide(pulping stage)
- Sodium sulfide: 1; article inperiodical
  sodium sulfide(pulping stage)
- sulfuric acid: 12; article inperiodical
  sulfuric acid(pulping stage)
- hard coal: 458.13; article inperiodical
  coal(papermaking stage)
- water: 6.78; article inperiodical
  water(papermaking stage)
- Fuel Oil: 1.25; article inperiodical
  Oil(papermaking stage)
- Starch: 48; article inperiodical
  starch(papermaking stage)
- Filler Material: 23; article inperiodical
  filler(papermaking stage)
- Optical Brightening Agent: 8; article inperiodical
  Whitening agent(papermaking stage)
- Fuel Oil: 24.52; article inperiodical
  Oil(Transportation stage)
- hard coal: 2.92
  coal(Three-waste treatment stage)
- water: 0.29
  water(Three-waste treatment stage)

## Outputs
- carbon dioxide: 300; article inperiodical
  CO2(pulping stage)
- Nitrogen oxides: 1.02; article inperiodical
  NOx(pulping stage)
- sulfur dioxide: 2.27; article inperiodical
  SO2(pulping stage)
- methane: 0.0166; article inperiodical
  CH4(pulping stage)
- carbon monoxide: 3.95; article inperiodical
  CO(pulping stage)
- Total Suspended Particulate: 0.0386; article inperiodical
  particulates(pulping stage)
- chemical oxygen demand: 9.45; article inperiodical
  COD(pulping stage)
- biological oxygen demand: 1.01; article inperiodical
  BOD5(pulping stage)
- nitrogen, total (excluding N2): 0.15; article inperiodical
  TN(pulping stage)
- phosphorus, total: 0.0147; article inperiodical
  TP(pulping stage)
- nitrate: 0.00966; article inperiodical
  nitrate(pulping stage)
- Total Suspended Particulate: 0.9; article inperiodical
  TSP(pulping stage)
- Waste solid: 42.9; article inperiodical
  Solid Waste(pulping stage)
- hazardous waste (unspecified): 0.075; article inperiodical
  Hazardous Waste(pulping stage)
- carbon dioxide: 0.0893; article inperiodical
  CO2(papermaking stage)
- Nitrogen oxides: 6.47; article inperiodical
  NOx(papermaking stage)
- sulfur dioxide: 8.37; article inperiodical
  SO2(papermaking stage)
- methane: 0.00435; article inperiodical
  CH4(papermaking stage)
- carbon monoxide: 20; article inperiodical
  CO(papermaking stage)
- Total Suspended Particulate: 0.285; article inperiodical
  particulates(papermaking stage)
- nitrate: 0.0109; article inperiodical
  nitrate(papermaking stage)
- Waste solid: 5.78; article inperiodical
  Solid Waste(papermaking stage)
- hazardous waste (unspecified): 0.11; article inperiodical
  Hazardous Waste(papermaking stage)
- carbon dioxide: 893; article inperiodical
  CO2(Transportation stage)
- Nitrogen oxides: 0.153; article inperiodical
  NOx(Transportation stage)
- sulfur dioxide: 0.203; article inperiodical
  SO2(Transportation stage)
- methane: 0.00099; article inperiodical
  CH4(Transportation stage)
- carbon monoxide: 0.153; article inperiodical
  CO(Transportation stage)
- Total Suspended Particulate: 0.0359; article inperiodical
  particulates(Transportation stage)
- carbon dioxide: 5.66
  CO2(Three-waste treatment stage)
- Nitrogen oxides: 0.0412
  NOx(Three-waste treatment stage)
- sulfur dioxide: 0.0531
  SO2(Three-waste treatment stage)
- methane: 2.77e-5
  CH4(Three-waste treatment stage)
- carbon monoxide: 0.127
  CO(Three-waste treatment stage)
- Total Suspended Particulate: 0.00182
  particulates(Three-waste treatment stage)
- chemical oxygen demand: 0.14
  COD(Three-waste treatment stage)
- biological oxygen demand: 0.022
  BOD5(Three-waste treatment stage)
- nitrogen, total (excluding N2): 0.00956
  TN(Three-waste treatment stage)
- phosphorus, total: 0.0011
  TP(Three-waste treatment stage)
- Total Suspended Particulate: 0.0601
  TSP(Three-waste treatment stage)

## Data selection and combination
本文的数据来源一方面是深入山东省主要造纸企业进行实地调研获取第一 手资料，另一方面是查阅山东主要造纸企业年度报表、中国造纸年鉴和中国造纸 协会年报以及相关的文献资料等手段来获得。

## Use advice
When using this data set for life cycle assessment of wood pulp paper production for copy paper, care should be taken to account for all chemistries involved in the pulping and paper-making processes, regardless of their quantities. While typical cutoff thresholds for considering chemicals in assessments are those which mass over 1%, this data set includes all available chemical data, even for those substances used in minor quantities with significant environmental impact. This approach minimizes errors and provides a more comprehensive view of the process. It is recommended that users verify the relevance and timeliness of the data, especially given the potential variance in processes and environmental factors. Any updates on production methods or environmental regulations should be considered.

## Review details
Inventory: The internal review was done by several iteration steps concerning raw data validation, raw data documentation, representativity, completeness and consistency of modelling with regard to ISO 14040 and 14044.

## Data sources
- 葛振香. 基于LCA的山东省造纸业可持续发展研究. (山东师范大学, 2017).
