# Livestock and poultry breeding ; feed processing stage ; pig breeding area

Dataset: ILCD process, Unit process, single operation
Geography: CN
Reference year: 2014
Classification: Unit processes / Materials production / Agricultural production means
Functional unit: 1kg pork
Generated by: Rui Yang, 1632707028@qq.com
Owner: Tiangong LCI Data Working Group
Review: Dependent internal review by Tiangong LCI Data Working Group
Amounts: no units in this file; such an amount is in the reference unit of its flow, which a separate flow dataset defines
copyright: false
licenseType: Free of charge for all users and uses

## General comment
Livestock and poultry feed processing mainly consumes electricity and coal.

## Geography
This study was conducted from 2014 to 2015, aiming at livestock and poultry feeding cycle, meat ratio, feed formula, feed consumption, coal and electricity consumption, etc. Has been to Shandong Gaomi Zhengda pig farm, Laixi City Zhishuang dairy farm, Jimo city Duan Bolan town Jiangjiapo village pig farm, Jimo City Liujiazhuang town livestock farm, Rizhao City Changling town Guanzhuang village, Juxian County Zhailihe town Dongxing Agriculture and animal husbandry company, Juxian Qiaoshan town east Chen dairy farm, Juxian Qiaoshan town Liu Jiayi water pig farm, Zhucheng Foreign Trade Co., LTD. Phoenix parents breeding duck farm, Xinjiang Fukang Hongfa Breeding professional cooperative, Jiuyun Street Town Xuhong laying Chicken cooperative, Jiuyun Street Town Liuyun Village self-contained breeding farm, China Australia Holding Group Co., LTD., Dezhou City Qingyun County Wayu Village, Shandong Province Qingyun County four Liu community beef cattle breeding base, Dezhou City Qingyun Qingnian chicken breeding base, Qingyun County Yongli Poultry layer breeding company, Qingyun County Xingchen youth chicken breeding Field research was carried out by professional breeding cooperatives, Qingyun Dongtai broiler breeding cooperatives, Hebei Yanshan Boyuan Feed Co., LTD., Yanshan Da Chinese Feed Co., LTD., Wudi Liuhe Feed Co., LTD., and China-Australia Oriental Hope Feed Co., LTD.

## Technology and included processes
In this paper, the life cycle of livestock and poultry farming is divided into six stages: feed crop planting, feed processing, livestock and poultry raising, manure treatment, slaughter and transportation. The specific life cycle process of livestock and poultry breeding is shown in Figure 2-1. Due to the lack of some data and the limitations of basic conditions, the production, transportation and use of pesticides, mulch and feed additives have not been analyzed, and the environmental impact caused by other related infrastructure construction, transport production and labor costs is no longer considered.

## Technical purpose
The data set represents the livestock and poultry breeding process with a focus on feed processing for pig farming. It is intended for evaluating the environmental impact of pig meat production, particularly in the context of electricity and coal consumption. This data can be applied to life cycle assessments of pork production, where factors such as the breeding cycle, feed conversion ratio, feed formula, and resource usage are critical for determining the environmental performance of pork products.

## Reference product
- feed: 4.35714; calculated

## Inputs
- Electricity: 0.392143; calculated
- hard coal: 0.0522857; calculated
- maize grain: 2.75; measured
- soybean: 0.71; measured
- wheat: 4.4; measured

## Outputs
- carbon dioxide (fossil),carbon dioxide (fossil): 0.19868; measured
  Pig breeding community
- sulfur dioxide: 0.00348; measured
  Pig breeding community
- nitrogen, total (excluding N2): 0.00055; measured
  Pig breeding community
- carbon monoxide (fossil): 9e-5; measured
  Pig breeding community

## Use advice
Please note that the life cycle assessment data provided corresponds to production systems operational between 2014 and 2015. Users should ensure relevance when applying this data to current production systems as some parameters, such as energy and feed efficiency, may have changed. Furthermore, if the data is used for comparative LCA studies, users should apply consistent boundaries and assumptions to ensure comparability. It is also advised to consider technological advancements that may affect energy consumption and emissions. Exclusions of credits for by-products and recycling should be clearly stated if applied in the assessment.

## Review details
Inventory: The internal review was done by several iteration steps concerning raw data validation, raw data documentation, representativity, completeness and consistency of modelling with regard to ISO 14040 and 14044.

## Data sources
- 周景月. 基于生命周期评价的畜禽养殖环境影响分析. (青岛科技大学, 2017).
