# Soil and Groundwater Remediation;In Situ;Soil Bioventilation; Injection Well

Dataset: ILCD process, Unit process, single operation
Geography: US
Reference year: 2009
Classification: Unit processes / Other Services / Repair and maintenance
Generated by: Wang Ning, wang_ning@caep.org.cn
Owner: Tiangong LCI Data Working Group
Review: Dependent internal review by Tiangong LCI Data Working Group
Amounts: no units in this file; such an amount is in the reference unit of its flow, which a separate flow dataset defines
copyright: false
licenseType: Free of charge for all users and uses

## General comment
Construction of injection wells using polyvinyl chloride, bentonite, silica and bentonite, etc.

## Technology and included processes
Construction of injection wells using bentonite, quartz sand, PVC, concrete

## Technical purpose
The construction of injection wells using PVC, bentonite, silica, and concrete is intended for environmental remediation processes, specifically in the context of soil and groundwater remediation. The remediation method applied here is in situ soil bioventilation, where such wells facilitate the aeration of the soil to promote biodegradation of contaminants.

## Reference product
- injection well: 1; estimated

## Inputs
- bentonite: 600; estimated
- sand: 1100; estimated
- Polyvinyl chloride: 16; estimated
- cement, unspecified: 150; estimated

## Use advice
When utilizing this data set for Life Cycle Assessment of soil and groundwater remediation projects, integrators should account for the environmental impacts associated with the extraction and processing of raw materials such as PVC, bentonite, quartz sand, and concrete. It's advisable to also consider the long-term performance and potential leaks or failures of the injection wells that could impact the effectiveness of the remediation process.

## Review details
Inventory: The internal review was done by several iteration steps concerning raw data validation, raw data documentation, representativity, completeness and consistency of modelling with regard to ISO 14040 and 14044.

## Data sources
- Dhaliwal, H. Sustainable site remediation : a life cycle assessment approach.
