# Livestock and poultry breeding ; slaughtering stage ; laying hen

Dataset: ILCD process, Unit process, single operation
Geography: SD-CN
Reference year: 2014
Classification: Unit processes / Materials production / Agricultural production means
Functional unit: 1kg chicken
Generated by: Rui Yang, 1632707028@qq.com
Owner: Tiangong LCI Data Working Group
Review: Dependent internal review by Tiangong LCI Data Working Group
Amounts: no units in this file; such an amount is in the reference unit of its flow, which a separate flow dataset defines
copyright: false
licenseType: Free of charge for all users and uses

## General comment
The general energy consumed in the slaughterhouse stage is electricity, and the energy consumption coefficients of slaughterhouse processing for pork, beef, poultry meat, milk and poultry eggs are 3.76 KJ·kg-1, 4.37 KJ·kg-1, 2.59 KJ·kg-1, 1.12 KJ·kg-1 and 8.16 KJ·kg-1, respectively [61].

## Geography
This study was conducted from 2014 to 2015, aiming at livestock and poultry feeding cycle, meat ratio, feed formula, feed consumption, coal and electricity consumption, etc. Has been to Shandong Gaomi Zhengda pig farm, Laixi City Zhishuang dairy farm, Jimo city Duan Bolan town Jiangjiapo village pig farm, Jimo City Liujiazhuang town livestock farm, Rizhao City Changling town Guanzhuang village, Juxian County Zhailihe town Dongxing Agriculture and animal husbandry company, Juxian Qiaoshan town east Chen dairy farm, Juxian Qiaoshan town Liu Jiayi water pig farm, Zhucheng Foreign Trade Co., LTD. Phoenix parents breeding duck farm, Xinjiang Fukang Hongfa Breeding professional cooperative, Jiuyun Street Town Xuhong laying Chicken cooperative, Jiuyun Street Town Liuyun Village self-contained breeding farm, China Australia Holding Group Co., LTD., Dezhou City Qingyun County Wayu Village, Shandong Province Qingyun County four Liu community beef cattle breeding base, Dezhou City Qingyun Qingnian chicken breeding base, Qingyun County Yongli Poultry layer breeding company, Qingyun County Xingchen youth chicken breeding Field research was carried out by professional breeding cooperatives, Qingyun Dongtai broiler breeding cooperatives, Hebei Yanshan Boyuan Feed Co., LTD., Yanshan Da Chinese Feed Co., LTD., Wudi Liuhe Feed Co., LTD., and China-Australia Oriental Hope Feed Co., LTD.

## Technology and included processes
In this paper, the life cycle of livestock and poultry farming is divided into six stages: feed crop planting, feed processing, livestock and poultry raising, manure treatment, slaughter and transportation. The specific life cycle process of livestock and poultry breeding is shown in Figure 2-1. Due to the lack of some data and the limitations of basic conditions, the production, transportation and use of pesticides, mulch and feed additives have not been analyzed, and the environmental impact caused by other related infrastructure construction, transport production and labor costs is no longer considered.

## Technical purpose
The data set describes the energy consumption during the slaughtering stage of livestock and poultry, specifically laying hens. It provides figures for electricity consumption, segmented by different products: pork, beef, poultry, milk, and eggs. This information is essential for industries that deal with animal processing and slaughtering operations where the accurate accounting of energy use is critical for process optimization, cost reduction, and environmental impact assessments.

## Reference product
- egg: 1; measured

## Inputs
- Electricity: 0.00816; estimated
  屠宰阶段一般消耗的能源为电力

## Outputs
- carbon dioxide (fossil),carbon dioxide (fossil): 0.00244; measured
  laying hens
- sulfur dioxide: 6.6e-5; measured
  laying hens
- nitrogen, total (excluding N2): 8.1e-6; measured
  laying hens

## Use advice
Data set users focusing on the environmental aspects of the slaughtering stage should apply these energy consumption coefficients with caution and within the proper geographical and technological scope, as the data pertains to specific locations and practices in China. It is vital to note that energy coefficients may have changed since the data collection period (2014-2015) due to technological advancements or changes in operational practices. Users should also consider integrating this data with additional environmental impacts, such as greenhouse gas emissions and water usage, for a comprehensive LCA.

## Review details
Inventory: The internal review was done by several iteration steps concerning raw data validation, raw data documentation, representativity, completeness and consistency of modelling with regard to ISO 14040 and 14044.

## Data sources
- 周景月. 基于生命周期评价的畜禽养殖环境影响分析. (青岛科技大学, 2017).
