# Brick production ; Shale hollow brick production ; Sintering process

Dataset: ILCD process, Unit process, single operation
Geography: GZ-JX-CN
Reference year: 2020
Classification: Unit processes / Materials production / Other mineralic materials
Generated by: Wang xiangjin, r99rt4@163.com
Owner: Tiangong LCI Data Working Group
Review: Dependent internal review by Tiangong LCI Data Working Group
Amounts: no units in this file; such an amount is in the reference unit of its flow, which a separate flow dataset defines
copyright: false
licenseType: Free of charge for all users and uses

## General comment
Traditional shale hollow brick production process

## Technical purpose
The technical usage of the hollow shale bricks, produced through the sintering process, is primarily in the construction industry. These bricks are typically utilized for building walls, structures with hollow part design for insulating purposes, and various other types of construction where load-bearing and insulation are considerations.

## Reference product
- shale hollow brick: 1000; measured

## Inputs
- brickbat aggregate: 1450; measured
- Electricity: 14.9472; measured
- freshwater: 0.02136; measured

## Outputs
All rows: measured
- fluorine: 0.022
- particles (> PM10),particles (> PM10): 0.218
- sulfur dioxide: 0.997
- Waste (solid): 49.85
- nitrogen monoxide: 0.111

## Deviations from the LCI method approaches
The EIA report is based on the annual production of bricks (80 million bricks) as a whole, and for statistical purposes, the data has been converted according to the size specifications described therein, in terms of bricks produced per tonne of production

## Data selection and combination
Adopting the relevant data from the table of coefficients of production and discharge for sintered bricks and building blocks in 3131 of the Manual of Coefficients of Production and Discharge for Industrial Pollution Sources of the First National Pollution Sources Census (Seventh Subbook).

## Sampling procedure
The data for this EIA report is derived from real-time data from the plant

## Use advice
When utilizing this dataset, it is important to ensure that the data application is in accordance with the production and discharge coefficients for sintered bricks and building blocks as outlined in the 3131 category of the Manual of Coefficients of Production and Discharge for Industrial Pollution Sources. Additionally, users should note that the dataset is based on annual production volume and has been normalized to per tonne of brick produced. If integrating this LCA data with other data sets, ensure that units and temporal factors are consistent.

## Review details
Inventory: The internal review was done by several iteration steps concerning raw data validation, raw data documentation, representativity, completeness and consistency of modelling with regard to ISO 14040 and 14044.

## Data sources
- 年产 8000 万块页岩标砖项目环评报告公示
