# Drive manufacture ; Pitch drive of a 1.5 MW wind turbine

Dataset: ILCD process, Unit process, single operation
Geography: NMG-CN
Reference year: 2017
Classification: Unit processes / Systems / Other machines
Functional unit: The functional unit is 1.5 MW wind turbine
LCI method principle: Attributional
LCI method approaches: Allocation
Generated by: Yunzhi Zhao, ll10088@163.com
Owner: Tiangong LCI Data Working Group
Review: Dependent internal review by Tiangong LCI Data Working Group
Amounts: no units in this file; such an amount is in the reference unit of its flow, which a separate flow dataset defines
copyright: false
licenseType: Free of charge for all users and uses

## General comment
The pitch drive manufactured is specifically designed for use in 1.5 MW wind turbines. These drives are critical for adjusting the angle of the blades to control the rotor speed and optimize the power output in response to wind conditions. The pitch drives are suitable for large-scale wind farms, particularly those located in regions with substantial wind power installation like the northeast of Inner Mongolia in China. The life cycle data is valuable in assessing the environmental impacts of wind turbines during the production and manufacturing phases of wind energy projects.

## Geography
The data regarding the parameters of wind power has been collected from Wang (2012). A wind farm equipped with 33 domestic 1.5 megawatts (MW) wind turbines is regarded as a case study to analyze the environmental impact and its substitution effects. The wind farm is located in the northeast of Inner Mongolia, the province in which most of China’s wind power is installed (Xia and Song, 2017).

## Reference product
- Rotors pitch drive of wind turbine: 1; estimated

## Inputs
- iron: 2400; calculated
  Steel and iron

## Deviations from the LCI method approaches
The life cycle inventory for wind power is illustrated as follows. The production and manufacturing stage include the production of wind turbines, substations, and cables, which consume a large amount of energy and emit pollutants (Xue et al., 2015).

## Use advice
Users of the data set should consider the specific environmental impacts highlighted by the life cycle inventory for wind power, including energy consumption and pollutant emissions during the production of wind turbines, substations, and cables. Attention should be given to the technological applicability of the data, ensuring its relevance to similar wind power projects. It is advised to account for possible regional differences in energy mix and environmental policies when applying this data to other locations. Additionally, substitution effects and the environmental benefits of using wind power as an alternative to other forms of energy should be included in the assessment.

## Review details
Inventory: The internal review was done by several iteration steps concerning raw data validation, raw data documentation, representativity, completeness and consistency of modelling with regard to ISO 14040 and 14044.

## Data sources
- Li, H., Jiang, H.-D., Dong, K.-Y., Wei, Y.-M. & Liao, H. A comparative analysis of the life cycle environmental emissions from wind and coal power: Evidence from China. Journal of Cleaner Production 248, 119192 (2020).
