# Wet steaming cotton dyeing and finishing ; printing and dyeing cotton ; sanding

Dataset: ILCD process, Unit process, single operation
Geography: SZ-JS-CN
Reference year: 2012
Classification: Unit processes / Energy carriers and technologies / Heat and steam
Generated by: Yingfan Duan, 1300925579@qq.com
Owner: Tiangong LCI Data Working Group
Review: Dependent internal review by Tiangong LCI Data Working Group
Amounts: no units in this file; such an amount is in the reference unit of its flow, which a separate flow dataset defines
copyright: false
licenseType: Free of charge for all users and uses

## General comment
"Sanding" is a treatment in the printing and dyeing process aimed at creating a fuzzy texture on the surface of cotton fabric through friction or mechanical abrasion. This process typically involves passing the cotton fabric through specialized equipment, such as felt rollers or abrasive rollers, to increase the fiber's fuzziness, thereby enhancing the fabric's softness and hand feel.

## Geography
The study focuses on a printing and dyeing enterprise in Jiangsu Province, located in Changshu within the Yangtze River Delta Economic Zone.

## Technical purpose
This production process refers to wet steaming cotton dyeing and finishing which includes printing, dyeing, and sanding of cotton fabrics. This is a specialized process used in the textile industry for giving cotton cloth desired visual appeal and tactile properties. Specifically, the mentioned process is applicable for producing high-quality printed and sanded cotton fabrics that may be used for fashion garments, homeware textiles, and other textile applications.

## Reference product
- Cotton Fabric: 167; measured

## Inputs
- Electricity: 706; measured
- Standard coal: 981; measured
- Crude coal: 186; calculated
- Cleaned coal: 461; calculated
- Fuel Oil: 3.97; calculated
- heavy fuel oil: 1.2; calculated
- Diesel oil: 5.46; calculated
- Coke Oven Gas: 7.29; calculated
- natural gas: 0.0934; calculated
- process steam: 3.15e7; measured
- Softener: 69.8; measured

## Outputs
- carbon dioxide (fossil): 2900; calculated
- carbon monoxide (fossil): 0.484; calculated
- sulfur dioxide: 2.2; calculated
- methane (fossil): 13.6; calculated
- Nitrogen oxides: 0.945; calculated
- nitrous oxide: 0.0431; measured
- particles (> PM10): 1.61; calculated
- ammonia: 1.31e-5; measured
- non-methane volatile organic compounds: 0.00474; measured
- waste water - untreated: 1450; measured
- chemical oxygen demand: 1.67; calculated
- Suspended solids, unspecified,Suspended solids, unspecified: 0.23; calculated
- lead: 1.46e-5; calculated
- mercury: 3.07e-7; calculated
- fluorine: 2.77e-6; calculated
- cadmium: 5.43e-7; calculated
- arsenic: 1.25e-5; calculated

## Use advice
For Life Cycle Assessment purposes, the energy consumption ratio for steam to thermal oil in boilers as provided by the researched enterprise's clean production report should be considered, with a coal consumption ratio of 17:1 for the two types of boilers. Each fabric treatment step such as scouring, bleaching, mercerizing, sanding, plain water washing, stentering, and pad dyeing utilizes steam with varying cylinder requirements per drying step. Assume equal steam consumption for each drying cylinder. Drying processes use steam in the proportion of 2:1:1:1:1:2. When accounting for energy consumption numerical data, these ratios must be accurately reflected. The research focuses on a printing and dyeing enterprise located in Changshu within the Yangtze River Delta economic zone of Jiangsu province.

## Review details
Inventory: The internal review was done by several iteration steps concerning raw data validation, raw data documentation, representativity, completeness and consistency of modelling with regard to ISO 14040 and 14044.

## Data sources
- 朱亚楠. 棉布连续轧染工艺生命周期环境影响评价. (南京大学, 2012).
