# Foundation constriction ; Tower foundation of a 1.5 MW wind turbine

Dataset: ILCD process, Unit process, single operation
Geography: NMG-CN
Reference year: 2017
Classification: Systems / Construction
Functional unit: The functional unit is 1.5 MW wind turbine
LCI method principle: Attributional
LCI method approaches: Allocation
Generated by: Yunzhi Zhao, ll10088@163.com
Owner: Tiangong LCI Data Working Group
Review: Dependent internal review by Tiangong LCI Data Working Group
Amounts: no units in this file; such an amount is in the reference unit of its flow, which a separate flow dataset defines
copyright: false
licenseType: Free of charge for all users and uses

## General comment
The data set describes the construction phase for the tower foundation of a 1.5 MW wind turbine. This process data is specifically applicable to the manufacturing stage of wind farms where environmental impacts (e.g., energy consumption and emissions) are analyzed. The case study focuses on a wind farm in Inner Mongolia with domestic wind turbines, relevant for renewable energy projects and large-scale wind power installations in similar climatic and geographical regions.

## Geography
The data regarding the parameters of wind power has been collected from Wang (2012). A wind farm equipped with 33 domestic 1.5 megawatts (MW) wind turbines is regarded as a case study to analyze the environmental impact and its substitution effects. The wind farm is located in the northeast of Inner Mongolia, the province in which most of China’s wind power is installed (Xia and Song, 2017).

## Reference product
- Foundation: 1; article inperiodical

## Inputs
- Concrete: 300; article inperiodical
- iron: 35000; article inperiodical

## Deviations from the LCI method approaches
The life cycle inventory for wind power is illustrated as follows. The production and manufacturing stage include the production of wind turbines, substations, and cables, which consume a large amount of energy and emit pollutants (Xue et al., 2015).

## Use advice
Users of this data set must take into account the geographical and technological specificities of the wind farm in Inner Mongolia when applying the data to other scenarios. It is imperative to consider the methodological implications of the localized environmental impacts and the substitution effects compared to other energy sources. The life cycle inventory should be used when assessing the environmental performance of similar wind turbine projects, ensuring adjustments for regional energy mixes and technology variations.

## Review details
Inventory: The internal review was done by several iteration steps concerning raw data validation, raw data documentation, representativity, completeness and consistency of modelling with regard to ISO 14040 and 14044.

## Data sources
- Li, H., Jiang, H.-D., Dong, K.-Y., Wei, Y.-M. & Liao, H. A comparative analysis of the life cycle environmental emissions from wind and coal power: Evidence from China. Journal of Cleaner Production 248, 119192 (2020).
