# Aluminum electrolytic capacitor production ; components before soaking ; winding

Dataset: ILCD process, Unit process, single operation
Geography: JS-CN
Reference year: 2020
Classification: Unit processes / Materials production / Metals and semimetals
Generated by: Huimin Chang, huiminchang@tsinghua.edu.cn
Owner: Tiangong LCI Data Working Group
Review: Dependent internal review by Tiangong LCI Data Working Group
Amounts: no units in this file; such an amount is in the reference unit of its flow, which a separate flow dataset defines
copyright: false
licenseType: Free of charge for all users and uses

## General comment
绕线 ; 铝电解电容器 (AEC) 生产 ; 420V 680uf

## Time period
The investigated manufacturer produced about 1.183 billion AECs of all kinds in 2020.

## Technical purpose
The aluminum electrolytic capacitors (AECs) with a specification of 420V 680uf are used primarily within the electronics industry for applications such as power supply smoothing, filtering, or energy storage in various devices, where a stable and reliable capacitor is necessary for the operation. They are suited for high voltage and large capacity needs.

## Reference product
- elements before soak (from winding): 1000; measured
  Elements(before soak) [pcs]

## Inputs
All rows: measured
- electricity, high voltage, aluminium industry: 15.9984
  Electricity [kWh]
- aluminium collector foil, for Li-ion battery: 27.226
  Anode formed foil [kg]
- cathode, for aluminium electrolysis: 9.524
  Cathode etched foil [kg]
- Separator Paper Coil,Separator Paper Coil: 7.016
  Separator paper coil [kg]
- sealing tape, aluminium/PE, 50 mm wide: 0.103
  Tape [kg]
- section bar extrusion, aluminium: 0.07
  Tab [kg] ; CN: aluminium sheet in Gabi Database

## Outputs
- aluminium collector foil, for Li-ion battery: 0.004; measured
  Scraps of anode formed foil [kg]
- cathode, for aluminium electrolysis: 0.004; measured
  Scraps of cathode etched foil [kg]
- waste paper, sorted: 0.004; measured
  Scraps of separator paper [kg]

## Data selection and combination
The inventory data of capacitor production come from the AECs’ production factory in Jiangsu Province, China. The cut-off criteria of LCI data collection for each process is coverage of at least 95% of the mass and energy of the input and output flows. The inventory data of anode foil production and cathode foil production is obtained based on the analysis of the manufacturing processes and corresponding process parameters. The upstream data (i.e., aluminum ingots, separator paper, transport, electricity, and water) are acquired from the Gabi software (Version: 10.6.1.35). In detail, the profile of Chineses electricity grid from the China Electric Power Yearbook adopts the reference year 2016. The reference year of aluminum ingot production is 2015. The inaccessible data about ammonium citrate, ammonium pentaborate, NH4H2PO4, and HBO3 are estimated based on chemical equations using the existing materials (reactants) in the Gabi software. The use and end-of-life stage inventory data are obtained based on analysis and calculation.

## Use advice
When utilizing the inventory data in Life Cycle Assessments, ensure the inclusion of all input and output flows that account for at least 95% of the mass and energy according to the set cut-off criteria. The provided data is specific to AECs’ production within the reference years 2015 and 2016 for aluminum ingot production and Chinese electricity grid profile respectively. Adjustments may be required for studies reflecting different time frames or technological improvements. The inventory data for the upstream processes such as aluminum ingots, separator paper, and transportation, acquired from Gabi software, must be used with an understanding of the underlying assumptions and limitations. Where data was inaccessible, estimates based on chemical equations using existing materials in Gabi software were made; users must take into account these estimations' uncertainties. For use and end-of-life stage data, rely on methodological consistency with the inventory analysis and calculations provided.

## Review details
Inventory: The internal review was done by several iteration steps concerning raw data validation, raw data documentation, representativity, completeness and consistency of modelling with regard to ISO 14040 and 14044.

## Data sources
- Zhang, C., Jing, J., Yun, L., Zheng, Y. & Huang, H. A cradle-to-grave life cycle assessment of high-voltage aluminum electrolytic capacitors in China. J. Clean. Prod. 370, (2022).
