# Greenhouse tomato production

Dataset: ILCD process, Unit process, black box
Geography: CA
Reference year: 2006
Valid until: 2010
Classification: Materials production / Agricultural production means
Functional unit: 1 kg of packaged tomatoes at the greenhouse gate
Generated by: zhu xian, zzhu0918@163.com
Owner: Tiangong LCI Data Working Group
Review: Dependent internal review by Tiangong LCI Data Working Group
Amounts: no units in this file; such an amount is in the reference unit of its flow, which a separate flow dataset defines
copyright: false
licenseType: Free of charge for all users and uses

## General comment
Greenhouse farming uses fossil fuels and electricity for climate control. Tomato plant seedlings, fertilization, watering, pesticide application. After harvesting 1 kg bulk tomatoes, apply carton and plastic boxes for tomato packaging into 1 kg packaging tomatoes

## Geography
In the Canadian province of Lymington.

## Time period
Primary data were collected through a survey administered to 8Ontario greenhouse producers in Leamington, Ontario, and verifiedthrough follow-up communications. The survey was used to collectdata on size of operation, yields, and operation and maintenancedata (i.e. annual energy and water consumption based on utilitybills, annual consumption of fertilizers, pesticides, growing medium, etc.). This study represents an average of various types oftechnologies (e.g. infrastructure materials and heating and irrigation technologies) and management systems (e.g. integrated andconventional pest management) from 2006 to 2010

## Technical purpose
Greenhouse tomato production is intended for the cultivation and supply of fresh tomatoes. The process uses advanced climate control powered by fossil fuels and electricity to optimize growing conditions for tomato plants. The tomatoes are grown from seedlings, with controlled fertilization, watering, and pesticide application to ensure quality produce. After harvesting, the tomatoes are packaged using cartons and plastic boxes to create convenient 1 kg units of packaged tomatoes ready for distribution. This agricultural practice is designed for both local and broader markets where fresh, high-quality tomatoes are demanded.

## Reference product
- Biological yield: 1; measured

## Inputs
All rows: measured
- Steel sections: 0.061
- Glass (formed & finished): 0.0032
- natural gas: 28.9
- electricity: 1.0008
- secondary fuel: 4.06
- Pesticide: 0.00023
- Irrigation water: 0.0184
- corrugated board boxes: 0.105
- Nitrogenous fertilizer: 0.022038
- Potassium fertilizer: 0.0036
- Aluminum scrap: 0.00024

## Outputs
- Plastic (unspecified): 0.00235; measured
- Waste (deposited, hibernating in ground, non elementary flow): 0.1529; measured

## Use advice
This data set represents an average footprint of greenhouse tomato production processes, including energy and water consumption, as well as input of fertilizers and pesticides based on actual operational data from 2006 to 2010. When using this data for Life Cycle Assessment (LCA), consider this time frame and technological variability. It is suitable for setting baselines, comparative studies, and operational benchmarking for similar greenhouse operations. The data should be updated or regionalized for current or different operational conditions, and may not be representative for newer technologies or practices. Attention should be given to the methodological consistency when integrating this data into broader LCA studies, especially if comparing with other agricultural practices or products.

## Review details
Inventory: The internal review was done by several iteration steps concerning raw data validation, raw data documentation, representativity, completeness and consistency of modelling with regard to ISO 14040 and 14044.
