# Soil remediation ; ex situ remediation ; Biopile ; Construction preparation ; Infrastructure construction ; Hardened impermeable ground

Dataset: ILCD process, Unit process, single operation
Geography: KR
Reference year: 2011
Classification: Unit processes / Other Services / Repair and maintenance
Generated by: Sang Chunhui, sangch@mail.bnu.edu.cn
Owner: Tiangong LCI Data Working Group
Review: Dependent internal review by Tiangong LCI Data Working Group
Amounts: no units in this file; such an amount is in the reference unit of its flow, which a separate flow dataset defines
copyright: false
licenseType: Free of charge for all users and uses

## General comment
600 square meters of hardened anti-seepage ground will be constructed on the site for the repair of temporary biological piles inside the site

## Technical purpose
The described process involves the construction of a 600 m2 hardened impermeable surface for the purpose of ex situ biopile soil remediation. This infrastructure is essential in the preparation of sites for temporary biological treatment of contaminated soils. The hardened ground helps to prevent any seepage or contamination from spreading during the remediation process.

## Reference product
- Hardened impermeable ground: 600; estimated

## Inputs
All rows: estimated
- Diesel: 0.016
- gravel: 7.8
- sand: 60
- Polyethylene,Polyethylene: 1.2
- polypropylene fibres (PP): 600
- CO2 Welding, Laser Beam Welding, Flux-cored Arc Welding, Gas Metal Arc Welding: 100
- Equipment and Materials Arriving on Site: 1

## Use advice
When utilizing this data set for Life Cycle Assessment, all input materials and energy consumption detailed in the remedial system standardization report must be included. It is important to consider the entire lifecycle of the biopile remediation process, from construction preparation to infrastructure maintenance. Exclusion of any stages, materials, or energy inputs may result in incomplete assessment of environmental impacts.

## Review details
Inventory: The internal review was done by several iteration steps concerning raw data validation, raw data documentation, representativity, completeness and consistency of modelling with regard to ISO 14040 and 14044.

## Data sources
- Jeong, S.-W. & Suh, S.-W. Assessment of Environmental Impacts and CO 2 Emissions from Soil Remediation Technologies using Life Cycle Assessment - Case Studies on SVE and Biopile Systems -. Journal of Korean Society of Environmental Engineers 33, 267–274 (2011).
