# Remediated soil ; Bioventing ; In situ soil remediation ; 4 years ; 2 Vent wells ; 6 monitoring wells

Dataset: ILCD process, Unit process, black box
Geography: UM
Reference year: 2009
Classification: Unit processes / Other Services / Repair and maintenance
Functional unit: The functional unit is defined as remediation of 5000 yd 3 of soil. The design of the treatment options is generic, and lacks parameters such as site characteristics, hydrology and efficiency of technology.
Generated by: Yang Xintong, yangxt@caep.org.cn
Owner: Tiangong LCI Data Working Group
Review: Dependent internal review by Tiangong LCI Data Working Group
Amounts: no units in this file; such an amount is in the reference unit of its flow, which a separate flow dataset defines
copyright: false
licenseType: Free of charge for all users and uses

## General comment
The design for bioventing is based on the EPA guidance manual, Bioventing Principles and Practice. Estimation of number of vent wells and monitoring points is based on the guidelines provided by the manual. An average biodegradation rate (KB) of 3.29 mg/kg/day from an average of 145 sites was used to estimate the treatment time for bioventing.

## Geography
This study used a hypothetical site and did not specify the location of the site, therefore the author's area was used as the site location: Newark, the United States

## Technology and included processes
2 Vent wells (7m deep, dia. 6.25 cm)； 6 Monitoring points (7 m deep, dia. 20 cm) Radius of Influence, 10 m； Blower (500 W)；Tipper truck (20t)； Treatment time: 4 years； 10 workers/d: 1 month；2 workers/month: 47months. For personal transportation of workers, the distance from home to work-site was assumed to be 30 km.

## Technical purpose
The process described is intended for the in situ remediation of contaminated soil through the method of bioventing. The application is specific to sites where it is feasible to employ bioventing techniques that stimulate in-place microbial activity to degrade organic pollutants. This particular setup is designed based on a generic model, and it may be utilized at various locations that have similar contamination issues, using the criteria of the EPA's 'Bioventing Principles and Practice' as a guideline. This process is suitable for a 4-year project duration encompassing soil restoration across a site volume equivalent to 5000 yd³, making it applicable for medium to large-scale environmental remediation projects.

## Reference product
- Remediated soil: 3822.77; estimated
  功能单元定义为5000 yd 3土壤的修复（1yd3等于0.764554857984立方米,即修复方量约为3822.77 m3）。

## Inputs
All rows: estimated
- bentonite: 600
- sand: 1100
- polyvinylchloride resin (S-PVC): 16
- Mortar: 150
- Electricity: 63072
- Road Transport,Road Transport: 3e7
- transport in t*km: 6000
  运输总距离为300km，自卸车载重20吨
- contaminated soil: 3822.77

## Use advice
When utilizing this data set, users should take into account the generic nature of the model. It is advised to adjust the model based on specific site characteristics, including local hydrology and technical efficiency parameters that may differ. Users should also consider the technological applicability and constraints related to their own locations and seek to collect site-specific data for calibration. The transportation estimates for workers and equipment might require modifications to reflect local circumstances. For a precise life cycle assessment, users should account for the potential variability in soils, climate, and microbial populations.

## Review details
Inventory: The internal review was done by several iteration steps concerning raw data validation, raw data documentation, representativity, completeness and consistency of modelling with regard to ISO 14040 and 14044.

## Data sources
- Dhaliwal, Harnoor, "Sustainable site remediation : a life cycle assessment approach" (2009). Theses. 296.
