# Aluminum electrolysis ; Liquid primary aluminum ; Bayer process-hydropower ; Alumina for metallurgy

Dataset: ILCD process, Partly terminated system
Geography: CN
Reference year: 2011
Classification: Unit processes / Materials production / Metals and semimetals
Generated by: Jinliang Xie, jinliang.research@gmail.com
Owner: Tiangong LCI Data Working Group
Review: Dependent internal review by Tiangong LCI Data Working Group
Amounts: no units in this file; such an amount is in the reference unit of its flow, which a separate flow dataset defines
copyright: false
licenseType: Free of charge for all users and uses

## General comment
This liquid primary aluminum, produced through the Bayer process powered by hydropower, is utilized primarily for metallurgical applications. It is intended for use in the production of high-quality aluminum products where the physical and chemical properties of the metal are critical. This includes applications in the automotive, aerospace, electronics, construction, and packaging industries, among others.

## Time period
Dissertation Completion Date

## Reference product
- aluminium, primary, liquid: 1000; missing unimportant

## Outputs
- carbon dioxide (fossil),carbon dioxide (fossil): 25328.4; missing unimportant

## Use advice
When using this data set for Life Cycle Assessment purposes, it is important to note that the life cycle boundary is from bauxite mining to the production of primary aluminum. This includes the mining of bauxite, the production of alumina, the production of anodes, and the aluminum electrolysis process itself. The environmental impact of resource consumption, energy use, and waste emissions during these stages is significant and should be the primary focus. The impacts of transportation, usage, and recycling of aluminum products are considered less significant and are thus excluded from the evaluation system. Minor auxiliary materials, such as limestone and asphalt extraction, production, and transportation processes, are also not assessed.

## Review details
Inventory: The internal review was done by several iteration steps concerning raw data validation, raw data documentation, representativity, completeness and consistency of modelling with regard to ISO 14040 and 14044.

## Data sources
- 李贵奇. 基于生命周期思想的环境评估模型及其在铝工业中的应用. (中南大学, 2011).
