# Building boards (rough boards, rough glossy boards, specification boards) ; Barren material (granite, slate, etc.) ; Sawing, grinding, cutting ; All sizes; NESPS2 / 建筑板材（毛板、毛光板、规格板） ; 荒料（花岗石、板岩等） ; 锯解、磨抛、裁切 ; 所有规模 ; 全国第二次污染普查数据

Dataset: ILCD process, Unit process, single operation
Geography: CN
Reference year: 2019
Classification: Reference Parameters / Materials production / Other mineralic materials
Generated by: The data was created by the Office of the Second National Pollution Source Census of the Ministry of Ecology and Environment, and the data was organized by the TianGong Plan team for ILCD format / 生态环境部第二次全国污染源普查工作办公室创建数据，天工计划团队常慧敏整理数据为ILCD格式
Owner: Tiangong LCI Data Working Group / 天工LCI数据工作小组
Review: Dependent internal review by Tiangong LCI Data Working Group / 天工LCI数据工作小组
Amounts: no units in this file; such an amount is in the reference unit of its flow, which a separate flow dataset defines
copyright: false
licenseType: Free of charge for all users and uses

## General comment
the Technical of end-of-pipe management technology for pollution Exhaust gasis/

## Technical purpose
该过程描述了使用原材料如花岗岩和板岩生产各种类型的建筑板材（毛板、毛光板、规格板）的过程。这些板材用于建筑行业，并通过锯解、磨抛、裁切加工以满足不同的尺寸要求。在环境管理方面，制造过程中包括用于处理废气和颗粒物（PM2.5 - PM10）的末端污染控制技术，包括湿法处理和其他未详细说明的方法，具有不同的技术效率（分别为90%和80%）。另外，处理废水和化学需氧量（COD）的污染控制技术包括沉淀分离和压力过滤，均伴随回收，技术效率分别为30%和20%。对于管理与石油相关的废物的污染控制技术也使用沉淀分离和压力过滤加回收，技术效率分别为30%和40%。

## Reference product
- waste incineration of wood products (OSB, particle board): 1; calculated
  源文件中描述为为建筑板材（毛板、毛光板、规格板），此处对其进行了匹配工作，将其匹配到LCAflow库里面相最符合的流，污染物指标备注为工业废气量（无涂胶工艺）

## Outputs
All rows: calculated
- particles (PM2.5 - PM10): 0.00325
  the Technical of end-of-pipe management technology for pollution particles (PM2.5 - PM10)isWet process，Its Technical efficiency of end-of-pipe management90
  污染物指标颗粒物（无涂胶工艺）的末端治理技术是湿法，其效率为90，末端治理设施实际运行率（k值）计算公式为k=处理设施耗电量（千瓦时/年/（设备额定功率（千瓦）×设备运行时间（小时/年））。原文件中描述污染物类别为废气，污染物指标为颗粒物（无涂胶工艺），此处对其进行了匹配工作，将其匹配到LCAflow库里面相最符合的流，污染物指标备注为颗粒物（无涂胶工艺）
- particles (PM2.5 - PM10): 0.0065
  the Technical of end-of-pipe management technology for pollution particles (PM2.5 - PM10)isOthers①，Its Technical efficiency of end-of-pipe management80
  污染物指标颗粒物（无涂胶工艺）的末端治理技术是其他①，其效率为80，末端治理设施实际运行率（k值）计算公式为k=处理设施耗电量（千瓦时/年/（设备额定功率（千瓦）×设备运行时间（小时/年）），①其他包括机械除尘、喷雾降尘等。。原文件中描述污染物类别为废气，污染物指标为颗粒物（无涂胶工艺），此处对其进行了匹配工作，将其匹配到LCAflow库里面相最符合的流，污染物指标备注为颗粒物（无涂胶工艺）
- particles (PM2.5 - PM10): 0.0325
  the Technical of end-of-pipe management technology for pollution particles (PM2.5 - PM10)is/，Its Technical efficiency of end-of-pipe management0
  污染物指标颗粒物（无涂胶工艺）的末端治理技术是/，其效率为0。原文件中描述污染物类别为废气，污染物指标为颗粒物（无涂胶工艺），此处对其进行了匹配工作，将其匹配到LCAflow库里面相最符合的流，污染物指标备注为颗粒物（无涂胶工艺）
- Petroleum-related waste: 3.6e-5
  the Technical of end-of-pipe management technology for pollution Petroleum-related wasteisPressure filtration (filtration) + recycling①，Its Technical efficiency of end-of-pipe management40
  污染物指标石油类的末端治理技术是压滤（过滤）+循环利用①，其效率为40，末端治理设施实际运行率（k值）计算公式为/（设备额定功率（千瓦）×设备运行时间（小时/年）），①末端治理技术效率为沉淀分离效率，循环利用效率按废水回用公式计算。
  。原文件中描述污染物类别为废水，污染物指标为石油类，此处对其进行了匹配工作，将其匹配到LCAflow库里面相最符合的流，污染物指标备注为石油类
- Petroleum-related waste: 4.2e-5
  the Technical of end-of-pipe management technology for pollution Petroleum-related wasteisPrecipitation separation + recycling①，Its Technical efficiency of end-of-pipe management30
  污染物指标石油类的末端治理技术是沉淀分离+循环利用①，其效率为30，末端治理设施实际运行率（k值）计算公式为k=处理设施耗电量（千瓦时/年，①末端治理技术效率为沉淀分离效率，循环利用效率按废水回用公式计算。
  。原文件中描述污染物类别为废水，污染物指标为石油类，此处对其进行了匹配工作，将其匹配到LCAflow库里面相最符合的流，污染物指标备注为石油类
- Petroleum-related waste: 6e-5
  the Technical of end-of-pipe management technology for pollution Petroleum-related wasteis/，Its Technical efficiency of end-of-pipe management0
  污染物指标石油类的末端治理技术是/，其效率为0。原文件中描述污染物类别为废水，污染物指标为石油类，此处对其进行了匹配工作，将其匹配到LCAflow库里面相最符合的流，污染物指标备注为石油类
- Waste water: 311
  the Technical of end-of-pipe management technology for pollution Waste wateris/
  污染物指标工业废水量的末端治理技术是/。原文件中描述污染物类别为废水，污染物指标为工业废水量，此处对其进行了匹配工作，将其匹配到LCAflow库里面相最符合的流，污染物指标备注为工业废水量
- chemical oxygen demand: 0.01855
  the Technical of end-of-pipe management technology for pollution chemical oxygen demandisPrecipitation separation + recycling①，Its Technical efficiency of end-of-pipe management30
  污染物指标化学需氧量的末端治理技术是沉淀分离+循环利用①，其效率为30，末端治理设施实际运行率（k值）计算公式为k=处理设施耗电量（千瓦时/年/（设备额定功率（千瓦）×设备运行时间（小时/年）），①末端治理技术效率为沉淀分离效率，循环利用效率按废水回用公式计算。
  。原文件中描述污染物类别为废水，污染物指标为化学需氧量，此处对其进行了匹配工作，将其匹配到LCAflow库里面相最符合的流，污染物指标备注为化学需氧量
- chemical oxygen demand: 0.0212
  the Technical of end-of-pipe management technology for pollution chemical oxygen demandisPressure filtration (filtration) + recycling①，Its Technical efficiency of end-of-pipe management20
  污染物指标化学需氧量的末端治理技术是压滤（过滤）+循环利用①，其效率为20，末端治理设施实际运行率（k值）计算公式为k=处理设施耗电量（千瓦时/年/（设备额定功率（千瓦）×设备运行时间（小时/年）），①末端治理技术效率为沉淀分离效率，循环利用效率按废水回用公式计算。
  。原文件中描述污染物类别为废水，污染物指标为化学需氧量，此处对其进行了匹配工作，将其匹配到LCAflow库里面相最符合的流，污染物指标备注为化学需氧量
- chemical oxygen demand: 0.0265
  the Technical of end-of-pipe management technology for pollution chemical oxygen demandis/
  污染物指标化学需氧量的末端治理技术是/。原文件中描述污染物类别为废水，污染物指标为化学需氧量，此处对其进行了匹配工作，将其匹配到LCAflow库里面相最符合的流，污染物指标备注为化学需氧量
- Exhaust gas: 250
  the Technical of end-of-pipe management technology for pollution Exhaust gasis/
  污染物指标工业废气量（无涂胶工艺）的末端治理技术是/。原文件中描述污染物类别为废气，污染物指标为工业废气量（无涂胶工艺），此处对其进行了匹配工作，将其匹配到LCAflow库里面相最符合的流，污染物指标备注为工业废气量（无涂胶工艺）

## Use advice
This dataset is derived from the Pollution Source Census Report and contains information on pollution emissions and related products. However, it does not include data on energy or chemical consumption, nor does it provide information on waste or co-product generation. When utilizing this dataset, please supplement the missing data based on actual conditions before use
该数据集来源于污染源普查报告，包含污染物排放及相关产品信息，但不包含能源或化学品消耗数据，也不提供废弃物或共生产物产生信息。在使用该数据集时，请根据实际情况补充缺失数据后再使用。

## Review details
Inventory: The internal review was done by several iteration steps concerning raw data validation, raw data documentation, representativity, completeness and consistency of modelling with regard to ISO 14040 and 14044.
清单： 内部审查通过几个迭代步骤完成，涉及原始数据验证、原始数据记录、代表性、完整性、与 ISO 14040 和 14044 有关的建模的一致性。

## Data sources
- 第二次全国污染源普查产排污核算系数手册（试用版）,二级代码30,四级代码3032文件，在完整版文件中第3368页
