# copper-based mixed waste recycling;Copper slag concentrate;slag flotation process;slag flotation

Dataset: ILCD process, Unit process, single operation
Geography: JX-CN
Reference year: 2020
Classification: Materials production / Metals and semimetals
Functional unit: We consider the functional unit of the recycling of copper-based mixed waste to be 1000 kg electrolytic copper.
LCI method principle: Attributional
LCI method approaches: Allocation - market value
Generated by: Peng Wang, 2867919560@qq.com
Owner: Tiangong LCI Data Working Group
Review: Dependent internal review by Tiangong LCI Data Working Group
Amounts: no units in this file; such an amount is in the reference unit of its flow, which a separate flow dataset defines
copyright: false
licenseType: Free of charge for all users and uses

## General comment
The copper-based mixed waste recycling process described is intended for the recovery of high-value copper from slag waste. The copper slag concentrate derived from the slag flotation process is primarily used for the purpose of returning high copper content secondary slag back to the smelting phase in metal recycling industries. This recycling process is typically applied within industrial settings, such as a metal recycling enterprise located in Jiangxi Province, China, where it ensures the efficient recovery of copper from smelting by-products.

## Geography
The typical case is a metal recycling enterprise located in Jiangxi Province, China,

## Technology and included processes
In the process of slag flotation, secondary slag with a high copper content is produced by slag 2 flotation and returned to smelting.

## Reference product
- Copper concentrates: 464.4; measured
  Copper slag concentrate 20% Cu needs to be supplemented

## Inputs
All rows: measured
- Copper-containing slag: 2932.7
  Copper-containing slag 1 needs to be added
- sodium sulfate: 1200
- transport in t*km,transport in t*km: 61.7119
  Transport
- turpentine: 0.6
  Turpentine
- Copper-containing slag: 2467.3
  Copper-containing slag 2 (20%Cu) needs to be supplemented

## Outputs
- Tailings (deposited, hibernating in ground, non elementary flow): 4935.6; measured
  Tailings (deposited)

## Deviations from the LCI method approaches
Using the LCA-ReCiPe 2016 (Heijungs et al., 2017) characterization and normalization method (the midpoint and endpoint method), the life cycle inventory is converted into impact scores in multiple fields.

## Data selection and combination
foreground data and background data.

## Data treatment and extrapolations
GaBi 9.0 software is adopted to calculate the inventory, resource consumption, and waste emissions of the various copper-based mixed-waste recovery processes per unit mass.

## Use advice
To accurately assess the environmental impact of the copper-based mixed waste recycling, users of the LCA data set should implement the following methodological guidelines: Prioritize the utilization of foreground data, which includes direct measurements and calculations from the metal recycling enterprise itself, for higher precision in LCA modeling. Employ the GaBi 9.0 software to quantify inventory, resource consumption, and waste emissions for each unit mass of recycled material. Apply the LCA-ReCiPe 2016 method for life cycle inventory characterization and normalization, taking into account midpoint and endpoint impacts. The functional unit for evaluation should be consistent, considering 1000 kg of electrolytic copper as the benchmark for recycling performance.

## Review details
Inventory: The internal review was done by several iteration steps concerning raw data validation, raw data documentation, representativity, completeness and consistency of modelling with regard to ISO 14040 and 14044.

## Data sources
- Zhang, W. et al. Analyzing the environmental impact of copper-based mixed waste recycling-a LCA case study in China. Journal of Cleaner Production 284, 125256 (2021).
