# Municipal sludge treatment and disposal;wet sludge moisture content 70%-75%;co-incinerated with garbage to generate electricity

Dataset: ILCD process, Unit process, single operation
Geography: CN
Classification: Unit processes / End-of-life treatment / Waste water treatment
Functional unit: The life cycle study boundary starts from the wet sludge (moisture content is about 70% ~ 75%) after mechanical compression and dewatering in the sewage treatment plant to the final disposal functional unit adopts 1t wet sludge after mechanical compression.
Generated by: Jin Sitian, 2331276@tongji.edu.cn
Owner: Tiangong LCI Data Working Group
Review: Dependent internal review by Tiangong LCI Data Working Group
Amounts: no units in this file; such an amount is in the reference unit of its flow, which a separate flow dataset defines
copyright: ['opt4ROkqig']
licenseType: Free of charge for all users and uses

## General comment
This calculation takes a waste incineration treatment plant as an example, which processes 1040 tons of municipal solid waste per day, and the basic moisture content of waste received is 49.38%.

## Technology and included processes
The boiler evaporation capacity is 48t/h, the furnace temperature is 870~1150°C, and the steam turbine generator set is 16.6MW at full load.

## Technical purpose
The municipal sludge treatment and disposal process described is primarily utilized for the management of wet sludge, with a moisture content between 70%-75%, originating from sewage treatment plants. The wet sludge is transported within the facility and co-incinerated with garbage to generate electricity. This process is intended for municipal waste management facilities, particularly those which practice co-incineration as a means to both manage waste sludge and produce energy.

## Reference product
- Sludge: 1000; input; estimated
  1t wet sludge (moisture content around 70% to 75%)

## Outputs
All rows: measured
- carbon monoxide (fossil): 0.85
  The original text does not distinguish between biogenic and fossil, and according to experts, it is fossil here.
- carbon dioxide (fossil): 154.59
  (same comment as for carbon monoxide (fossil))
- Nitrogen oxides: 2.059
- sulfur oxides: 1.22474
- hydrogen chloride: 0.226
- Flue dust: 0.39
  soot
- Electricity: 300.312

## Use advice
When employing this data set for Life Cycle Assessment, ensure that the system boundary is correctly defined as starting from the point of wet sludge with a moisture content of 70%-75%, post mechanical compression and dewatering at the sewage treatment plant, to the end-of-life disposal. Emphasize the co-incineration process with garbage for energy recovery which should be accounted for in the energy balance and emissions calculations. Special attention should be paid to the allocation procedures between waste treatment and energy production when using this data.

## Review details
Inventory: The internal review was done by several iteration steps concerning raw data validation, raw data documentation, representativity, completeness and consistency of modelling with regard to ISO 14040 and 14044.

## Data sources
- 廖艳芬,漆雅庆,马晓茜.城市污水污泥焚烧处理环境影响分析[J].环境科学学报,2009,29(11):2359-2365.DOI:10.13671/j.hjkxxb.2009.11.015.
