# underground coal mining |coal mining

Dataset: ILCD process, Unit process, black box
Geography: CN
Reference year: 2018
Classification: Materials production / Other mineralic materials
Generated by: Linlin Yin, yinlinlin0623@163.com
Review: Dependent internal review by Tiangong LCI Data Working Group
Amounts: no units in this file; such an amount is in the reference unit of its flow, which a separate flow dataset defines

## Geography
According to the measured data of CO2 relative emission in 7575 underground coal mines in China in 2011, the CO2 escape emission factors in the mining process of underground coal mines in China were calculated and analyzed.

## Technology and included processes
Underground coal mining

## Outputs
- carbon dioxide (fossil): 6.57; max 203.5; normal; article inperiodical
  排放因子,井工煤矿CO2逃逸排放因子均值为6.57m3—即每开采1t煤炭释放6.57m3的CO2。将7575处矿井的CO2相对涌出量按升序排列，制出的频率分布图，显示井工煤矿CO2逃逸排放因子的分布并非严格意义上的正态分布但大体近似。
- carbon dioxide (fossil): 5.41; max 93.48; normal; article inperiodical
  排放因子,低瓦斯矿井CO2逃逸排放因子均值为5.41m3—即每开采1t煤炭释放5.41m3的CO2。7575处矿井中的低瓦斯矿井CO2逃逸排放因子均非正态分布但大体近似。
- carbon dioxide (fossil): 9.38; max 93.14; normal; article inperiodical
  排放因子,高瓦斯矿井CO2逃逸排放因子均值为9.38m3—即每开采1t煤炭释放9.38m3的CO2。7575处矿井中的高瓦斯矿井CO2逃逸排放因子均非正态分布但大体近似。
- carbon dioxide (fossil): 10.5; max 203.5; normal; article inperiodical
  排放因子,煤与瓦斯突出矿井CO2逃逸排放因子均值为10.50m3—即每开采1t煤炭释放10.50m3的CO2。7575处矿井中的煤与瓦斯突出矿井CO2逃逸排放因子均非正态分布但大体近似。

## Data selection and combination
The emission sources of CO2 escape in the process of underground coal mining are sorted out, and a calculation method based on emission factors is proposed to calculate the total amount of CO2 emission, and then consider the reduction contribution of gas recovery and / or the incremental contribution of torch destruction. Secondly, based on the measured data of CO2 relative emission from 7575 underground coal mines in China in 2011, the CO2 escape emission factor of China 's underground coal mining process was calculated and analyzed.

## Review details
Inventory: The internal review was done by several iteration steps concerning raw data validation, raw data documentation, representativity, completeness and consistency of modelling with regard to ISO 14040 and 14044.; Documentation: The review of the documentation was performed by Ecobilan and is in compliance with ISO 14040 and 14044. The data set documentation is correct in view of the appropriateness of the information provided. It includes all relevant information in view of data quality and scope of application of the respective LCI result.

## Data sources
- 1.于胜民, 朱松丽, & 张俊龙. 中国井工煤矿开采过程的二氧化碳逃逸排放因子研究. 中国能源 40, 10-16+33 (2018).
