# Pre-treatment-Cyanidation ; Gold clay or gold-bearing carbon ; Gold Concentrate ; Biological oxidation - cyanation ; All sizes; NESPS2 / 预处理-氰化 ; 金泥或载金炭 ; 金精矿 ; 生物氧化-氰化 ; 所有规模 ; 全国第二次污染普查数据

Dataset: ILCD process, Unit process, single operation
Geography: CN
Reference year: 2019
Classification: Reference Parameters / Energy carriers and technologies / Energetic raw materials
Generated by: The data was created by the Office of the Second National Pollution Source Census of the Ministry of Ecology and Environment, and the data was organized by the TianGong Plan team for ILCD format / 生态环境部第二次全国污染源普查工作办公室创建数据，天工计划团队常慧敏整理数据为ILCD格式
Owner: Tiangong LCI Data Working Group / 天工LCI数据工作小组
Review: Dependent internal review by Tiangong LCI Data Working Group / 天工LCI数据工作小组
Amounts: no units in this file; such an amount is in the reference unit of its flow, which a separate flow dataset defines
copyright: false
licenseType: Free of charge for all users and uses

## General comment
the Technical of end-of-pipe management technology for pollution Waste wateris/

## Technical purpose
此数据集表示金矿行业中常用的处理过程。预处理和氰化过程适用于金粘土或负金碳以提取金精矿。在氰化前包括生物氧化步骤以增强回收率。此数据集适用于所有规模的生产。另外，它包含了用于废水处理和去除各种污染物（包括化学需氧量、氨氮、氰化物、镉、铅和砷）的管道尾端管理技术信息，采用的方法是物理化学处理和沉降分离。

## Reference product
- Gold concentrate: 1000; input; calculated
  源文件中描述为为金精矿，此处对其进行了匹配工作，将其匹配到LCAflow库里面相最符合的流，污染物指标备注为工业废水量

## Outputs
All rows: calculated
- cyanide: 0.00015
  the Technical of end-of-pipe management technology for pollution cyanideisPhysicochemical treatment + settling separation，Its Technical efficiency of end-of-pipe management95
  污染物指标氰化物的末端治理技术是物理化学法+沉降分离，其效率为95，末端治理设施实际运行率（k值）计算公式为k=废水治理设施年正常运行时间（小时）/企业年正常生产时间（小时）。原文件中描述污染物类别为废水，污染物指标为氰化物，此处对其进行了匹配工作，将其匹配到LCAflow库里面相最符合的流，污染物指标备注为氰化物
- Ammonia Nitrogen: 0.072
  the Technical of end-of-pipe management technology for pollution Ammonia NitrogenisPhysicochemical treatment + settling separation，Its Technical efficiency of end-of-pipe management90
  污染物指标氨氮的末端治理技术是物理化学法+沉降分离，其效率为90，末端治理设施实际运行率（k值）计算公式为k=废水治理设施年正常运行时间（小时）/企业年正常生产时间（小时）。原文件中描述污染物类别为废水，污染物指标为氨氮，此处对其进行了匹配工作，将其匹配到LCAflow库里面相最符合的流，污染物指标备注为氨氮
- cadmium: 7.2e-5
  the Technical of end-of-pipe management technology for pollution cadmiumisPhysicochemical treatment + settling separation，Its Technical efficiency of end-of-pipe management70
  污染物指标镉的末端治理技术是物理化学法+沉降分离，其效率为70，末端治理设施实际运行率（k值）计算公式为k=废水治理设施年正常运行时间（小时）/企业年正常生产时间（小时）。原文件中描述污染物类别为废水，污染物指标为镉，此处对其进行了匹配工作，将其匹配到LCAflow库里面相最符合的流，污染物指标备注为镉
- lead: 0.000792
  the Technical of end-of-pipe management technology for pollution leadisPhysicochemical treatment + settling separation，Its Technical efficiency of end-of-pipe management70
  污染物指标铅的末端治理技术是物理化学法+沉降分离，其效率为70，末端治理设施实际运行率（k值）计算公式为k=废水治理设施年正常运行时间（小时）/企业年正常生产时间（小时）。原文件中描述污染物类别为废水，污染物指标为铅，此处对其进行了匹配工作，将其匹配到LCAflow库里面相最符合的流，污染物指标备注为铅
- chemical oxygen demand: 0.84
  the Technical of end-of-pipe management technology for pollution chemical oxygen demandisPhysicochemical treatment + settling separation，Its Technical efficiency of end-of-pipe management90
  污染物指标化学需氧量的末端治理技术是物理化学法+沉降分离，其效率为90，末端治理设施实际运行率（k值）计算公式为k=废水治理设施年正常运行时间（小时）/企业年正常生产时间（小时）。原文件中描述污染物类别为废水，污染物指标为化学需氧量，此处对其进行了匹配工作，将其匹配到LCAflow库里面相最符合的流，污染物指标备注为化学需氧量
- arsenic: 0.001197
  the Technical of end-of-pipe management technology for pollution arsenicisPhysicochemical treatment + settling separation，Its Technical efficiency of end-of-pipe management70
  污染物指标砷的末端治理技术是物理化学法+沉降分离，其效率为70，末端治理设施实际运行率（k值）计算公式为k=废水治理设施年正常运行时间（小时）/企业年正常生产时间（小时）。原文件中描述污染物类别为废水，污染物指标为砷，此处对其进行了匹配工作，将其匹配到LCAflow库里面相最符合的流，污染物指标备注为砷
- Waste water: 12000
  the Technical of end-of-pipe management technology for pollution Waste wateris/
  污染物指标工业废水量的末端治理技术是/。原文件中描述污染物类别为废水，污染物指标为工业废水量，此处对其进行了匹配工作，将其匹配到LCAflow库里面相最符合的流，污染物指标备注为工业废水量

## Use advice
This dataset is derived from the Pollution Source Census Report and contains information on pollution emissions and related products. However, it does not include data on energy or chemical consumption, nor does it provide information on waste or co-product generation. When utilizing this dataset, please supplement the missing data based on actual conditions before use
该数据集来源于污染源普查报告，包含污染物排放及相关产品信息，但不包含能源或化学品消耗数据，也不提供废弃物或共生产物产生信息。在使用该数据集时，请根据实际情况补充缺失数据后再使用。

## Review details
Inventory: The internal review was done by several iteration steps concerning raw data validation, raw data documentation, representativity, completeness and consistency of modelling with regard to ISO 14040 and 14044.
清单： 内部审查通过几个迭代步骤完成，涉及原始数据验证、原始数据记录、代表性、完整性、与 ISO 14040 和 14044 有关的建模的一致性。

## Data sources
- 第二次全国污染源普查产排污核算系数手册（试用版）,四级代码3221文件，在完整版文件中第5074页
