# Granular active carbon unit ; Groundwater pump and treatment

Dataset: ILCD process, Unit process, single operation
Geography: UM
Reference year: 2009
Classification: Unit processes / Other Services / Repair and maintenance
Generated by: Yang Xintong, yangxt@caep.org.cn
Owner: Tiangong LCI Data Working Group
Review: Dependent internal review by Tiangong LCI Data Working Group
Amounts: no units in this file; such an amount is in the reference unit of its flow, which a separate flow dataset defines
copyright: false
licenseType: Free of charge for all users and uses

## General comment
PTS removes the contaminated groundwater by pumping and use of aboveground treatment facilities. A PTS provides quick initial reductions in contaminant concentrations, but often results in a slow, steady reduction for the long-term.

## Geography
The case study was conducted using publicly available design documents for two remediation strategies designed by Battelle for Dover Air Force Base (AFB) in Dover, DE

## Technology and included processes
The PTS was modeled with five subsystems: extraction wells, air-stripping unit (ASU), catalytic oxidation unit (COU), granular activated carbon (GAC) unit, and treatment facilities.The model GAC unit was two steel drums each containing 180 kg (400 lb) of GAC.

## Technical purpose
The granular activated carbon (GAC) unit and groundwater pump and treatment process are typically employed in environmental remediation to extract and treat contaminated groundwater. This process is particularly suitable for applications at sites like military bases, where groundwater may be polluted with various contaminants. The GAC effectively adsorbs organic compounds, thereby purifying the water. The entire pump and treat system (PTS), inclusive of the GAC unit, is designed for the sustained reduction of pollutant concentrations, providing both rapid initial cleanup and longer-term remediation of contaminated sites.

## Reference product
- Granular active carbon unit: 1; measured

## Inputs
- Steel: 50; measured
  GAC Unit Stecl
- Activated Carbon: 180; measured
  GAC Unit GAC

## Use advice
When utilizing this data set for environmental impact assessment or life cycle assessment (LCA), consider the following: 1) Ensure the GAC unit modeling aligns with the specific site conditions and pollutant types present at the site being assessed. 2) Take into account that the effectiveness of the GAC may diminish over time and may require regeneration or replacement, which should be included in the overall assessment. 3) Emissions or other environmental impacts not included in the dataset should be estimated using available literature or fundamental environmental engineering principles. 4) Omitted data must be noted, and assumptions and estimations should be justified within the assessment report.

## Review details
Inventory: The internal review was done by several iteration steps concerning raw data validation, raw data documentation, representativity, completeness and consistency of modelling with regard to ISO 14040 and 14044.

## Data sources
- Life-Cycle Case Study Comparison of Permeable Reactive Barrier versus Pump-and-Treat Remediation
