# Milk production ; feed raw material production stage

Dataset: ILCD process, Unit process, single operation
Geography: HLJ-CN
Reference year: 2012
Classification: Unit processes / Materials production / Agricultural production means
Functional unit: In this study, the functional unit was set to 1 ton FPCM (fat-protein corrected milk).
Generated by: Rui Yang, 1632707028@qq.com
Owner: Tiangong LCI Data Working Group
Review: Dependent internal review by Tiangong LCI Data Working Group
Amounts: no units in this file; such an amount is in the reference unit of its flow, which a separate flow dataset defines
copyright: false
licenseType: Free of charge for all users and uses

## General comment
It includes fertilizer production, corn, soybean, wheat and polysavone cultivation, wheat iron and soybean meal production

## Geography
In this paper, LCA method was used to assess the environmental impact of dairy farm production system in Heilongjiang Province.

## Technology and included processes
The word feed of dairy cow is composed of two parts: full price feed and coarse word feed. In the full price feed of dairy cow word feed, rice, soybean meal and wheat bran are the main components, so other components are not considered. The production stage of feed raw materials mainly includes fertilizer production stage, crop planting stage and soybean and wheat bran processing stage.

## Technical purpose
The described industrial process is utilized in the dairy industry, specifically within the context of a dairy farm production system in Heilongjiang Province. The process involves production of feed raw materials for milk production, which includes the production of fertilizers and the cultivation of corn, soybeans, wheat, and alfalfa. Additionally, the process entails producing feed components such as wheat middlings and soybean meal. These components are critical in formulating full price feed and coarse feed for dairy cows, with an emphasis on the inclusion of corn, soybean meal, and wheat bran in the full price feed. This technical process is integral for ensuring the necessary nutrient composition of feed for dairy cows, aimed at producing high-quality Fat-Protein Corrected Milk (FPCM).

## Reference product
- milk: 1000; measured
  作为参考定量，非实际输出

## Inputs
- Fertilizer: 358.138; calculated
  种植阶段化肥投入，包括氮磷钾三种肥料

## Outputs
All rows: measured
- nitrous oxide: 0.87297
  作物种植阶段污染排放
- carbon monoxide (fossil): 0.17737
  作物种植阶段污染排放
- nitrogen, total (excluding N2): 2.72178, 0.98011 (2 entries)
  作物种植阶段污染排放
- carbon dioxide (fossil),carbon dioxide (fossil): 415.628
  作物种植阶段污染排放
- sulfur oxides: 1.23076
  作物种植阶段污染排放
- ammonia: 1.80353
  作物种植阶段污染排放
- carbon monoxide (fossil): 4.80858
  豆粕和麦麸加工阶段污染排放
- nitrogen, total (excluding N2): 4.84154
  豆粕和麦麸加工阶段污染排放
- carbon dioxide (fossil),carbon dioxide (fossil): 17.1294
  豆粕和麦麸加工阶段污染排放
- sulfur dioxide: 0.03827
  豆粕和麦麸加工阶段污染排放
- sulfur oxides: 0.027
  豆粕和麦麸加工阶段污染排放
- maize grain: 348.79
- soybean: 211.75
- wheat: 474.92
- alfalfa: 2650
- silage corn: 16290

## Use advice
When utilizing the dataset for Life Cycle Assessment (LCA), users must consider the focus on corn, soybean meal, and wheat bran in the dietary formulation for dairy cattle. The functional unit of 1 ton FPCM should be used as the basis for environmental impact assessment, ensuring comparability across studies related to milk production. It's critical not to consider additional components that are not main constituents of the dairy cow's full price feed within the scope of this LCA study. Users should also factor in the various stages of feed raw material production, including fertilizer production, crop cultivation, and processing of soy and wheat bran, when conducting their assessments.

## Review details
Inventory: The internal review was done by several iteration steps concerning raw data validation, raw data documentation, representativity, completeness and consistency of modelling with regard to ISO 14040 and 14044.

## Data sources
- 曹正纲. 黑龙江省奶牛场生命周期评价. (东北农业大学, 2012).
