# Soil remediation;soil vapor extraction;in-situ;construction;well installation;

Dataset: ILCD process, Unit process, single operation
Geography: KR
Reference year: 2011
Classification: Other Services / Repair and maintenance
Generated by: Lei Qiushuang, leiqs@caep.org.cn
Owner: Tiangong LCI Data Working Group
Review: Dependent internal review by Tiangong LCI Data Working Group
Amounts: no units in this file; such an amount is in the reference unit of its flow, which a separate flow dataset defines
copyright: false
licenseType: Free of charge for all users and uses

## General comment
3 wells, 1 extraction well and 2 monitoring wells

## Technical purpose
This data set describes the soil remediation process using in-situ soil vapor extraction (SVE) during the construction phase, which includes the installation of three wells: one used for extraction and two intended for monitoring. This remediation process is applied to remove volatile contaminants from polluted soil through the application of vacuum pressure. It is a key technical approach within the environmental engineering field, particularly for brownfield restoration and industrial site clean-up.

## Reference product
- SVE well: 3; measured
  3 wells

## Inputs
All rows: measured
- polyvinylchloride resin (E-PVC): 45
- sand: 0.3
- bentonite: 211
- cement: 2291
  砂浆
- Diesel: 0.011

## Use advice
When using this dataset for Life Cycle Assessment (LCA), users should ensure that the boundaries of the analyzed system include all relevant upstream and downstream processes associated with the construction and operation of in-situ soil vapor extraction wells. The inclusion of ancillary materials, energy inputs for well drilling and maintenance, and emissions during construction should be considered. It is also necessary to account for the different environmental impacts from the extraction well and the monitoring wells. Care should be taken to apply regional data for energy consumption and emissions where available, keeping in mind the technological specifics and regional practices of in-situ SVE systems.

## Review details
Inventory: The internal review was done by several iteration steps concerning raw data validation, raw data documentation, representativity, completeness and consistency of modelling with regard to ISO 14040 and 14044.

## Data sources
- Assessment of Environmental Impacts and CO2 Emissions from Soil Remediation Technologies using Life cycle Assessment - Case Studies on SVE and Biopile Systems
