# 污泥处理与处置|与一般工业固废混燃发电

Dataset: ILCD process, Unit process, single operation
Geography: JS-CN
Classification: Materials production / Other mineralic materials
Generated by: Jin Sitian, 2331276@tongji.edu.cn
Review: Dependent internal review by Tiangong LCI Data Working Group
Amounts: no units in this file; such an amount is in the reference unit of its flow, which a separate flow dataset defines

## Geography
宿迁某工业固废处置配套发电公司

## Reference product
- Sludge: 1000; input; estimated

## Inputs
- Electricity: 113.328; article inperiodical
  生产上游：包括污泥运输及干化与一般工业固废运输及预处理过程。
- Diesel: 8.39; article inperiodical
  生产上游：包括污泥运输及干化与一般工业固废运输及预处理过程。
- water: 74119.3; estimated
  生产过程：主要考虑气体污染物、水体污染物以及固体废弃物的直接或间接排放。
- Diesel: 3.68; article inperiodical
  生产下游主要涉及焚烧后可利用固体废弃物。

## Outputs
- carbon dioxide: 252.8; article inperiodical
  生产上游：包括污泥运输及干化与一般工业固废运输及预处理过程。
- methane: 0.03; article inperiodical
  生产上游：包括污泥运输及干化与一般工业固废运输及预处理过程。
- nitrous oxide: 0.02; article inperiodical
  生产上游：包括污泥运输及干化与一般工业固废运输及预处理过程。
- Nitrogen oxides: 1.03; article inperiodical
  生产上游：包括污泥运输及干化与一般工业固废运输及预处理过程。
- sulfur dioxide: 0.34; article inperiodical
  生产上游：包括污泥运输及干化与一般工业固废运输及预处理过程。
- carbon monoxide: 1.18; article inperiodical
  生产上游：包括污泥运输及干化与一般工业固废运输及预处理过程。
- hydrocarbons (unspecified): 0.11; article inperiodical
  生产上游：包括污泥运输及干化与一般工业固废运输及预处理过程。
- particles (PM10): 0.15; article inperiodical
  生产上游：包括污泥运输及干化与一般工业固废运输及预处理过程。
- Waste (solid): 0.1; article inperiodical
  生产上游：包括污泥运输及干化与一般工业固废运输及预处理过程。
- carbon dioxide: 13722; estimated
  生产过程：主要考虑气体污染物、水体污染物以及固体废弃物的直接或间接排放。
- Nitrogen oxides: 3.44; measured
  生产过程：主要考虑气体污染物、水体污染物以及固体废弃物的直接或间接排放。
- sulfur dioxide: 2.05; measured
  生产过程：主要考虑气体污染物、水体污染物以及固体废弃物的直接或间接排放。
- carbon monoxide: 5.43; measured
  生产过程：主要考虑气体污染物、水体污染物以及固体废弃物的直接或间接排放。
- particles (PM10): 0.88; measured
  生产过程：主要考虑气体污染物、水体污染物以及固体废弃物的直接或间接排放。
- chemical oxygen demand: 0.93; measured
  生产过程：主要考虑气体污染物、水体污染物以及固体废弃物的直接或间接排放。
- ammonia: 0.02; measured
  生产过程：主要考虑气体污染物、水体污染物以及固体废弃物的直接或间接排放。
- Suspended solids, unspecified: 0.19; measured
  生产过程：主要考虑气体污染物、水体污染物以及固体废弃物的直接或间接排放。
- nitrogen, total (excluding N2): 0.03; measured
  生产过程：主要考虑气体污染物、水体污染物以及固体废弃物的直接或间接排放。
- phosphorus, total: 0.00186; measured
  生产过程：主要考虑气体污染物、水体污染物以及固体废弃物的直接或间接排放。
- Waste (solid): 1093.47; measured
  生产过程：主要考虑气体污染物、水体污染物以及固体废弃物的直接或间接排放。
- carbon dioxide: 11.06; article inperiodical
  生产下游主要涉及焚烧后可利用固体废弃物。
- methane: 0.012; article inperiodical
  生产下游主要涉及焚烧后可利用固体废弃物。
- nitrous oxide: 0.00084; article inperiodical
  生产下游主要涉及焚烧后可利用固体废弃物。
- Nitrogen oxides: 0.045; article inperiodical
  生产下游主要涉及焚烧后可利用固体废弃物。
- sulfur dioxide: 0.015; article inperiodical
  生产下游主要涉及焚烧后可利用固体废弃物。
- carbon monoxide: 0.052; article inperiodical
  生产下游主要涉及焚烧后可利用固体废弃物。
- hydrocarbons (unspecified): 0.0049; article inperiodical
  生产下游主要涉及焚烧后可利用固体废弃物。
- particles (PM10): 0.0064; article inperiodical
  生产下游主要涉及焚烧后可利用固体废弃物。

## Review details
Inventory: The internal review was done by several iteration steps concerning raw data validation, raw data documentation, representativity, completeness and consistency of modelling with regard to ISO 14040 and 14044.

## Data sources
- 不同污泥混燃发电工艺生命周期评价
