# Transformer manufacture ; Large transformer(8) of Outside

Dataset: ILCD process, Unit process, single operation
Geography: NMG-CN
Reference year: 2017
Classification: Systems / Other machines
Functional unit: The functional unit is 1.5 MW wind turbine
LCI method principle: Attributional
LCI method approaches: Allocation
Generated by: Yunzhi Zhao, ll10088@163.com
Owner: Tiangong LCI Data Working Group
Review: Dependent internal review by Tiangong LCI Data Working Group
Amounts: no units in this file; such an amount is in the reference unit of its flow, which a separate flow dataset defines
copyright: false
licenseType: Free of charge for all users and uses

## General comment
The large transformers manufactured in this industrial process are designed for deployment within wind power generation facilities. Specifically, these transformers are suited for integration into substations associated with wind farms that utilize 1.5 megawatts (MW) wind turbines. These transformers are essential components for stepping up the voltage of generated electricity to levels suitable for long-distance transmission and distribution within power grids.

## Geography
The data regarding the parameters of wind power has been collected from Wang (2012). A wind farm equipped with 33 domestic 1.5 megawatts (MW) wind turbines is regarded as a case study to analyze the environmental impact and its substitution effects. The wind farm is located in the northeast of Inner Mongolia, the province in which most of China’s wind power is installed (Xia and Song, 2017).

## Reference product
- Transformer: 8; article inperiodical

## Inputs
- copper: 72000; article inperiodical
- iron: 288000; article inperiodical
  Steel and iron

## Deviations from the LCI method approaches
The life cycle inventory for wind power is illustrated as follows. The production and manufacturing stage include the production of wind turbines, substations, and cables, which consume a large amount of energy and emit pollutants (Xue et al., 2015).

## Use advice
When utilizing the life cycle inventory data on the manufacture of the large transformers, users should ensure that the system boundaries are compatible with the intended scope of the LCA study. This data should reflect the energy consumption and pollutant emissions during the production phase of the transformers, as specified by Xue et al. (2015). Users should consider the environmental impact and substitution effects of these transformers within the broader context of a wind power generation system as demonstrated in the case study of a 1.5 MW wind turbine-equipped wind farm in the northeast of Inner Mongolia. Assumptions based on data collected from Wang (2012) and Xia and Song (2017) should be critically assessed for current validity and relevance to the specific LCA application.

## Review details
Inventory: The internal review was done by several iteration steps concerning raw data validation, raw data documentation, representativity, completeness and consistency of modelling with regard to ISO 14040 and 14044.

## Data sources
- Li, H., Jiang, H.-D., Dong, K.-Y., Wei, Y.-M. & Liao, H. A comparative analysis of the life cycle environmental emissions from wind and coal power: Evidence from China. Journal of Cleaner Production 248, 119192 (2020).
