# raw meal preparation|raw meal|new dry process, >4000 t/d|secondary solid waste, dust recovery

Dataset: ILCD process, Unit process, single operation
Geography: CN
Reference year: 2020
Classification: Materials production / Other mineralic materials
Generated by: Siqi Yang
Amounts: no units in this file; such an amount is in the reference unit of its flow, which a separate flow dataset defines
copyright: false

## General comment
The new dry process has a relatively large market share in the cement industry process. Secondary solid waste composite cement raw material. The contaminant in the raw material preparation process is particulate matter.

## Model description
The research focuses on P·O 42.5 type cement clinker as the study object, with the functional unit and reference flow set as the production of 1.00 ton of cement clinker. The reference year is 2020. The system boundary includes the unit processes of raw material preparation (raw material mining, raw material pre-treatment and homogenization, raw material grinding, and raw material homogenization), with the scope of the real process ranging from raw material pre-treatment and batching to raw material homogenization.

## Reference product
- raw meal: 1000
  Raw materials

## Inputs
All rows: article inperiodical
- calcium carbonate: 782.152
  Limestone
- shale: 141.354
  Shale
- sandstone: 61.3616
  Sandstone
- blast furnace dust, for recovery: 15.1322
  The original text refers to secondary solid waste, which refers to dust recovery. The dust collected by the bag filter is returned to the raw material homogenization stage through the return system, and the process produces solid waste that can be effectively recycled.
- electricity, medium voltage: 49.9778
  Electricity. Electricity is supplied from power plants.

## Outputs
- particles (> PM10): 0.00794092; article inperiodical
  Particulate matter, with an unspecified particle size, is treated as PM > 10 micrometers in diameter. The particulate matter collected by the bag filter is returned to the raw material homogenization stage through the recycling system, and the solid waste generated during the process can be effectively recycled and reused.

## Deviations from the LCI method approaches
Data on limestone mining, shale mining, sandstone mining, iron powder production, coal mining, electricity and tap water production, and direct pollutant emissions were obtained from the CLCD-China-ECER 0.8 database.

## Cut-off and completeness
Secondary solid waste is a type of waste that follows the CLCD principle. According to this principle, the environmental burden caused by its production process should be borne by the main product of the previous stage. When used as clinker raw materials, the upstream production data of secondary solid waste can be ignored.
This study utilizes the basic life cycle database developed by Yike Environmental Technology Co., Ltd., and adheres to the CLCD trade-off principle. The following details apply: (1) Raw material upstream production data can be ignored when the weight of raw materials is less than 1% of product weight, and the weight of materials containing rare/high purity is less than 0.1% of the product weight. Additionally, the total weight of the raw material is less than or equal to 5% of the total weight. (2) Waste or low-value waste used as raw material does not require tracing of its upstream production process. (3) In most cases, production equipment, plant buildings, living facilities, etc. can be ignored. (4) Known emission data within the scope of the selected environmental impact type should not be ignored.
The CLCD method is used as the data quality assessment method in this study. This method evaluates the resource consumption and pollutant emission data in the cement clinker LCA model from four aspects, such as inventory data sources and algorithms, years, locations and technical representativeness, to obtain the uncertainty brought by matching with the database, and then completes the inventory uncertainty assessment after correlating the background database base uncertainty. The uncertainty is calculated by the method of analytical formula to transfer and accumulate the uncertainty, and finally the uncertainty of LCA results of cement clinker production process is obtained.

## Data selection and combination
The data for all parameters, except CO2, were obtained from reports of companies such as Gao'an Hongshi and Jiangxi Dean Wannianqing, the clean production evaluation index system of the cement industry, and research papers on cement clinker.

## Data sources
- 陆柳鲜. (2022). 江西省多源有色冶炼固废资源化过程生命周期评价研究 [硕士, 江西理工大学].
