# Treatment process of wet waste ; Anaerobic fermentation for methane production,CN

Dataset: ILCD process
Geography: SH-CN
Classification: Unit processes / End-of-life treatment / Energy recycling
Generated by: Jiaqi Lu, wilsherelu@foxmail.com
Owner: Tiangong LCI Data Working Group
Review: Dependent internal review by Tiangong LCI Data Working Group
Amounts: no units in this file; such an amount is in the reference unit of its flow, which a separate flow dataset defines
copyright: true
licenseType: Free of charge for all users and uses

## General comment
This anaerobic fermentation process is specifically designed for the treatment of wet organic waste. It is primarily used to produce methane, which can be captured and utilized as a biogas for energy production. Such a process is applicable in waste management facilities especially those that process municipal solid waste, food waste, agricultural residues, and sewage sludge.

## Reference product
- Wet Waste Treatment: 1000; input; measured
  Process 1t of wet waste

## Inputs
All rows: measured
- Electricity: 44
  Maintenance of off-grid electricity
- process steam: 44
  steam
- Electricity: 330.084
  power consumption
- water: 0.24
  Water Consumption
- Gasoline (regular): 0.0053
  gasoline
- Diesel: 0.038
  diesel fuel
- carbonate: 0.052

## Outputs
All rows: measured
- carbon dioxide (biogenic): 170
  Landfill releases carbon dioxide According to expert judgment, this is biogenic
- carbon dioxide (fossil): 120
  Biogas combustion + incomplete combustion of carbon dioxide
- Biogas Slurry: 800
  biogas slurry
- Biogas residue: 54
  digestate
- Electricity: 462.6
  Electricity production

## Use advice
When utilizing this data set, users should ensure that the system boundaries are clearly defined, especially regarding the handling of by-products and energy recovery. It is important to account for the possible variations in waste composition and process efficiency based on geographic and seasonal factors. The end-of-life phase for the produced methane should be adequately modeled, considering its capture and usage as an energy source as well as potential emissions mitigation. Exclusions of upstream impacts associated with the collection and transport of wet waste to the treatment facility should be justified if not included.

## Review details
Inventory: The internal review was done by several iteration steps concerning raw data validation, raw data documentation, representativity, completeness and consistency of modelling with regard to ISO 14040 and 14044.

## Data sources
- 上海市市政固废调研结果
