# Electricity production ; Electricity mix ; Beijing

Dataset: ILCD process, Unit process, single operation
Geography: BJ-CN
Reference year: 2019
Classification: Unit processes / Energy carriers and technologies / Electricity
Generated by: Ruoxi Xiong, xiongrx0126@163.com
Owner: Tiangong LCI Data Working Group
Review: Dependent internal review by Tiangong LCI Data Working Group
Amounts: no units in this file; such an amount is in the reference unit of its flow, which a separate flow dataset defines
copyright: false
licenseType: Free of charge for all users and uses

## General comment
Electricity mix includes thermal, hydro, wind, nuclear and solar generation

## Technical purpose
This dataset represents the electricity mix production in Beijing, which is used for a variety of applications ranging from residential and commercial power supply to industrial power requirements. The electricity is generated through a mix of thermal, hydro, wind, nuclear, and solar power plants and may be used by organizations for assessing the environmental impact of their electricity consumption.

## Reference product
- Electricity: 3.6; missing unimportant
  [{'text': '能量', 'type': 'text'}]

## Inputs
All rows: missing unimportant
- electricity for thermal power: 3.45944
  [{'text': '能量', 'type': 'text'}]
- electricity from hydroelectric power plant: 0.0780876
  [{'text': '能量', 'type': 'text'}]
- electricity for nuclear power: 0
  [{'text': '能量', 'type': 'text'}]
- electricity from wind power: 0.0234252
  [{'text': '能量', 'type': 'text'}]
- electricity for solar power: 0.0390456
  [{'text': '能量', 'type': 'text'}]

## Use advice
Users of this dataset should consider the specific electricity generation mix when applying this data for lifecycle assessments or carbon footprint calculations. The geographical specificity of the data to Beijing should be taken into account, as the mix and environmental impact can differ significantly from other regions. Users should also note that the future evolution of the electricity mix, such as increases in renewable energy sources, may affect the relevancy of the data over time. For accurate results, periodic updates from local energy statistics should be incorporated to reflect the current electricity mix.

## Review details
Inventory: The internal review was done by several iteration steps concerning raw data validation, raw data documentation, representativity, completeness and consistency of modelling with regard to ISO 14040 and 14044.

## Data sources
- 能源统计年鉴2020
