# PP production and waste ; PP materials

Dataset: ILCD process, Unit process, black box
Geography: CN
Reference year: 1995
Classification: Unit processes / Materials production / Plastics
Generated by: Huijuan Guo, GHJ@email.ncu.edu.cn
Owner: Tiangong LCI Data Working Group
Review: Dependent internal review by Tiangong LCI Data Working Group
Amounts: no units in this file; such an amount is in the reference unit of its flow, which a separate flow dataset defines
copyright: false
licenseType: Free of charge for all users and uses

## General comment
The starting and ending points of this study are focused on the extraction, transportation, extraction, production of polymers, and waste disposal of crude oil. However, the use stage of materials is not considered in this article, and waste disposal has chosen the landfill method that is considered to have a significant environmental impact in relevant literature, And this landfill method is also widely used in the disposal of urban solid waste in China. The environmental emissions brought by energy production are included in the energy consumption ratio of each stage

## Geography
我国的国情出发

## Technical purpose
The PP material produced through this industrial process is designed for various applications, excluding the use phase in assessment. It is likely used in manufacturing a wide range of products from packaging, textiles, automotive components, to consumer goods, considering its absence in use phase consideration suggests a generic production without a specific end-use application. The landfill disposal method associated with the waste from this process indicates that end-of-life considerations are part of the environmental impact assessment, which is standard for urban solid waste management in China.

## Reference product
- polypropylene granulate (PP): 1000; measured

## Inputs
- crude oil; 42.3 MJ/kg: 1.443; measured
  crude
- Energy,unspecified: 31114.5; measured
  Energy consumption

## Outputs
All rows: measured
- carbon dioxide (fossil): 6081.23
  原文未区分bio和fossil，根据专家判断此处为fossil
- sulfur dioxide: 40.57
- Nitrogen oxides: 0.172
  NOx
- methane (fossil): 13
  原文未区分bio和fossil，根据专家判断此处为fossil
- hydrocarbons (unspecified): 2.774
  Hydrocarbons
- waste water - untreated: 14790
  wastewater
- Waste (unspecified): 474.58
  Waste residue

## Data selection and combination
本文评价中所使用的数据来源有：企业内部实际生产数据、工艺改进的设计数据、国家环 境保护部门数据；我国相关的统计年鉴、文献等公开出版

## Data treatment and extrapolations
由于本文所研究的材料涉及到多产品系统，我们将各产品系统的输入和输出数据按照质量比例进行了分配

## Use advice
When utilizing this LCA data, users must note that the use phase of materials is intentionally excluded. Therefore, when applying this data in a broader LCA, ensure to supplement it with use phase data specific to the product being assessed. The data has been derived from multiple sources including actual production data within enterprises, design data for process improvements, data from national environmental protection departments, and publicly available statistics and literature. The outputs and inputs of the multi-product system have been allocated based on mass ratio, and the chosen functional unit for evaluation is 1000kg. It is essential to adhere to these methodological considerations to maintain consistency and accuracy in LCA outcomes.

## Review details
Inventory: The internal review was done by several iteration steps concerning raw data validation, raw data documentation, representativity, completeness and consistency of modelling with regard to ISO 14040 and 14044.

## Data sources
- 陈红, 郝维昌, 石凤 & 王天民. 几种典型高分子材料的生命周期评价. 环境科学学报 24, 545–549 (2004).
