# Aluminum electrolysis ; Liquid primary aluminum ; China Southern Power Grid ; Alumina for metallurgy

Dataset: ILCD process, Partly terminated system
Geography: CN
Reference year: 2011
Classification: Unit processes / Energy carriers and technologies / Electricity
Generated by: Jinliang Xie, jinliang.research@gmail.com
Owner: Tiangong LCI Data Working Group
Review: Dependent internal review by Tiangong LCI Data Working Group
Amounts: no units in this file; such an amount is in the reference unit of its flow, which a separate flow dataset defines
copyright: false
licenseType: Free of charge for all users and uses

## General comment
结合不同工艺的电解铝产量分布比例所计算出的国内电解铝生产过程CO2排放因子的加权平均值。从氧化铝到铝锭。

## Geography
南方电网

## Time period
Year of publication

## Technical purpose
The technical usage of the described process is for the production of liquid primary aluminum, employing the southern China power grid in the electrolysis process. Alumina for metallurgy is used as a raw material. This primary aluminum is typically used for manufacturing various aluminum products such as sheets, foils, wires, and extrusions. It serves as an input material for sectors that produce transportation vehicles, packaging, building components, and electrical applications due to its properties such as light weight, conductivity, and corrosion resistance.

## Reference product
- aluminium, primary, liquid: 1000; measured

## Outputs
- carbon dioxide (fossil),carbon dioxide (fossil): 899; measured

## Data selection and combination
On the basis of fully sorting out the production situation of alumina and electrolytic aluminum enterprises across the country, and in accordance with the principle of covering all representative processes and production capacities, and taking into full consideration the distribution of production capacities, nature of enterprises and other factors, we focused on selecting typical primary aluminum smelting enterprises in typical regions such as Henan, Shandong and Guangxi, and carried out an in-depth field survey, and formed a database of carbon emission factors for alumina and electrolytic aluminum, with the data of 2011 as the main body. The database of alumina production includes primary and secondary materials. The alumina production database includes four sub-databases: consumption of raw and auxiliary materials and waste generation, process technology and equipment, energy consumption of process materials, and secondary energy production of self-provided cogeneration plants. For details, see Table 1 of the literature sources.

## Use advice
Users of this dataset should pay attention to the weighted average CO2 emission factor generated during the electrolysis of aluminum, which is based on a distribution ratio of aluminum production using different processes within China. Special attention should be given to data from the year 2011 as it is the primary source for the carbon emission factors database for alumina and aluminum electrolysis processes. The dataset includes sub-databases for raw & auxiliary material consumption and waste generation, technological processes & equipment, materials & energy consumption in processes, and secondary energy production in self-provided thermal power plants. When modeling, users should include the scope of carbon anode consumption in the electrolysis process, PFCs emissions, and the production process of purchased electricity. It is also advised to consult Table 1 of the source literature for a detailed understanding of the database structure and to ensure the inclusion of all relevant technological factors for accurate lifecycle assessment.

## Review details
Inventory: The internal review was done by several iteration steps concerning raw data validation, raw data documentation, representativity, completeness and consistency of modelling with regard to ISO 14040 and 14044.

## Data sources
- 张文娟，李会泉，陈波，李强，韩永鹏 & 孙振华. 我国原铝冶炼行业温室气体排放模型. 环境科学研究 vol. 26 1132–1138 (2013).
