# Aluminum electrolysis carbon anode production ; carbon anode ; petroleum coke ; 2010

Dataset: ILCD process, Unit process, single operation
Geography: CN
Reference year: 2021
Classification: Unit processes / Materials production / Non-energetic raw materials
Generated by: Zimeng Cai, caizm6178@163.com
Owner: Tiangong LCI Data Working Group
Review: Dependent internal review by Tiangong LCI Data Working Group
Amounts: no units in this file; such an amount is in the reference unit of its flow, which a separate flow dataset defines
copyright: false
licenseType: Free of charge for all users and uses

## General comment
The carbon anodes produced through this process using petroleum coke are predominantly used in aluminum electrolysis operations. These anodes are an essential component in the production of primary aluminum, where they function as a key electrode in the electrolytic reduction of alumina. This process is specifically tailored for applications in the aluminum industry that require carbon anodes made from petroleum coke for efficient and effective metal extraction.

## Time period
Date of publication

## Reference product
- anode, for metal electrolysis: 1000; software or database
  anode

## Inputs
All rows: software or database
- electricity, high voltage, aluminium industry: 759.6
  electricty
- heavy fuel oil: 69
  fuel oil
- coal tar: 220
  coal tar pitch
- Petroleum Coke: 1140
  petroleum coak
- coal gas: 1290

## Data selection and combination
The data in this study refers to the LCA data of PA, SA, electricity, and other background data. The PA data were obtained from statistical data sources, and the SA data were mainly obtained from the literatures. The background data were mainly derived from the Chinese localization LCA database CAS RCEES 2018, which was established by the Research Center for Eco-Environmental Sciences, Chinese Academy of Sciences and covers LCA data for energy, materials, transportation, waste management etc.

## Use advice
When using this dataset for Life Cycle Assessment, attention should be paid to the scope and technological applicability of the data. The PA and SA data should be utilized in accordance with their statistical sources and literature bases. Users should ensure that the technological practices and time frame (year 2010) represented by the dataset are consistent with the scope of their assessment. Background data from the CAS RCEES 2018 database should be considered for the localization context within China and may not be applicable globally. It is also essential to verify whether the LCA data includes considerations for end-of-life recycling and to adjust the modelling of the use phase behavior accordingly.

## Review details
Inventory: The internal review was done by several iteration steps concerning raw data validation, raw data documentation, representativity, completeness and consistency of modelling with regard to ISO 14040 and 14044.

## Data sources
- Ding, N., Liu, N., Lu, B. & Yang, J. Life cycle greenhouse gas emissions of aluminum based on regional industrial transfer in China. J. Ind. Ecol. 25, 1657–1672 (2021).
