# Sunflower seed production

Dataset: ILCD process, Unit process, black box
Geography: PT
Reference year: 2013
Valid until: 2014
Classification: Materials production / Food and renewable raw materials
Functional unit: 1 kg of sunflower seeds
Generated by: zhu xian, zzhu0918@163.com
Owner: Tiangong LCI Data Working Group
Review: Dependent internal review by Tiangong LCI Data Working Group
Amounts: no units in this file; such an amount is in the reference unit of its flow, which a separate flow dataset defines
copyright: false
licenseType: Free of charge for all users and uses

## General comment
Prepare the seeds, fertilizers and pesticides needed to grow sunflower, and use mechanical methods to sow, fertilize, water and harvest.

## Geography
located in Alentejo.

## Time period
The sunflower planting data comes mainly from the large cooperative located in Alentejo.

## Technical purpose
The data set represents the process for the production of 1 kg of sunflower seeds, which are primarily used for oil extraction and as a food source. Sunflower seeds can be further processed into sunflower oil or sold as snacks, bird feed, or used in culinary applications. The detailed process includes preparing the seeds, fertilizers, and pesticides needed for sunflower cultivation, as well as mechanical sowing, fertilizing, watering, and harvesting, specific to the agricultural practices in the Alentejo region.

## Reference product
- Biological yield: 3250; measured

## Inputs
All rows: measured
- Nitrogenous fertilizer: 17
- Phosphorus Pentoxide: 53
- Phosphate fertilizer: 53
- Urea: 40
- Pesticide: 0.9
- diesel oil: 0.135
- Electricity: 2160
- Seeds: 5.5
- Waste (deposited, hibernating in ground, non elementary flow): 2000

## Use advice
When utilizing this data set for Life Cycle Assessment (LCA), users should consider the specific context of sunflower seed cultivation in Alentejo. The data reflects regional agricultural practices and may not be representative of other locations. Users should account for this geographical specificity when modelling the agricultural phase in their LCA and ensure that all inputs and outputs related to the cultivation process are appropriately included. Consider the potential for environmental impacts from the use of fertilizers and pesticides, and apply this data in scenarios that match the technological and methodological characteristics represented.

## Review details
Inventory: The internal review was done by several iteration steps concerning raw data validation, raw data documentation, representativity, completeness and consistency of modelling with regard to ISO 14040 and 14044.
