# Frozen vegetables ; Mustard, leafy vegetables ; Washing + quick freezing ; All sizes; NESPS2 / 速冻蔬菜 ; 芥菜类、叶菜类 ; 水洗+速冻 ; 所有规模 ; 全国第二次污染普查数据

Dataset: ILCD process, Unit process, single operation
Geography: CN
Reference year: 2019
Classification: Reference Parameters / Materials production / Food and renewable raw materials
Generated by: The data was created by the Office of the Second National Pollution Source Census of the Ministry of Ecology and Environment, and the data was organized by the TianGong Plan team for ILCD format / 生态环境部第二次全国污染源普查工作办公室创建数据，天工计划团队常慧敏整理数据为ILCD格式
Owner: Tiangong LCI Data Working Group / 天工LCI数据工作小组
Review: Dependent internal review by Tiangong LCI Data Working Group / 天工LCI数据工作小组
Amounts: no units in this file; such an amount is in the reference unit of its flow, which a separate flow dataset defines
copyright: false
licenseType: Free of charge for all users and uses

## General comment
the Technical of end-of-pipe management technology for pollution chemical oxygen demandis/

## Technical purpose
该数据集描述了芥菜类和叶菜类蔬菜的水洗及速冻过程，适用于生产适合零售和餐饮服务行业的即食冻蔬菜产品。此外，它还包括使用沉淀分离作为末端治理技术处理废水中的总磷、氨氮、有机结合氮和化学需氧量等参数，以确保符合环保法规。

## Reference product
- Quick-frozen vegetables: 1000; calculated
  源文件中描述为为速冻蔬菜，此处对其进行了匹配工作，将其匹配到LCAflow库里面相最符合的流

## Outputs
All rows: calculated
- Waste water: 6800
  the Technical of end-of-pipe management technology for pollution Waste wateris/
  污染物指标工业废水量的末端治理技术是/，末端治理设施实际运行率（k值）计算公式为/。原文件中描述污染物类别为废水，污染物指标为工业废水量，此处对其进行了匹配工作，将其匹配到LCAflow库里面相最符合的流
- phosphorus, total: 0.0207
  the Technical of end-of-pipe management technology for pollution phosphorus, totalisPrecipitation separation，Its Technical efficiency of end-of-pipe management10
  污染物指标总磷的末端治理技术是沉淀分离，其效率为10，末端治理设施实际运行率（k值）计算公式为k=1。原文件中描述污染物类别为废水，污染物指标为总磷，此处对其进行了匹配工作，将其匹配到LCAflow库里面相最符合的流
- phosphorus, total: 0.023
  the Technical of end-of-pipe management technology for pollution phosphorus, totalis/
  污染物指标总磷的末端治理技术是/，末端治理设施实际运行率（k值）计算公式为/。原文件中描述污染物类别为废水，污染物指标为总磷，此处对其进行了匹配工作，将其匹配到LCAflow库里面相最符合的流
- Ammonia Nitrogen: 0.0684
  the Technical of end-of-pipe management technology for pollution Ammonia NitrogenisPrecipitation separation，Its Technical efficiency of end-of-pipe management10
  污染物指标氨氮的末端治理技术是沉淀分离，其效率为10，末端治理设施实际运行率（k值）计算公式为k=1。原文件中描述污染物类别为废水，污染物指标为氨氮，此处对其进行了匹配工作，将其匹配到LCAflow库里面相最符合的流
- Ammonia Nitrogen: 0.076
  the Technical of end-of-pipe management technology for pollution Ammonia Nitrogenis/
  污染物指标氨氮的末端治理技术是/，末端治理设施实际运行率（k值）计算公式为/。原文件中描述污染物类别为废水，污染物指标为氨氮，此处对其进行了匹配工作，将其匹配到LCAflow库里面相最符合的流
- Nitrogen, organic bound: 0.1665
  the Technical of end-of-pipe management technology for pollution Nitrogen, organic boundisPrecipitation separation，Its Technical efficiency of end-of-pipe management10
  污染物指标总氮的末端治理技术是沉淀分离，其效率为10，末端治理设施实际运行率（k值）计算公式为k=1。原文件中描述污染物类别为废水，污染物指标为总氮，此处对其进行了匹配工作，将其匹配到LCAflow库里面相最符合的流
- Nitrogen, organic bound: 0.185
  the Technical of end-of-pipe management technology for pollution Nitrogen, organic boundis/
  污染物指标总氮的末端治理技术是/，末端治理设施实际运行率（k值）计算公式为/。原文件中描述污染物类别为废水，污染物指标为总氮，此处对其进行了匹配工作，将其匹配到LCAflow库里面相最符合的流
- chemical oxygen demand: 0.4872
  the Technical of end-of-pipe management technology for pollution chemical oxygen demandisPrecipitation separation，Its Technical efficiency of end-of-pipe management20
  污染物指标化学需氧量的末端治理技术是沉淀分离，其效率为20，末端治理设施实际运行率（k值）计算公式为k=1。原文件中描述污染物类别为废水，污染物指标为化学需氧量，此处对其进行了匹配工作，将其匹配到LCAflow库里面相最符合的流
- chemical oxygen demand: 0.609
  the Technical of end-of-pipe management technology for pollution chemical oxygen demandis/
  污染物指标化学需氧量的末端治理技术是/，末端治理设施实际运行率（k值）计算公式为/。原文件中描述污染物类别为废水，污染物指标为化学需氧量，此处对其进行了匹配工作，将其匹配到LCAflow库里面相最符合的流

## Use advice
This dataset is derived from the Pollution Source Census Report and contains information on pollution emissions and related products. However, it does not include data on energy or chemical consumption, nor does it provide information on waste or co-product generation. When utilizing this dataset, please supplement the missing data based on actual conditions before use
该数据集来源于污染源普查报告，包含污染物排放及相关产品信息，但不包含能源或化学品消耗数据，也不提供废弃物或共生产物产生信息。在使用该数据集时，请根据实际情况补充缺失数据后再使用。

## Review details
Inventory: The internal review was done by several iteration steps concerning raw data validation, raw data documentation, representativity, completeness and consistency of modelling with regard to ISO 14040 and 14044.
清单： 内部审查通过几个迭代步骤完成，涉及原始数据验证、原始数据记录、代表性、完整性、与 ISO 14040 和 14044 有关的建模的一致性。

## Data sources
- 第二次全国污染源普查产排污核算系数手册（试用版）,四级代码1371文件，在完整版文件中第2623页
