# Breeding of large yellow croaker seedlings;Large yellow croaker fry;Cage culture;Formulated feed and trash fish feeding

Dataset: ILCD process, Unit process, black box
Geography: ND-FJ-CN
Reference year: 2017
Valid until: 2018
Classification: Unit processes / Materials production / Food and renewable raw materials
Functional unit: 1 live-weight ton of large yellow croaker
LCI method principle: Attributional
LCI method approaches: Allocation - mass
Generated by: Kangni Wu, wukangni@xmu.stu.edu.cn
Owner: Tiangong LCI Data Working Group
Review: Dependent internal review by Tiangong LCI Data Working Group
Amounts: no units in this file; such an amount is in the reference unit of its flow, which a separate flow dataset defines
copyright: false
licenseType: Free of charge for all users and uses

## General comment
The system includes energy production (red), feed production (green), the main chain of aquaculture production (blue), and the production of other inputs (purple).

## Geography
The prefecture-level city of Ningde comprises a group of districts and counties, of which Fuding city (A), Xiapu County (B), Fu’an city (C), and Jiaocheng district (D) are next to the sea and were included in our assessment. A total of 321 households were randomly sampled in the area in August 2017 and January 2018, and we analyzed the data from 292 households that had mariculture production during 2016.

## Time period
文献未具体说明采样时间，研究者于 2017 年 8月份和2018年1月份在宁德市沿海进行入户访谈The literature did not specify the sampling time. The researchers conducted household interviews in August 2017 and January 2018 in the coastal areas of Ningde City

## Technology and included processes
The cage seedling cultivation technology of large yellow croaker, the sea area is selected as small and medium wave area, the water depth at low tide is ≥8 m, the flow rate is smooth, the flow rate is less than 1.5 m/s, and the flow direction is smooth and stable. The sea area with high flow rate which can be controlled by technical measures can also be used as aquaculture area. Water quality should comply with the provisions of GB 11607, water temperature: 8 ℃ ~ 31 ℃; Salinity: 13 ~ 35. The area of a single cage is 16 m 2 ~ 100 m 2, and the net depth is 4.0m ~ 8.0m. Net mesh 3 mm ~ 15 mm, adjust the size according to the specifications of the fish, in order not to escape the fish as the principle.Breeding feed includes large yellow croaker compound feed and fresh and mixed fish ingredient bait.

## Technical purpose
The data set represents the process of breeding large yellow croaker seedlings in cage culture systems using formulated feed and trash fish. It can be applied to studies and assessments of aquaculture sustainability, especially concerning the production chain of large yellow croakers, and provides insight for improvement in similar mariculture operations. Appropriate applications include environmental impact assessments, resource use analysis, and evaluation of production efficiency in aquacultural practices.

## Model description
The literature refers to the ecoinvent database (v.3.5). In order to account for the variability of the studied system, Monte Carlo simulations were performed in R software (v.3.3.2) to model the correlation between unit process variables in LCA using copula function, which solved the correlation between process variables.Monte Carlo simulations were used in R software, with each cell process represented by a set of input parameters, a correlation matrix of geographical location and growth stages, 2000 iterations were used in the simulation, and the variability of the cell process due to inherent uncertainty, dispersion and unrepresentativeness was considered. Inherent uncertainty is included by assuming a coefficient of variation of 5%, spreads are calculated from primary and secondary data, and a pedigree approach is used to address unrepresentativeness. Dependencies between process chains are included by using dependency sampling in each iteration, as well as dependencies between processes

## Reference product
- Big juveniles of Large Yellow Croake: 2.7; measured
  The data comes from the average of 84 households in the actual survey

## Inputs
All rows: measured
- heat: 378.5
  The data comes from the average of 84 households in the actual survey
- Electricity: 1033.92
  The data comes from the average of 84 households in the actual survey
- Fry feed: 1.1
  The data comes from the average of 84 households in the actual survey
- Liquid Oxygen: 0.6
  The data comes from the average of 84 households in the actual survey
- calcium carbonate: 11.1
  The data comes from the average of 84 households in the actual survey
- chlorine: 0.01
  The data comes from the average of 84 households in the actual survey
- transport in t*km: 0.5
  The data comes from the average of 84 households in the actual survey

## Deviations from the LCI method approaches
The allocation method used throughout the data analysis process is quality allocation, following the guidelines recommended by the British Standards Institution

## Data selection and combination
The data comes from the average of actual survey data

## Data treatment and extrapolations
Literature researchers constructed a life cycle inventory of mariculture production from both survey data and scientific literature. Primary and auxiliary data are collected for the growth stage to simulate other processes such as seed and juvenile production.

## Sampling procedure
In Ningde City, Fujian Province, China, 115 large yellow croaker farming households were investigated, of which 84 households were used in the model calculation of this data

## Use advice
When using this data set, attention should be paid to the geographic specificity of the data, extracted from the prefecture-level city of Ningde. Users should consider the seasonal and regional variability in aquaculture practices. Care should also be taken to include or exclude energy and feeds production-related impacts according to the aim of the study. Inclusion of appropriate life cycle stages (e.g., breeding, feeding) depending on the scope of the assessment is essential to maintain accuracy and relevance of the findings.

## Review details
Inventory: The internal review was done by several iteration steps concerning raw data validation, raw data documentation, representativity, completeness and consistency of modelling with regard to ISO 14040 and 14044.

## Data sources
- Marín, T. et al. Resource Use in Mariculture: A Case Study in Southeastern China. Sustainability 11, (2019).
