# Sinter production ; sinter ; sintering

Dataset: ILCD process, Unit process, single operation
Geography: CN
Reference year: 2020
Classification: Unit processes / Materials production / Other mineralic materials
Generated by: Jiwei, 1299801467@qq.com
Owner: Tiangong LCI Data Working Group
Review: Dependent internal review by Tiangong LCI Data Working Group
Amounts: no units in this file; such an amount is in the reference unit of its flow, which a separate flow dataset defines
copyright: false
licenseType: Free of charge for all users and uses

## General comment
This data set refers to the sinter production process, an intermediate step in the ironmaking and steelmaking industries. Sinter consists of a mixture of iron ore fines, fluxes, and metallurgical wastes (coke breeze or anthracite fines). It is used primarily within steel mills to improve the efficiency of blast furnace operations by providing a material that has better permeability and higher iron content compared to a raw mix of iron ore.

## Time period
论文提到钢铁企业环境总体数据为1998年的吨钢环境基础数据。

## Reference product
- Sinter ore: 1131; calculated

## Inputs
All rows: calculated
- Iron ore: 1191.5
- dolomite: 9.3
- quicklime: 42.5
- freshwater,freshwater: 1100
- air: 45.3
- Electricity: 143.28
- process steam from heavy fuel oil: 166.7
- carbon: 34.3
- anthracite: 15.6
- Blast furnace gas: 12.9
- Converter gas: 16.5

## Outputs
- carbon dioxide (fossil): 154.7; calculated
  原文未区分bio和fossil，根据专家判断此处为carbon dioxide (fossil)
- sulfur dioxide: 0.43; calculated
- Nitrogen oxides: 0.69; calculated
- Sinter / Pellet Dust: 0.15; calculated

## Use advice
Users of this data set should be aware that the environmental data is based on per metric ton of steel from the year 1998. The technological and environmental practices in sinter production may have evolved since then. Users should therefore consider site-specific current data and technological practices if available, especially for the evaluation of impacts in current scenarios. Additionally, if the user intends to apply the data in life cycle assessments, it's essential to consider the temporal relevance of the data and to check for more recent data where possible.

## Review details
Inventory: The internal review was done by several iteration steps concerning raw data validation, raw data documentation, representativity, completeness and consistency of modelling with regard to ISO 14040 and 14044.

## Data sources
- 梁田. 基于生命周期评价的典型钢铁企业环境影响评估及绿色发展研究. (郑州大学, 2020).
