# Crude Syngas Production ; Crude Syngas ; Coal to Crude Syngas Route ; Coal

Dataset: ILCD process, Unit process, black box
Geography: ZJ-GD-CN
Reference year: 2018
Classification: Unit processes / Energy carriers and technologies / Energetic raw materials
Functional unit: A functional unit is defined as 14.64 ton of crude syngas product
LCI method principle: Attributional
LCI method approaches: Allocation - mass
Generated by: Yanan Ren, renyn15@tsinghua.org.cn
Owner: Tiangong LCI Data Working Group
Review: Dependent internal review by Tiangong LCI Data Working Group
Amounts: no units in this file; such an amount is in the reference unit of its flow, which a separate flow dataset defines
copyright: false
licenseType: Free of charge for all users and uses

## General comment
ID14 Propylene Production ; Propylene ; Coal to Olefins Route ; Coal ; Subordinate Process 2

## Geography
The case plant of the catalytic cracking route comes from Sinopec Zhanjiang Dongxing Petrochemical Co., Ltd. The company is located in Zhanjiang City, Guangdong Province. Its catalytic cracking olefins process was built in 2018, with an annual production capacity of 116,000 tons of propylene.

## Time period
Craft built in 2018

## Technical purpose
This set of data represents the production of crude syngas and propylene through coal chemical processes. The crude syngas is a primary product used in further chemical syntheses, typically within the coal chemical industry to produce a variety of chemicals including olefins like propylene. The propylene produced is typically used as a raw material in the plastics, packaging, textiles, and automotive parts manufacturing industries. This data is specific to processes where coal is the primary feedstock, engaging in methods such as catalytic cracking to produce olefins.

## Model description
The consumption of raw materials, energy, electricity, steam, water and auxiliary chemicals involved in each sub-stage is considered, and the output considers propylene and by-products (such as C4 products produced by the propane dehydrogenation process. The mass distribution method is used to quantify the products The environmental load between propylene and by-products. In addition, this model also considers the waste discharge of each process. This study focuses on the environmental impact analysis of different propylene production processes. Therefore, the utilization of propylene hydrocarbons and the end-of-life treatment of their products, as well as infrastructure Construction and equipment maintenance are outside the scope of this assessment.

## Reference product
- Crude Syngas: 14640; measured
  crude syngas

## Inputs
All rows: measured
- brown coal; 11.9 MJ/kg: 6950
  Crushed coal
- oxygen: 4690
- Wollastonite: 700
  wollastonite
- sodium hydroxide: 2.54253
  caustic soda
- hydrogen chloride gas: 3.66245
  hydrochloric acid
- nitrogen: 1462.86
  Nitrogen
- natural gas: 296.01
  fuel gas
- process steam: 580
  steam
- freshwater: 11240
  fresh water
- Electricity: 1759.68
  electricity

## Outputs
All rows: measured
- carbon dioxide (fossil): 3360
  CO2
- carbon monoxide (fossil): 1.16763
  CO
- methanol: 0.03951
  Methanol
- nitrous oxide: 0.18318
  NOx
- particles (> PM10): 0.13835
  particulates
- Dissolved solids: 6.59627
  TDS
- chemical oxygen demand: 0.3042
  COD
- biological oxygen demand: 0.2028
  BOD5
- Suspended solids, unspecified,Suspended solids, unspecified: 0.0507
  SS
- ammonia: 0.2028
  NH3-N
- chloride: 1.12552
  Chloride

## Data selection and combination
The detailed input-output data of the propylene production process comes from the company's public environmental impact assessment report, including the input of raw materials and auxiliary materials, energy and resource consumption, and discharge of waste gas, wastewater and solid waste.

## Use advice
For Life Cycle Assessment (LCA) purposes, the data should be used to evaluate the environmental performance of propylene production pathways using the coal-to-olefins route. The functional unit is defined as 14.64 tons of crude syngas product to establish a consistent basis for comparison. The data includes inputs of raw and auxiliary materials, energy and resource usage, and outputs including emissions to air, water, and solid waste generation. Users should apply the mass allocation method to distribute environmental loads between propylene and the by-products. Attention should be paid to the exclusion of end-of-life stages, infrastructure construction, and equipment maintenance, as they are not considered in this dataset. The scope is restricted to evaluating the direct environmental impacts of the production processes.

## Review details
Inventory: The internal review was done by several iteration steps concerning raw data validation, raw data documentation, representativity, completeness and consistency of modelling with regard to ISO 14040 and 14044.

## Data sources
- 吕琳. 丙烯产品环境负荷及温室气体减排的碳税政策. (大连理工大学, 2022).
