# Soil remediation ; ex situ remediation ; soil leaching ; soil column leaching ; Rhamnolipid solution leaching

Dataset: ILCD process, Unit process, single operation
Geography: CN
Reference year: 2023
Classification: Unit processes / Other Services / Repair and maintenance
Generated by: Huang Yue, huangyue@caep.org.cn
Owner: Tiangong LCI Data Working Group
Review: Dependent internal review by Tiangong LCI Data Working Group
Amounts: no units in this file; such an amount is in the reference unit of its flow, which a separate flow dataset defines
copyright: false
licenseType: Free of charge for all users and uses

## General comment
Remediated soil columns were obtained by washing contaminated soil columns with rhamnolipid solution

## Technical purpose
This process describes the application of an ex situ soil remediation technique, specifically soil column leaching using a rhamnolipid solution. The method is intended for cleaning contaminated soil columns, resulting in remediated soil that is applicable to environmental restoration projects.

## Reference product
- Remediated soil columns: 0.0008

## Inputs
- rhamnolipid: 0.00022
  rhamnolipid, 147858-26-2
- Electricity: 0.396
- Activated Carbon: 0.02048
- Water (evapotranspiration): 0.00528
- Contaminated soil columns: 0.0008

## Outputs
- polycyclic aromatic hydrocarbons: 0.02
  gaseous PAHs
- polycyclic aromatic hydrocarbons: 0.0004
  PAH liquids
- quartz sand: 0.08

## Use advice
Data set users should note that this data represents a single process unit operation involving the leaching of contaminated soil columns with a rhamnolipid solution. Users should include all primary raw materials and energy consumption involved in the process when utilizing this data. Care should be taken to apply this data within its technological applicability, which means considering the method only for ex situ soil remediation contexts and not directly applying it to in situ remediation without further assessment.

## Review details
Inventory: The internal review was done by several iteration steps concerning raw data validation, raw data documentation, representativity, completeness and consistency of modelling with regard to ISO 14040 and 14044.

## Data sources
- 张雅鑫 et al. 基于生命周期评价的焦化污染土壤 淋洗技术环境影响研究. 安全、健康和环境 23, (2023).
