# Aluminum ingot casting ; Primary aluminum ingot ; Liquid primary aluminum ; 2011

Dataset: ILCD process, Unit process, single operation
Geography: CN
Reference year: 2021
Classification: Unit processes / Materials production / Metals and semimetals
Generated by: Zimeng Cai, caizm6178@163.com
Owner: Tiangong LCI Data Working Group
Review: Dependent internal review by Tiangong LCI Data Working Group
Amounts: no units in this file; such an amount is in the reference unit of its flow, which a separate flow dataset defines
copyright: false
licenseType: Free of charge for all users and uses

## General comment
This dataset describes the process of casting primary aluminum ingots from liquid primary aluminum, specific to the operations used in 2011. The primary aluminum ingots are typically used as a raw material in various industries, including automotive, construction, and packaging, where the properties of aluminum such as lightweight, strength, and corrosion resistance are required.

## Time period
Date of publication

## Reference product
- aluminium, primary, ingot: 1000; software or database

## Inputs
- aluminium, primary, liquid: 1051.08; software or database

## Data selection and combination
The data in this study refers to the LCA data of PA, SA, electricity, and other background data. The PA data were obtained from statistical data sources, and the SA data were mainly obtained from the literatures. The background data were mainly derived from the Chinese localization LCA database CAS RCEES 2018, which was established by the Research Center for Eco-Environmental Sciences, Chinese Academy of Sciences and covers LCA data for energy, materials, transportation, waste management etc.

## Use advice
When using this dataset for Life Cycle Assessment (LCA), users should note that process-specific data pertains to the year 2011 and may not accurately represent current practices. Data users should ensure the PA (primary aluminum) and SA (secondary aluminum) data are appropriate for their specific context and take into account technological improvements or changes in industry since 2011. The background data sourced from the CAS RCEES 2018 Chinese localization should be used thoughtfully, considering its geographic and temporal relevance to the assessed process.

## Review details
Inventory: The internal review was done by several iteration steps concerning raw data validation, raw data documentation, representativity, completeness and consistency of modelling with regard to ISO 14040 and 14044.

## Data sources
- Ding, N., Liu, N., Lu, B. & Yang, J. Life cycle greenhouse gas emissions of aluminum based on regional industrial transfer in China. J. Ind. Ecol. 25, 1657–1672 (2021).
