# Spray painting/painting ; Western musical instruments ; Lacquer ; Spray painting/painting ; All sizes; NESPS2 / 喷漆/刷漆 ; 西乐器 ; 漆料 ; 喷漆/刷漆 ; 所有规模 ; 全国第二次污染普查数据

Dataset: ILCD process, Unit process, single operation
Geography: CN
Reference year: 2019
Classification: Reference Parameters / Systems / Paints and chemical preparations
Generated by: The data was created by the Office of the Second National Pollution Source Census of the Ministry of Ecology and Environment, and the data was organized by the TianGong Plan team for ILCD format / 生态环境部第二次全国污染源普查工作办公室创建数据，天工计划团队常慧敏整理数据为ILCD格式
Owner: Tiangong LCI Data Working Group / 天工LCI数据工作小组
Review: Dependent internal review by Tiangong LCI Data Working Group / 天工LCI数据工作小组
Amounts: no units in this file; such an amount is in the reference unit of its flow, which a separate flow dataset defines
copyright: false
licenseType: Free of charge for all users and uses

## General comment
the Technical of end-of-pipe management technology for pollution Exhaust gasis/，The formula for calculating the actual operation rate (k-value) of the end-of-pipe treatment facility is /

## Technical purpose
该数据集描述了用于西方乐器漆料喷漆或刷漆工艺中的各种尾端污染管理技术。这些技术包括再生催化和热燃烧、活性炭吸附、光催化微波催化、低温等离子、光催化以及它们的组合。该信息主要适用于从事表面涂装作业且需要管理挥发性有机化合物（VOCs）排放的设施。

## Reference product
- Vehicle: 1000; input; calculated
  源文件中描述为为漆料，此处对其进行了匹配工作，将其匹配到LCAflow库里面相最符合的流，污染物指标备注为工业废气量

## Outputs
All rows: calculated
- volatile organic compound: 12.35
  the Technical of end-of-pipe management technology for pollution volatile organic compoundisRegenerative catalytic combustion method，Its Technical efficiency of end-of-pipe management95，The formula for calculating the actual operation rate (k-value) of the end-of-pipe treatment facility is k = annual operating hours of dust removal facilities / annual operating hours of hot blast stove
  污染物指标挥发性有机物的末端治理技术是蓄热式催化燃烧，其效率为95，末端治理设施实际运行率（k值）计算公式为k=废气治理设施运行时间（小时）/废气产污核算环节正常生产时间（小时）。原文件中描述污染物类别为废气，污染物指标为挥发性有机物，此处对其进行了匹配工作，将其匹配到LCAflow库里面相最符合的流，污染物指标备注为挥发性有机物，产污系数备注为①油性漆乘以系数2.0，木蜡油乘以系数0.5。
- volatile organic compound: 24.7
  the Technical of end-of-pipe management technology for pollution volatile organic compoundisRegenerative thermal combustion method，Its Technical efficiency of end-of-pipe management90，The formula for calculating the actual operation rate (k-value) of the end-of-pipe treatment facility is k = annual operating hours of dust removal facilities / annual operating hours of hot blast stove
  污染物指标挥发性有机物的末端治理技术是蓄热式热力燃烧法，其效率为90，末端治理设施实际运行率（k值）计算公式为k=废气治理设施运行时间（小时）/废气产污核算环节正常生产时间（小时）。原文件中描述污染物类别为废气，污染物指标为挥发性有机物，此处对其进行了匹配工作，将其匹配到LCAflow库里面相最符合的流，污染物指标备注为挥发性有机物，产污系数备注为①油性漆乘以系数2.0，木蜡油乘以系数0.5。
- volatile organic compound: 49.4
  the Technical of end-of-pipe management technology for pollution volatile organic compoundisPhotocatalysis + activated carbon adsorption，Its Technical efficiency of end-of-pipe management80，The formula for calculating the actual operation rate (k-value) of the end-of-pipe treatment facility is k = annual operating hours of desulfurization facilities / annual operating hours of hot blast stove
  污染物指标挥发性有机物的末端治理技术是光催化+活性炭吸附，其效率为80，末端治理设施实际运行率（k值）计算公式为k=废气治理设施运行时间（小时）/废气产污核算环节正常生产时间（小时）。原文件中描述污染物类别为废气，污染物指标为挥发性有机物，此处对其进行了匹配工作，将其匹配到LCAflow库里面相最符合的流，污染物指标备注为挥发性有机物，产污系数备注为①油性漆乘以系数2.0，木蜡油乘以系数0.5。
- volatile organic compound: 61.75
  the Technical of end-of-pipe management technology for pollution volatile organic compoundisLow temperature plasma + activated carbon，Its Technical efficiency of end-of-pipe management75，The formula for calculating the actual operation rate (k-value) of the end-of-pipe treatment facility is k = annual operating hours of desulfurization facilities / annual operating hours of hot blast stove
  污染物指标挥发性有机物的末端治理技术是低温等离子体+活性炭，其效率为75，末端治理设施实际运行率（k值）计算公式为k=废气治理设施运行时间（小时）/废气产污核算环节正常生产时间（小时）。原文件中描述污染物类别为废气，污染物指标为挥发性有机物，此处对其进行了匹配工作，将其匹配到LCAflow库里面相最符合的流，污染物指标备注为挥发性有机物，产污系数备注为①油性漆乘以系数2.0，木蜡油乘以系数0.5。
- volatile organic compound: 74.1
  the Technical of end-of-pipe management technology for pollution volatile organic compoundisActivated carbon adsorption，Its Technical efficiency of end-of-pipe management70，The formula for calculating the actual operation rate (k-value) of the end-of-pipe treatment facility is k = annual operating hours of dust removal facilities / annual operating hours of hot blast stove
  污染物指标挥发性有机物的末端治理技术是活性炭吸附，其效率为70，末端治理设施实际运行率（k值）计算公式为k=废气治理设施运行时间（小时）/废气产污核算环节正常生产时间（小时）。原文件中描述污染物类别为废气，污染物指标为挥发性有机物，此处对其进行了匹配工作，将其匹配到LCAflow库里面相最符合的流，污染物指标备注为挥发性有机物，产污系数备注为①油性漆乘以系数2.0，木蜡油乘以系数0.5。
- volatile organic compound: 86.45
  the Technical of end-of-pipe management technology for pollution volatile organic compoundisPhotocatalyst microwave catalysis，Its Technical efficiency of end-of-pipe management65，The formula for calculating the actual operation rate (k-value) of the end-of-pipe treatment facility is k = annual operating hours of dust removal facilities / annual operating hours of hot blast stove
  污染物指标挥发性有机物的末端治理技术是光触媒微波催化，其效率为65，末端治理设施实际运行率（k值）计算公式为k=废气治理设施运行时间（小时）/废气产污核算环节正常生产时间（小时）。原文件中描述污染物类别为废气，污染物指标为挥发性有机物，此处对其进行了匹配工作，将其匹配到LCAflow库里面相最符合的流，污染物指标备注为挥发性有机物，产污系数备注为①油性漆乘以系数2.0，木蜡油乘以系数0.5。
- volatile organic compound: 98.8
  the Technical of end-of-pipe management technology for pollution volatile organic compoundisPhotocatalysis + low temperature plasma，Its Technical efficiency of end-of-pipe management60，The formula for calculating the actual operation rate (k-value) of the end-of-pipe treatment facility is k = annual operating hours of desulfurization facilities / annual operating hours of hot blast stove
  污染物指标挥发性有机物的末端治理技术是光催化+低温等离子体，其效率为60，末端治理设施实际运行率（k值）计算公式为k=废气治理设施运行时间（小时）/废气产污核算环节正常生产时间（小时）。原文件中描述污染物类别为废气，污染物指标为挥发性有机物，此处对其进行了匹配工作，将其匹配到LCAflow库里面相最符合的流，污染物指标备注为挥发性有机物，产污系数备注为①油性漆乘以系数2.0，木蜡油乘以系数0.5。
- volatile organic compound: 111.15
  the Technical of end-of-pipe management technology for pollution volatile organic compoundisLow temperature plasma，Its Technical efficiency of end-of-pipe management55
  污染物指标挥发性有机物的末端治理技术是低温等离子体，其效率为55，末端治理设施实际运行率（k值）计算公式为k=废气治理设施运行时间（小时）/废气产污核算环节正常生产时间（小时）。原文件中描述污染物类别为废气，污染物指标为挥发性有机物，此处对其进行了匹配工作，将其匹配到LCAflow库里面相最符合的流，污染物指标备注为挥发性有机物，产污系数备注为①油性漆乘以系数2.0，木蜡油乘以系数0.5。
- volatile organic compound: 148.2
  the Technical of end-of-pipe management technology for pollution volatile organic compoundisPhotocatalysis，Its Technical efficiency of end-of-pipe management40，The formula for calculating the actual operation rate (k-value) of the end-of-pipe treatment facility is k = annual operating hours of desulfurization facilities / annual operating hours of hot blast stove
  污染物指标挥发性有机物的末端治理技术是光催化，其效率为40，末端治理设施实际运行率（k值）计算公式为k=废气治理设施运行时间（小时）/废气产污核算环节正常生产时间（小时）。原文件中描述污染物类别为废气，污染物指标为挥发性有机物，此处对其进行了匹配工作，将其匹配到LCAflow库里面相最符合的流，污染物指标备注为挥发性有机物，产污系数备注为①油性漆乘以系数2.0，木蜡油乘以系数0.5。
- volatile organic compound: 148.2
  the Technical of end-of-pipe management technology for pollution volatile organic compoundisPhotolysis，Its Technical efficiency of end-of-pipe management40，The formula for calculating the actual operation rate (k-value) of the end-of-pipe treatment facility is k = annual operating hours of desulfurization facilities / annual operating hours of hot blast stove
  污染物指标挥发性有机物的末端治理技术是光解，其效率为40，末端治理设施实际运行率（k值）计算公式为k=废气治理设施运行时间（小时）/废气产污核算环节正常生产时间（小时）。原文件中描述污染物类别为废气，污染物指标为挥发性有机物，此处对其进行了匹配工作，将其匹配到LCAflow库里面相最符合的流，污染物指标备注为挥发性有机物，产污系数备注为①油性漆乘以系数2.0，木蜡油乘以系数0.5。
- volatile organic compound: 247
  the Technical of end-of-pipe management technology for pollution volatile organic compoundisOthers (direct discharge)，Its Technical efficiency of end-of-pipe management0
  污染物指标挥发性有机物的末端治理技术是其他（直排），其效率为0，末端治理设施实际运行率（k值）计算公式为k=废气治理设施运行时间（小时）/废气产污核算环节正常生产时间（小时）。原文件中描述污染物类别为废气，污染物指标为挥发性有机物，此处对其进行了匹配工作，将其匹配到LCAflow库里面相最符合的流，污染物指标备注为挥发性有机物，产污系数备注为①油性漆乘以系数2.0，木蜡油乘以系数0.5。
- Exhaust gas: 1.1e6
  the Technical of end-of-pipe management technology for pollution Exhaust gasis/，The formula for calculating the actual operation rate (k-value) of the end-of-pipe treatment facility is /
  污染物指标工业废气量的末端治理技术是/。原文件中描述污染物类别为废气，污染物指标为工业废气量，此处对其进行了匹配工作，将其匹配到LCAflow库里面相最符合的流，污染物指标备注为工业废气量

## Use advice
This dataset is derived from the Pollution Source Census Report and contains information on pollution emissions and related products. However, it does not include data on energy or chemical consumption, nor does it provide information on waste or co-product generation. When utilizing this dataset, please supplement the missing data based on actual conditions before use
该数据集来源于污染源普查报告，包含污染物排放及相关产品信息，但不包含能源或化学品消耗数据，也不提供废弃物或共生产物产生信息。在使用该数据集时，请根据实际情况补充缺失数据后再使用。

## Review details
Inventory: The internal review was done by several iteration steps concerning raw data validation, raw data documentation, representativity, completeness and consistency of modelling with regard to ISO 14040 and 14044.
清单： 内部审查通过几个迭代步骤完成，涉及原始数据验证、原始数据记录、代表性、完整性、与 ISO 14040 和 14044 有关的建模的一致性。

## Data sources
- 第二次全国污染源普查产排污核算系数手册（试用版）,二级代码24,四级代码2422文件，在完整版文件中第2827页
