# Monitoring well ; Construction well ; Well depth 20m, Di=46 mm ;In situ groundwater remediation ; PRB system

Dataset: ILCD process, Unit process, single operation
Geography: JS-CN
Reference year: 2024
Classification: Unit processes / Other Services / Repair and maintenance
Generated by: Yang Xintong, yangxt@caep.org.cn
Owner: Tiangong LCI Data Working Group
Review: Dependent internal review by Tiangong LCI Data Working Group
Amounts: no units in this file; such an amount is in the reference unit of its flow, which a separate flow dataset defines
copyright: false
licenseType: Free of charge for all users and uses

## General comment
A new monitoring well will be built for monitoring natural attenuation of polluted groundwater, with a drilling diameter of 0.22 meters, an outer diameter of 0.053 meters, an inner diameter of 0.046 meters, a depth of 24 meters, a screen tube length of 20 meters, and a bentonite filling thickness of 4 meters. A total of 49 monitoring wells will be constructed

## Time period
Publication time of literature

## Technical purpose
The monitoring wells described are intended for the surveillance and analysis of naturally attenuating pollutants in groundwater systems. This infrastructure is typically used in environmental engineering fields, particularly for assessing and ensuring the effectiveness of In situ groundwater remediation processes such as Permeable Reactive Barrier (PRB) systems.

## Reference product
- Monitoring well: 49; measured

## Inputs
All rows: measured
- Polyvinyl chloride: 934.2
- bentonite: 10530
- Polyethylene,Polyethylene: 611.27
- silica sand: 52640
- Steel: 245
- Diesel,Diesel: 0.18816
- transport in t*km: 6950.05

## Use advice
When utilizing this data set for environmental assessment or remediation planning, care should be taken to ensure the monitoring wells' specifications (such as depth, diameter, and type of filling material) match the geological and hydrological conditions of the site of interest. This includes acknowledging the suitability of the monitoring wells' design for the specific contaminants being monitored. It is also important to consider the temporal aspects of groundwater monitoring and natural attenuation, as well as the effects of any nearby groundwater remediation activities.

## Review details
Inventory: The internal review was done by several iteration steps concerning raw data validation, raw data documentation, representativity, completeness and consistency of modelling with regard to ISO 14040 and 14044.

## Data sources
- Ding, D. et al. Assessing the environmental impacts and costs of biochar and monitored natural attenuation for groundwater heavily contaminated with volatile organic compounds. Science of The Total Environment 846, 157316 (2022).
