# Copper slag recycling;cement;production of cement directly;Copper slag

Dataset: ILCD process, Unit process, single operation
Geography: CN
Reference year: 2010
Classification: Unit processes / Materials production / Inorganic chemicals
Functional unit: The functional unit was defined as the recycling of 1 ton of copper slag from copper smelting process.
LCI method principle: Attributional
LCI method approaches: Substitution
Generated by: Peng Wang, 2867919560@qq.com
Owner: Tiangong LCI Data Working Group
Review: Dependent internal review by Tiangong LCI Data Working Group
Amounts: no units in this file; such an amount is in the reference unit of its flow, which a separate flow dataset defines
copyright: false
licenseType: Free of charge for all users and uses

## General comment
The data set represents various copper slag recycling scenarios for manufacturing cement and unfired bricks in the context of the Chinese copper industry. The four developed recycling methods are intended for use in reducing waste and utilizing copper slag as a resource, directly in cement production, after electric furnace treatment, post-flotation, or for the creation of unfired bricks following flotation. This provides an eco-friendly alternative for copper smelting byproducts, supporting industries that focus on sustainable manufacturing practices.

## Geography
a dominant copper company in China.

## Time period
were obtained from internal report of relevant company in 2010.

## Technology and included processes
four scenarios of copper slag recycling were developed in terms of technological availability: (1) production of cement directly, (2) production of cement after Electric Furnace treatment, (3) production of cement after Floatation, and (4) production of unfired brick after Floatation.

## Reference product
- Refined copper: 1000; measured

## Inputs
All rows: measured
- hard coal,hard coal,hard coal: 1613.9
  Hard coal
- crude oil; 42.3 MJ/kg: 45.6
  Crude oil
- natural gas; 44.1 MJ/kg: 37.9
  Natural gas
- Limestone: 6624.6
- clay: 1326.5
  Clay
- gypsum: 404.3
  Gypsum
- Scrap: 1000

## Outputs
All rows: measured
- carbon dioxide (fossil): 5180.2
  原文未区分bio和fossil，根据专家判断此处为fossil
- carbon monoxide,carbon monoxide (fossil): 3.4
  原文未区分bio和fossil，根据专家判断此处为fossil
- sulfur dioxide: 10.3
  SO2
- Nitrogen oxides: 16.7
  NOx needs to be supplemented
- particles (PM2.5 - PM10): 23.5
  Dust needs to be replenished

## Deviations from the LCI method approaches
characterization, normalization and weighting, after the allocation procedure by using the avoided burdens method.

## Data selection and combination
The data of copper slag treatment were mainly derived from a dominant copper company in China. The production data of cement and brick mostly came from real plant that adopts advanced equipment and processes, supplemented by published literature.

## Data treatment and extrapolations
GaBi 4 software was used to model the copper recycling system and determine the environmental impacts in this study. The Eco-Indicator 99 (EI99) was applied for the life cycle impact assessment

## Use advice
When utilizing this data set for Life Cycle Assessment (LCA), users should adhere to the methodological advice provided, pertaining specifically to the use of GaBi 4 software and the application of the Eco-Indicator 99 (EI99) method. The allocations should account for environmental impacts using the avoided burdens approach. The functional unit should be uniformly considered as the recycling of one ton of copper slag derived from copper smelting processes. Users should be aware that the data is based on the technological context of 2010, and adjustments may be required to align with current technology and environmental standards.

## Review details
Inventory: The internal review was done by several iteration steps concerning raw data validation, raw data documentation, representativity, completeness and consistency of modelling with regard to ISO 14040 and 14044.

## Data sources
- Song, X. L., Yang, J. X., Wang, J. W. & Wu, W. J. Assessing the Life Cycle Environmental and Economic Performance of Copper Slag Recycling. AMR 878, 219–225 (2014).
