# Alumina production ; Alumina for metallurgy ; Bauxite ; 2009

Dataset: ILCD process, Unit process, single operation
Geography: CN
Reference year: 2021
Classification: Unit processes / Materials production / Non-energetic raw materials
Generated by: Yuzhen Feng, fyz22
Owner: Tiangong LCI Data Working Group
Review: Dependent internal review by Tiangong LCI Data Working Group
Amounts: no units in this file; such an amount is in the reference unit of its flow, which a separate flow dataset defines
copyright: false
licenseType: Free of charge for all users and uses

## General comment
The data represents the life cycle assessment (LCA) parameters for the production of alumina used in metallurgy. It's primarily extracted from bauxite and is an essential raw material for aluminum production. As of 2009, this particular alumina quality is utilized in large-scale aluminum refining processes where the high purity level is critical for the production of metallic aluminum through electrolysis.

## Time period
Date of publication

## Reference product
- aluminium oxide, metallurgical: 1000; software or database
  alumina

## Inputs
All rows: software or database
- soda ash, dense: 120.87
  soda ash
- Petroleum Coke: 1313.57
  Energy sources proportion of energy consumption is coal: fuel oil: coke: natural gas: coke even gas=46.0%: 11.0%: 7.1%: 14.1%: 21.7%
- coal gas: 4014.72
  (same comment as for Petroleum Coke)
- natural gas, high pressure: 2608.64
  (same comment as for Petroleum Coke)
- fuel oil, unspecified: 2035.11
  (same comment as for Petroleum Coke)
- hard coal: 8510.46
  (same comment as for Petroleum Coke)
- Water, unspecified natural origin: 2.78
  water consumption

## Data selection and combination
The data in this study refers to the LCA data of PA, SA, electricity, and other background data. The PA data were obtained from statistical data sources, and the SA data were mainly obtained from the literatures. The background data were mainly derived from the Chinese localization LCA database CAS RCEES 2018, which was established by the Research Center for Eco-Environmental Sciences, Chinese Academy of Sciences and covers LCA data for energy, materials, transportation, waste management etc.

## Use advice
When utilizing this LCA data set, users should be aware that the Process Analysis (PA) and Substance Analysis (SA) figures are based on statistical data sources and selected literature, respectively. The dataset also includes background information derived from the Chinese localized LCA database, CAS RCEES 2018. It is pertinent to understand that the technological applicability is specific to the year 2009 and Chinese context. Additionally, users must pay attention to the methodological consistency when integrating this data with other LCA datasets, especially considering recycling and use phase behavior specific to alumina and aluminum production.

## Review details
Inventory: The internal review was done by several iteration steps concerning raw data validation, raw data documentation, representativity, completeness and consistency of modelling with regard to ISO 14040 and 14044.

## Data sources
- Ding, N., Liu, N., Lu, B. & Yang, J. Life cycle greenhouse gas emissions of aluminum based on regional industrial transfer in China. J. Ind. Ecol. 25, 1657–1672 (2021).
