# Yaw system manufacture ; Yaw system of a 1.5 MW wind turbine

Dataset: ILCD process, Unit process, single operation
Geography: NMG-CN
Reference year: 2017
Classification: Unit processes / Systems / Other machines
Functional unit: The functional unit is 1.5 MW wind turbine
LCI method principle: Attributional
LCI method approaches: Allocation
Generated by: Yunzhi Zhao, ll10088@163.com
Owner: Tiangong LCI Data Working Group
Review: Dependent internal review by Tiangong LCI Data Working Group
Amounts: no units in this file; such an amount is in the reference unit of its flow, which a separate flow dataset defines
copyright: false
licenseType: Free of charge for all users and uses

## General comment
The yaw system manufactured for the 1.5 MW wind turbine is specifically used as a crucial component for orienting the wind turbine rotor to the wind, ensuring optimal wind energy capture in wind farms. This yaw system is typically applied to mid-scale wind turbines within the renewable energy sector and is particularly relevant in regions prevalent with wind energy installations, such as the northeast of Inner Mongolia.

## Geography
The data regarding the parameters of wind power has been collected from Wang (2012). A wind farm equipped with 33 domestic 1.5 megawatts (MW) wind turbines is regarded as a case study to analyze the environmental impact and its substitution effects. The wind farm is located in the northeast of Inner Mongolia, the province in which most of China’s wind power is installed (Xia and Song, 2017).

## Reference product
- Nacelle yaw system of wind turbine: 1; estimated

## Inputs
- iron: 3500; calculated
  Steel and iron

## Deviations from the LCI method approaches
The life cycle inventory for wind power is illustrated as follows. The production and manufacturing stage include the production of wind turbines, substations, and cables, which consume a large amount of energy and emit pollutants (Xue et al., 2015).

## Use advice
When utilizing data sets for the yaw system of 1.5 MW wind turbines, ensure to account for regional differences in wind patterns and environmental impacts. It's important to include all stages of the life cycle inventory, such as the production and manufacturing of wind turbines, substations, and cables. Carefully consider the environmental substitution effects when replacing traditional power sources with wind energy, using this data for comprehensive environmental impact analyses.

## Review details
Inventory: The internal review was done by several iteration steps concerning raw data validation, raw data documentation, representativity, completeness and consistency of modelling with regard to ISO 14040 and 14044.

## Data sources
- Li, H., Jiang, H.-D., Dong, K.-Y., Wei, Y.-M. & Liao, H. A comparative analysis of the life cycle environmental emissions from wind and coal power: Evidence from China. Journal of Cleaner Production 248, 119192 (2020).
