# DRI production;DRI;COG-DR

Dataset: ILCD process, Unit process, single operation
Geography: CN
Classification: Unit processes / Materials production / Metals and semimetals
Generated by: Fuxiang, 1162850692@qq.com
Owner: Tiangong LCI Data Working Group
Review: Dependent internal review by Tiangong LCI Data Working Group
Amounts: no units in this file; such an amount is in the reference unit of its flow, which a separate flow dataset defines
copyright: false
licenseType: Free of charge for all users and uses

## General comment
The described process refers to the production of Direct Reduced Iron (DRI) using coal-based direct reduction processes. Typically, this DRI production is part of the steelmaking industry, where it serves as a cleaner, alternative iron source to traditional blast furnace methods. The process utilizes by-product gas from coke ovens (Coke Oven Gas, COG) in a Direct Reduction Iron (DRI) generation process. It applies to industrial steel production facilities seeking to reduce their dependency on coking coal and increase their energy efficiency and lower their greenhouse gas emissions.

## Geography
The average operating data of Coal-DR, NG-DR (MID), and NG-DR (ENE) demonstration projects in China are used as the benchmark for the LCI of DR routes.

## Reference product
- Direct Reduced Iron: 1000; calculated
  The average operating data of Coal-DR, NG-DR (MID), and NG-DR (ENE) demonstration projects in China are used as the benchmark for the LCI of DR routes. LCI of COG-DR and H-DR routes, which is not scaled-up in China are estimated based on Coal-DR routes combined with literature data from simulations, laboratory tests, and process modeling in

## Inputs
All rows: calculated
- Pellet: 1357.3
  (same comment as for Direct Reduced Iron)
- freshwater,freshwater: 900
  (same comment as for Direct Reduced Iron)
- oxygen: 25
  (same comment as for Direct Reduced Iron)
- Coke oven gas: 589.7
  (same comment as for Direct Reduced Iron)
- Electricity: 733.32
  (same comment as for Direct Reduced Iron)

## Outputs
- particles (> PM10): 0.1; calculated
  (same comment as for Direct Reduced Iron)
- carbon dioxide (fossil): 170; calculated
  (same comment as for Direct Reduced Iron)

## Data treatment and extrapolations
LCI of COG-DR and H-DR routes, which is not scaled-up in China are estimated based on Coal-DR routes combined with literature data from simulations, laboratory tests, and process modeling in Table 9 [49,50]. The LCI of Coal-DR is obtai

## Use advice
When using this LCI data set for the direct reduction iron (DRI) route, it is crucial to reference the average operating data from relevant Chinese demonstration projects. The methodological advice includes ensuring that modeling reflects the specific technological applications and energy inputs outlined for the COG-DR and H-DR routes, with consideration of the scalability within the Chinese context. The data should be utilized with attention to the fact that it includes estimates from simulations, laboratory tests, and process modeling, and thus may require adjustment when applied to contexts or technological setups outside of those studied. Additionally, when considering the LCI data for inclusion in comprehensive environmental assessments, ensure that system boundaries are properly defined, especially regarding the inclusion or exclusion of subsequent recycling processes.

## Review details
Inventory: The internal review was done by several iteration steps concerning raw data validation, raw data documentation, representativity, completeness and consistency of modelling with regard to ISO 14040 and 14044.

## Data sources
- The carbon reduction potential of hydrogen in the low carbon transition of the iron and steel industry: The case of China
