# Monoammonium phosphate (granular) ; Phosphate ore, sulfuric acid, ammonia ; Slurry method ; All sizes; NESPS2 / 磷酸一铵（粒状） ; 磷矿、硫酸、合成氨 ; 料浆法 ; 所有规模 ; 全国第二次污染普查数据

Dataset: ILCD process, Unit process, single operation
Geography: CN
Reference year: 2019
Classification: Reference Parameters / Materials production / Inorganic chemicals
Generated by: The data was created by the Office of the Second National Pollution Source Census of the Ministry of Ecology and Environment, and the data was organized by the TianGong Plan team for ILCD format / 生态环境部第二次全国污染源普查工作办公室创建数据，天工计划团队常慧敏整理数据为ILCD格式
Owner: Tiangong LCI Data Working Group / 天工LCI数据工作小组
Review: Dependent internal review by Tiangong LCI Data Working Group / 天工LCI数据工作小组
Amounts: no units in this file; such an amount is in the reference unit of its flow, which a separate flow dataset defines
copyright: false
licenseType: Free of charge for all users and uses

## General comment
the Technical of end-of-pipe management technology for pollution Exhaust gasis/，Its Technical efficiency of end-of-pipe management0

## Technical purpose
采用矿石、硫酸和合成氨的料浆法生产的粒状磷酸一铵主要用于农业肥料以及动物饲料和肥料中的营养成分。此工艺能够适应不同规模的生产需求。此过程中使用的末端污染物管理技术确保了废水和排放物的有效处理，重点控制磷、氮化合物、氨、砷和颗粒物等污染物。

## Reference product
- Ammonium phosphate dibasic: 1000; calculated
  源文件中描述为为磷酸一铵（粒状），此处对其进行了匹配工作，将其匹配到LCAflow库里面相最符合的流，污染物指标备注为工业废水量

## Outputs
All rows: calculated
- arsenic: 2.464e-6
  the Technical of end-of-pipe management technology for pollution arsenicisPhysical treatment + chemical treatment，Its Technical efficiency of end-of-pipe management78
  污染物指标总砷的末端治理技术是物理处理法+化学处理法，其效率为78，末端治理设施实际运行率（k值）计算公式为k=治理设施运行时间（小时）/正常生产时间（小时）。原文件中描述污染物类别为废水，污染物指标为总砷，此处对其进行了匹配工作，将其匹配到LCAflow库里面相最符合的流，污染物指标备注为总砷
- Nitrogen oxides: 0.02123
  the Technical of end-of-pipe management technology for pollution Nitrogen oxidesisVenturi + spray tower (pickling) + spray tower (water washing) + demisting + electrostatic-demister，Its Technical efficiency of end-of-pipe management45
  污染物指标氮氧化物的末端治理技术是文丘里+喷淋塔（酸洗）+喷淋塔（水洗）+除雾+电除雾，其效率为45，末端治理设施实际运行率（k值）计算公式为k=治理设施运行时间（小时）/正常生产时间（小时）。原文件中描述污染物类别为废气，污染物指标为氮氧化物，此处对其进行了匹配工作，将其匹配到LCAflow库里面相最符合的流，污染物指标备注为氮氧化物
- Nitrogen oxides: 0.022388
  the Technical of end-of-pipe management technology for pollution Nitrogen oxidesisVenturi + spray tower + demisting，Its Technical efficiency of end-of-pipe management42
  污染物指标氮氧化物的末端治理技术是文丘里+喷淋塔+除雾，其效率为42，末端治理设施实际运行率（k值）计算公式为k=治理设施运行时间（小时）/正常生产时间（小时）。原文件中描述污染物类别为废气，污染物指标为氮氧化物，此处对其进行了匹配工作，将其匹配到LCAflow库里面相最符合的流，污染物指标备注为氮氧化物
- sulfur dioxide: 0.0282
  the Technical of end-of-pipe management technology for pollution sulfur dioxideisVenturi + spray tower (pickling) + spray tower (water washing) + demisting + electrostatic-demister，Its Technical efficiency of end-of-pipe management53
  污染物指标二氧化硫的末端治理技术是文丘里+喷淋塔（酸洗）+喷淋塔（水洗）+除雾+电除雾，其效率为53，末端治理设施实际运行率（k值）计算公式为k=治理设施运行时间（小时）/正常生产时间（小时）。原文件中描述污染物类别为废气，污染物指标为二氧化硫，此处对其进行了匹配工作，将其匹配到LCAflow库里面相最符合的流，污染物指标备注为二氧化硫
- sulfur dioxide: 0.0306
  the Technical of end-of-pipe management technology for pollution sulfur dioxideisVenturi + spray tower + demisting，Its Technical efficiency of end-of-pipe management49
  污染物指标二氧化硫的末端治理技术是文丘里+喷淋塔+除雾，其效率为49，末端治理设施实际运行率（k值）计算公式为k=治理设施运行时间（小时）/正常生产时间（小时）。原文件中描述污染物类别为废气，污染物指标为二氧化硫，此处对其进行了匹配工作，将其匹配到LCAflow库里面相最符合的流，污染物指标备注为二氧化硫
- Waste water: 48
  the Technical of end-of-pipe management technology for pollution Waste wateris/，Its Technical efficiency of end-of-pipe management0
  污染物指标工业废水量的末端治理技术是/，其效率为0。原文件中描述污染物类别为废水，污染物指标为工业废水量，此处对其进行了匹配工作，将其匹配到LCAflow库里面相最符合的流，污染物指标备注为工业废水量
- ammonia: 0.0514
  the Technical of end-of-pipe management technology for pollution ammoniaisVenturi + spray tower (pickling) + spray tower (water washing) + demisting + electrostatic-demister，Its Technical efficiency of end-of-pipe management99.8
  污染物指标氨的末端治理技术是文丘里+喷淋塔（酸洗）+喷淋塔（水洗）+除雾+电除雾，其效率为99.8，末端治理设施实际运行率（k值）计算公式为k=治理设施运行时间（小时）/正常生产时间（小时）。原文件中描述污染物类别为废气，污染物指标为氨，此处对其进行了匹配工作，将其匹配到LCAflow库里面相最符合的流，污染物指标备注为氨
- particles (PM2.5 - PM10): 0.1005
  the Technical of end-of-pipe management technology for pollution particles (PM2.5 - PM10)isVenturi + two-stage spray tower + demisting + electrostatic-demister，Its Technical efficiency of end-of-pipe management99.5
  污染物指标颗粒物的末端治理技术是文丘里+两级喷淋塔+除雾+电除雾，其效率为99.5，末端治理设施实际运行率（k值）计算公式为k=治理设施运行时间（小时）/正常生产时间（小时）。原文件中描述污染物类别为废气，污染物指标为颗粒物，此处对其进行了匹配工作，将其匹配到LCAflow库里面相最符合的流，污染物指标备注为颗粒物
- particles (PM2.5 - PM10): 0.201
  the Technical of end-of-pipe management technology for pollution particles (PM2.5 - PM10)isCyclone dust removal + bag filter，Its Technical efficiency of end-of-pipe management99
  污染物指标颗粒物的末端治理技术是旋风除尘+布袋除尘，其效率为99，末端治理设施实际运行率（k值）计算公式为k=治理设施运行时间（小时）/正常生产时间（小时）。原文件中描述污染物类别为废气，污染物指标为颗粒物，此处对其进行了匹配工作，将其匹配到LCAflow库里面相最符合的流，污染物指标备注为颗粒物
- Ammonia Nitrogen: 0.000213
  the Technical of end-of-pipe management technology for pollution Ammonia NitrogenisPhysical treatment + chemical treatment + aerobic biological treatment，Its Technical efficiency of end-of-pipe management99
  污染物指标氨氮的末端治理技术是物理处理法+化学处理法+好氧生物处理法，其效率为99，末端治理设施实际运行率（k值）计算公式为k=治理设施运行时间（小时）/正常生产时间（小时）。原文件中描述污染物类别为废水，污染物指标为氨氮，此处对其进行了匹配工作，将其匹配到LCAflow库里面相最符合的流，污染物指标备注为氨氮
- Nitrogen, organic bound: 0.000228
  the Technical of end-of-pipe management technology for pollution Nitrogen, organic boundisPhysical treatment + chemical treatment + aerobic biological treatment，Its Technical efficiency of end-of-pipe management99
  污染物指标总氮的末端治理技术是物理处理法+化学处理法+好氧生物处理法，其效率为99，末端治理设施实际运行率（k值）计算公式为k=治理设施运行时间（小时）/正常生产时间（小时）。原文件中描述污染物类别为废水，污染物指标为总氮，此处对其进行了匹配工作，将其匹配到LCAflow库里面相最符合的流，污染物指标备注为总氮
- ammonia: 0.257
  the Technical of end-of-pipe management technology for pollution ammoniaisVenturi + spray tower + demisting，Its Technical efficiency of end-of-pipe management99
  污染物指标氨的末端治理技术是文丘里+喷淋塔+除雾，其效率为99，末端治理设施实际运行率（k值）计算公式为k=治理设施运行时间（小时）/正常生产时间（小时）。原文件中描述污染物类别为废气，污染物指标为氨，此处对其进行了匹配工作，将其匹配到LCAflow库里面相最符合的流，污染物指标备注为氨
- particles (PM2.5 - PM10): 0.402
  the Technical of end-of-pipe management technology for pollution particles (PM2.5 - PM10)isCyclone dust removal + Venturi + spray tower + demisting，Its Technical efficiency of end-of-pipe management98
  污染物指标颗粒物的末端治理技术是旋风除尘+文丘里+喷淋塔+除雾，其效率为98，末端治理设施实际运行率（k值）计算公式为k=治理设施运行时间（小时）/正常生产时间（小时）。原文件中描述污染物类别为废气，污染物指标为颗粒物，此处对其进行了匹配工作，将其匹配到LCAflow库里面相最符合的流，污染物指标备注为颗粒物
- phosphorus, total: 0.000498
  the Technical of end-of-pipe management technology for pollution phosphorus, totalisPhysical treatment + chemical treatment，Its Technical efficiency of end-of-pipe management99
  污染物指标总磷的末端治理技术是物理处理法+化学处理法，其效率为99，末端治理设施实际运行率（k值）计算公式为k=治理设施运行时间（小时）/正常生产时间（小时）。原文件中描述污染物类别为废水，污染物指标为总磷，此处对其进行了匹配工作，将其匹配到LCAflow库里面相最符合的流，污染物指标备注为总磷
- chemical oxygen demand: 0.00196
  the Technical of end-of-pipe management technology for pollution chemical oxygen demandisPhysical treatment + chemical treatment，Its Technical efficiency of end-of-pipe management95
  污染物指标化学需氧量的末端治理技术是物理处理法+化学处理法，其效率为95，末端治理设施实际运行率（k值）计算公式为k=治理设施运行时间（小时）/正常生产时间（小时）。原文件中描述污染物类别为废水，污染物指标为化学需氧量，此处对其进行了匹配工作，将其匹配到LCAflow库里面相最符合的流，污染物指标备注为化学需氧量
- Exhaust gas: 6400
  the Technical of end-of-pipe management technology for pollution Exhaust gasis/，Its Technical efficiency of end-of-pipe management0
  污染物指标工业废气量的末端治理技术是/，其效率为0。原文件中描述污染物类别为废气，污染物指标为工业废气量，此处对其进行了匹配工作，将其匹配到LCAflow库里面相最符合的流，污染物指标备注为工业废气量

## Use advice
This dataset is derived from the Pollution Source Census Report and contains information on pollution emissions and related products. However, it does not include data on energy or chemical consumption, nor does it provide information on waste or co-product generation. When utilizing this dataset, please supplement the missing data based on actual conditions before use
该数据集来源于污染源普查报告，包含污染物排放及相关产品信息，但不包含能源或化学品消耗数据，也不提供废弃物或共生产物产生信息。在使用该数据集时，请根据实际情况补充缺失数据后再使用。

## Review details
Inventory: The internal review was done by several iteration steps concerning raw data validation, raw data documentation, representativity, completeness and consistency of modelling with regard to ISO 14040 and 14044.
清单： 内部审查通过几个迭代步骤完成，涉及原始数据验证、原始数据记录、代表性、完整性、与 ISO 14040 和 14044 有关的建模的一致性。

## Data sources
- 第二次全国污染源普查产排污核算系数手册（试用版）,二级代码26,四级代码2622文件，在完整版文件中第4111页
