# Steel and iron production ; Total of all wind farm

Dataset: ILCD process, Unit process, single operation
Geography: NMG-CN
Reference year: 2017
Classification: Unit processes / Materials production / Metals and semimetals
Functional unit: The functional unit is 1.5 MW wind turbine
LCI method principle: Attributional
LCI method approaches: Allocation
Generated by: Yunzhi Zhao, ll10088@163.com
Owner: Tiangong LCI Data Working Group
Review: Dependent internal review by Tiangong LCI Data Working Group
Amounts: no units in this file; such an amount is in the reference unit of its flow, which a separate flow dataset defines
copyright: false
licenseType: Free of charge for all users and uses

## General comment
The data set describes the environmental impacts and substitution effects of a wind farm equipped with 33 domestic 1.5 megawatts (MW) wind turbines, suitable for large-scale wind power generation. The referenced wind farm, employed as a case study, is located in the northeast of Inner Mongolia, one of China's principal wind power regions. It represents the use of wind power for sustainable, renewable energy production.

## Geography
The data regarding the parameters of wind power has been collected from Wang (2012). A wind farm equipped with 33 domestic 1.5 megawatts (MW) wind turbines is regarded as a case study to analyze the environmental impact and its substitution effects. The wind farm is located in the northeast of Inner Mongolia, the province in which most of China’s wind power is installed (Xia and Song, 2017).

## Reference product
- Steel,Steel: 1; measured
  steel and iron

## Inputs
- Energy, geothermal, converted: 40.5661; calculated

## Outputs
- carbon dioxide (fossil): 2061.88; calculated
- sulfur dioxide: 2.01; calculated
- nitrous oxide: 5.77; calculated
- particles (PM2.5 - PM10): 0.39; calculated
  PM

## Deviations from the LCI method approaches
The life cycle inventory for wind power is illustrated as follows. The production and manufacturing stage include the production of wind turbines, substations, and cables, which consume a large amount of energy and emit pollutants (Xue et al., 2015).

## Use advice
When utilizing this data set for Life Cycle Assessment (LCA), it is crucial to take into account the specific conditions and locations of the studied wind farm for accurate environmental impact analysis. Caution should be exercised in extrapolating the data to wind farms with different characteristics or those located in varying geographies with dissimilar wind profiles. Users must also consider the production and manufacturing stage, involving significant energy consumption and pollutant emissions, as represented by this data set.

## Review details
Inventory: The internal review was done by several iteration steps concerning raw data validation, raw data documentation, representativity, completeness and consistency of modelling with regard to ISO 14040 and 14044.

## Data sources
- Li, H., Jiang, H.-D., Dong, K.-Y., Wei, Y.-M. & Liao, H. A comparative analysis of the life cycle environmental emissions from wind and coal power: Evidence from China. Journal of Cleaner Production 248, 119192 (2020).
