# cement production;cement, portland fly-ash cement, 52.5MPa;dry rotary kiln

Dataset: ILCD process, Unit process, black box
Geography: BJ-CN
Classification: Materials production / Other mineralic materials
Generated by: Siqi Yang, ysqsophia@gmail.com
Owner: Tiangong LCI Data Working Group
Review: Dependent internal review by Tiangong LCI Data Working Group
Amounts: no units in this file; such an amount is in the reference unit of its flow, which a separate flow dataset defines
copyright: false
licenseType: Free of charge for all users and uses

## General comment
Dry rotary kiln scenarios with 100% cement kiln dust recycling technology were considered.

## Technical purpose
This dataset describes the production process of Portland fly-ash cement, with a strength of 52.5MPa, using a dry rotary kiln with 100% cement kiln dust recycling technology. The cement produced is applicable for construction projects requiring high-strength building materials. The process exemplifies a scenario that manages the environmental impact of cement production at the Beijing cement production base, which has a production capacity of approximately 2 million tons annually.

## Model description
Choose to manage 1 ton of Portland fly ash cement (P·F 52.5).A dry rotary kiln scenario using 100% cement kiln dust recovery technology was considered. The infrastructure processes for each scenario, road transport of raw materials to the cement production site, direct emissions, wastewater treatment, raw material and energy production and the recovery of electricity from the dry rotary kiln scenario are included.

## Reference product
- cement, portland fly-ash cement, 52.5MPa: 1000
  Portland cement P.F 52.5

## Inputs
- limestone, crushed, for mill: 1160
  Limestone
- hard coal: 111.73
  Bituminous coal
- iron, powder: 1.7
  lron powder
- gypsum stone (CaSO4-dihydrate): 50
  Gypsum
- ash: 170
  Coal ash, namely fly ash.
- sandstone: 6.1
  Sandstone
- electricity, medium voltage: 372.204
  Electricity
- Water (fresh water): 180
  Fresh water consumption
- crude oil; 42.3 MJ/kg: 0.35
  Oil

## Outputs
- sulfur dioxide: 0.004
  SO2
- hydrogen chloride: 0.000436
  HCI
- carbon dioxide: 810
  CO2
- hydrogen fluoride: 0.00047
  HF
- Nitrogen oxides: 1.88
  NOx
- zinc: 0.00015
  Zn
- arsenic: 5.1e-6
  As
- nickel: 5e-5
  Ni
- cadmium: 8.7e-5
  Cd
- lead: 0.00012
  Pb
- mercury: 2.2e-6
  Hg
- chromium: 3.4e-5
  Cr
- copper: 3.4e-6
  Cu
- particles (> PM10): 0.012
  Particulates. The particle size is not specified. Here we treat it as PM>10.

## Data selection and combination
Chinese data were used where possible, but when Chinese data were not available, European data and related background data were used (Ecoinvent Centre, 2007). Based on Chinese data, annual average monitoring data of the cement production process (including energy, water and raw material consumption, direct emissions) of the Beijing cement production base in China are used (http://www.jiancai.hk/news/show/265/) .The heavy metal gas emission data of ordinary cement at Beijing cement production site comes from the report (2007).

## Sampling procedure
The actual annual output of the Beijing cement production base is approximately 2 million tons.

## Use advice
When utilizing this LCA dataset, users should ensure that the production volume and technology settings correspond with the specific context required for their assessment. Considerations such as regional specificity, like the use of Chinese data for the Beijing production base, and methodological preferences, such as the adoption of Ecoinvent data where local data is unavailable, should be factored in. Users should also take into account the full lifecycle of the cement, including transportation, direct emissions, wastewater treatment, and energy recovery, to accurately reflect the environmental impact of the product.

## Review details
Inventory: The internal review was done by several iteration steps concerning raw data validation, raw data documentation, representativity, completeness and consistency of modelling with regard to ISO 14040 and 14044.

## Data sources
- Jinglan Hong & Xiangzhi Li. (2011). Environmental assessment of sewage sludge as secondary raw material in cement production – A case study in China. Waste Management 31, 1364–1371.
