# general-purpose polystyrene production

Dataset: ILCD process, Unit process, black box
Geography: BR
Reference year: 2010
Valid until: 2011
Classification: Unit processes / Materials production / Plastics
Functional unit: 1 ton of GPPS
Generated by: Zhiwei Li,
Owner: Tiangong LCI Data Working Group
Review: Dependent internal review by Tiangong LCI Data Working Group
Amounts: no units in this file; such an amount is in the reference unit of its flow, which a separate flow dataset defines
licenseType: Free of charge for all users and uses

## General comment
C6H6 is mainly obtained through catalytic reforming based on crude oil.C6H6 and C2H4 are converted into C8H10 by catalytic alkylation with a synthetic zeolite.

## Geography
Primary and secondary data were collected in plants in the South/Southeast regions of Brazil in 2010–2011.

## Technical purpose
The polystyrene resins, including general-purpose polystyrene (GPPS) and high-impact polystyrene (HIPS), are primarily used in the manufacturing of products for the packaging industry, electronics, household appliances, construction materials, and various other applications requiring sturdy, moldable plastic materials.

## Reference product
- polystyrene (general purpose) granulate (GPPS): 1000

## Inputs
- benzene: 289
- ethylene: 840
- nitrogen: 6.82
- water: 10400
- Electricity: 1195.2
- heat: 10200
- light fuel oil: 101

## Outputs
- carbon dioxide (fossil): 0.452
  原文未区分bio和fossil，根据专家判断此处为fossil
- methane (fossil): 0.0019
  原文未区分bio和fossil，根据专家判断此处为fossil
- Volatile Organic Compounds (VOCs): 0.0024
- Suspended solids, unspecified,Suspended solids, unspecified: 7.9
- chemical oxygen demand: 0.00428

## Data selection and combination
Process-based data from Brazilian were used

## Data treatment and extrapolations
ReCiPe method (Europe H/H) was used as the assessment method for consistency.

## Use advice
When using this dataset for Life Cycle Assessment (LCA), ensure that the scope of the impact assessment aligns with the regional data, which pertains to plants in the South/Southeast regions of Brazil. The dataset is specifically relevant for analyses pertaining to the years 2010-2011, and LCA practitioners should consider the temporal relevance of the data. The ReCiPe method (Europe H/H) should be used for impact assessment to maintain consistency with the initial data gathering and manipulation process.

## Review details
Inventory: The internal review was done by several iteration steps concerning raw data validation, raw data documentation, representativity, completeness and consistency of modelling with regard to ISO 14040 and 14044.

## Data sources
- Hansen, A. P.; da Silva, G. A.; Kulay, L. Evaluation of the Environmental Performance of Alternatives for Polystyrene Production in Brazil. Science of The Total Environment 2015, 532, 655–668.
