# Testing test ; Diesel engine ; Diesel fuel ; Diesel engine hot test ; All sizes; NESPS2 / 检测试验 ; 柴油发动机 ; 柴油 ; 柴油发动机热试 ; 所有规模 ; 全国第二次污染普查数据

Dataset: ILCD process, Unit process, single operation
Geography: CN
Reference year: 2019
Classification: Reference Parameters / Energy carriers and technologies / Crude oil based fuels
Generated by: The data was created by the Office of the Second National Pollution Source Census of the Ministry of Ecology and Environment, and the data was organized by the TianGong Plan team for ILCD format / 生态环境部第二次全国污染源普查工作办公室创建数据，天工计划团队常慧敏整理数据为ILCD格式
Owner: Tiangong LCI Data Working Group / 天工LCI数据工作小组
Review: Dependent internal review by Tiangong LCI Data Working Group / 天工LCI数据工作小组
Amounts: no units in this file; such an amount is in the reference unit of its flow, which a separate flow dataset defines
copyright: false
licenseType: Free of charge for all users and uses

## General comment
the treatment technology for the pollution of Exhaust gasdidn't offered，The formula for calculating the actual operation rate (k-value) of the end-of-pipe treatment facility is /

## Technical purpose
该数据集代表了柴油发动机测试设施废水和排放气体处理中采用的各种尾端管理技术。这些技术用于处理化学需氧量(COD)、颗粒物(PM2.5 - PM10)、挥发性有机化合物(VOCs)和氮氧化物(NOx)等污染物，以符合环境法规和标准。数据集包括技术效率率和计算处理设施实际运行率（k值）的公式。其中一些技术特定于某些污染物，如膜分离技术，生物处理（例如，好氧和厌氧处理），化学混凝土，SBR（连续批处理反应器），MBR（膜生物反应器），物理处理如过滤，以及气体的氧化或吸收方法等。

## Reference product
- Diesel engine: 1; calculated
  源文件中描述为为柴油发动机，此处对其进行了匹配工作，将其匹配到LCAflow库里面相最符合的流

## Outputs
All rows: calculated
- chemical oxygen demand: 0.000394
  the Technical of end-of-pipe management technology for pollution chemical oxygen demandisMembrane separation + anaerobic hydrolysis + bio-contact oxidation process，Its Technical efficiency of end-of-pipe management98，The formula for calculating the actual operation rate (k-value) of the end-of-pipe treatment facility is /
  污染物指标化学需氧量的末端治理技术是膜分离+厌氧水解类+生物接触氧化法，其效率为98，末端治理设施实际运行率（k值）计算公式为k=污水治理设施运行时间（小时）/正常生产时间（小时）。原文件中描述污染物类别为废水，污染物指标为化学需氧量，此处对其进行了匹配工作，将其匹配到LCAflow库里面相最符合的流
- chemical oxygen demand: 0.000394
  the Technical of end-of-pipe management technology for pollution chemical oxygen demandisMembrane separation + anaerobic hydrolysis + MBR，Its Technical efficiency of end-of-pipe management98
  污染物指标化学需氧量的末端治理技术是膜分离+厌氧水解类+MBR类，其效率为98，末端治理设施实际运行率（k值）计算公式为k=污水治理设施运行时间（小时）/正常生产时间（小时）。原文件中描述污染物类别为废水，污染物指标为化学需氧量，此处对其进行了匹配工作，将其匹配到LCAflow库里面相最符合的流
- chemical oxygen demand: 0.000394
  the Technical of end-of-pipe management technology for pollution chemical oxygen demandisMembrane separation + anaerobic hydrolysis + SBR，Its Technical efficiency of end-of-pipe management98，The formula for calculating the actual operation rate (k-value) of the end-of-pipe treatment facility is /
  污染物指标化学需氧量的末端治理技术是膜分离+厌氧水解类+SBR类，其效率为98，末端治理设施实际运行率（k值）计算公式为k=污水治理设施运行时间（小时）/正常生产时间（小时）。原文件中描述污染物类别为废水，污染物指标为化学需氧量，此处对其进行了匹配工作，将其匹配到LCAflow库里面相最符合的流
- chemical oxygen demand: 0.000591
  the Technical of end-of-pipe management technology for pollution chemical oxygen demandisMembrane separation + bio-contact oxidation process，Its Technical efficiency of end-of-pipe management97，The formula for calculating the actual operation rate (k-value) of the end-of-pipe treatment facility is /
  污染物指标化学需氧量的末端治理技术是膜分离+生物接触氧化法，其效率为97，末端治理设施实际运行率（k值）计算公式为k=污水治理设施运行时间（小时）/正常生产时间（小时）。原文件中描述污染物类别为废水，污染物指标为化学需氧量，此处对其进行了匹配工作，将其匹配到LCAflow库里面相最符合的流
- chemical oxygen demand: 0.000591
  the Technical of end-of-pipe management technology for pollution chemical oxygen demandisMembrane separation + MBR，Its Technical efficiency of end-of-pipe management97，The formula for calculating the actual operation rate (k-value) of the end-of-pipe treatment facility is /
  污染物指标化学需氧量的末端治理技术是膜分离+MBR类，其效率为97，末端治理设施实际运行率（k值）计算公式为k=污水治理设施运行时间（小时）/正常生产时间（小时）。原文件中描述污染物类别为废水，污染物指标为化学需氧量，此处对其进行了匹配工作，将其匹配到LCAflow库里面相最符合的流
- chemical oxygen demand: 0.000591
  the Technical of end-of-pipe management technology for pollution chemical oxygen demandisMembrane separation + SBR，Its Technical efficiency of end-of-pipe management97
  污染物指标化学需氧量的末端治理技术是膜分离+SBR类，其效率为97，末端治理设施实际运行率（k值）计算公式为k=污水治理设施运行时间（小时）/正常生产时间（小时）。原文件中描述污染物类别为废水，污染物指标为化学需氧量，此处对其进行了匹配工作，将其匹配到LCAflow库里面相最符合的流
- particles (PM2.5 - PM10): 0.000835
  the Technical of end-of-pipe management technology for pollution particles (PM2.5 - PM10)isBag filter，Its Technical efficiency of end-of-pipe management95，The formula for calculating the actual operation rate (k-value) of the end-of-pipe treatment facility is /
  污染物指标颗粒物的末端治理技术是袋式除尘，其效率为95，末端治理设施实际运行率（k值）计算公式为k=除尘设备耗电量（千瓦时）/(除尘设备额定功率（千瓦）×除尘设备瓦时）/(除尘设备额定功率（千瓦）×除尘设备运行时间（小时）)。原文件中描述污染物类别为废气，污染物指标为颗粒物，此处对其进行了匹配工作，将其匹配到LCAflow库里面相最符合的流
- particles (PM2.5 - PM10): 0.000835
  the Technical of end-of-pipe management technology for pollution particles (PM2.5 - PM10)isPlate electrostatic precipitator，Its Technical efficiency of end-of-pipe management95，The formula for calculating the actual operation rate (k-value) of the end-of-pipe treatment facility is /
  污染物指标颗粒物的末端治理技术是板式，其效率为95，末端治理设施实际运行率（k值）计算公式为k=除尘设备耗电量（千瓦时）/(除尘设备额定功率（千瓦）×除尘设备瓦时）/(除尘设备额定功率（千瓦）×除尘设备运行时间（小时）)。原文件中描述污染物类别为废气，污染物指标为颗粒物，此处对其进行了匹配工作，将其匹配到LCAflow库里面相最符合的流
- particles (PM2.5 - PM10): 0.000835
  the Technical of end-of-pipe management technology for pollution particles (PM2.5 - PM10)isTubular filtration，Its Technical efficiency of end-of-pipe management95
  污染物指标颗粒物的末端治理技术是管式，其效率为95，末端治理设施实际运行率（k值）计算公式为k=除尘设备耗电量（千瓦时）/(除尘设备额定功率（千瓦）×除尘设备瓦时）/(除尘设备额定功率（千瓦）×除尘设备运行时间（小时）)。原文件中描述污染物类别为废气，污染物指标为颗粒物，此处对其进行了匹配工作，将其匹配到LCAflow库里面相最符合的流
- chemical oxygen demand: 0.00197
  the Technical of end-of-pipe management technology for pollution chemical oxygen demandisMembrane separation，Its Technical efficiency of end-of-pipe management90，The formula for calculating the actual operation rate (k-value) of the end-of-pipe treatment facility is k = power consumption of wastewater treatment facilities (kWh/year) / operating time of wastewater treatment facilities (hours/year) / total power of wastewater treatment facilities (kW)
  污染物指标化学需氧量的末端治理技术是膜分离，其效率为90，末端治理设施实际运行率（k值）计算公式为k=污水治理设施运行时间（小时）/正常生产时间（小时）。原文件中描述污染物类别为废水，污染物指标为化学需氧量，此处对其进行了匹配工作，将其匹配到LCAflow库里面相最符合的流
- chemical oxygen demand: 0.002364
  the Technical of end-of-pipe management technology for pollution chemical oxygen demandisChemical coagulation + anaerobic hydrolysis + bio-contact oxidation process，Its Technical efficiency of end-of-pipe management88，The formula for calculating the actual operation rate (k-value) of the end-of-pipe treatment facility is /
  污染物指标化学需氧量的末端治理技术是化学混凝法+厌氧水解类+生物接触氧化法，其效率为88，末端治理设施实际运行率（k值）计算公式为k=污水治理设施运行时间（小时）/正常生产时间（小时）。原文件中描述污染物类别为废水，污染物指标为化学需氧量，此处对其进行了匹配工作，将其匹配到LCAflow库里面相最符合的流
- chemical oxygen demand: 0.002364
  the Technical of end-of-pipe management technology for pollution chemical oxygen demandisChemical coagulation + anaerobic hydrolysis + MBR，Its Technical efficiency of end-of-pipe management88
  污染物指标化学需氧量的末端治理技术是化学混凝法+厌氧水解类+MBR类，其效率为88，末端治理设施实际运行率（k值）计算公式为k=污水治理设施运行时间（小时）/正常生产时间（小时）。原文件中描述污染物类别为废水，污染物指标为化学需氧量，此处对其进行了匹配工作，将其匹配到LCAflow库里面相最符合的流
- chemical oxygen demand: 0.002364
  the Technical of end-of-pipe management technology for pollution chemical oxygen demandisChemical coagulation + anaerobic hydrolysis + SBR，Its Technical efficiency of end-of-pipe management88，The formula for calculating the actual operation rate (k-value) of the end-of-pipe treatment facility is /
  污染物指标化学需氧量的末端治理技术是化学混凝法+厌氧水解类+SBR类，其效率为88，末端治理设施实际运行率（k值）计算公式为k=污水治理设施运行时间（小时）/正常生产时间（小时）。原文件中描述污染物类别为废水，污染物指标为化学需氧量，此处对其进行了匹配工作，将其匹配到LCAflow库里面相最符合的流
- particles (PM2.5 - PM10): 0.002505
  the Technical of end-of-pipe management technology for pollution particles (PM2.5 - PM10)isSpray tower/water shock bath，Its Technical efficiency of end-of-pipe management85，The formula for calculating the actual operation rate (k-value) of the end-of-pipe treatment facility is /
  污染物指标颗粒物的末端治理技术是喷淋塔/冲击水浴，其效率为85，末端治理设施实际运行率（k值）计算公式为k=除尘设备耗电量（千瓦时）/(除尘设备额定功率（千瓦）×除尘设备瓦时）/(除尘设备额定功率（千瓦）×除尘设备运行时间（小时）)。原文件中描述污染物类别为废气，污染物指标为颗粒物，此处对其进行了匹配工作，将其匹配到LCAflow库里面相最符合的流
- particles (PM2.5 - PM10): 0.002505
  the Technical of end-of-pipe management technology for pollution particles (PM2.5 - PM10)isVenturi，Its Technical efficiency of end-of-pipe management85，The formula for calculating the actual operation rate (k-value) of the end-of-pipe treatment facility is /
  污染物指标颗粒物的末端治理技术是文丘里，其效率为85，末端治理设施实际运行率（k值）计算公式为k=除尘设备耗电量（千瓦时）/(除尘设备额定功率（千瓦）×除尘设备瓦时）/(除尘设备额定功率（千瓦）×除尘设备运行时间（小时）)。原文件中描述污染物类别为废气，污染物指标为颗粒物，此处对其进行了匹配工作，将其匹配到LCAflow库里面相最符合的流
- chemical oxygen demand: 0.003546
  the Technical of end-of-pipe management technology for pollution chemical oxygen demandisChemical coagulation + bio-contact oxidation process，Its Technical efficiency of end-of-pipe management82
  污染物指标化学需氧量的末端治理技术是化学混凝法+生物接触氧化法，其效率为82，末端治理设施实际运行率（k值）计算公式为k=污水治理设施运行时间（小时）/正常生产时间（小时）。原文件中描述污染物类别为废水，污染物指标为化学需氧量，此处对其进行了匹配工作，将其匹配到LCAflow库里面相最符合的流
- chemical oxygen demand: 0.003546
  the Technical of end-of-pipe management technology for pollution chemical oxygen demandisChemical coagulation + MBR，Its Technical efficiency of end-of-pipe management82，The formula for calculating the actual operation rate (k-value) of the end-of-pipe treatment facility is /
  污染物指标化学需氧量的末端治理技术是化学混凝法+MBR类，其效率为82，末端治理设施实际运行率（k值）计算公式为k=污水治理设施运行时间（小时）/正常生产时间（小时）。原文件中描述污染物类别为废水，污染物指标为化学需氧量，此处对其进行了匹配工作，将其匹配到LCAflow库里面相最符合的流
- chemical oxygen demand: 0.003546
  the Technical of end-of-pipe management technology for pollution chemical oxygen demandisChemical coagulation + SBR，Its Technical efficiency of end-of-pipe management82，The formula for calculating the actual operation rate (k-value) of the end-of-pipe treatment facility is /
  污染物指标化学需氧量的末端治理技术是化学混凝法+SBR类，其效率为82，末端治理设施实际运行率（k值）计算公式为k=污水治理设施运行时间（小时）/正常生产时间（小时）。原文件中描述污染物类别为废水，污染物指标为化学需氧量，此处对其进行了匹配工作，将其匹配到LCAflow库里面相最符合的流
- chemical oxygen demand: 0.00394
  the Technical of end-of-pipe management technology for pollution chemical oxygen demandisAnaerobic hydrolysis + bio-contact oxidation process，Its Technical efficiency of end-of-pipe management80
  污染物指标化学需氧量的末端治理技术是厌氧水解类+生物接触氧化法，其效率为80，末端治理设施实际运行率（k值）计算公式为k=污水治理设施运行时间（小时）/正常生产时间（小时）。原文件中描述污染物类别为废水，污染物指标为化学需氧量，此处对其进行了匹配工作，将其匹配到LCAflow库里面相最符合的流
- chemical oxygen demand: 0.00394
  the Technical of end-of-pipe management technology for pollution chemical oxygen demandisAnaerobic hydrolysis + MBR，Its Technical efficiency of end-of-pipe management80，The formula for calculating the actual operation rate (k-value) of the end-of-pipe treatment facility is /
  污染物指标化学需氧量的末端治理技术是厌氧水解类+MBR类，其效率为80，末端治理设施实际运行率（k值）计算公式为k=污水治理设施运行时间（小时）/正常生产时间（小时）。原文件中描述污染物类别为废水，污染物指标为化学需氧量，此处对其进行了匹配工作，将其匹配到LCAflow库里面相最符合的流
- chemical oxygen demand: 0.00394
  the Technical of end-of-pipe management technology for pollution chemical oxygen demandisAnaerobic hydrolysis + SBR，Its Technical efficiency of end-of-pipe management80，The formula for calculating the actual operation rate (k-value) of the end-of-pipe treatment facility is /
  污染物指标化学需氧量的末端治理技术是厌氧水解类+SBR类，其效率为80，末端治理设施实际运行率（k值）计算公式为k=污水治理设施运行时间（小时）/正常生产时间（小时）。原文件中描述污染物类别为废水，污染物指标为化学需氧量，此处对其进行了匹配工作，将其匹配到LCAflow库里面相最符合的流
- particles (PM2.5 - PM10): 0.00501
  the Technical of end-of-pipe management technology for pollution particles (PM2.5 - PM10)isMulti-tube cyclone dust removal，Its Technical efficiency of end-of-pipe management70，The formula for calculating the actual operation rate (k-value) of the end-of-pipe treatment facility is /
  污染物指标颗粒物的末端治理技术是多管旋风，其效率为70，末端治理设施实际运行率（k值）计算公式为k=除尘设备耗电量（千瓦时）/(除尘设备额定功率（千瓦）×除尘设备瓦时）/(除尘设备额定功率（千瓦）×除尘设备运行时间（小时）)。原文件中描述污染物类别为废气，污染物指标为颗粒物，此处对其进行了匹配工作，将其匹配到LCAflow库里面相最符合的流
- chemical oxygen demand: 0.00591
  the Technical of end-of-pipe management technology for pollution chemical oxygen demandisAerobic biological treatment，Its Technical efficiency of end-of-pipe management70，The formula for calculating the actual operation rate (k-value) of the end-of-pipe treatment facility is k = power consumption of wastewater treatment facilities (kWh/year) / operating time of wastewater treatment facilities (hours/year) / total power of wastewater treatment facilities (kW)
  污染物指标化学需氧量的末端治理技术是好氧生物处理法，其效率为70，末端治理设施实际运行率（k值）计算公式为k=污水治理设施运行时间（小时）/正常生产时间（小时）。原文件中描述污染物类别为废水，污染物指标为化学需氧量，此处对其进行了匹配工作，将其匹配到LCAflow库里面相最符合的流
- chemical oxygen demand: 0.00591
  the Technical of end-of-pipe management technology for pollution chemical oxygen demandisBio-contact oxidation process，Its Technical efficiency of end-of-pipe management70，The formula for calculating the actual operation rate (k-value) of the end-of-pipe treatment facility is k = power consumption of wastewater treatment facilities (kWh/year) / operating time of wastewater treatment facilities (hours/year) / total power of wastewater treatment facilities (kW)
  污染物指标化学需氧量的末端治理技术是生物接触氧化法，其效率为70，末端治理设施实际运行率（k值）计算公式为k=污水治理设施运行时间（小时）/正常生产时间（小时）。原文件中描述污染物类别为废水，污染物指标为化学需氧量，此处对其进行了匹配工作，将其匹配到LCAflow库里面相最符合的流
- chemical oxygen demand: 0.00591
  the Technical of end-of-pipe management technology for pollution chemical oxygen demandisMBR，Its Technical efficiency of end-of-pipe management70，The formula for calculating the actual operation rate (k-value) of the end-of-pipe treatment facility is k = power consumption of wastewater treatment facilities (kWh/year) / operating time of wastewater treatment facilities (hours/year) / total power of wastewater treatment facilities (kW)
  污染物指标化学需氧量的末端治理技术是MBR类，其效率为70，末端治理设施实际运行率（k值）计算公式为k=污水治理设施运行时间（小时）/正常生产时间（小时）。原文件中描述污染物类别为废水，污染物指标为化学需氧量，此处对其进行了匹配工作，将其匹配到LCAflow库里面相最符合的流
- chemical oxygen demand: 0.00591
  the Technical of end-of-pipe management technology for pollution chemical oxygen demandisSBR，Its Technical efficiency of end-of-pipe management70，The formula for calculating the actual operation rate (k-value) of the end-of-pipe treatment facility is k = power consumption of wastewater treatment facilities (kWh/year) / operating time of wastewater treatment facilities (hours/year) / total power of wastewater treatment facilities (kW)
  污染物指标化学需氧量的末端治理技术是SBR类，其效率为70，末端治理设施实际运行率（k值）计算公式为k=污水治理设施运行时间（小时）/正常生产时间（小时）。原文件中描述污染物类别为废水，污染物指标为化学需氧量，此处对其进行了匹配工作，将其匹配到LCAflow库里面相最符合的流
- particles (PM2.5 - PM10): 0.00668
  the Technical of end-of-pipe management technology for pollution particles (PM2.5 - PM10)isSingle cylinder (multiple cylinders in parallel) cyclone，Its Technical efficiency of end-of-pipe management60
  污染物指标颗粒物的末端治理技术是单筒（多筒并联）旋风，其效率为60，末端治理设施实际运行率（k值）计算公式为k=除尘设备耗电量（千瓦时）/(除尘设备额定功率（千瓦）×除尘设备瓦时）/(除尘设备额定功率（千瓦）×除尘设备运行时间（小时）)。原文件中描述污染物类别为废气，污染物指标为颗粒物，此处对其进行了匹配工作，将其匹配到LCAflow库里面相最符合的流
- chemical oxygen demand: 0.00985
  the Technical of end-of-pipe management technology for pollution chemical oxygen demandisChemical coagulation + floating separation，Its Technical efficiency of end-of-pipe management50
  污染物指标化学需氧量的末端治理技术是化学混凝法+上浮分离，其效率为50，末端治理设施实际运行率（k值）计算公式为k=污水治理设施运行时间（小时）/正常生产时间（小时）。原文件中描述污染物类别为废水，污染物指标为化学需氧量，此处对其进行了匹配工作，将其匹配到LCAflow库里面相最符合的流
- chemical oxygen demand: 0.01182
  the Technical of end-of-pipe management technology for pollution chemical oxygen demandisChemical coagulation，Its Technical efficiency of end-of-pipe management40，The formula for calculating the actual operation rate (k-value) of the end-of-pipe treatment facility is k = power consumption of wastewater treatment facilities (kWh/year) / operating time of wastewater treatment facilities (hours/year) / total power of wastewater treatment facilities (kW)
  污染物指标化学需氧量的末端治理技术是化学混凝法，其效率为40，末端治理设施实际运行率（k值）计算公式为k=污水治理设施运行时间（小时）/正常生产时间（小时）。原文件中描述污染物类别为废水，污染物指标为化学需氧量，此处对其进行了匹配工作，将其匹配到LCAflow库里面相最符合的流
- chemical oxygen demand: 0.01182
  the Technical of end-of-pipe management technology for pollution chemical oxygen demandisPhysicochemical treatment，Its Technical efficiency of end-of-pipe management40，The formula for calculating the actual operation rate (k-value) of the end-of-pipe treatment facility is k = power consumption of wastewater treatment facilities (kWh/year) / operating time of wastewater treatment facilities (hours/year) / total power of wastewater treatment facilities (kW)
  污染物指标化学需氧量的末端治理技术是物理化学处理法，其效率为40，末端治理设施实际运行率（k值）计算公式为k=污水治理设施运行时间（小时）/正常生产时间（小时）。原文件中描述污染物类别为废水，污染物指标为化学需氧量，此处对其进行了匹配工作，将其匹配到LCAflow库里面相最符合的流
- volatile organic compound: 0.0125
  the Technical of end-of-pipe management technology for pollution volatile organic compoundisCatalytic combustion method，Its Technical efficiency of end-of-pipe management95，The formula for calculating the actual operation rate (k-value) of the end-of-pipe treatment facility is /
  污染物指标挥发性有机物的末端治理技术是催化燃烧法，其效率为95，末端治理设施实际运行率（k值）计算公式为k=工艺废气净化装置耗电量（千瓦时）/(工艺废气净化装置额定功率（千瓦）×工艺废气净废气净化装置额定功率（千瓦）×工艺废气净化装置运行时间（小时）)。原文件中描述污染物类别为废气，污染物指标为挥发性有机物，此处对其进行了匹配工作，将其匹配到LCAflow库里面相最符合的流
- volatile organic compound: 0.0125
  the Technical of end-of-pipe management technology for pollution volatile organic compoundisDirect combustion，Its Technical efficiency of end-of-pipe management95
  污染物指标挥发性有机物的末端治理技术是直接燃烧法，其效率为95，末端治理设施实际运行率（k值）计算公式为k=工艺废气净化装置耗电量（千瓦时）/(工艺废气净化装置额定功率（千瓦）×工艺废气净废气净化装置额定功率（千瓦）×工艺废气净化装置运行时间（小时）)。原文件中描述污染物类别为废气，污染物指标为挥发性有机物，此处对其进行了匹配工作，将其匹配到LCAflow库里面相最符合的流
- volatile organic compound: 0.0125
  the Technical of end-of-pipe management technology for pollution volatile organic compoundisRegenerative catalytic combustion method，Its Technical efficiency of end-of-pipe management95
  污染物指标挥发性有机物的末端治理技术是蓄热式催化燃烧法，其效率为95，末端治理设施实际运行率（k值）计算公式为k=工艺废气净化装置耗电量（千瓦时）/(工艺废气净化装置额定功率（千瓦）×工艺废气净废气净化装置额定功率（千瓦）×工艺废气净化装置运行时间（小时）)。原文件中描述污染物类别为废气，污染物指标为挥发性有机物，此处对其进行了匹配工作，将其匹配到LCAflow库里面相最符合的流
- volatile organic compound: 0.0125
  the Technical of end-of-pipe management technology for pollution volatile organic compoundisRegenerative thermal combustion method，Its Technical efficiency of end-of-pipe management95
  污染物指标挥发性有机物的末端治理技术是蓄热式热力燃烧法，其效率为95，末端治理设施实际运行率（k值）计算公式为k=工艺废气净化装置耗电量（千瓦时）/(工艺废气净化装置额定功率（千瓦）×工艺废气净废气净化装置额定功率（千瓦）×工艺废气净化装置运行时间（小时）)。原文件中描述污染物类别为废气，污染物指标为挥发性有机物，此处对其进行了匹配工作，将其匹配到LCAflow库里面相最符合的流
- volatile organic compound: 0.0125
  the Technical of end-of-pipe management technology for pollution volatile organic compoundisThermal combustion，Its Technical efficiency of end-of-pipe management95，The formula for calculating the actual operation rate (k-value) of the end-of-pipe treatment facility is /
  污染物指标挥发性有机物的末端治理技术是热力燃烧法，其效率为95，末端治理设施实际运行率（k值）计算公式为k=工艺废气净化装置耗电量（千瓦时）/(工艺废气净化装置额定功率（千瓦）×工艺废气净废气净化装置额定功率（千瓦）×工艺废气净化装置运行时间（小时）)。原文件中描述污染物类别为废气，污染物指标为挥发性有机物，此处对其进行了匹配工作，将其匹配到LCAflow库里面相最符合的流
- chemical oxygen demand: 0.012805
  the Technical of end-of-pipe management technology for pollution chemical oxygen demandisAnaerobic biological treatment，Its Technical efficiency of end-of-pipe management35，The formula for calculating the actual operation rate (k-value) of the end-of-pipe treatment facility is k = power consumption of wastewater treatment facilities (kWh/year) / operating time of wastewater treatment facilities (hours/year) / total power of wastewater treatment facilities (kW)
  污染物指标化学需氧量的末端治理技术是厌氧生物处理法，其效率为35，末端治理设施实际运行率（k值）计算公式为k=污水治理设施运行时间（小时）/正常生产时间（小时）。原文件中描述污染物类别为废水，污染物指标为化学需氧量，此处对其进行了匹配工作，将其匹配到LCAflow库里面相最符合的流
- chemical oxygen demand: 0.012805
  the Technical of end-of-pipe management technology for pollution chemical oxygen demandisAnaerobic hydrolysis，Its Technical efficiency of end-of-pipe management35，The formula for calculating the actual operation rate (k-value) of the end-of-pipe treatment facility is k = power consumption of wastewater treatment facilities (kWh/year) / operating time of wastewater treatment facilities (hours/year) / total power of wastewater treatment facilities (kW)
  污染物指标化学需氧量的末端治理技术是厌氧水解类，其效率为35，末端治理设施实际运行率（k值）计算公式为k=污水治理设施运行时间（小时）/正常生产时间（小时）。原文件中描述污染物类别为废水，污染物指标为化学需氧量，此处对其进行了匹配工作，将其匹配到LCAflow库里面相最符合的流
- chemical oxygen demand: 0.01379
  the Technical of end-of-pipe management technology for pollution chemical oxygen demandisFilter separation，Its Technical efficiency of end-of-pipe management30，The formula for calculating the actual operation rate (k-value) of the end-of-pipe treatment facility is k = power consumption of wastewater treatment facilities (kWh/year) / operating time of wastewater treatment facilities (hours/year) / total power of wastewater treatment facilities (kW)
  污染物指标化学需氧量的末端治理技术是过滤分离，其效率为30，末端治理设施实际运行率（k值）计算公式为k=污水治理设施运行时间（小时）/正常生产时间（小时）。原文件中描述污染物类别为废水，污染物指标为化学需氧量，此处对其进行了匹配工作，将其匹配到LCAflow库里面相最符合的流
- chemical oxygen demand: 0.01379
  the Technical of end-of-pipe management technology for pollution chemical oxygen demandisPhysical treatment，Its Technical efficiency of end-of-pipe management30，The formula for calculating the actual operation rate (k-value) of the end-of-pipe treatment facility is k = power consumption of wastewater treatment facilities (kWh/year) / operating time of wastewater treatment facilities (hours/year) / total power of wastewater treatment facilities (kW)
  污染物指标化学需氧量的末端治理技术是物理处理法，其效率为30，末端治理设施实际运行率（k值）计算公式为k=污水治理设施运行时间（小时）/正常生产时间（小时）。原文件中描述污染物类别为废水，污染物指标为化学需氧量，此处对其进行了匹配工作，将其匹配到LCAflow库里面相最符合的流
- particles (PM2.5 - PM10): 0.0167
  the Technical of end-of-pipe management technology for pollution particles (PM2.5 - PM10)isDirect discharge
  污染物指标颗粒物的末端治理技术是直排，末端治理设施实际运行率（k值）计算公式为k=除尘设备耗电量（千瓦时）/(除尘设备额定功率（千瓦）×除尘设备瓦时）/(除尘设备额定功率（千瓦）×除尘设备运行时间（小时）)。原文件中描述污染物类别为废气，污染物指标为颗粒物，此处对其进行了匹配工作，将其匹配到LCAflow库里面相最符合的流
- chemical oxygen demand: 0.0197
  the Technical of end-of-pipe management technology for pollution chemical oxygen demandisDirect discharge，The formula for calculating the actual operation rate (k-value) of the end-of-pipe treatment facility is k = power consumption of wastewater treatment facilities (kWh/year) / operating time of wastewater treatment facilities (hours/year) / total power of wastewater treatment facilities (kW)
  污染物指标化学需氧量的末端治理技术是直排，末端治理设施实际运行率（k值）计算公式为k=污水治理设施运行时间（小时）/正常生产时间（小时）。原文件中描述污染物类别为废水，污染物指标为化学需氧量，此处对其进行了匹配工作，将其匹配到LCAflow库里面相最符合的流
- volatile organic compound: 0.0375
  the Technical of end-of-pipe management technology for pollution volatile organic compoundisAdsorption/catalytic combustion method，Its Technical efficiency of end-of-pipe management85，The formula for calculating the actual operation rate (k-value) of the end-of-pipe treatment facility is /
  污染物指标挥发性有机物的末端治理技术是吸附/催化燃烧法，其效率为85，末端治理设施实际运行率（k值）计算公式为k=工艺废气净化装置耗电量（千瓦时）/(工艺废气净化装置额定功率（千瓦）×工艺废气净废气净化装置额定功率（千瓦）×工艺废气净化装置运行时间（小时）)。原文件中描述污染物类别为废气，污染物指标为挥发性有机物，此处对其进行了匹配工作，将其匹配到LCAflow库里面相最符合的流
- volatile organic compound: 0.0375
  the Technical of end-of-pipe management technology for pollution volatile organic compoundisAdsorption/thermal combustion method，Its Technical efficiency of end-of-pipe management85，The formula for calculating the actual operation rate (k-value) of the end-of-pipe treatment facility is /
  污染物指标挥发性有机物的末端治理技术是吸附/热力燃烧法，其效率为85，末端治理设施实际运行率（k值）计算公式为k=工艺废气净化装置耗电量（千瓦时）/(工艺废气净化装置额定功率（千瓦）×工艺废气净废气净化装置额定功率（千瓦）×工艺废气净化装置运行时间（小时）)。原文件中描述污染物类别为废气，污染物指标为挥发性有机物，此处对其进行了匹配工作，将其匹配到LCAflow库里面相最符合的流
- volatile organic compound: 0.1
  the Technical of end-of-pipe management technology for pollution volatile organic compoundisOthers (adsorption)，Its Technical efficiency of end-of-pipe management60，The formula for calculating the actual operation rate (k-value) of the end-of-pipe treatment facility is /
  污染物指标挥发性有机物的末端治理技术是其他（吸附法），其效率为60，末端治理设施实际运行率（k值）计算公式为k=工艺废气净化装置耗电量（千瓦时）/(工艺废气净化装置额定功率（千瓦）×工艺废气净废气净化装置额定功率（千瓦）×工艺废气净化装置运行时间（小时）)。原文件中描述污染物类别为废气，污染物指标为挥发性有机物，此处对其进行了匹配工作，将其匹配到LCAflow库里面相最符合的流
- volatile organic compound: 0.175
  the Technical of end-of-pipe management technology for pollution volatile organic compoundisLow temperature plasma，Its Technical efficiency of end-of-pipe management30，The formula for calculating the actual operation rate (k-value) of the end-of-pipe treatment facility is /
  污染物指标挥发性有机物的末端治理技术是低温等离子体，其效率为30，末端治理设施实际运行率（k值）计算公式为k=工艺废气净化装置耗电量（千瓦时）/(工艺废气净化装置额定功率（千瓦）×工艺废气净废气净化装置额定功率（千瓦）×工艺废气净化装置运行时间（小时）)。原文件中描述污染物类别为废气，污染物指标为挥发性有机物，此处对其进行了匹配工作，将其匹配到LCAflow库里面相最符合的流
- volatile organic compound: 0.175
  the Technical of end-of-pipe management technology for pollution volatile organic compoundisPhotocatalysis，Its Technical efficiency of end-of-pipe management30
  污染物指标挥发性有机物的末端治理技术是光催化，其效率为30，末端治理设施实际运行率（k值）计算公式为k=工艺废气净化装置耗电量（千瓦时）/(工艺废气净化装置额定功率（千瓦）×工艺废气净废气净化装置额定功率（千瓦）×工艺废气净化装置运行时间（小时）)。原文件中描述污染物类别为废气，污染物指标为挥发性有机物，此处对其进行了匹配工作，将其匹配到LCAflow库里面相最符合的流
- volatile organic compound: 0.175
  the Technical of end-of-pipe management technology for pollution volatile organic compoundisPhotolysis，Its Technical efficiency of end-of-pipe management30，The formula for calculating the actual operation rate (k-value) of the end-of-pipe treatment facility is /
  污染物指标挥发性有机物的末端治理技术是光解，其效率为30，末端治理设施实际运行率（k值）计算公式为k=工艺废气净化装置耗电量（千瓦时）/(工艺废气净化装置额定功率（千瓦）×工艺废气净废气净化装置额定功率（千瓦）×工艺废气净化装置运行时间（小时）)。原文件中描述污染物类别为废气，污染物指标为挥发性有机物，此处对其进行了匹配工作，将其匹配到LCAflow库里面相最符合的流
- Nitrogen oxides: 0.2
  the Technical of end-of-pipe management technology for pollution Nitrogen oxidesisSCR，Its Technical efficiency of end-of-pipe management80
  污染物指标氮氧化物的末端治理技术是选择性催化还原法（SCR），其效率为80，末端治理设施实际运行率（k值）计算公式为k=工艺废气净化装置耗电量（千瓦时）/(工艺废气净化装置额定功率（千瓦）×工艺废气净化装置运行时间（小时）)。原文件中描述污染物类别为废气，污染物指标为氮氧化物，此处对其进行了匹配工作，将其匹配到LCAflow库里面相最符合的流
- volatile organic compound: 0.25
  the Technical of end-of-pipe management technology for pollution volatile organic compoundisDirect discharge，The formula for calculating the actual operation rate (k-value) of the end-of-pipe treatment facility is /
  污染物指标挥发性有机物的末端治理技术是直排，末端治理设施实际运行率（k值）计算公式为k=除尘设备耗电量（千瓦时）/(除尘设备额定功率（千瓦）×除尘设备瓦时）/(除尘设备额定功率（千瓦）×除尘设备运行时间（小时）)。原文件中描述污染物类别为废气，污染物指标为挥发性有机物，此处对其进行了匹配工作，将其匹配到LCAflow库里面相最符合的流
- Waste water: 328
  the treatment technology for the pollution of Waste waterdidn't offered，The formula for calculating the actual operation rate (k-value) of the end-of-pipe treatment facility is k = power consumption of wastewater treatment facilities (kWh/year) / operating time of wastewater treatment facilities (hours/year) / total power of wastewater treatment facilities (kW)
  污染物指标工业废水量的末端治理技术未说明。原文件中描述污染物类别为废水，污染物指标为工业废水量，此处对其进行了匹配工作，将其匹配到LCAflow库里面相最符合的流
- Nitrogen oxides: 0.5
  the Technical of end-of-pipe management technology for pollution Nitrogen oxidesisFlue gas cycle combustion，Its Technical efficiency of end-of-pipe management50
  污染物指标氮氧化物的末端治理技术是烟气循环燃烧，其效率为50，末端治理设施实际运行率（k值）计算公式为k=工艺废气净化装置耗电量（千瓦时）/(工艺废气净化装置额定功率（千瓦）×工艺废气净化装置运行时间（小时）)。原文件中描述污染物类别为废气，污染物指标为氮氧化物，此处对其进行了匹配工作，将其匹配到LCAflow库里面相最符合的流
- Nitrogen oxides: 0.5
  the Technical of end-of-pipe management technology for pollution Nitrogen oxidesisLow NOx combustion method，Its Technical efficiency of end-of-pipe management50，The formula for calculating the actual operation rate (k-value) of the end-of-pipe treatment facility is /
  污染物指标氮氧化物的末端治理技术是低氮燃烧法，其效率为50，末端治理设施实际运行率（k值）计算公式为k=工艺废气净化装置耗电量（千瓦时）/(工艺废气净化装置额定功率（千瓦）×工艺废气净化装置运行时间（小时）)。原文件中描述污染物类别为废气，污染物指标为氮氧化物，此处对其进行了匹配工作，将其匹配到LCAflow库里面相最符合的流
- Nitrogen oxides: 0.5
  the Technical of end-of-pipe management technology for pollution Nitrogen oxidesisOxidation/absorption method，Its Technical efficiency of end-of-pipe management50，The formula for calculating the actual operation rate (k-value) of the end-of-pipe treatment facility is /
  污染物指标氮氧化物的末端治理技术是氧化/吸收法，其效率为50，末端治理设施实际运行率（k值）计算公式为k=工艺废气净化装置耗电量（千瓦时）/(工艺废气净化装置额定功率（千瓦）×工艺废气净化装置运行时间（小时）)。原文件中描述污染物类别为废气，污染物指标为氮氧化物，此处对其进行了匹配工作，将其匹配到LCAflow库里面相最符合的流
- Nitrogen oxides: 0.5
  the Technical of end-of-pipe management technology for pollution Nitrogen oxidesisSNCR，Its Technical efficiency of end-of-pipe management50，The formula for calculating the actual operation rate (k-value) of the end-of-pipe treatment facility is /
  污染物指标氮氧化物的末端治理技术是选择性非摧化还原法（SNCR），其效率为50，末端治理设施实际运行率（k值）计算公式为k=工艺废气净化装置耗电量（千瓦时）/(工艺废气净化装置额定功率（千瓦）×工艺废气净化装置运行时间（小时）)。原文件中描述污染物类别为废气，污染物指标为氮氧化物，此处对其进行了匹配工作，将其匹配到LCAflow库里面相最符合的流
- Nitrogen oxides: 1
  the Technical of end-of-pipe management technology for pollution Nitrogen oxidesisDirect discharge，The formula for calculating the actual operation rate (k-value) of the end-of-pipe treatment facility is /
  污染物指标氮氧化物的末端治理技术是直排，末端治理设施实际运行率（k值）计算公式为k=工艺废气净化装置耗电量（千瓦时）/(工艺废气净化装置额定功率（千瓦）×工艺废气净化装置运行时间（小时）)。原文件中描述污染物类别为废气，污染物指标为氮氧化物，此处对其进行了匹配工作，将其匹配到LCAflow库里面相最符合的流
- Exhaust gas: 1667
  the treatment technology for the pollution of Exhaust gasdidn't offered，The formula for calculating the actual operation rate (k-value) of the end-of-pipe treatment facility is /
  污染物指标工业废气量的末端治理技术未说明。原文件中描述污染物类别为废气，污染物指标为工业废气量，此处对其进行了匹配工作，将其匹配到LCAflow库里面相最符合的流

## Use advice
This dataset is derived from the Pollution Source Census Report and contains information on pollution emissions and related products. However, it does not include data on energy or chemical consumption, nor does it provide information on waste or co-product generation. When utilizing this dataset, please supplement the missing data based on actual conditions before use
该数据集来源于污染源普查报告，包含污染物排放及相关产品信息，但不包含能源或化学品消耗数据，也不提供废弃物或共生产物产生信息。在使用该数据集时，请根据实际情况补充缺失数据后再使用。

## Review details
Inventory: The internal review was done by several iteration steps concerning raw data validation, raw data documentation, representativity, completeness and consistency of modelling with regard to ISO 14040 and 14044.
清单： 内部审查通过几个迭代步骤完成，涉及原始数据验证、原始数据记录、代表性、完整性、与 ISO 14040 和 14044 有关的建模的一致性。

## Data sources
- 第二次全国污染源普查产排污核算系数手册（试用版）,二级代码33-37文件，在完整版文件中第1020页
