# Large-scale pig production ; 5W JTS pig farm

Dataset: ILCD process, Unit process, black box
Geography: HUB-CN
Reference year: 2012
Classification: Unit processes / Materials production / Agricultural production means
Functional unit: The application coefficient (100/ field weight) was corrected to the standard functional unit weight of 100kg due to inconsistent field weight.
Generated by: Rui Yang, 1632707028@qq.com
Owner: Tiangong LCI Data Working Group
Review: Dependent internal review by Tiangong LCI Data Working Group
Amounts: no units in this file; such an amount is in the reference unit of its flow, which a separate flow dataset defines
copyright: false
licenseType: Free of charge for all users and uses

## General comment
An important feature of the difference between large-scale intensive pig farming and traditional pig farming is that the production process realizes the flow type of balanced production, and the product mass and standardization. Due to different pig house types, different management measures, different feed sources and formulation technologies, and different methods of manure treatment, the environmental impact caused by the whole and key nodes of the pig production system of different scales has not been accurately understood. This chapter has systematically studied the pig production system model established in Chapter 2.

## Geography
The characteristics of intensive pig breeding in Hubei Province are summarized through field investigation, that is, the pig production technology is mostly self-propagation and self-rearing, and the feeding mode of all in and all out is phased. There are various types of pig houses. Generally, mechanical ventilation is used in the pig house to prevent heat and cool down and keep warm and control the small environment in the house. Sows and piglets are raised in limited stalls and high beds, the average renewal rate is generally 35%-40%, and the service life of breeding pigs is 3-4 years. The diet is formulated into a full-priced feed according to the nutritional needs of the physiological stage, mainly corn and other grains, and feed raw materials are purchased from outside. Most of the breeds are foreign three-way cross-bred pigs (such as DLY), and more than 10,000 commercial pigs are put out annually. In daily management, dry cleaning and blistering feces are adopted to facilitate the separation of dry and wet. Manure treatment method uses dry manure compost, sewage anaerobic fermentation process to produce biogas. The 10,000 pig farm is one point distribution, more than 50,000 intensive pig farms take multi-point layout, breeding farm + fattening farm, weaning piglets use truck transport turnover.

## Time period
According to the 2012 "China Animal Husbandry Yearbook", the pig breeding mode can be divided into retail breeding of 1 to 49 pigs per year; Small scale breeding of 50 to 499 pigs per year; Medium scale breeding of 500 to 9999 pigs per year; There are four types of large-scale breeding of more than 10,000 pigs annually.

## Technology and included processes
The research object of commercial pig LCA established in this paper is commercial pig product system, so the objectives of commercial pig LCA should include the following aspects: 1) According to the production process of commercial pig, clarify the environmental impact types of key links or processes in the production process of commercial pig; 2) According to the characteristics of different production systems of commercial pigs, clarify the environmental impact scores of different production systems, and evaluate the environmental friendliness of different product systems through impact scores; 3) According to the environmental impact assessment results of the live pig production system, the improvement or optimization ways and suggestions are proposed.

## Technical purpose
The data set describes the large-scale intensive pig farming operations at a 5W JTS pig farm, identifying it as an agricultural process optimized for high-volume pig production. This production model encompasses the use of advanced techniques for balanced flow production as well as standardized breeding and feeding practices suitable for both the breeding and fattening of over 10,000 pigs annually. The farm utilizes self-breeding, self-rearing, and phased all-in-all-out feeding strategies with various pig house types designed for environmental control. The breeds mainly involve foreign three-way cross-bred pigs, and manure is processed through dry composting and anaerobic fermentation for biogas production.

## Reference product
- pig: 100; measured
  Due to the inconsistency in the slaughter weight, the coefficient (100/the slaughter weight) is used to correct the standard functional unit weight of 100kg.

## Inputs
All rows: measured
- sand: 1.8646
  sands, taken from 5W JTS pig farm data
- Glass (formed & finished): 0.0528
  glasses, taken from 5W JTS pig farm data
- Steel: 1.0834
  steel, taken from 5W JTS pig farm data
- polystyrene expandable granulate (EPS): 0.054
  EPS, taken from 5W JTS pig farm data
- water: 2729.1
  Taken from 5W JTS pig farm data
- feed: 276.85
  Taken from 5W JTS pig farm data

## Outputs
All rows: measured
- manure: 264.4
  Pig manure, taken from 5W JTS pig farm data
- carbon dioxide (fossil),carbon dioxide (fossil): 262.29
  Taken from 5W JTS pig farm data
- ammonia: 1.0893
  Taken from 5W JTS pig farm data
- methane (biogenic): 0.81716
  Taken from 5W JTS pig farm data
- nitrous oxide: 0.05495
  Nitrous oxide, taken from 5W JTS pig farm data

## Deviations from the LCI method approaches
According to the continuity, functionality, relative independence of production process, main characteristics of pig production stage and 相应物 quality input type, it can be divided into five key stages: building materials input, piglet production, feed consumption, daily management and waste treatment. Weaned piglets are used as carriers to share the corresponding environmental impacts of the inputs and outputs of sows in piglet production. The feed consumption link includes land demand, crop planting, fertilizer, pesticides and agricultural machinery input. Daily management includes water and electricity input and emissions of ammonia, methane, nitrous oxide and carbon dioxide in the house. Manure treatment includes dry manure composting and anaerobic fermentation of sewage.

## Data selection and combination
Field measurement and collection of pig farm original record data, field measurement refers to the determination of the number of pig houses, types, specifications, building materials, etc. Collect monthly report data of pig farm, including pig stock structure, sow breeding performance, live pig growth performance, live pig sales, feed import and export list, feed category, anisol formula of feed at different stages, and original records of water and electricity consumption of pig farm. The concentration of harmful gases in the air of the pig house, the discharge of manure were consulted in the literature, the feed transportation, crop planting methods, and the use of agricultural materials were consulted in the national and Hubei provincial statistical yearbook. The purpose of collecting these records is to determine the energy resources of pigs at different stages and the corresponding emission data. Some of the data were obtained by referring to literature, such as the statistical yearbook of the National Bureau of Statistics, the yearbook of the Hubei Provincial Bureau of Statistics, and other relevant research data of scholars. 62 pig farms were investigated on site, and 30 large-scale pig farms were selected for modeling.

## Data treatment and extrapolations
The gas production coefficients used in this paper were NH3:8.2g/D.ig, CO2:2.6kg/ d.ig, N2O: 0.48g/ D.ig, CH4:3.5g/ D.ig at sow stage. Finishing stage NH3:6.9g/D.IGCO2:1585g/ d.IGN2O

## Use advice
This data set should be used to understand the environmental impact of large-scale pig farming operations. Users should consider the technical variations in pig house design, feeding strategies, and manure processing methods when interpreting the data. The life cycle assessment model must account for material input divisions across stages like building materials, piglet production, feed consumption, and manure treatment processes. Additionally, assessments should include considerations for emissions from daily management practices such as power usage and facility emissions. Special attention should be paid to the application coefficients for standardizing outputs to a functional weight unit, and datasets from other sources, such as national and provincial yearbooks or field survey results, are necessary for a comprehensive understanding.

## Review details
Inventory: The internal review was done by several iteration steps concerning raw data validation, raw data documentation, representativity, completeness and consistency of modelling with regard to ISO 14040 and 14044.

## Data sources
- 惠晓红. 运用生命周期评价与生态效率法评估湖北省生猪养殖系统研究. (华中农业大学, 2017).
