# Extraction Stage ; Oil ; Reservoir Extraction, Treatment, and Separation

Dataset: ILCD process, Unit process, single operation
Geography: UM
Reference year: 2001
Classification: Unit processes / Energy carriers and technologies / Crude oil based fuels
LCI method principle: Attributional
LCI method approaches: Consequential
Generated by: zimeng li, 1577978537@qq.com
Owner: Tiangong LCI Data Working Group
Review: Dependent internal review by Tiangong LCI Data Working Group
Amounts: no units in this file; such an amount is in the reference unit of its flow, which a separate flow dataset defines
copyright: false
licenseType: Free of charge for all users and uses

## General comment
This process pertains to the extraction, treatment, and separation of oil in the Permian Basin, specifically from the San Andres dolomite. It is utilized in the petroleum industry for enhanced oil recovery operations, including waterflooding and CO2 injection at depths typical for this region, with associated gas processing for component separation and CO2 re-injection for long-term storage.

## Geography
the Permian Basin of West Texas,Although all emissions and discharges should be included in a full LCA, this study focused on greenhouse gas emissions (CO2, CH4, and N2O) only. The analysis was limited to the boundary of the facility and included the extraction of the oil and associated gas from the oil reservoir, the processing of the associated gas for separation of the different components (water, hydrogen sulfide -H2S, CO2, CH4, natural gas liquids), the compression of the separated CO2 stream destined for injection, and the transport and injection of the CO2 in the oil reservoir for extraction of additional oil and for long-term storage. Figure 1 shows a schematic of this process. The extraction and transport of the CO2 from the natural reservoir is not part of the analysis.The reservoir we investigated in this study is situated in the Permian Basin of West Texas. It is a layered dolomite with an average porosity of 8.5% and an average permeability of 1.5 md. Production is from the San Andres dolomite at an average depth of 1585 m, and the thickness of the producing layer varies from 15 to 70 m. The unit contains 13 130 producing acres, which have already undergone waterflooding and are now under enhanced oil recovery production using CO2. The minimum miscibility pressure to be maintained for injection of CO2 is 85 atm

## Technology and included processes
Oil reservoir extraction treatment separation refers to the mixture extracted from underground oil and gas reservoirs, and after a series of treatment and separation processes, the oil, gas and water components are separated for further processing and use of gas-liquid separation: gas-liquid separation technology includes gravity separation, pressure separation, membrane separation and other ways. Common separation equipment includes gas-liquid separator, membrane separation device, etc. Chemical treatment: Chemical treatment technology requires the selection of appropriate treatment agents and reaction conditions according to the composition and nature of the mixture, and the target components in the mixture are separated by chemical reaction. Oil, gas and water separation: common separation equipment includes three-phase separator, cyclone, centrifugal separator, etc., by adjusting the operating parameters of the separation equipment, such as pressure, temperature and flow rate, to achieve effective separation of oil, gas and water.

## Reference product
- LPG - liquefied petroleum gas: 1; uniform; missing unimportant
  Oil production, gas density of 0.8 tons/1000 cubic meters and calorific value of 1000 BTU/scf

## Inputs
- Hard coal, at consumer EU-27: 0.0065; uniform; missing unimportant
  Coal carbon consumption
- natural gas: 0.065; uniform; missing unimportant
  Natural gas consumption

## Use advice
The lifecycle assessment data is delimited to the operational boundary of the facility and specifically focuses on greenhouse gas emissions during the enhanced oil recovery production. When using this data set, users must include all emissions and discharges related to the extraction and processing stages. The transport and injection of CO2 for additional oil extraction and storage must also be accounted for. It's important to maintain the minimum miscibility pressure for CO2 injection as per the study. This data should not be used to assess the entire lifecycle impacts of oil production, as it is limited to certain emissions and processes.

## Review details
Inventory: The internal review was done by several iteration steps concerning raw data validation, raw data documentation, representativity, completeness and consistency of modelling with regard to ISO 14040 and 14044.

## Data sources
- Aycaguer, A.-C., Lev-On, M., & Winer, A. M. (2001). Reducing Carbon Dioxide Emissions with Enhanced Oil Recovery Projects: A Life Cycle Assessment Approach. Energy & Fuels, 15(2), 303–308.
