# DRI production;DRI;H-DR (part)

Dataset: ILCD process, Unit process, single operation
Geography: CN
Classification: Energy carriers and technologies / Other non-renewable fuels
Generated by: Fuxiang, 1162850692@qq.com
Owner: Tiangong LCI Data Working Group
Review: Dependent internal review by Tiangong LCI Data Working Group
Amounts: no units in this file; such an amount is in the reference unit of its flow, which a separate flow dataset defines
copyright: false
licenseType: Free of charge for all users and uses

## General comment
Direct Reduced Iron (DRI) production utilizing hydrogen-based reduction (H-DR, part) represents a unit process intended for the manufacturing of iron with reduced carbon footprint. This method is particularly useful for industries requiring iron with specific metallurgical properties, like those in the steel manufacturing sector. It can be applied in processes where a cleaner and more sustainable alternative to the traditional blast furnace method is desired.

## Geography
The average operating data of Coal-DR, NG-DR (MID), and NG-DR (ENE) demonstration projects in China are used as the benchmark for the LCI of DR routes.

## Reference product
- Direct Reduced Iron: 1000; calculated
  The average operating data of Coal-DR, NG-DR (MID), and NG-DR (ENE) demonstration projects in China are used as the benchmark for the LCI of DR routes. LCI of COG-DR and H-DR routes, which is not scaled-up in China are estimated based on Coal-DR routes combined with literature data from simulations, laboratory tests, and process modeling in

## Inputs
All rows: calculated
- Pellet: 1357.3
  (same comment as for Direct Reduced Iron)
- Water (fresh water): 200
  (same comment as for Direct Reduced Iron)
- Natural gas, at consumer EU-27: 16
  (same comment as for Direct Reduced Iron)
- hydrogen: 550
  (same comment as for Direct Reduced Iron)
- Electricity: 356.4
  (same comment as for Direct Reduced Iron)

## Outputs
- Dust (unspecified, from stack): 0.1; calculated
  (same comment as for Direct Reduced Iron)

## Data treatment and extrapolations
LCI of COG-DR and H-DR routes, which is not scaled-up in China are estimated based on Coal-DR routes combined with literature data from simulations, laboratory tests, and process modeling in Table 9 [49,50]. The LCI of Coal-DR is obtai

## Use advice
When using Life Cycle Inventory (LCI) data of the DRI production process, users should note that the data is benchmarked against the average operating data from Coal-DR, NG-DR (MID), and NG-DR (ENE) demonstration projects in China. For the LCI data of COG-DR and H-DR routes which are not scaled up in China, estimates are based on Coal-DR routes combined with data from simulations, laboratory tests, and process modeling. It’s essential to pay attention to the methodology described in the referenced literature (Table 9, [49,50]) when adopting the LCI data for these routes. Ensure that system boundaries, assumptions, and the specific context of the data are adequately considered in the modeling of the use phase and any environmental impact assessment.

## Review details
Inventory: The internal review was done by several iteration steps concerning raw data validation, raw data documentation, representativity, completeness and consistency of modelling with regard to ISO 14040 and 14044.

## Data sources
- The carbon reduction potential of hydrogen in the low carbon transition of the iron and steel industry: The case of China
