# Livestock and poultry breeding ; feed crop planting stage ; beef cattle retail investors

Dataset: ILCD process, Unit process, single operation
Geography: CN
Reference year: 2014
Classification: Unit processes / Materials production / Agricultural production means
Functional unit: 1kg beef
Generated by: Rui Yang, 1632707028@qq.com
Owner: Tiangong LCI Data Working Group
Review: Dependent internal review by Tiangong LCI Data Working Group
Amounts: no units in this file; such an amount is in the reference unit of its flow, which a separate flow dataset defines
copyright: false
licenseType: Free of charge for all users and uses

## General comment
The feed described in this paper is mainly energy feed, including: corn, wheat, soybean, sorghum, rice. In fact, in the process of livestock breeding, livestock feed is mainly composed of corn, wheat and soybeans. Feed crop planting stage mainly includes fertilizer production stage, corn, soybean, wheat planting stage.

## Geography
This study was conducted from 2014 to 2015, aiming at livestock and poultry feeding cycle, meat ratio, feed formula, feed consumption, coal and electricity consumption, etc. Has been to Shandong Gaomi Zhengda pig farm, Laixi City Zhishuang dairy farm, Jimo city Duan Bolan town Jiangjiapo village pig farm, Jimo City Liujiazhuang town livestock farm, Rizhao City Changling town Guanzhuang village, Juxian County Zhailihe town Dongxing Agriculture and animal husbandry company, Juxian Qiaoshan town east Chen dairy farm, Juxian Qiaoshan town Liu Jiayi water pig farm, Zhucheng Foreign Trade Co., LTD. Phoenix parents breeding duck farm, Xinjiang Fukang Hongfa Breeding professional cooperative, Jiuyun Street Town Xuhong laying Chicken cooperative, Jiuyun Street Town Liuyun Village self-contained breeding farm, China Australia Holding Group Co., LTD., Dezhou City Qingyun County Wayu Village, Shandong Province Qingyun County four Liu community beef cattle breeding base, Dezhou City Qingyun Qingnian chicken breeding base, Qingyun County Yongli Poultry layer breeding company, Qingyun County Xingchen youth chicken breeding Field research was carried out by professional breeding cooperatives, Qingyun Dongtai broiler breeding cooperatives, Hebei Yanshan Boyuan Feed Co., LTD., Yanshan Da Chinese Feed Co., LTD., Wudi Liuhe Feed Co., LTD., and China-Australia Oriental Hope Feed Co., LTD.

## Technology and included processes
In this paper, the life cycle of livestock and poultry farming is divided into six stages: feed crop planting, feed processing, livestock and poultry raising, manure treatment, slaughter and transportation. The specific life cycle process of livestock and poultry breeding is shown in Figure 2-1. Due to the lack of some data and the limitations of basic conditions, the production, transportation and use of pesticides, mulch and feed additives have not been analyzed, and the environmental impact caused by other related infrastructure construction, transport production and labor costs is no longer considered.

## Technical purpose
The process described is used for the production of energy feed primarily composed of corn, wheat, soybean, sorghum, and rice as primary ingredients in livestock and poultry breeding. Specifically, it is utilized during the feed crop planting stage which includes the fertilizer production stage and the planting of corn, soybean, and wheat. This data can be applied in life cycle assessments of livestock, such as beef cattle, where feed composition directly impacts environmental outputs.

## Reference product
- beef: 1; measured
  作为参考定量，非实际输出

## Inputs
- Fertilizer: 0.188753; calculated
- hard coal: 0.00244898; calculated

## Outputs
All rows: measured
- nitrous oxide: 0.0078629
  Beef cattle retail investors
- nitrogen, total (excluding N2): 0.014744
  Beef cattle retail investors
- Nitrogen trioxide: 0.010049
  Beef cattle retail investors
- ammonia: 0.021363
  Beef cattle retail investors
- hydrocarbons (unspecified): 0.0001016
  Beef cattle retail investors
- carbon monoxide (fossil): 0.0007537
  Beef cattle retail investors
- sulfur dioxide: 0.0009136
  Beef cattle retail investors
- carbon dioxide (fossil),carbon dioxide (fossil): 1.82138
  Beef cattle retail investors

## Use advice
When utilizing this data set for life cycle assessment, it is important to consider the regional specificity of the data collected from farms and facilities in Shandong, Xinjiang, and other locations listed from 2014 to 2015. Users should take into account the relevance to their own assessment objectives, particularly with regard to the feed-to-meat conversion ratios, feed consumption, and energy usage for production processes. It is also advised to cross-reference with up-to-date agriculture and animal husbandry practices for accurate modeling and extrapolation.

## Review details
Inventory: The internal review was done by several iteration steps concerning raw data validation, raw data documentation, representativity, completeness and consistency of modelling with regard to ISO 14040 and 14044.

## Data sources
- 周景月. 基于生命周期评价的畜禽养殖环境影响分析. (青岛科技大学, 2017).
