# Epoxy propane production ; Universal epoxy propane ; Ionic membrane electrolysis process

Dataset: ILCD process
Geography: CN
Reference year: 2009
Classification: Unit processes / Materials production / Organic chemicals
Functional unit: production of 1kg propylene oxide by chlorohydrin process
Generated by: Xiaohua Liu, lxh01311@163.com
Owner: Tiangong LCI Data Working Group
Review: Dependent internal review by Tiangong LCI Data Working Group
Amounts: no units in this file; such an amount is in the reference unit of its flow, which a separate flow dataset defines
copyright: false
licenseType: Free of charge for all users and uses

## General comment
The produced epoxy propane (propylene oxide) is a versatile chemical intermediate used in the manufacturing of polyurethanes, glycols, and plastics. It is suitable for producing a broad range of products such as foams, coatings, adhesives, sealants, and elastomers.

## Inputs
- Chlorine: 1350; measured
  chlorine
- Quicklime: 807; measured
  lime
- Electricity: 360; measured
  electricity
- Steam: 2000; measured
  steam

## Outputs
- Wastewater: 50000; measured
  waste water
- Solid Waste: 2000; measured
  Waste residue

## Use advice
For Life Cycle Assessment purposes, ensure to account for the relevant environmental impacts associated with the chlorohydrin process when using this data. This includes accounting for energy use, raw materials consumed, and waste generated. Consider the potential for recycling waste streams where applicable. Be mindful of the technological applicability of this process as it pertains to modern industry standards and may not be representative of all production methods for epoxy propane.

## Review details
Inventory: The internal review was done by several iteration steps concerning raw data validation, raw data documentation, representativity, completeness and consistency of modelling with regard to ISO 14040 and 14044.

## Data sources
- 聚碳酸酯和聚乳酸的生命周期评价
