# Recycling of waste polyvinyl chloride ; Recycled polyvinyl chloride ; Physical method 174003.8t/a ; Waste polyvinyl chloride

Dataset: ILCD process, Unit process, black box
Geography: HA-JS-CN
Reference year: 2010
Classification: Unit processes / End-of-life treatment / Material recycling
Functional unit: Dispose of 1 ton of waste polyvinyl chloride
Generated by: Xiaoyu Cheng, xiaoyucheng@email.ncu.edu.cn
Owner: Tiangong LCI Data Working Group
Review: Dependent internal review by Tiangong LCI Data Working Group
Amounts: no units in this file; such an amount is in the reference unit of its flow, which a separate flow dataset defines
copyright: false
licenseType: Free of charge for all users and uses

## General comment
The main technical steps of the regeneration process include crushing, rinsing, and drying of waste polyvinyl chloride, magnetic sorting, granulation, and regeneration.

## Geography
Jinhu county

## Time period
Publication time of literature

## Technical purpose
Recycled polyvinyl chloride, produced through a physical recycling process, is utilized for the manufacture of various PVC products. This includes its use in the construction industry for pipes, fittings, profiles, and cables, as well as in the production of consumer goods such as footwear, packaging, and flooring.

## Reference product
- Waste Polyvinyl Chloride: 1000; input; missing unimportant

## Inputs
- Gasoline (regular): 2929.6; missing unimportant
- Diesel: 1938.4; missing unimportant
- Electricity: 206.89; missing unimportant

## Outputs
All rows: missing unimportant
- carbon dioxide (fossil): 84.6
  原文未区分bio和fossil，根据专家判断此处为fossil
- carbon monoxide (fossil): 2.365
  原文未区分bio和fossil，根据专家判断此处为fossil
- Nitrogen oxides: 0.911
- sulfur oxides: 0.739
- Flue dust: 0.57
- hydrocarbons (unspecified): 0.273
- Alcohols, C6-12: 0.0696
- hydrogen chloride: 0.00764
- Volatile Organic Compounds (VOCs): 0.274
- chemical oxygen demand: 0.00179
- Divalent lead ion: 5.32e-6
- Suspended solids, unspecified,Suspended solids, unspecified: 0.0113
- Petroleum: 0.00057309
- Divalent mercury ion: 1.1e-7
- Ash: 1.66
- Dregs: 0.977
- Sediment and Sludge: 18
- Waste Impurities: 26.1

## Use advice
When utilizing this data for Life Cycle Assessment, take into account the unit process of recycling waste polyvinyl chloride including collection, transportation, and the entire regeneration process. The energy consumption, as well as the generation of emissions such as waste gas, and solid waste must be factored into the assessment. However, since the company recycles and reuses all of its wastewater, no adjustments for wastewater discharge need to be made. Ensure that the technological boundaries of the study are consistent with the operation in Jinhu County as per the sourced literature.

## Review details
Inventory: The internal review was done by several iteration steps concerning raw data validation, raw data documentation, representativity, completeness and consistency of modelling with regard to ISO 14040 and 14044.

## Data sources
- 伍跃辉, 陈爱燕, 柏丽梅, 王震 & 孙德智. 废旧聚氯乙烯再生过程生命周期评价. 环境科学研究 805–810 (2010) doi:
