# Foundation constriction ; Tower foundation of 1.25MW wind turbine (24)

Dataset: ILCD process, Unit process, single operation
Geography: YL-GX-CN
Reference year: 2012
Classification: Unit processes / Systems / Construction
Functional unit: The generation of 1 kW h (kW h) of electricity is adapted as the functional unit in this study, and the corresponding amounts of CO2 emissions and air pollutants (SO2,NOX and PM10)perkWh of electricity are chosen as the indicators for environmental performances, and the monetary value (US$) of per kW h of electricity is chosen as the indicator for cost-effectiveness evaluation.
LCI method principle: Attributional
LCI method approaches: Allocation
Generated by: Yunzhi Zhao, ll10088@163.com
Owner: Tiangong LCI Data Working Group
Review: Dependent internal review by Tiangong LCI Data Working Group
Amounts: no units in this file; such an amount is in the reference unit of its flow, which a separate flow dataset defines
copyright: false
licenseType: Free of charge for all users and uses

## General comment
The technical application of this life cycle assessment data is for the tower foundation construction of 24 units of 1.25MW wind turbines for a wind farm in Yulin City, Guangxi Zhuang Autonomous Region, China. This data is relevant for stakeholders involved in the development, deployment, and management of wind power generation facilities. It can inform decision-making processes regarding materials selection, design for minimal environmental impact, operational efficiencies, and end-of-life recycling strategies for wind power systems.

## Geography
In this study, the typical wind farm system in Yulin City of Guangxi of Zhuang Autonomous Region China was selected as a case study site. The developer, namely, China Huadian Corporation, is a state-owned enterprise and devotes to develop wind power by providing wind power equipment and related service in China [37].

## Reference product
- Wind tower foundation: 24; estimated
  Tower foundations

## Inputs
- Concrete: 8.3e6; calculated
  Tower foundations

## Deviations from the LCI method approaches
According to Introduced by the life cycle assessment approach [34,35], firstly the system boundaries boundary of wind energy as well as and thermal power are first identified. Then, methodology on evaluating both environmental and economic benefits is presented so that co-benefits can be quantified followed by the introduction of the methodologies on environmental as well as economic impacts evaluation from the co-benefits perspective.

## Data selection and combination
This wind farm is equipped with 24 wind turbines, with a production capacity of 1.25 MW for each turbine, and t the operation life for each turbine is expected to be 20 years. The life cycle of one wind power system can be divided into five stages, including (1) production, (2) transportation and installation, (3) power generation, (4) maintenance, and (5) end-of-life recycling and disposal. The input of non-renewable energy has been shown in each stage. In this study, raw material, fossil fuel consumption and corresponding emissions have been taken into account of a life cycle process. Meanwhile, cost-effectiveness of a wind farm is considered because the cost plays a very important role in operating a wind farm [38]. Considering the data reliability and availability, the cost data of this wind farm was mainly extracted from a feasibility report of one wind farm (with a designed capacity of the 49.5 MW) in Kang ping County of Liaoning province [39].

## Use advice
Users of this data set should heed the specific methodological guidelines provided within the life cycle assessment framework. These include defining system boundaries, evaluating environmental and economic impacts, and considering the cost-effectiveness of the wind farm operation. The data for CO2 emissions, air pollutants, and monetary values should be used to measure the environmental and economic performance of the wind farm throughout its life cycle stages. Users are advised to take into account variations in geographic and operational conditions that may affect the applicability of this data to other wind energy projects.

## Review details
Inventory: The internal review was done by several iteration steps concerning raw data validation, raw data documentation, representativity, completeness and consistency of modelling with regard to ISO 14040 and 14044.
