# Production of secondary and primary copper;Secondary copper;collection & transportation, mechanical processing (sorting & dismantling, recycling), secondary smelting and refining;copper waste

Dataset: ILCD process, Unit process, single operation
Geography: CN
Reference year: 2017
Classification: Unit processes / Materials production / Metals and semimetals
Functional unit: the functional unit is 1 kg secondary copper produced from six types of waste streams in China.
LCI method principle: Attributional
LCI method approaches: Allocation - market value
Generated by: Peng Wang, 2867919560@qq.com
Owner: Tiangong LCI Data Working Group
Review: Dependent internal review by Tiangong LCI Data Working Group
Amounts: no units in this file; such an amount is in the reference unit of its flow, which a separate flow dataset defines
copyright: false
licenseType: Free of charge for all users and uses

## General comment
The recovery and production process of secondary and primary copper described in this data set, specifically involves the collection and transportation of copper waste, followed by mechanical processing, including sorting and dismantling for recycling purposes, and ultimately secondary smelting and refining. The secondary copper produced is utilized for manufacturing new copper products, and replenishing copper stocks within various industries, including but not limited to construction, electrical, and electronic sectors.

## Geography
depicts the historical (2005–2017) copper waste management and secondary copper production in China

## Time period
depicts the historical (2005–2017) copper waste management and secondary copper production in China,

## Technology and included processes
Secondary copper is produced from the aforementioned EoL scrap (old scrap, including imported waste) and new scrap generated during the fabrication and manufacturing of copper products.

## Model description
The Ecoinvent 3.4 database was used to model the background system (Moreno Ruiz et al., 2017).

## Reference product
- Refined copper: 0.92; software or database
  Secondary copper

## Inputs
All rows: software or database
- process steam: 1.58
  steam, in chemical industry_steam production, in chemical industry
- Silica sand,silica sand: 0.0619
  silica sand needs to be replenished
- Lime: 0.0732
  lime
- Light fuel oil: 0.0675
  light fuel oil
- hard coal,hard coal,hard coal: 0.154
  hard coal
- oxygen: 0.0905
- water: 1.16
  tap water
- Copper scrap（Cu 95%）,Copper scrap（Cu 95%）: 1
  copper scrap needs to be supplemented
- Electricity: 0.407
  electricity

## Outputs
All rows: software or database
- antimony: 3e-6
  Antimony
- carbon monoxide,carbon monoxide (fossil): 0.002
  原文未区分bio和fossil，根据专家判断此处为fossil
- nitrogen dioxide: 0.001
  Nitrogen oxides
- sulfur dioxide: 0.003
  Sulfur dioxide
- zinc: 0.000375
- water: 0.000176

## Deviations from the LCI method approaches
The environmental impacts were conducted using the CMLCA 6.0 software.

## Data selection and combination
The historical copper waste generation from end-of-life (EoL) copper products in Chinawas explored using a stock-driven MFA method, which was estimated based on in-use stocks and lifespans of copper-containing products.

## Data treatment and extrapolations
the methods of dynamic MFA and prospective LCA are combined to model the copper stock-flow dynamics,

## Use advice
When applying this data set for life cycle assessment purposes, users should consider the historical context (2005–2017) of copper waste management and secondary copper production in China. Utilize methods such as dynamic Material Flow Analysis (MFA) combined with prospective Life Cycle Assessment (LCA) to understand the copper stock-flow dynamics. Make use of Ecoinvent 3.4 database for modeling the background system, and apply CMLCA 6.0 software for assessing environmental impacts. Note that the functional unit is 1 kg of secondary copper produced from six different waste streams in China, and integrate this consideration for comparative LCA studies and industrial planning strategies.

## Review details
Inventory: The internal review was done by several iteration steps concerning raw data validation, raw data documentation, representativity, completeness and consistency of modelling with regard to ISO 14040 and 14044.

## Data sources
- Dong, D. et al. Assessing China’s potential for reducing primary copper demand and associated environmental impacts in the context of energy transition and “Zero waste” policies. Waste Management 144, 454–467 (2022).
