# Soil Remediation;In Situ Remediation;Electrical Remediation;Site Investigation;Site Findings

Dataset: ILCD process, Unit process, single operation
Geography: KR
Reference year: 2021
Classification: Unit processes / Other Services / Repair and maintenance
Generated by: Wang Yipeng, wangyp@caep.org.cn
Owner: Tiangong LCI Data Working Group
Review: Dependent internal review by Tiangong LCI Data Working Group
Amounts: no units in this file; such an amount is in the reference unit of its flow, which a separate flow dataset defines
copyright: false
licenseType: Free of charge for all users and uses

## General comment
Soil quality sampling survey, including drilling, column transportation, sampling, etc.

## Technical purpose
This dataset describes an industrial process used for in-situ soil remediation, specifically electical remediation. It is applied in environmental engineering projects aiming to clean contaminated soils without excavation. This method is suitable for projects that require soil quality restoration to meet environmental safety standards. It can be involved in various stages of site investigation, including drilling and soil sampling.

## Reference product
- Results of on-site investigations: 1; measured

## Inputs
- Polyethylene,Polyethylene: 1.39; measured
  Manual sampling equipment (liner)
- Diesel: 0.0386; measured
  Vehicle (five times, 19.3 km, 10 km/1 L)

## Outputs
- Greenhouse Gases: 320; measured
- Nitrogen oxides: 0.0438; measured
- SOx: 0.000789; measured
- particles (> PM10): 0.00179; measured

## Use advice
When using this dataset for Life Cycle Assessment, ensure that you include the data associated with site investigation processes, such as drilling, rock column transportation, and soil sampling activities. Account for all the major raw materials and energy consumption relevant to these processes. Consider the geographic specificities and technological applicability of the soil remediation method, as well as potential environmental impacts. Ensure compliance with methodological guidance for boundary setting and data quality requirements.

## Review details
Inventory: The internal review was done by several iteration steps concerning raw data validation, raw data documentation, representativity, completeness and consistency of modelling with regard to ISO 14040 and 14044.

## Data sources
- Kim, DH., Yoo, JC., Hwang, BR. et al. Environmental assessment on electrokinetic remediation of multimetal-contaminated site: a case study. Environ Sci Pollut Res 21, 6751–6758 (2014).
