# clinker production;clinker, portland cement clinker;new dry process, ≥4000 t/d;copper tailings 16%

Dataset: ILCD process, Unit process, single operation
Geography: CN
Reference year: 2019
Classification: Materials production / Inorganic chemicals
Generated by: Siqi Yang, ysqsophia@gmail.com
Owner: Tiangong LCI Data Working Group
Review: Dependent internal review by Tiangong LCI Data Working Group
Amounts: no units in this file; such an amount is in the reference unit of its flow, which a separate flow dataset defines
copyright: false
licenseType: Free of charge for all users and uses

## General comment
New dry process for cement clinker production. Copper tailings content is 16%. End-of-pipe treatment: Bag filter with 85% efficiency.

## Technical purpose
The cement clinker described by this data set is produced using a new dry process with a daily production capacity of more than 4000 tonnes. It incorporates 16% copper tailings as part of its composition. This type of clinker is a key component in the production of Portland cement, which is a fundamental material in the construction industry, used for creating concrete, mortar, stucco, and grout for building, infrastructure, and general construction purposes.

## Model description
The LCA system boundary is the clinker calcination unit process.

## Reference product
- clinker, portland cement clinker: 1000
  Copper tailings blended cement clinker

## Inputs
- raw meal: 1420
  Copper -tail ore composite cement raw material
- tap water: 300
  Tap water
- coal, powder: 123.6
  coal powder
- electricity, medium voltage: 99.396
  Electricity. Upstream data source: CLCD-China-ECER 0.8.1.

## Outputs
- mercury: 6e-5
  Mercury [emissions to the atmosphere]
- ammonia: 0.03964
  Ammonia [emissions to the atmosphere]
- particles (> PM10): 0.326
  Total particulate matter [emissions to the atmosphere], with an unspecified particle size, is treated as PM > 10 micrometers in diameter.
- fluorene: 0.002551
  Fluorine [emissions to the atmosphere]
- chemical oxygen demand: 6e-5
  Chemical oxygen demand [emissions to water bodies]
- carbon dioxide (fossil): 724.2
  Carbon dioxide (fossil source) [emissions to the atmosphere]
- Nitrogen oxides: 1.557
  Nitrogen oxides [emissions to the atmosphere]
- Clean gas: 3927
  Waste gas [emissions to the atmosphere]
- Water (groundwater from technosphere, waste water): 2
  Wastewater [emissions to water bodies]
- sulfur dioxide: 0.349
  Sulfur dioxide [emissions to the atmosphere]

## Deviations from the LCI method approaches
A cement clinker lifecycle model was developed using eFootprint software system from Integrated Knowledge for our Environment, combined with CLCD quality assessment method, and LCA results were calculated.

## Data selection and combination
Main data source: represents the actual production data of enterprises and supply chains. Comes from actual company data and environmental impact assessment reports.

## Use advice
When using this data set for life cycle assessment, special attention should be given to the cut-off criteria based on the ISO140 series of international standards, which focus on material input in relation to product quality. Inclusions and exclusions should adhere to the following specifics: (1) Ignore upstream production data for any ordinary raw material with input weight less than 1% of the total process material inputs or high-purity substances less than 0.1% of the total input weight, provided the total ignored materials do not exceed 5% of the total raw material input. For system environmental emissions data, contributions to LCA outcomes should be calculated prior to deciding on its exclusion. (2) Upstream production data for low-value waste materials used as raw materials, such as tailings, can be disregarded. Users need to ensure that the system boundary of the LCA includes the clinker calcination unit process and apply the data selection principles accordingly.

## Review details
Inventory: The internal review was done by several iteration steps concerning raw data validation, raw data documentation, representativity, completeness and consistency of modelling with regard to ISO 14040 and 14044.

## Data sources
- 李畅. (2020). 江西省某铜尾矿资源化过程生命周期评价研究 [硕士, 江西理工大学].
