# Rare earth roasting;dysprosium;Bastnaesite/Monazite (B/M) Rare Earth Elements (REE) containing ore

Dataset: ILCD process, Unit process, single operation
Geography: CN
Reference year: 2010
Valid until: 2019
Classification: Unit processes / Materials production / Metals and semimetals
Functional unit: The goal of this investigation is to compare environmental impacts related to the production of 1 kg Dy (functional unit) from IAC (Southern China), from B/M ore (Bayan Obo), and from an eudialyte deposit (Norra Kärr) using the LCA method
LCI method principle: Attributional
LCI method approaches: Allocation - mass
Generated by: Tao Wang, twang@iue.ac.cn
Owner: Tiangong LCI Data Working Group
Review: Dependent internal review by Tiangong LCI Data Working Group
Amounts: no units in this file; such an amount is in the reference unit of its flow, which a separate flow dataset defines
copyright: false
licenseType: Free of charge for all users and uses

## General comment
Dysprosium, obtained from rare earth roasting processes in the designated regions, is a key material for manufacturing high-strength permanent magnets used in various advanced technological applications such as electric vehicles, wind turbines, and high-efficiency electrical motors. It is also utilized in nuclear reactors, as well as in the production of laser materials and commercial lighting.

## Geography
Southern China and Bayan Obo

## Technology and included processes
The goal of this investigation is to compare environmental impacts related to the production of 1 kg Dy (functional unit) from IAC (Southern China), from B/M ore (Bayan Obo), and from an eudialyte deposit (Norra Kärr) using the LCA method

## Reference product
- Rare Earth concentrate: 39.1; software or database
  RE concentrate: input for next process: Leaching

## Inputs
- natural gas,natural gas,natural gas: 2.88; calculated
  natural gas(own assumption, see general remarks), calculated with ASPEN PLUS
- Electricity: 9.9; calculated
  electricity mix 2014, based on Krüger.J (2001)
- sulphuric acid: 40.8; calculated
  sulphuric acid, liquid, at plant (adapted with CN: electricity mix 2014), based on Zhang and Edwards (2013)
- hydrated lime dry slaked: 9.38; calculated
  market for lime, hydraulic, for waste water treatment from flue gas cleaning, stoichiometric calculation
- transport in t*km,transport in t*km: 0.816; software or database
  transport, freight, lorry >32 metric ton, EURO3, 20 km

## Outputs
- Sludge: 18.35; software or database
  slag (deposited) [Stockpile goods], from waste water treatment, based on Xu et al. (2008)
- fluoride: 0.00405; software or database
  fluoride [Inorganic emissions to air], Rare Earth Control Standards (MEP, 2011)
- carbon dioxide (fossil): 10.052; calculated
  carbon dioxide [Inorganic emissions to air], stoichiometric calculation and combustion of natural gas
- sulfur dioxide: 0.22465; software or database
  sulphur dioxide [Inorganic emissions to air], calculation is based on Rare Earth Control Standards (MEP, 2011)
- sulphuric acid: 0.02021; software or database
  sulphuric acid [Inorganic emissions to air, calculation is based on Rare Earth Control Standards (MEP, 2011)
- particles (PM10): 0.02246; software or database
  dust (PM10) [Particles to air], calculation is based on Rare Earth Control Standards (MEP, 2011)
- Nitrogen oxides: 0.10783; software or database
  nitrogen oxides [Inorganic emissions to air], calculation is based on Rare Earth Control Standards (MEP, 2011)

## Deviations from the LCI method approaches
In this study, an allocation method based on the mass of produced REEs combined with their market prices (based on an international metals market analysis and pricing index company ) are considered, as usual for metals with strongly different prices. As the ores have different compositions, the allocation factor has to be assessed individually for each site.

## Use advice
Users of this data set should pay attention to the mass-based allocation method used to assess the environmental impacts associated with the production of dysprosium, which accounts for the varied market prices and composition of different rare earth ores. The allocation factor for the environmental impacts must be calculated individually for each mining site due to their unique ore compositions. It is essential to regularly update the input data concerning international metals market prices and any changes in ore composition to ensure accurate life cycle assessment results.

## Review details
Inventory: The internal review was done by several iteration steps concerning raw data validation, raw data documentation, representativity, completeness and consistency of modelling with regard to ISO 14040 and 14044.

## Data sources
- Zapp, P., Marx, J., Schreiber, A., Friedrich, B. & Voßenkaul, D. Comparison of dysprosium production from different resources by life cycle assessment. Resources, Conservation and Recycling 130, 248–259 (2018).
