# Petroleum coke calcining-aluminum electrolytic carbon anode production ; Calcined coke ; Petroleum coke

Dataset: ILCD process, Unit process, single operation
Geography: CN
Reference year: 2019
Classification: Unit processes / Energy carriers and technologies / Crude oil based fuels
Generated by: Chenling Fu, fu-chenling@tsinghua.edu.cn
Owner: Tiangong LCI Data Working Group
Review: Dependent internal review by Tiangong LCI Data Working Group
Amounts: no units in this file; such an amount is in the reference unit of its flow, which a separate flow dataset defines
copyright: false
licenseType: Free of charge for all users and uses

## General comment
This dataset describes the industrial process of calcining petroleum coke for the production of aluminum electrolytic carbon anodes. Calcined petroleum coke is commonly used as a raw material to produce carbon anodes essential for the aluminum smelting industry. The calcined coke provides the necessary carbon for the electrolysis process in aluminum production.

## Time period
Date of publication

## Reference product
- calcined coke: 1000; software or database
  Calcined coke

## Inputs
- electricity, high voltage, aluminium industry: 22.788; software or database
  natural gas
- Petroleum Coke: 1330; software or database
  Packaging/box clamp
- Water, unspecified natural origin: 2800; software or database

## Outputs
All rows: software or database
- carbon dioxide (fossil),carbon dioxide (fossil): 45.5
- municipal solid waste: 3.06
- particles, unspecified: 2.22
- chemical oxygen demand: 0.27
- sulfur dioxide: 0.00051
- carbon monoxide (fossil),carbon monoxide (fossil): 0.0153
- Nitrogen oxides: 0.0235
- methane (fossil): 5e-5

## Use advice
When using this dataset for Life Cycle Assessment, ensure that it accurately reflects the production process for the specific geographic region and technology used. Take into account the energy sources and emissions from the calcining process. If modeled as part of a product's life cycle, also consider the end-of-life phase, including potential recycling of materials. Pay attention to methodological consistency with other data used in the assessment.

## Review details
Inventory: The internal review was done by several iteration steps concerning raw data validation, raw data documentation, representativity, completeness and consistency of modelling with regard to ISO 14040 and 14044.

## Data sources
- YANG, Y., GUO, Y.-Q., ZHU, W.-S. & HUANG, J.-B. Environmental impact assessment of China’s primary aluminum based on life cycle assessment. Trans Nonferrous Met Soc China 29, 1784–1792 (2019).
