# Remediated soil ; In-situ soil remediation ; In-situ Multiphase Extraction

Dataset: ILCD process, Unit process, black box
Geography: BE
Reference year: 2015
Classification: Unit processes / Other Services / Repair and maintenance
Functional unit: The functional unit in this study is the removal of approximately 80% of the estimated 500 metric tons of contaminant mass from a subsurface soil volume of approximately 40,000 cubic meters and can be achieved.
Generated by: Yang Xintong, yangxt@caep.org.cn
Owner: Tiangong LCI Data Working Group
Review: Dependent internal review by Tiangong LCI Data Working Group
Amounts: no units in this file; such an amount is in the reference unit of its flow, which a separate flow dataset defines
copyright: false
licenseType: Free of charge for all users and uses

## General comment
In-situ Multiphase Extraction (MPE) is a remediation technology that extracts soil vapor, non-aqueous phase liquids and groundwater simultaneously. The vacuum extraction allows liquid flow rates to be increased around the extraction well, due to the increased pressure gradient from the groundwater being drawn downward. Lowering the pressure around the well in the subsurface also allows the non-aqueous phase liquid to volatilize more easily. The volatilized contaminants are removed from the subsurface via extraction wells. The extracted soil vapor, non-aqueous phase liquids and groundwater are treated on the surface via gas and liquid treatment trains.

## Geography
SRI Biochim is a 2 ha site located in the 250 ha industrial zone of Vilvoorde-Machelen just north east of Brussels.

## Time period
Publication time of literature

## Technology and included processes
The duration of treatment and total energy budget of the MPE system have been calculated based on the pilot study performed on the SRI Biochim site. The MPE system will require 15 years of operation, which is a conservative estimation. Some of the on-site components and parts that make up the soil vapor and groundwater treatment train will need to be replaced within the 15 years.

## Technical purpose
The technical usage of the described industrial process is primarily for in-situ soil remediation. Specifically, the multiphase extraction method is applied to contaminated land areas. It serves to effectively extract contaminant masses, such as soil vapor and non-aqueous phase liquids, from a large volume of subsurface soil, thereby returning the land to a non-hazardous state suitable for future use or redevelopment.

## Reference product
- Remediated soil: 7.708e7; measured

## Inputs
All rows: measured
- Polyethylene,Polyethylene: 3930.25
  For 3m Extraction wells, the amount of original useage is3.95t. Percentage of service life consumedis 0.995
- Polyethylene,Polyethylene: 4185.57
  For 5m Extraction wells, the amount of original useage is4.2066t. Percentage of service life consumedis 0.995
- Polyethylene,Polyethylene: 167.16
  For Well screens, the amount of original useage is0.168t. Percentage of service life consumedis 0.995
- bentonite: 1057.09
  For Well caps, the amount of original useage is1.0624t. Percentage of service life consumedis 0.995
- polyvinylchloride resin (S-PVC): 5.68642e8
  For piping, the amount of original useage is571500t. Percentage of service life consumedis 0.995
- Cast Iron: 0
  For Pump and knockout tank unit Type A (2 rotary vane pumps per unit), the amount of original useage is0.41t. Percentage of service life consumedis 0
- Cast Iron: 0
  For Pump and knockout tank unit Type B (2 rotary vane pumps per unit), the amount of original useage is0.5t. Percentage of service life consumedis 0
- Stainless Steel: 6666
  For Catalytic Oxidation Unit (CATOX), the amount of original useage is20t. Percentage of service life consumedis 0.3333
- Stainless Steel: 3832.95
  For Gas Washer, the amount of original useage is11.5t. Percentage of service life consumedis 0.3333
- Stainless Steel: 833.25
  For Quencher, the amount of original useage is2.5t. Percentage of service life consumedis 0.3333
- Cast Iron: 64.9935
  For Blower, the amount of original useage is0.195t. Percentage of service life consumedis 0.3333
- Stainless Steel: 0
  For Droplet Separator, the amount of original useage is0.1687t. Percentage of service life consumedis 0
- Cast Iron: 0
  For Pump on droplet separator, the amount of original useage is0.0185t. Percentage of service life consumedis 0
- Galvanized Corrugated Iron: 1610
  For Oil and water separator (including coalesces), the amount of original useage is3.22t. Percentage of service life consumedis 0.5
- Steel: 149.985
  For Double walled storage tank, the amount of original useage is0.45t. Percentage of service life consumedis 0.3333
- Cast Iron: 543.946
  For Granular Activated Carbon (GAC) vessel for gas-phase treatment, the amount of original useage is1.632t. Percentage of service life consumedis 0.3333
- Cast Iron: 371.963
  For Granular Activated Carbon vessel (GAC) for liquid-phase treatment, the amount of original useage is1.116t. Percentage of service life consumedis 0.3333
- Polyethylene,Polyethylene: 691.264
  For Stripping tower (including packing material), the amount of original useage is2.074t. Percentage of service life consumedis 0.3333
- Activated Carbon: 1.042e6
- Aluminum oxide (alumina): 810
- sodium hydroxide: 375.72
  Sodium Hydroxide used as 20% solution is 1 .8786 ton
- transport in t*km: 143871
  The assembly transported to the site from various manufacturers
- transport in t*km: 668
  Transport of NAPL sludge in double walled storage tank
- Electricity: 1.29329e7
- Diesel,Diesel: 0.24
- contaminated soil: 7.708e7

## Use advice
When utilizing the Life Cycle Assessment data for the in-situ Multiphase Extraction process, it is essential to incorporate the operational duration of the MPE system, which is conservatively estimated at 15 years. Note the requirement for replacement of some components within this timeframe. It's crucial to account for all primary raw materials and the essential energy consumption in the input-output flow calculations. The functional unit for this data set is the removal of an estimated 80% of contaminants from approximately 40,000 cubic meters of subsurface soil, which should be factored into the overall assessment.

## Review details
Inventory: The internal review was done by several iteration steps concerning raw data validation, raw data documentation, representativity, completeness and consistency of modelling with regard to ISO 14040 and 14044.

## Data sources
- Beames B., et al. Accounting for land-use efficiency and temporal variations between brownfield remediation alternatives in life-cycle assessment. Journal of Cleaner Production 101 (2015) 109e117
