# Production of perovskite photovoltaic module;semi-transparent module 1m2;spin coating method;lead iodide

Dataset: ILCD process, Unit process, single operation
Geography: US
Classification: Unit processes / Energy carriers and technologies / Electricity
Functional unit: 1 square meter perovskite photovoltaic module
Generated by: Xijing Yao, 15898832265@163.com
Owner: Tiangong LCI Data Working Group
Review: Dependent internal review by Tiangong LCI Data Working Group
Amounts: no units in this file; such an amount is in the reference unit of its flow, which a separate flow dataset defines
copyright: false
licenseType: Free of charge for all users and uses

## General comment
The main process steps include substrate glass production, deposition of perovskite layers, deposition of electron transport layers, and packaging.

## Technology and included processes
Spin-coating method: The spin-coating process is relatively simple, and it is the mainstream preparation method of perovskite light-absorbing layer. Firstly, PbX2 was dissolved in solvent and spun on the substrate to form a film; Then PbX2 is soaked in solution or spun on the substrate again to react with PbX2 film to produce perovskite.

## Technical purpose
The semi-transparent perovskite photovoltaic module, with a surface area of 1 square meter, is designed to be integrated into building facades or roof installations for electricity generation while allowing some natural light to pass through. It is primarily used for constructing building-integrated photovoltaic systems (BIPV) that blend in with the architectural design.

## Reference product
- Solar Module,Solar Module,Solar Module: 1; log-normal

## Inputs
All rows: log-normal
- nickel: 0.000634
  70 nm of HTL
- argon: 0.0757, 0.292 (2 entries)
- oxygen: 0.00021, 0.000292 (2 entries)
- dimethyl formamide: 0.00195
  Solvent
- ethanol: 0.00442
  Solvent
- nitrogen, total (excluding N2): 1.83
  Inert gas purging
- aluminium: 1.12e-5
  50 nm of AZO
- zinc oxide: 0.00036
- polyethylene terephthalate (PET) granulate: 0.0617
- Adhesives: 0.0202
- Electricity: 176.171
- Indium Tin Oxide (ITO) coated glass: 1.54; calculated
  Substrate
- Lead iodide: 0.000824; calculated
- methylammounium iodide: 0.000253; calculated
  190 nm
- Methylammonium Chloride: 1.33e-5; calculated
  10 nm
- [6,6]-phenyl-C61-butyric acid methyl ester: 0.0001; calculated
  50 nm
- Indium Tin Oxide (ITO) coated glass: 0.00308; calculated
  270 nm of electrode

## Outputs
All rows: log-normal
- dimethyl formamide: 0.00195
- ethanol: 0.0042
- argon: 0.368
- oxygen: 0.000327
- nitrogen, total (excluding N2): 1.83
- landfill of glas/inert waste: 1.544
  Landfill
- Nickel monoxide: 0.000405; calculated
- Lead iodide: 0.00033; calculated
- methylammounium iodide: 0.000101; calculated
- Methylammonium Chloride: 5.32e-6; calculated
- [6,6]-phenyl-C61-butyric acid methyl ester: 4e-5; calculated
- Aluminum doped Zinc Oxid: 0.000148; calculated

## Use advice
When utilizing data sets of the semi-transparent perovskite photovoltaic module, ensure that the life cycle assessments include the particularities of energy production and potential gains in energy efficiency due to natural lighting. Consideration should be given to the lifetime of the module, degradation rates, and energy payback time. Data users should also account for the variation in performance based on installation orientation and geographic location. It is advised to consider the recyclability of the materials at the end of the module's life cycle.

## Review details
Inventory: The internal review was done by several iteration steps concerning raw data validation, raw data documentation, representativity, completeness and consistency of modelling with regard to ISO 14040 and 14044.
