# Wind turbine manufactue ; 2 MW wind turbine (20)

Dataset: ILCD process, Unit process, black box
Geography: CN
Reference year: 2018
Classification: Unit processes / Energy carriers and technologies / Mechanical energy
Functional unit: The functional unit is 2 MW wind turbine.
LCI method principle: Attributional
LCI method approaches: Allocation
Generated by: Yunzhi Zhao, ll10088@163.com
Owner: Tiangong LCI Data Working Group
Review: Dependent internal review by Tiangong LCI Data Working Group
Amounts: no units in this file; such an amount is in the reference unit of its flow, which a separate flow dataset defines
copyright: false
licenseType: Free of charge for all users and uses

## General comment
The manufacturing process described pertains to the assembly of wind turbines specifically designed for large-scale wind farms. This process involves the production of 20 units of 2 MW wind turbines, suitable for deployment in an onshore 40 MW wind farm. The technical usage of these turbines is for the generation of renewable energy by harnessing wind power, supplying electricity to the grid, and contributing to sustainable development goals.

## Geography
In this study, an onshore 40 MW wind farm with 20 2WM wind turbines in North China was selected as the research object.

## Reference product
- Wind turbine: 20; measured
  20 × 2 MW wind turbine

## Inputs
All rows: measured
- Steel,Steel: 5.928e6
  Ground surface and Underground
- iron: 787000
  Ground surface and Underground
- copper: 48000
- Resin: 200000
- Plastic (unspecified): 48000
- Fiber glass: 486000
- Concrete: 2.328e7

## Deviations from the LCI method approaches
A process-based LCA, which follows the principles of ISO 14040[33] and ISO 14044 [34], was used to calculate the GHG emissions of wind turbines over the entire life cycle.

## Data selection and combination
The types and quantities of materials invested in this wind farm represent the average level of types and quantities of materials that are currently invested in wind farms in China (Table 2). All data used for the wind farm analysis were acquired from surveys. The GHG emission coefficients of the various materials were derived from the GaBi (a commercial software for LCA) database.

## Use advice
Users of this LCA data set should ensure the proper application of process-based lifecycle assessment methodologies, adhering to the standards outlined in ISO 14040 and ISO 14044. Attention must be given to the average input material types and quantities as representative for current Chinese wind farms, using the specific data points provided for accurate impact assessment. GHG emission factors must be sourced from reliable databases such as GaBi for applicability and consistency. It is important to define the functional unit properly as the wind turbine's ability to supply 2 MW power to ensure comparability and relevance in LCA studies.

## Review details
Inventory: The internal review was done by several iteration steps concerning raw data validation, raw data documentation, representativity, completeness and consistency of modelling with regard to ISO 14040 and 14044.

## Data sources
- Li, Q. et al. Life cycle assessment and life cycle cost analysis of a 40 MW wind farm with consideration of the infrastructure. Renewable and Sustainable Energy Reviews 138, 110499 (2021).
