# raw meal preparation;raw meal, portland cement raw meal;new dry process, ≥4000 t/d;copper tailings 16%

Dataset: ILCD process, Unit process, single operation
Geography: CN
Reference year: 2019
Classification: Materials production / Other mineralic materials
Generated by: Siqi Yang, ysqsophia@gmail.com
Owner: Tiangong LCI Data Working Group
Review: Dependent internal review by Tiangong LCI Data Working Group
Amounts: no units in this file; such an amount is in the reference unit of its flow, which a separate flow dataset defines
copyright: false
licenseType: Free of charge for all users and uses

## General comment
New dry process for cement raw meal production. Copper tailings content is 16%.

## Technical purpose
The described industrial process relates to the preparation of raw meal that is specifically used in the production of Portland cement through a new dry process. This system is capable of handling a capacity of 4000 tons per day or more, with a blend that includes 16% copper tailings in the raw mix.

## Model description
The LCA system boundary is the raw meal preparation unit process.

## Reference product
- raw meal: 1000
  Ordinary portlant cement raw material

## Inputs
- iron, powder: 30.7
  Iron powder. Upstream data source: CLCD-China-ECER 0.8.1.
- electricity, medium voltage: 64.8
  Electricity. Upstream data source: CLCD-China-ECER 0.8.1.
- limestone, crushed, for mill: 807.1
  Limestone. Upstream data source: CLCD-China-ECER 0.8.1.
- copper slag: 162.2
  Copper tailings. Upstream data source: Not considered.

## Outputs
- Clean gas: 814.2
  Waste gas [emitted to atmosphere]
- particles (> PM10): 0.039
  Total particulate matter [emitted to atmosphere], with an unspecified particle size, is treated as PM > 10 micrometers in diameter.

## Deviations from the LCI method approaches
A cement clinker lifecycle model was developed using eFootprint software system from Integrated Knowledge for our Environment, combined with CLCD quality assessment method, and LCA results were calculated.

## Data selection and combination
The inventory data of each raw material involved in the raw meal preparation stage is provided by the background database.

## Use advice
When using this dataset, consider that the life cycle assessment (LCA) system boundary is limited to the raw meal preparation unit process. Data for the raw materials should be sourced from a reliable background database to ensure accuracy. This dataset follows the ISO140 series cut-off rules for selection and omission of data: ignore upstream production data of materials when their weight is below 1% (0.1% for high-purity substances) of the total process raw material input, ensuring the ignored ordinary material mass does not surpass 5% of the material input. For environmental emissions, calculate each contribution to the LCA result before deciding on exclusion. Low-value waste products like tailings can be ignored in their upstream data, using them instead as raw materials.

## Review details
Inventory: The internal review was done by several iteration steps concerning raw data validation, raw data documentation, representativity, completeness and consistency of modelling with regard to ISO 14040 and 14044.

## Data sources
- 李畅. (2020). 江西省某铜尾矿资源化过程生命周期评价研究 [硕士, 江西理工大学].
