# Non-thickoil|Non-low-permeabilityfieldsless than80%|Secondaryoilrecovery+tertiaryoilrecovery|All sizes / 非稠油|非低渗透油田小于80%|二次采油+三次采油|所有规模

Dataset: ILCD process, Partly terminated system
Geography: CN
Reference year: 2019
Classification: Materials production / Other mineralic materials
Generated by: The data was created by the Office of the Second National Pollution Source Census of the Ministry of Ecology and Environment, and the data was organized by the TianGong Plan team for ILCD format / 生态环境部第二次全国污染源普查工作办公室创建数据，天工计划团队常慧敏整理数据为ILCD格式
Amounts: no units in this file; such an amount is in the reference unit of its flow, which a separate flow dataset defines
copyright: false

## Technology and included processes
the Technical of end-of-pipe management technology for pollution Petroleum-related wasteisHydrocyclone + filter + discharge，Its Technical efficiency of end-of-pipe management74，The formula for calculating the actual operation rate (k-value) of the end-of-pipe treatment facility is k = power consumption of treatment facilities (kWh/year) / (equipment rated power (kW) × equipment operating time (hours/year))
污染物指标石油类的末端治理技术是水力旋流器＋过滤器＋排放，其效率为74，末端治理设施实际运行率（k值）计算公式为k=污水治理设施年运行时间（小时/年）/正常生产时间（小时/年）

## Reference product
- Heavy oil: 1000; calculated
  原文件中描述污染物类别为Product，污染物指标为非稠油，此处对其进行了匹配工作，将其匹配到LCAflow库里面相最符合的流

## Outputs
All rows: calculated
- chemical oxygen demand: nan, nan, nan, nan, nan, nan, nan (7 entries)
  原文件中描述污染物类别为废水，污染物指标为化学需氧量，此处对其进行了匹配工作，将其匹配到LCAflow库里面相最符合的流
- Ammonia Nitrogen: nan, nan, nan, nan, nan, nan, nan (7 entries)
  原文件中描述污染物类别为废水，污染物指标为氨氮，此处对其进行了匹配工作，将其匹配到LCAflow库里面相最符合的流
- Nitrogen, organic bound: nan, nan, nan, nan, nan, nan, nan (7 entries)
  原文件中描述污染物类别为废水，污染物指标为总氮，此处对其进行了匹配工作，将其匹配到LCAflow库里面相最符合的流
- phenol: nan, nan, nan, nan, nan, nan, nan (7 entries)
  原文件中描述污染物类别为废水，污染物指标为挥发酚，此处对其进行了匹配工作，将其匹配到LCAflow库里面相最符合的流
- Waste water: nan, nan, nan, nan, nan (5 entries)
  原文件中描述污染物类别为废水，污染物指标为工业废水量，此处对其进行了匹配工作，将其匹配到LCAflow库里面相最符合的流
- Petroleum-related waste: nan, nan, nan, nan, nan, nan, nan (7 entries)
  原文件中描述污染物类别为废水，污染物指标为石油类，此处对其进行了匹配工作，将其匹配到LCAflow库里面相最符合的流

## Data sources
- 第二次全国污染源普查产排污核算系数手册（试用版）,二级代码07文件，在完整版文件中第59页
