# cement production|cement, ordinary portland cement|dry process rotary kiln

Dataset: ILCD process, LCI结果
Geography: CQ-CN
Reference year: 2005
Classification: Materials production / Other mineralic materials
Generated by: Siqi Yang
Amounts: no units in this file; such an amount is in the reference unit of its flow, which a separate flow dataset defines
copyright: false

## General comment
The Chongqing Xiaonanhai Cement Plant uses a dry rotary kiln production process to produce ordinary portland cement. The raw materials used in the production of ordinary portland cement at the Chongqing Xiaonanhai Cement Plant are limestone, clay, iron ore, and gypsum. The consumption of raw materials per ton of ordinary portland cement is 0.615 tons of limestone, 0.283 tons of clay, 0.213 tons of iron ore, and 0.286 tons of gypsum, without considering the utilization of industrial waste.

## Geography
Chongqing Xiaonanhai Cement Plant

## Model description
The system boundary refers to the process from raw material extraction to cement production. The functional unit is the amount of ordinary portland cement required to produce 1 m3 of concrete. The standard concrete mix ratio is 365 kg of cement, 601.2 kg of sand, and 1378.9 kg aggregate.

## Reference product
- cement, ordinary portland cement: 1000
  Ordinary Portland Cement

## Inputs
All rows: measured
- calcium carbonate: 643.836
  Limestone
- clay: 279.452
  Clay
- iron ore: 221.918
  Iron ore
- gypsum: 282.192
  Gupsum
- hard coal: 225.616
  Raw coal
- crude oil; 42.3 MJ/kg: 12.7397
  Crude oil
- natural gas; 44.1 MJ/kg: 1.08767
  Natural gas

## Outputs
- carbon dioxide: 711.644; measured
  CO2
- sulfur dioxide: 1.54795; measured
  SO2
- Nitrogen oxides: 1.47945; measured
  NOX
- carbon monoxide: 1.74247; measured
  CO

## Data treatment and extrapolations
The data for raw material extraction and cement manufacturing unit processes are accumulated.

## Sampling procedure
Chongqing Xiaonanhai Cement Plant is one of the first batch of cleaner production pilot enterprises identified by Chongqing Municipal Economic Commission in 2005, with three 3X11m vertical kiln cement production lines and two 350,000t new dry process rotary kiln production lines. The products are ordinary Portland cement and composite Portland cement.

## Data sources
- 熊文强 & 王熙. (2007). 生命周期评价在水泥企业清洁生产审核中的应用. 环境科学导刊, 2, 15–17.
