# Aluminum ingot casting ; Primary aluminum ingot ; Liquid primary aluminum ; 2017

Dataset: ILCD process, Unit process, single operation
Geography: CN
Reference year: 2021
Classification: Unit processes / Materials production / Metals and semimetals
Generated by: Zimeng Cai, caizm6178@163.com
Owner: Tiangong LCI Data Working Group
Review: Dependent internal review by Tiangong LCI Data Working Group
Amounts: no units in this file; such an amount is in the reference unit of its flow, which a separate flow dataset defines
copyright: false
licenseType: Free of charge for all users and uses

## General comment
This data set pertains to the process of casting primary aluminum ingots from liquid primary aluminum, a practice commonly occurring in 2017. Primary aluminum ingot, cast in this manner, is typically used in a wide range of industrial applications, including manufacturing of transport vehicles, construction materials, packaging, and in electrical industries for conductors. It is relevant when assessing the environmental impact of products or components made predominantly from cast aluminum.

## Time period
Date of publication

## Reference product
- aluminium, primary, ingot: 1000; missing unimportant

## Inputs
- aluminium, primary, liquid: 1025.67; missing unimportant
  EA/liquid Al

## Data selection and combination
The data in this study refers to the LCA data of PA, SA, electricity, and other background data. The PA data were obtained from statistical data sources, and the SA data were mainly obtained from the literatures. The background data were mainly derived from the Chinese localization LCA database CAS RCEES 2018, which was established by the Research Center for Eco-Environmental Sciences, Chinese Academy of Sciences and covers LCA data for energy, materials, transportation, waste management etc.

## Use advice
When utilizing this LCA data, users should pay careful attention to the scope of the assessed process, ensuring it corresponds with the intended application of the data in their environmental impact studies. It covers data for the year 2017 and should be used with regard to the technological practices prevalent at that time. The data should be adjusted if used for analyses in different regions or years, to reflect changes in technology and practice. Furthermore, any use of background data such as energy, materials, transportation, and waste management should consider the specific context and origin of the data, primarily from the Chinese localization LCA database CAS RCEES 2018. Data adjustment may be necessary to account for technological and methodological differences when applied to non-Chinese or more recent contexts.

## Review details
Inventory: The internal review was done by several iteration steps concerning raw data validation, raw data documentation, representativity, completeness and consistency of modelling with regard to ISO 14040 and 14044.

## Data sources
- Ding, N., Liu, N., Lu, B. & Yang, J. Life cycle greenhouse gas emissions of aluminum based on regional industrial transfer in China. J. Ind. Ecol. 25, 1657–1672 (2021).
