# Bioethanol ; enzyme production

Dataset: ILCD process
Geography: GLO
Classification: Unit processes / Energy carriers and technologies / Renewable fuels
Generated by: Jiayi Yuan, jiayi_y@mail.bnu.edu.cn
Owner: Tiangong LCI Data Working Group
Review: Dependent internal review by Tiangong LCI Data Working Group
Amounts: no units in this file; such an amount is in the reference unit of its flow, which a separate flow dataset defines
copyright: false
licenseType: Free of charge for all users and uses

## General comment
The enzyme production for bioethanol described by this dataset is intended for use in the conversion of biomass into bioethanol fuel, which is suitable for combustion in automobile engines. This process is applicable in the production of renewable and sustainable energy resources intended to replace or supplement traditional fossil fuels.

## Technology and included processes
Through data quality evaluation, 141 datasets with high completeness and consistency were selected from the reported 561 datasets in 474 published papers and classified into eight technological configurations determined by the pretreatment technology. The technological steps following pretreatment were all the same, although actual flows and parameter values vary, as observed in the literature

## Inputs
All rows: uniform; calculated
- calcium chloride: 0.011
- Sulphur oxides (as SO2): 0.028
- ammonia: 0.189
- Electricity: 22.68
- heat: 2.9
  heating
- Cooling water: 59.8
  cooling

## Data selection and combination
Global datasets were used where possible, since the study does not apply to any specific region. LCI data for one external process named “Combustion of bioethanol in car” were obtained from the GREET database

## Data treatment and extrapolations
We assessed the robustness of the modeling results through uncertainty propagation (Monte Carlo), discernibility analysis, global sensitivity analysis, and scenario variation.

## Use advice
When using this data set, consider the eight technological configurations determined by the pretreatment technology for bioethanol production. The following technological steps are consistent across the literature, but variations in actual flows and parameter values must be acknowledged. Global datasets have been utilized; therefore, adapt the data accordingly if applying to a specific region. The 'Combustion of bioethanol in car' process has been incorporated from the GREET database, and must be considered for life cycle inventory (LCI) comparisons. When interpreting the robustness of modeling results, apply Monte Carlo simulations and other analyses such as discernibility, global sensitivity, and scenario variation to manage uncertainties.

## Review details
Inventory: The internal review was done by several iteration steps concerning raw data validation, raw data documentation, representativity, completeness and consistency of modelling with regard to ISO 14040 and 14044.
