# Aluminum powder production ; Aluminum powder ; Cutting, drying, and crushing, CN

Dataset: ILCD process
Geography: CN
Classification: Unit processes / Materials production / Metals and semimetals
Generated by: Jiaqi Lu, wilsherelu@foxmail.com
Owner: Tiangong LCI Data Working Group
Review: Dependent internal review by Tiangong LCI Data Working Group
Amounts: no units in this file; such an amount is in the reference unit of its flow, which a separate flow dataset defines
copyright: false
licenseType: Free of charge for all users and uses

## General comment
The aluminum powder produced from this industrial process is typically used in applications requiring lightweight metal with high thermal conductivity and corrosion resistance. Common uses include in paints and pigments, pyrotechnics, aerospace components, and as a pigment in plastics and lightweight concrete.

## Reference product
- Powdered Aluminium: 1000; missing unimportant
  Aluminum powder products

## Inputs
- aluminium: 1470; missing unimportant
  Aluminum raw materials
- light fuel oil: 0.000647; missing unimportant
  Engine oil (equipment consumption)
- Electricity: 36.108; missing unimportant
- water: 450; missing unimportant

## Outputs
- sulfur dioxide: 0.00118; missing unimportant
  Sulfur dioxide [emission to atmosphere (unspecified type)]
- Particles (PM0.2 - PM2.5): 0.288; missing unimportant
  Total particulate matter [emitted to the atmosphere (unspecified type)]
- municipal solid waste deposition: 0.642; missing unimportant
  domestic waste
- waste water - untreated: 50; missing unimportant
  Domestic wastewater

## Use advice
When utilizing this LCA data, it is crucial to account for any associated environmental impacts during the production of aluminum powder, including energy consumption and emissions. Recycling and end-of-life scenarios should be considered. If the aluminum powder is used in a product with a long life cycle, its potential for recycling at the end of life should be included in the life cycle assessment.

## Review details
Inventory: The internal review was done by several iteration steps concerning raw data validation, raw data documentation, representativity, completeness and consistency of modelling with regard to ISO 14040 and 14044.

## Data sources
- 垣曲金华铝粉加工环评报告
