# Flange manufacture ; Flange of 1.5 MW wind turbine (Wind turbine flange- -the connector between wind turbine and tower)

Dataset: ILCD process, Unit process, single operation
Geography: NMG-CN
Reference year: 2017
Classification: Unit processes / Materials production / Metals and semimetals
Functional unit: The functional unit is 1.5 MW wind turbine
LCI method principle: Attributional
LCI method approaches: Allocation
Generated by: Yunzhi Zhao, ll10088@163.com
Owner: Tiangong LCI Data Working Group
Review: Dependent internal review by Tiangong LCI Data Working Group
Amounts: no units in this file; such an amount is in the reference unit of its flow, which a separate flow dataset defines
copyright: false
licenseType: Free of charge for all users and uses

## General comment
The 1.5 MW wind turbine flange serves as a critical connection component between the wind turbine and its supporting tower. This specially manufactured flange is integral to the structural integrity and operation of wind energy systems. It is used exclusively in the assembly of wind turbines that are rated at 1.5 MW, which are commonly installed in large wind farms for commercial electricity generation.

## Geography
The data regarding the parameters of wind power has been collected from Wang (2012). A wind farm equipped with 33 domestic 1.5 megawatts (MW) wind turbines is regarded as a case study to analyze the environmental impact and its substitution effects. The wind farm is located in the northeast of Inner Mongolia, the province in which most of China’s wind power is installed (Xia and Song, 2017).

## Reference product
- Wind turbine flange: 1; estimated

## Inputs
- iron: 12000; calculated
  Steel and iron

## Deviations from the LCI method approaches
The life cycle inventory for wind power is illustrated as follows. The production and manufacturing stage include the production of wind turbines, substations, and cables, which consume a large amount of energy and emit pollutants (Xue et al., 2015).

## Use advice
When utilizing the LCA data set for the manufacture of the 1.5 MW wind turbine flange, users should consider the technological applicability of the data. Ensure that the data aligns with the specific wind turbine model and its intended application for accurate environmental impact assessment. Consideration should be given to regional differences in manufacturing practices and potential variations in environmental impacts. The data should not be generalized for other types or sizes of wind turbines without proper adaptation. Make sure to account for any updates or technological advancements in wind turbine production that have occurred since the data was collected in 2012.

## Review details
Inventory: The internal review was done by several iteration steps concerning raw data validation, raw data documentation, representativity, completeness and consistency of modelling with regard to ISO 14040 and 14044.

## Data sources
- Li, H., Jiang, H.-D., Dong, K.-Y., Wei, Y.-M. & Liao, H. A comparative analysis of the life cycle environmental emissions from wind and coal power: Evidence from China. Journal of Cleaner Production 248, 119192 (2020).
