# Coke production;Coke;Coking(Z11)

Dataset: ILCD process, Unit process, single operation
Geography: CN
Reference year: 1998
Classification: Energy carriers and technologies / Hard coal based fuels
Generated by: Fuxiang, 1162850692@qq.com
Owner: Tiangong LCI Data Working Group
Review: Dependent internal review by Tiangong LCI Data Working Group
Amounts: no units in this file; such an amount is in the reference unit of its flow, which a separate flow dataset defines
copyright: false
licenseType: Free of charge for all users and uses

## General comment
来自表 4-15 Z11 钢厂生产吨材环境负荷编目表

## Time period
论文提到钢铁企业环境总体数据为1998年的吨钢环境基础数据。

## Technical purpose
Coke production, or coking (Z11), is a process used in the steel industry to convert coal into coke, which is a necessary raw material for blast furnace operations. The coke produced is used to support the production of steel and can sometimes be utilized in other industrial applications requiring a carbon source with high energy density.

## Reference product
- coke,Coke: 684; measured
  Coke

## Inputs
- Energy, geothermal, converted: 3420.93; measured
- water: 19282; measured

## Outputs
All rows: measured
- Dust (unspecified, from stack): 0.103
  soot
- Dust (unspecified, from stack): 0.342
- sulfur dioxide: 1.71
- cyanide: 0.002289
- phenol: 0.00106
  Volatile phenol
- Suspended solids, unspecified: 0.432972
- chemical oxygen demand: 0.272437
- Dust (unspecified, from stack): 3.42
  dust collection
- Spoil (deposited, hibernating in ground, non elementary flow): 3.352

## Use advice
This data set reflects the environmental load per ton of steel production from a specific study, based on a table (4-15 Z11) from a paper discussing overall environmental data for steel companies for the year 1998. Users of this data should ensure it's applicable to their temporal and geographical context and should also consider the technological evolution since 1998. If the data are used for current applications, adjustments may be required to account for changes in technology, regulations, and environmental impact factors.

## Review details
Inventory: The internal review was done by several iteration steps concerning raw data validation, raw data documentation, representativity, completeness and consistency of modelling with regard to ISO 14040 and 14044.

## Data sources
- 周和敏. 钢铁材料生产过程环境协调性评价研究. (北京工业大学, 2001).
