# Silica production ; industrial silicon from silicon ore

Dataset: ILCD process, Unit process, single operation
Geography: YL-GX-CN
Reference year: 2012
Classification: Unit processes / Materials production / Inorganic chemicals
Functional unit: For example, the generation of 1 kW h (kW h) of electricity is adapted as the functional unit in this study, and the corresponding amounts of CO2 emissions and air pollutants (SO2,NOX and PM10)perkWh of electricity are chosen as the indicators for environmental performances, and the monetary value (US$) of per kW h of electricity is chosen as the indicator for cost-effectiveness evaluation.
LCI method principle: Attributional
LCI method approaches: Allocation
Generated by: Yunzhi Zhao, ll10088@163.com
Owner: Tiangong LCI Data Working Group
Review: Dependent internal review by Tiangong LCI Data Working Group
Amounts: no units in this file; such an amount is in the reference unit of its flow, which a separate flow dataset defines
copyright: false
licenseType: Free of charge for all users and uses

## General comment
文献里只提供了部分污染物排放数据，未提供原材料和能源消耗清单

## Geography
In this study, the typical wind farm system in Yulin City of Guangxi of Zhuang Autonomous Region China was selected as a case study site. The developer, namely, China Huadian Corporation, is a state-owned enterprise and devotes to develop wind power by providing wind power equipment and related service in China [37].

## Technical purpose
The described process pertains to the life cycle of a wind farm system mainly for the production of renewable energy, particularly wind power. The process considers the entire lifecycle of wind turbines, from production to end-of-life stages, in Yulin City, Guangxi Zhuang Autonomous Region, China. The system's lifecycle is split into five stages: production, transportation and installation, power generation, maintenance, and end-of-life recycling and disposal. The wind farm, equipped with 24 turbines each with a capacity of 1.25 MW, is intended for environmentally friendly power generation with an emphasis on economic feasibility and cost-effectiveness. The focus on CO2, SO2, NOX, and PM10 emissions, as well as cost per kWh of electricity, indicates the application of this dataset in measuring and analyzing the environmental impact and economic performance of wind energy systems in comparison to traditional thermal power generation.

## Reference product
- silicon: 1; calculated
  文献里只提供了部分污染物排放数据，未提供原材料和能源消耗清单

## Outputs
- carbon dioxide (fossil): 0.904; calculated
- sulfur dioxide: 0.0006; calculated
- nitrous oxide: 0.0005; calculated
- particles (PM10): 8.4e-5; calculated

## Deviations from the LCI method approaches
According to Introduced by the life cycle assessment approach [34,35], firstly the system boundaries boundary of wind energy as well as and thermal power are first identified. Then, methodology on evaluating both environmental and economic benefits is presented so that co-benefits can be quantified followed by the introduction of the methodologies on environmental as well as economic impacts evaluation from the co-benefits perspective.

## Data selection and combination
This wind farm is equipped with 24 wind turbines, with a production capacity of 1.25 MW for each turbine, and t the operation life for each turbine is expected to be 20 years. The life cycle of one wind power system can be divided into five stages, including (1) production, (2) transportation and installation, (3) power generation, (4) maintenance, and (5) end-of-life recycling and disposal. The input of non-renewable energy has been shown in each stage. In this study, raw material, fossil fuel consumption and corresponding emissions have been taken into account of a life cycle process. Meanwhile, cost-effectiveness of a wind farm is considered because the cost plays a very important role in operating a wind farm [38]. Considering the data reliability and availability, the cost data of this wind farm was mainly extracted from a feasibility report of one wind farm (with a designed capacity of the 49.5 MW) in Kang ping County of Liaoning province [39].

## Use advice
When utilizing this LCA dataset, users should adhere to the outlined system boundaries and consider the full life cycle of the wind power system, which includes material sourcing, production, operation, and end-of-life management. Users should account for environmental aspects by measuring emissions of CO2, SO2, NOX, and PM10, as well as the economic aspects by considering the cost per kWh of electricity generated. It is crucial to integrate cost data from reliable sources such as feasibility reports from similar wind farms. Analysts may compare the environmental and economic performance of this system against traditional power generation methods to highlight the co-benefits of wind energy. Always ensure data consistency and proper methodological alignment with current LCA standards and practices. This information is vital for stakeholders looking to invest, develop, or improve wind power infrastructure with a focus on sustainability and economy.

## Review details
Inventory: The internal review was done by several iteration steps concerning raw data validation, raw data documentation, representativity, completeness and consistency of modelling with regard to ISO 14040 and 14044.
