# Soil remediation ; In-situ remediation ; Enhanced bioremediation ; Construction preparation ; Biological medium production

Dataset: ILCD process, Unit process, single operation
Geography: SH-CN
Classification: Other Services / Repair and maintenance
Generated by: Xiao Meng, xiaomeng@mail
Owner: Tiangong LCI Data Working Group
Review: Dependent internal review by Tiangong LCI Data Working Group
Amounts: no units in this file; such an amount is in the reference unit of its flow, which a separate flow dataset defines
licenseType: Free of charge for all users and uses

## General comment
CHC+ISB is used for site remediation, and during the construction preparation phase, the biomass culture medium is prepared.

## Geography
The aquifer in a certain area in Shanghai, China, is uniformly contaminated with chlorinated volatile organic compounds (CVOCs), with a surface area of 20,000 m2 and a depth of 50 m, with the water table located at a depth of 30 m.

## Technical purpose
This process describes the enhancement of in-situ bioremediation (EISB) for soil remediation using a biomass culture medium, specifically for the treatment of aquifers contaminated with chlorinated volatile organic compounds (CVOCs). The described process is applicable for large-scale in-situ treatment of contaminated land areas, thus catering to environmental engineering projects aimed at site decontamination.

## Reference product
- Biological Medium: 1; missing unimportant
  Biological medium（生物培养基）

## Inputs
- Water: 1.32705e6; measured
- Saccharum officinarum: 2.76183e6; software or database
  Sugarcane（甘蔗）
- triethylamine: 7860; software or database
- calcium carbonate: 17420; software or database
- ethanol: 4430; software or database
- Fodder yeast: 49140; software or database
  Fodder yeast（饲料酵母）
- process steam from heavy fuel oil: 102540; software or database
- process steam from light fuel oil: 138280; software or database
- Electricity: 39895.2; software or database
- Sodium hydroxide: 143990; software or database

## Use advice
When implementing EISB with this data set, users should ensure the specific condition of the site matches the process description: a uniformly contaminated aquifer with CVOCs, covering a surface area of 20,000 m2 and a depth of 50 m. The process is tailored for regions with a water table located at 30 m depth. Users must account for local regulations and potential deviations in contamination levels and soil types. Additionally, they should consider life cycle impacts of biomass culture medium production and the full extent of construction preparation. Special attention should be given to the monitoring of biodegradation rates and site-specific environmental conditions throughout the remediation process.

## Review details
Inventory: The internal review was done by several iteration steps concerning raw data validation, raw data documentation, representativity, completeness and consistency of modelling with regard to ISO 14040 and 14044.

## Data sources
- Ni, Z. et al. Comparative Life-Cycle Assessment of Aquifer Thermal Energy Storage Integrated with in Situ Bioremediation of Chlorinated Volatile Organic Compounds. Environ. Sci. Technol. 54, 3039–3049 (2020).
