# Remediated groundwater ; PRB system ;In situ groundwater remediation;BC suspension as wall materials

Dataset: ILCD process, Unit process, single operation
Geography: JS-CN
Reference year: 2024
Classification: Unit processes / Other Services / Repair and maintenance
Generated by: Yang Xintong, yangxt@caep.org.cn
Owner: Tiangong LCI Data Working Group
Review: Dependent internal review by Tiangong LCI Data Working Group
Amounts: no units in this file; such an amount is in the reference unit of its flow, which a separate flow dataset defines
copyright: false
licenseType: Free of charge for all users and uses

## General comment
Mix biomass charcoal with water to prepare BC suspension, and inject it into the groundwater aquifer through an injection well. When the groundwater flows through the biomass charcoal filling area, pollutants are adsorbed and purified.

## Time period
Publication time of literature

## Technical purpose
This bioremediation process involving a permeable reactive barrier (PRB) is utilized for in situ groundwater cleanup. Specifically, the biomass charcoal (BC) suspension is prepared and injected into an aquifer to adsorb contaminants as groundwater flows through it. Suitable for environmental management and pollution control in areas with groundwater contamination.

## Reference product
- Remediated groundwater: 1184.85; missing unimportant

## Inputs
All rows: missing unimportant
- Biochar: 96990
- transport in t*km: 9699
- injection well: 48
- contaminated groundwater: 1184.85
- Tap Water: 3.23299e6
- Electricity: 2909.7, 11638.8 (2 entries)

## Use advice
The provided data set describes a biosorption process using BC as a filling material within a PRB system for groundwater remediation. Users should apply this data in conjunction with local water quality guidelines and hydrogeological characteristics. Careful consideration of the biomass charcoal's adsorption capacity, the longevity of the barrier, and the flow rate of the local groundwater system is necessary. It is also important to factor in the variation of pollutants' concentration over time to accurately model the use phase behavior.

## Review details
Inventory: The internal review was done by several iteration steps concerning raw data validation, raw data documentation, representativity, completeness and consistency of modelling with regard to ISO 14040 and 14044.

## Data sources
- Ding, D. et al. Assessing the environmental impacts and costs of biochar and monitored natural attenuation for groundwater heavily contaminated with volatile organic compounds. Science of The Total Environment 846, 157316 (2022).
