# clinker production;clinker;suspension preheater kiln, cyclone preheater kiln

Dataset: ILCD process, Unit process, single operation
Geography: CN
Classification: Unit processes / Materials production / Other mineralic materials
Generated by: #REF!, ysqsophia@gmail.com
Owner: Tiangong LCI Data Working Group
Review: Dependent internal review by Tiangong LCI Data Working Group
Amounts: no units in this file; such an amount is in the reference unit of its flow, which a separate flow dataset defines
copyright: false
licenseType: Free of charge for all users and uses

## General comment
The suspension preheater kiln is taken as the research object.

## Technical purpose
The data set pertains to the production of cement clinker using a suspension preheater kiln and a cyclone preheater kiln, which are common types of industrial heat processing equipment used specifically in the cement industry. This material, represented by the data set, is typically used as an intermediate product in the manufacture of cement.

## Model description
The functional unit is 1 ton of cement clinker. Research scope: cement calcination.

## Reference product
- clinker: 1000
  Clinker

## Inputs
- limestone, crushed, for mill: 1216.5
  Limestone
- clay: 273.7
  Clay
- iron, powder: 25.5
  Iron powder
- hard coal; 26.3 MJ/kg: 183.3
  Coal-fired. The energy consumption data comes from the literature. The coal -fired thermal value is calculated at 5500kcal/kg, and the fixed carbon is calculated at 50%.
- Electricity: 297.18
  Electric. The energy consumption data comes from the literature.

## Outputs
- carbon dioxide (fossil): 854.45
  CO2. Coal-generated CO2 is calculated based on fixed carbon, while raw material CO2 is calculated based on calcium carbonate (CaO) content at 50%.
- carbon monoxide (fossil): 4.5
  CO. Due to lack of sources, other pollution data is obtained by reference to coal-fired power plants converted by energy consumption.
- sulfur dioxide: 0.2409
  SO2. NOx and SO2 levels are calculated based on average emission factors in the building materials industry.
- Nitrogen oxides: 1.8482
  NOx. NOx and SO2 levels are calculated based on average emission factors in the building materials industry.
- hydrocarbons (unspecified): 0.0311
  CxHy. Due to lack of sources, other pollution data is obtained by reference to coal-fired power plants converted by energy consumption.

## Use advice
When utilizing this data set for cement clinker production, it is crucial to consider the specific kiln technologies employed - suspension preheater kiln or cyclone preheater kiln. Ensure that your application relates to cement calcination and that the functional unit of 1 ton of cement clinker is appropriately scaled and applied to your assessment framework. Considerations should be made for systemic boundary selections, especially concerning the inclusion or exclusion of subsequent processes such as grinding, mixing, and other finishing processes in the production of cement.

## Review details
Inventory: The internal review was done by several iteration steps concerning raw data validation, raw data documentation, representativity, completeness and consistency of modelling with regard to ISO 14040 and 14044.

## Data sources
- 刘顺妮. (2003). 水泥-混凝土体系环境影响评价及其应用研究 [博士, 武汉理工大学].
