# Sinteringaccountinglink|Sinteredore|Ironore,limecokepowder,coalpowder,etc.|Beltsinteringmachine(head)|less than or equal to180 m2 / 烧结核算环节|烧结矿|铁矿、石灰焦粉、煤粉等|带式烧结机（机头）|小于等于180平方米

Dataset: ILCD process, Partly terminated system
Geography: CN
Reference year: 2019
Classification: Materials production / Other mineralic materials
Generated by: The data was created by the Office of the Second National Pollution Source Census of the Ministry of Ecology and Environment, and the data was organized by the TianGong Plan team for ILCD format / 生态环境部第二次全国污染源普查工作办公室创建数据，天工计划团队常慧敏整理数据为ILCD格式
Amounts: no units in this file; such an amount is in the reference unit of its flow, which a separate flow dataset defines
copyright: false

## Technology and included processes
the Technical of end-of-pipe management technology for pollution Sinteringis/，Its Technical efficiency of end-of-pipe management0
污染物指标工业废气量的末端治理技术是/，其效率为0

## Reference product
- Sintering: 1000; calculated
  原文件中描述污染物类别为Product，污染物指标为烧结矿，此处对其进行了匹配工作，将其匹配到LCAflow库里面相最符合的流，污染物指标备注为工业废气量

## Outputs
All rows: calculated
- Exhaust gas: 2800
  原文件中描述污染物类别为废气，污染物指标为工业废气量，此处对其进行了匹配工作，将其匹配到LCAflow库里面相最符合的流，污染物指标备注为工业废气量
- particles (PM2.5 - PM10): 0.0654, 0.02943, 0.02616, 6.54 (4 entries)
  原文件中描述污染物类别为废气，污染物指标为颗粒物，此处对其进行了匹配工作，将其匹配到LCAflow库里面相最符合的流，污染物指标备注为颗粒物
- sulfur dioxide: nan
  原文件中描述污染物类别为废气，污染物指标为二氧化硫，此处对其进行了匹配工作，将其匹配到LCAflow库里面相最符合的流，污染物指标备注为二氧化硫，产污系数备注为式中，M含铁料、M固燃分别为单位合格产品的含铁料及固态燃料消耗量，单位为“千克/吨-烧结矿”；S含铁料、S固燃分别为原料及固态燃料的平均含硫率；S烧结矿为合格烧结矿的平均含硫率。详细参见本手册2.4节
- sulfur dioxide: nan, nan, nan, nan (4 entries)
  原文件中描述污染物类别为废气，污染物指标为二氧化硫，此处对其进行了匹配工作，将其匹配到LCAflow库里面相最符合的流，污染物指标备注为二氧化硫
- Nitrogen oxides: 0.6715, 0.4345, 0.1185, 0.79 (4 entries)
  原文件中描述污染物类别为废气，污染物指标为氮氧化物，此处对其进行了匹配工作，将其匹配到LCAflow库里面相最符合的流，污染物指标备注为氮氧化物

## Data sources
- 第二次全国污染源普查产排污核算系数手册（试用版）,四级代码3110文件，在完整版文件中第4111页
