# Utilization of high alumina fly ash ; Mullite ceramics (main product) and calcium silicate (by-product) ; High alumina fly ash (HAFA)

Dataset: ILCD process, Unit process, single operation
Geography: NMG-CN
Reference year: 2017
Classification: Unit processes / Materials production / Other mineralic materials
Generated by: Changqing Xu, xcq@bit.edu.cn
Owner: Tiangong LCI Data Working Group
Review: Dependent internal review by Tiangong LCI Data Working Group
Amounts: no units in this file; such an amount is in the reference unit of its flow, which a separate flow dataset defines
copyright: false
licenseType: Free of charge for all users and uses

## General comment
利用高铝飞灰 (HAFA);主要产品莫来石陶瓷;副产品硅酸钙 (CaSiO3)

## Time period
Year of publication

## Technical purpose
The main product derived from this process, mullite ceramics, is typically used in various high-temperature applications due to its high thermal stability, low thermal expansion, and good mechanical strength. Potential applications include refractory materials in furnaces, protective coatings for metals, and structural components in electronics and aerospace industries. The by-product, calcium silicate, is often utilized as a construction material, particularly in insulation and fireproofing due to its thermal insulation properties and fire resistance.

## Reference product
- ash: 1000; input; measured
  功能单位是应用1000kg高铝粉煤灰

## Inputs
- electricity, high voltage, aluminium industry: 246.564; software or database
- Sodium hydroxide: 190.41; measured
- hydrogen chloride: 513.7; measured
- carbon dioxide, in chemical industry: 0; measured
- quicklime, in pieces, loose: 254.79; measured
  CaO,生石灰
- freshwater: 2800.68; measured
  fresh water
- hard coal: 500; software or database

## Outputs
All rows: measured
- sanitary ceramics: 684.93
  主要产品Mullite ceramics
- Calcium silicate: 479.45
  副产品硅酸钙CaSiO3，无条目
- silica fume, densified: 0
  副产品fume silica
- aluminium hydroxide: 0
  副产品high-white aluminum hydroxide (HWAH)
- chemical oxygen demand: 0.0212
- carbon dioxide (fossil),carbon dioxide (fossil): 1143.84
- sulfur dioxide: 0.11
- Nitrogen oxides: 0.11
- municipal solid waste: 450

## Use advice
When using this dataset for Life Cycle Assessment (LCA), it is crucial to ensure its applicability to the specific product system being analyzed. Consider the geographic and technological relevance of the data, matching the technical quality level of the mullite ceramics and calcium silicate to the intended end use. Users should account for transportation impacts if this dataset's geographical context differs from the region of product deployment. Methodological considerations, such as system boundaries regarding the inclusion or exclusion of upstream and downstream processes (e.g., raw material extraction, waste management), should be clearly defined and consistent with LCA standards.

## Review details
Inventory: The internal review was done by several iteration steps concerning raw data validation, raw data documentation, representativity, completeness and consistency of modelling with regard to ISO 14040 and 14044.

## Data sources
- Yang, S. et al. Assessment and comparison of three high-aluminum fly ash utilization scenarios in Inner Mongolia, China using an eco-efficiency indicator. Waste Manag. Res. 35, 515–524 (2017).
