# Aluminum ingot casting ; Primary aluminum ingot ; Liquid primary aluminum ; 2012

Dataset: ILCD process, Unit process, single operation
Geography: CN
Reference year: 2021
Classification: Unit processes / Materials production / Metals and semimetals
Generated by: Zimeng Cai, caizm6178@163.com
Owner: Tiangong LCI Data Working Group
Review: Dependent internal review by Tiangong LCI Data Working Group
Amounts: no units in this file; such an amount is in the reference unit of its flow, which a separate flow dataset defines
copyright: false
licenseType: Free of charge for all users and uses

## General comment
The aluminum ingot casting process described in this LCA data set primarily pertains to the production of primary aluminum ingots from liquid primary aluminum. This process is crucial for the creation of aluminum-based products and is applicable in various industries, including but not limited to the automotive, aerospace, construction, and packaging industries. The aluminum ingots produced can be further processed into different forms such as sheets, rods, or profiles for specific end-uses.

## Time period
Date of publication

## Reference product
- aluminium, primary, ingot: 1000; software or database

## Inputs
- aluminium, primary, liquid: 1094.09; software or database

## Data selection and combination
The data in this study refers to the LCA data of PA, SA, electricity, and other background data. The PA data were obtained from statistical data sources, and the SA data were mainly obtained from the literatures. The background data were mainly derived from the Chinese localization LCA database CAS RCEES 2018, which was established by the Research Center for Eco-Environmental Sciences, Chinese Academy of Sciences and covers LCA data for energy, materials, transportation, waste management etc.

## Use advice
The LCA data provided should be used with attention to methodological consistency within the scope of the study. Users should ensure the geographical and technological relevance of the data, taking into account the origin of the primary aluminum and the intended application of the aluminum ingots. When integrating this data with broader LCA models, considerations such as technology development and potential changes since the data's publication date in 2012 should be factored in. For accurate modeling, users may need to update the data to reflect current production practices and regional energy profiles.

## Review details
Inventory: The internal review was done by several iteration steps concerning raw data validation, raw data documentation, representativity, completeness and consistency of modelling with regard to ISO 14040 and 14044.

## Data sources
- Ding, N., Liu, N., Lu, B. & Yang, J. Life cycle greenhouse gas emissions of aluminum based on regional industrial transfer in China. J. Ind. Ecol. 25, 1657–1672 (2021).
