# cement production|cement, common portland cement|China average

Dataset: ILCD process, LCI结果
Geography: CN
Reference year: 2010
Classification: Materials production / Other mineralic materials
LCI method principle: Other
Generated by: Siqi Yang
Amounts: no units in this file; such an amount is in the reference unit of its flow, which a separate flow dataset defines
copyright: false

## General comment
The average data for China are based on market shares for each cement production process technology and size, and the respective raw material consumption. Market shares of cement production process technologies and sizes: large new dry process (>4000 t-clinker/day), 29.32%; medium new dry process (2000-4000 t-clinker/day), 23.21%; small new dry process (<2000 t-clinker/day), 9.29%; shaft kiln (<2000 t-clinker/day), 38.18%.

## Model description
Take the common cement with a content of 70% clinker produced in China as the functional unit. The boundaries of the system are defined as including raw material extraction and processing, energy production, cement manufacturing and sales, as well as the intermediate transportation processes involved.

## Reference product
- cement, common portland cement: 1000
  General cement with a clinker content of 70%

## Inputs
All rows: calculated
- calcium carbonate: 1600
  Limestone
- clay: 130
  Clay
- sandstone: 0.339
  Sandstone
- gypsum: 50.5
  Gypsum
- Water (fresh water): 369
  Freshwater
- hard coal, run-of-mine: 192
  Coal. Note: the term used in the literature is "raw coal", which is expressed as "coal" in LCI. Since the specific type cannot be determined, the term "raw coal" is still used as in the previous section.
- crude oil; 42.3 MJ/kg: 8.25
  Petroleum
- natural gas; 44.1 MJ/kg: 0.00047
  Natural gas

## Outputs
All rows: calculated
- carbon dioxide: 698
  CO2
- carbon monoxide: 0.126
  CO
- methane: 0.897
  CH4
- Nitrogen oxides: 1.38
  NOX
- sulfur dioxide: 0.813
  SO2
- chemical oxygen demand: 0.242
  COD
- particles (> PM10): 0.218
  PM10
- particles (PM2.5 - PM10): 0.196
  PM2.5-10
- particles (PM2.5): 0.41
  PM2.5
- particles (> PM10): 0.207
  Particulate matter (PM), with an unspecified particle size, is treated as PM > 10 micrometers in diameter.

## Deviations from the LCI method approaches
Using SimaPro 7.1 software, connect the subsystems of cement production, establish an LCA model for China's cement industry, and calculate the LCI inventory of the functional unit cement product.

## Data selection and combination
The life cycle inventories for electricity generation and coal mining are based on data collected by Sichuan University in the earlier stage. The life cycle inventory for road transportation is from the master's thesis of Ma Liping. For limestone mining and gypsum production, due to a lack of data, inventory data from the European Ecoinvent database are used as approximations. Considering the transportation of raw materials and final products in the cement production process, the assumed transportation distances are as follows: 3 km for road transportation of raw materials such as limestone and clay; 50 km for road transportation of coal; and 200 km for road transportation of cement products.

## Data sources
- 姜睿 & 王洪涛. (2010). 中国水泥工业的生命周期评价. 化学工程与装备, 4, 183–187.
