# Soil and groundwater remediation;Ex-situ;groundwater pump and treat;construction;Transportation of equipment and materials

Dataset: ILCD process, Unit process, single operation
Geography: JS-CN
Reference year: 2022
Classification: Other Services / Repair and maintenance
Generated by: Wang Ning, wang_ning@caep.org.cn
Owner: Tiangong LCI Data Working Group
Review: Dependent internal review by Tiangong LCI Data Working Group
Amounts: no units in this file; such an amount is in the reference unit of its flow, which a separate flow dataset defines
licenseType: Free of charge for all users and uses

## General comment
Distance 100 km assumed, transport of GeoProbe 4.65 t, plus other construction materials.

## Geography
a closed pesticide manufacturing plant located in Jiangsu Province, China.

## Technical purpose
The described industrial process is used for the remediation of soil and groundwater contaminated at a closed pesticide manufacturing plant located in Jiangsu Province, China. The ex-situ groundwater pump and treat approach involves the extraction of groundwater to remove contaminants. The construction phase includes the transportation of remediation equipment, such as the GeoProbe unit weighing 4.65 tons, and additional construction materials over a distance of 100 km.

## Reference product
- Equipment and Materials Arriving on Site: 1; article inperiodical
  到达场地的 GeoProbe和其他材料

## Inputs
- transport in t*km: 445926; article inperiodical

## Use advice
When applying this data set in Life Cycle Assessment (LCA), ensure to match the geographical context and technological applicability to the assessed scenario. Account for any transportation of equipment and materials based on the assumed 100 km distance. The specific use phase behavior, such as the duration and intensity of the remediation, should be modeled according to the characteristics of the site and the contamination profile. Additionally, consider the end-of-life phase for the equipment and any possible recycling or disposal impacts in the LCA.

## Review details
Inventory: The internal review was done by several iteration steps concerning raw data validation, raw data documentation, representativity, completeness and consistency of modelling with regard to ISO 14040 and 14044.

## Data sources
- Ding, D. et al. Assessing the environmental impacts and costs of biochar and monitored natural attenuation for groundwater heavily contaminated with volatile organic compounds. Science of The Total Environment 846, 157316 (2022).
