# Fruit jelly ; Fresh fruit ; Blending + canning + sterilization + cooling ; All sizes; NESPS2 / 水果冻 ; 新鲜水果 ; 配料+罐装+杀菌+冷却 ; 所有规模 ; 全国第二次污染普查数据

Dataset: ILCD process, Unit process, single operation
Geography: CN
Reference year: 2019
Classification: Reference Parameters / Materials production / Food and renewable raw materials
Generated by: The data was created by the Office of the Second National Pollution Source Census of the Ministry of Ecology and Environment, and the data was organized by the TianGong Plan team for ILCD format / 生态环境部第二次全国污染源普查工作办公室创建数据，天工计划团队常慧敏整理数据为ILCD格式
Owner: Tiangong LCI Data Working Group / 天工LCI数据工作小组
Review: Dependent internal review by Tiangong LCI Data Working Group / 天工LCI数据工作小组
Amounts: no units in this file; such an amount is in the reference unit of its flow, which a separate flow dataset defines
copyright: false
licenseType: Free of charge for all users and uses

## General comment
the Technical of end-of-pipe management technology for pollution chemical oxygen demandisChemical coagulation + bio-contact oxidation process，Its Technical efficiency of end-of-pipe management85，The formula for calculating the actual operation rate (k-value) of the end-of-pipe treatment facility is k = operating time of dust removal facilities (hours/year) / production time of production unit (hours/year)

## Technical purpose
这项技术的使用说明描述了包括新鲜水果混合、罐装、杀菌和冷却工艺在内的水果冻生产，适用于所有规模的操作。 所述的尾端处理技术用于通过各种组合处理氨氮和总磷污染，包括厌氧和好氧生物处理、化学混凝、序批反应器（SBR）和生物接触氧化过程。 这些技术在处理氮和磷污染物以及工业废物管理中的化学需氧量（COD）时，达到了不同的效率。

## Reference product
- Jelly: 1000; calculated
  源文件中描述为为水果冻，此处对其进行了匹配工作，将其匹配到LCAflow库里面相最符合的流

## Outputs
All rows: calculated
- Ammonia Nitrogen: 0.000518
  the Technical of end-of-pipe management technology for pollution Ammonia NitrogenisAnaerobic biological treatment + aerobic biological treatment，Its Technical efficiency of end-of-pipe management86，The formula for calculating the actual operation rate (k-value) of the end-of-pipe treatment facility is /
  污染物指标氨氮的末端治理技术是厌氧生物+好氧生物处理法，其效率为86，末端治理设施实际运行率（k值）计算公式为k=污水治理设施耗电量（千瓦时/年）/污水治理设施运行时间（小时/年）/污水治理设施总功率（千瓦）。原文件中描述污染物类别为废水，污染物指标为氨氮，此处对其进行了匹配工作，将其匹配到LCAflow库里面相最符合的流
- Ammonia Nitrogen: 0.000518
  the Technical of end-of-pipe management technology for pollution Ammonia NitrogenisChemical coagulation + SBR，Its Technical efficiency of end-of-pipe management86，The formula for calculating the actual operation rate (k-value) of the end-of-pipe treatment facility is /
  污染物指标氨氮的末端治理技术是化学混凝+SBR法，其效率为86，末端治理设施实际运行率（k值）计算公式为k=污水治理设施耗电量（千瓦时/年）/污水治理设施运行时间（小时/年）/污水治理设施总功率（千瓦）。原文件中描述污染物类别为废水，污染物指标为氨氮，此处对其进行了匹配工作，将其匹配到LCAflow库里面相最符合的流
- phosphorus, total: 0.00052
  the Technical of end-of-pipe management technology for pollution phosphorus, totalisAnaerobic biological treatment + aerobic biological treatment，Its Technical efficiency of end-of-pipe management60，The formula for calculating the actual operation rate (k-value) of the end-of-pipe treatment facility is /
  污染物指标总磷的末端治理技术是厌氧生物+好氧生物处理法，其效率为60，末端治理设施实际运行率（k值）计算公式为k=污水治理设施耗电量（千瓦时/年）/污水治理设施运行时间（小时/年）/污水治理设施总功率（千瓦）。原文件中描述污染物类别为废水，污染物指标为总磷，此处对其进行了匹配工作，将其匹配到LCAflow库里面相最符合的流
- phosphorus, total: 0.00052
  the Technical of end-of-pipe management technology for pollution phosphorus, totalisChemical coagulation + SBR，Its Technical efficiency of end-of-pipe management60，The formula for calculating the actual operation rate (k-value) of the end-of-pipe treatment facility is k = operating time of dust removal facilities (hours/year) / production time of production unit (hours/year)
  污染物指标总磷的末端治理技术是化学混凝+SBR法，其效率为60，末端治理设施实际运行率（k值）计算公式为k=污水治理设施耗电量（千瓦时/年）/污水治理设施运行时间（小时/年）/污水治理设施总功率（千瓦）。原文件中描述污染物类别为废水，污染物指标为总磷，此处对其进行了匹配工作，将其匹配到LCAflow库里面相最符合的流
- phosphorus, total: 0.00065
  the Technical of end-of-pipe management technology for pollution phosphorus, totalisChemical coagulation + aerobic biological treatment，Its Technical efficiency of end-of-pipe management50，The formula for calculating the actual operation rate (k-value) of the end-of-pipe treatment facility is /
  污染物指标总磷的末端治理技术是化学混凝+好氧生物处理法，其效率为50，末端治理设施实际运行率（k值）计算公式为k=污水治理设施耗电量（千瓦时/年）/污水治理设施运行时间（小时/年）/污水治理设施总功率（千瓦）。原文件中描述污染物类别为废水，污染物指标为总磷，此处对其进行了匹配工作，将其匹配到LCAflow库里面相最符合的流
- phosphorus, total: 0.00065
  the Technical of end-of-pipe management technology for pollution phosphorus, totalisChemical coagulation + bio-contact oxidation process，Its Technical efficiency of end-of-pipe management50，The formula for calculating the actual operation rate (k-value) of the end-of-pipe treatment facility is k = operating time of denitration facility (hours/year) / production device production time (hours/year)
  污染物指标总磷的末端治理技术是化学混凝+生物接触氧化法，其效率为50，末端治理设施实际运行率（k值）计算公式为k=污水治理设施耗电量（千瓦时/年）/污水治理设施运行时间（小时/年）/污水治理设施总功率（千瓦）。原文件中描述污染物类别为废水，污染物指标为总磷，此处对其进行了匹配工作，将其匹配到LCAflow库里面相最符合的流
- Ammonia Nitrogen: 0.000925
  the Technical of end-of-pipe management technology for pollution Ammonia NitrogenisChemical coagulation + aerobic biological treatment，Its Technical efficiency of end-of-pipe management75，The formula for calculating the actual operation rate (k-value) of the end-of-pipe treatment facility is k = operating time of dust removal facilities (hours/year) / production time of production unit (hours/year)
  污染物指标氨氮的末端治理技术是化学混凝+好氧生物处理法，其效率为75，末端治理设施实际运行率（k值）计算公式为k=污水治理设施耗电量（千瓦时/年）/污水治理设施运行时间（小时/年）/污水治理设施总功率（千瓦）。原文件中描述污染物类别为废水，污染物指标为氨氮，此处对其进行了匹配工作，将其匹配到LCAflow库里面相最符合的流
- Ammonia Nitrogen: 0.000925
  the Technical of end-of-pipe management technology for pollution Ammonia NitrogenisChemical coagulation + bio-contact oxidation process，Its Technical efficiency of end-of-pipe management75，The formula for calculating the actual operation rate (k-value) of the end-of-pipe treatment facility is /
  污染物指标氨氮的末端治理技术是化学混凝+生物接触氧化法，其效率为75，末端治理设施实际运行率（k值）计算公式为k=污水治理设施耗电量（千瓦时/年）/污水治理设施运行时间（小时/年）/污水治理设施总功率（千瓦）。原文件中描述污染物类别为废水，污染物指标为氨氮，此处对其进行了匹配工作，将其匹配到LCAflow库里面相最符合的流
- phosphorus, total: 0.0013
  the Technical of end-of-pipe management technology for pollution phosphorus, totalis/，The formula for calculating the actual operation rate (k-value) of the end-of-pipe treatment facility is /
  污染物指标总磷的末端治理技术是/，末端治理设施实际运行率（k值）计算公式为/。原文件中描述污染物类别为废水，污染物指标为总磷，此处对其进行了匹配工作，将其匹配到LCAflow库里面相最符合的流
- Ammonia Nitrogen: 0.0037
  the Technical of end-of-pipe management technology for pollution Ammonia Nitrogenis/，The formula for calculating the actual operation rate (k-value) of the end-of-pipe treatment facility is k = operating time of dust removal facilities (hours/year) / production time of production unit (hours/year)
  污染物指标氨氮的末端治理技术是/，末端治理设施实际运行率（k值）计算公式为/。原文件中描述污染物类别为废水，污染物指标为氨氮，此处对其进行了匹配工作，将其匹配到LCAflow库里面相最符合的流
- Nitrogen, organic bound: 0.00377
  the Technical of end-of-pipe management technology for pollution Nitrogen, organic boundisAnaerobic biological treatment + aerobic biological treatment，Its Technical efficiency of end-of-pipe management71
  污染物指标总氮的末端治理技术是厌氧生物+好氧生物处理法，其效率为71，末端治理设施实际运行率（k值）计算公式为k=污水治理设施耗电量（千瓦时/年）/污水治理设施运行时间（小时/年）/污水治理设施总功率（千瓦）。原文件中描述污染物类别为废水，污染物指标为总氮，此处对其进行了匹配工作，将其匹配到LCAflow库里面相最符合的流
- Nitrogen, organic bound: 0.00377
  the Technical of end-of-pipe management technology for pollution Nitrogen, organic boundisChemical coagulation + SBR，Its Technical efficiency of end-of-pipe management71，The formula for calculating the actual operation rate (k-value) of the end-of-pipe treatment facility is /
  污染物指标总氮的末端治理技术是化学混凝+SBR法，其效率为71，末端治理设施实际运行率（k值）计算公式为k=污水治理设施耗电量（千瓦时/年）/污水治理设施运行时间（小时/年）/污水治理设施总功率（千瓦）。原文件中描述污染物类别为废水，污染物指标为总氮，此处对其进行了匹配工作，将其匹配到LCAflow库里面相最符合的流
- Nitrogen, organic bound: 0.0039
  the Technical of end-of-pipe management technology for pollution Nitrogen, organic boundisChemical coagulation + bio-contact oxidation process，Its Technical efficiency of end-of-pipe management70，The formula for calculating the actual operation rate (k-value) of the end-of-pipe treatment facility is /
  污染物指标总氮的末端治理技术是化学混凝+生物接触氧化法，其效率为70，末端治理设施实际运行率（k值）计算公式为k=污水治理设施耗电量（千瓦时/年）/污水治理设施运行时间（小时/年）/污水治理设施总功率（千瓦）。原文件中描述污染物类别为废水，污染物指标为总氮，此处对其进行了匹配工作，将其匹配到LCAflow库里面相最符合的流
- Nitrogen, organic bound: 0.0065
  the Technical of end-of-pipe management technology for pollution Nitrogen, organic boundisChemical coagulation + aerobic biological treatment，Its Technical efficiency of end-of-pipe management50，The formula for calculating the actual operation rate (k-value) of the end-of-pipe treatment facility is /
  污染物指标总氮的末端治理技术是化学混凝+好氧生物处理法，其效率为50，末端治理设施实际运行率（k值）计算公式为k=污水治理设施耗电量（千瓦时/年）/污水治理设施运行时间（小时/年）/污水治理设施总功率（千瓦）。原文件中描述污染物类别为废水，污染物指标为总氮，此处对其进行了匹配工作，将其匹配到LCAflow库里面相最符合的流
- Nitrogen, organic bound: 0.013
  the Technical of end-of-pipe management technology for pollution Nitrogen, organic boundis/
  污染物指标总氮的末端治理技术是/，末端治理设施实际运行率（k值）计算公式为/。原文件中描述污染物类别为废水，污染物指标为总氮，此处对其进行了匹配工作，将其匹配到LCAflow库里面相最符合的流
- chemical oxygen demand: 0.35343
  the Technical of end-of-pipe management technology for pollution chemical oxygen demandisChemical coagulation + SBR，Its Technical efficiency of end-of-pipe management91，The formula for calculating the actual operation rate (k-value) of the end-of-pipe treatment facility is k = operating time of dust removal facilities (hours/year) / production time of production unit (hours/year)
  污染物指标化学需氧量的末端治理技术是化学混凝+SBR法，其效率为91，末端治理设施实际运行率（k值）计算公式为k=污水治理设施耗电量（千瓦时/年）/污水治理设施运行时间（小时/年）/污水治理设施总功率（千瓦）。原文件中描述污染物类别为废水，污染物指标为化学需氧量，此处对其进行了匹配工作，将其匹配到LCAflow库里面相最符合的流
- chemical oxygen demand: 0.58905
  the Technical of end-of-pipe management technology for pollution chemical oxygen demandisChemical coagulation + aerobic biological treatment，Its Technical efficiency of end-of-pipe management85，The formula for calculating the actual operation rate (k-value) of the end-of-pipe treatment facility is k = operating time of dust removal facilities (hours/year) / production time of production unit (hours/year)
  污染物指标化学需氧量的末端治理技术是化学混凝+好氧生物处理法，其效率为85，末端治理设施实际运行率（k值）计算公式为k=污水治理设施耗电量（千瓦时/年）/污水治理设施运行时间（小时/年）/污水治理设施总功率（千瓦）。原文件中描述污染物类别为废水，污染物指标为化学需氧量，此处对其进行了匹配工作，将其匹配到LCAflow库里面相最符合的流
- chemical oxygen demand: 0.58905
  the Technical of end-of-pipe management technology for pollution chemical oxygen demandisChemical coagulation + bio-contact oxidation process，Its Technical efficiency of end-of-pipe management85，The formula for calculating the actual operation rate (k-value) of the end-of-pipe treatment facility is k = operating time of dust removal facilities (hours/year) / production time of production unit (hours/year)
  污染物指标化学需氧量的末端治理技术是化学混凝+生物接触氧化法，其效率为85，末端治理设施实际运行率（k值）计算公式为k=污水治理设施耗电量（千瓦时/年）/污水治理设施运行时间（小时/年）/污水治理设施总功率（千瓦）。原文件中描述污染物类别为废水，污染物指标为化学需氧量，此处对其进行了匹配工作，将其匹配到LCAflow库里面相最符合的流

## Use advice
This dataset is derived from the Pollution Source Census Report and contains information on pollution emissions and related products. However, it does not include data on energy or chemical consumption, nor does it provide information on waste or co-product generation. When utilizing this dataset, please supplement the missing data based on actual conditions before use
该数据集来源于污染源普查报告，包含污染物排放及相关产品信息，但不包含能源或化学品消耗数据，也不提供废弃物或共生产物产生信息。在使用该数据集时，请根据实际情况补充缺失数据后再使用。

## Review details
Inventory: The internal review was done by several iteration steps concerning raw data validation, raw data documentation, representativity, completeness and consistency of modelling with regard to ISO 14040 and 14044.
清单： 内部审查通过几个迭代步骤完成，涉及原始数据验证、原始数据记录、代表性、完整性、与 ISO 14040 和 14044 有关的建模的一致性。

## Data sources
- 第二次全国污染源普查产排污核算系数手册（试用版）,四级代码1372文件，在完整版文件中第2641页
