# Aluminum electrolytic capacitor production ; Aluminum electrolytic capacitor (25V 1000uf)

Dataset: ILCD process, Unit process, black box
Geography: NT-JS-CN
Reference year: 2020
Classification: Unit processes / Materials production / Metals and semimetals
Generated by: Jinliang Xie, jinliang.research@gmail.com
Owner: Tiangong LCI Data Working Group
Review: Dependent internal review by Tiangong LCI Data Working Group
Amounts: no units in this file; such an amount is in the reference unit of its flow, which a separate flow dataset defines
copyright: false
licenseType: Free of charge for all users and uses

## General comment
Aluminum electrolytic capacitors, specifically rated at 25V 1000uf, as described in the data set, are commonly integrated into electronic devices that require stable and long-lasting energy storage solutions. Their applications include power supply smoothing, filtering, or energy storage in consumer electronics, such as audio equipment, computers, and telecommunications devices, as well as in industrial and automotive electronics where higher voltage and larger capacitance are often necessary.

## Time period
Data from research conducted in 2020

## Reference product
- Aluminum Electrolytic Capacitors: 10000; measured
  aluminum electrolytic capacitors (qualified) (10000 pcs)

## Inputs
All rows: measured
- electricity, high voltage, aluminium industry: 3526.38
- Aluminum ingots(anode): 71.9
  Al ingots (anode) ; Al smelting preparation (anode)
- Aluminum ingots(cathode): 41.04
  Al ingots (cathode)
- Lead, in ground: 10.33
  Lead from assembly (including sleeving)
- Ferrite Beads, Cores and Sleeves: 242.86
  case from assembly (including sleeving)
- Sleeve: 14.45
  sleeve from assembly (including sleeving)
- polysulfide, sealing compound: 64.14
  Sealing cover from assembly (including sleeving)
- Armature Winding: 10.33
  tab from winding ; 绕组接线片
- sealing tape, aluminium/PE, 50 mm wide: 1.87
  tape from winding
- Separator Paper Coil,Separator Paper Coil: 28.56
  Separator paper coil
- water, deionised: 18533.9
  deionized water
- tap water: 10363.5
  tape water
- electrolyte, KOH, LiOH additive: 85.81
  Electrolyte (soak); The complete composition of electrolyte is 69% main solvent (1,4-butyrolactone), 26% auxiliary solvent (ammonium tetramethylsuccinate), and 5% solute (water). The electrolyte here is assumed to consist of 95% the main solvent and 5% solutes to simplify the analysis of environmental impacts.
- phosphoric acid, industrial grade, without water, in 85% solution state: 19.37
- Perboric acid: 3.52
  perboric acid; HBO3; 过硼酸
- hydrochloric acid, without water, in 30% solution state: 27.54
  HCl (31%)
- Nitrogen: 0.14
  N2 gas (final annealing)
- sodium hydroxide, without water, in 50% solution state: 30.99
  NaOH (30%)
- ammonium nitrate: 0.31
  Ammonium nitrate; 硝酸氢铵; NH4NO3
- nitric acid, without water, in 50% solution state: 8.26
  HNO3 (98%)
- Cold Rolling Oil: 2.73
  rolling oil (cold rolling)
- Ammonium Citrate: 6.78
  Ammonium citrate (formation process); 柠檬酸铵
- Ammonium Pentaborate: 1.86
  Ammonium pentaborate (formation process); 五硼酸铵
- Argon-40: 0.02
  Ar gas (Al smelting preparation)

## Outputs
All rows: measured
- Aluminium Phosphate: 2.5
  Aluminium phosphate (AlPO4) (production of anode formed foil); The environmental impacts from the production stage are all allocated to the capacitors. The by-product AlPO4 in production of anode formed foil is taken as an economical treatment method to address the production waste because of the limited amount and the simplified analysis.
- aluminium scrap, new: 7.09
  Al scraps; The environmental impacts on the specialized recycling processing of the flows are ignored.
- Scraps of Separator Paper: 0.4
  Scraps of separator paper; The environmental impacts on the specialized recycling processing of the flows are ignored.
- Sludge (Sewage Treatment): 2.348
  sludge (Sewage treatment); The environmental impacts on the specialized landfill of the sludge are ignored.
- wastewater, average: 15855.1
  wastewater
- Total Phosphorus (TP): 0.006
  total phosphorous (TP) (production of anode formed foil); 总磷 (污染物);
- total nitrogen: 0.028
  total nitrogen (TN); 总氮 (污染物)
- Suspended solids, unspecified: 0.23
- chemical oxygen demand: 0.687
- Biochemical Oxygen Demand: 0.088
  Biochemical Oxygen Demand (BOD) (Production of Al blank foil); 生化需氧量 (水体污染物)
- ammonia: 0.07
  Ammonia nitrogen (NH3-N)
- Dust: 0.042
  dust (Al smelting preparation)
- Hydrochloric acid: 0.135
- Sulfuric acid: 0.015
- Nitrogen oxides: 0.015
- ammonia: 0.015
- Aluminum Electrolytic Capacitors (Waste): 6281.67
  aluminum electrolytic capacitors (waste) ; The environmental impacts on the specialized recycling processing of the flows are ignored.

## Data selection and combination
The foreground data are from an AECs’ manufacturer and its supplier. The data about the product family and manufacturing processes of capacitor fabrication are from the AECs’ manufacturer in Nantong, Jiangsu, China. The reference year of capacitor fabrication is 2021. Furthermore, through the investigation of the manufacturer’s upstream supplier, the original data of manufacturing processes of blank foil fabrication (anode and cathode), formed foil fabrication, and cathode etched foil fabrication are obtained. The reference year of blank foil fabrication, formed foil fabrication, and cathode etched foil fabrication is 2020. The background data of the substance flows (i.e., aluminum ingots, separator paper, electricity, water) from the primary industries are acquired from the Gabi software (version 10.0.0.71). The LCI data about specialized treating processes of production waste, including capacitors (waste), aluminum scraps, paper scraps, and sludge, are ignored. In the electrolyte, the complete composition of the electrolyte is 69% main solvent (1,4-butyrolactone), 26% auxiliary solvent (ammonium tetramethyl succinate), and 5% solute (water). The electrolyte here is assumed to consist of 95% of the main solvent and 5% solutes to simplify the analysis of environmental impacts due to the missing LCI data. The inaccessible LCI data about 1,4-butyrolactone, ammonium citrate, ammonium pentaborate, NH4H2PO4, and HBO3 are estimated according to chemical equations of the existing substance flows (reactants) in Gabi software. This will underestimate the environmental impact of these substances in actual industrial production to a certain extent. Besides, many chemical reactions need to satisfy various reaction conditions such as pressure, temperature, and catalyst, which will lead to the extra input of energy and raw materials and increase the risk of environmental pollution. If there are side reactions for the desired chemical reaction, it will not only affect the yield of the targeted product of the reaction but also need a suitable subsequent treatment process to separate and purify the product. Due to the limited consumption of these five materials, their influence on the final assessment result is not significant.

## Use advice
Users of the LCA data set for aluminum electrolytic capacitor production should exercise caution when interpreting the environmental impacts due to the omission of specialized treating processes of production waste in the life cycle inventory (LCI). The underestimation of environmental impacts of certain chemicals attributed to estimated LCI data and unaccounted side reactions should be acknowledged. When using this LCA data, assessors should consider these limitations and possibly adjust the evaluation accordingly, especially if these conditions differ from those prevalent in the setting being assessed. Furthermore, due to simplified assumptions in the composition of the electrolyte, the data users should take note that the environmental effects could be underestimated and that they should seek more detailed data where available for higher accuracy.

## Review details
Inventory: The internal review was done by several iteration steps concerning raw data validation, raw data documentation, representativity, completeness and consistency of modelling with regard to ISO 14040 and 14044.

## Data sources
- Zhang, C., Zheng, Y., Huang, H., Liu, Z. & Jing, J. Environmental impact assessment of aluminum electrolytic capacitors in a product family from the manufacturer’s perspective. Int. J. Life Cycle Assess. (2022)
