# Alumina production ; Alumina for metallurgy ; Bauxite ; 2012

Dataset: ILCD process, Unit process, single operation
Geography: CN
Reference year: 2021
Classification: Unit processes / Materials production / Non-energetic raw materials
Generated by: Yuzhen Feng, fyz22
Owner: Tiangong LCI Data Working Group
Review: Dependent internal review by Tiangong LCI Data Working Group
Amounts: no units in this file; such an amount is in the reference unit of its flow, which a separate flow dataset defines
copyright: false
licenseType: Free of charge for all users and uses

## General comment
The production of alumina described in this data set is specifically used for metallurgical purposes. It pertains to the processing of bauxite into alumina in the year 2012. This type of alumina is typically utilized in the production of aluminum metal via the Hall-Héroult process. It serves as a critical raw material for the aluminum industry and is used in the fabrication of various aluminum products such as foil, structural materials, automotive parts, and electrical conductors.

## Time period
Date of publication

## Reference product
- aluminium oxide, metallurgical: 1000; software or database
  alumina

## Inputs
All rows: software or database
- soda ash, dense: 152.6
  soda ash
- Petroleum Coke: 1129.52
  Energy sources proportion of energy consumption is coal: fuel oil: coke: natural gas: coke even gas=46.0%: 11.0%: 7.1%: 14.1%: 21.7%
- coal gas: 3452.2
  (same comment as for Petroleum Coke)
- natural gas, high pressure: 2243.13
  (same comment as for Petroleum Coke)
- fuel oil, unspecified: 1749.96
  (same comment as for Petroleum Coke)
- hard coal: 7318.03
  (same comment as for Petroleum Coke)
- Water, unspecified natural origin: 2.95
  water consumption

## Data selection and combination
The data in this study refers to the LCA data of PA, SA, electricity, and other background data. The PA data were obtained from statistical data sources, and the SA data were mainly obtained from the literatures. The background data were mainly derived from the Chinese localization LCA database CAS RCEES 2018, which was established by the Research Center for Eco-Environmental Sciences, Chinese Academy of Sciences and covers LCA data for energy, materials, transportation, waste management etc.

## Use advice
When using this data set for Life Cycle Assessment (LCA), users should consider the following: Ensure that the scope of your LCA corresponds with the metallurgical application of alumina. The data set provides information on primary aluminum (PA), secondary aluminum (SA), electricity, and other relevant background information from 2012, and should be used for historical assessments or as a baseline for improvements in processes over time. Be aware that the SA data is largely derived from published literature, while PA data comes from statistical sources. Background data is drawn from the CAS RCEES 2018 database, which includes localized LCA data for China. Methodologies mentioned in those data sources should be followed, and the technological applicability should reflect the standards and practices of the Chinese aluminum industry during the year 2012.

## Review details
Inventory: The internal review was done by several iteration steps concerning raw data validation, raw data documentation, representativity, completeness and consistency of modelling with regard to ISO 14040 and 14044.

## Data sources
- Ding, N., Liu, N., Lu, B. & Yang, J. Life cycle greenhouse gas emissions of aluminum based on regional industrial transfer in China. J. Ind. Ecol. 25, 1657–1672 (2021).
