# Printing ; Printed products (substrate is paper), printed products (substrate is plastic), printed products (substrate is metal), printed products (other substrates) ; Diluent ; Lithographic printing, gravure printing, letterpress printing (flexographic printing), stencil printing (screen printing) ; All sizes; NESPS2 / 印刷 ; 印刷品（承印物为纸）、印刷品（承印物为塑料）、印刷品（承印物为金属）、印刷品（其他承印物） ; 稀释剂 ; 平版印刷、凹版印刷、凸版印刷（柔性版印刷）、孔版印刷（丝网印刷） ; 所有规模 ; 全国第二次污染普查数据

Dataset: ILCD process, Unit process, single operation
Geography: CN
Reference year: 2019
Classification: Reference Parameters / Materials production / Paper and cardboards
Generated by: The data was created by the Office of the Second National Pollution Source Census of the Ministry of Ecology and Environment, and the data was organized by the TianGong Plan team for ILCD format / 生态环境部第二次全国污染源普查工作办公室创建数据，天工计划团队常慧敏整理数据为ILCD格式
Owner: Tiangong LCI Data Working Group / 天工LCI数据工作小组
Review: Dependent internal review by Tiangong LCI Data Working Group / 天工LCI数据工作小组
Amounts: no units in this file; such an amount is in the reference unit of its flow, which a separate flow dataset defines
copyright: false
licenseType: Free of charge for all users and uses

## General comment
the treatment technology for the pollution of volatile organic compounddidn't offered，The formula for calculating the actual operation rate (k-value) of the end-of-pipe treatment facility is k = 1

## Technical purpose
所描述的印刷过程包括在包括纸张、塑料、金属和其他材料的承印物上使用稀释剂进行平版印刷、凹版印刷、凸版印刷（柔性版印刷）以及孔版印刷（丝网印刷）。这些过程适用于生产适合不同市场和应用的各种印刷产品，涵盖从包装材料到促销物品以及装饰元素，适用于所有规模的运营。

## Reference product
- Diluent: 1000; input; calculated
  源文件中描述为为稀释剂，此处对其进行了匹配工作，将其匹配到LCAflow库里面相最符合的流

## Outputs
All rows: calculated
- volatile organic compound: 60
  the treatment technology for the pollution of volatile organic compounddidn't offered，Its Technical efficiency of end-of-pipe management94，The formula for calculating the actual operation rate (k-value) of the end-of-pipe treatment facility is /
  污染物指标挥发性有机物的末端治理技术是3、蓄热式热力燃烧法，其效率为94，末端治理设施实际运行率（k值）计算公式为k=治理设施正常运行时间（小时/年）/总生产时间（小时/年）。原文件中描述污染物类别为废气，污染物指标为挥发性有机物，此处对其进行了匹配工作，将其匹配到LCAflow库里面相最符合的流
- volatile organic compound: 100
  the treatment technology for the pollution of volatile organic compounddidn't offered，Its Technical efficiency of end-of-pipe management90，The formula for calculating the actual operation rate (k-value) of the end-of-pipe treatment facility is /
  污染物指标挥发性有机物的末端治理技术是12、热力燃烧，其效率为90，末端治理设施实际运行率（k值）计算公式为k=治理设施正常运行时间（小时/年）/总生产时间（小时/年）。原文件中描述污染物类别为废气，污染物指标为挥发性有机物，此处对其进行了匹配工作，将其匹配到LCAflow库里面相最符合的流
- volatile organic compound: 150
  the treatment technology for the pollution of volatile organic compounddidn't offered，Its Technical efficiency of end-of-pipe management85
  污染物指标挥发性有机物的末端治理技术是7、吸附/催化燃烧法，其效率为85，末端治理设施实际运行率（k值）计算公式为k=治理设施正常运行时间（小时/年）/总生产时间（小时/年）。原文件中描述污染物类别为废气，污染物指标为挥发性有机物，此处对其进行了匹配工作，将其匹配到LCAflow库里面相最符合的流
- volatile organic compound: 150
  the treatment technology for the pollution of volatile organic compounddidn't offered，Its Technical efficiency of end-of-pipe management85，The formula for calculating the actual operation rate (k-value) of the end-of-pipe treatment facility is /
  污染物指标挥发性有机物的末端治理技术是8、催化燃烧法，其效率为85，末端治理设施实际运行率（k值）计算公式为k=治理设施正常运行时间（小时/年）/总生产时间（小时/年）。原文件中描述污染物类别为废气，污染物指标为挥发性有机物，此处对其进行了匹配工作，将其匹配到LCAflow库里面相最符合的流
- volatile organic compound: 350
  the treatment technology for the pollution of volatile organic compounddidn't offered，Its Technical efficiency of end-of-pipe management65，The formula for calculating the actual operation rate (k-value) of the end-of-pipe treatment facility is /
  污染物指标挥发性有机物的末端治理技术是6、冷凝法，其效率为65，末端治理设施实际运行率（k值）计算公式为k=治理设施正常运行时间（小时/年）/总生产时间（小时/年）。原文件中描述污染物类别为废气，污染物指标为挥发性有机物，此处对其进行了匹配工作，将其匹配到LCAflow库里面相最符合的流
- volatile organic compound: 470
  the treatment technology for the pollution of volatile organic compounddidn't offered，Its Technical efficiency of end-of-pipe management53
  污染物指标挥发性有机物的末端治理技术是10、生物过滤法，其效率为53，末端治理设施实际运行率（k值）计算公式为k=治理设施正常运行时间（小时/年）/总生产时间（小时/年）。原文件中描述污染物类别为废气，污染物指标为挥发性有机物，此处对其进行了匹配工作，将其匹配到LCAflow库里面相最符合的流
- volatile organic compound: 610
  the treatment technology for the pollution of volatile organic compounddidn't offered，Its Technical efficiency of end-of-pipe management39，The formula for calculating the actual operation rate (k-value) of the end-of-pipe treatment facility is /
  污染物指标挥发性有机物的末端治理技术是9、低温等离子体，其效率为39，末端治理设施实际运行率（k值）计算公式为k=治理设施正常运行时间（小时/年）/总生产时间（小时/年）。原文件中描述污染物类别为废气，污染物指标为挥发性有机物，此处对其进行了匹配工作，将其匹配到LCAflow库里面相最符合的流
- volatile organic compound: 660
  the treatment technology for the pollution of volatile organic compounddidn't offered，Its Technical efficiency of end-of-pipe management34，The formula for calculating the actual operation rate (k-value) of the end-of-pipe treatment facility is /
  污染物指标挥发性有机物的末端治理技术是2、其他（沸石转轮吸附法），其效率为34，末端治理设施实际运行率（k值）计算公式为k=治理设施正常运行时间（小时/年）/总生产时间（小时/年）。原文件中描述污染物类别为废气，污染物指标为挥发性有机物，此处对其进行了匹配工作，将其匹配到LCAflow库里面相最符合的流
- volatile organic compound: 830
  the treatment technology for the pollution of volatile organic compounddidn't offered，Its Technical efficiency of end-of-pipe management17
  污染物指标挥发性有机物的末端治理技术是4、光解，其效率为17，末端治理设施实际运行率（k值）计算公式为k=治理设施正常运行时间（小时/年）/总生产时间（小时/年）。原文件中描述污染物类别为废气，污染物指标为挥发性有机物，此处对其进行了匹配工作，将其匹配到LCAflow库里面相最符合的流
- volatile organic compound: 830
  the treatment technology for the pollution of volatile organic compounddidn't offered，Its Technical efficiency of end-of-pipe management17，The formula for calculating the actual operation rate (k-value) of the end-of-pipe treatment facility is /
  污染物指标挥发性有机物的末端治理技术是5、光催化，其效率为17，末端治理设施实际运行率（k值）计算公式为k=治理设施正常运行时间（小时/年）/总生产时间（小时/年）。原文件中描述污染物类别为废气，污染物指标为挥发性有机物，此处对其进行了匹配工作，将其匹配到LCAflow库里面相最符合的流
- volatile organic compound: 850
  the treatment technology for the pollution of volatile organic compounddidn't offered，Its Technical efficiency of end-of-pipe management15
  污染物指标挥发性有机物的末端治理技术是1、其他（活性炭法），其效率为15，末端治理设施实际运行率（k值）计算公式为k=治理设施正常运行时间（小时/年）/总生产时间（小时/年）。原文件中描述污染物类别为废气，污染物指标为挥发性有机物，此处对其进行了匹配工作，将其匹配到LCAflow库里面相最符合的流
- volatile organic compound: 880
  the treatment technology for the pollution of volatile organic compounddidn't offered，Its Technical efficiency of end-of-pipe management12，The formula for calculating the actual operation rate (k-value) of the end-of-pipe treatment facility is /
  污染物指标挥发性有机物的末端治理技术是11、其他（溶剂法），其效率为12，末端治理设施实际运行率（k值）计算公式为k=治理设施正常运行时间（小时/年）/总生产时间（小时/年）。原文件中描述污染物类别为废气，污染物指标为挥发性有机物，此处对其进行了匹配工作，将其匹配到LCAflow库里面相最符合的流
- volatile organic compound: 1000
  the treatment technology for the pollution of volatile organic compounddidn't offered，The formula for calculating the actual operation rate (k-value) of the end-of-pipe treatment facility is k = 1
  污染物指标挥发性有机物的末端治理技术是13、无治理，末端治理设施实际运行率（k值）计算公式为k=治理设施正常运行时间（小时/年）/总生产时间（小时/年）。原文件中描述污染物类别为废气，污染物指标为挥发性有机物，此处对其进行了匹配工作，将其匹配到LCAflow库里面相最符合的流

## Use advice
This dataset is derived from the Pollution Source Census Report and contains information on pollution emissions and related products. However, it does not include data on energy or chemical consumption, nor does it provide information on waste or co-product generation. When utilizing this dataset, please supplement the missing data based on actual conditions before use
该数据集来源于污染源普查报告，包含污染物排放及相关产品信息，但不包含能源或化学品消耗数据，也不提供废弃物或共生产物产生信息。在使用该数据集时，请根据实际情况补充缺失数据后再使用。

## Review details
Inventory: The internal review was done by several iteration steps concerning raw data validation, raw data documentation, representativity, completeness and consistency of modelling with regard to ISO 14040 and 14044.
清单： 内部审查通过几个迭代步骤完成，涉及原始数据验证、原始数据记录、代表性、完整性、与 ISO 14040 和 14044 有关的建模的一致性。

## Data sources
- 第二次全国污染源普查产排污核算系数手册（试用版）,二级代码23,三级代码231.0文件，在完整版文件中第515页
