# Ionic Rare Earth Concentrate ; Ionic rare earth ore ; In situ leaching ; All sizes; NESPS2 / 离子稀土精矿 ; 离子稀土矿 ; 原地浸矿 ; 所有规模 ; 全国第二次污染普查数据

Dataset: ILCD process, Unit process, single operation
Geography: CN
Reference year: 2019
Classification: Reference Parameters / Materials production / Non-energetic raw materials
Generated by: The data was created by the Office of the Second National Pollution Source Census of the Ministry of Ecology and Environment, and the data was organized by the TianGong Plan team for ILCD format / 生态环境部第二次全国污染源普查工作办公室创建数据，天工计划团队常慧敏整理数据为ILCD格式
Owner: Tiangong LCI Data Working Group / 天工LCI数据工作小组
Review: Dependent internal review by Tiangong LCI Data Working Group / 天工LCI数据工作小组
Amounts: no units in this file; such an amount is in the reference unit of its flow, which a separate flow dataset defines
copyright: false
licenseType: Free of charge for all users and uses

## General comment
the Technical of end-of-pipe management technology for pollution chemical oxygen demandis/

## Technical purpose
从离子型稀土矿原地浸矿工艺中获得的离子稀土精矿，用于需要稀土元素的各种应用，如高科技电子产品、磁铁、电池制造和清洁能源领域。它适用于各种规模的工业操作。

## Reference product
- Ion-Absorbed Rare Earth Deposits: 1000; input; calculated
  源文件中描述为为离子稀土矿，此处对其进行了匹配工作，将其匹配到LCAflow库里面相最符合的流，污染物指标备注为工业废水量，产污系数备注为氟碳铈矿石-坑采主要是山东微山区域，该井下涌水量主要是山东地区数据

## Outputs
All rows: calculated
- Waste water: 544
  the Technical of end-of-pipe management technology for pollution Waste wateris/
  污染物指标工业废水量的末端治理技术是/，末端治理设施实际运行率（k值）计算公式为k=废水治理设施年运行时间（小时/年）/企业年正常生产时间（小时/年）。原文件中描述污染物类别为废水，污染物指标为工业废水量，此处对其进行了匹配工作，将其匹配到LCAflow库里面相最符合的流，污染物指标备注为工业废水量，产污系数备注为氟碳铈矿石-坑采主要是山东微山区域，该井下涌水量主要是山东地区数据
- Ammonia Nitrogen: 0.00667726
  the Technical of end-of-pipe management technology for pollution Ammonia NitrogenisWorkshop treatment: clean with clean water + membrane separation，Its Technical efficiency of end-of-pipe management98
  污染物指标氨氮的末端治理技术是车间治理：清水清洗+膜分离，其效率为98，末端治理设施实际运行率（k值）计算公式为k=废水治理设施年运行时间（小时/年）/企业年正常生产时间（小时/年）。原文件中描述污染物类别为废水，污染物指标为氨氮，此处对其进行了匹配工作，将其匹配到LCAflow库里面相最符合的流，污染物指标备注为氨氮
- Nitrogen, organic bound: 0.00720842
  the Technical of end-of-pipe management technology for pollution Nitrogen, organic boundisWorkshop treatment: clean with clean water + membrane separation，Its Technical efficiency of end-of-pipe management98
  污染物指标总氮的末端治理技术是车间治理：清水清洗+膜分离，其效率为98，末端治理设施实际运行率（k值）计算公式为k=废水治理设施年运行时间（小时/年）/企业年正常生产时间（小时/年）。原文件中描述污染物类别为废水，污染物指标为总氮，此处对其进行了匹配工作，将其匹配到LCAflow库里面相最符合的流，污染物指标备注为总氮
- Ammonia Nitrogen: 0.0166932
  the Technical of end-of-pipe management technology for pollution Ammonia NitrogenisWatershed governance: A/O process，Its Technical efficiency of end-of-pipe management95
  污染物指标氨氮的末端治理技术是流域治理：A/O工艺，其效率为95，末端治理设施实际运行率（k值）计算公式为k=废水治理设施年运行时间（小时/年）/企业年正常生产时间（小时/年）。原文件中描述污染物类别为废水，污染物指标为氨氮，此处对其进行了匹配工作，将其匹配到LCAflow库里面相最符合的流，污染物指标备注为氨氮
- Nitrogen, organic bound: 0.0180211
  the Technical of end-of-pipe management technology for pollution Nitrogen, organic boundisWatershed governance: A/O process，Its Technical efficiency of end-of-pipe management95
  污染物指标总氮的末端治理技术是流域治理：A/O工艺，其效率为95，末端治理设施实际运行率（k值）计算公式为k=废水治理设施年运行时间（小时/年）/企业年正常生产时间（小时/年）。原文件中描述污染物类别为废水，污染物指标为总氮，此处对其进行了匹配工作，将其匹配到LCAflow库里面相最符合的流，污染物指标备注为总氮
- chemical oxygen demand: 0.023067
  the Technical of end-of-pipe management technology for pollution chemical oxygen demandis/
  污染物指标化学需氧量的末端治理技术是/，末端治理设施实际运行率（k值）计算公式为k=废水治理设施年运行时间（小时/年）/企业年正常生产时间（小时/年）。原文件中描述污染物类别为废水，污染物指标为化学需氧量，此处对其进行了匹配工作，将其匹配到LCAflow库里面相最符合的流，污染物指标备注为化学需氧量

## Use advice
This dataset is derived from the Pollution Source Census Report and contains information on pollution emissions and related products. However, it does not include data on energy or chemical consumption, nor does it provide information on waste or co-product generation. When utilizing this dataset, please supplement the missing data based on actual conditions before use
该数据集来源于污染源普查报告，包含污染物排放及相关产品信息，但不包含能源或化学品消耗数据，也不提供废弃物或共生产物产生信息。在使用该数据集时，请根据实际情况补充缺失数据后再使用。

## Review details
Inventory: The internal review was done by several iteration steps concerning raw data validation, raw data documentation, representativity, completeness and consistency of modelling with regard to ISO 14040 and 14044.
清单： 内部审查通过几个迭代步骤完成，涉及原始数据验证、原始数据记录、代表性、完整性、与 ISO 14040 和 14044 有关的建模的一致性。

## Data sources
- 第二次全国污染源普查产排污核算系数手册（试用版）,二级代码09,四级代码0932文件，在完整版文件中第3413页
