# Remediated soil ; Continued encapsulation ; Soil risk control ; Sheet pile wall maintenance+Hydraulic gradient control

Dataset: ILCD process, Unit process, black box
Geography: DK
Reference year: 2017
Classification: Unit processes / Other Services / Repair and maintenance
Functional unit: The functional units include steel pile walls that have been installed in a pesticide contaminated site covering an area of approximately 20000 square meters, 100 years of maintenance work, and related hydraulic control engineering.
Generated by: Yang Xintong, yangxt@caep.org.cn
Owner: Tiangong LCI Data Working Group
Review: Dependent internal review by Tiangong LCI Data Working Group
Amounts: no units in this file; such an amount is in the reference unit of its flow, which a separate flow dataset defines
copyright: false
licenseType: Free of charge for all users and uses

## General comment
A risk control strategy for contaminated soil that cannot eliminate pollution, and the site has installed steel plate continuous walls, which only involves maintenance of the installed steel plate walls.

## Geography
The contaminated site BGroyne 42 is located on the west coast of Denmark. The site is one of the largest contaminated sites in Denmark and covers an area of approximately 20,000 m2.

## Technology and included processes
Continued encapsulation involves maintenance of the sheet pile wall, which is already installed, for an indefinite period. Groundwater is abstracted from the contaminated area to remove infiltrating water and to maintain a gradient towards the site. The abstracted water is treated by activated carbon filtration near the site. A 100-year timeframe is assumed although the time frame is actually indefinite.

## Technical purpose
The described process pertains to a risk management strategy specifically used for the containment and control of soil contamination at one of the largest polluted sites in Denmark. The process does not eliminate the pollution but instead focuses on indefinite maintenance and containment through the use of continuous sheet pile walls. The hydraulic control component involves the abstraction and treatment of contaminated groundwater using activated carbon filtration to manage the pollution risk within the contaminated zone. This strategy is used to prevent further environmental dispersion of pesticides in the soil over an assumed timeframe of 100 years.

## Reference product
- Remediated groundwater: 20000; missing unimportant

## Inputs
All rows: missing unimportant
- Electricity: 7.92e6
  Electricity: 22 MWh/year, in total 2200 MWh
- Activated Carbon: 200000
  Activated carbon: 2 tons/year, in total 200 tons
- Steel: 2.7e6
  Steel: 900 tons per renewal, in total 2700 tons
- Diesel,Diesel: 0.0247
- contaminated groundwater: 20000

## Use advice
Data users should account for this dataset within Life Cycle Assessments focusing on soil contamination control strategies that are in situ, impermeable barriers such as the sheet pile walls described. The data includes long-term maintenance of these control technologies and the energy and material consumption onsite without accounting for any transportation or final material disposal processes. Considerations regarding technological applicability should include the indefinite maintenance period of the infrastructure as well as the local conditions for the hydraulic interventions. Abstraction and treatment facilities are presumed to operate for at least 100 years, although actual operation timeframes are indefinite.

## Review details
Inventory: The internal review was done by several iteration steps concerning raw data validation, raw data documentation, representativity, completeness and consistency of modelling with regard to ISO 14040 and 14044.

## Data sources
- Lemming G S ,John P B ,Morten B , et al. Multi-criteria assessment tool for sustainability appraisal of remediation alternatives for a contaminated site. Journal of Soils and Sediments, 2018, 18 (11): 3334-3348.
