# cement production;cement, ordinary portland cement, 42.5MPa;new dry process rotary kiln, 2000 t-cl/d;blast furnace slag

Dataset: ILCD process, Unit process, black box
Geography: SC-CN
Reference year: 2007
Classification: Unit processes / Materials production / Other mineralic materials
Generated by: #REF!, ysqsophia@gmail.com
Owner: Tiangong LCI Data Working Group
Review: Dependent internal review by Tiangong LCI Data Working Group
Amounts: no units in this file; such an amount is in the reference unit of its flow, which a separate flow dataset defines
copyright: false
licenseType: Free of charge for all users and uses

## General comment
A F4.0x58 m of a cement manufacturer in Sichuan Province, new dry process rotary kiln cement production line with limestone as the main raw material and a daily production capacity of 2000 tons of cement clinker.

## Geography
A cement manufacturer in Sichuan Province

## Technical purpose
This dataset represents cement production using the new dry process rotary kiln technology, specifically ordinary Portland cement with a strength grade of 42.5MPa. The production line has a capacity of 2000 tons of cement clinker per day, utilizing limestone as the main raw material. This cement is suitable for a variety of construction purposes including infrastructural and building works that require high strength cement.

## Model description
One functional unit is 42.5 kilograms of ordinary Portland cement, that is, 1Fu=1kgP·O42.5 ordinary Portland cement. The research scope ranges from raw meal preparation, clinker calcining and grinding to cement storage, mainly considering the environmental impact of the cement production process.

## Reference product
- cement, ordinary portland cement, 42.5MPa: 1000
  Limestone cement. P.O 42.5 Ordinary silicate cement.

## Inputs
- limestone, crushed, for mill: 933.7
  Limestone. Transported by truck for 15km.
- sandstone: 151.2
  Sandstone. Transported by truck for 15km.
- mudstone, unprocessed: 68.72
  Mudstone. Transported by truck for 30km.
- gypsum stone (CaSO4-dihydrate): 33.24
  Gypsum. Transported by truck for 45km.
- iron, powder: 41.19
  Iron powder. Transported by truck for 190km.
- blast furnace slag: 74.09
  Slag. Transported by truck for 15km.
- hard coal; 26.3 MJ/kg: 134.6
  Coal. Transported by truck for 34km.
- Electricity: 469.08
  Electricity.

## Outputs
- carbon dioxide (fossil): 855.9
  CO2. Only involves the production stage (calculation).
- sulfur dioxide: 0.053
  SO2. Only involves the production stage (measured).
- Nitrogen oxides: 2.2
  NOx. Only involves the production stage (measured).
- particles (> PM10): 3.045
  Dust. Only involves the production stage (calculation: data after dust removal treatment divided by dust removal efficiency).

## Sampling procedure
The study object is the limestone cement produced by a new dry process rotary kiln cement production line of F4.0x58m, which uses limestone as the main raw material and has a daily output of 2,000 tons of cement clinker.

## Use advice
When utilizing this LCA dataset, consider the full life cycle from raw material preparation through to cement storage. Pay special attention to the environmental impacts that arise during the manufacturing process, including emissions and resource consumption. The functional unit is defined as 42.5 kilograms of ordinary Portland cement. When comparing to other data or assessing impacts, ensure consistent use of functional units and consider geographical specificity, as this data is based on a production line in Sichuan Province.

## Review details
Inventory: The internal review was done by several iteration steps concerning raw data validation, raw data documentation, representativity, completeness and consistency of modelling with regard to ISO 14040 and 14044.

## Data sources
- 王超. (2007). 电石渣水泥和石灰石水泥生命周期评价的比较研究 [硕士, 西南交通大学].
