# Alumina production ; Alumina for metallurgy ; Bauxite ; 2008

Dataset: ILCD process, Unit process, single operation
Geography: CN
Reference year: 2021
Classification: Unit processes / Materials production / Non-energetic raw materials
Generated by: Yuzhen Feng, fyz22
Owner: Tiangong LCI Data Working Group
Review: Dependent internal review by Tiangong LCI Data Working Group
Amounts: no units in this file; such an amount is in the reference unit of its flow, which a separate flow dataset defines
copyright: false
licenseType: Free of charge for all users and uses

## General comment
Alumina produced through this process is primarily used for metallurgical applications. It serves as a critical raw material in the aluminum production industry, where it is used in the conversion of bauxite into aluminum metal through the Hall–Héroult process. This type of alumina ensures appropriate characteristics for electrolysis and is suitable for large-scale production in the aluminum industry.

## Time period
Date of publication

## Reference product
- aluminium oxide, metallurgical: 1000; software or database
  alumina

## Inputs
All rows: software or database
- soda ash, dense: 123.21
  soda ash
- Petroleum Coke: 1653.04
  Energy sources proportion of energy consumption is coal: fuel oil: coke: natural gas: coke even gas=46.0%: 11.0%: 7.1%: 14.1%: 21.7%
- coal gas: 5052.25
  (same comment as for Petroleum Coke)
- natural gas, high pressure: 3282.8
  (same comment as for Petroleum Coke)
- fuel oil, unspecified: 2561.05
  (same comment as for Petroleum Coke)
- hard coal: 10709.8
  (same comment as for Petroleum Coke)
- Water, unspecified natural origin: 3.49
  water consumption

## Data selection and combination
The data in this study refers to the LCA data of PA, SA, electricity, and other background data. The PA data were obtained from statistical data sources, and the SA data were mainly obtained from the literatures. The background data were mainly derived from the Chinese localization LCA database CAS RCEES 2018, which was established by the Research Center for Eco-Environmental Sciences, Chinese Academy of Sciences and covers LCA data for energy, materials, transportation, waste management etc.

## Use advice
Users of this LCA data set should be aware that the data applies specifically to the production of alumina intended for metallurgical purposes, using bauxite as the precursor, and is representative of the technological practices in 2008. When applying this data in life cycle assessments, incorporate data consideration for potential updates or technological changes that may have occurred post-2008. Background data originates from the Chinese-specific LCA database, focusing only on the processes relevant to PA, SA, electricity, and other background data as described. It's important to ensure appropriateness in regional context and alignment with the goal and scope of the assessment, and to pay attention to the methodological consistency, especially when dealing with international comparisons or integrating with global data sets.

## Review details
Inventory: The internal review was done by several iteration steps concerning raw data validation, raw data documentation, representativity, completeness and consistency of modelling with regard to ISO 14040 and 14044.

## Data sources
- Ding, N., Liu, N., Lu, B. & Yang, J. Life cycle greenhouse gas emissions of aluminum based on regional industrial transfer in China. J. Ind. Ecol. 25, 1657–1672 (2021).
