# Wet steaming cotton fabric dyeing and finishing processing ; Printing and dyeing cotton fabric ; Desizing

Dataset: ILCD process, Unit process, single operation
Geography: SZ-JS-CN
Reference year: 2012
Classification: Unit processes / Systems / Textiles, furnitures and other interiors
Generated by: Yingfan Duan, 1300925579@qq.com
Owner: Tiangong LCI Data Working Group
Review: Dependent internal review by Tiangong LCI Data Working Group
Amounts: no units in this file; such an amount is in the reference unit of its flow, which a separate flow dataset defines
copyright: false
licenseType: Free of charge for all users and uses

## General comment
"Desizing" is a crucial step in the dyeing and printing process, involving the removal of residual sizing from the fabric. Sizing is a substance added during the weaving process to enhance the rigidity of fibers. After dyeing and printing are complete, desizing becomes essential to achieve a softer, more breathable fabric that meets design specifications. This typically involves immersing the fabric to eliminate sizing residues, enhancing comfort and applicability.

## Geography
The study focuses on a printing and dyeing enterprise in Jiangsu Province, located in Changshu within the Yangtze River Delta Economic Zone.

## Technical purpose
This dataset represents the process of wet steaming cotton fabric dyeing and finishing, specifically for desizing in the printing and dyeing of cotton cloths. It focuses on a particular dyeing and printing enterprise located in Changshu, within the Yangtze River Delta economic zone in Jiangsu province. The data is relevant for environmental impact assessment within the textile industry and can be used to understand the footprint of cotton processing in this region.

## Reference product
- Cotton Fabric: 167; measured

## Inputs
- Electricity: 200; measured
- Crude coal: 236; calculated
- Cleaned coal: 585; calculated
- Fuel Oil: 5.04; calculated
- heavy fuel oil: 1.52; calculated
- Diesel: 6.93; calculated
- Coke Oven Gas: 9.24; calculated
- natural gas: 0.118; calculated
- sodium chloride: 50; measured
- Amylase: 13.3; measured
- Penetrant: 5; measured
- river water: 31900; measured
- freshwater: 3.13; measured

## Outputs
- carbon dioxide (fossil): 64.9; calculated
- carbon monoxide (fossil): 0.158; calculated
- sulfur dioxide: 0.0575; calculated
- methane (fossil): 2.81e-5; calculated
- Nitrogen oxides: 0.305; calculated
- nitrous oxide: 2.63e-5; measured
- particles (> PM10): 0.532; calculated
- ammonia: 1.01e-5; measured
- non-methane volatile organic compounds: 0.00114; measured
- waste water - untreated: 32000; measured
- chemical oxygen demand: 36.5; calculated
- Suspended solids, unspecified,Suspended solids, unspecified: 3.92; calculated
- lead: 5.15e-6; calculated
- mercury: 1.08e-7; calculated
- fluorine: 9.74e-7; calculated
- cadmium: 1.91e-7; calculated
- arsenic: 4.41e-6; calculated

## Use advice
Users of this dataset should apply the data specifically for LCA studies of cotton dyeing and finishing processes with emphasis on the desizing step. It is important to note that the data are geographically specific to the Yangtze River Delta economic zone and may not be representative of other regions. Users should consider the technological applicability, such as the scale of operations and environmental regulations in force, and should account for any changes in technology or practices that may have occurred since the data was collected.

## Review details
Inventory: The internal review was done by several iteration steps concerning raw data validation, raw data documentation, representativity, completeness and consistency of modelling with regard to ISO 14040 and 14044.

## Data sources
- 朱亚楠. 棉布连续轧染工艺生命周期环境影响评价. (南京大学, 2012).
