# ProductDrying|Artificialboardfurniture(ecologicalboardcombinationfurnitureandpowdercoatedfurniture)|Adhesives,hot-meltadhesives|Hot melt pressing|All sizes / 产品干燥|人造板家具（生态板组合家具及喷粉家具）|胶粘剂、热熔胶|热熔压制|所有规模

Dataset: ILCD process, Partly terminated system
Geography: CN
Reference year: 2019
Classification: Materials production / Other mineralic materials
Generated by: The data was created by the Office of the Second National Pollution Source Census of the Ministry of Ecology and Environment, and the data was organized by the TianGong Plan team for ILCD format / 生态环境部第二次全国污染源普查工作办公室创建数据，天工计划团队常慧敏整理数据为ILCD格式
Amounts: no units in this file; such an amount is in the reference unit of its flow, which a separate flow dataset defines
copyright: false

## Technology and included processes
the treatment technology for the pollution of Adhesivesdidn't offered，The formula for calculating the actual operation rate (k-value) of the end-of-pipe treatment facility is k = power consumption of process waste gas purification device (kWh) / (rated power of process waste gas purification device (kW) × process waste gas purification device operating time (hours))
污染物指标工业废气量的末端治理技术未说明

## Reference product
- Adhesives: 1; input; calculated
  原文件中描述污染物类别为Product，污染物指标为胶粘剂、热熔胶，此处对其进行了匹配工作，将其匹配到LCAflow库里面相最符合的流

## Outputs
- Exhaust gas: 478; calculated
  原文件中描述污染物类别为废气，污染物指标为工业废气量，此处对其进行了匹配工作，将其匹配到LCAflow库里面相最符合的流
- volatile organic compound: 0.00075, 0.0003, 0.000225, 0.00141, 0.00105, 0.0012, 0.0015 (7 entries); calculated
  原文件中描述污染物类别为废气，污染物指标为挥发性有机物，此处对其进行了匹配工作，将其匹配到LCAflow库里面相最符合的流

## Data sources
- 第二次全国污染源普查产排污核算系数手册（试用版）,二级代码21,三级代码211.0文件，在完整版文件中第411页
