# NMC532 direct recycling（molten-salt-based method (MSDR) ）

Dataset: ILCD process, Unit process, single operation
Geography: CN
Reference year: 2021
Classification: Unit processes / End-of-life treatment / Material recycling
Functional unit: 333.9 kg of the degraded NMC532 can be sorted from per 1 ton of degraded battery
Generated by: maqingyuan, m1120498928@163.com
Owner: Tiangong LCI Data Working Group
Review: Dependent internal review by Tiangong LCI Data Working Group
Amounts: no units in this file; such an amount is in the reference unit of its flow, which a separate flow dataset defines
copyright: false
licenseType: Free of charge for all users and uses

## General comment
To upcycle the degraded NMC532 (Li1-xNi0.5Mn0.3Co0.2O2) into Ni66-NMC, 0.2 mol of the degraded NMC532 cathode powder (?20 g, a mixture of NMC532, carbon black, and polymer binder) was mixed with 0.2 mol Ni0.83Mn0.09Co0.08(OH)2, 0.5 mol LiOH, and 0.1 mol Li2SO4 and transferred into a crucible. LiOH was in excess (excess % = (1.5 ? x)/(1 + x)) to facilitate complete re-lithiation, which is a self-saturated process according to the literature.1 The crucible used for the reaction was loosely covered by a lid to allow air intake during the synthesis but avoid excess evaporation of Li salts. The material mixture was heated to 900℃ at aram pin g r a t e o f ?10℃ min-1 and held at 900℃ for 5 h and then at 860℃ for 15h in air before slow cooling at a rate of 2℃ min-1 to 300℃. The carbon black and the poly merbinder were burned away during the high-temperature MSDR process. After that, the mixture was allowed to cool down naturally. The obtained powders were recovered from the crucible, ground in an agate mortar, and washed using deionized water to separate the material from the water-soluble Li salts, which could be recycled after water evaporation and reused. The Ni66-NMC powder was collected by centrifugation and dried at 70℃ in air before being thermally treated at 700℃ for 4 h in air. T h e powder was ground again to pass through a 400-mesh sieve and then stored in a humidity-controlled storage chamber before further tests. To upcycle the degraded NMC532 into Ni80-NMC via MSDR, 0.2 mol of the degraded NMC532 cathode powder (?20 g) was mixed with 0.3 mol Ni(OH)2, 0.625 mol LiOH, and 0.125 mol Li2SO4 and transferred into a crucible. The experimental procedures were the same as those for the Ni66-NMC, except the sintering temperature was lowered to 780℃.

## Technical purpose
The molten-salt-based direct recycling (MSDR) method described is employed to upcycle degraded NMC532 cathode materials into high-nickel content lithium-nickel-manganese-cobalt oxides (Ni66-NMC and Ni80-NMC). These recycled cathode materials are specifically designed for use in the production of Ni-rich cathode materials for lithium-ion batteries. This process ensures the efficient recovery and reuse of valuable metals from spent batteries, contributing to the sustainability of the battery production industry.

## Reference product
- Degraded NMC532: 740; input; calculated

## Inputs
- Nickel sulfate: 540; calculated
- Lithium Hydroxide Monohydrate: 450; calculated
- oxygen: 4000; calculated
- Average labor (Disassemble degraded battery): 3.65
- Average labor（Material preparation）: 3.65
- Equipment Depreciation: 365
- Electricity: 43200; calculated
- water,water: 300000

## Outputs
- Sewage treatment: 365
- Ni-rich NMC: 1.4475e6

## Data treatment and extrapolations
① We calculated the cost per one ton of recycled cathode materials. The recycle process can be divided into two steps: DISASSEMBLE degraded battery & RECYLCE to produce Ni-rich cathode materials.② During the DISASSEMBLE process, we use degraded NMC532 as raw material.③ During the RECYLCE process, only Ni and Co is added.

## Use advice
Users of this LCA dataset should ensure that they account for the specific inputs and outputs associated with the MSDR process when conducting life cycle assessments. It is crucial to include the amounts of Ni, Mn, and Co added during the recycling process, as well as the energy consumption and emissions during the disassembly and recovery stages. Additionally, the environmental benefits of the water-soluble Li salts recovery should be considered. The MSDR method is a high-temperature process, and the effects of carbon black and polymer binder combustion on the overall environmental impact must be evaluated. Finally, the changes in sintering temperature between Ni66-NMC and Ni80-NMC recycling should be reflected in the analysis to accurately represent their respective impacts.

## Review details
Inventory: The internal review was done by several iteration steps concerning raw data validation, raw data documentation, representativity, completeness and consistency of modelling with regard to ISO 14040 and 14044.

## Data sources
- Qian, G. et al. Value-creating upcycling of retired electric vehicle battery cathodes. Cell Reports Physical Science 3, 100741 (2022).
