# Component Production ; Battery components ; Leaded solder + flux ; Welded laminated frame ; All sizes; NESPS2 / 组件生产 ; 电池组件 ; 含铅焊料+助焊剂 ; 焊接层压装框 ; 所有规模 ; 全国第二次污染普查数据

Dataset: ILCD process, Unit process, single operation
Geography: CN
Reference year: 2019
Classification: Reference Parameters / Materials production / Metals and semimetals
Generated by: The data was created by the Office of the Second National Pollution Source Census of the Ministry of Ecology and Environment, and the data was organized by the TianGong Plan team for ILCD format / 生态环境部第二次全国污染源普查工作办公室创建数据，天工计划团队常慧敏整理数据为ILCD格式
Owner: Tiangong LCI Data Working Group / 天工LCI数据工作小组
Review: Dependent internal review by Tiangong LCI Data Working Group / 天工LCI数据工作小组
Amounts: no units in this file; such an amount is in the reference unit of its flow, which a separate flow dataset defines
copyright: false
licenseType: Free of charge for all users and uses

## General comment
the Technical of end-of-pipe management technology for pollution volatile organic compoundisCatalytic combustion method，Its Technical efficiency of end-of-pipe management53

## Technical purpose
含铅焊料+助焊剂焊接的层压装框电池组件通常用于多种尺寸电子设备的能量存储，包括便携式电子产品、电动车辆和可再生能源存储系统。尾端处理技术用于工业环境中减轻环境污染。具体来说，袋式过滤器用于颗粒物（PM2.5 - PM10）和铅污染控制，效率为86%。喷淋塔专门针对PM2.5 - PM10，效率为89%。用于管理挥发性有机化合物（VOCs）的方法有：催化燃烧（效率53%）、低温等离子（效率73%）、光催化（效率76%）和吸附（效率57%）。

## Reference product
- Lead Solder + Flux: 1; input; calculated
  源文件中描述为为含铅焊料+助焊剂，此处对其进行了匹配工作，将其匹配到LCAflow库里面相最符合的流，污染物指标备注为颗粒物

## Outputs
All rows: calculated
- lead: 8.26e-9
  the Technical of end-of-pipe management technology for pollution leadisBag filter，Its Technical efficiency of end-of-pipe management86
  污染物指标铅的末端治理技术是袋式除尘，其效率为86，末端治理设施实际运行率（k值）计算公式为k=除尘设备耗电量（千瓦时/年）/[除尘设备额定功率（千瓦）×除尘设备运行时间（小时/年）]。原文件中描述污染物类别为废气，污染物指标为铅，此处对其进行了匹配工作，将其匹配到LCAflow库里面相最符合的流，污染物指标备注为铅
- particles (PM2.5 - PM10): 3.3e-5
  the Technical of end-of-pipe management technology for pollution particles (PM2.5 - PM10)isSpray tower，Its Technical efficiency of end-of-pipe management89
  污染物指标颗粒物的末端治理技术是喷淋塔，其效率为89，末端治理设施实际运行率（k值）计算公式为k=除尘设备耗电量（千瓦时/年）/[除尘设备额定功率（千瓦）×除尘设备运行时间（小时/年）]。原文件中描述污染物类别为废气，污染物指标为颗粒物，此处对其进行了匹配工作，将其匹配到LCAflow库里面相最符合的流，污染物指标备注为颗粒物
- particles (PM2.5 - PM10): 4.2e-5
  the Technical of end-of-pipe management technology for pollution particles (PM2.5 - PM10)isBag filter，Its Technical efficiency of end-of-pipe management86
  污染物指标颗粒物的末端治理技术是袋式除尘，其效率为86，末端治理设施实际运行率（k值）计算公式为k=除尘设备耗电量（千瓦时/年）/[除尘设备额定功率（千瓦）×除尘设备运行时间（小时/年）]。原文件中描述污染物类别为废气，污染物指标为颗粒物，此处对其进行了匹配工作，将其匹配到LCAflow库里面相最符合的流，污染物指标备注为颗粒物
- volatile organic compound: 0.0016608
  the Technical of end-of-pipe management technology for pollution volatile organic compoundisPhotocatalysis，Its Technical efficiency of end-of-pipe management76
  污染物指标挥发性有机物的末端治理技术是光催化，其效率为76，末端治理设施实际运行率（k值）计算公式为k=设备年耗电量（千瓦时）/3935（千瓦时）。原文件中描述污染物类别为废气，污染物指标为挥发性有机物，此处对其进行了匹配工作，将其匹配到LCAflow库里面相最符合的流，污染物指标备注为挥发性有机物
- volatile organic compound: 0.0018684
  the Technical of end-of-pipe management technology for pollution volatile organic compoundisLow temperature plasma，Its Technical efficiency of end-of-pipe management73
  污染物指标挥发性有机物的末端治理技术是低温等离子体，其效率为73，末端治理设施实际运行率（k值）计算公式为k=设备年耗电量（千瓦时）/8868（千瓦时）。原文件中描述污染物类别为废气，污染物指标为挥发性有机物，此处对其进行了匹配工作，将其匹配到LCAflow库里面相最符合的流，污染物指标备注为挥发性有机物
- volatile organic compound: 0.0029756
  the Technical of end-of-pipe management technology for pollution volatile organic compoundisOthers (adsorption)，Its Technical efficiency of end-of-pipe management57
  污染物指标挥发性有机物的末端治理技术是其他（吸附法），其效率为57，末端治理设施实际运行率（k值）计算公式为k=设备年耗电量（千瓦时）/2203（千瓦时）。原文件中描述污染物类别为废气，污染物指标为挥发性有机物，此处对其进行了匹配工作，将其匹配到LCAflow库里面相最符合的流，污染物指标备注为挥发性有机物
- volatile organic compound: 0.0032524
  the Technical of end-of-pipe management technology for pollution volatile organic compoundisCatalytic combustion method，Its Technical efficiency of end-of-pipe management53
  污染物指标挥发性有机物的末端治理技术是催化燃烧法，其效率为53，末端治理设施实际运行率（k值）计算公式为k=设备年耗电量（千瓦时）/8868（千瓦时）。原文件中描述污染物类别为废气，污染物指标为挥发性有机物，此处对其进行了匹配工作，将其匹配到LCAflow库里面相最符合的流，污染物指标备注为挥发性有机物

## Use advice
This dataset is derived from the Pollution Source Census Report and contains information on pollution emissions and related products. However, it does not include data on energy or chemical consumption, nor does it provide information on waste or co-product generation. When utilizing this dataset, please supplement the missing data based on actual conditions before use
该数据集来源于污染源普查报告，包含污染物排放及相关产品信息，但不包含能源或化学品消耗数据，也不提供废弃物或共生产物产生信息。在使用该数据集时，请根据实际情况补充缺失数据后再使用。

## Review details
Inventory: The internal review was done by several iteration steps concerning raw data validation, raw data documentation, representativity, completeness and consistency of modelling with regard to ISO 14040 and 14044.
清单： 内部审查通过几个迭代步骤完成，涉及原始数据验证、原始数据记录、代表性、完整性、与 ISO 14040 和 14044 有关的建模的一致性。

## Data sources
- 第二次全国污染源普查产排污核算系数手册（试用版）,四级代码3825文件，在完整版文件中第5117页
