# Transportation of straw｜straw｜Trucks （no capacity data）

Dataset: ILCD process, Unit process, single operation
Geography: CN
Reference year: 2020
Classification: Unit processes / Transport services / Road
Functional unit: Taking 1 ton of straw as the functional unit
LCI method principle: Consequential
Generated by: Chaoshuo Liu, liucs22@mails.jlu.edu.cn
Owner: Tiangong LCI Data Working Group
Review: Dependent internal review by Tiangong LCI Data Working Group
Amounts: no units in this file; such an amount is in the reference unit of its flow, which a separate flow dataset defines
copyright: false
licenseType: Free of charge for all users and uses

## General comment
This dataset pertains to the transportation of straw, typically rice/wheat straw, which is a byproduct of rice/wheat cultivation. The straw is transported via truck, but the dataset does not provide capacity data for these vehicles. This process is relevant for industries involved in the handling and utilization of agricultural byproducts, possibly for purposes such as animal feed, bioenergy production, organic material for industrial processes, or as a substrate in mushroom cultivation.

## Reference product
- Crop straw: 1000; measured

## Inputs
- Diesel: 694; measured

## Outputs
All rows: measured
- carbon dioxide (fossil): 51.5
  The expert notes that the original text does not differentiate between biogenic and fossil sources of emissions, and in their opinion, the emissions in question are fossil.
- methane (fossil): 0.0069
  (same comment as for carbon dioxide (fossil))
- nitrous oxide: 0.00042
- sulfur dioxide: 0.033
- nitrogen dioxide: 0.663
- particles (> PM10),particles (> PM10): 0.228
- Crop straw: 1000

## Use advice
Users utilizing this dataset should note that it lacks truck capacity data, which is vital for calculations of environmental impacts per unit of transported straw. To maintain accuracy, users need to estimate or obtain truck capacity information from other sources for a complete assessment. This dataset defines the transportation phase for 1 ton of straw; users should adapt the data accordingly if larger or smaller quantities are considered. Users should also be aware of the technological applicability, such as the types of trucks used and the distances covered, to ensure data relevance and representativeness for their specific case.

## Review details
Inventory: The internal review was done by several iteration steps concerning raw data validation, raw data documentation, representativity, completeness and consistency of modelling with regard to ISO 14040 and 14044.

## Data sources
- Dai, Y., Zheng, H., Jiang, Z. & Xing, B. Comparison of different crop residue-based technologies for their energy production and air pollutant emission. Science of The Total Environment 707, 136122 (2020).
