# Soil Remediation;In-situ Remediation;Soil Drenching;Case 2;Contaminated Soil Excavation;Excavated Soil

Dataset: ILCD process, Unit process, single operation
Geography: SD-CN
Reference year: 2017
Classification: Unit processes / Other Services / Repair and maintenance
Generated by: Wang Ning, wang_ning@caep.org.cn
Owner: Tiangong LCI Data Working Group
Review: Dependent internal review by Tiangong LCI Data Working Group
Amounts: no units in this file; such an amount is in the reference unit of its flow, which a separate flow dataset defines
copyright: false
licenseType: Free of charge for all users and uses

## General comment
Use of excavators to dig out contaminated soil

## Technology and included processes
The volume of contaminated soil-free site is 210,000 m3, the efficiency of excavator is 44.6 m3/h, and the fuel consumption is 22l/h.

## Technical purpose
This industrial process is used for the environmental management of contaminated sites through soil remediation. Specifically, it describes the excavation of contaminated soil using heavy machinery for the purpose of in-situ soil drenching, in which the contaminated material is treated on-site to remove or neutralize pollutants. This process is applicable in situations where the soil contamination is severe, and where excavation is a viable method for facilitating further remediation techniques.

## Reference product
- Excavated soil,Excavated soil: 210000; measured

## Inputs
- Diesel,Diesel: 103.587; measured

## Use advice
When using this dataset for Life Cycle Assessment, it is important to consider the specific context and location of the soil remediation process to ensure accuracy in environmental impact assessment. Users need to account for variables such as the type of contaminant being addressed, the concentration of pollution, and local environmental regulations. Additionally, it is crucial to include the dataset's defined inputs and outputs for all major raw materials and energy consumption, and to factor in the operational specifics of the excavation equipment such as volume capacity, efficiency, and fuel usage.

## Review details
Inventory: The internal review was done by several iteration steps concerning raw data validation, raw data documentation, representativity, completeness and consistency of modelling with regard to ISO 14040 and 14044.

## Data sources
- Song, Y. et al. Environmental and socio-economic sustainability appraisal of contaminated land remediation strategies: A case study at a mega-site in China. Science of The Total Environment 610–611, 391–401 (2018).
