# Livestock and poultry breeding ; feed processing stage ; live pig retail

Dataset: ILCD process, Unit process, single operation
Geography: CN
Reference year: 2014
Classification: Unit processes / Materials production / Agricultural production means
Functional unit: 1kg pork
Generated by: Rui Yang, 1632707028@qq.com
Owner: Tiangong LCI Data Working Group
Review: Dependent internal review by Tiangong LCI Data Working Group
Amounts: no units in this file; such an amount is in the reference unit of its flow, which a separate flow dataset defines
copyright: false
licenseType: Free of charge for all users and uses

## General comment
Livestock and poultry feed processing mainly consumes electricity and coal.

## Geography
This study was conducted from 2014 to 2015, aiming at livestock and poultry feeding cycle, meat ratio, feed formula, feed consumption, coal and electricity consumption, etc. Has been to Shandong Gaomi Zhengda pig farm, Laixi City Zhishuang dairy farm, Jimo city Duan Bolan town Jiangjiapo village pig farm, Jimo City Liujiazhuang town livestock farm, Rizhao City Changling town Guanzhuang village, Juxian County Zhailihe town Dongxing Agriculture and animal husbandry company, Juxian Qiaoshan town east Chen dairy farm, Juxian Qiaoshan town Liu Jiayi water pig farm, Zhucheng Foreign Trade Co., LTD. Phoenix parents breeding duck farm, Xinjiang Fukang Hongfa Breeding professional cooperative, Jiuyun Street Town Xuhong laying Chicken cooperative, Jiuyun Street Town Liuyun Village self-contained breeding farm, China Australia Holding Group Co., LTD., Dezhou City Qingyun County Wayu Village, Shandong Province Qingyun County four Liu community beef cattle breeding base, Dezhou City Qingyun Qingnian chicken breeding base, Qingyun County Yongli Poultry layer breeding company, Qingyun County Xingchen youth chicken breeding Field research was carried out by professional breeding cooperatives, Qingyun Dongtai broiler breeding cooperatives, Hebei Yanshan Boyuan Feed Co., LTD., Yanshan Da Chinese Feed Co., LTD., Wudi Liuhe Feed Co., LTD., and China-Australia Oriental Hope Feed Co., LTD.

## Technology and included processes
In this paper, the life cycle of livestock and poultry farming is divided into six stages: feed crop planting, feed processing, livestock and poultry raising, manure treatment, slaughter and transportation. The specific life cycle process of livestock and poultry breeding is shown in Figure 2-1. Due to the lack of some data and the limitations of basic conditions, the production, transportation and use of pesticides, mulch and feed additives have not been analyzed, and the environmental impact caused by other related infrastructure construction, transport production and labor costs is no longer considered.

## Technical purpose
This data set pertains to the life cycle assessment of livestock and poultry breeding and feed processing, specifically focusing on retail live pigs. It includes the measurement of inputs such as electricity and coal throughout the process. The data is intended for use in environmental assessments of agricultural and feed processing operations, aiding in the calculation of the carbon footprint and other environmental impacts associated with pork production. It is also relevant for policymakers, researchers, and businesses looking to improve the sustainability of livestock and poultry feed production.

## Reference product
- feed: 3.98701; calculated

## Inputs
- Electricity: 0.358831; calculated
- hard coal: 0.0478442; calculated
- maize grain: 2.79; measured
- soybean: 0.5; measured
- wheat: 5.3; measured

## Outputs
- carbon dioxide (fossil),carbon dioxide (fossil): 0.19903; measured
  Pig retail investors
- sulfur dioxide: 0.003481; measured
  Pig retail investors
- nitrogen, total (excluding N2): 0.00056; measured
  Pig retail investors
- carbon monoxide (fossil): 9e-5; measured
  Pig retail investors

## Use advice
Users of this data set should apply it only within the context of livestock and poultry feed processing facilities, specifically those that pertain to retail live pigs. Care should be taken to use the data accurately within the temporal bounds of 2014 to 2015, as the data is reflective of practices within this time frame. Assumptions related to feeding cycles, meat-to-feed ratios, feed formulas, and consumption rates of feed, coal, and electricity are inherent in the data and should be carefully considered when applying this data to LCA models. Users should ensure alignment with current technological standards and environmental regulations. Supplementary data might be required for a comprehensive assessment.

## Review details
Inventory: The internal review was done by several iteration steps concerning raw data validation, raw data documentation, representativity, completeness and consistency of modelling with regard to ISO 14040 and 14044.

## Data sources
- 周景月. 基于生命周期评价的畜禽养殖环境影响分析. (青岛科技大学, 2017).
