# Graphite anode material production ; Graphite anode material ; Synthetic graphite, binder

Dataset: ILCD process, Unit process, single operation
Classification: Materials production / Non-energetic raw materials
Functional unit: Produce 1kg graphite anode slurry
Generated by: Xin Chen, xinchen@mail.nankai.edu.cn
Owner: Tiangong LCI Data Working Group
Review: Dependent internal review by Tiangong LCI Data Working Group
Amounts: no units in this file; such an amount is in the reference unit of its flow, which a separate flow dataset defines
copyright: false
licenseType: Free of charge for all users and uses

## General comment
After pulverizing the natural graphite, it is mixed with a binder, formed, pressed, dried and graphitized.

## Technology and included processes
The graphite is crushed to make the particle size uniform, mixed with PTEE, then molded and pressed, followed by drying to remove moisture and volatile organic matter, then high-temperature graphitization, and finally surface treatment to improve contact with the electrolyte.

## Reference product
- 1-methyl-2-pyrrolidone: 0.28; estimated
  What-if scenarios, data based on estimates

## Inputs
- Graphite (anode and melting pot): 0.95; estimated
  What-if scenarios, data based on estimates
- heat: 5; estimated
  What-if scenarios, data based on estimates
- waste heat: 5; estimated
  What-if scenarios, data based on estimates

## Outputs
- 1-methyl-2-pyrrolidone: 1; estimated
  What-if scenarios, data based on estimates

## Data selection and combination
Data based on assumptions

## Data treatment and extrapolations
The atmosphere required for the roasting process is not included due to lack of inertness or reducibility data, and energy requirements are based on estimates.

## Review details
Inventory: The internal review was done by several iteration steps concerning raw data validation, raw data documentation, representativity, completeness and consistency of modelling with regard to ISO 14040 and 14044.

## Data sources
- Majeau-Bettez, G., Hawkins, T. R. & Strømman, A. H. Life Cycle Environmental Assessment of Lithium-Ion and Nickel Metal Hydride Batteries for Plug-In Hybrid and Battery Electric Vehicles. Environ. Sci. Technol. 45, 4548–4554 (2011).
