# North China (Gaomi) Corn Production ; Land Restoration

Dataset: ILCD process, Unit process, single operation
Geography: WF-SD-CN
Reference year: 2016
Valid until: 2017
Classification: Unit processes / Materials production / Food and renewable raw materials
Functional unit: 1t
LCI method principle: Attributional
LCI method approaches: Consequential
Generated by: Haoran Zhang, hrzhang@whu.edu.cn
Owner: Tiangong LCI Data Working Group
Review: Dependent internal review by Tiangong LCI Data Working Group
Amounts: no units in this file; such an amount is in the reference unit of its flow, which a separate flow dataset defines
copyright: false
licenseType: Free of charge for all users and uses

## General comment
This study was conducted in Gaomi City, Shandong Province, which is located in Huang-Huai-hai Plain, the core area of winter wheat-summer maize rotation in China. The research was carried out in the form of a questionnaire survey, and a total of 56 farmers who operated wheat-maize rotation were interviewed. The contents of the questionnaire include input and output in the process of food production: (1) food output; (2) agricultural inputs such as seeds, fertilizers, herbicides, fungicides and insecticides; (3) Energy consumption of agricultural machinery, including fuel consumption in the process of sowing, farming and grain transportation; (4) irrigation energy consumption, etc

## Geography
high density

## Technology and included processes
The study calculated the greenhouse gas emissions from the cradle to the door of the grain production process. The boundary of the accounting system includes: greenhouse gas emissions from agricultural inputs (such as seeds, agricultural medicines, fertilizers, etc.); Greenhouse gas emissions from the use of agricultural machinery (tillage, sowing, harvesting, food transportation, etc.); Field N2O emission caused by fertilizer application; Irrigation energy consumption, greenhouse gas emissions, etc. (Figure 1)

## Technical purpose
The data set pertains to the high-density corn production in North China (Gaomi) with focus on land restoration. The corn is primarily produced for human consumption and industrial uses such as feed, bioethanol production, and biodegradable materials. The land restoration aspect implies that practices are implemented to maintain or improve soil health, which is essential for sustainable agricultural operations.

## Reference product
- maize grain: 9962.95; measured

## Inputs
- nitrogen: 96.57; measured

## Deviations from the LCI method approaches
The accounting system boundary includes: greenhouse gas emissions from agricultural input (such as seeds, pesticides, fertilizers, etc.); greenhouse gas emissions from the use of agricultural machinery during operations (tilling, sowing, harvesting, and grain transportation); greenhouse gas emissions from N2O during fertilizer application; greenhouse gas emissions from irrigation energy consumption, etc.

## Data selection and combination
Because this study is based on survey data, it is impossible to obtain the baseline condition of soil carbon from the farmers. Due to different management methods of different farmers, the baseline condition of their soil carbon is different, so the change in soil carbon has not been accounted for. The functional unit chosen in this study is the carbon footprint per unit area and per unit yield.

## Data treatment and extrapolations
Greenhouse gas emission accounting uses the methodology recommended in the '2006 IPCC National Greenhouse Gas Inventory Guidelines' and follows the international standard 'ISO/DIS 14067'.

## Sampling procedure
The questionnaire includes inputs and outputs during the grain production process: (1) grain yield; (2) agricultural input such as seeds, fertilizers, herbicides, fungicides, and insecticides; (3) energy consumption of agricultural machinery, including fuel consumption for processes like sowing, ploughing, and grain transportation; (4) irrigation energy consumption.

## Use advice
Users should take into account the methodological limitations mentioned; soil carbon changes are not accounted for due to variability in farmers' baseline conditions and management practices. Users should apply the study's functional unit of carbon footprint per unit area and per unit yield for comparability. The data set follows methodologies from '2006 IPCC National Greenhouse Gas Inventory Guidelines' and 'ISO/DIS 14067', and should only be applied within these methodological frameworks for greenhouse gas accounting.

## Review details
Inventory: The internal review was done by several iteration steps concerning raw data validation, raw data documentation, representativity, completeness and consistency of modelling with regard to ISO 14040 and 14044.

## Data sources
- 朱永昶,李玉娥,姜德锋等.基于生命周期评估的冬小麦-夏玉米种植系统碳足迹核算——以山东省高密地区为例[J].农业资源与环境学报,2017,34(05):473-482.
