# Tire production;Tire;Vulcanizing and testing;Blended compound

Dataset: ILCD process, Unit process, single operation
Geography: CN
Reference year: 2014
Classification: Unit processes / Materials production / Other materials
Generated by: Cui, di, 2806553850@qq.com
Owner: Tiangong LCI Data Working Group
Review: Dependent internal review by Tiangong LCI Data Working Group
Amounts: no units in this file; such an amount is in the reference unit of its flow, which a separate flow dataset defines
copyright: false
licenseType: Free of charge for all users and uses

## General comment
the production stage is quite complex andincludes the processes of compound blending, rolling, extrusion, packet ring production, cutting and forming, vulcanizing, and testing. We combined closely related processes toavoid allocation. The following four main production processes were identified: compound blending, rolling and extrusion,cutting and forming, and vulcanizing and testin

## Time period
“Data collected onsite in 2014 by one of the largest Chinese tire companies were used in the assessment. ”The article has stated that the data is related to 2014, but there is no specific time, so the time is set on January 1, 2014.

## Technical purpose
The described industrial process concerns the production of rubber tires, which involves several complex stages. These tires are primarily used for automotive applications, providing the necessary traction and vehicle support for a variety of vehicles ranging from small passenger cars to large commercial trucks. The production process incorporates compound blending, which is essential for achieving the desired physical properties. Rolling and extrusion shape the tire into its preliminary form, while cutting and forming ready the material for vulcanizing. Vulcanization is a chemical process that enhances the elasticity and strength of the rubber. The final stage is testing, which ensures that the tires meet stringent quality and safety standards.

## Reference product
- Tire: 9.497; measured

## Inputs
- Electricity: 3.01; measured
- steam: 15.89; measured

## Outputs
- Waste cord thread ,Waste tire: 0.073; measured
- Waste wire cord fabric,Waste steel wire: 0.001; measured
- Waste rubber,Waste fiber fabric: 0.001; measured

## Data selection and combination
The data on the raw materials used in the investigated tire product were sourced from on-site investigations of one of the largest Chinese tire companies. The data were collected in 2014 during the manufacture of the target tire product.Other materials, such as active clay, zinc oxide, stearic acid, processing agent, and lubricating oil, were also considered.

## Use advice
When utilizing this dataset for Life Cycle Assessment (LCA) purposes, it is important to note that the data is specific to the year 2014 and reflects practices from one of the largest Chinese tire companies of that time. Users should be aware that changes in manufacturing technology or raw material sourcing over time might influence the applicability of this dataset to current practices. Additionally, data users should take into account that the data pertains to the production processes without allocation, meaning the impacts of each stage were not distributed across the connected processes. It is recommended to check for updates or more recent data that may represent current production technologies and to use this dataset accordingly for retrospective analyses.

## Review details
Inventory: The internal review was done by several iteration steps concerning raw data validation, raw data documentation, representativity, completeness and consistency of modelling with regard to ISO 14040 and 14044.

## Data sources
- Sun X, Liu J, Hong J, et al. Life cycle assessment of Chinese radial passenger vehicle tire[J]. The International Journal of Life Cycle Assessment, 2016, 21: 1749-1758.
