# Ethylene Production | Ethylene | Naphtha Route | Naphtha

Dataset: ILCD process, Unit process, black box
Geography: CN
Reference year: 2002
Classification: Materials production / Other mineralic materials
Functional unit: The functional unit determined by the research is 1t of ethylene product
LCI method principle: Attributional
LCI method approaches: Allocation - mass
Generated by: Yanan Ren, renyn15@tsinghua.org.cn
Review: Dependent internal review by Tiangong LCI Data Working Group
Amounts: no units in this file; such an amount is in the reference unit of its flow, which a separate flow dataset defines
copyright: false

## General comment
Ethylene complex, by-product propylene and C4

## Geography
An ethylene production plant in my country in 2002

## Reference product
- ethene (ethylene): 1000; measured
  乙烯

## Inputs
All rows: measured
- naphtha: 1185.91
  石脑油
- diesel: 558.07
  轻柴油
- light fuel oil: 84.04
  燃料油
- Refinery Gas: 171.04
  炼厂干气
- electricity mix: 135.684
  电力

## Outputs
All rows: measured
- carbon dioxide: 1306.89
  CO2
- sulfur dioxide: 3.12
  SO2
- nitrous oxide: 7.07
  NOx
- carbon monoxide: 6.19
  CO
- ethylene: 2.89
  乙烯
- Dust (unspecified, from stack): 4.48
  烟尘
- waste water - untreated: 179.82
  废水总量
- Oils, unspecified: 0.02
  石油类
- chemical oxygen demand: 2.57
  COD
- Production residues (unspecified): 3.1
  废渣

## Deviations from the LCI method approaches
Since the product output is not only ethylene, but also propylene and C4, whether it is cracking material, energy consumption, or pollutant discharge, it is necessary to carry out environmental load allocation among various products to obtain the environmental load that ethylene products should bear. The study adopts product quality as the allocation principle of inventory data, and according to the data in Table 1, the environmental load allocation coefficients of ethylene, propylene, and C4 can be calculated as 0.54, 0.26, and 0.19 respectively (there are calculation errors, but they have no impact on this research work)

## Data selection and combination
Conducted field research and data collection on the operation status and environmental load of the production process of the ethylene complex

## Data treatment and extrapolations
Based on the flue gas emission and CO2 emission concentration of the ethylene co-production unit, and according to the annual operating rate of a certain production line, it is estimated that the CO2 emission during the production of 1 ton of ethylene is 1516.65kg. Since the exact composition of the pyrolysis material consumed by a certain production line could not be obtained, the average value of the main components of the pyrolysis material was taken for the study. Among them, naphtha is 68.0%, and light diesel oil is 32.0%.

## Review details
Inventory: The internal review was done by several iteration steps concerning raw data validation, raw data documentation, representativity, completeness and consistency of modelling with regard to ISO 14040 and 14044.; Documentation: The review of the documentation was performed by Ecobilan and is in compliance with ISO 14040 and 14044. The data set documentation is correct in view of the appropriateness of the information provided. It includes all relevant information in view of data quality and scope of application of the respective LCI result.

## Data sources
- 袁宝荣, 聂祚仁, 狄向华, & 左铁镛. 乙烯生产的生命周期评价(Ⅰ)——目标与范围的确定和清单分析. 化工进展 334–336 (2006).
