# Other rubber products ; Natural Rubber, Synthetic Rubber, Reclaimed Rubber ; Mixing, vulcanizing ; All sizes; NESPS2 / 其他橡胶制品 ; 天然橡胶，合成橡胶，再生橡胶 ; 混炼，硫化 ; 所有规模 ; 全国第二次污染普查数据

Dataset: ILCD process, Unit process, single operation
Geography: CN
Reference year: 2019
Classification: Reference Parameters / Materials production / Other materials
Generated by: The data was created by the Office of the Second National Pollution Source Census of the Ministry of Ecology and Environment, and the data was organized by the TianGong Plan team for ILCD format / 生态环境部第二次全国污染源普查工作办公室创建数据，天工计划团队常慧敏整理数据为ILCD格式
Owner: Tiangong LCI Data Working Group / 天工LCI数据工作小组
Review: Dependent internal review by Tiangong LCI Data Working Group / 天工LCI数据工作小组
Amounts: no units in this file; such an amount is in the reference unit of its flow, which a separate flow dataset defines
copyright: false
licenseType: Free of charge for all users and uses

## General comment
the Technical of end-of-pipe management technology for pollution Exhaust gasis/，The formula for calculating the actual operation rate (k-value) of the end-of-pipe treatment facility is k = annual operating time of waste gas treatment facilities (hours) / annual normal production time of enterprises (hours)

## Technical purpose
该数据集涉及在生产不同橡胶制品过程中使用各种橡胶材料。这些材料包括天然橡胶、合成橡胶和再生橡胶。工业过程包括混合和硫化这些材料，以制造适合多种应用的橡胶商品，适用于所有规模的生产。数据中详细说明的尾端处理技术用于处理橡胶制造设施产生的废物流。这些技术的目的是减少废水和废气中的污染物，如化学需氧量(COD)、氨氮、有机结合氮、总磷、石油相关废物、废气、颗粒物(PM2.5 - PM10)以及挥发性有机化合物(VOCs)，以便在排放到环境之前进行处理。

## Reference product
- Natural Rubber: 1000, 1000 (2 entries); input; calculated
  源文件中描述为为天然橡胶，合成橡胶，再生橡胶，此处对其进行了匹配工作，将其匹配到LCAflow库里面相最符合的流，污染物指标备注为工业废水量

## Outputs
All rows: calculated
- phosphorus, total: 0.0004
  the Technical of end-of-pipe management technology for pollution phosphorus, totalisOil Separation - air flotation - precipitation，Its Technical efficiency of end-of-pipe management60，The formula for calculating the actual operation rate (k-value) of the end-of-pipe treatment facility is k = annual operating time of wastewater treatment facilities (hours) / annual normal production time of enterprises (hours)
  污染物指标总磷的末端治理技术是隔油-气浮-沉淀，其效率为60，末端治理设施实际运行率（k值）计算公式为k=污水治理设施运行时间（小时/年）/正常生产时间（小时/年）。原文件中描述污染物类别为废水，污染物指标为总磷，此处对其进行了匹配工作，将其匹配到LCAflow库里面相最符合的流，污染物指标备注为总磷
- particles (PM2.5 - PM10): 0.504
  the Technical of end-of-pipe management technology for pollution particles (PM2.5 - PM10)isBag filter，Its Technical efficiency of end-of-pipe management96，The formula for calculating the actual operation rate (k-value) of the end-of-pipe treatment facility is k = operating time of waste gas treatment facilities (hours) / normal production time of enterprises (hours)
  污染物指标颗粒物的末端治理技术是袋式除尘，其效率为96，末端治理设施实际运行率（k值）计算公式为k=废气治理设施运行时间（小时/年）/废气产污工段正常生产时间（小时/年）。原文件中描述污染物类别为废气，污染物指标为颗粒物，此处对其进行了匹配工作，将其匹配到LCAflow库里面相最符合的流，污染物指标备注为颗粒物
- volatile organic compound: 0.654
  the Technical of end-of-pipe management technology for pollution volatile organic compoundisActivated carbon adsorption，Its Technical efficiency of end-of-pipe management80，The formula for calculating the actual operation rate (k-value) of the end-of-pipe treatment facility is k = operating time of wastewater treatment facilities (hours) / annual normal production time of enterprise (hours)
  污染物指标挥发性有机物①的末端治理技术是活性炭吸附，其效率为80，末端治理设施实际运行率（k值）计算公式为k=废气治理设施运行时间（小时/年）/废气产污工段正常生产时间（小时/年）。原文件中描述污染物类别为废气，污染物指标为挥发性有机物①，此处对其进行了匹配工作，将其匹配到LCAflow库里面相最符合的流，污染物指标备注为挥发性有机物①
- Ammonia Nitrogen: 0.0009
  the Technical of end-of-pipe management technology for pollution Ammonia NitrogenisOil Separation - air flotation - precipitation，Its Technical efficiency of end-of-pipe management85，The formula for calculating the actual operation rate (k-value) of the end-of-pipe treatment facility is k = annual operating time of wastewater treatment facilities (hours) / annual normal production time of enterprises (hours)
  污染物指标氨氮的末端治理技术是隔油-气浮-沉淀，其效率为85，末端治理设施实际运行率（k值）计算公式为k=污水治理设施运行时间（小时/年）/正常生产时间（小时/年）。原文件中描述污染物类别为废水，污染物指标为氨氮，此处对其进行了匹配工作，将其匹配到LCAflow库里面相最符合的流，污染物指标备注为氨氮
- volatile organic compound: 1.308
  the Technical of end-of-pipe management technology for pollution volatile organic compoundisPhotocatalysis + low temperature plasma，Its Technical efficiency of end-of-pipe management60，The formula for calculating the actual operation rate (k-value) of the end-of-pipe treatment facility is k = operating time of wastewater treatment facilities (hours) / annual normal production time of enterprise (hours)
  污染物指标挥发性有机物①的末端治理技术是光催化+低温等离子体，其效率为60，末端治理设施实际运行率（k值）计算公式为k=废气治理设施运行时间（小时/年）/废气产污工段正常生产时间（小时/年）。原文件中描述污染物类别为废气，污染物指标为挥发性有机物①，此处对其进行了匹配工作，将其匹配到LCAflow库里面相最符合的流，污染物指标备注为挥发性有机物①
- volatile organic compound: 1.635
  the Technical of end-of-pipe management technology for pollution volatile organic compoundisLow temperature plasma，Its Technical efficiency of end-of-pipe management50，The formula for calculating the actual operation rate (k-value) of the end-of-pipe treatment facility is k = annual operating time of wastewater treatment facilities (hours) / annual normal production time of enterprises (hours)
  污染物指标挥发性有机物①的末端治理技术是低温等离子体，其效率为50，末端治理设施实际运行率（k值）计算公式为k=废气治理设施运行时间（小时/年）/废气产污工段正常生产时间（小时/年）。原文件中描述污染物类别为废气，污染物指标为挥发性有机物①，此处对其进行了匹配工作，将其匹配到LCAflow库里面相最符合的流，污染物指标备注为挥发性有机物①
- Petroleum-related waste: 0.0018
  the Technical of end-of-pipe management technology for pollution Petroleum-related wasteisOil Separation - air flotation - precipitation，Its Technical efficiency of end-of-pipe management80，The formula for calculating the actual operation rate (k-value) of the end-of-pipe treatment facility is k = annual operating time of wastewater treatment facilities (hours) / annual normal production time of enterprises (hours)
  污染物指标石油类的末端治理技术是隔油-气浮-沉淀，其效率为80，末端治理设施实际运行率（k值）计算公式为k=污水治理设施运行时间（小时/年）/正常生产时间（小时/年）。原文件中描述污染物类别为废水，污染物指标为石油类，此处对其进行了匹配工作，将其匹配到LCAflow库里面相最符合的流，污染物指标备注为石油类
- Waste water: 2370
  the Technical of end-of-pipe management technology for pollution Waste wateris/，The formula for calculating the actual operation rate (k-value) of the end-of-pipe treatment facility is k = operating time of waste gas treatment facilities (hours) / annual normal production time of enterprise (hours)
  污染物指标工业废水量的末端治理技术是/。原文件中描述污染物类别为废水，污染物指标为工业废水量，此处对其进行了匹配工作，将其匹配到LCAflow库里面相最符合的流，污染物指标备注为工业废水量
- Nitrogen, organic bound: 0.01265
  the Technical of end-of-pipe management technology for pollution Nitrogen, organic boundisOil Separation - air flotation - precipitation，Its Technical efficiency of end-of-pipe management45，The formula for calculating the actual operation rate (k-value) of the end-of-pipe treatment facility is k = annual operating time of wastewater treatment facilities (hours) / annual normal production time of enterprises (hours)
  污染物指标总氮的末端治理技术是隔油-气浮-沉淀，其效率为45，末端治理设施实际运行率（k值）计算公式为k=污水治理设施运行时间（小时/年）/正常生产时间（小时/年）。原文件中描述污染物类别为废水，污染物指标为总氮，此处对其进行了匹配工作，将其匹配到LCAflow库里面相最符合的流，污染物指标备注为总氮
- chemical oxygen demand: 0.08995
  the Technical of end-of-pipe management technology for pollution chemical oxygen demandisOil Separation - air flotation - precipitation，Its Technical efficiency of end-of-pipe management65，The formula for calculating the actual operation rate (k-value) of the end-of-pipe treatment facility is k = annual operating time of waste gas treatment facilities (hours) / annual normal production time of enterprises (hours)
  污染物指标化学需氧量的末端治理技术是隔油-气浮-沉淀，其效率为65，末端治理设施实际运行率（k值）计算公式为k=污水治理设施运行时间（小时/年）/正常生产时间（小时/年）。原文件中描述污染物类别为废水，污染物指标为化学需氧量，此处对其进行了匹配工作，将其匹配到LCAflow库里面相最符合的流，污染物指标备注为化学需氧量
- Exhaust gas: 74000
  the Technical of end-of-pipe management technology for pollution Exhaust gasis/，The formula for calculating the actual operation rate (k-value) of the end-of-pipe treatment facility is k = annual operating time of waste gas treatment facilities (hours) / annual normal production time of enterprises (hours)
  污染物指标工业废气量的末端治理技术是/。原文件中描述污染物类别为废气，污染物指标为工业废气量，此处对其进行了匹配工作，将其匹配到LCAflow库里面相最符合的流，污染物指标备注为工业废气量

## Use advice
This dataset is derived from the Pollution Source Census Report and contains information on pollution emissions and related products. However, it does not include data on energy or chemical consumption, nor does it provide information on waste or co-product generation. When utilizing this dataset, please supplement the missing data based on actual conditions before use
该数据集来源于污染源普查报告，包含污染物排放及相关产品信息，但不包含能源或化学品消耗数据，也不提供废弃物或共生产物产生信息。在使用该数据集时，请根据实际情况补充缺失数据后再使用。

## Review details
Inventory: The internal review was done by several iteration steps concerning raw data validation, raw data documentation, representativity, completeness and consistency of modelling with regard to ISO 14040 and 14044.
清单： 内部审查通过几个迭代步骤完成，涉及原始数据验证、原始数据记录、代表性、完整性、与 ISO 14040 和 14044 有关的建模的一致性。

## Data sources
- 第二次全国污染源普查产排污核算系数手册（试用版）,二级代码29,四级代码2919文件，在完整版文件中第3277页
