# Rare earth flotation;dysprosium;Bastnaesite/Monazite (B/M) Rare Earth Elements (REE) containing ore

Dataset: ILCD process, Unit process, single operation
Geography: CN
Reference year: 2010
Valid until: 2019
Classification: Unit processes / Materials production / Non-energetic raw materials
Functional unit: The goal of this investigation is to compare environmental impacts related to the production of 1 kg Dy (functional unit) from IAC (Southern China), from B/M ore (Bayan Obo), and from an eudialyte deposit (Norra Kärr) using the LCA method
LCI method principle: Attributional
LCI method approaches: Allocation - mass
Generated by: Tao Wang, twang@iue.ac.cn
Owner: Tiangong LCI Data Working Group
Review: Dependent internal review by Tiangong LCI Data Working Group
Amounts: no units in this file; such an amount is in the reference unit of its flow, which a separate flow dataset defines
copyright: false
licenseType: Free of charge for all users and uses

## General comment
The dysprosium acquired through the rare earth flotation process from REE-containing ore is primarily used in the manufacturing of permanent magnets, which are essential components for modern electronic devices, such as electric motors in hybrid vehicles, wind turbines, and hard disk drives. Additionally, dysprosium's unique properties make it suitable for use in nuclear reactors and laser materials.

## Geography
Southern China and Bayan Obo

## Technology and included processes
The goal of this investigation is to compare environmental impacts related to the production of 1 kg Dy (functional unit) from IAC (Southern China), from B/M ore (Bayan Obo), and from an eudialyte deposit (Norra Kärr) using the LCA method

## Reference product
- Rare Earth concentrate: 32.1; calculated
  RE concentrate. input for next process: Roasting

## Inputs
- Electricity: 16.272; calculated
  Electricity mix 2014
- Sodium silicate: 0.789
  Sodium silicate, spray powder, 80 %
- Fatty acid: 0.329
  fatty acid, from vegetable oil
- Chemicals organic,Chemicals, organic: 0.273
  chemical, organic. Precipitant unknown
- transport in t*km,transport in t*km: 0.511
  Transport, freight, lorry >32 metric ton, EURO3, organic chemicals 803 km, other chemicals 20 km

## Outputs
- tailings (unspecified): 2725; calculated
  Mass calculation from experts of RWTH Aachen University (Stark, 05.08.2015)

## Deviations from the LCI method approaches
In this study, an allocation method based on the mass of produced REEs combined with their market prices (based on an international metals market analysis and pricing index company ) are considered, as usual for metals with strongly different prices. As the ores have different compositions, the allocation factor has to be assessed individually for each site.

## Use advice
Users of this LCA data should consider the allocation method used in the study when applying the data to their own assessments. The allocation, based on the mass of produced REEs combined with their market prices, should be carefully applied to ensure accurate environmental impact evaluations. Users should also pay attention to site-specific data such as ore composition, technological applicability, and region-specific ecological impacts. It is advised to reassess the allocation factor individually for each site to maintain the robustness of comparative analyses.

## Review details
Inventory: The internal review was done by several iteration steps concerning raw data validation, raw data documentation, representativity, completeness and consistency of modelling with regard to ISO 14040 and 14044.

## Data sources
- Zapp, P., Marx, J., Schreiber, A., Friedrich, B. & Voßenkaul, D. Comparison of dysprosium production from different resources by life cycle assessment. Resources, Conservation and Recycling 130, 248–259 (2018).
