# Wet sand Production;Sand Screening;Vibrating Screen Screening

Dataset: ILCD process, Unit process, single operation
Geography: CS-HUN-CN
Reference year: 2020
Classification: Unit processes / Materials production / Other mineralic materials
Generated by: Cui hang, Cuihang0716@163.com
Owner: Tiangong LCI Data Working Group
Review: Dependent internal review by Tiangong LCI Data Working Group
Amounts: no units in this file; such an amount is in the reference unit of its flow, which a separate flow dataset defines
copyright: false
licenseType: Free of charge for all users and uses

## General comment
Screening of sand and gravel of different grain sizes

## Technical purpose
The process described is utilized for the screening of sand and gravel with various grain sizes. Typically, this service is incorporated into the aggregate industry for the classification and preparation of materials used in construction such as concrete, asphalt, and road base.

## Reference product
- gravel: 133333; measured

## Inputs
- gravel: 133333; measured
  Screening of required aggregates
- Electricity: 720; measured
  Electricity consumption of screening equipment

## Use advice
When utilizing this data set for Life Cycle Assessment, users should take into account the specific grain sizes being processed in relation to the intended use of the sand and gravel. Analyze the energy consumption and potential emissions based on the efficiency and type of the vibrating screens used. Consideration should also be given to the potential for recycling the screened materials and the methodology for handling the different fractions of materials screened.

## Review details
Inventory: The internal review was done by several iteration steps concerning raw data validation, raw data documentation, representativity, completeness and consistency of modelling with regard to ISO 14040 and 14044.

## Data sources
- 年产 60 万吨机制砂建设项目环评报告
