# Brick production ; Shale hollow brick production ; Mixing process

Dataset: ILCD process, Unit process, single operation
Geography: GZ-JX-CN
Reference year: 2020
Classification: Unit processes / Materials production / Other mineralic materials
Generated by: Wang xiangjin, r99rt4@163.com
Owner: Tiangong LCI Data Working Group
Review: Dependent internal review by Tiangong LCI Data Working Group
Amounts: no units in this file; such an amount is in the reference unit of its flow, which a separate flow dataset defines
copyright: false
licenseType: Free of charge for all users and uses

## General comment
Traditional shale hollow brick production process

## Technical purpose
The process described is used in the production of shale hollow bricks, which are commonly utilized in the construction industry for building residential and commercial structures. This type of brick offers a balance of durability and thermal insulation and is typically chosen for its load-bearing capabilities and energy efficiency. Shale hollow bricks can be used both in the construction of new buildings and the refurbishment of existing ones.

## Reference product
- brickbat aggregate: 1550; measured
  Mixed brick aggregate

## Inputs
All rows: measured
- brickbat aggregate: 1375
- Sludge: 168
- sodium hydroxide: 0.672
- freshwater: 0.00624
- Electricity: 3.7332

## Deviations from the LCI method approaches
The EIA report is based on the annual production of bricks (80 million bricks) as a whole, and for statistical purposes, the data has been converted according to the size specifications described therein, in terms of bricks produced per tonne of production

## Data selection and combination
Adopting the relevant data from the table of coefficients of production and discharge for sintered bricks and building blocks in 3131 of the Manual of Coefficients of Production and Discharge for Industrial Pollution Sources of the First National Pollution Sources Census (Seventh Subbook).

## Sampling procedure
The data for this EIA report is derived from real-time data from the plant

## Use advice
When utilizing this data set for Life Cycle Assessment purposes, please ensure that the data is accurately matched to the production size specified (80 million bricks annually). Adjustments must be made to scale the data accordingly if the application scenario deviates from this production volume. Users should also be aware of the emission coefficients as per the 'Manual of Coefficients of Production and Discharge for Industrial Pollution Sources of the First National Pollution Sources Census (Seventh Subbook)' and apply them to their specific context. It is important to confirm that the technological specificity, such as the mixing process for shale hollow brick production, aligns with the modeling requirements of the assessment.

## Review details
Inventory: The internal review was done by several iteration steps concerning raw data validation, raw data documentation, representativity, completeness and consistency of modelling with regard to ISO 14040 and 14044.

## Data sources
- 年产 8000 万块页岩标砖项目环评报告公示
