# cement production;cement, common portland cement;large new dry process, >4000 t-cl/d

Dataset: ILCD process, Unit process, black box
Geography: CN
Reference year: 2010
Classification: Materials production / Other mineralic materials
Generated by: Jing Guo, jingguo92@gmail.com
Owner: Tiangong LCI Data Working Group
Review: Dependent internal review by Tiangong LCI Data Working Group
Amounts: no units in this file; such an amount is in the reference unit of its flow, which a separate flow dataset defines
copyright: false
licenseType: Free of charge for all users and uses

## General comment
The new dry process method holds a market share of 61.82%, and the scale of the clinker production over 4000 tons per day accounts for 29.32%. In order to reflect the present environmental impact of China's cement industry, taking into account the adjustment of the industry structure and development status in recent years, and considering the differences in cement production technology and the size of different enterprises, China's cement industry is classified into four categories: large new dry process (>4000 tons of clinker per day), medium new dry process (2000~4000 tons of clinker per day), small new dry process (<2000 tons of clinker per day), and shaft kiln (<2000 tons of clinker per day).

## Technology and included processes
The new dry method accounts for 61.82% of the market share; >4000 tons-clinker/day, the scale share accounts for 29.32%. In order to reflect the environmental impact of China's cement industry at this stage, combined with the structural adjustment and development status of China's cement industry in recent years, and taking into account the level of cement production technology and the differences between cement companies of different sizes, this study divides China's cement industry into the following four categories : Large new dry process (>4000 tons-clinker/day), medium-sized new dry process (2000~4000 tons-clinker/day), small new dry process (<2000 tons-clinker/day) and vertical kiln ( <2000 tons-clinker/day).

## Technical purpose
This dataset describes the large new dry process for common portland cement production in China, with a capacity of more than 4000 tons of clinker per day. This production method is applicable for use in large-scale cement manufacturing facilities and is useful for construction industry stakeholders interested in understanding the environmental impact of cement production on a large scale. Common portland cement is widely used in the construction of buildings, infrastructure, highways, and other forms of concrete structures.

## Model description
Take 1 ton of general cement produced in China with a clinker content of 70% as the functional unit. Cement production includes raw meal preparation, clinker calcination and cement grinding.

## Reference product
- cement, common portland cement: 1000
  General cement with a clinker content of 70%.

## Inputs
- limestone, crushed, for mill: 930
  Limestone
- clay: 130
  Clay
- gypsum stone (CaSO4-dihydrate): 50
  Gypsum
- hard coal; 26.3 MJ/kg: 111.38
  Coal consumption during clinker burning. The coal consumption during burning is calculated based on the standard coal consumption per ton of clinker of different production processes and scales.
- hard coal; 26.3 MJ/kg: 3.5
  Coal consumption during raw material drying. The research takes the coal consumption for drying as 3.50kg/t-cement.
- electricity, medium voltage: 163.584
  Electricity consumption during clinker burning. The electricity consumption is calculated based on the comprehensive electricity consumption for different production processes and scales.
- electricity, medium voltage: 167.4
  Other electricity consumption. Electricity is mainly used for the drive of raw material crushing, raw mill, cement mill, dust removal equipment and other machinery. Electricity consumption is calculated according to the comprehensive electricity consumption of different production processes and scales.

## Outputs
- carbon dioxide: 573.4
  The CO2 emissions are calculated theoretically and consist of two aspects: on the one hand from the use of coal for calcining clinker and on the other hand from the decomposition of carbonates during the calcination of raw materials such as limestone (CaCO3) to produce lime (CaO).
- sulfur dioxide: 0.25
  SO2. SO2, NOX, and COD emissions were obtained from the results of the recent China Cement Industry Pollution Source Survey.
- Nitrogen oxides: 1.11
  NOX. SO2, NOX, and COD emissions were obtained from the results of the recent China Cement Industry Pollution Source Survey.
- particles (PM2.5): 0.2328
  <PM2.5. The graded emissions of particulate matter from cement products in functional units were calculated based on the investigation of particulate matter production coefficients of different cement production processes and scales by the pollution source census, as well as the proportion of particulate matter generated by different cement production equipment and the share of dust removal technology application and graded dust removal efficiency.
- particles (PM2.5 - PM10): 0.0347
  PM2.5-10. The graded emissions of particulate matter from cement products in functional units were calculated based on the investigation of particulate matter production coefficients of different cement production processes and scales by the pollution source census, as well as the proportion of particulate matter generated by different cement production equipment and the share of dust removal technology application and graded dust removal efficiency.
- chemical oxygen demand: 0.00012
  COD. SO2, NOX, and COD emissions were obtained from the results of the recent China Cement Industry Pollution Source Survey.

## Use advice
When using this dataset, users should specifically consider the large-scale production setting (>4000 tons-clinker/day) which is representative of a significant portion of the cement industry in China. Further segmentation within the dataset should be considered regarding technological variations and the structure of different cement companies. It is crucial to apply this data in the context of life-cycle assessment studies focused on environmental impacts, particularly given the substantial market share of the new dry process method within the industry. Users should also consider integrating this data with other lifecycle stages of cement use, including the potential for recycling and end-of-life scenarios.

## Review details
Inventory: The internal review was done by several iteration steps concerning raw data validation, raw data documentation, representativity, completeness and consistency of modelling with regard to ISO 14040 and 14044.

## Data sources
- 姜睿 & 王洪涛. (2010). 中国水泥工业的生命周期评价. 化学工程与装备, 4, 183–187.
