# Ethylene Production ; Ethylene ; Naphtha Route ; Naphtha

Dataset: ILCD process, Unit process, black box
Geography: DL-LN-CN
Reference year: 2021
Classification: Materials production / Organic chemicals
Functional unit: Define 1t of industrial grade ethylene product as a functional unit
LCI method principle: Attributional
LCI method approaches: Allocation - mass
Generated by: Yanan Ren, renyn15@tsinghua.org.cn
Owner: Tiangong LCI Data Working Group
Review: Dependent internal review by Tiangong LCI Data Working Group
Amounts: no units in this file; such an amount is in the reference unit of its flow, which a separate flow dataset defines
copyright: false
licenseType: Free of charge for all users and uses

## General comment
Hengli Petrochemical Chemical Ethylene Project, 1.5 million tons/year ethylene, steam cracking technology

## Geography
Dalian Changxing Island Petrochemical Park

## Time period
Not mentioned, replaced by the publication time of the document

## Technology and included processes
A typical steam cracking process is adopted in the model of naphtha route to ethylene. The upstream power source of the ethylene project is the power station of the refining project, which will meet the steam demand of the ethylene project by adjusting steam and power generation, and will not lead to an increase in pollution emissions. The scale of the ethylene plant is 1.5 million tons per year. Assuming that the annual operating time of the process plant is 8000 hours, the steam cracking process includes ethylene steam thermal cracking unit, dry gas recovery unit (abbreviated as ROG), spent alkali oxidation unit (referred to as WAO), pressure swing adsorption Hydrogen production (PSA for short) unit and ethylene cryogenic storage tank area.

## Technical purpose
The high purity ethylene produced by Hengli Petrochemical's steam cracking technology is intended for use in a variety of industrial applications such as the production of polymers (e.g., polyethylene, PVC), antifreeze, and solvents. Given its production capacity of 1.5 million tons/year and its critical role as a petrochemical feedstock, this ethylene is suited for large-scale industrial processes within the chemical industry.

## Model description
The naphtha, mixed C4, ethane, etc. involved in the raw materials are all from upstream refining and chemical projects, and the naphtha background database "naphtha market-global". The high-pressure steam and low-pressure steam of the public works part rely on the power station of the refining and chemical project, and the "chemical steam-global average" is retrospectively traced in the model. Fresh water relies on the water purification plant of the refinery project, and the model links "fresh water-raw material flow". Electricity consumption is partly traceable to "Electricity, Medium Voltage, State Grid of China". The pollutant discharge part follows the accounting principle of pollutant discharge in the petrochemical industry.

## Reference product
- ethene (ethylene): 1000; measured
  Ethylene

## Inputs
All rows: measured
- naphtha: 630
- C4 Hydrocarbon Mixture: 130
  Hybrid C4
- Ethane: 170
- Methane: 150
- Propane: 40
  propane
- benzene: 330
- Cooling water: 290
  process condensate
- Water (fresh water): 2290
  fresh water
- Water for industrial use: 1850
  production water
- process steam: 50
  High pressure steam
- Water (desalinated; deionized): 0.8
  Demineralized water
- electricity mix: 2.808
  electricity

## Outputs
All rows: measured
- nitrous oxide: 0.48
  NOx
- Dust (unspecified, from stack): 0.06
  particulates
- carbon monoxide: 0.28
  CO
- sulfur dioxide: 0.06
  SO2
- volatile organic compound: 0.06
  VOCs
- carbon dioxide: 1.39
  CO2
- water vapour: 118.48
  Steam blowdown
- Water (groundwater from technosphere, waste water): 7.56
  boiler wastewater
- Production residues (unspecified): 23.13
  tar residue
- Waste Alkaline Liquor: 46.27
  Waste lye with water

## Deviations from the LCI method approaches
This study chooses quality assignment

## Data selection and combination
The data of naphtha route to ethylene comes from the research data of Hengli Petrochemical Company.

## Use advice
When utilizing the data set for the industrial process of ethylene production via the naphtha route, users are advised to pay attention to the upstream sourcing of raw materials, such as naphtha, mixed C4, and ethane, which are derived from a refining and chemical project with a global average as a background. Additionally, consider the availability and impact of high-pressure and low-pressure steam, fresh water from the water purification plant, and electricity from the Chinese national grid. The pollutant emissions are to be accounted for according to the petrochemical industry standards. The functional unit for this data set is defined as 1 ton of industrial grade ethylene product, and quality assignment is used in the study. It is crucial to ensure that all factors are properly assessed when applying the data for life cycle analysis to accurately reflect the environmental impact of the process.

## Review details
Inventory: The internal review was done by several iteration steps concerning raw data validation, raw data documentation, representativity, completeness and consistency of modelling with regard to ISO 14040 and 14044.

## Data sources
- 赵悦如. 基于生命周期方法的乙烯生产环境影响分析. (大连理工大学, 2021).
