# Steel bar production ; Exposed steel was coated with corrosion resistant materials for protection ; Total of all wind farm

Dataset: ILCD process, Unit process, single operation
Geography: SH-CN
Reference year: 2009
Classification: Materials production / Metals and semimetals
Functional unit: The functional unit is 1 kWh on-grid electricity provision.
LCI method principle: Attributional
LCI method approaches: Allocation
Generated by: Yunzhi Zhao, ll10088@163.com
Owner: Tiangong LCI Data Working Group
Review: Dependent internal review by Tiangong LCI Data Working Group
Amounts: no units in this file; such an amount is in the reference unit of its flow, which a separate flow dataset defines
copyright: false
licenseType: Free of charge for all users and uses

## General comment
The corrosion-resistant coated steel bar described in the data set is used specifically for the construction and maintenance of offshore wind farms such as the Donghai Bridge Offshore Wind Farm (DBOWF). It is suitable for marine environments where structural components are exposed to saltwater and require protection against corrosion. These steel bars are critical for the durability and longevity of structures such as wind turbines, foundations, and supportive elements within the wind farm.

## Geography
The studied wind farm, the Donghai Bridge Offshore Wind Farm (DBOWF), is China's first offshore wind farm within the jurisdiction of Shanghai, as well as the first offshore wind farm outside Europe. The project has two-phases of construction, located on each side of the Donghai bridge (Fig. 1).

## Reference product
- steel rebar: 5.1e6; article inperiodical

## Inputs
- Energy, geothermal, converted: 1.04e7; software or database

## Outputs
- carbon dioxide: 999000; software or database
- particles (PM2.5): 200; software or database
- sulfur dioxide: 1600; software or database
- nitrous oxide: 1060; software or database

## Deviations from the LCI method approaches
The present study employed the PLCA modeling approach to calculate the energy and environmental emissions of a typical offshore wind farm in China. The cradle-to-grave process includes four stages, materials and equipment manufacturing, transportation and installation, operation and maintenance, and dismantling and recycling (Fig. 2).

## Data selection and combination
The technical parameters of wind turbines, foundations and cables are obtained from the design documents of the DBOWF (Table 2). The energy and emissions factors (i.e., the energy consumption and environmental emissions of per unit material and component production) are derived from the Ecoinvent 2.2 dataset (Ecoinvent Centre, 2009), and the coefficients of China's practices were preferentially referred. For key materials and equipment, their sea transportation energy is calculated from the transportation load and shipping energy intensity. The facility installation energy and emissions were estimated based on the construction plan. The wind farm's operation and maintenance data, such as the frequency and working time of maintenance, were obtained from site investigations with engineers and technicians. The uncertainties associated with model parameters and input data are illustrated in the sensitivity analysis section of this paper.

## Use advice
Users of this data set should apply the energy and emission factors with attention to the specific context of Chinese offshore wind farm practices, as these factors are sourced from the Ecoinvent 2.2 dataset with a preference for local coefficients. The life cycle stages from cradle to grave must be considered comprehensively, and when using this data for comparative assessments or other LCA studies, attention should be paid to the facility installation, maintenance practices, and dismantling methodologies as they contribute significantly to the overall energy consumption and emissions. The potential uncertainties detailed in the sensitivity analysis should be carefully evaluated as they can affect the outcomes of environmental impact assessments.

## Review details
Inventory: The internal review was done by several iteration steps concerning raw data validation, raw data documentation, representativity, completeness and consistency of modelling with regard to ISO 14040 and 14044.

## Data sources
- Yang, J. et al. The life-cycle energy and environmental emissions of a typical offshore wind farm in China. Journal of Cleaner Production 180, 316–324 (2018).
