# Remediated soil ; Mercury contaminated agricultural soil ; High temper ature desorption (HTD),

Dataset: ILCD process, Unit process, black box
Geography: GZ-CN
Reference year: 2016
Classification: Unit processes / Other Services / Repair and maintenance
Functional unit: The functional unit in this study is the treatment of 1 tonne of mercury contaminated top soil in agricultural land to meet regulatory standards. The average initial mercury concentration is 134 mg/kg.
Generated by: Yang Xintong, yangxt@caep.org.cn
Owner: Tiangong LCI Data Working Group
Review: Dependent internal review by Tiangong LCI Data Working Group
Amounts: no units in this file; such an amount is in the reference unit of its flow, which a separate flow dataset defines
copyright: false
licenseType: Free of charge for all users and uses

## General comment
According to laboratory scale feasibility studies, the contaminated soil can be remediated by heating at 700°C for 30 min, or heating at 400°C for 60 min with a citric acid addition

## Geography
The study site is agricultural land contaminated by mercury, located in Guizhou Province in Southern China.This particular case is representative of the typical scale and scenario where agricultural land is contaminated by nearby mining and smelting operations.

## Technology and included processes
In HTD, contaminated soil is excavated and stockpiled at the site. The soil is crushed and screened to remove large debris including plastic, rubber, rocks, etc. The pre-screened soil is then loaded into a kiln. After being heated at 700 °C for 30 min to reach the cleanup goal of 1.5 mg/kg, the soil is cooled by spraying water onto it. After cooling, the soil is stockpiled at the site before it is transported to a nearby location for stockpiling (i.e. non-beneficial usage). During the thermal treatment, atmospheric air is continuously drawn into the kiln via a vacuum pump, and the vaporized mercury is carried out with the exhaust air. The exhaust air is then cooled using a water cooling system and subsequently with an air to-air heat exchanger. The majority of mercury compounds are removed by condensation in two knock-out tanks. The exhaust air then flows through two air phase, sulfur-impreganated activated carbon vessels to meet the air emission threshold of 12 mg/m3 for new emission sources in China. The condensed water is coagulated with metal scavenger, calcium hydroxide and poly aluminum chloride and the sludge is dewatered. The sludge is containerized and transported to a permanent storage facility for long-term mercury disposal. The supernatant water is treated by two liquid phase, sulfur-impreganated activated carbon vessels. In the HTD, because high temperature heating significantly increases soil pH, decreases soil organic content, and changes soil color, the treated soil is considered unsuitable for on-site reuse. Therefore, top soil made from a borrow pit in a nearby area is imported to cover the excavated agricultural land area.

## Technical purpose
The high-temperature desorption (HTD) process is utilized for the remediation of mercury-contaminated agricultural soil, specifically designed to treat contamination resulting from proximity to mining and smelting operations. The treated soil obtained from this process is considered unsuitable for on-site reuse due to significant alterations in pH, organic content, and soil color. The remediated soil can potentially be used for landscape filling, construction activities, or other non-agricultural purposes where the soil qualities are deemed acceptable.

## Reference product
- Remediated soil: 1000; missing unimportant

## Inputs
All rows: missing unimportant
- coal-based powdered activated carbon: 1.1
- Plastic (unspecified): 0.25
- Steel: 1.6
- Concrete: 0.02
- Metal scavengers: 1.78
- hydrated lime dry slaked: 1.78
- Tap Water: 0.1
- transport in t*km: 51
- Electricity: 853.2
- Waste (solid): 3.6
  Mercury sludge for permanent storage
- Waste (solid): 1.1
  PAC with mercury residual for landilling
- contaminated soil: 1000

## Use advice
When utilizing the data set from this industrial process of high-temperature desorption for soil remediation, careful attention must be given to the specific conditions under which the process is effective, notably the temperature regimes and duration (700°C for 30 minutes or 400°C for 60 minutes with citric acid addition). Users should also consider the process's geographic and operational scope, which was studied on a southern Chinese agricultural site in Guizhou Province contaminated by nearby mercury sources. This data should not be generalized to all forms of soil contamination but is primarily applicable to similar mercury contamination scenarios. Moreover, the treatment's effect on soil properties must be recognized, particularly when considering potential reuse applications. The expected outputs, including the level to which mercury concentration is reduced (to 1.5 mg/kg), must be taken into account for regulatory compliance and environmental safety.

## Review details
Inventory: The internal review was done by several iteration steps concerning raw data validation, raw data documentation, representativity, completeness and consistency of modelling with regard to ISO 14040 and 14044.

## Data sources
- Hou D ,Gu Q ,Ma F , et al. Life cycle assessment comparison of thermal desorption and stabilization/solidification of mercury contaminated soil on agricultural land [J]. Journal of Cleaner Production, 2016, 139 949-956.
