# 污泥处理与处置|与烟煤混燃发电

Dataset: ILCD process, Unit process, single operation
Geography: SZ-JS-CN
Classification: Materials production / Other mineralic materials
Generated by: Jin Sitian, JSTian0302@163.com
Review: Dependent internal review by Tiangong LCI Data Working Group
Amounts: no units in this file; such an amount is in the reference unit of its flow, which a separate flow dataset defines

## Geography
苏州昆山某污泥混燃协同发电公司

## Reference product
- Sludge: 1000; input; estimated
  1 t 含水率 65%湿污泥

## Inputs
- Electricity: 113.328; article inperiodical
  生产上游：煤炭开采及运输过程与污泥运输及干化过程。
- water: 747; article inperiodical
  生产上游：煤炭开采及运输过程与污泥运输及干化过程。
- Diesel: 8.51; article inperiodical
  生产上游：煤炭开采及运输过程与污泥运输及干化过程。
- hard coal; 26.3 MJ/kg: 4.14; article inperiodical
  生产上游：煤炭开采及运输过程与污泥运输及干化过程。
- water: 5013; estimated
  生产过程
- hard coal; 26.3 MJ/kg: 446.7; estimated
  生产过程
- Diesel: 0.17; estimated
  生产下游：主要涉及焚烧后可利用固体废弃物。 固体废弃物主要包括锅炉飞灰、底渣与脱硫石膏等， 其中锅炉底渣、脱硫石膏等送至附近建材生产厂家 作原料使用，实现资源化利用。

## Outputs
- carbon dioxide: 37.48; article inperiodical
  生产上游：煤炭开采及运输过程与污泥运输及干化过程。
- methane: 0.614; article inperiodical
  生产上游：煤炭开采及运输过程与污泥运输及干化过程。
- nitrous oxide: 0.002; article inperiodical
  生产上游：煤炭开采及运输过程与污泥运输及干化过程。
- Nitrogen oxides: 0.19; article inperiodical
  生产上游：煤炭开采及运输过程与污泥运输及干化过程。
- sulfur dioxide: 0.095; article inperiodical
  生产上游：煤炭开采及运输过程与污泥运输及干化过程。
- carbon monoxide: 0.14; article inperiodical
  生产上游：煤炭开采及运输过程与污泥运输及干化过程。
- hydrocarbons (unspecified): 0.017; article inperiodical
  生产上游：煤炭开采及运输过程与污泥运输及干化过程。
- particles (PM10): 0.019; article inperiodical
  生产上游：煤炭开采及运输过程与污泥运输及干化过程。
- chemical oxygen demand: 13.93; article inperiodical
  生产上游：煤炭开采及运输过程与污泥运输及干化过程。
- ammonia: 0.027; article inperiodical
  生产上游：煤炭开采及运输过程与污泥运输及干化过程。
- Suspended solids, unspecified: 0.19; article inperiodical
  生产上游：煤炭开采及运输过程与污泥运输及干化过程。
- nitrogen, total (excluding N2): 0.001; article inperiodical
  生产上游：煤炭开采及运输过程与污泥运输及干化过程。
- phosphorus, total; article inperiodical
  生产上游：煤炭开采及运输过程与污泥运输及干化过程。
- Waste (solid): 30.02; article inperiodical
  生产上游：煤炭开采及运输过程与污泥运输及干化过程。
- carbon dioxide: 1492; estimated
  生产过程
- Nitrogen oxides: 0.52; estimated
  生产过程
- sulfur dioxide: 0.28; estimated
  生产过程
- carbon monoxide: 0.1; estimated
  生产过程
- particles (PM10): 0.052; estimated
  生产过程
- chemical oxygen demand: 0.01; estimated
  生产过程
- ammonia; estimated
  生产过程
- Suspended solids, unspecified: 0.005; estimated
  生产过程
- nitrogen, total (excluding N2); estimated
  生产过程
- phosphorus, total; estimated
  生产过程
- Waste (solid): 238.3; estimated
  生产过程
- carbon dioxide: 0.61; estimated
  生产下游：主要涉及焚烧后可利用固体废弃物。 固体废弃物主要包括锅炉飞灰、底渣与脱硫石膏等， 其中锅炉底渣、脱硫石膏等送至附近建材生产厂家 作原料使用，实现资源化利用。
- methane; estimated
  生产下游：主要涉及焚烧后可利用固体废弃物。 固体废弃物主要包括锅炉飞灰、底渣与脱硫石膏等， 其中锅炉底渣、脱硫石膏等送至附近建材生产厂家 作原料使用，实现资源化利用。
- nitrous oxide; estimated
  生产下游：主要涉及焚烧后可利用固体废弃物。 固体废弃物主要包括锅炉飞灰、底渣与脱硫石膏等， 其中锅炉底渣、脱硫石膏等送至附近建材生产厂家 作原料使用，实现资源化利用。
- Nitrogen oxides: 0.002; estimated
  生产下游：主要涉及焚烧后可利用固体废弃物。 固体废弃物主要包括锅炉飞灰、底渣与脱硫石膏等， 其中锅炉底渣、脱硫石膏等送至附近建材生产厂家 作原料使用，实现资源化利用。
- sulfur dioxide; estimated
  生产下游：主要涉及焚烧后可利用固体废弃物。 固体废弃物主要包括锅炉飞灰、底渣与脱硫石膏等， 其中锅炉底渣、脱硫石膏等送至附近建材生产厂家 作原料使用，实现资源化利用。
- carbon monoxide: 0.002; estimated
  生产下游：主要涉及焚烧后可利用固体废弃物。 固体废弃物主要包括锅炉飞灰、底渣与脱硫石膏等， 其中锅炉底渣、脱硫石膏等送至附近建材生产厂家 作原料使用，实现资源化利用。
- hydrocarbons (unspecified); estimated
  生产下游：主要涉及焚烧后可利用固体废弃物。 固体废弃物主要包括锅炉飞灰、底渣与脱硫石膏等， 其中锅炉底渣、脱硫石膏等送至附近建材生产厂家 作原料使用，实现资源化利用。
- particles (PM10); estimated
  生产下游：主要涉及焚烧后可利用固体废弃物。 固体废弃物主要包括锅炉飞灰、底渣与脱硫石膏等， 其中锅炉底渣、脱硫石膏等送至附近建材生产厂家 作原料使用，实现资源化利用。

## Review details
Inventory: The internal review was done by several iteration steps concerning raw data validation, raw data documentation, representativity, completeness and consistency of modelling with regard to ISO 14040 and 14044.; Documentation: The review of the documentation was performed by Ecobilan and is in compliance with ISO 14040 and 14044. The data set documentation is correct in view of the appropriateness of the information provided. It includes all relevant information in view of data quality and scope of application of the respective LCI result.

## Data sources
- 不同污泥混燃发电工艺生命周期评价
