# Formaldehyde-based adhesives ; Urea, phenol, melamine, formaldehyde, curing agent, plasticizer, thinner, filler, auxiliary ; Polymerization, physical mixing ; All sizes; NESPS2 / 甲醛类胶黏剂 ; 尿素、苯酚、三聚氰胺、甲醛、固化剂、增塑剂、稀释剂、填料、助剂 ; 聚合反应、物理混合 ; 所有规模 ; 全国第二次污染普查数据

Dataset: ILCD process, Unit process, single operation
Geography: CN
Reference year: 2019
Classification: Reference Parameters / Materials production / Organic chemicals
Generated by: The data was created by the Office of the Second National Pollution Source Census of the Ministry of Ecology and Environment, and the data was organized by the TianGong Plan team for ILCD format / 生态环境部第二次全国污染源普查工作办公室创建数据，天工计划团队常慧敏整理数据为ILCD格式
Owner: Tiangong LCI Data Working Group / 天工LCI数据工作小组
Review: Dependent internal review by Tiangong LCI Data Working Group / 天工LCI数据工作小组
Amounts: no units in this file; such an amount is in the reference unit of its flow, which a separate flow dataset defines
copyright: false
licenseType: Free of charge for all users and uses

## General comment
the Technical of end-of-pipe management technology for pollution Exhaust gasis/，Its Technical efficiency of end-of-pipe management0

## Technical purpose
使用尿素、苯酚、三聚氰胺、甲醛、固化剂、增塑剂、稀释剂、填料以及助剂经过聚合反应和物理混合工艺合成的甲醛类胶黏剂，主要用于建筑和家具行业中材料的粘接。适用于各种规模的生产。

## Reference product
- Formalin: 1000; calculated
  源文件中描述为为甲醛类胶黏剂，此处对其进行了匹配工作，将其匹配到LCAflow库里面相最符合的流，污染物指标备注为工业废气量

## Outputs
- volatile organic compound: 0.05047; calculated
  the Technical of end-of-pipe management technology for pollution volatile organic compoundisRegenerative thermal combustion method①，Its Technical efficiency of end-of-pipe management51
  污染物指标挥发性有机物的末端治理技术是蓄热式热力燃烧法①，其效率为51，末端治理设施实际运行率（k值）计算公式为k=设施年耗电量（千瓦）/设备设计耗电量（千瓦时），①指末端治理效率考虑了73%捕集效率
  。原文件中描述污染物类别为废气，污染物指标为挥发性有机物，此处对其进行了匹配工作，将其匹配到LCAflow库里面相最符合的流，污染物指标备注为挥发性有机物
- volatile organic compound: 0.06592; calculated
  the Technical of end-of-pipe management technology for pollution volatile organic compoundisAdsorption/catalytic combustion method①，Its Technical efficiency of end-of-pipe management36
  污染物指标挥发性有机物的末端治理技术是吸附/催化燃烧法①，其效率为36，末端治理设施实际运行率（k值）计算公式为k=设施年耗电量（千瓦）/设备设计耗电量（千瓦时），①指末端治理效率考虑了71%捕集效率
  。原文件中描述污染物类别为废气，污染物指标为挥发性有机物，此处对其进行了匹配工作，将其匹配到LCAflow库里面相最符合的流，污染物指标备注为挥发性有机物
- volatile organic compound: 0.07828; calculated
  the Technical of end-of-pipe management technology for pollution volatile organic compoundisPhotolysis①，Its Technical efficiency of end-of-pipe management24
  污染物指标挥发性有机物的末端治理技术是光解①，其效率为24，末端治理设施实际运行率（k值）计算公式为k=设施年耗电量（千瓦）/设备设计耗电量（千瓦时），①指末端治理效率考虑了72%捕集效率
  。原文件中描述污染物类别为废气，污染物指标为挥发性有机物，此处对其进行了匹配工作，将其匹配到LCAflow库里面相最符合的流，污染物指标备注为挥发性有机物
- Exhaust gas: 326; calculated
  the Technical of end-of-pipe management technology for pollution Exhaust gasis/，Its Technical efficiency of end-of-pipe management0
  污染物指标工业废气量的末端治理技术是/，其效率为0。原文件中描述污染物类别为废气，污染物指标为工业废气量，此处对其进行了匹配工作，将其匹配到LCAflow库里面相最符合的流，污染物指标备注为工业废气量

## Use advice
This dataset is derived from the Pollution Source Census Report and contains information on pollution emissions and related products. However, it does not include data on energy or chemical consumption, nor does it provide information on waste or co-product generation. When utilizing this dataset, please supplement the missing data based on actual conditions before use
该数据集来源于污染源普查报告，包含污染物排放及相关产品信息，但不包含能源或化学品消耗数据，也不提供废弃物或共生产物产生信息。在使用该数据集时，请根据实际情况补充缺失数据后再使用。

## Review details
Inventory: The internal review was done by several iteration steps concerning raw data validation, raw data documentation, representativity, completeness and consistency of modelling with regard to ISO 14040 and 14044.
清单： 内部审查通过几个迭代步骤完成，涉及原始数据验证、原始数据记录、代表性、完整性、与 ISO 14040 和 14044 有关的建模的一致性。

## Data sources
- 第二次全国污染源普查产排污核算系数手册（试用版）,四级代码2669文件，在完整版文件中第4111页
