# Beneficiation ; Copper concentrate ; Copper ore ; Grinding-flotation ; All sizes; NESPS2 / 选矿 ; 铜精矿 ; 铜矿石 ; 磨浮 ; 所有规模 ; 全国第二次污染普查数据

Dataset: ILCD process, Unit process, single operation
Geography: CN
Reference year: 2019
Classification: Reference Parameters / Materials production / Metals and semimetals
Generated by: The data was created by the Office of the Second National Pollution Source Census of the Ministry of Ecology and Environment, and the data was organized by the TianGong Plan team for ILCD format / 生态环境部第二次全国污染源普查工作办公室创建数据，天工计划团队常慧敏整理数据为ILCD格式
Owner: Tiangong LCI Data Working Group / 天工LCI数据工作小组
Review: Dependent internal review by Tiangong LCI Data Working Group / 天工LCI数据工作小组
Amounts: no units in this file; such an amount is in the reference unit of its flow, which a separate flow dataset defines
copyright: false
licenseType: Free of charge for all users and uses

## General comment
the Technical of end-of-pipe management technology for pollution Exhaust gasis/

## Technical purpose
选矿铜精矿的工艺包括适用于各种生产规模的铜矿石磨浮技术。所加工的铜精矿被用于制造铜制品，包括导线、管道和电子部件。端部处理技术用于在工艺过程中减少废水和废气的污染。采用化学沉淀和沉淀分离技术去除废水中的有害物质如汞、镉、铅和砷，而袋式过滤器和湿式沉降方法用于控制废气中的颗粒物排放。

## Reference product
- Copper ore: 1000; input; calculated
  源文件中描述为为铜矿石，此处对其进行了匹配工作，将其匹配到LCAflow库里面相最符合的流，污染物指标备注为工业废水量

## Outputs
All rows: calculated
- Mercury: 1.01e-7
  the Technical of end-of-pipe management technology for pollution MercuryisChemical precipitation，Its Technical efficiency of end-of-pipe management90
  污染物指标汞的末端治理技术是化学沉淀法，其效率为90，末端治理设施实际运行率（k值）计算公式为k=废水治理设施运行时间（小时/年）/企业正常生产时间（小时/年）。原文件中描述污染物类别为废水，污染物指标为汞，此处对其进行了匹配工作，将其匹配到LCAflow库里面相最符合的流，污染物指标备注为汞
- Mercury: 7.07e-7
  the Technical of end-of-pipe management technology for pollution MercuryisPrecipitation separation，Its Technical efficiency of end-of-pipe management30
  污染物指标汞的末端治理技术是沉淀分离，其效率为30，末端治理设施实际运行率（k值）计算公式为k=废水治理设施运行时间（小时/年）/企业正常生产时间（小时/年）。原文件中描述污染物类别为废水，污染物指标为汞，此处对其进行了匹配工作，将其匹配到LCAflow库里面相最符合的流，污染物指标备注为汞
- cadmium: 3.3e-6
  the Technical of end-of-pipe management technology for pollution cadmiumisChemical precipitation，Its Technical efficiency of end-of-pipe management90
  污染物指标镉的末端治理技术是化学沉淀法，其效率为90，末端治理设施实际运行率（k值）计算公式为k=废水治理设施运行时间（小时/年）/企业正常生产时间（小时/年）。原文件中描述污染物类别为废水，污染物指标为镉，此处对其进行了匹配工作，将其匹配到LCAflow库里面相最符合的流，污染物指标备注为镉
- lead: 8.6e-6
  the Technical of end-of-pipe management technology for pollution leadisChemical precipitation，Its Technical efficiency of end-of-pipe management90
  污染物指标铅的末端治理技术是化学沉淀法，其效率为90，末端治理设施实际运行率（k值）计算公式为k=废水治理设施运行时间（小时/年）/企业正常生产时间（小时/年）。原文件中描述污染物类别为废水，污染物指标为铅，此处对其进行了匹配工作，将其匹配到LCAflow库里面相最符合的流，污染物指标备注为铅
- arsenic: 1.4e-5
  the Technical of end-of-pipe management technology for pollution arsenicisChemical precipitation，Its Technical efficiency of end-of-pipe management90
  污染物指标砷的末端治理技术是化学沉淀法，其效率为90，末端治理设施实际运行率（k值）计算公式为k=废水治理设施运行时间（小时/年）/企业正常生产时间（小时/年）。原文件中描述污染物类别为废水，污染物指标为砷，此处对其进行了匹配工作，将其匹配到LCAflow库里面相最符合的流，污染物指标备注为砷
- particles (PM2.5 - PM10): 0.0182
  the Technical of end-of-pipe management technology for pollution particles (PM2.5 - PM10)isBag filter，Its Technical efficiency of end-of-pipe management98
  污染物指标颗粒物的末端治理技术是袋式除尘，其效率为98，末端治理设施实际运行率（k值）计算公式为k=废气治理设施运行时间（小时/年）/企业正常生产时间（小时/年）。原文件中描述污染物类别为废气，污染物指标为颗粒物，此处对其进行了匹配工作，将其匹配到LCAflow库里面相最符合的流，污染物指标备注为颗粒物
- cadmium: 2.31e-5
  the Technical of end-of-pipe management technology for pollution cadmiumisPrecipitation separation，Its Technical efficiency of end-of-pipe management30
  污染物指标镉的末端治理技术是沉淀分离，其效率为30，末端治理设施实际运行率（k值）计算公式为k=废水治理设施运行时间（小时/年）/企业正常生产时间（小时/年）。原文件中描述污染物类别为废水，污染物指标为镉，此处对其进行了匹配工作，将其匹配到LCAflow库里面相最符合的流，污染物指标备注为镉
- lead: 6.02e-5
  the Technical of end-of-pipe management technology for pollution leadisPrecipitation separation，Its Technical efficiency of end-of-pipe management30
  污染物指标铅的末端治理技术是沉淀分离，其效率为30，末端治理设施实际运行率（k值）计算公式为k=废水治理设施运行时间（小时/年）/企业正常生产时间（小时/年）。原文件中描述污染物类别为废水，污染物指标为铅，此处对其进行了匹配工作，将其匹配到LCAflow库里面相最符合的流，污染物指标备注为铅
- particles (PM2.5 - PM10): 0.091
  the Technical of end-of-pipe management technology for pollution particles (PM2.5 - PM10)isWet precipitation，Its Technical efficiency of end-of-pipe management90
  污染物指标颗粒物的末端治理技术是湿式除尘，其效率为90，末端治理设施实际运行率（k值）计算公式为k=废气治理设施运行时间（小时/年）/企业正常生产时间（小时/年）。原文件中描述污染物类别为废气，污染物指标为颗粒物，此处对其进行了匹配工作，将其匹配到LCAflow库里面相最符合的流，污染物指标备注为颗粒物
- arsenic: 9.8e-5
  the Technical of end-of-pipe management technology for pollution arsenicisPrecipitation separation，Its Technical efficiency of end-of-pipe management30
  污染物指标砷的末端治理技术是沉淀分离，其效率为30，末端治理设施实际运行率（k值）计算公式为k=废水治理设施运行时间（小时/年）/企业正常生产时间（小时/年）。原文件中描述污染物类别为废水，污染物指标为砷，此处对其进行了匹配工作，将其匹配到LCAflow库里面相最符合的流，污染物指标备注为砷
- Waste water: 2780
  the Technical of end-of-pipe management technology for pollution Waste wateris/
  污染物指标工业废水量的末端治理技术是/，末端治理设施实际运行率（k值）计算公式为/。原文件中描述污染物类别为废水，污染物指标为工业废水量，此处对其进行了匹配工作，将其匹配到LCAflow库里面相最符合的流，污染物指标备注为工业废水量
- chemical oxygen demand: 0.161875
  the Technical of end-of-pipe management technology for pollution chemical oxygen demandisPrecipitation separation，Its Technical efficiency of end-of-pipe management30
  污染物指标化学需氧量的末端治理技术是沉淀分离，其效率为30，末端治理设施实际运行率（k值）计算公式为k=废水治理设施运行时间（小时/年）/企业正常生产时间（小时/年）。原文件中描述污染物类别为废水，污染物指标为化学需氧量，此处对其进行了匹配工作，将其匹配到LCAflow库里面相最符合的流，污染物指标备注为化学需氧量
- Exhaust gas: 576.72
  the Technical of end-of-pipe management technology for pollution Exhaust gasis/
  污染物指标工业废气量的末端治理技术是/，末端治理设施实际运行率（k值）计算公式为/。原文件中描述污染物类别为废气，污染物指标为工业废气量，此处对其进行了匹配工作，将其匹配到LCAflow库里面相最符合的流，污染物指标备注为工业废气量

## Use advice
This dataset is derived from the Pollution Source Census Report and contains information on pollution emissions and related products. However, it does not include data on energy or chemical consumption, nor does it provide information on waste or co-product generation. When utilizing this dataset, please supplement the missing data based on actual conditions before use
该数据集来源于污染源普查报告，包含污染物排放及相关产品信息，但不包含能源或化学品消耗数据，也不提供废弃物或共生产物产生信息。在使用该数据集时，请根据实际情况补充缺失数据后再使用。

## Review details
Inventory: The internal review was done by several iteration steps concerning raw data validation, raw data documentation, representativity, completeness and consistency of modelling with regard to ISO 14040 and 14044.
清单： 内部审查通过几个迭代步骤完成，涉及原始数据验证、原始数据记录、代表性、完整性、与 ISO 14040 和 14044 有关的建模的一致性。

## Data sources
- 第二次全国污染源普查产排污核算系数手册（试用版）,二级代码09,四级代码0911文件，在完整版文件中第3413页
