# Municipal sludge treatment and disposal;dry sludge;co-combustion

Dataset: ILCD process, Unit process, single operation
Geography: CN
Classification: Unit processes / End-of-life treatment / Waste water treatment
Functional unit: One ton of sludge on a dry basis (1 t-DS) is defined as the functional unit.
Generated by: Jin Sitian, 2331276@tongji.edu.cn
Owner: Tiangong LCI Data Working Group
Review: Dependent internal review by Tiangong LCI Data Working Group
Amounts: no units in this file; such an amount is in the reference unit of its flow, which a separate flow dataset defines
copyright: ['opt4ROkqig']
licenseType: Free of charge for all users and uses

## General comment
Several typical sludge treatment facilities in China, representing anaerobic digestion, composting, co-combustion, thermal drying-incineration, and cement production, respectively, are selected to carry out the inventory. Data are mainly taken from the site-specific measurement, either by field survey or by operation report. Sludge characteristics are based on the average values of the sites investigated.

## Technology and included processes
The dewatered sludge, with a moisture content of 78%, is mixed with coal at a ratio of 24% for co-combustion.23 The chosen power plant is of fluidized bed type. Sludge and coal are combusted at 850 °C, and exhaust gases from the combustion chamber are used for electricity generation. Twenty percent of the produced electricity is required to meet the input energy demand; with the remaining delivered to the city’s power grid.

## Technical purpose
This data set describes the process of municipal sludge treatment and disposal through co-combustion. The dry sludge derived from this process is primarily used for energy recovery in waste-to-energy facilities, where it is co-fired with other fuels.

## Reference product
- Sludge: 1000; input; estimated
  a dry basis (1 t-DS)

## Inputs
All rows: measured
- Electricity: 26924.4
- Diesel: 2
- hard coal; 26.3 MJ/kg: 18900
  coal
- hydrogen chloride gas: 55.5
- sodium hydroxide: 49.7
- Limestone: 800

## Outputs
- electricity from waste incineration: 134626; measured
- mineral waste (ash): 4700; measured
  incineration ash

## Use advice
Users of this data should consider the specific context of the co-combustion process when applying this data set. The functional unit of 1 ton dry sludge (1 t-DS) must be consistently used in LCA models. Attention should be paid to the energy mix and the emissions associated with the co-combustion process. It is essential to consider the regional variations in waste composition and energy infrastructure.

## Review details
Inventory: The internal review was done by several iteration steps concerning raw data validation, raw data documentation, representativity, completeness and consistency of modelling with regard to ISO 14040 and 14044.

## Data sources
- Dong, J., Chi, Y., Tang, Y., Wang, F. & Huang, Q. Combined Life Cycle Environmental and Exergetic Assessment of Four Typical Sewage Sludge Treatment Techniques in China. Energy Fuels 28, 2114–2122 (2014).
