# High Nickel Matte Production ; Nickel-Copper Mixed Concentrates ; Pyrometallurgy ; Nickel-Copper-Cobalt Ore in Xinjiang Province

Dataset: ILCD process, Unit process, single operation
Geography: GS-CN
Reference year: 2018
Classification: Unit processes / Materials production / Metals and semimetals
Generated by: Sun Xin, xs389@cornell.edu
Owner: Tiangong LCI Data Working Group
Review: Dependent internal review by Tiangong LCI Data Working Group
Amounts: no units in this file; such an amount is in the reference unit of its flow, which a separate flow dataset defines
licenseType: Free of charge for all users and uses

## General comment
The system boundary of the electrolytic nickel production was established via a cradle-to-gate approach. Three stages, namely, the mining and beneficiation stages, the pyrometallurgical stage, and the refining stage, were investigated.

## Technology and included processes
Given the complexity of geology and resource features, the cemented backfilling method was applied to extract nickel raw ore during mining, and the selected filling material and adhesive were tailings and cement, respectively. Underground construction machinery (e.g., rock drill, slag-raking machine, electric locomotive, and harvesters) and ground construction machinery (e.g., tower crane, electric welding machine, and truck) were used in the mining process. For the beneficiation process, nickel ore was processed by jaw crushers, a circular vibrating screen, ball mills, a flotation machine and a thickener to obtain the mixed nickel–copper concentrate with a nickel content of approximately 8.6%. Subsequently, the concentrate was processed at the pyrometallurgical stage, and then nickel was enriched into high nickel matte using flash smelting technology. At this stage, the mixed concentrate was first smelted in a flash furnace to produce a low nickel matte, and then the converter blew the low nickel matte into high nickel matte and slag. The slag was placed in an electric cleaning furnace to generate low nickel matte and then the resultant material was put again in the converter.

## Technical purpose
The high nickel matte production process described involves the utilization of nickel-copper mixed concentrates through pyrometallurgical methods. This high-grade nickel product is primarily used in the manufacturing of stainless steel, rechargeable batteries, and special alloys. It plays a critical role in the production of materials that demand corrosion resistance and high-temperature performance.

## Reference product
- Nickel matte: 1000; measured

## Inputs
All rows: measured
- Nickel concentrate (8.6% Ni): 11794
- water: 30410
- sand: 1370
- Heavy fuel oil (1.0 wt.% S): 20
- oxygen: 1060
- sodium hydroxide: 0.74
- Calcium Oxide: 25.71
- Aluminum oxide (alumina): 0.03
- Sodium sulfide: 9.46
- transport in t*km: 16.67
- Electricity: 1980.5
- Diesel: 13.53
- process steam: 170
- Refractory material: 13.42
- Cathode Material: 13.42
- Polyacrylamide,Polyacrylamide: 1.41

## Outputs
All rows: measured
- particles (PM2.5 - PM10): 0.12
- sulfur dioxide: 0.51
- nitrous oxide: 2.26
- hydrogen sulfide: 0.00113
- sulphuric acid: 0.00038
- nickel: 7.5e-6, 0.00475 (2 entries)
- cadmium: 1.75e-11, 7e-5 (2 entries)
- lead: 8.3e-7, 0.00137 (2 entries)
- arsenic: 7.64e-9, 0.00604 (2 entries)
- mercury: 3.74e-10, 0.00012 (2 entries)
- cobalt: 0.00024
- chromium: 0.00058
- copper: 0.00094
- zinc: 0.07604
- waste water - untreated: 3740
- municipal solid waste deposition: 100
- Hazardous waste (unspec.): 9.37

## Use advice
When integrating this dataset into a Life Cycle Assessment, special consideration should be given to the geographic specificity of the nickel-copper-cobalt ore originating from Xinjiang Province, as the environmental impacts may differ significantly from other regions. Users should also consider the upstream impacts of mining and concentration, as well as the downstream effects on recycling and waste treatment associated with this production process. Exclusion criteria must be defined clearly to avoid double-counting, especially when considering the potential for closed-loop recycling within the nickel industry.

## Review details
Inventory: The internal review was done by several iteration steps concerning raw data validation, raw data documentation, representativity, completeness and consistency of modelling with regard to ISO 14040 and 14044.

## Data sources
- Bai, Y. et al. Strategies for improving the environmental performance of nickel production in China: Insight into a life cycle assessment. Journal of Environmental Management 312, 114949 (2022).
