# Steam/hot water/other ; Lignite ; Pulverized coal furnace ; All sizes; NESPS2 / 蒸汽/热水/其它 ; 褐煤 ; 煤粉炉 ; 所有规模 ; 全国第二次污染普查数据

Dataset: ILCD process, Unit process, single operation
Geography: CN
Reference year: 2019
Classification: Reference Parameters / Energy carriers and technologies / Heat and steam
Generated by: The data was created by the Office of the Second National Pollution Source Census of the Ministry of Ecology and Environment, and the data was organized by the TianGong Plan team for ILCD format / 生态环境部第二次全国污染源普查工作办公室创建数据，天工计划团队常慧敏整理数据为ILCD格式
Owner: Tiangong LCI Data Working Group / 天工LCI数据工作小组
Review: Dependent internal review by Tiangong LCI Data Working Group / 天工LCI数据工作小组
Amounts: no units in this file; such an amount is in the reference unit of its flow, which a separate flow dataset defines
copyright: false
licenseType: Free of charge for all users and uses

## General comment
the Technical of end-of-pipe management technology for pollution sulfur dioxideisSodium alkali method，Its Technical efficiency of end-of-pipe management92.5

## Technical purpose
本工业过程涉及产生蒸汽、热水和其他公用系统，这些公用系统由各种规模的褐煤粉煤炉提供。过程中包含专门的尾气处理技术，旨在控制燃烧过程产生的二氧化硫（SO2）、烟尘和氮氧化物（NOx）排放。提及的污染控制技术包括用于SO2的湿式沉降、石灰石/石膏湿法过程、氧化镁法、纳碱法、氨法、双碱法；用于烟尘的机械除尘加湿式沉降、机械除尘加湿式沉降和脱硫、布袋过滤技术、干式静电沉降技术、电袋组合除尘器。未描述氮氧化物排放的管理技术。

## Reference product
- brown coal; 11.9 MJ/kg: 1000; input; calculated
  源文件中描述为为褐煤，此处对其进行了匹配工作，将其匹配到LCAflow库里面相最符合的流，污染物指标备注为工业废气量

## Outputs
All rows: calculated
- Nitrogen oxides: 4.72
  the Technical of end-of-pipe management technology for pollution Nitrogen oxidesis/，Its Technical efficiency of end-of-pipe management0
  污染物指标氮氧化物的末端治理技术是/，其效率为0。原文件中描述污染物类别为废气，污染物指标为氮氧化物，此处对其进行了匹配工作，将其匹配到LCAflow库里面相最符合的流，污染物指标备注为氮氧化物
- Exhaust gas: 5915
  the Technical of end-of-pipe management technology for pollution Exhaust gasis/
  污染物指标工业废气量的末端治理技术是/。原文件中描述污染物类别为废气，污染物指标为工业废气量，此处对其进行了匹配工作，将其匹配到LCAflow库里面相最符合的流，污染物指标备注为工业废气量
- Exhaust gas: 5915
  the Technical of end-of-pipe management technology for pollution Exhaust gasisWith terminal treatment technology
  污染物指标工业废气量的末端治理技术是有末端治理。原文件中描述污染物类别为废气，污染物指标为工业废气量，此处对其进行了匹配工作，将其匹配到LCAflow库里面相最符合的流，污染物指标备注为工业废气量
- sulfur dioxide: 0
  Pollutant indicator sulfur dioxide end-of-pipe treatment technology is /, its efficiency is 0. The original document describes the pollutant category as exhaust gas, the pollutant indicator is sulfur dioxide, here to match it to the LCAflow library in the most compatible flow, the pollutant indicator note for sulfur dioxide original description of the production coefficient is 17S (no furnace desulfurization). Please modify the corresponding emissions after accounting for yourself according to the note.
  污染物指标二氧化硫的末端治理技术是/，其效率为0。原文件中描述污染物类别为废气，污染物指标为二氧化硫，此处对其进行了匹配工作，将其匹配到LCAflow库里面相最符合的流，污染物指标备注为二氧化硫原文描述的产污系数为 17S（无炉内脱硫）。请根据备注自行核算后修改对应的排放量。
- sulfur dioxide: 0
  Pollutant indicator sulfur dioxide end-of-pipe treatment technology is /, its efficiency is 0. The original document describes the pollutant category as exhaust gas, the pollutant indicator is sulfur dioxide, here to match it to the LCAflow library in the most compatible flow, the pollutant indicator note for sulfur dioxide original description of the production coefficient of 13.6S (in-furnace desulfurization). Please modify the corresponding emissions after accounting for yourself according to the note.
  污染物指标二氧化硫的末端治理技术是/，其效率为0。原文件中描述污染物类别为废气，污染物指标为二氧化硫，此处对其进行了匹配工作，将其匹配到LCAflow库里面相最符合的流，污染物指标备注为二氧化硫原文描述的产污系数为 13.6S（炉内脱硫）。请根据备注自行核算后修改对应的排放量。
- sulfur dioxide: 0
  Pollutant indicators of sulfur dioxide end of the treatment technology is wet dust removal method, its efficiency is 15, the end of the treatment facilities actual operating rate (k value) formula for K = desulfurization facilities annual operating hours / boiler annual operating hours. The original document describes the pollutant category as exhaust gas, pollutant indicators for sulfur dioxide, here to match it to the LCAflow library face to face the most compatible flow, pollutant indicators note for sulfur dioxide original description of the production coefficient of 17S (no furnace desulfurization). Please modify the corresponding emissions after accounting for yourself according to the note.
  污染物指标二氧化硫的末端治理技术是湿法除尘法，其效率为15，末端治理设施实际运行率（k值）计算公式为K=脱硫设施年运行小时数/锅炉年运行小时数。原文件中描述污染物类别为废气，污染物指标为二氧化硫，此处对其进行了匹配工作，将其匹配到LCAflow库里面相最符合的流，污染物指标备注为二氧化硫原文描述的产污系数为 17S（无炉内脱硫）。请根据备注自行核算后修改对应的排放量。
- Flue dust: 0
  The end-of-pipe treatment technology for the pollutant indicator soot is /, and its efficiency is 0. The original document describes the pollutant category as exhaust gas, and the pollutant indicator as soot, and the matching work is carried out here to match it to the flow that is most compatible with the LCAflow library, and the production coefficient of the pollutant indicator, which is described in the original document as soot, is 8.93 A. Please modify the corresponding emission level after accounting according to the notes..The original article describes the pollution production coefficients as 8.93A。Please revise the corresponding emissions after accounting for them according to the notes.。.The original article describes the pollution production coefficients as 8.93A. Please revise the corresponding emissions after accounting for them according to the notes.
  污染物指标烟尘的末端治理技术是/，其效率为0。原文件中描述污染物类别为废气，污染物指标为烟尘，此处对其进行了匹配工作，将其匹配到LCAflow库里面相最符合的流，污染物指标备注为烟尘原文描述的产污系数为 8.93A。请根据备注自行核算后修改对应的排放量。
- Flue dust: 0
  the Technical of end-of-pipe management technology for pollution Flue dustisBag filter technology，Its Technical efficiency of end-of-pipe management99.6.The original article describes the pollution production coefficients as 8.93A。Please revise the corresponding emissions after accounting for them according to the notes.。.The original article describes the pollution production coefficients as 8.93A. Please revise the corresponding emissions after accounting for them according to the notes.
  污染物指标烟尘的末端治理技术是袋式除尘技术，其效率为99.6，末端治理设施实际运行率（k值）计算公式为K=除尘设施年运行小时数/锅炉年运行小时数。原文件中描述污染物类别为废气，污染物指标为烟尘，此处对其进行了匹配工作，将其匹配到LCAflow库里面相最符合的流，污染物指标备注为烟尘原文描述的产污系数为 8.93A。请根据备注自行核算后修改对应的排放量。
- Flue dust: 0
  the Technical of end-of-pipe management technology for pollution Flue dustisDry electrostatic precipitation technology，Its Technical efficiency of end-of-pipe management97.The original article describes the pollution production coefficients as 8.93A。Please revise the corresponding emissions after accounting for them according to the notes.。.The original article describes the pollution production coefficients as 8.93A. Please revise the corresponding emissions after accounting for them according to the notes.
  污染物指标烟尘的末端治理技术是干式电除尘技术，其效率为97，末端治理设施实际运行率（k值）计算公式为K=除尘设施年运行小时数/锅炉年运行小时数。原文件中描述污染物类别为废气，污染物指标为烟尘，此处对其进行了匹配工作，将其匹配到LCAflow库里面相最符合的流，污染物指标备注为烟尘原文描述的产污系数为 8.93A。请根据备注自行核算后修改对应的排放量。
- Flue dust: 0
  the Technical of end-of-pipe management technology for pollution Flue dustisElectric-bag composite precipitator，Its Technical efficiency of end-of-pipe management99.8.The original article describes the pollution production coefficients as 8.93A。Please revise the corresponding emissions after accounting for them according to the notes.。.The original article describes the pollution production coefficients as 8.93A. Please revise the corresponding emissions after accounting for them according to the notes.
  污染物指标烟尘的末端治理技术是电袋复合除尘技术，其效率为99.8，末端治理设施实际运行率（k值）计算公式为K=除尘设施年运行小时数/锅炉年运行小时数。原文件中描述污染物类别为废气，污染物指标为烟尘，此处对其进行了匹配工作，将其匹配到LCAflow库里面相最符合的流，污染物指标备注为烟尘原文描述的产污系数为 8.93A。请根据备注自行核算后修改对应的排放量。
- Flue dust: 0
  the Technical of end-of-pipe management technology for pollution Flue dustisMechanical dust removal + wet precipitation and desulfurization，Its Technical efficiency of end-of-pipe management92.The original article describes the pollution production coefficients as 8.93A。Please revise the corresponding emissions after accounting for them according to the notes.。.The original article describes the pollution production coefficients as 8.93A. Please revise the corresponding emissions after accounting for them according to the notes.
  污染物指标烟尘的末端治理技术是机械+湿式除尘脱硫，其效率为92，末端治理设施实际运行率（k值）计算公式为K=除尘设施年运行小时数/锅炉年运行小时数。原文件中描述污染物类别为废气，污染物指标为烟尘，此处对其进行了匹配工作，将其匹配到LCAflow库里面相最符合的流，污染物指标备注为烟尘原文描述的产污系数为 8.93A。请根据备注自行核算后修改对应的排放量。
- Flue dust: 0
  the Technical of end-of-pipe management technology for pollution Flue dustisMechanical dust removal + wet precipitation，Its Technical efficiency of end-of-pipe management92.The original article describes the pollution production coefficients as 8.93A。Please revise the corresponding emissions after accounting for them according to the notes.。.The original article describes the pollution production coefficients as 8.93A. Please revise the corresponding emissions after accounting for them according to the notes.
  污染物指标烟尘的末端治理技术是机械+湿法除尘法，其效率为92，末端治理设施实际运行率（k值）计算公式为K=除尘设施年运行小时数/锅炉年运行小时数。原文件中描述污染物类别为废气，污染物指标为烟尘，此处对其进行了匹配工作，将其匹配到LCAflow库里面相最符合的流，污染物指标备注为烟尘原文描述的产污系数为 8.93A。请根据备注自行核算后修改对应的排放量。
- sulfur dioxide: 0
  the Technical of end-of-pipe management technology for pollution sulfur dioxideisAmmonia method，Its Technical efficiency of end-of-pipe management92.5.The original article describes the pollution production coefficients as 17S（无炉内脱硫）。Please revise the corresponding emissions after accounting for them according to the notes.。.The original article describes the pollution production coefficients as 17S（无炉内脱硫）. Please revise the corresponding emissions after accounting for them according to the notes.
  污染物指标二氧化硫的末端治理技术是氨法，其效率为92.5，末端治理设施实际运行率（k值）计算公式为K=脱硫设施年运行小时数/锅炉年运行小时数。原文件中描述污染物类别为废气，污染物指标为二氧化硫，此处对其进行了匹配工作，将其匹配到LCAflow库里面相最符合的流，污染物指标备注为二氧化硫原文描述的产污系数为 17S（无炉内脱硫）。请根据备注自行核算后修改对应的排放量。
- sulfur dioxide: 0
  the Technical of end-of-pipe management technology for pollution sulfur dioxideisAmmonia method，Its Technical efficiency of end-of-pipe management92.5.The original article describes the pollution production coefficients as 13.6S（炉内脱硫）。Please revise the corresponding emissions after accounting for them according to the notes.。.The original article describes the pollution production coefficients as 13.6S（炉内脱硫）. Please revise the corresponding emissions after accounting for them according to the notes.
  污染物指标二氧化硫的末端治理技术是氨法，其效率为92.5，末端治理设施实际运行率（k值）计算公式为K=脱硫设施年运行小时数/锅炉年运行小时数。原文件中描述污染物类别为废气，污染物指标为二氧化硫，此处对其进行了匹配工作，将其匹配到LCAflow库里面相最符合的流，污染物指标备注为二氧化硫原文描述的产污系数为 13.6S（炉内脱硫）。请根据备注自行核算后修改对应的排放量。
- sulfur dioxide: 0
  the Technical of end-of-pipe management technology for pollution sulfur dioxideisDouble alkali process，Its Technical efficiency of end-of-pipe management92.5.The original article describes the pollution production coefficients as 17S（无炉内脱硫）。Please revise the corresponding emissions after accounting for them according to the notes.。.The original article describes the pollution production coefficients as 17S（无炉内脱硫）. Please revise the corresponding emissions after accounting for them according to the notes.
  污染物指标二氧化硫的末端治理技术是双碱法，其效率为92.5，末端治理设施实际运行率（k值）计算公式为K=脱硫设施年运行小时数/锅炉年运行小时数。原文件中描述污染物类别为废气，污染物指标为二氧化硫，此处对其进行了匹配工作，将其匹配到LCAflow库里面相最符合的流，污染物指标备注为二氧化硫原文描述的产污系数为 17S（无炉内脱硫）。请根据备注自行核算后修改对应的排放量。
- sulfur dioxide: 0
  the Technical of end-of-pipe management technology for pollution sulfur dioxideisDouble alkali process，Its Technical efficiency of end-of-pipe management92.5.The original article describes the pollution production coefficients as 13.6S（炉内脱硫）。Please revise the corresponding emissions after accounting for them according to the notes.。.The original article describes the pollution production coefficients as 13.6S（炉内脱硫）. Please revise the corresponding emissions after accounting for them according to the notes.
  污染物指标二氧化硫的末端治理技术是双碱法，其效率为92.5，末端治理设施实际运行率（k值）计算公式为K=脱硫设施年运行小时数/锅炉年运行小时数。原文件中描述污染物类别为废气，污染物指标为二氧化硫，此处对其进行了匹配工作，将其匹配到LCAflow库里面相最符合的流，污染物指标备注为二氧化硫原文描述的产污系数为 13.6S（炉内脱硫）。请根据备注自行核算后修改对应的排放量。
- sulfur dioxide: 0
  the Technical of end-of-pipe management technology for pollution sulfur dioxideisLimestone/lime-gypsum wet process，Its Technical efficiency of end-of-pipe management92.5.The original article describes the pollution production coefficients as 17S（无炉内脱硫）。Please revise the corresponding emissions after accounting for them according to the notes.。.The original article describes the pollution production coefficients as 17S（无炉内脱硫）. Please revise the corresponding emissions after accounting for them according to the notes.
  污染物指标二氧化硫的末端治理技术是石灰石/石灰-石膏湿法，其效率为92.5，末端治理设施实际运行率（k值）计算公式为K=脱硫设施年运行小时数/锅炉年运行小时数。原文件中描述污染物类别为废气，污染物指标为二氧化硫，此处对其进行了匹配工作，将其匹配到LCAflow库里面相最符合的流，污染物指标备注为二氧化硫原文描述的产污系数为 17S（无炉内脱硫）。请根据备注自行核算后修改对应的排放量。
- sulfur dioxide: 0
  the Technical of end-of-pipe management technology for pollution sulfur dioxideisLimestone/lime-gypsum wet process，Its Technical efficiency of end-of-pipe management92.5.The original article describes the pollution production coefficients as 13.6S（炉内脱硫）。Please revise the corresponding emissions after accounting for them according to the notes.。.The original article describes the pollution production coefficients as 13.6S（炉内脱硫）. Please revise the corresponding emissions after accounting for them according to the notes.
  污染物指标二氧化硫的末端治理技术是石灰石/石灰-石膏湿法，其效率为92.5，末端治理设施实际运行率（k值）计算公式为K=脱硫设施年运行小时数/锅炉年运行小时数。原文件中描述污染物类别为废气，污染物指标为二氧化硫，此处对其进行了匹配工作，将其匹配到LCAflow库里面相最符合的流，污染物指标备注为二氧化硫原文描述的产污系数为 13.6S（炉内脱硫）。请根据备注自行核算后修改对应的排放量。
- sulfur dioxide: 0
  the Technical of end-of-pipe management technology for pollution sulfur dioxideisMagnesium oxide method，Its Technical efficiency of end-of-pipe management92.5.The original article describes the pollution production coefficients as 17S（无炉内脱硫）。Please revise the corresponding emissions after accounting for them according to the notes.。.The original article describes the pollution production coefficients as 17S（无炉内脱硫）. Please revise the corresponding emissions after accounting for them according to the notes.
  污染物指标二氧化硫的末端治理技术是氧化镁法，其效率为92.5，末端治理设施实际运行率（k值）计算公式为K=脱硫设施年运行小时数/锅炉年运行小时数。原文件中描述污染物类别为废气，污染物指标为二氧化硫，此处对其进行了匹配工作，将其匹配到LCAflow库里面相最符合的流，污染物指标备注为二氧化硫原文描述的产污系数为 17S（无炉内脱硫）。请根据备注自行核算后修改对应的排放量。
- sulfur dioxide: 0
  the Technical of end-of-pipe management technology for pollution sulfur dioxideisMagnesium oxide method，Its Technical efficiency of end-of-pipe management92.5.The original article describes the pollution production coefficients as 13.6S（炉内脱硫）。Please revise the corresponding emissions after accounting for them according to the notes.。.The original article describes the pollution production coefficients as 13.6S（炉内脱硫）. Please revise the corresponding emissions after accounting for them according to the notes.
  污染物指标二氧化硫的末端治理技术是氧化镁法，其效率为92.5，末端治理设施实际运行率（k值）计算公式为K=脱硫设施年运行小时数/锅炉年运行小时数。原文件中描述污染物类别为废气，污染物指标为二氧化硫，此处对其进行了匹配工作，将其匹配到LCAflow库里面相最符合的流，污染物指标备注为二氧化硫原文描述的产污系数为 13.6S（炉内脱硫）。请根据备注自行核算后修改对应的排放量。
- sulfur dioxide: 0
  the Technical of end-of-pipe management technology for pollution sulfur dioxideisSodium alkali method，Its Technical efficiency of end-of-pipe management92.5.The original article describes the pollution production coefficients as 17S（无炉内脱硫）。Please revise the corresponding emissions after accounting for them according to the notes.。.The original article describes the pollution production coefficients as 17S（无炉内脱硫）. Please revise the corresponding emissions after accounting for them according to the notes.
  污染物指标二氧化硫的末端治理技术是钠碱法，其效率为92.5，末端治理设施实际运行率（k值）计算公式为K=脱硫设施年运行小时数/锅炉年运行小时数。原文件中描述污染物类别为废气，污染物指标为二氧化硫，此处对其进行了匹配工作，将其匹配到LCAflow库里面相最符合的流，污染物指标备注为二氧化硫原文描述的产污系数为 17S（无炉内脱硫）。请根据备注自行核算后修改对应的排放量。
- sulfur dioxide: 0
  the Technical of end-of-pipe management technology for pollution sulfur dioxideisSodium alkali method，Its Technical efficiency of end-of-pipe management92.5.The original article describes the pollution production coefficients as 13.6S（炉内脱硫）。Please revise the corresponding emissions after accounting for them according to the notes.。.The original article describes the pollution production coefficients as 13.6S（炉内脱硫）. Please revise the corresponding emissions after accounting for them according to the notes.
  污染物指标二氧化硫的末端治理技术是钠碱法，其效率为92.5，末端治理设施实际运行率（k值）计算公式为K=脱硫设施年运行小时数/锅炉年运行小时数。原文件中描述污染物类别为废气，污染物指标为二氧化硫，此处对其进行了匹配工作，将其匹配到LCAflow库里面相最符合的流，污染物指标备注为二氧化硫原文描述的产污系数为 13.6S（炉内脱硫）。请根据备注自行核算后修改对应的排放量。

## Use advice
This dataset is derived from the Pollution Source Census Report and contains information on pollution emissions and related products. However, it does not include data on energy or chemical consumption, nor does it provide information on waste or co-product generation. When utilizing this dataset, please supplement the missing data based on actual conditions before use
该数据集来源于污染源普查报告，包含污染物排放及相关产品信息，但不包含能源或化学品消耗数据，也不提供废弃物或共生产物产生信息。在使用该数据集时，请根据实际情况补充缺失数据后再使用。

## Review details
Inventory: The internal review was done by several iteration steps concerning raw data validation, raw data documentation, representativity, completeness and consistency of modelling with regard to ISO 14040 and 14044.
清单： 内部审查通过几个迭代步骤完成，涉及原始数据验证、原始数据记录、代表性、完整性、与 ISO 14040 和 14044 有关的建模的一致性。

## Data sources
- 第二次全国污染源普查产排污核算系数手册（试用版）,四级代码4430文件，在完整版文件中第5426页
