# Aluminum ingot casting ; Primary aluminum ingot ; North China Power Grid ; Liquid primary aluminum

Dataset: ILCD process, Partly terminated system
Geography: CN
Reference year: 2011
Classification: Unit processes / Materials production / Metals and semimetals
Generated by: Jinliang Xie, jinliang.research@gmail.com
Owner: Tiangong LCI Data Working Group
Review: Dependent internal review by Tiangong LCI Data Working Group
Amounts: no units in this file; such an amount is in the reference unit of its flow, which a separate flow dataset defines
copyright: false
licenseType: Free of charge for all users and uses

## General comment
结合不同工艺的电解铝产量分布比例所计算出的国内电解铝生产过程CO2排放因子的加权平均值。从氧化铝到铝锭。

## Geography
南方电网

## Time period
Year of publication

## Technical purpose
The primary aluminum ingot casting process described here is specific to the production of primary aluminum ingots using liquid primary aluminum in the North China Power Grid region. This industrial process is integral for creating aluminum ingots that serve as raw materials for various downstream aluminum products. The ingots produced are suitable for applications requiring high-purity aluminum, such as in the aerospace, automotive, packaging, construction, and electronics industries.

## Reference product
- aluminium, primary, ingot: 1000; measured

## Outputs
- carbon dioxide (fossil),carbon dioxide (fossil): 1284.4; measured

## Data selection and combination
On the basis of fully sorting out the production situation of alumina and electrolytic aluminum enterprises across the country, and in accordance with the principle of covering all representative processes and production capacities, and taking into full consideration the distribution of production capacities, nature of enterprises and other factors, we focused on selecting typical primary aluminum smelting enterprises in typical regions such as Henan, Shandong and Guangxi, and carried out an in-depth field survey, and formed a database of carbon emission factors for alumina and electrolytic aluminum, with the data of 2011 as the main body. The database of alumina production includes primary and secondary materials. The alumina production database includes four sub-databases: consumption of raw and auxiliary materials and waste generation, process technology and equipment, energy consumption of process materials, and secondary energy production of self-provided cogeneration plants. For details, see Table 1 of the literature sources.

## Use advice
When utilizing life cycle assessment data for this aluminum ingot casting process, it's essential to consider the weighted average of the CO2 emission factors calculated from the distribution of electrolytic aluminum production by different technologies. This context reflects a comprehensive overview of alumina and primary aluminum enterprises in China for the base year of 2011. Users should reference Table 1 from the cited literature for specific details on raw and auxiliary material consumption, waste generation, process technology and equipment, energy consumption in material processes, and secondary energy production from captive power plants. The carbon accounting scope for the electrolytic aluminum production process includes carbon anode consumption, PFCs emissions, and the production process for purchased electricity.

## Review details
Inventory: The internal review was done by several iteration steps concerning raw data validation, raw data documentation, representativity, completeness and consistency of modelling with regard to ISO 14040 and 14044.

## Data sources
- 张文娟，李会泉，陈波，李强，韩永鹏 & 孙振华. 我国原铝冶炼行业温室气体排放模型. 环境科学研究 vol. 26 1132–1138 (2013).
