# Planting｜crop｜no process

Dataset: ILCD process, Unit process, single operation
Geography: CN
Reference year: 2020
Classification: Unit processes / Materials production / Agricultural production means
Functional unit: Taking the production of 10,000KWh of electric energy as the functional unit (consumption of straw is 1.4kg/kwh)
LCI method principle: Consequential
Generated by: Chaoshuo Liu, liucs22@mails.jlu.edu.cn
Owner: Tiangong LCI Data Working Group
Review: Dependent internal review by Tiangong LCI Data Working Group
Amounts: no units in this file; such an amount is in the reference unit of its flow, which a separate flow dataset defines
copyright: false
licenseType: Free of charge for all users and uses

## General comment
The system boundary of this study includes crop planting process, straw collection process, transportation process and combustion power generation process. This is the crop growing process.

## Technical purpose
The crop cultivation process is intended for the generation of biomass, specifically straw, which is used for combustion power generation. The goal of this process is to produce straw that will be combusted to generate electricity, contributing to the energy sector.

## Reference product
- Crop straw: 14000; measured

## Outputs
All rows: measured
- carbon dioxide (fossil): 1527.48
  The expert notes that the original text does not differentiate between biogenic and fossil sources of emissions, and in their opinion, the emissions in question are fossil.
- carbon monoxide,carbon monoxide (fossil): 0.83358
  (same comment as for carbon dioxide (fossil))
- nitrous oxide: 1.8243, 0.02592 (2 entries)
- sulfur dioxide: 1.57374
- particles (> PM10),particles (> PM10): 0.16596
- methane (fossil): 3.35016
  (same comment as for carbon dioxide (fossil))

## Use advice
When using this data, ensure that it aligns with the production of 10,000 KWh of electric energy as the functional unit. The consumption of straw should be accounted for at a rate of 1.4 kg/KWh. Users must include the crop planting, straw collection, and transportation processes that lead up to the combustion for power generation in the system boundary of their Life Cycle Assessment. It is crucial for LCA practitioners to model the use phase accordingly and include considerations such as emissions from transportation and combustion.

## Review details
Inventory: The internal review was done by several iteration steps concerning raw data validation, raw data documentation, representativity, completeness and consistency of modelling with regard to ISO 14040 and 14044.

## Data sources
- Wang, Z. et al. Sustainability assessment of straw direct combustion power generation in China: From the environmental and economic perspectives of straw substitute to coal. Journal of Cleaner Production 273, 122890 (2020).
