# Remediated soil ; Soil remediation ; In Situ Thermal Remediation ; In Situ Thermal Desorption (ISTD)

Dataset: ILCD process, Unit process, black box
Geography: DK
Reference year: 2013
Classification: Unit processes / Other Services / Repair and maintenance
Functional unit: Results are presented per unit volume (1 m3 ) of soil remediated in order to compare results for each site.
Generated by: Yang Xintong, yangxt@caep.org.cn
Owner: Tiangong LCI Data Working Group
Review: Dependent internal review by Tiangong LCI Data Working Group
Amounts: no units in this file; such an amount is in the reference unit of its flow, which a separate flow dataset defines
copyright: false
licenseType: Free of charge for all users and uses

## General comment
From Table 1 of the literature (Overview of Test Sites Used as a Basis for Data Collection), it can be seen that, the area and volume of the small site are 180 m2 and 1175 m3. Mass of contaminant is 400 kg of PCE.

## Geography
The data collection for the LCA was conducted for a smaller (180 m2) site representing typical Danish sites where remediation using ISTD has been conducted.

## Technology and included processes
ISTD uses specialized heaters placed in the heater wells, applied to a low-permeability contaminant source zone. soil is heated to around 100 °C to enhance the volatilization of the chlorinated solvents. In this study, the solvent vapors are assumed to be continuously extracted from the subsurface under vacuum and treated above ground in an activated carbon air filtration unit and, as a proportion of the extracted vapors also condense, the condensed aqueous phase is treated in a separate activated carbon water filtration unit. A vapor cap of 40 cm foam concrete is installed above the heated zone in order to prevent intrusion of rain, create a vapor-tight seal to the surface and to reduce heat loss to the atmosphere. All technologies require the installation of a number of wells to generate soil heating as well as extraction wells.

## Technical purpose
The described industrial process pertains to the application of In Situ Thermal Desorption (ISTD) for soil remediation. This process is specifically designed for the treatment of contaminated sites with low-permeability soil layers contaminated with chlorinated solvents such as PCE (tetrachloroethylene). It is used to remediate small-scale sites, like the typical Danish site mentioned, which has an area of 180 m2 and volume of 1175 m3. The process involves heating the soil to around 100°C to enhance volatilization of the contaminant and vacuum extraction of vapors, followed by treatment via activated carbon filtration units for air and water contaminants. This remediation technique is applicable in scenarios where precision and containment are critical, such as in urban areas or sensitive environments.

## Reference product
- Remediated soil: 1175; estimated

## Inputs
All rows: estimated
- Road Transport,Road Transport: 1.3035e7
  Travel by car （personkm）
- transport in t*km: 56, 5760, 1234, 4476 (4 entries)
- Road Transport,Road Transport: 90000, 4.5e6 (2 entries)
- Electricity: 2.7576e6
- Diesel,Diesel: 4.619
- sand: 3872
- Mortar: 1633
- Concrete: 41600
- Activated Carbon: 2646, 405 (2 entries)
- Carbon Steel: 10530
- Stainless Steel: 1508, 178 (2 entries)
- nickel: 22
- Copper and copper alloys: 312
- Fiber glass: 45
- Polyethylene,Polyethylene: 782
- contaminated soil: 1175

## Use advice
When using the data set from the LCA of the ISTD process, it is important to consider the specifics of the contaminated site, such as soil characteristics and contaminant type and concentration. The LCA data is scoped for a small site typical to Danish soil remediation projects, and users should adapt this baseline to the project's local conditions. Users should also pay attention to the methodology of data collection and ensure that their analytical models include the establishment and construction of well fields, capping, air and water treatment systems, electricity consumption, and logistics. If applying the results to larger or different sites, proportional scaling or adjustments may be needed to reflect differences in energy and material inputs, as well as the operation of equipment and transportation activities.

## Review details
Inventory: The internal review was done by several iteration steps concerning raw data validation, raw data documentation, representativity, completeness and consistency of modelling with regard to ISO 14040 and 14044.

## Data sources
- Lemming G ,Nielsen G S ,Weber K , et al. Optimizing the Environmental Performance of In Situ Thermal Remediation Technologies Using Life Cycle Assessment [J]. Groundwater Monitoring & Remediation, 2013, 33 (3): 38-51.
