# Soil Remediation;Isotopic Remediation;Soil Drenching;Case 1;Operation;Remediated Soil

Dataset: ILCD process, Unit process, single operation
Geography: BJ-CN
Reference year: 2017
Classification: Unit processes / Other Services / Repair and maintenance
Generated by: Wang Ning, wang_ning@caep.org.cn
Owner: Tiangong LCI Data Working Group
Review: Dependent internal review by Tiangong LCI Data Working Group
Amounts: no units in this file; such an amount is in the reference unit of its flow, which a separate flow dataset defines
copyright: false
licenseType: Free of charge for all users and uses

## General comment
The excavated contaminated soil is put into the drenching equipment, while the chemical agent is used to configure the chemical agent for drenching

## Technology and included processes
The volume of excavated contaminated soil was 350,000 m3, and the power consumption of the drenching equipment was 714 kw/ h. It operated for 23 h per day for a total of 278 d, while consuming a large amount of chemicals.

## Technical purpose
The soil remediation process described by this dataset is used for ex situ (off-site) soil drenching, which is applicable in environmental engineering specifically for treating large volumes of contaminated soil. This case study pertains to an operational scenario where excavated soil undergoes chemical treatment to remove contamination and achieve remediation.

## Reference product
- Remediated soil: 350000; measured

## Inputs
All rows: measured
- Excavated soil,Excavated soil: 350000
- Electricity: 1.64351e7
- Activated Carbon: 25298
- Tap Water: 4539.74
- Sulfuric acid: 536.54
- sodium hydroxide: 22.24
- Sodium sulfide: 80.62

## Use advice
When using this dataset for life cycle assessment, consider the scale of the operation and the specific consumption of energy and chemicals. The dataset represents a single unit process for soil remediation where the total volume of soil treated, energy consumed by the drenching equipment, and chemical usage are provided. Users need to account for similar operational conditions, such as the volume of soil and duration of the process, when applying this data to other cases. Ensure that the soil treatment process in other applications can be considered equivalent to this case in technological terms. Methodologically, it is important to address the system boundary considerations, especially with regards to the upstream impacts of chemical production and the downstream effects on treated soil.

## Review details
Inventory: The internal review was done by several iteration steps concerning raw data validation, raw data documentation, representativity, completeness and consistency of modelling with regard to ISO 14040 and 14044.

## Data sources
- Song, Y. et al. Environmental and socio-economic sustainability appraisal of contaminated land remediation strategies: A case study at a mega-site in China. Science of The Total Environment 610–611, 391–401 (2018).
