# Aluminum electrolysis ; liquid primary aluminum ; prebaked ; alumina for metallurgy

Dataset: ILCD process, Unit process, single operation
Geography: TC-SAX-CN
Reference year: 2010
Classification: Unit processes / Materials production / Metals and semimetals
Generated by: Jinliang Xie, jinliang.research@gmail.com
Owner: Tiangong LCI Data Working Group
Review: Dependent internal review by Tiangong LCI Data Working Group
Amounts: no units in this file; such an amount is in the reference unit of its flow, which a separate flow dataset defines
copyright: false
licenseType: Free of charge for all users and uses

## General comment
通常，铝电解是通过霍尔-埃鲁过程在电解槽中进行的，这一过程涉及在高温下通过电解熔融铝土矿（氧化铝）来制造金属铝。Life cycle inventory data in operation processes (including energy and raw material consumption) undertaken in Tongchuanxinguang aluminum production site of Tongchuan City in China were mainly collected from reference. Also, coal based electricity generation was used in this study. In addition, in case that China data were not available, data and relevant background data from European were used, including data on infrastructure, anode, and chemicals production. The life time of building and equipment considered in this study is 40 and 8 years, respectively.

## Technical purpose
The data set describes the production of primary aluminum via the Hall-Héroult process, which involves electrolyzing molten alumina (aluminum oxide) to create the metal aluminum. This liquid primary aluminum is obtained through prebaked electrolytic cells and is intended for use in metallurgy. As such, it is applicable to industries requiring high-grade aluminum including aerospace, automotive, construction, and electronics, where the aluminum's purity and superior properties are critical.

## Reference product
- aluminium, primary, liquid: 1000; measured
  原文并未明确给出（原文中仅为aluminum），根据所引用文献以及铝工业常见工艺得出

## Inputs
- electricity, high voltage, aluminium industry: 47952; measured
- aluminium fluoride: 27; measured
- anode, prebake, for aluminium electrolysis: 435; software or database
  Ecoinvent data v2.0 Final Reports Ecoinvent 2000 No.1-15, Swiss Centre for Life Cycle Inventories, Dubendorf, CH (2007) www.ecoinvent.ch
- cryolite: 5; measured
- Water, unspecified natural origin: 7; measured
  water
- aluminium oxide, metallurgical: 1930; measured
- buildings, unspecified: 0.134; measured
  buildings
- aluminium electrolysis facility: 3690.75; measured
  Units of currency 2000

## Outputs
All rows: measured
- Solid Waste: 14.5
  solid waste
- hydrogen fluoride: 3.6
- particles, unspecified: 7.6
- wastewater, average: 4.91
- carbon dioxide (fossil),carbon dioxide (fossil): 1000
- carbon monoxide (fossil),carbon monoxide (fossil): 200

## Use advice
Users of this data set should consider the technological applicability of primary aluminum for their specific intended use, ensuring the material's properties meet the required standards. Data inclusion should consider the energy consumption and emissions associated with coal-based electricity generation, as employed in this study. When applying this data outside of China, users should take into account regional differences in aluminum production processes and related environmental impacts. The infrastructure, anode, and chemicals production data should be reviewed and, if necessary, adapted to local conditions. The service life of buildings and equipment—40 and 8 years, respectively—should inform the depreciation and replacement scheduling in the users' life cycle models.

## Review details
Inventory: The internal review was done by several iteration steps concerning raw data validation, raw data documentation, representativity, completeness and consistency of modelling with regard to ISO 14040 and 14044.

## Data sources
- Min, H. J., Z, I. Z. & Lan, H. J. Environmental and Economic Assessment of Pre-Training Electrolytic Aluminum Production - A Case Study of China. Advanced Materials Research 146–147, (2010).
