# Mining of Rare Earth Oxides (REO) Rare earth oxide;Rare earth oxide process;Bayan Obo

Dataset: ILCD process, Unit process, single operation
Geography: NMG-CN
Reference year: 2014
Classification: Unit processes / Materials production / Non-energetic raw materials
Functional unit: The scope of the LCA is cradle-to-gate and the functional unit was chosen as 1 kg of REO.
LCI method principle: Attributional
LCI method approaches: Allocation - market value; Allocation - exergetic content
Generated by: Tao Wang, twang@iue.ac.cn
Owner: Tiangong LCI Data Working Group
Review: Dependent internal review by Tiangong LCI Data Working Group
Amounts: no units in this file; such an amount is in the reference unit of its flow, which a separate flow dataset defines
copyright: false
licenseType: Free of charge for all users and uses

## General comment
The rare earth oxides (REOs) produced at Bayan Obo are primarily used in the manufacture of high-value technological products including magnets for wind turbines and electric vehicles, phosphors for electronics and lighting, and catalysts for vehicle emission control systems. They play a crucial role in advanced materials utilized in the electronics industry, military applications, and green technology sectors such as renewable energy and electric mobility.

## Geography
Bayan Obo (China)

## Technology and included processes
The process chain for REO production includes mining followed by beneficiation, calcination, extraction, and roasting stages, see Figure 2. The first step in REO production is mining, wherein crude ore is blasted and transported for further refining. Crude ore abstracted from the Bayan Obo mine is composed of both monazite and bastnasite.

## Reference product
- particles (PM10): 0.15; measured

## Inputs
All rows: measured
- blasting: 76.336
  Blasting (crude ore)
- Electricity: 0.329
  crushing
- Electricity: 6.749
  Grinding
- Electricity: 0.001
  Conveying
- Electricity: 0.08
  Flotation
- Electricity: 0.053
  Dewatering
- Drilling sludge: 0.533

## Deviations from the LCI method approaches
Life cycle data was obtained from the Ecoinvent database, and mass-based-allocation was performed to partition the environmental impacts among crude ore and REO, as well as allocate the environmental impact among light, medium, heavy, and neodymium REOs. Two alternative allocations schemes, (I) market-based and (II) exegetic-based allocation, were considered as a means to partition the environmental impacts among REOs. The results for market- as well as exergetic-based allocation are provided in the Supporting Information. It is important to note that allocation based on market-value is the preferred method of the metals industry.23 When possible, Chinese-specificlifecycledatawas considered in the analysis; otherwise, European life cycle inventory (LCI) databases were used. The LCA results for REO production presented in this study provide a conservative benchmark for the environmental profile of REE. Furthermore, the LCI and LCA results can be extended/applied to evaluate the production of individual REE and REE-based technologies and products.

## Use advice
Users of this LCA data should apply the preferred market-value based allocation method to assess environmental impacts of REO production. This dataset is specifically aligned for use in Chinese-centric assessments; however, where local data is unavailable, European LCI datasets can be substituted. Users should note that the LCA scope is cradle-to-gate with a functional unit of 1 kg REO. The results should be used as a conservative estimate for the environmental profile of REE production, and can be extrapolated to evaluate the environmental impacts of individual REE and REE-based technologies and products.

## Review details
Inventory: The internal review was done by several iteration steps concerning raw data validation, raw data documentation, representativity, completeness and consistency of modelling with regard to ISO 14040 and 14044.

## Data sources
- Zaimes, G. G., Hubler, B. J., Wang, S. & Khanna, V. Environmental Life Cycle Perspective on Rare Earth Oxide Production. ACS Sustainable Chem. Eng. 3, 237–244 (2015).
