# coal washing; Separation of coal, gangue and clean coal washing

Dataset: ILCD process, Unit process, black box
Geography: SQ-HEN-CN
Reference year: 2015
Classification: Energy carriers and technologies / Hard coal based fuels
Generated by: Linlin Yin, yinlinlin0623@163.com
Owner: Tiangong LCI Data Working Group
Review: Dependent internal review by Tiangong LCI Data Working Group
Amounts: no units in this file; such an amount is in the reference unit of its flow, which a separate flow dataset defines
licenseType: Free of charge for all users and uses

## General comment
The coal washing process described is intended for the separation and purification of coal, obtaining clean coal that is suitable for use in applications requiring high-quality fuel or raw material. This includes various industries such as energy generation (power plants), metallurgical (coke production for steel manufacturing), and other applications where high-grade coal is a necessity. This coal washing data set could be particularly relevant for businesses operating within the Yongcheng mining area or similar geological contexts where the coal occurence is stable and the mining conditions are favorable for large-scale, mechanized extraction.

## Geography
The resource reserves and storage-production ratio of Yongcheng mining area have higher advantages than other mining areas in the province. At present, there are five exploration coal mining areas and two coal prospecting prediction areas. The occurrence of coal seams in Yongcheng mining area is relatively stable, and the mining technical conditions are relatively simple. The dip angle of the minable coal seam is relatively flat, which is suitable for mechanized mining.

## Technology and included processes
Coal washing process includes raw coal preparation, raw coal separation, drying after washing, dehydration and slime water treatment.

## Reference product
- carbon dioxide (fossil): 1.98754e7; calculated
  In 2013, the total amount of carbon emissions ( CO2 equivalent ) released during the coal washing process of Xinqiao Coal Mine Coal Washing Plant was analyzed.

## Inputs
All rows: uniform
- Diesel: 3.21; software or database
  Diesel emission factor, that is, carbon emissions ( CO2 equivalent ) released by consuming 1 kg of diesel.
- Diesel: 25830; measured
  Data on “diesel” consumption activity during the coal washing process at the Xinqiao Coal Mine Coal Washing Plant in 2013.
- Gasoline (regular): 3.24; software or database
  Gasoline emission factor, which is the carbon emission ( CO2 equivalent ) from the consumption of 1 kg of gasoline.
- Gasoline (regular): 28190; measured
  Data on “gasoline” consumption activity levels during the coal washing process at the Xinqiao Coal Mine Coal Washing Plant in 2013.
- Electricity: 972.4; software or database
  The electricity emission factor is the carbon emissions ( CO2 equivalent ) released by electricity that consumes 1MWh.
- Electricity: 7.24872e7; measured
  Data on “electricity” consumption activity levels during the coal washing process at the Xinqiao Coal Mine Coal Washing Plant in 2013.
- water: 0.000212; software or database
  The water emission factor is the carbon emission ( CO2 equivalent ) released by consuming 1 kg of water.
- water: 5.73215e8; measured
  Data on “water” consumption activity levels during the coal washing process at the Xinqiao Coal Mine Coal Washing Plant in 2013.

## Outputs
- carbon dioxide (fossil): 82910; uniform; calculated
  In 2013, the carbon emissions ( CO2 equivalent ) of diesel emissions consumed in the coal washing process of Xinqiao Coal Mine Coal Washing Plant were analyzed.
- carbon dioxide (fossil): 91340; uniform; calculated
  In 2013, the carbon emissions ( CO2 equivalent ) released by gasoline consumption in the coal washing process of Xinqiao Coal Mine Coal Washing Plant.
- carbon dioxide (fossil): 1.95796e7; uniform; calculated
  In 2013, the carbon emissions ( CO2 equivalent ) released by electricity consumption in the coal washing process of Xinqiao Coal Mine Coal Washing Plant were analyzed.
- carbon dioxide (fossil): 121520; uniform; calculated
  In 2013, the carbon emissions ( CO2 equivalent ) released by water consumption in the coal washing process of Xinqiao coal mine coal washing plant.

## Use advice
When utilizing this dataset for life cycle assessment purposes, it is important to consider the geological context and the specific mining condition as provided in the dataset. Users should also pay attention to the inclusion or exclusion of subsequent coal usage phases, such as transportation, combustion, or any processing post-washing. The applicability of the data should be in line with the technological realities of the Yongcheng mining area or similar contexts. Users should account for variations in quality and environmental impacts due to locale-specific mining practices, and the data should be updated or adapted to reflect technological advancements or changes in mining practices.

## Review details
Inventory: The internal review was done by several iteration steps concerning raw data validation, raw data documentation, representativity, completeness and consistency of modelling with regard to ISO 14040 and 14044.
