# Lithographic ink ; Rosin modified phenolic resin, solvent oil, organic pigment, alkyd resin ; Offset ink wet process ; greater than or equal to5000 t/a; NESPS2 / 平版油墨 ; 松香改性酚醛树脂、溶剂油、有机颜料、醇酸树脂 ; 胶印油墨湿法 ; 大于等于0.5万吨/年 ; 全国第二次污染普查数据

Dataset: ILCD process, Unit process, single operation
Geography: CN
Reference year: 2019
Classification: Reference Parameters / Materials production / Organic chemicals
Generated by: The data was created by the Office of the Second National Pollution Source Census of the Ministry of Ecology and Environment, and the data was organized by the TianGong Plan team for ILCD format / 生态环境部第二次全国污染源普查工作办公室创建数据，天工计划团队常慧敏整理数据为ILCD格式
Owner: Tiangong LCI Data Working Group / 天工LCI数据工作小组
Review: Dependent internal review by Tiangong LCI Data Working Group / 天工LCI数据工作小组
Amounts: no units in this file; such an amount is in the reference unit of its flow, which a separate flow dataset defines
copyright: false
licenseType: Free of charge for all users and uses

## General comment
the Technical of end-of-pipe management technology for pollution Exhaust gasis/，Its Technical efficiency of end-of-pipe management0

## Technical purpose
该数据集描述的平版油墨由松香改性酚醛树脂、溶剂油、有机颜料和醇酸树脂配制而成，用于胶印印刷工艺，其年产量大于或等于5000吨。该油墨适用于需要耐久性和高分辨率的高品质印刷应用。

## Reference product
- Planographic Printing Ink: 1000; calculated
  源文件中描述为为平版油墨，此处对其进行了匹配工作，将其匹配到LCAflow库里面相最符合的流，污染物指标备注为工业废水量

## Outputs
All rows: calculated
- particles (PM2.5 - PM10): 0.0025
  the Technical of end-of-pipe management technology for pollution particles (PM2.5 - PM10)isBag filter，Its Technical efficiency of end-of-pipe management90
  污染物指标颗粒物的末端治理技术是袋式除尘，其效率为90，末端治理设施实际运行率（k值）计算公式为k=处理设施年耗电量（千瓦时）/(设备额定功率（千瓦）×设备运行时间（小时））。原文件中描述污染物类别为废气，污染物指标为颗粒物，此处对其进行了匹配工作，将其匹配到LCAflow库里面相最符合的流，污染物指标备注为颗粒物
- particles (PM2.5 - PM10): 0.0025
  the Technical of end-of-pipe management technology for pollution particles (PM2.5 - PM10)isCyclone dust removal + bag filter，Its Technical efficiency of end-of-pipe management90
  污染物指标颗粒物的末端治理技术是旋风+布袋，其效率为90，末端治理设施实际运行率（k值）计算公式为k=处理设施年耗电量（千瓦时）/(设备额定功率（千瓦）×设备运行时间（小时））。原文件中描述污染物类别为废气，污染物指标为颗粒物，此处对其进行了匹配工作，将其匹配到LCAflow库里面相最符合的流，污染物指标备注为颗粒物
- volatile organic compound: 0.02747
  the Technical of end-of-pipe management technology for pollution volatile organic compoundisCatalytic combustion method，Its Technical efficiency of end-of-pipe management59
  污染物指标挥发性有机物的末端治理技术是催化燃烧法，其效率为59，末端治理设施实际运行率（k值）计算公式为k=处理设施年耗电量（千瓦时）/(设备额定功率（千瓦）×设备运行时间（小时））。原文件中描述污染物类别为废气，污染物指标为挥发性有机物，此处对其进行了匹配工作，将其匹配到LCAflow库里面相最符合的流，污染物指标备注为挥发性有机物
- volatile organic compound: 0.02747
  the Technical of end-of-pipe management technology for pollution volatile organic compoundisDirect combustion，Its Technical efficiency of end-of-pipe management59
  污染物指标挥发性有机物的末端治理技术是直接燃烧法，其效率为59，末端治理设施实际运行率（k值）计算公式为k=处理设施年耗电量（千瓦时）/(设备额定功率（千瓦）×设备运行时间（小时））。原文件中描述污染物类别为废气，污染物指标为挥发性有机物，此处对其进行了匹配工作，将其匹配到LCAflow库里面相最符合的流，污染物指标备注为挥发性有机物
- volatile organic compound: 0.04087
  the Technical of end-of-pipe management technology for pollution volatile organic compoundisAdsorption + steam desorption，Its Technical efficiency of end-of-pipe management39
  污染物指标挥发性有机物的末端治理技术是吸附+蒸汽解析，其效率为39，末端治理设施实际运行率（k值）计算公式为k=处理设施年耗电量（千瓦时）/(设备额定功率（千瓦）×设备运行时间（小时））。原文件中描述污染物类别为废气，污染物指标为挥发性有机物，此处对其进行了匹配工作，将其匹配到LCAflow库里面相最符合的流，污染物指标备注为挥发性有机物
- volatile organic compound: 0.04087
  the Technical of end-of-pipe management technology for pollution volatile organic compoundisAdsorption/catalytic combustion method，Its Technical efficiency of end-of-pipe management39
  污染物指标挥发性有机物的末端治理技术是吸附/催化燃烧法，其效率为39，末端治理设施实际运行率（k值）计算公式为k=处理设施年耗电量（千瓦时）/(设备额定功率（千瓦）×设备运行时间（小时））。原文件中描述污染物类别为废气，污染物指标为挥发性有机物，此处对其进行了匹配工作，将其匹配到LCAflow库里面相最符合的流，污染物指标备注为挥发性有机物
- volatile organic compound: 0.04087
  the Technical of end-of-pipe management technology for pollution volatile organic compoundisAdsorption/thermal combustion method，Its Technical efficiency of end-of-pipe management39
  污染物指标挥发性有机物的末端治理技术是吸附/热力燃烧法，其效率为39，末端治理设施实际运行率（k值）计算公式为k=处理设施年耗电量（千瓦时）/(设备额定功率（千瓦）×设备运行时间（小时））。原文件中描述污染物类别为废气，污染物指标为挥发性有机物，此处对其进行了匹配工作，将其匹配到LCAflow库里面相最符合的流，污染物指标备注为挥发性有机物
- volatile organic compound: 0.04489
  the Technical of end-of-pipe management technology for pollution volatile organic compoundisOther，Its Technical efficiency of end-of-pipe management33
  污染物指标挥发性有机物的末端治理技术是其他，其效率为33，末端治理设施实际运行率（k值）计算公式为k=处理设施年耗电量（千瓦时）/(设备额定功率（千瓦）×设备运行时间（小时））。原文件中描述污染物类别为废气，污染物指标为挥发性有机物，此处对其进行了匹配工作，将其匹配到LCAflow库里面相最符合的流，污染物指标备注为挥发性有机物
- volatile organic compound: 0.04958
  the Technical of end-of-pipe management technology for pollution volatile organic compoundisPhotolysis，Its Technical efficiency of end-of-pipe management26
  污染物指标挥发性有机物的末端治理技术是光解，其效率为26，末端治理设施实际运行率（k值）计算公式为k=处理设施年耗电量（千瓦时）/(设备额定功率（千瓦）×设备运行时间（小时））。原文件中描述污染物类别为废气，污染物指标为挥发性有机物，此处对其进行了匹配工作，将其匹配到LCAflow库里面相最符合的流，污染物指标备注为挥发性有机物
- volatile organic compound: 0.0536
  the Technical of end-of-pipe management technology for pollution volatile organic compoundisLow temperature plasma，Its Technical efficiency of end-of-pipe management20
  污染物指标挥发性有机物的末端治理技术是低温等离子体，其效率为20，末端治理设施实际运行率（k值）计算公式为k=处理设施年耗电量（千瓦时）/(设备额定功率（千瓦）×设备运行时间（小时））。原文件中描述污染物类别为废气，污染物指标为挥发性有机物，此处对其进行了匹配工作，将其匹配到LCAflow库里面相最符合的流，污染物指标备注为挥发性有机物
- phosphorus, total: 0.00051
  the Technical of end-of-pipe management technology for pollution phosphorus, totalisChemical coagulation，Its Technical efficiency of end-of-pipe management70
  污染物指标总磷的末端治理技术是化学混凝法，其效率为70，末端治理设施实际运行率（k值）计算公式为k=处理设施年耗电量（千瓦时）/(设备额定功率（千瓦）×设备运行时间（小时））。原文件中描述污染物类别为废水，污染物指标为总磷，此处对其进行了匹配工作，将其匹配到LCAflow库里面相最符合的流，污染物指标备注为总磷
- Waste water: 824
  the Technical of end-of-pipe management technology for pollution Waste wateris/，Its Technical efficiency of end-of-pipe management0
  污染物指标工业废水量的末端治理技术是/，其效率为0。原文件中描述污染物类别为废水，污染物指标为工业废水量，此处对其进行了匹配工作，将其匹配到LCAflow库里面相最符合的流，污染物指标备注为工业废水量
- phosphorus, total: 0.00102
  the Technical of end-of-pipe management technology for pollution phosphorus, totalisA2/O process，Its Technical efficiency of end-of-pipe management40
  污染物指标总磷的末端治理技术是A2/O工艺，其效率为40，末端治理设施实际运行率（k值）计算公式为k=处理设施年耗电量（千瓦时）/(设备额定功率（千瓦）×设备运行时间（小时））。原文件中描述污染物类别为废水，污染物指标为总磷，此处对其进行了匹配工作，将其匹配到LCAflow库里面相最符合的流，污染物指标备注为总磷
- phosphorus, total: 0.001105
  the Technical of end-of-pipe management technology for pollution phosphorus, totalisAnaerobic hydrolysis，Its Technical efficiency of end-of-pipe management35
  污染物指标总磷的末端治理技术是厌氧水解类，其效率为35，末端治理设施实际运行率（k值）计算公式为k=处理设施年耗电量（千瓦时）/(设备额定功率（千瓦）×设备运行时间（小时））。原文件中描述污染物类别为废水，污染物指标为总磷，此处对其进行了匹配工作，将其匹配到LCAflow库里面相最符合的流，污染物指标备注为总磷
- phosphorus, total: 0.001105
  the Technical of end-of-pipe management technology for pollution phosphorus, totalisBio-contact oxidation process，Its Technical efficiency of end-of-pipe management35
  污染物指标总磷的末端治理技术是生物接触氧化法，其效率为35，末端治理设施实际运行率（k值）计算公式为k=处理设施年耗电量（千瓦时）/(设备额定功率（千瓦）×设备运行时间（小时））。原文件中描述污染物类别为废水，污染物指标为总磷，此处对其进行了匹配工作，将其匹配到LCAflow库里面相最符合的流，污染物指标备注为总磷
- Petroleum-related waste: 0.00309
  the Technical of end-of-pipe management technology for pollution Petroleum-related wasteisFloating separation，Its Technical efficiency of end-of-pipe management70
  污染物指标石油类的末端治理技术是上浮分离，其效率为70，末端治理设施实际运行率（k值）计算公式为k=处理设施年耗电量（千瓦时）/(设备额定功率（千瓦）×设备运行时间（小时））。原文件中描述污染物类别为废水，污染物指标为石油类，此处对其进行了匹配工作，将其匹配到LCAflow库里面相最符合的流，污染物指标备注为石油类
- Ammonia Nitrogen: 0.0079
  the Technical of end-of-pipe management technology for pollution Ammonia NitrogenisBio-contact oxidation process，Its Technical efficiency of end-of-pipe management75
  污染物指标氨氮的末端治理技术是生物接触氧化法，其效率为75，末端治理设施实际运行率（k值）计算公式为k=处理设施年耗电量（千瓦时）/(设备额定功率（千瓦）×设备运行时间（小时））。原文件中描述污染物类别为废水，污染物指标为氨氮，此处对其进行了匹配工作，将其匹配到LCAflow库里面相最符合的流，污染物指标备注为氨氮
- Ammonia Nitrogen: 0.00948
  the Technical of end-of-pipe management technology for pollution Ammonia NitrogenisA2/O process，Its Technical efficiency of end-of-pipe management70
  污染物指标氨氮的末端治理技术是A2/O工艺，其效率为70，末端治理设施实际运行率（k值）计算公式为k=处理设施年耗电量（千瓦时）/(设备额定功率（千瓦）×设备运行时间（小时））。原文件中描述污染物类别为废水，污染物指标为氨氮，此处对其进行了匹配工作，将其匹配到LCAflow库里面相最符合的流，污染物指标备注为氨氮
- Ammonia Nitrogen: 0.00948
  the Technical of end-of-pipe management technology for pollution Ammonia NitrogenisAnaerobic hydrolysis，Its Technical efficiency of end-of-pipe management70
  污染物指标氨氮的末端治理技术是厌氧水解类，其效率为70，末端治理设施实际运行率（k值）计算公式为k=处理设施年耗电量（千瓦时）/(设备额定功率（千瓦）×设备运行时间（小时））。原文件中描述污染物类别为废水，污染物指标为氨氮，此处对其进行了匹配工作，将其匹配到LCAflow库里面相最符合的流，污染物指标备注为氨氮
- Nitrogen, organic bound: 0.01755
  the Technical of end-of-pipe management technology for pollution Nitrogen, organic boundisBio-contact oxidation process，Its Technical efficiency of end-of-pipe management75
  污染物指标总氮的末端治理技术是生物接触氧化法，其效率为75，末端治理设施实际运行率（k值）计算公式为k=处理设施年耗电量（千瓦时）/(设备额定功率（千瓦）×设备运行时间（小时））。原文件中描述污染物类别为废水，污染物指标为总氮，此处对其进行了匹配工作，将其匹配到LCAflow库里面相最符合的流，污染物指标备注为总氮
- Nitrogen, organic bound: 0.02106
  the Technical of end-of-pipe management technology for pollution Nitrogen, organic boundisA2/O process，Its Technical efficiency of end-of-pipe management70
  污染物指标总氮的末端治理技术是A2/O工艺，其效率为70，末端治理设施实际运行率（k值）计算公式为k=处理设施年耗电量（千瓦时）/(设备额定功率（千瓦）×设备运行时间（小时））。原文件中描述污染物类别为废水，污染物指标为总氮，此处对其进行了匹配工作，将其匹配到LCAflow库里面相最符合的流，污染物指标备注为总氮
- Nitrogen, organic bound: 0.02106
  the Technical of end-of-pipe management technology for pollution Nitrogen, organic boundisAnaerobic hydrolysis，Its Technical efficiency of end-of-pipe management70
  污染物指标总氮的末端治理技术是厌氧水解类，其效率为70，末端治理设施实际运行率（k值）计算公式为k=处理设施年耗电量（千瓦时）/(设备额定功率（千瓦）×设备运行时间（小时））。原文件中描述污染物类别为废水，污染物指标为总氮，此处对其进行了匹配工作，将其匹配到LCAflow库里面相最符合的流，污染物指标备注为总氮
- chemical oxygen demand: 0.485
  the Technical of end-of-pipe management technology for pollution chemical oxygen demandisBio-contact oxidation process，Its Technical efficiency of end-of-pipe management75
  污染物指标化学需氧量的末端治理技术是生物接触氧化法，其效率为75，末端治理设施实际运行率（k值）计算公式为k=处理设施年耗电量（千瓦时）/(设备额定功率（千瓦）×设备运行时间（小时））。原文件中描述污染物类别为废水，污染物指标为化学需氧量，此处对其进行了匹配工作，将其匹配到LCAflow库里面相最符合的流，污染物指标备注为化学需氧量
- chemical oxygen demand: 0.582
  the Technical of end-of-pipe management technology for pollution chemical oxygen demandisA2/O process，Its Technical efficiency of end-of-pipe management70
  污染物指标化学需氧量的末端治理技术是A2/O工艺，其效率为70，末端治理设施实际运行率（k值）计算公式为k=处理设施年耗电量（千瓦时）/(设备额定功率（千瓦）×设备运行时间（小时））。原文件中描述污染物类别为废水，污染物指标为化学需氧量，此处对其进行了匹配工作，将其匹配到LCAflow库里面相最符合的流，污染物指标备注为化学需氧量
- chemical oxygen demand: 0.582
  the Technical of end-of-pipe management technology for pollution chemical oxygen demandisAnaerobic hydrolysis，Its Technical efficiency of end-of-pipe management70
  污染物指标化学需氧量的末端治理技术是厌氧水解类，其效率为70，末端治理设施实际运行率（k值）计算公式为k=处理设施年耗电量（千瓦时）/(设备额定功率（千瓦）×设备运行时间（小时））。原文件中描述污染物类别为废水，污染物指标为化学需氧量，此处对其进行了匹配工作，将其匹配到LCAflow库里面相最符合的流，污染物指标备注为化学需氧量
- chemical oxygen demand: 1.358
  the Technical of end-of-pipe management technology for pollution chemical oxygen demandisChemical coagulation，Its Technical efficiency of end-of-pipe management30
  污染物指标化学需氧量的末端治理技术是化学混凝法，其效率为30，末端治理设施实际运行率（k值）计算公式为k=处理设施年耗电量（千瓦时）/(设备额定功率（千瓦）×设备运行时间（小时））。原文件中描述污染物类别为废水，污染物指标为化学需氧量，此处对其进行了匹配工作，将其匹配到LCAflow库里面相最符合的流，污染物指标备注为化学需氧量
- Exhaust gas: 5550
  the Technical of end-of-pipe management technology for pollution Exhaust gasis/，Its Technical efficiency of end-of-pipe management0
  污染物指标工业废气量的末端治理技术是/，其效率为0。原文件中描述污染物类别为废气，污染物指标为工业废气量，此处对其进行了匹配工作，将其匹配到LCAflow库里面相最符合的流，污染物指标备注为工业废气量

## Use advice
This dataset is derived from the Pollution Source Census Report and contains information on pollution emissions and related products. However, it does not include data on energy or chemical consumption, nor does it provide information on waste or co-product generation. When utilizing this dataset, please supplement the missing data based on actual conditions before use
该数据集来源于污染源普查报告，包含污染物排放及相关产品信息，但不包含能源或化学品消耗数据，也不提供废弃物或共生产物产生信息。在使用该数据集时，请根据实际情况补充缺失数据后再使用。

## Review details
Inventory: The internal review was done by several iteration steps concerning raw data validation, raw data documentation, representativity, completeness and consistency of modelling with regard to ISO 14040 and 14044.
清单： 内部审查通过几个迭代步骤完成，涉及原始数据验证、原始数据记录、代表性、完整性、与 ISO 14040 和 14044 有关的建模的一致性。

## Data sources
- 第二次全国污染源普查产排污核算系数手册（试用版）,二级代码26,四级代码2642文件，在完整版文件中第4111页
