# Soil remediation ; ex situ remediation ; Biopile ; Construction preparation ; Material transportation ; Equipment and Materials Arriving on Site

Dataset: ILCD process, Unit process, single operation
Geography: KR
Reference year: 2011
Classification: Other Services / Repair and maintenance
Generated by: Sang Chunhui, sangch@mail.bnu.edu.cn
Owner: Tiangong LCI Data Working Group
Review: Dependent internal review by Tiangong LCI Data Working Group
Amounts: no units in this file; such an amount is in the reference unit of its flow, which a separate flow dataset defines
copyright: false
licenseType: Free of charge for all users and uses

## General comment
A total of 117 tons of materials and chemicals are required for the remediation of 1000 m3 TPH contaminated soil on the site, with a total transportation distance of 30 kilometers

## Technical purpose
This data set corresponds to the process of soil remediation. Specifically, it refers to ex-situ biopile treatment for the restoration of soil contaminated with Total Petroleum Hydrocarbons (TPH). Covering a volume of 1000 cubic meters of contaminated soil, this data is relevant for the preparation and transport of materials and reagents totaling 117 tons over a distance of 30 kilometers.

## Reference product
- Equipment and Materials Arriving on Site: 117000; estimated

## Inputs
- transport in t*km: 3510; estimated

## Use advice
When utilizing this data set for Life Cycle Assessment (LCA), it is crucial to ensure that it matches the specific scenario of soil contamination being assessed. Consider the volume of soil, type of contaminants, and the remediation goals. For transportation-related emissions, use the provided total distance only if it aligns with the actual project logistics. Adjust the data accordingly if other modes of transportation or distances are involved. This data should be used to model the pre-treatment phase of soil remediation, including material handling and transportation.

## Review details
Inventory: The internal review was done by several iteration steps concerning raw data validation, raw data documentation, representativity, completeness and consistency of modelling with regard to ISO 14040 and 14044.

## Data sources
- Seung-Woo Jeong, Sangwon Suh. Assessment of Environmental Impacts and CO2 Emissions from Soil Remediation Technologies using Life Cycle Assessment - Case Studies on SVE and Biopile Systems -. 大韓環境工學會誌
