# Trench-based gate ; 10m width, 11m depth ; In-situ groundwater remediation ; PRB ; Funnel-and-gate configuration PRB

Dataset: ILCD process, Unit process, single operation
Geography: US
Reference year: 2011
Classification: Unit processes / Other Services / Repair and maintenance
Generated by: Zhang Jianbin, zhangjb@caep.org.cn
Owner: Tiangong LCI Data Working Group
Review: Dependent internal review by Tiangong LCI Data Working Group
Amounts: no units in this file; such an amount is in the reference unit of its flow, which a separate flow dataset defines
copyright: false
licenseType: Free of charge for all users and uses

## General comment
The gate is one of the components of the groundwater PRB system. The impermeable funnel guides or collects polluted groundwater flow into the gate. The gate is filled with active materials to dispose of the groundwater flowing through it. Trench-based gate refers to a gate installed using the trench-based method.

## Geography
PRB is assumed to be installed at a simulated site

## Technical purpose
The trench-based gate described is employed as part of a Permeable Reactive Barrier (PRB) system for in-situ groundwater remediation. Specifically, this infrastructure serves to direct contaminated groundwater into a gate filled with reactive media, facilitating treatment as the water passes through. The 10m wide and 11m deep configuration details its suitability for large scale environmental management projects, particularly for the containment and remediation of polluted groundwater at affected sites.

## Reference product
- Trench-based gate: 1; estimated
  Trench-based gate with a width of 10 m and a depth of 11 m

## Inputs
All rows: estimated
- Zero-valent Iron: 139000
  Assume Fe0 is mixed with quartz sand in 1:1 (w:w)
- quartz sand: 139000
  Assume Fe0 is mixed with quartz sand in 1:1 (w:w)
- transport in t*km: 44480, 8577.12 (2 entries)
  Transport distance of the materials to the site is assumed to be 160 km (100 mile)
- Electricity: 483000
  Reactive media construction.
- Steel: 32200
  Gate steel
- cement, unspecified: 907
  Gate cement
- sand: 20500
  Gate sand
- Electricity: 654000
  Gate construction
- quartz sand: 26700
  Backfilling

## Use advice
Users applying this data should carefully consider the intended use within the scope of in-situ groundwater remediation projects. The data reflects the inputs and outputs associated with the material and energy requirements for installing a trench-based gate of specified dimensions. Users must note that the life cycle inventory data is based on a hypothetical pollution site, and modifications may be required to tailor the data to actual field conditions. Attention should be given to the expected lifespan of the gate, maintenance requirements, as well as potential variations in groundwater contamination and hydrogeological characteristics of the site.

## Review details
Inventory: The internal review was done by several iteration steps concerning raw data validation, raw data documentation, representativity, completeness and consistency of modelling with regard to ISO 14040 and 14044.

## Data sources
- Mark S. H. Mak and Irene M. C. Lo.Environmental Life Cycle Assessment of Permeable Reactive Barriers: Effects of Construction Methods, Reactive Materials and Groundwater Constituents[J].Environmental Science & Technology 2011, 45, 23, 10148-10154
