# SoG-Si manufacturing ; SoG-Si ; Physical metallurgical process

Dataset: ILCD process, Unit process, single operation
Geography: CN
Reference year: 2016
Classification: Unit processes / Materials production / Metals and semimetals
Functional unit: Grid-connected electricity generation from a 1 MWp multi-Si PV system, whose lifespan is 30 years of a 10 MWp power station has been taken as the research object and the functional unit
LCI method principle: Attributional
LCI method approaches: Allocation
Generated by: Jinfeng Yang, yjfzfshn@163.com
Owner: Tiangong LCI Data Working Group
Review: Dependent internal review by Tiangong LCI Data Working Group
Amounts: no units in this file; such an amount is in the reference unit of its flow, which a separate flow dataset defines
copyright: false
licenseType: Free of charge for all users and uses

## General comment
Multi-Si

## Geography
The power station is located in the central region of Ningxia, China, where the average annual solar radiation is approximately 5955.80 MJ m2 a-1, and the annual average number of peak sunshine hours are 1718 h.

## Time period
Available online

## Technology and included processes
Among the above processes, the SoG-Si is manufactured by metal-lurgical route, which is an integrated method rather than a single preparation method. In order to remove various impurities in silicon, several independent and random ordered processes are combined for mixed use.

## Technical purpose
The metallurgically produced solar grade multi-crystalline silicon (SoG-Si) is used for the construction and operation of multi-Si photovoltaic (PV) systems for grid-connected electricity generation. These systems are deployed in areas such as the central region of Ningxia, China, which has high solar radiation and sunshine peak hours conducive to solar energy production. The SoG-Si manufacturing process combines several integrated metal metallurgical methods to ensure high-purity silicon necessary for efficient PV operation.

## Reference product
- Solar grade multi-Si: 1000; measured
  SoG-Si

## Inputs
All rows: measured
- Electricity: 147921
- Metallurgical silicon: 1227.72
- quartz sand: 41.19
  Quartz sand
- fluorspar: 8.22
  Fluorite powder
- Hydrochloric acid: 356.44
  Hydrochloric acid (31%)
- Hydrofluoric acid: 151.49
  Hydrofluoric acid (55%)
- freshwater: 12376.2
  Fresh water
- Lime: 379.21
- Quartz Crucible,Quartz Crucible: 207.92
  Quartz crucible
- Silicon nitride: 0.97
- Cooling water: 4158.42
  Circulating water

## Outputs
- industrial waste (unspecified): 164.36; measured
  Waste residue
- waste water - untreated: 13162.4; measured
  Waste water
- Calcium fluoride waste: 162.38; measured
  Calcium fluoride
- Waste (solid): 209.69; measured
  Waste quartz crucible

## Deviations from the LCI method approaches
A life cycle assessment (LCA) has been performed for the grid-connected electricity generation from a metallurgical route multi-crystalline silicon (multi-Si) photovoltaic (PV) system in China.

## Data selection and combination
Survery of factories in Yunnan and Ningxia

## Use advice
When using the life cycle assessment data for the SoG-Si manufacturing process, pay attention to the methodological consistency of the LCA. Ensure that the boundary conditions of the study, such as geographical location and system lifespan, match the project's specific context. The dataset is specifically applicable to grid-connected PV systems in areas with similar solar exposure as the central region of Ningxia. It is advised to accurately model the electricity generation and the performance of the PV system over its 30-year lifespan, considering the peak sunshine hours. The usage of this data should also consider the recycling and end-of-life processes as they can impact the overall environmental profile of the PV system.

## Review details
Inventory: The internal review was done by several iteration steps concerning raw data validation, raw data documentation, representativity, completeness and consistency of modelling with regard to ISO 14040 and 14044.

## Data sources
- Yu, Z. et al. Life cycle assessment of grid-connected power generation from metallurgical route multi-crystalline silicon photovoltaic system in China. Applied Energy 185, 68–81 (2017).
