# Lithium Carbonate Production ; Battery Grade Lithium Carbonate ; Sulfuric Acid ; Australia Exports Lithium Spodumene Concentrate

Dataset: ILCD process, Unit process, single operation
Geography: SN-SC-CN
Reference year: 2017
Classification: Unit processes / Materials production / Inorganic chemicals
Generated by: Sun Xin, xs389@cornell.edu
Owner: Tiangong LCI Data Working Group
Review: Dependent internal review by Tiangong LCI Data Working Group
Amounts: no units in this file; such an amount is in the reference unit of its flow, which a separate flow dataset defines
licenseType: Free of charge for all users and uses

## General comment
Once spodumene has been concentrated, lithium compounds(LiOH•H2O or Li2CO3) can be produced from it. A cathode plant environmental impact assessment report produced by the Tianqi Lithium Corporation, a major cathode producer in China, details the inputs of material, energy, and water it uses to produce 1 tonne of LiOH•H2O or Li2CO3. Their report assumes concentrated spodumene ore from western Australia at 6% concentration. Since we assumed the concentrated spodumene ore has a minimum of 5% concentration, it issufficient for the production process here. We assume that the spodumene is shipped from coastal western Australia to China and transported 100 miles (161 km) by truck (33 tonne payload) to a lithium compounds facility. Note that these shipping estimations are not specific to thereporting company but to concentrated production regions in China.

## Geography
遂宁管辖的射洪市

## Technology and included processes
The scope of the Tianqi-reported data allows for a facility-levelanalysis of the material, water, and energy needed to produce 1 tonneof LiOH•H2O or Li2CO3 from spodumene concentrate (Table 5). A significantamount of coal is used for process heat, split between use as fuelfor an acid-roasting kiln and for steam production. Tianqi reports that ituses 12 tonnes of steam per tonne of LiOH•H2O produced and 16.5tonnes of steam per tonne of Li2CO3 produced. Note also that Na2SO4 is produced as a by-product of this process. Wedetermined the quantity of the by-product but did not allocate anyburdens to it.

## Technical purpose
The battery grade lithium carbonate produced through the sulfuric acid method is intended for use in the manufacturing of lithium-ion batteries. Such high-purity lithium carbonate is critical for ensuring the performance and longevity of batteries, particularly in high-demand applications like electric vehicles (EVs), energy storage systems, and portable electronic devices.

## Reference product
- Lithium carbonate,Lithium carbonate: 1000; measured

## Inputs
All rows: measured
- Spodumene concentrate (6% Li2O): 7300
- freshwater,freshwater: 40
- Sulfuric acid: 1710
- sodium hydroxide: 50
- Electricity: 6480
- hard coal; 26.3 MJ/kg: 82893
  For direct combustion heating
- hard coal; 26.3 MJ/kg: 52997
  used to produce steam
- calcium carbonate: 700
- sodium carbonate: 2050

## Outputs
- sodium sulfate: 1920; measured

## Use advice
When utilizing this data for Life Cycle Assessment (LCA), special attention should be given to the boundaries of the process. This includes considering upstream impacts of lithium spodumene concentrate extraction in Australia and transportation to the midstream sulfuric acid treatment facility. Users should ensure consistency in system boundaries when comparing with other data sets, and consider any potential recycling or end-of-life scenarios for the lithium carbonate in accordance with the intended application.

## Review details
Inventory: The internal review was done by several iteration steps concerning raw data validation, raw data documentation, representativity, completeness and consistency of modelling with regard to ISO 14040 and 14044.

## Data sources
- Kelly, J. C., Wang, M., Dai, Q. & Winjobi, O. Energy, greenhouse gas, and water life cycle analysis of lithium carbonate and lithium hydroxide monohydrate from brine and ore resources and their use in lithium ion battery cathodes and lithium ion batteries. Resources, Conservation and Recycling 174, 105762 (2021).
