# Octinoxate ; Benzene acetonitrile, ethyl chloride ; All sizes; NESPS2 / 辛硫磷 ; 苯乙腈、乙基氯化物 ; 所有规模 ; 全国第二次污染普查数据

Dataset: ILCD process, Unit process, single operation
Geography: CN
Reference year: 2019
Classification: Reference Parameters / Materials production / Organic chemicals
Generated by: The data was created by the Office of the Second National Pollution Source Census of the Ministry of Ecology and Environment, and the data was organized by the TianGong Plan team for ILCD format / 生态环境部第二次全国污染源普查工作办公室创建数据，天工计划团队常慧敏整理数据为ILCD格式
Owner: Tiangong LCI Data Working Group / 天工LCI数据工作小组
Review: Dependent internal review by Tiangong LCI Data Working Group / 天工LCI数据工作小组
Amounts: no units in this file; such an amount is in the reference unit of its flow, which a separate flow dataset defines
copyright: false
licenseType: Free of charge for all users and uses

## General comment
the Technical of end-of-pipe management technology for pollution Nitrogen, organic boundisA2/O process，Its Technical efficiency of end-of-pipe management70

## Technical purpose
所述尾端处理技术用于净化和处理含有氮（有机结合态氮）、磷和特定化学成分（辛硫磷苯乙腈、乙基氯化物）的工业废水，适用于任何规模的各种工业过程。这些技术包括氧化还原过程、A2/O过程、电解、化学沉淀、化学絮凝和成型厌氧反应器，应用于达到高水平的污染物消除，以符合环境法规。

## Reference product
- Phoxim: 1000; calculated
  源文件中描述为为辛硫磷，此处对其进行了匹配工作，将其匹配到LCAflow库里面相最符合的流，污染物指标备注为总氮

## Outputs
All rows: calculated
- Nitrogen, organic bound: 0.0525
  the Technical of end-of-pipe management technology for pollution Nitrogen, organic boundisRedox process + chemical precipitation + A2/O process，Its Technical efficiency of end-of-pipe management99.5，The formula for calculating the actual operation rate (k-value) of the end-of-pipe treatment facility is k = annual power consumption of equipment (kWh) / (equipment power (kW) × annual operating hours (hours))
  污染物指标总氮的末端治理技术是氧化还原法+化学沉淀法+A2/O工艺，其效率为99.5，末端治理设施实际运行率（k值）计算公式为k=治理设施耗电量（千瓦时）/（治理设施运行时数（小时）*治理设施额定功率(千瓦)）。原文件中描述污染物类别为废水，污染物指标为总氮，此处对其进行了匹配工作，将其匹配到LCAflow库里面相最符合的流，污染物指标备注为总氮
- phosphorus, total: 0.2899
  the Technical of end-of-pipe management technology for pollution phosphorus, totalisElectrolysis + chemical coagulation + shaped anaerobic reactor + A2/O process，Its Technical efficiency of end-of-pipe management87，The formula for calculating the actual operation rate (k-value) of the end-of-pipe treatment facility is k = annual power consumption of equipment (kWh) / (equipment power (kW) × annual operating hours (hours))
  污染物指标总磷的末端治理技术是电解法+化学混凝法+定型厌氧反应器类A2/O工艺，其效率为87，末端治理设施实际运行率（k值）计算公式为k=治理设施耗电量（千瓦时）/（治理设施运行时数（小时）*治理设施额定功率(千瓦)）。原文件中描述污染物类别为废水，污染物指标为总磷，此处对其进行了匹配工作，将其匹配到LCAflow库里面相最符合的流，污染物指标备注为总磷
- Nitrogen, organic bound: 0.315
  the Technical of end-of-pipe management technology for pollution Nitrogen, organic boundisElectrolysis + chemical coagulation + shaped anaerobic reactor + A2/O process，Its Technical efficiency of end-of-pipe management97
  污染物指标总氮的末端治理技术是电解法+化学混凝法+定型厌氧反应器类A2/O工艺，其效率为97，末端治理设施实际运行率（k值）计算公式为k=治理设施耗电量（千瓦时）/（治理设施运行时数（小时）*治理设施额定功率(千瓦)）。原文件中描述污染物类别为废水，污染物指标为总氮，此处对其进行了匹配工作，将其匹配到LCAflow库里面相最符合的流，污染物指标备注为总氮
- phosphorus, total: 0.5575
  the Technical of end-of-pipe management technology for pollution phosphorus, totalisChemical precipitation + activated sludge process + redox process，Its Technical efficiency of end-of-pipe management75
  污染物指标总磷的末端治理技术是化学沉淀+活性污泥法+氧化还原法，其效率为75，末端治理设施实际运行率（k值）计算公式为k=治理设施耗电量（千瓦时）/（治理设施运行时数（小时）*治理设施额定功率(千瓦)）。原文件中描述污染物类别为废水，污染物指标为总磷，此处对其进行了匹配工作，将其匹配到LCAflow库里面相最符合的流，污染物指标备注为总磷
- phosphorus, total: 0.7582
  the Technical of end-of-pipe management technology for pollution phosphorus, totalisElectrolysis + activated sludge process，Its Technical efficiency of end-of-pipe management66
  污染物指标总磷的末端治理技术是电解法+活性污泥法，其效率为66，末端治理设施实际运行率（k值）计算公式为k=治理设施耗电量（千瓦时）/（治理设施运行时数（小时）*治理设施额定功率(千瓦)）。原文件中描述污染物类别为废水，污染物指标为总磷，此处对其进行了匹配工作，将其匹配到LCAflow库里面相最符合的流，污染物指标备注为总磷
- Nitrogen, organic bound: 3.15
  the Technical of end-of-pipe management technology for pollution Nitrogen, organic boundisA2/O process，Its Technical efficiency of end-of-pipe management70
  污染物指标总氮的末端治理技术是A2/O工艺，其效率为70，末端治理设施实际运行率（k值）计算公式为k=治理设施耗电量（千瓦时）/（治理设施运行时数（小时）*治理设施额定功率(千瓦)）。原文件中描述污染物类别为废水，污染物指标为总氮，此处对其进行了匹配工作，将其匹配到LCAflow库里面相最符合的流，污染物指标备注为总氮

## Use advice
This dataset is derived from the Pollution Source Census Report and contains information on pollution emissions and related products. However, it does not include data on energy or chemical consumption, nor does it provide information on waste or co-product generation. When utilizing this dataset, please supplement the missing data based on actual conditions before use
该数据集来源于污染源普查报告，包含污染物排放及相关产品信息，但不包含能源或化学品消耗数据，也不提供废弃物或共生产物产生信息。在使用该数据集时，请根据实际情况补充缺失数据后再使用。

## Review details
Inventory: The internal review was done by several iteration steps concerning raw data validation, raw data documentation, representativity, completeness and consistency of modelling with regard to ISO 14040 and 14044.
清单： 内部审查通过几个迭代步骤完成，涉及原始数据验证、原始数据记录、代表性、完整性、与 ISO 14040 和 14044 有关的建模的一致性。

## Data sources
- 第二次全国污染源普查产排污核算系数手册（试用版）,二级代码26,三级代码263.0文件，在完整版文件中第2936页
