# Anodized foil production ; 0.12 mm anodized aluminum coils ; Aluminum ingots

Dataset: ILCD process, Unit process, single operation
Geography: JS-CN
Reference year: 2020
Classification: Unit processes / Materials production / Metals and semimetals
Generated by: Huimin Chang, huiminchang@tsinghua.edu.cn
Owner: Tiangong LCI Data Working Group
Review: Dependent internal review by Tiangong LCI Data Working Group
Amounts: no units in this file; such an amount is in the reference unit of its flow, which a separate flow dataset defines
copyright: false
licenseType: Free of charge for all users and uses

## General comment
The investigated manufacturer produced about 1.183 billion AECs of all kinds in 2020.

## Technical purpose
The anodized aluminum foil produced through this industrial process is specifically designed for use in manufacturing aluminum electrolytic capacitors (AECs). These capacitors are commonly utilized in various electronic devices to store electrical charge, supply power during momentary interruptions, and filter unwanted frequency signals. The foil has a thickness of 0.12 mm, making it suitable for high-voltage applications such as 420V 680uf capacitors. The data set represents industrial-scale production capabilities, signifying its significance in large-scale electronic manufacturing.

## Reference product
- Al coil of 0.12mm anode formed foil: 449.811; measured
  Al coil of 0.12 mm anode formed foil [kg] ; Production of anode formed foil

## Inputs
All rows: measured
- electricity, high voltage, aluminium industry: 432.166
  Electricity [kWh] ; Production of anode etched foil
- electricity, high voltage, aluminium industry: 290.977
  Electricity [kWh] ; Hydration
- electricity, high voltage, aluminium industry: 204985
- 0.12mm Al blank coil: 518
  0.12mm Al blank coil [kg] ; Preparation of sulfuric acid (anode)
- water, deionised: 107187
- tap water: 63287.3
  Tap water [kg] ; Waste gas treatment (anode)
- sulfuric acid: 470.708
  Sulfur acid（98%）[kg] ; Corrosion reaction (anode)
- nitric acid, without water, in 50% solution state: 23.693
  Nitric acid（98%）[kg] ; Corrosion reaction (anode)
- hydrochloric acid, without water, in 30% solution state: 78.978
  Hydrochloric acid（31%）[kg] ; Corrosion reaction (anode)
- sodium hydroxide, without water, in 50% solution state: 78.978
  NaOH solution (30%) [kg] ; Corrosion reaction (anode)
- water, deionised: 967.606
  Deionized water [kg] ; Hydration
- boric acid, anhydrous, powder: 21.98
  HBO3 [kg] ; Formation process
- Ammonium Citrate: 42.333
  Ammonium citrate [kg] ; Formation process
- Ammonium Pentaborate: 11.611
  Ammonium pentaborate [kg] ; Formation process
- phosphoric acid, industrial grade, without water, in 85% solution state: 120.951
  H3PO4 [kg] ; Passivation
- Ammonium dihydrogen phosphate: 1.935
  NH4H2PO4 [kg] ; Phosphating

## Outputs
All rows: measured
- Aluminium Phosphate: 15.578
  AlPO4 [kg] ; Production of anode formed foil
- aluminium scrap, post-consumer: 12.865
  Waste Al foil [kg] ; Production of anode formed foil
- wastewater, average: 80795.1
  Wastewater [kg] ; Production of anode formed foil
- Chemical Oxygen Demand (COD): 2.141
  COD [kg] ; Production of anode formed foil
- ammonia: 0.372
  NH3-N [kg] ; Production of anode formed foil
- Phosphorus: 0.036
  TP [kg] ; Production of anode formed foil
- sewage sludge: 14.661
  Sludge [kg] ; Sewage treatment
- wastewater, average: 7786.27
  Wastewater [kg] ; Production of anode etched foil
- hydrogen chloride: 0.388
  HCl gas [kg] ; Production of anode etched foil
- Sulfuric acid: 0.042
  H2SO4 gas [kg] ; Production of anode etched foil
- Nitrogen oxides: 0.048
  NOx [kg] ; Production of anode etched foil
- ammonia: 0.044
  NH3 gas [kg] ; Sewage treatment
- Chemical Oxygen Demand (COD): 0.947
  COD [kg] ; Production of anode etched foil
- Suspended solids, unspecified: 0.62
  SS [kg] ; Production of anode etched foil
- ammonia: 0.02
  NH3-N [kg] ; Production of anode etched foil
- Nitrogen: 0.079
  TN [kg] ; Production of anode etched foil

## Data selection and combination
The inventory data of capacitor production come from the AECs’ production factory in Jiangsu Province, China. The cut-off criteria of LCI data collection for each process is coverage of at least 95% of the mass and energy of the input and output flows. The inventory data of anode foil production and cathode foil production is obtained based on the analysis of the manufacturing processes and corresponding process parameters. The upstream data (i.e., aluminum ingots, separator paper, transport, electricity, and water) are acquired from the Gabi software (Version: 10.6.1.35). In detail, the profile of Chineses electricity grid from the China Electric Power Yearbook adopts the reference year 2016. The reference year of aluminum ingot production is 2015. The inaccessible data about ammonium citrate, ammonium pentaborate, NH4H2PO4, and HBO3 are estimated based on chemical equations using the existing materials (reactants) in the Gabi software. The use and end-of-life stage inventory data are obtained based on analysis and calculation.

## Use advice
When using this LCA data set, it is crucial to adhere to the established system boundaries and cut-off criteria. Specifically, the LCI data coverage should account for at least 95% of the mass and energy inputs and outputs. Users should note that the inventory data for capacitor production is region-specific, sourced from a factory in Jiangsu Province, China. In modeling use-phase behavior and end-of-life scenarios for the capacitors, the inaccessible data for certain chemicals are estimated from chemical equations within the Gabi software using existing materials. The reference year for the energy profile of the Chinese electricity grid is 2016, and for aluminum ingot production, it is 2015. Any updates to the grid mix or technological improvements in aluminum production should be considered to ensure the data's relevancy.

## Review details
Inventory: The internal review was done by several iteration steps concerning raw data validation, raw data documentation, representativity, completeness and consistency of modelling with regard to ISO 14040 and 14044.

## Data sources
- Zhang, C., Jing, J., Yun, L., Zheng, Y. & Huang, H. A cradle-to-grave life cycle assessment of high-voltage aluminum electrolytic capacitors in China. J. Clean. Prod. 370, (2022).
