# Remediated soil ; Pesticide contaminated soil ; Offsite ex-situ thermal desorption ; Excluding soil excavation process

Dataset: ILCD process, Unit process, single operation
Geography: JS-CN
Reference year: 2022
Classification: Unit processes / Other Services / Repair and maintenance
Functional unit: we defined the functional unit as the remediation of 1 ton of organically contaminated soil
Generated by: Yang Xintong, yangxt@caep.org.cn
Owner: Tiangong LCI Data Working Group
Review: Dependent internal review by Tiangong LCI Data Working Group
Amounts: no units in this file; such an amount is in the reference unit of its flow, which a separate flow dataset defines
copyright: false
licenseType: Free of charge for all users and uses

## General comment
Offsite ex-situ thermal desorption scenario would require that contaminated soil be transported to a thermal desorption plant.

## Geography
The study site was an abandoned rubber factory in Jiangsu Province in eastern China.The total in situ volume of contaminated soil that required remediation was 29,313 m3

## Technology and included processes
Contaminated soil would be crushed and screened in a large movable shed to remove large debris and rocks, after which it would be fed into a kiln. To reach the treatment goal, 30 min of contaminated soil retention in a rotary kiln is required. The heated soil would then be cooled by spraying it with water, after which it would be stockpiled at the site for subsequent safety tests. The decontaminated soil would then be used as backfill at the site. In general, thermal desorption systems require vapor gas treatment to remove hazardous gas contaminants, particulates, and other byproducts. The exhaust gas purification module is composed of an activated carbon adsorption tank. Activated carbon must be renewed regularly and spent activated carbon must be treated as hazardous waste.

## Technical purpose
Offsite ex-situ thermal desorption treatment is employed for remediating pesticide-contaminated soil from an abandoned rubber factory. The treated soil is to be used as backfill material at remediation sites, ensuring the reclamation of formerly unusable land.

## Reference product
- Remediated soil: 1000; missing unimportant

## Inputs
All rows: missing unimportant
- Tap Water: 0.44
- Activated Carbon: 1.1
- Electricity: 87.336
- transport in t*km: 60
- Excavated soil,Excavated soil: 1000
  与大多数从污染土壤挖掘开始的污染土壤修复LCA不同，我们将系统边界设置为在污染土壤被挖掘和筛分后，但仍留在场地内后开始。

## Outputs
- hazardous waste (unspecified): 1.26; missing unimportant
  尾气处置模块由活性炭吸附罐组成。活性炭必须定期更新，用过的活性炭必须作为危险废物处理。

## Use advice
This data set is applicable primarily for LCA studies of soil remediation processes specifically involving offsite ex-situ thermal desorption without including the soil excavation phase. Ensure to account for transportation of soil to the desorption plant, energy used in the thermal treatment, retention time within the kiln, water spraying cooling process, safety testing of treated soil, and management of waste materials like spent activated carbon from gas treatment.

## Review details
Inventory: The internal review was done by several iteration steps concerning raw data validation, raw data documentation, representativity, completeness and consistency of modelling with regard to ISO 14040 and 14044.

## Data sources
- Tian L ,Mingchao H ,Lu Y , et al. Life cycle assessment-based decision-making for thermal remediation of contaminated soil in a regional perspective [J]. Journal of Cleaner Production, 2023, 392
