# East China Rice-Winter Wheat Production ; Agricultural Production (Wheat)

Dataset: ILCD process, Unit process, single operation
Geography: NJ-JS-CN
Reference year: 2015
Valid until: 2015
Classification: Unit processes / Materials production / Agricultural production means
Functional unit: 1 ton of rice and 1 ton of winter wheat
LCI method principle: Attributional
LCI method approaches: Consequential
Generated by: Haoran Zhang, hrzhang@whu.edu.cn
Owner: Tiangong LCI Data Working Group
Review: Dependent internal review by Tiangong LCI Data Working Group
Amounts: no units in this file; such an amount is in the reference unit of its flow, which a separate flow dataset defines
copyright: false
licenseType: Free of charge for all users and uses

## General comment
The energy consumption of agricultural production system is mainly calculated as the energy consumption generated by the use of diesel oil and pesticides. In this study, the energy consumption of agricultural materials and agricultural production system is mainly calculated through formula 1, and the consumption of fuel oil and electric power resources in the production stage of agricultural materials is referred to McDougall [22] et al. (Table 2 and Table 3). According to the research of Liu Hongtao et al. [23] (Table 4), the energy consumption of 1t urea (pure N) can be calculated. According to the urea (pure N) consumed per unit crop yield, the energy consumption of nitrogen fertilizer production in agricultural production system can be obtained. For the folding energy coefficients of diesel oil and pesticides in the agricultural stage, refer to the research results of Yuan Baorong et al. [24] (the folding energy coefficients of diesel oil and pesticide (kg·hm-2) are 42.55 and 1005.5 MJ·kg-1, respectively).

## Technology and included processes
Using 1t rice and 1t winter wheat as functional units, the resource consumption and environmental impact of 1t rice and 1t winter wheat production in rice-wheat rotation system in this region were studied. The initial boundary of the life cycle of agricultural products is the extraction of energy raw materials related to the life cycle of rice and wheat, and the end boundary is the output of crop products and emission of waste gas through crop planting and cultivation to harvest, including two systems of agricultural material production and agricultural production

## Technical purpose
The results from this LCA data are specifically for the agricultural production processes of rice and winter wheat in the Jiangning District of Nanjing, Jiangsu Province. The data set reflects the resource inputs and outputs associated with cultivating these staples, adhering to the regional farming practices. This data can be used for environmental impact studies, process optimization, and sustainability assessments for crop production in similar geographical and climatological contexts. The materials involved, such as compound fertilizers, urea, imidacloprid, chlorpyrifos, butachlor, and haloxyfop, are indicative of the type of agrochemicals used in this region. The practice of mechanical straw crushing and returning to the field is also highlighted, which can be relevant for soil health and carbon cycling studies.

## Reference product
- wheat: 4670; measured

## Inputs
All rows: measured
- Diesel: 17.5
  wheat
- heavy fuel oil: 18.8
  wheat
- nitrogen: 270
  wheat
- phosphorus: 67.5
  wheat
- potassium chloride: 67.5
  wheat
- Insecticide: 3.7
  wheat

## Deviations from the LCI method approaches
The starting boundary of the life cycle of agricultural products is the extraction of energy raw materials related to the life cycle of rice and wheat. The terminal boundary is the output of agricultural crop products and the emission of waste gases after the planting and cultivation of crops.

## Data selection and combination
The research data mainly come from the sampling survey results of the input-output of 82 households in Jiangning District, Nanjing City, Jiangsu Province over the past two years. The fertilizers mainly include compound fertilizers and urea, insecticides include imidacloprid and chlorpyrifos, and herbicides include butachlor and haloxyfop, etc. All straw in the field is mechanically crushed and returned to the field.

## Data treatment and extrapolations
For the entire lifecycle of the product system, all input and output processes, as well as computational processes, generally include categorization and characterization, normalization, and weighted assessment

## Sampling procedure
The results of a two-year input-output sampling survey of 82 households in Jiangning District, Nanjing City, Jiangsu Province.

## Use advice
When utilizing this data set for life cycle assessment, users should pay attention to the specific regional context and agricultural practices, as they significantly influence the data applicability and resulting analysis. The methodologies employed, such as mechanical straw crushing and the specific agrochemicals used, should be accounted for when comparing with other regions or agricultural systems. Users should also be aware of the defined boundaries of the life cycle – starting from raw energy material extraction and ending with the harvest of crops and emission of waste gases. These boundaries should be maintained when this data is integrated into broader studies or assessments to preserve its relevance and accuracy.

## Review details
Inventory: The internal review was done by several iteration steps concerning raw data validation, raw data documentation, representativity, completeness and consistency of modelling with regard to ISO 14040 and 14044.

## Data sources
- 胡乃娟,陈倩,朱利群.长江中下游稻-麦轮作系统生命周期环境影响评价——以江苏南京为例[J].长江流域资源与环境,2019,28(05):1111-1120.
