# Lignite;Lignite;Lignite

Dataset: ILCD process, Unit process, single operation
Geography: CN
Classification: Energy carriers and technologies / Lignite based fuels
Generated by: Fuxiang, 1162850692@qq.com
Owner: Tiangong LCI Data Working Group
Review: Dependent internal review by Tiangong LCI Data Working Group
Amounts: no units in this file; such an amount is in the reference unit of its flow, which a separate flow dataset defines
copyright: false
licenseType: Free of charge for all users and uses

## General comment
The lignite production data set represents the use of lignite, also known as brown coal, in the steel manufacturing industry. Specifically, it pertains to the Direct Reduced Iron (DRI) process using lignite as a reductant. The data has applications in evaluating the environmental impact of using lignite in the Coal-Direct Reduction (Coal-DR) route in the production of steel. This route is an alternative process to the Coke Oven Gas-Direct Reduction (COG-DR) and Hydrogen-Direct Reduction (H-DR) routes, which are not yet scaled-up in China.

## Geography
The LCI of Coal-DR is obtained, as shown in Table 9, based on the statistics of the demonstration project in China.

## Reference product
- lignite: 625.1; calculated

## Inputs
- Raw coal: 7.9; calculated
- Natural gas, at consumer EU-27: 6.2; calculated

## Data treatment and extrapolations
LCI of COG-DR and H-DR routes, which is not scaled-up in China are estimated based on Coal-DR routes combined with literature data from simulations, laboratory tests, and process modeling in Table 9 [49,50]. The LCI of Coal-DR is obtai

## Use advice
Users of this lignite production life cycle inventory (LCI) data set should note that it is based on statistics from a demonstration project in China, and supplemented with estimates from literature data including simulations, laboratory tests, and process modeling specific to the Coal-Direct Reduction (Coal-DR) routes. The data set is not normalized to a global standard and may not be representative of larger scale operations or alternative geographical contexts. The methodology and scale limitations should be taken into consideration when utilizing this data for decision-making or comparative analysis with other processes.

## Review details
Inventory: The internal review was done by several iteration steps concerning raw data validation, raw data documentation, representativity, completeness and consistency of modelling with regard to ISO 14040 and 14044.

## Data sources
- The carbon reduction potential of hydrogen in the low carbon transition of the iron and steel industry: The case of China
