# Expanded ammonium nitrate explosives ; Ammonium nitrate, sodium nitrate, compound wax ; Expansion, granulation, drying ; All sizes; NESPS2 / 膨化硝铵炸药 ; 硝酸铵、硝酸钠、复合蜡 ; 膨化、造粒、干燥 ; 所有规模 ; 全国第二次污染普查数据

Dataset: ILCD process, Unit process, single operation
Geography: CN
Reference year: 2019
Classification: Reference Parameters / Energy carriers and technologies / Energetic raw materials
Generated by: The data was created by the Office of the Second National Pollution Source Census of the Ministry of Ecology and Environment, and the data was organized by the TianGong Plan team for ILCD format / 生态环境部第二次全国污染源普查工作办公室创建数据，天工计划团队常慧敏整理数据为ILCD格式
Owner: Tiangong LCI Data Working Group / 天工LCI数据工作小组
Review: Dependent internal review by Tiangong LCI Data Working Group / 天工LCI数据工作小组
Amounts: no units in this file; such an amount is in the reference unit of its flow, which a separate flow dataset defines
copyright: false
licenseType: Free of charge for all users and uses

## General comment
the Technical of end-of-pipe management technology for pollution chemical oxygen demandisPhysical treatment，Its Technical efficiency of end-of-pipe management60

## Technical purpose
膨化硝铵炸药主要用于矿山开采、采石场和建筑施工等需要控制爆破作业的场合，用于破碎岩石，便于物料提取或场地准备。该产品由硝酸铵、硝酸钠和复合蜡组成，并经过膨化、造粒和干燥工艺制成，适用于不同的爆破需求。

## Reference product
- Explosive: 1000; calculated
  源文件中描述为为膨化硝铵炸药，此处对其进行了匹配工作，将其匹配到LCAflow库里面相最符合的流，污染物指标备注为工业废水量

## Outputs
All rows: calculated
- Petroleum-related waste: 8.7e-6
  the Technical of end-of-pipe management technology for pollution Petroleum-related wasteisBiochemical method，Its Technical efficiency of end-of-pipe management90
  污染物指标石油类的末端治理技术是生化法，其效率为90，末端治理设施实际运行率（k值）计算公式为k=治理设施实际处理污染物总量（公斤/应该处理污染物总量（公斤））。原文件中描述污染物类别为废水，污染物指标为石油类，此处对其进行了匹配工作，将其匹配到LCAflow库里面相最符合的流，污染物指标备注为石油类
- Petroleum-related waste: 3.48e-5
  the Technical of end-of-pipe management technology for pollution Petroleum-related wasteisPhysical treatment，Its Technical efficiency of end-of-pipe management60
  污染物指标石油类的末端治理技术是物理法，其效率为60，末端治理设施实际运行率（k值）计算公式为k=治理设施实际处理污染物总量（公斤/应该处理污染物总量（公斤））。原文件中描述污染物类别为废水，污染物指标为石油类，此处对其进行了匹配工作，将其匹配到LCAflow库里面相最符合的流，污染物指标备注为石油类
- Waste water: 0.245
  the Technical of end-of-pipe management technology for pollution Waste wateris/，Its Technical efficiency of end-of-pipe management0
  污染物指标工业废水量的末端治理技术是/，其效率为0。原文件中描述污染物类别为废水，污染物指标为工业废水量，此处对其进行了匹配工作，将其匹配到LCAflow库里面相最符合的流，污染物指标备注为工业废水量
- chemical oxygen demand: 0.000523
  the Technical of end-of-pipe management technology for pollution chemical oxygen demandisBiochemical method，Its Technical efficiency of end-of-pipe management90
  污染物指标化学需氧量的末端治理技术是生化法，其效率为90，末端治理设施实际运行率（k值）计算公式为k=治理设施实际处理污染物总量（公斤/应该处理污染物总量（公斤））。原文件中描述污染物类别为废水，污染物指标为化学需氧量，此处对其进行了匹配工作，将其匹配到LCAflow库里面相最符合的流，污染物指标备注为化学需氧量
- chemical oxygen demand: 0.002092
  the Technical of end-of-pipe management technology for pollution chemical oxygen demandisPhysical treatment，Its Technical efficiency of end-of-pipe management60
  污染物指标化学需氧量的末端治理技术是物理法，其效率为60，末端治理设施实际运行率（k值）计算公式为k=治理设施实际处理污染物总量（公斤/应该处理污染物总量（公斤））。原文件中描述污染物类别为废水，污染物指标为化学需氧量，此处对其进行了匹配工作，将其匹配到LCAflow库里面相最符合的流，污染物指标备注为化学需氧量

## Use advice
This dataset is derived from the Pollution Source Census Report and contains information on pollution emissions and related products. However, it does not include data on energy or chemical consumption, nor does it provide information on waste or co-product generation. When utilizing this dataset, please supplement the missing data based on actual conditions before use
该数据集来源于污染源普查报告，包含污染物排放及相关产品信息，但不包含能源或化学品消耗数据，也不提供废弃物或共生产物产生信息。在使用该数据集时，请根据实际情况补充缺失数据后再使用。

## Review details
Inventory: The internal review was done by several iteration steps concerning raw data validation, raw data documentation, representativity, completeness and consistency of modelling with regard to ISO 14040 and 14044.
清单： 内部审查通过几个迭代步骤完成，涉及原始数据验证、原始数据记录、代表性、完整性、与 ISO 14040 和 14044 有关的建模的一致性。

## Data sources
- 第二次全国污染源普查产排污核算系数手册（试用版）,四级代码2671文件，在完整版文件中第4111页
