# Milk production ; Dairy raising

Dataset: ILCD process, Unit process, single operation
Geography: ZY-GS-CN
Reference year: 2012
Classification: Unit processes / Materials production / Food and renewable raw materials
Functional unit: 1kg milk as functional unit (FU)
Generated by: Rui Yang, 1632707028@qq.com
Owner: Tiangong LCI Data Working Group
Review: Dependent internal review by Tiangong LCI Data Working Group
Amounts: no units in this file; such an amount is in the reference unit of its flow, which a separate flow dataset defines
copyright: false
licenseType: Free of charge for all users and uses

## General comment
The feed of dairy cows is composed of roughage and concentrate feed. Concentrate feed is composed of corn, soybean meal and wheat bran as the main raw materials, and other components account for a small proportion, so other components are ignored. Dairy cows have different feed consumption in different feeding stages, and their production can be divided into four stages: calf stage, growing stage, lactation stage and dry milk stage.

## Geography
The average water consumption per cow was 70kg per day, according to the investigation of Shigangdun pasture of Qianjin Animal Husbandry in Zhangye City

## Time period
Main Ingredients of concentrate feed (Cao Zhenggang, 2012)

## Technology and included processes
LCA was used to evaluate the four livestock products, and to evaluate the resource consumption, product input and environmental emissions in the whole process from raw material production to final product production. The four livestock products were evaluated in the same evaluation model, and the impact degree of a certain type of environmental impact and its comprehensive impact on the environment were qualitatively and quantitatively assessed. Finally, the environmental impact indicators of producing 1kg beef, 1kg milk, 1kg pork and 1kg chicken eggs were obtained respectively. Through analyzing and comparing the environmental load of the production of four kinds of livestock products, suggestions were provided for the adjustment of the breeding structure of China's livestock industry and the production structure of livestock products. And through the field research of advancing animal husbandry in Zhangye City, learning from the development model of advancing animal husbandry cooperative, the development model of grassland agriculture in China was discussed.

## Technical purpose
The described dairy cow raising process is intended for the production of milk within agricultural operations. The data set represents the inputs required for milk production, specifically focusing on the feeding and water consumption of dairy cows. The feed is a blend of roughage and concentrate feed, where the concentrate is primarily made of corn, soybean meal, and wheat bran. This data set is relevant for agricultural sectors, dairy farmers, and dairy product manufacturers who focus on the different stages of dairy cow's life, namely, calf stage, growing stage, lactation stage, and dry milk period.

## Reference product
- milk: 1; measured

## Inputs
All rows: measured
- maize grain: 0.34
  corn
- wheat: 0.46
- soybean: 0.21
  soybeans
- alfalfa: 2.55
- silage corn: 15.7
  corn silage
- water: 4.2

## Outputs
All rows: measured
- carbon monoxide (fossil): 0.00022
- nitrogen, total (excluding N2): 0.00128
- carbon dioxide (biogenic): 0.56973
- nitrous oxide: 0.00013
- methane (biogenic): 0.01795
- sulfur oxides: 0.00077
- ammonia: 0.00062

## Data selection and combination
曹正纲根据荷斯坦奶牛的四个时期，统计奶牛生产中四个时期精饲料成分，根据作者对张掖市前进牧业石岗墩牧场调查得到平均每头奶牛每天耗水 70kg，再根据曹正纲对奶牛场作物消耗的实地调查与统计，推算出每生产 1kg 牛 奶的农作物消耗量与耗水量

## Use advice
When employing this data set for life cycle assessment or other environmental impact studies, consider the methodological advice that the functional unit is based on 1kg of milk production. Ensure accurate modeling of the various feeding stages and their associated resource consumption. Disregard minor feed components due to their small proportion. Data set users should also account for the specificity of the geographical location (Zhangye City) as regional variations might affect the representativeness of the data. Apply caution if extrapolating data to different contexts or locations without careful consideration of regional differences in dairy farming practices and resource availability.

## Review details
Inventory: The internal review was done by several iteration steps concerning raw data validation, raw data documentation, representativity, completeness and consistency of modelling with regard to ISO 14040 and 14044.

## Data sources
- 魏云. 基于生命周期评价的禽畜产品环境影响评价及对策探讨. (兰州大学, 2016).
