# Natural gas hydrogen production ; Natural gas ; SMR technology

Dataset: ILCD process
Geography: US
Reference year: 2022
Classification: Unit processes / Energy carriers and technologies / Natural gas based fuels
Functional unit: Production of 1kg hydrogen gas
Generated by: Xiaohua Liu, lxh01311@163.com
Owner: Tiangong LCI Data Working Group
Review: Dependent internal review by Tiangong LCI Data Working Group
Amounts: no units in this file; such an amount is in the reference unit of its flow, which a separate flow dataset defines
copyright: false
licenseType: Free of charge for all users and uses

## General comment
This dataset represents a natural gas hydrogen production process using Steam Methane Reforming (SMR) technology. This industrial process is typically applied for the production of hydrogen gas in large quantities, which is essential for various applications such as fuel cells, refining processes, ammonia production for fertilizers, methanol production, and as a reducing agent in metals refining.

## Reference product
- Grey Hydrogen: 1; measured
  Gray hydrogen

## Inputs
- natural gas,natural gas: 4.85; measured
  natural gas
- water: 6600; measured

## Outputs
- Electricity: 3.96; measured
  electricity
- carbon dioxide (fossil): 9; measured
  Direct CO2 emissions The original text did not distinguish between bio and fossil，according to expert judgment, this is Fossil
- nitrogen: 16; measured

## Use advice
Users of this data set should consider the specific characteristics of the SMR technology, including the associated carbon emissions from the use of natural gas. The dataset is applicable for LCA models of products or services where hydrogen is a primary input. Users must account for scaling if the actual hydrogen production differs from the 1kg baseline. It is also advisable to incorporate system boundaries accurately in LCA models to avoid truncation errors, and consider geographical and technological relevance of the data to the modeled system, especially concerning energy mix and efficiency of the SMR process used.

## Review details
Inventory: The internal review was done by several iteration steps concerning raw data validation, raw data documentation, representativity, completeness and consistency of modelling with regard to ISO 14040 and 14044.

## Data sources
- Climate change performance of hydrogen production based on life cycle assess
