# Iron ore mining | iron ore | Beneficiation/ore

Dataset: ILCD process, Unit process, single operation
Geography: CN
Reference year: 2006
Classification: Materials production / Other mineralic materials
Generated by: Wanghuanyu, wanghuanyu00@126.com
Review: Dependent internal review by Tiangong LCI Data Working Group
Amounts: no units in this file; such an amount is in the reference unit of its flow, which a separate flow dataset defines

## Reference product
All rows: measured
- iron: 1.02254
  z01
- iron: 0.01404
  z15
- iron: 0.26
  z08
- iron: 0.4314
  Z04
- iron: 0.68316
  Z02
- iron: 0.80556
  z05
- iron: 0.31438
  z20
- iron: 0.31438
  z12
- iron: 0.559
  z07
- iron: 0.9681
  z09
- iron: 0.3865
  z11
- iron: 0.02982
  z10

## Inputs
All rows: measured
- iron: 2098
  t/t z01
- Water (fresh water): 6915
  t/t z01
- Electricity: 94.752
  kwh/t z01
- iron: 2580
  t/t z15
- Water (fresh water): 19170
  t/t z15
- Electricity: 68.076
  kwh/t z15
- iron: 2811
  t/t z08
- Water (fresh water): 4170
  t/t z08
- Electricity: 87.804
  kwh/t z08
- iron: 3162
  Z04
- Water (fresh water): 3087
  Z04
- Electricity: 91.764
  Z04
- iron: 2687
  Z02
- Water (fresh water): 710
  Z02
- Electricity: 111.996
  Z02
- iron: 2590
  z05
- Water (fresh water): 4986
  z05
- Electricity: 102.996
  z05
- iron: 1344
  z20
- Water (fresh water): 5794
  z20
- Electricity: 111.24
  z20
- iron: 2738
  z12
- Water (fresh water): 2606
  z12
- Electricity: 88.2
  z12
- iron: 1803
  z07
- Water (fresh water): 2993
  z07
- Electricity: 83.376
  z07
- iron: 2100
  z09
- Water (fresh water): 5157
  z09
- Electricity: 68.256
  z09
- iron: 2076
  z11
- Water (fresh water): 2250
  z11
- Electricity: 83.304
  z11
- iron: 1798
  z10
- Water (fresh water): 2537
  z10
- Electricity: 75.24
  z10

## Outputs
All rows: measured
- Flue dust: 0.196
  kg/t z01
- Radioactive tailings: 1934
  t/t z01
- Tailings (deposited, hibernating in ground, non elementary flow): 1567
  t/t z01
- Flue dust: 0
  kg/t z15
- Tailings (deposited, hibernating in ground, non elementary flow): 3087
  t/t z15
- Radioactive tailings: 3087, 1541 (2 entries)
  t/t z08
- Flue dust: 1.588
  kg/t z08
- Tailings (deposited, hibernating in ground, non elementary flow): 1541
  t/t z08
- Flue dust: 0.08
  Z04
- Tailings (deposited, hibernating in ground, non elementary flow): 1757
  Z04
- Tailings (deposited, hibernating in ground, non elementary flow): 1716
  Z02
- Flue dust: 0.144
  Z02
- Flue dust: 0.196
  z05
- Tailings (deposited, hibernating in ground, non elementary flow): 2513
  z05
- Flue dust: 0
  z20
- Tailings (deposited, hibernating in ground, non elementary flow): 199
  z20
- Flue dust: 0
  z12
- Tailings (deposited, hibernating in ground, non elementary flow): 1599
  z12
- Flue dust: 0.445
  z07
- Tailings (deposited, hibernating in ground, non elementary flow): 833
  z07
- Flue dust: 0
  z09
- Tailings (deposited, hibernating in ground, non elementary flow): 20100
  z09
- Flue dust: 0.21
  z11
- Tailings (deposited, hibernating in ground, non elementary flow): 1136
  z11
- Flue dust: 0.038
  z10
- Tailings (deposited, hibernating in ground, non elementary flow): 0
  z10

## Review details
Inventory: The internal review was done by several iteration steps concerning raw data validation, raw data documentation, representativity, completeness and consistency of modelling with regard to ISO 14040 and 14044.; Documentation: The review of the documentation was performed by Ecobilan and is in compliance with ISO 14040 and 14044. The data set documentation is correct in view of the appropriateness of the information provided. It includes all relevant information in view of data quality and scope of application of the respective LCI result.

## Data sources
- 1.
