# Electricity production ; Thermal power ; Liaoning

Dataset: ILCD process, Unit process, single operation
Geography: LN-CN
Reference year: 2019
Classification: Unit processes / Energy carriers and technologies / Electricity
Generated by: Ruoxi Xiong, xiongrx0126@163.com
Owner: Tiangong LCI Data Working Group
Review: Dependent internal review by Tiangong LCI Data Working Group
Amounts: no units in this file; such an amount is in the reference unit of its flow, which a separate flow dataset defines
copyright: false
licenseType: Free of charge for all users and uses

## General comment
Thermal power generation includes seventeen fossil fuels such as raw coal, washed coal, oil and natural gas. The process only considers the direct power generation process, not the upstream raw material extraction and processing and the downstream power consumption

## Time period
Calculated based on data from the 2019 Energy Statistics Yearbook

## Technical purpose
Thermal power generation process using seventeen fossil fuels, including raw coal, washed coal, oil, and natural gas primarily for electricity production in Liaoning province. This dataset only considers the direct electricity generation and excludes upstream raw material extraction and processing as well as downstream power consumption.

## Reference product
- electricity for thermal power: 3.6; calculated

## Inputs
All rows: calculated
- Raw coal: 0.571005
- Coke oven gas: 0.000553
- blast furnace gas: 0.035856
- Converter gas: 0.004397
- Diesel: 5.957e-5
- fuel oil, unspecified: 0.0003248
- natural gas: 2.84e-5

## Outputs
- carbon dioxide (fossil): 1.01894; calculated
- sulfur dioxide: 0.000168315; calculated
- Nitrogen oxides: 0.000271568; calculated
- particles (> PM10): 3.53099e-5; calculated

## Data treatment and extrapolations
For the accounting method, please refer to the "Enterprise Greenhouse Gas Emissions Accounting Methods and Reporting Guidelines for Power Generation Facilities". Different forms of power generation and fuel consumption come from Chapter 3 (Energy Production) and Chapter 6 (Regional Energy Balance Sheet) in the "China Energy Statistical Yearbook 2020". The fuel parameters such as low calorific value and carbon content per unit calorific value used to calculate the carbon dioxide emission factor come from the "2019 China Regional Power Grid Carbon Dioxide Baseline Emission Factor Calculation Instructions OM" and the "Enterprise Greenhouse Gas Emission Accounting Method and Reporting Guide for Power Generation Facilities" 》

## Use advice
For LCA data use, reference the 'Enterprise Greenhouse Gas Emissions Accounting Methods and Reporting Guidelines for Power Generation Facilities.' Utilize data from 'China Energy Statistical Yearbook 2020' specifically Chapter 3 for Energy Production and Chapter 6 for Regional Energy Balance. Apply fuel parameters, such as low calorific value and carbon content per unit calorific value, as presented in the '2019 China Regional Power Grid Carbon Dioxide Baseline Emission Factor Calculation Instructions OM' and the power generation facilities reporting guide for accurate CO2 emission factor calculation.

## Review details
Inventory: The internal review was done by several iteration steps concerning raw data validation, raw data documentation, representativity, completeness and consistency of modelling with regard to ISO 14040 and 14044.

## Data sources
- 熊若熙. 中国电力生产和消费二氧化碳与污染物排放因子核算. (清华大学, 2023).
