# Rare earth oxides site preparation;Rare earth oxides;ion-adsorption process;ion-adsorption clays

Dataset: ILCD process, Unit process, single operation
Geography: CN
Reference year: 2014
Valid until: 2016
Classification: Materials production / Non-energetic raw materials
Functional unit: The functional unit is defined as the production of 1 kg of 90–92% purity mixed REOs by the in-situ leaching method from ion-adsorption clays in southern China.
LCI method principle: Attributional
LCI method approaches: Allocation - market value
Generated by: Tao Wang, twang@iue.ac.cn
Owner: Tiangong LCI Data Working Group
Review: Dependent internal review by Tiangong LCI Data Working Group
Amounts: no units in this file; such an amount is in the reference unit of its flow, which a separate flow dataset defines
copyright: false
licenseType: Free of charge for all users and uses

## General comment
The process described is utilized for the production of mixed rare earth oxides (REOs) from ion-adsorption clays found in Southern China. These oxides are subsequently used in various high-tech industries such as electronics, renewable energy technology, and aerospace. The REOs produced through this process are of 90-92% purity and serve as critical components in manufacturing permanent magnets, catalytic converters, and other specialized applications where rare earth elements are essential.

## Geography
Southern China

## Technology and included processes
The process ends at mixed rare earth oxides and downstream processes such as solvent extraction and metal production are not included in the system boundary. At certain sites further processing may occur (e.g., separating REEs into light and groups).

## Reference product
- soil: 1.65; input; min 1.1; max 1.2; uniform; software or database
  Soil removal and hole drilling

## Inputs
- polyvinylchloride resin (E-PVC): 0.096; min 0.092; max 0.1; uniform; software or database
  PVC pipes (Materials/Processes) The original text did not note which type of PVC
- Limestone: 0.005; min 0.005; max 0.004; uniform; article inperiodical
  imestone, crushed, for mill
- plastic pipes: 0.101; min 0.106; max 0.096; uniform; article inperiodical
  Extrusion, plastic pipes

## Deviations from the LCI method approaches
In this study, the material and energy flow data is gathered from Chinese literature and verified through personal communications with Chinese experts working in this industry. These datasets are derived based on attributional modeling (instead of consequential) and for most multi-products processes economic allocation is used. Since the data was collected from different sources

## Use advice
When utilizing this dataset, ensure that the system boundary excludes downstream processes such as solvent extraction and metal production. Use this data for attributional modeling purposes and apply economic allocation for multi-product processes. Be aware that the data sources are varied, including Chinese literature and expert communications. The defined functional unit for the assessment is the production of 1 kg of mixed REOs with a purity of 90-92% through the in-situ leaching method from ion-adsorption clays in Southern China. Incorporate further processing variations, such as separation into light and heavy rare earth elements, as per the specifics of the given site.

## Review details
Inventory: The internal review was done by several iteration steps concerning raw data validation, raw data documentation, representativity, completeness and consistency of modelling with regard to ISO 14040 and 14044.

## Data sources
- Vahidi, E., Navarro, J. & Zhao, F. An initial life cycle assessment of rare earth oxides production from ion-adsorption clays. Resources, Conservation and Recycling 113, 1–11 (2016).
