# Aluminum production ; Total of all wind farm

Dataset: ILCD process, Unit process, single operation
Geography: NMG-CN
Reference year: 2017
Classification: Materials production / Metals and semimetals
Functional unit: The functional unit is 1.5 MW wind turbine
LCI method principle: Attributional
LCI method approaches: Allocation
Generated by: Yunzhi Zhao, ll10088@163.com
Owner: Tiangong LCI Data Working Group
Review: Dependent internal review by Tiangong LCI Data Working Group
Amounts: no units in this file; such an amount is in the reference unit of its flow, which a separate flow dataset defines
copyright: false
licenseType: Free of charge for all users and uses

## General comment
The process data set provided pertains to the production of aluminum for use specifically within the wind energy sector. This aluminum is likely utilized to manufacture components for wind turbines, substations, and electrical cables within the wind power industry. Functional utility is demonstrated through the example of a specific wind farm in Northeast Inner Mongolia, which comprises 33 domestic 1.5 megawatts (MW) turbines for the generation of wind power.

## Geography
The data regarding the parameters of wind power has been collected from Wang (2012). A wind farm equipped with 33 domestic 1.5 megawatts (MW) wind turbines is regarded as a case study to analyze the environmental impact and its substitution effects. The wind farm is located in the northeast of Inner Mongolia, the province in which most of China’s wind power is installed (Xia and Song, 2017).

## Reference product
- aluminium: 1; article inperiodical

## Inputs
- Energy, geothermal, converted: 15.5056; article inperiodical

## Outputs
All rows: article inperiodical
- carbon dioxide: 8566
- sulfur dioxide: 34.2
- nitrous oxide: 14
- carbon monoxide: 3.08
- particles (PM2.5 - PM10): 0.88

## Deviations from the LCI method approaches
The life cycle inventory for wind power is illustrated as follows. The production and manufacturing stage include the production of wind turbines, substations, and cables, which consume a large amount of energy and emit pollutants (Xue et al., 2015).

## Use advice
When utilizing this data set for Life Cycle Assessment or environmental impact analysis, users should note that the functional unit is defined as a 1.5 MW wind turbine. The production data covers the creation of wind turbines, substations, and cables and includes energy consumption and pollutant emissions. It is critical to consider the production and manufacturing stage's environmental impact within the broader context of the wind power's life cycle inventory. Methodological attention should be given to accurately accounting for any substitution effects, as the wind power installation in question contributes to the replacement of non-renewable energy sources.

## Review details
Inventory: The internal review was done by several iteration steps concerning raw data validation, raw data documentation, representativity, completeness and consistency of modelling with regard to ISO 14040 and 14044.

## Data sources
- Li, H., Jiang, H.-D., Dong, K.-Y., Wei, Y.-M. & Liao, H. A comparative analysis of the life cycle environmental emissions from wind and coal power: Evidence from China. Journal of Cleaner Production 248, 119192 (2020).
