# Brick production ; Shale hollow brick production ; Billet making process

Dataset: ILCD process, Unit process, single operation
Geography: GZ-JX-CN
Reference year: 2020
Classification: Unit processes / Materials production / Other mineralic materials
Generated by: Wang xiangjin, r99rt4@163.com
Owner: Tiangong LCI Data Working Group
Review: Dependent internal review by Tiangong LCI Data Working Group
Amounts: no units in this file; such an amount is in the reference unit of its flow, which a separate flow dataset defines
copyright: false
licenseType: Free of charge for all users and uses

## General comment
Traditional shale hollow brick production process

## Technical purpose
This data set corresponds to the production of shale hollow bricks, specifically focusing on the billet making process used in brick production. Shale hollow bricks are commonly used in the construction industry for building walls, facades, and partition structures due to their lightweight, thermal insulation, and soundproofing properties. The process is tailored to high-volume manufacturing, as suggested by an annual production figure of 80 million bricks.

## Reference product
- Clay Body: 1520; measured
  Rough blank

## Inputs
- brickbat aggregate: 1550; measured
- Electricity: 11.196; measured

## Deviations from the LCI method approaches
The EIA report is based on the annual production of bricks (80 million bricks) as a whole, and for statistical purposes, the data has been converted according to the size specifications described therein, in terms of bricks produced per tonne of production

## Data selection and combination
Adopting the relevant data from the table of coefficients of production and discharge for sintered bricks and building blocks in 3131 of the Manual of Coefficients of Production and Discharge for Industrial Pollution Sources of the First National Pollution Sources Census (Seventh Subbook).

## Sampling procedure
The data for this EIA report is derived from real-time data from the plant

## Use advice
When utilizing this data set, users must take into account the specific context of the shale hollow brick manufacturing process, particularly the billet making stage. The data should be used in Life Cycle Assessment studies that require production and emission coefficients tailored to the sintered bricks and building blocks sector. Care should be exercised in applying the data to ensure that it fits the scope of the intended assessment (e.g., applicable geographical boundary, temporal frame, and technological relevance). The conversion ratio provided in the EIA report for bricks per tonne should be applied when comparing to other data sets or in calculations involving material throughput.

## Review details
Inventory: The internal review was done by several iteration steps concerning raw data validation, raw data documentation, representativity, completeness and consistency of modelling with regard to ISO 14040 and 14044.

## Data sources
- 年产 8000 万块页岩标砖项目环评报告公示
