# aromatics production ; aromatics ; oil-based naphtha to aromatics route

Dataset: ILCD process, Unit process, black box
Geography: CN
Reference year: 2022
Classification: Materials production / Organic chemicals
Functional unit: The functional unit is defined as 1 kg aromatics production
LCI method principle: Attributional
LCI method approaches: Allocation - market value
Generated by: Yanan Ren, renyn15@tsinghua.org.cn
Owner: Tiangong LCI Data Working Group
Review: Dependent internal review by Tiangong LCI Data Working Group
Amounts: no units in this file; such an amount is in the reference unit of its flow, which a separate flow dataset defines
copyright: false
licenseType: Free of charge for all users and uses

## General comment
The naphtha aromatization process composes of carbocation formation, olefins formation, olefins oligomerization, isomerization and cyclization, and dehydrogenation. After aromatization, the mixture enters the phase separator to separate the dry gas that is used as the fuel gas for the plants. The liquid phase enters the stabilizer to separate liquefied petroleum gas (LPG) and the remaining liquid phase continues to enter the rectification column to separate aromatics and heavy aromatics (C9+). Aromatics is the main product, and LPG and heavy aromatics are byproducts.

## Geography
The operating data of the CBMTA and OBNTA plants are from the environmental impact assessment reports collected and managed by China’s Advanced Coal to Chemicals Industry Database of the Professional Knowledge Service System for Energy (PKSSE).

## Time period
Not mentioned, replaced by the publication time of the document

## Technical purpose
The aromatics produced in this industrial process are primarily employed in the chemical industry as key feedstock for the synthesis of various organic compounds, such as plastics, synthetic fibers, detergents, pharmaceuticals, and dyes. These high-value chemicals serve as core components in numerous commercial and consumer products.

## Model description
Upstream feedstock, material, and energy transportation stages are excluded from the system since they have a limited impact on the whole system and can be neglected based on the cut-off criterion in the LCA framework. The system is also irrespective of downstream aromatics transportation and utilization stages because its function is defined as to produce the aromatics product.

## Reference product
- Aromatic hydrocarbon: 1; measured
  Aromatics

## Inputs
All rows: measured
- naphtha: 1.46
  Take care
- process water: 0.1
  Process water
- Water (fresh water): 0.32
  Supplement water
- ZSM-5 catalyst: 0.00037
- light fuel oil: 2e-5
  Thermal oil
- electricity mix: 0.072
  Electricity
- natural gas: 3.46
  Steam

## Outputs
All rows: measured
- Heavy aromatics: 0.11
- LPG - liquefied petroleum gas: 0.31
  LPG
- Refinery Gas: 1.96
  Dry gas (self-use)
- carbon dioxide: 0.07
  CO2
- Dust (unspecified, from stack): 2e-5
  PM
- volatile organic compound: 0.00024
  VOCs
- sulfur dioxide: 3e-5
  SO2
- nitrous oxide: 0.00012
  NOx

## Deviations from the LCI method approaches
Here,economy allocation is optimal since these products have quite differentchemical usages, while they have the same economic function that is to be soldas commodities.

## Data selection and combination
In the system, the aromatics production stage is set as the foreground stage and its numerous data are monitored and collected via the site survey, while upstream feedstock, material, and energy production stages are defined as background stages and their data are collected from the mature LCA database.

## Data treatment and extrapolations
Here, economy allocation is optimal since these products have quitedifferent chemical usages, while they have the same economic function that isto be sold as commodities

## Use advice
When utilizing this LCA data set, allocate environmental impacts to the main and byproducts based on economic value, as they differ chemically but share the same economic function of being sold as commodities. Exclude the transportation stages of upstream feedstock, materials, and energy from the system due to their minimal impact, and also disregard downstream transportation and use of aromatics. The functional unit for this data set is defined as the production of 1 kg of aromatics. This focused approach is recommended due to the extensive site-specific data monitoring and collection for the aromatics production stage.

## Review details
Inventory: The internal review was done by several iteration steps concerning raw data validation, raw data documentation, representativity, completeness and consistency of modelling with regard to ISO 14040 and 14044.

## Data sources
- Li, J. et al. Comparative resource-environment-economy assessment of coal- and oil-based aromatics production. Resources Policy 77, 102629 (2022).
