# Welding and polishing ; Fitness equipment ; Metal parts ; Welding and polishing ; All sizes; NESPS2 / 焊接打磨 ; 健身器材 ; 金属件② ; 焊接打磨 ; 所有规模 ; 全国第二次污染普查数据

Dataset: ILCD process, Unit process, single operation
Geography: CN
Reference year: 2019
Classification: Reference Parameters / Systems / Other machines
Generated by: The data was created by the Office of the Second National Pollution Source Census of the Ministry of Ecology and Environment, and the data was organized by the TianGong Plan team for ILCD format / 生态环境部第二次全国污染源普查工作办公室创建数据，天工计划团队常慧敏整理数据为ILCD格式
Owner: Tiangong LCI Data Working Group / 天工LCI数据工作小组
Review: Dependent internal review by Tiangong LCI Data Working Group / 天工LCI数据工作小组
Amounts: no units in this file; such an amount is in the reference unit of its flow, which a separate flow dataset defines
copyright: false
licenseType: Free of charge for all users and uses

## General comment
the Technical of end-of-pipe management technology for pollution Exhaust gasis/，The formula for calculating the actual operation rate (k-value) of the end-of-pipe treatment facility is /

## Technical purpose
所提供的数据代表了所有规模健身器材金属零件的焊接和打磨过程。这个过程包括用于污染物控制的管道末端管理技术，通常用于需要调节排放废气和颗粒物的制造设施。这包括了如布袋过滤器、管式过滤、多管旋风除尘以及静电沉降等技术，其技术效率从85%到99%不等，以减少PM2.5到PM10之间的排放。

## Reference product
- Metal Parts: 1000; input; calculated
  源文件中描述为为金属件②，此处对其进行了匹配工作，将其匹配到LCAflow库里面相最符合的流，污染物指标备注为工业废气量

## Outputs
All rows: calculated
- particles (PM2.5 - PM10): 0.0078
  the Technical of end-of-pipe management technology for pollution particles (PM2.5 - PM10)isBag filter，Its Technical efficiency of end-of-pipe management99，The formula for calculating the actual operation rate (k-value) of the end-of-pipe treatment facility is /
  污染物指标颗粒物③的末端治理技术是袋式除尘，其效率为99，末端治理设施实际运行率（k值）计算公式为k=废气治理设施运行时间（小时）/废气产污核算环节正常生产时间（小时），②采用染毒活体或培养基粉碎、植物粉碎、萃取等工艺生产的其他生物农药如下：棉铃虫核型多角体病毒、草原毛虫核多角体病毒、茶尺蠖核多角体病毒等。。原文件中描述污染物类别为废气，污染物指标为颗粒物③，此处对其进行了匹配工作，将其匹配到LCAflow库里面相最符合的流，污染物指标备注为颗粒物③
- particles (PM2.5 - PM10): 0.039
  the Technical of end-of-pipe management technology for pollution particles (PM2.5 - PM10)isElectrostatic precipitation，Its Technical efficiency of end-of-pipe management95，The formula for calculating the actual operation rate (k-value) of the end-of-pipe treatment facility is k = annual power consumption of wastewater treatment facilities (kWh) / (total rated power (kW) × annual operating time (hours))
  污染物指标颗粒物③的末端治理技术是静电除尘，其效率为95，末端治理设施实际运行率（k值）计算公式为k=废气治理设施运行时间（小时）/废气产污核算环节正常生产时间（小时），②采用染毒活体或培养基粉碎、植物粉碎、萃取等工艺生产的其他生物农药如下：棉铃虫核型多角体病毒、草原毛虫核多角体病毒、茶尺蠖核多角体病毒等。。原文件中描述污染物类别为废气，污染物指标为颗粒物③，此处对其进行了匹配工作，将其匹配到LCAflow库里面相最符合的流，污染物指标备注为颗粒物③
- particles (PM2.5 - PM10): 0.078
  the Technical of end-of-pipe management technology for pollution particles (PM2.5 - PM10)isTubular filtration，Its Technical efficiency of end-of-pipe management90，The formula for calculating the actual operation rate (k-value) of the end-of-pipe treatment facility is /
  污染物指标颗粒物③的末端治理技术是管式过滤，其效率为90，末端治理设施实际运行率（k值）计算公式为k=废气治理设施运行时间（小时）/废气产污核算环节正常生产时间（小时），②采用染毒活体或培养基粉碎、植物粉碎、萃取等工艺生产的其他生物农药如下：棉铃虫核型多角体病毒、草原毛虫核多角体病毒、茶尺蠖核多角体病毒等。。原文件中描述污染物类别为废气，污染物指标为颗粒物③，此处对其进行了匹配工作，将其匹配到LCAflow库里面相最符合的流，污染物指标备注为颗粒物③
- particles (PM2.5 - PM10): 0.117
  the Technical of end-of-pipe management technology for pollution particles (PM2.5 - PM10)isMulti-tube cyclone dust removal，Its Technical efficiency of end-of-pipe management85，The formula for calculating the actual operation rate (k-value) of the end-of-pipe treatment facility is /
  污染物指标颗粒物③的末端治理技术是多管旋风除尘，其效率为85，末端治理设施实际运行率（k值）计算公式为k=废气治理设施运行时间（小时）/废气产污核算环节正常生产时间（小时），②采用染毒活体或培养基粉碎、植物粉碎、萃取等工艺生产的其他生物农药如下：棉铃虫核型多角体病毒、草原毛虫核多角体病毒、茶尺蠖核多角体病毒等。。原文件中描述污染物类别为废气，污染物指标为颗粒物③，此处对其进行了匹配工作，将其匹配到LCAflow库里面相最符合的流，污染物指标备注为颗粒物③
- Exhaust gas: 107000
  the Technical of end-of-pipe management technology for pollution Exhaust gasis/，The formula for calculating the actual operation rate (k-value) of the end-of-pipe treatment facility is /
  污染物指标工业废气量的末端治理技术是/，末端治理设施实际运行率（k值）计算公式为/，②采用染毒活体或培养基粉碎、植物粉碎、萃取等工艺生产的其他生物农药如下：棉铃虫核型多角体病毒、草原毛虫核多角体病毒、茶尺蠖核多角体病毒等。。原文件中描述污染物类别为废气，污染物指标为工业废气量，此处对其进行了匹配工作，将其匹配到LCAflow库里面相最符合的流，污染物指标备注为工业废气量

## Use advice
This dataset is derived from the Pollution Source Census Report and contains information on pollution emissions and related products. However, it does not include data on energy or chemical consumption, nor does it provide information on waste or co-product generation. When utilizing this dataset, please supplement the missing data based on actual conditions before use
该数据集来源于污染源普查报告，包含污染物排放及相关产品信息，但不包含能源或化学品消耗数据，也不提供废弃物或共生产物产生信息。在使用该数据集时，请根据实际情况补充缺失数据后再使用。

## Review details
Inventory: The internal review was done by several iteration steps concerning raw data validation, raw data documentation, representativity, completeness and consistency of modelling with regard to ISO 14040 and 14044.
清单： 内部审查通过几个迭代步骤完成，涉及原始数据验证、原始数据记录、代表性、完整性、与 ISO 14040 和 14044 有关的建模的一致性。

## Data sources
- 第二次全国污染源普查产排污核算系数手册（试用版）,二级代码24,四级代码2443文件，在完整版文件中第2861页
