# clinker production;clinker, portland cement clinker;new dry process, ≥4000 t/d

Dataset: ILCD process, Unit process, single operation
Geography: CN
Reference year: 2019
Classification: Materials production / Other mineralic materials
Generated by: Siqi Yang, ysqsophia@gmail.com
Owner: Tiangong LCI Data Working Group
Review: Dependent internal review by Tiangong LCI Data Working Group
Amounts: no units in this file; such an amount is in the reference unit of its flow, which a separate flow dataset defines
copyright: false
licenseType: Free of charge for all users and uses

## General comment
New dry process for cement clinker production. End-of-pipe treatment: Baghouse dust collector with an efficiency of 85%.

## Technical purpose
The portland cement clinker produced through the new dry process with a production capacity of ≥4000 tonnes per day is used in the manufacturing of concrete and various construction materials. Portland cement clinker is a primary ingredient for concrete production integral in construction projects, infrastructure development, and commercial building constructions.

## Model description
The LCA system boundary is the clinker calcination unit process.

## Reference product
- clinker, portland cement clinker: 1000
  Ordinary portland cement clinker

## Inputs
- coal, powder: 137.4
  Coal powder
- tap water: 300
  Tap water
- raw meal: 1410
  Ordinary portlant cement raw material
- electricity, medium voltage: 103.86
  Electricity. Upstream data source: CLCD-China-ECER 0.8.1.

## Outputs
- mercury: 6e-5
  Mercury [emissions to the atmosphere]
- particles (> PM10): 0.389
  Total particulate matter [emissions to the atmosphere], with an unspecified particle size, is treated as PM > 10 micrometers in diameter.
- Nitrogen oxides: 1.584
  Nitrogen oxides [emissions to the atmosphere]
- chemical oxygen demand: 6e-5
  Chemical oxygen demand [emissions to water bodies]
- Water (groundwater from technosphere, waste water): 2
  Wastewater [emissions to water bodies]
- fluorene: 0.002551
  Fluoride [emissions to the atmosphere]
- Clean gas: 3964
  Waste gas [emissions to the atmosphere]
- sulfur dioxide: 0.385
  Sulfur dioxide [emissions to the atmosphere]
- carbon dioxide (fossil): 748.1
  Carbon dioxide (fossil source) [emissions to the atmosphere]
- ammonia: 0.03964
  Ammonia [emissions to the atmosphere]

## Deviations from the LCI method approaches
A cement clinker lifecycle model was developed using eFootprint software system from Integrated Knowledge for our Environment, combined with CLCD quality assessment method, and LCA results were calculated.

## Data selection and combination
Main data source: represents the actual production data of enterprises and supply chains. Comes from actual company data and environmental impact assessment reports.

## Use advice
For using this LCA data set of clinker production, the user should ensure to model the system boundaries including the clinker calcination unit process. Attention should be given to end-of-pipe treatment considered in the study, which incorporates a baghouse dust collector with an efficiency of 85%. For materials contribution calculations, adhere to the ISO 140 series cut-off principle: ignore upstream data for any raw material contributing less than 1% (0.1% for high-purity substances) of the input weight, and exclude upstream data for low-value waste materials like tailings. The cumulative weight of all ordinary materials disregarded should not exceed 5% of the total raw material input. Additionally, if system environmental emission data have a negligible contribution to overall LCA results, they may also be omitted from the analysis.

## Review details
Inventory: The internal review was done by several iteration steps concerning raw data validation, raw data documentation, representativity, completeness and consistency of modelling with regard to ISO 14040 and 14044.

## Data sources
- 李畅. (2020). 江西省某铜尾矿资源化过程生命周期评价研究 [硕士, 江西理工大学].
