# Primary aluminum production ; Primary aluminum ingots ; Bauxite ; 2006

Dataset: ILCD process, Unit process, single operation
Geography: CN
Reference year: 2014
Classification: Unit processes / Materials production / Metals and semimetals
Generated by: Yuzhen Feng, fyz22
Owner: Tiangong LCI Data Working Group
Review: Dependent internal review by Tiangong LCI Data Working Group
Amounts: no units in this file; such an amount is in the reference unit of its flow, which a separate flow dataset defines
copyright: false
licenseType: Free of charge for all users and uses

## General comment
Primary aluminum ingots produced from this process are intended for a wide range of applications. They serve as a basic raw material used in the manufacture of various aluminum products and components. These can include, but are not limited to, construction materials, automotive parts, aerospace components, packaging materials, electrical conductors, and consumer electronics.

## Time period
Date of publication

## Reference product
- aluminium, primary, ingot: 1000; missing unimportant

## Inputs
All rows: missing unimportant
- electricity, high voltage, aluminium industry: 54723.6
  电力
- hard coal: 482
  煤炭
- Petroleum Coke: 54.7
  焦炭
- drying, natural gas: 116
  天然气
- coal gas: 905
  煤气
- light fuel oil: 109
  燃料油

## Data selection and combination
The resource and energy consumption data of primary aluminum production are based on the statistical data in Fig. 1 System boundary of primary aluminum production. For some non-statistical process data, they were obtained from research on production processes and technical indicators of typical enterprises and published literature.

## Use advice
When using this LCA data set for primary aluminum production, it is important to account for the resource and energy consumption figures based on the statistical data presented in the 'Non-Ferrous Metals Industry Yearbook'. For non-statistical process data, reference should be made to surveys and published literature on typical enterprise production processes and technical indicators. Additionally, care should be taken to consider the system boundary of the primary aluminum production as shown in Figure 1. Any updates or changes in production technology or efficiency should be reflected in the assessment to maintain accuracy.

## Review details
Inventory: The internal review was done by several iteration steps concerning raw data validation, raw data documentation, representativity, completeness and consistency of modelling with regard to ISO 14040 and 14044.

## Data sources
- 郭杰, 高峰, 王志宏, 刘宇, & 龚先政. 原铝生产流程温室气体排放主要影响因素的关联度分析. 环境工程学报 8, 4858–4863 (2014).
