# End-of-life LFP batteryExisting hydrometallurgy process

Dataset: ILCD process, Unit process, single operation
Geography: CN
Reference year: 2018
Classification: Unit processes / End-of-life treatment / Material recycling
Functional unit: using 1 kWh as the functionalunit
Generated by: Pengfei, pengfei24@email.ncu.edu.cn
Owner: Tiangong LCI Data Working Group
Review: Dependent internal review by Tiangong LCI Data Working Group
Amounts: no units in this file; such an amount is in the reference unit of its flow, which a separate flow dataset defines
copyright: false
licenseType: Free of charge for all users and uses

## General comment
First, the EoL LFP batteries were disassembled and crushed. The processed battery material was then dissolved in an acid-base solution to extract some of the valuable metal elements. Finally, decontamination and purification were performed to obtain LiFePO4.

## Technology and included processes
The waste LFP that have been identified as containing iron and lithium need to be discharged first, dried naturally, and then heat treated to remove the diaphragm, electrolyte, binder, etc., and then separated copper and aluminum by multi-stage crushing. For steel shell batteries or soft pack batteries, stainless steel or aluminum-plastic films, diaphragms, etc. The remaining positive and negative electrode materials are extracted by leaching, precipitation, impurity removal, extraction and purification to obtain lithium carbonate, lithium phosphate, lithium chloride, etc. The iron and phosphorus slag and carbon slag produced in the process are recovered as by-products. Recycled lithium carbonate, lithium phosphate, lithium chloride and lithium hydroxide are used as raw materials for lithium battery production, and by-product iron phosphorus residue can be synthesized again into iron phosphate products, or recycled to obtain iron hydroxide and phosphoric acid raw materials.

## Technical purpose
The hydrometallurgical process described is utilized for the recovery and recycling of valuable metals from end-of-life (EoL) lithium iron phosphate (LFP) batteries. It involves disassembly, crushing of spent batteries, extraction of metals via leaching in an acid-base solution, followed by purification processes to obtain high-purity lithium iron phosphate (LiFePO4). This recycled LiFePO4 can be used as a cathode material for the manufacturing of new lithium-ion batteries.

## Reference product
- EoL LFP battery: 3.6; input; software or database

## Inputs
All rows: software or database
- Lithium carbonate: 0.23
  Lithium carbonate, production mix/CN
- Sulphuric acid: 9.54
  Sulphuric acid, production mix/EU-28
- sodium hydroxide: 5.79
  Sodium hydroxide, production mix/EU-28
- Hydrogen peroxide (30%): 3.25
  Hydrogen peroxide
- Electricity: 11.8
- natural gas,natural gas: 6.24

## Outputs
- carbon monoxide (fossil): 0.18; software or database
- aluminium: 0.14; software or database
- copper: 0.038; software or database
- Lithium Iron Phosphate (LiFePO4): 2.58; software or database

## Data selection and combination
The data come from multiple papers and are difficult to distinguish.

## Use advice
When using this LFP battery hydrometallurgy dataset, users should account for the variation in metal recovery rates due to different conditions and technologies cited in multiple papers. The dataset's functional unit is 1 kWh, which requires users to adjust their calculations based on the capacity of the batteries studied. Users must consider the technological applicability of the data, specifically related to the efficiency and purity of the recovered materials, to ensure its relevance for their specific recycling processes or life cycle assessments.

## Review details
Inventory: The internal review was done by several iteration steps concerning raw data validation, raw data documentation, representativity, completeness and consistency of modelling with regard to ISO 14040 and 14044.

## Data sources
- Wang, Y. et al. Environmental impact assessment of second life and recycling for LiFePO4 power batteries in China. Journal of Environmental Management 314, 115083 (2022).
