# cement production;cement, ordinary portland cement, 42.5MPa;wet rotary kiln

Dataset: ILCD process, Unit process, black box
Geography: CN
Reference year: 2005
Classification: Materials production / Other mineralic materials
Generated by: Siqi Yang, ysqsophia@gmail.com
Owner: Tiangong LCI Data Working Group
Review: Dependent internal review by Tiangong LCI Data Working Group
Amounts: no units in this file; such an amount is in the reference unit of its flow, which a separate flow dataset defines
copyright: false
licenseType: Free of charge for all users and uses

## General comment
Wet rotary kiln production process.The raw material limestone is crushed by crusher, and the raw materials were crushed and washed into a slurry. The limestone, clay (slurry), iron powder, and appropriate amount of water are fed into the mill for grinding at the grinding head of raw material mill. The ground raw material slurry is pumped into the slurry storage by slurry pump, and then fed into the wet rotary kiln for calcination after evenly blending and meeting the requirements. The clinker from the kiln is cooled by the clinker cooling equipment and then sent to the clinker storage, then mixed with mixed materials and gypsum in a certain ratio, ground by the cement mill and then into the cement warehouse, packaged by the packaging machine and shipped out of the factory or in bulk.

## Technology and included processes
The raw material limestone is crushed by the crusher 4, and the raw material clay is crushed and washed into a slurry. At the grinding head of the raw material grinding mill 7, the limestone, clay (slurry), iron powder and appropriate amount of water are fed into the grinding mill for powder grinding. The raw material slurry made by grinding is sent to the material slurry warehouse 8 by the mud pump. After being evenly prepared and meeting the requirements, it is fed to the wet rotary kiln 9 for calcining. The kiln clinker is cooled by the clinker cooling equipment and then sent to the clinker storage warehouse. It is then mixed with mixed materials and gypsum in a certain proportion, ground by a cement mill, and then put into the cement warehouse. It is packaged by a packaging machine and shipped out of the factory or in bulk. Factory.

## Technical purpose
This data set describes the production process of ordinary Portland cement with a strength grade of 42.5MPa, using the wet rotary kiln method. The cement produced is suitable for construction applications requiring high early strength gain, such as large-scale infrastructure projects, commercial buildings, and residential constructions.

## Model description
The functional unit is the service performance of 1 kilogram of cement with a 28-day compressive strength of 42.5MPa, that is, IFu=42.5kgMPa.The research scope is defined as: raw material pretreatment, raw material grinding, raw material calcination, clinker grinding, cement homogenization, and cement storage.

## Reference product
- cement, ordinary portland cement, 42.5MPa: 1000
  P.O. IFu=42.5kg MPa

## Inputs
- limestone, crushed, for mill: 1246.3
  Limestone
- clay: 142.1
  Clay
- gypsum stone (CaSO4-dihydrate): 44.4
  Gupsum
- hard coal: 194.487
  The original data is 0.1807kg standard coal, here converted to hard coal, the conversion formula is 1kg hard coal = 0.929kg standard coal.
- electricity, medium voltage: 400.32
  Electricity

## Outputs
- particles (> PM10): 0.3
  Dust, with an unspecified particle size, is treated as PM > 10 micrometers in diameter.
- sulfur dioxide: 0.9033
  Sulfur dioxide. Considering the actual operating conditions of domestic cement plants and the development trend for the foreseeable future, the statistical average of measured data is adopted for this evaluation.
- Nitrogen oxides: 2.262
  Nitrogen oxides. Considering the actual operating conditions of domestic cement plants and the development trend for the foreseeable future, the statistical average of measured data is adopted for this evaluation.
- carbon dioxide: 1127
  Carbon dioxide. Considering the actual operating conditions of domestic cement plants and the development trend for the foreseeable future, the statistical average of measured data is adopted for this evaluation.

## Use advice
When utilizing this data set for Life Cycle Assessment (LCA), the user must ensure that the scope of their study matches the defined boundaries of the dataset, which include raw material pretreatment, raw material grinding, raw material calcination, clinker grinding, cement homogenization, and cement storage. It is important to note that the data represents a specific compressive strength (42.5MPa at 28 days) and the wet process technology. Data users should not extrapolate this information to other types of cement or different production methods without proper adjustment.

## Review details
Inventory: The internal review was done by several iteration steps concerning raw data validation, raw data documentation, representativity, completeness and consistency of modelling with regard to ISO 14040 and 14044.

## Data sources
- 曹晓润. (2005). 低环境负荷型水泥的生态环境评价 [硕士, 武汉理工大学].
