# Sediment remediation ; ex-situ remediation ; ex-situ thermal analysis ; engineering implementation ; sediment drying

Dataset: ILCD process, Unit process, single operation
Geography: CN
Classification: Other Services / Repair and maintenance
Generated by: Wang Feng, wangfeng@caep.org.cn
Owner: Tiangong LCI Data Working Group
Review: Dependent internal review by Tiangong LCI Data Working Group
Amounts: no units in this file; such an amount is in the reference unit of its flow, which a separate flow dataset defines
copyright: false
licenseType: Free of charge for all users and uses

## General comment
Taking the treatment of 1 t sediment as a functional unit, the drying link adopts a hollow paddle dryer with a power of 55 kW, and the scale of the whole drying system is 50 t/d, 24 h working system.

## Technology and included processes
Hollow paddle dryer with 55 kW power is used in the drying process. The whole drying system scale is 50 t / d, 24 h working system.

## Technical purpose
The described industrial process is a sediment remediation technique involving off-site (ex-situ) thermal desorption for the treatment of 1 tonne of sludge. The remediation process utilizes a hollow-paddle dryer with a power consumption of 55 kW to dry the sludge as part of the pre-treatment step. The drying system has a capacity of 50 tonnes per day and operates continuously for 24 hours. Transport involves a 5-tonne truck covering a distance of 2 km. The thermal desorption step occurs in a tubular furnace with a rated power of 4 kW and a standby power of 1.4 kW. An inert atmosphere is ensured by purging with nitrogen gas for 2 to 3 minutes before the reaction. The final temperature for the thermal desorption is set at 350°C, and the gaseous products are first passed through a cooling device where the liquid fraction, primarily bio-oil with a high calorific value, is condensed and collected for potential energy recovery.

## Reference product
- sediment: 840; calculated

## Inputs
- Electricity: 332.604; calculated

## Use advice
When utilizing this dataset for Life Cycle Assessment, it is important to include transportation and pre-treatment steps within the system boundaries. Users should ensure that the nitrogen purging step is included in the assessment due to its energy usage and potential environmental impact. Consideration of the heating value of the bio-oil is crucial, as it represents a potential for energy recovery and therefore might offset other energy demands in the system. As the process operates on a continuous basis, users should account for the operational times when calculating the annual impact. Technological applicability should be verified based on the local regulatory requirements and the compatibility of the dried sludge for the thermal desorption process.

## Review details
Inventory: The internal review was done by several iteration steps concerning raw data validation, raw data documentation, representativity, completeness and consistency of modelling with regard to ISO 14040 and 14044.

## Data sources
- 王久兵.污泥热解反应机制及其能源化工艺的全生命周期评价研究[D].浙江工业大学,2016.
