# Barrier layer ; Concrete horizontal barrier ; Soil remediation ; In situ bioventing

Dataset: ILCD process, Unit process, black box
Geography: CN
Reference year: 2022
Classification: Unit processes / Other Services / Repair and maintenance
Generated by: Yang Xintong, yangxt@caep.org.cn
Owner: Tiangong LCI Data Working Group
Review: Dependent internal review by Tiangong LCI Data Working Group
Amounts: no units in this file; such an amount is in the reference unit of its flow, which a separate flow dataset defines
copyright: false
licenseType: Free of charge for all users and uses

## General comment
By laying concrete materials on the ground, a horizontal barrier layer is formed

## Time period
Article submission date

## Technical purpose
The concrete horizontal barrier described in this data set is used for soil remediation applications, specifically as part of an in situ bioventing process. By laying a layer of concrete materials on the ground, it acts as a physical blockade to contain contamination and create a controlled environment for the biodegradation of pollutants.

## Reference product
- Barrier layer: 1; measured
  文中没有给出具体的阻隔层的面积及厚度，所以这里采用项目为计量单位

## Inputs
All rows: measured
- Electricity: 8748
- Diesel,Diesel: 18.79
- Tap Water: 95
- Concrete: 22743
- cement, unspecified: 2374
- Diesel,Diesel: 11.555
  用于材料、设备和人员运输，但文中没有给出设备总重、运输距离、人员往返次数等信息，故无法采用tkm为运输单位

## Use advice
When utilizing this data set for life cycle assessment, consider the specific characteristics of the in situ bioventing process. Include the functional lifespan of the concrete barrier when modeling the system and assess the potential environmental impacts over its usage period. Account for the concrete composition and the associated environmental burden of producing and laying the barrier. Evaluate the maintenance or replacement frequency of the barrier within the remediation project context.

## Review details
Inventory: The internal review was done by several iteration steps concerning raw data validation, raw data documentation, representativity, completeness and consistency of modelling with regard to ISO 14040 and 14044.

## Data sources
- 刘文晓等.基于修复效果的污染土壤修复工程环境足迹分析[J].环境科学研究 35,2367-2377（2022）.
