# NCM direct recycling（DR-B）

Dataset: ILCD process, Unit process, single operation
Geography: CN
Reference year: 2021
Classification: End-of-life treatment / Material recycling
Functional unit: In this paper, the functional unit is defined as the nominal capacity of 1 kWh LIBs, which converts all the data collected into functional units for the calculation to ensure the quantitative evaluation and cross comparability of energy consumption and environmental impact of different batteries in various stages.
Generated by: maqingyuan, m1120498928@163.com
Owner: Tiangong LCI Data Working Group
Review: Dependent internal review by Tiangong LCI Data Working Group
Amounts: no units in this file; such an amount is in the reference unit of its flow, which a separate flow dataset defines
copyright: false
licenseType: Free of charge for all users and uses

## General comment
The battery is discharged before disassembly, and the electrolyte volatilized in the comminution process is centrally treated. Then, small particle-size mixtures such as electrode pieces are washed with DMC to remove residual electrolytes.After drying, the active material is separated from the current collector by immersion in n-methyl-2-pyrrolidone (NMP) with ultrasonic-assisted treatment. The obtained mixed suspension is precipitated and dried after centrifugation. According to the particle size difference, the electrode materials are separated from the current collector and diaphragm. The cathode and anode materials are further divided by foam flotation. The filtered cathode material is mixed with LiOH solution and subjected to relithiation at low temperature and low pressure. Afterward, the relithiated cathode material powder was mixed with excess Li2CO3 and thermally annealed in a nitrogen atmosphere to obtain a repaired battery level cathode active material.

## Geography
Laboratory process

## Technology and included processes
Here we chose chemically delithiated NCM111 as a model material for our study. To obtain D-NCM111, pristine NCM111 purchased from Toda America Inc. T-NCM111 was reacted with an aqueous solution of potassium persulfate. The material was then washed with water followed by acetonitrile before drying under vacuum at ambient temperature.

## Technical purpose
The DR-B process detailed serves for direct recycling of spent Lithium-Ion Batteries (LIBs), specifically for the recovery of battery-grade cathode active materials. It is applicable to laboratory-scale research aiming to optimize recovery methods for valuable materials from used LIBs. This process helps in reducing waste and recovering critical materials like Nickel, Cobalt, and Manganese (NCM) while conserving the functional integrity of cathode materials.

## Reference product
- EoL NCM battery: 6.67; input

## Inputs
- sodium chloride: 0.049
- Lithium Hydroxide: 0.293
- Lithium carbonate: 0.025
- electricity mix: 9.612
- process steam: 13.3
- Mechanical treatment facility: 7
- Chemical Industry: 0.7
- Freight rail: 8.66
- Freight Truck: 0.866

## Outputs
- Dust (unspecified, from stack),Dust (unspecified, from stack): 0.0058
- non-methane volatile organic compounds: 0.000895
- Waste (solid): 0.196
- Cathode Material: 1.12
- Copper Scrap: 0.76
- Aluminum scrap: 0.554

## Data selection and combination
Some data from Xu, P. et al. Design and Optimization of the Direct Recycling of Spent Li-Ion Battery Cathode Materials. ACS Sustainable Chem. Eng. 9, 4543–4553 (2021).

## Use advice
The data presented must be normalized to the functional unit of 1 kWh LIBs nominal capacity to ensure comparability across different batteries. Users should carefully consider the methodologies involved in the recycling process, especially the chemical delithiation using potassium persulfate and the subsequent treatments with DMC, NMP, and LiOH, which could have significant methodological implications. Appropriate safety and handling procedures for the chemicals used must be followed, and the operational parameters of the recycling process (such as temperature, pressure, and treatment duration) meticulously recorded to replicate the results.

## Review details
Inventory: The internal review was done by several iteration steps concerning raw data validation, raw data documentation, representativity, completeness and consistency of modelling with regard to ISO 14040 and 14044.

## Data sources
- Chen, Q. et al. Investigating the environmental impacts of different direct material recycling and battery remanufacturing technologies on two types of retired lithium-ion batteries from electric vehicles in China. Separation and Purification Technology 308, 122966 (2023).
