# Cadmium metal ; Cadmium-containing smelting intermediate products ; Wet process + pyrometallurgical refining ; All sizes; NESPS2 / 金属镉 ; 含镉冶炼中间产物 ; 湿法+火法精炼 ; 所有规模 ; 全国第二次污染普查数据

Dataset: ILCD process, Unit process, single operation
Geography: CN
Reference year: 2019
Classification: Reference Parameters / Materials production / Metals and semimetals
Generated by: The data was created by the Office of the Second National Pollution Source Census of the Ministry of Ecology and Environment, and the data was organized by the TianGong Plan team for ILCD format / 生态环境部第二次全国污染源普查工作办公室创建数据，天工计划团队常慧敏整理数据为ILCD格式
Owner: Tiangong LCI Data Working Group / 天工LCI数据工作小组
Review: Dependent internal review by Tiangong LCI Data Working Group / 天工LCI数据工作小组
Amounts: no units in this file; such an amount is in the reference unit of its flow, which a separate flow dataset defines
copyright: false
licenseType: Free of charge for all users and uses

## General comment
the Technical of end-of-pipe management technology for pollution Exhaust gasis/

## Technical purpose
利用湿法和火法精炼方法处理的纳米级金属镉及含镉冶炼中间产品在各种规模的工业应用中都有着广泛的用途。这些镉中间产品在电子制造等行业中至关重要，需要精确的镉化合物来制备组件。此外，镉还用于电池、颜料、涂料的生产以及作为塑料的稳定剂。

## Reference product
- Cadmium: 1000; calculated
  源文件中描述为为金属镉，此处对其进行了匹配工作，将其匹配到LCAflow库里面相最符合的流，污染物指标备注为工业废水量
- Cadmium smelting by-product: 1000; input; calculated
  源文件中描述为为含镉冶炼中间产物，此处对其进行了匹配工作，将其匹配到LCAflow库里面相最符合的流，污染物指标备注为工业废水量

## Outputs
All rows: calculated
- particles (PM2.5 - PM10): 0.2044
  the Technical of end-of-pipe management technology for pollution particles (PM2.5 - PM10)isBag filter + spray tower，Its Technical efficiency of end-of-pipe management99.2
  污染物指标颗粒物的末端治理技术是袋式除尘+喷淋塔，其效率为99.2，末端治理设施实际运行率（k值）计算公式为k=废气治理设施年正常运行时间（小时）/企业年正常生产时间（小时）。原文件中描述污染物类别为废气，污染物指标为颗粒物，此处对其进行了匹配工作，将其匹配到LCAflow库里面相最符合的流，污染物指标备注为颗粒物
- particles (PM2.5 - PM10): 0.2555
  the Technical of end-of-pipe management technology for pollution particles (PM2.5 - PM10)isBag filter，Its Technical efficiency of end-of-pipe management99
  污染物指标颗粒物的末端治理技术是袋式除尘，其效率为99，末端治理设施实际运行率（k值）计算公式为k=废气治理设施年正常运行时间（小时）/企业年正常生产时间（小时）。原文件中描述污染物类别为废气，污染物指标为颗粒物，此处对其进行了匹配工作，将其匹配到LCAflow库里面相最符合的流，污染物指标备注为颗粒物
- sulfur dioxide: 0.862
  the Technical of end-of-pipe management technology for pollution sulfur dioxideisOthers (lye spray)，Its Technical efficiency of end-of-pipe management90
  污染物指标二氧化硫的末端治理技术是其他（碱液喷淋），其效率为90，末端治理设施实际运行率（k值）计算公式为k=废气治理设施年正常运行时间（小时）/企业年正常生产时间（小时）。原文件中描述污染物类别为废气，污染物指标为二氧化硫，此处对其进行了匹配工作，将其匹配到LCAflow库里面相最符合的流，污染物指标备注为二氧化硫
- Nitrogen oxides: 1.73
  the Technical of end-of-pipe management technology for pollution Nitrogen oxidesis/
  污染物指标氮氧化物的末端治理技术是/，末端治理设施实际运行率（k值）计算公式为k=废气治理设施年正常运行时间（小时）/企业年正常生产时间（小时）。原文件中描述污染物类别为废气，污染物指标为氮氧化物，此处对其进行了匹配工作，将其匹配到LCAflow库里面相最符合的流，污染物指标备注为氮氧化物
- cadmium: 0.00236016
  the Technical of end-of-pipe management technology for pollution cadmiumisBag filter + spray tower，Its Technical efficiency of end-of-pipe management99.2
  污染物指标镉的末端治理技术是袋式除尘+喷淋塔，其效率为99.2，末端治理设施实际运行率（k值）计算公式为k=废气治理设施年正常运行时间（小时）/企业年正常生产时间（小时）。原文件中描述污染物类别为废气，污染物指标为镉，此处对其进行了匹配工作，将其匹配到LCAflow库里面相最符合的流，污染物指标备注为镉
- particles (PM2.5 - PM10): 2.555
  the Technical of end-of-pipe management technology for pollution particles (PM2.5 - PM10)isSpray tower，Its Technical efficiency of end-of-pipe management90
  污染物指标颗粒物的末端治理技术是喷淋塔，其效率为90，末端治理设施实际运行率（k值）计算公式为k=废气治理设施年正常运行时间（小时）/企业年正常生产时间（小时）。原文件中描述污染物类别为废气，污染物指标为颗粒物，此处对其进行了匹配工作，将其匹配到LCAflow库里面相最符合的流，污染物指标备注为颗粒物
- cadmium: 0.0029502
  the Technical of end-of-pipe management technology for pollution cadmiumisBag filter，Its Technical efficiency of end-of-pipe management99
  污染物指标镉的末端治理技术是袋式除尘，其效率为99，末端治理设施实际运行率（k值）计算公式为k=废气治理设施年正常运行时间（小时）/企业年正常生产时间（小时）。原文件中描述污染物类别为废气，污染物指标为镉，此处对其进行了匹配工作，将其匹配到LCAflow库里面相最符合的流，污染物指标备注为镉
- lead: 0.02407
  the Technical of end-of-pipe management technology for pollution leadis/
  污染物指标铅的末端治理技术是/，末端治理设施实际运行率（k值）计算公式为k=废水治理设施年正常运行时间（小时）/企业年正常生产时间（小时）。原文件中描述污染物类别为废水，污染物指标为铅，此处对其进行了匹配工作，将其匹配到LCAflow库里面相最符合的流，污染物指标备注为铅
- cadmium: 0.029502
  the Technical of end-of-pipe management technology for pollution cadmiumisSpray tower，Its Technical efficiency of end-of-pipe management90
  污染物指标镉的末端治理技术是喷淋塔，其效率为90，末端治理设施实际运行率（k值）计算公式为k=废气治理设施年正常运行时间（小时）/企业年正常生产时间（小时）。原文件中描述污染物类别为废气，污染物指标为镉，此处对其进行了匹配工作，将其匹配到LCAflow库里面相最符合的流，污染物指标备注为镉
- Waste water: 34390
  the Technical of end-of-pipe management technology for pollution Waste waterisOthers (the returned zinc electrolysis)
  污染物指标工业废水量的末端治理技术是其他（返锌电解），末端治理设施实际运行率（k值）计算公式为k=废水治理设施年正常运行时间（小时）/企业年正常生产时间（小时）。原文件中描述污染物类别为废水，污染物指标为工业废水量，此处对其进行了匹配工作，将其匹配到LCAflow库里面相最符合的流，污染物指标备注为工业废水量
- Ammonia Nitrogen: 0.24806
  the Technical of end-of-pipe management technology for pollution Ammonia Nitrogenis/
  污染物指标氨氮的末端治理技术是/，末端治理设施实际运行率（k值）计算公式为k=废水治理设施年正常运行时间（小时）/企业年正常生产时间（小时）。原文件中描述污染物类别为废水，污染物指标为氨氮，此处对其进行了匹配工作，将其匹配到LCAflow库里面相最符合的流，污染物指标备注为氨氮
- Nitrogen, organic bound: 0.30549
  the Technical of end-of-pipe management technology for pollution Nitrogen, organic boundis/
  污染物指标总氮的末端治理技术是/，末端治理设施实际运行率（k值）计算公式为k=废水治理设施年正常运行时间（小时）/企业年正常生产时间（小时）。原文件中描述污染物类别为废水，污染物指标为总氮，此处对其进行了匹配工作，将其匹配到LCAflow库里面相最符合的流，污染物指标备注为总氮
- arsenic: 1.0201
  the Technical of end-of-pipe management technology for pollution arsenicis/
  污染物指标砷的末端治理技术是/，末端治理设施实际运行率（k值）计算公式为k=废水治理设施年正常运行时间（小时）/企业年正常生产时间（小时）。原文件中描述污染物类别为废水，污染物指标为砷，此处对其进行了匹配工作，将其匹配到LCAflow库里面相最符合的流，污染物指标备注为砷
- chemical oxygen demand: 2.56499
  the Technical of end-of-pipe management technology for pollution chemical oxygen demandis/
  污染物指标化学需氧量的末端治理技术是/，末端治理设施实际运行率（k值）计算公式为k=废水治理设施年正常运行时间（小时）/企业年正常生产时间（小时）。原文件中描述污染物类别为废水，污染物指标为化学需氧量，此处对其进行了匹配工作，将其匹配到LCAflow库里面相最符合的流，污染物指标备注为化学需氧量
- cadmium: 7.93247
  the Technical of end-of-pipe management technology for pollution cadmiumis/
  污染物指标镉的末端治理技术是/，末端治理设施实际运行率（k值）计算公式为k=废水治理设施年正常运行时间（小时）/企业年正常生产时间（小时）。原文件中描述污染物类别为废水，污染物指标为镉，此处对其进行了匹配工作，将其匹配到LCAflow库里面相最符合的流，污染物指标备注为镉
- Exhaust gas: 60472
  the Technical of end-of-pipe management technology for pollution Exhaust gasis/
  污染物指标工业废气量的末端治理技术是/，末端治理设施实际运行率（k值）计算公式为k=废气治理设施年正常运行时间（小时）/企业年正常生产时间（小时）。原文件中描述污染物类别为废气，污染物指标为工业废气量，此处对其进行了匹配工作，将其匹配到LCAflow库里面相最符合的流，污染物指标备注为工业废气量

## Use advice
This dataset is derived from the Pollution Source Census Report and contains information on pollution emissions and related products. However, it does not include data on energy or chemical consumption, nor does it provide information on waste or co-product generation. When utilizing this dataset, please supplement the missing data based on actual conditions before use
该数据集来源于污染源普查报告，包含污染物排放及相关产品信息，但不包含能源或化学品消耗数据，也不提供废弃物或共生产物产生信息。在使用该数据集时，请根据实际情况补充缺失数据后再使用。

## Review details
Inventory: The internal review was done by several iteration steps concerning raw data validation, raw data documentation, representativity, completeness and consistency of modelling with regard to ISO 14040 and 14044.
清单： 内部审查通过几个迭代步骤完成，涉及原始数据验证、原始数据记录、代表性、完整性、与 ISO 14040 和 14044 有关的建模的一致性。

## Data sources
- 第二次全国污染源普查产排污核算系数手册（试用版）,四级代码3219文件，在完整版文件中第5063页
