# Hot rolled seamless pipe ; Continuous casting pipe billet ; Hot rolling method ; All sizes; NESPS2 / 热轧无缝管 ; 连铸管坯 ; 热轧法 ; 所有规模 ; 全国第二次污染普查数据

Dataset: ILCD process, Unit process, single operation
Geography: CN
Reference year: 2019
Classification: Reference Parameters / Materials production / Metals and semimetals
Generated by: The data was created by the Office of the Second National Pollution Source Census of the Ministry of Ecology and Environment, and the data was organized by the TianGong Plan team for ILCD format / 生态环境部第二次全国污染源普查工作办公室创建数据，天工计划团队常慧敏整理数据为ILCD格式
Owner: Tiangong LCI Data Working Group / 天工LCI数据工作小组
Review: Dependent internal review by Tiangong LCI Data Working Group / 天工LCI数据工作小组
Amounts: no units in this file; such an amount is in the reference unit of its flow, which a separate flow dataset defines
copyright: false
licenseType: Free of charge for all users and uses

## General comment
the Technical of end-of-pipe management technology for pollution Exhaust gasis/，Its Technical efficiency of end-of-pipe management0

## Technical purpose
所述工业过程包括使用连铸管坯热轧法生产热轧无缝管。这些管材可用于建筑、能源、石化工业和机械制造等领域的各种应用。所包含的管末污染管理技术表明了旨在通过处理废水、石油相关废物、有机氮、总磷、氨氮、汞、砷和颗粒物排放等减少环境影响的精炼和生产后过程。

## Reference product
- Hot-rolled Seamless Pipe: 1000, 1000 (2 entries); calculated
  源文件中描述为为热轧无缝管，此处对其进行了匹配工作，将其匹配到LCAflow库里面相最符合的流，污染物指标备注为工业废水量

## Outputs
All rows: calculated
- Mercury: 3e-9
  the Technical of end-of-pipe management technology for pollution MercuryisFloating separation + precipitation separation + filter separation，Its Technical efficiency of end-of-pipe management85
  污染物指标汞的末端治理技术是上浮分离+沉淀分离+过滤分离，其效率为85，末端治理设施实际运行率（k值）计算公式为k=废水治理设备年正常运行小时数（小时）/生产系统年运行小时数（小时）。原文件中描述污染物类别为废水，污染物指标为汞，此处对其进行了匹配工作，将其匹配到LCAflow库里面相最符合的流，污染物指标备注为汞
- arsenic: 7.5e-9
  the Technical of end-of-pipe management technology for pollution arsenicisFloating separation + precipitation separation + filter separation，Its Technical efficiency of end-of-pipe management85
  污染物指标砷的末端治理技术是上浮分离+沉淀分离+过滤分离，其效率为85，末端治理设施实际运行率（k值）计算公式为k=废水治理设备年正常运行小时数（小时）/生产系统年运行小时数（小时）。原文件中描述污染物类别为废水，污染物指标为砷，此处对其进行了匹配工作，将其匹配到LCAflow库里面相最符合的流，污染物指标备注为砷
- phosphorus, total: 1.7e-6
  the Technical of end-of-pipe management technology for pollution phosphorus, totalisFloating separation + precipitation separation + filter separation，Its Technical efficiency of end-of-pipe management90
  污染物指标总磷的末端治理技术是上浮分离+沉淀分离+过滤分离，其效率为90，末端治理设施实际运行率（k值）计算公式为k=废水治理设备年正常运行小时数（小时）/生产系统年运行小时数（小时）。原文件中描述污染物类别为废水，污染物指标为总磷，此处对其进行了匹配工作，将其匹配到LCAflow库里面相最符合的流，污染物指标备注为总磷
- particles (PM2.5 - PM10): 0.019
  the Technical of end-of-pipe management technology for pollution particles (PM2.5 - PM10)is/，Its Technical efficiency of end-of-pipe management0
  污染物指标颗粒物（加热炉）的末端治理技术是/，其效率为0。原文件中描述污染物类别为废气，污染物指标为颗粒物（加热炉），此处对其进行了匹配工作，将其匹配到LCAflow库里面相最符合的流，污染物指标备注为颗粒物（加热炉）
- particles (PM2.5 - PM10): 0.048
  the Technical of end-of-pipe management technology for pollution particles (PM2.5 - PM10)isBag filter，Its Technical efficiency of end-of-pipe management99
  污染物指标颗粒物（穿管及精整）的末端治理技术是袋式除尘，其效率为99，末端治理设施实际运行率（k值）计算公式为k=除尘设备年正常运行小时数（小时）/生产系统年运行小时数（小时）。原文件中描述污染物类别为废气，污染物指标为颗粒物（穿管及精整），此处对其进行了匹配工作，将其匹配到LCAflow库里面相最符合的流，污染物指标备注为颗粒物（穿管及精整）
- particles (PM2.5 - PM10): 0.048
  the Technical of end-of-pipe management technology for pollution particles (PM2.5 - PM10)isPlastic sintering board dust removal，Its Technical efficiency of end-of-pipe management99
  污染物指标颗粒物（穿管及精整）的末端治理技术是塑烧板除尘，其效率为99，末端治理设施实际运行率（k值）计算公式为k=除尘设备年正常运行小时数（小时）/生产系统年运行小时数（小时）。原文件中描述污染物类别为废气，污染物指标为颗粒物（穿管及精整），此处对其进行了匹配工作，将其匹配到LCAflow库里面相最符合的流，污染物指标备注为颗粒物（穿管及精整）
- sulfur dioxide: 0.077
  the Technical of end-of-pipe management technology for pollution sulfur dioxideis/，Its Technical efficiency of end-of-pipe management0
  污染物指标二氧化硫的末端治理技术是/，其效率为0。原文件中描述污染物类别为废气，污染物指标为二氧化硫，此处对其进行了匹配工作，将其匹配到LCAflow库里面相最符合的流，污染物指标备注为二氧化硫
- Nitrogen oxides: 0.165
  the Technical of end-of-pipe management technology for pollution Nitrogen oxidesis/，Its Technical efficiency of end-of-pipe management0
  污染物指标氮氧化物的末端治理技术是/，其效率为0。原文件中描述污染物类别为废气，污染物指标为氮氧化物，此处对其进行了匹配工作，将其匹配到LCAflow库里面相最符合的流，污染物指标备注为氮氧化物
- Ammonia Nitrogen: 0.000176
  the Technical of end-of-pipe management technology for pollution Ammonia NitrogenisFloating separation + precipitation separation + filter separation，Its Technical efficiency of end-of-pipe management0
  污染物指标氨氮的末端治理技术是上浮分离+沉淀分离+过滤分离，其效率为0，末端治理设施实际运行率（k值）计算公式为k=废水治理设备年正常运行小时数（小时）/生产系统年运行小时数（小时）。原文件中描述污染物类别为废水，污染物指标为氨氮，此处对其进行了匹配工作，将其匹配到LCAflow库里面相最符合的流，污染物指标备注为氨氮
- Petroleum-related waste: 0.000356
  the Technical of end-of-pipe management technology for pollution Petroleum-related wasteisFloating separation + precipitation separation + filter separation，Its Technical efficiency of end-of-pipe management90
  污染物指标石油类的末端治理技术是上浮分离+沉淀分离+过滤分离，其效率为90，末端治理设施实际运行率（k值）计算公式为k=废水治理设备年正常运行小时数（小时）/生产系统年运行小时数（小时）。原文件中描述污染物类别为废水，污染物指标为石油类，此处对其进行了匹配工作，将其匹配到LCAflow库里面相最符合的流，污染物指标备注为石油类
- Waste water: 400
  the Technical of end-of-pipe management technology for pollution Waste wateris/，Its Technical efficiency of end-of-pipe management0
  污染物指标工业废水量的末端治理技术是/，其效率为0。原文件中描述污染物类别为废水，污染物指标为工业废水量，此处对其进行了匹配工作，将其匹配到LCAflow库里面相最符合的流，污染物指标备注为工业废水量
- Nitrogen, organic bound: 0.000452
  the Technical of end-of-pipe management technology for pollution Nitrogen, organic boundisFloating separation + precipitation separation + filter separation，Its Technical efficiency of end-of-pipe management0
  污染物指标总氮的末端治理技术是上浮分离+沉淀分离+过滤分离，其效率为0，末端治理设施实际运行率（k值）计算公式为k=废水治理设备年正常运行小时数（小时）/生产系统年运行小时数（小时）。原文件中描述污染物类别为废水，污染物指标为总氮，此处对其进行了匹配工作，将其匹配到LCAflow库里面相最符合的流，污染物指标备注为总氮
- chemical oxygen demand: 0.01005
  the Technical of end-of-pipe management technology for pollution chemical oxygen demandisFloating separation + precipitation separation + filter separation，Its Technical efficiency of end-of-pipe management70
  污染物指标化学需氧量的末端治理技术是上浮分离+沉淀分离+过滤分离，其效率为70，末端治理设施实际运行率（k值）计算公式为k=废水治理设备年正常运行小时数（小时）/生产系统年运行小时数（小时）。原文件中描述污染物类别为废水，污染物指标为化学需氧量，此处对其进行了匹配工作，将其匹配到LCAflow库里面相最符合的流，污染物指标备注为化学需氧量
- Exhaust gas: 1030
  the Technical of end-of-pipe management technology for pollution Exhaust gasis/，Its Technical efficiency of end-of-pipe management0
  污染物指标工业废气量（加热炉）的末端治理技术是/，其效率为0。原文件中描述污染物类别为废气，污染物指标为工业废气量（加热炉），此处对其进行了匹配工作，将其匹配到LCAflow库里面相最符合的流，污染物指标备注为工业废气量（加热炉）
- Exhaust gas: 2400
  the Technical of end-of-pipe management technology for pollution Exhaust gasis/，Its Technical efficiency of end-of-pipe management0
  污染物指标工业废气量（穿管及精整）的末端治理技术是/，其效率为0。原文件中描述污染物类别为废气，污染物指标为工业废气量（穿管及精整），此处对其进行了匹配工作，将其匹配到LCAflow库里面相最符合的流，污染物指标备注为工业废气量（穿管及精整）

## Use advice
This dataset is derived from the Pollution Source Census Report and contains information on pollution emissions and related products. However, it does not include data on energy or chemical consumption, nor does it provide information on waste or co-product generation. When utilizing this dataset, please supplement the missing data based on actual conditions before use
该数据集来源于污染源普查报告，包含污染物排放及相关产品信息，但不包含能源或化学品消耗数据，也不提供废弃物或共生产物产生信息。在使用该数据集时，请根据实际情况补充缺失数据后再使用。

## Review details
Inventory: The internal review was done by several iteration steps concerning raw data validation, raw data documentation, representativity, completeness and consistency of modelling with regard to ISO 14040 and 14044.
清单： 内部审查通过几个迭代步骤完成，涉及原始数据验证、原始数据记录、代表性、完整性、与 ISO 14040 和 14044 有关的建模的一致性。

## Data sources
- 第二次全国污染源普查产排污核算系数手册（试用版）,四级代码3130文件，在完整版文件中第4111页
