# Sediment restoration ; in-situ capping ; activated carbon ;Production of capping materials

Dataset: ILCD process, Unit process, black box
Geography: NO
Reference year: 2011
Classification: Other Services / Repair and maintenance
Generated by: Sang Chunhui, sangch@mail.bnu.edu.cn
Owner: Tiangong LCI Data Working Group
Review: Dependent internal review by Tiangong LCI Data Working Group
Amounts: no units in this file; such an amount is in the reference unit of its flow, which a separate flow dataset defines
copyright: false
licenseType: Free of charge for all users and uses

## General comment
The production process of activated carbon materials used for Sediment capping.

## Geography
After investigation, no relevant domestic research literature has been found yet.

## Time period
There is no clear start time for data collection in the literature, and the start time of the validity period is based on the publication time of the literature

## Technology and included processes
The acticed carbon is anthracite coal based production (1kg) cosuming semi-anth coal 1.89 kg, electricity 0.3774kwh and the transport is 0.905 tkm.

## Technical purpose
The activated carbon produced by this process is intended for in-situ capping in sediment restoration projects. It is designed to efficiently cap contaminated sediments and is commonly used in environmental engineering applications to prevent the spread of pollutants. This product is suitable for large scale implementation in the field due to its capability to be spread over contaminated sediment sites.

## Reference product
- Activated Carbon: 4.76e7; calculated

## Inputs
- Coal: 89964, 8.89e7 (2 entries); calculated
- Electricity: 64671.3; calculated
- Road Transport: 43078; calculated

## Data selection and combination
The life cycle inventories, i.e. the aggregated environmental data collected for the modeled system, are derived from three sources. The main source used for the majority of processes is the Ecoinvent 2.2 database.

## Use advice
When using this dataset, the following methodological considerations should be noted: the dataset does not include recycling of the material; thus, if the activated carbon will be recycled, relevant data adjustments may be necessary. The use phase behavior is not modeled within this dataset; hence, users should include it based on their specific application scenarios. The dataset's validity begins from the publication date of the literature due to the lack of a specific start time for data collection. Since the primary data reflects conditions in Southern China, geographical and technological representativeness for other regions should be considered when extrapolating. Secondary data is sourced from Ecoinvent database v2.3, where processes with the most similar geographic origin and technological factors were selected. The user should consider updating the dataset with more recent databases or localized inventory data when available.

## Review details
Inventory: The internal review was done by several iteration steps concerning raw data validation, raw data documentation, representativity, completeness and consistency of modelling with regard to ISO 14040 and 14044.

## Data sources
- Sparrevik et al. Use of Life Cycle Assessments To Evaluate the Environmental Footprint of Contaminated Sediment Remediation. Environ. Sci. Technol. 2011, 45, 10, 4235–4241
