# Brick production ; shale hollow brick production ; crushing process

Dataset: ILCD process, Unit process, single operation
Geography: GZ-JX-CN
Reference year: 2020
Classification: Unit processes / Materials production / Other mineralic materials
Generated by: Wang xiangjin, r99rt4@163.com
Owner: Tiangong LCI Data Working Group
Review: Dependent internal review by Tiangong LCI Data Working Group
Amounts: no units in this file; such an amount is in the reference unit of its flow, which a separate flow dataset defines
copyright: false
licenseType: Free of charge for all users and uses

## General comment
Traditional shale hollow brick production process

## Technical purpose
The data set describes the process of producing shale hollow bricks, which are typically used in construction for building walls, facades, and other structural elements, allowing efficient thermal insulation due to the hollow structure of the bricks. The crushing process mentioned is part of the initial stage in brick production where the raw material, shale, is crushed to a fine powder before being formed and sintered into hollow bricks.

## Reference product
- brickbat aggregate: 1431; measured
  Brick powder coarse aggregate mixture

## Inputs
- brown coal; 11.9 MJ/kg: 330; measured
- shale: 1176; measured
- Electricity: 7.4628; measured

## Outputs
- particles (> PM10),particles (> PM10): 0.05; measured
- Particles (PM0.2 - PM2.5): 0.04; measured

## Deviations from the LCI method approaches
The EIA report is based on the annual production of bricks (80 million bricks) as a whole, and for statistical purposes, the data has been converted according to the size specifications described therein, in terms of bricks produced per tonne of production

## Data selection and combination
Adopting the relevant data from the table of coefficients of production and discharge for sintered bricks and building blocks in 3131 of the Manual of Coefficients of Production and Discharge for Industrial Pollution Sources of the First National Pollution Sources Census (Seventh Subbook).

## Sampling procedure
The data for this EIA report is derived from real-time data from the plant

## Use advice
When using this LCA dataset, users must note that the data applies specifically to the crushing process in shale hollow brick production, based on the production and discharge coefficients from the 3131 category for sintered bricks and building blocks. It is imperative to scale the data according to the annual production volume given (80 million bricks per year) and the conversion for bricks produced per tonne to ensure accurate application in life cycle assessments. Caution should also be taken to differentiate between this high-energy initial processing phase and subsequent production phases when applying the dataset to overarching LCA models.

## Review details
Inventory: The internal review was done by several iteration steps concerning raw data validation, raw data documentation, representativity, completeness and consistency of modelling with regard to ISO 14040 and 14044.

## Data sources
- 年产 8000 万块页岩标砖项目环评报告公示
