# NCA precursor production ; Nickel cobalt aluminum lithium oxide (NCA) precursor ; Aluminum sulfate powder

Dataset: ILCD process, Unit process, single operation
Geography: CN
Reference year: 2019
Classification: Unit processes / Materials production / Inorganic chemicals
Generated by: Jinliang Xie, jinliang.research@gmail.com
Owner: Tiangong LCI Data Working Group
Review: Dependent internal review by Tiangong LCI Data Working Group
Amounts: no units in this file; such an amount is in the reference unit of its flow, which a separate flow dataset defines
copyright: false
licenseType: Free of charge for all users and uses

## General comment
The NCA precursor production process is intended for the synthesis of Nickel Cobalt Aluminum Lithium Oxide (NCA), which is commonly used as a cathode material in lithium-ion batteries. The aluminum sulfate powder involved is a key intermediate for the synthesis of the NCA precursor compound.

## Time period
Year of publication

## Reference product
- NCA precursor: 1; measured

## Inputs
All rows: measured
- transport, freight, lorry 16-32 metric ton, unregulated: 0.545
  Lorry, 30t
- electricity, high voltage, aluminium industry: 0.0432
  Electricity
- cobalt sulfate: 1.36
  Cobalt sulfate
- nickel sulfate: 0.26
  Nickel sulfate
- aluminium sulfate, powder: 0.09
  Aluminum sulfate
- Sodium Hydroxide (100%): 0.88
  Sodium Hydroxide
- ammonia, anhydrous, liquid: 0.37
  Ammonia
- transport, pipeline, long distance, natural gas: 2.21
  Pipeline for natural gas
- Natural Gas: 0.0036
  Natural gas

## Use advice
Users should take note that the dataset for the NCA precursor production is specific to the process involving aluminum sulfate powder for the year of publication indicated. Applicability must be considered in the context of the technological advances and environmental regulations that may have occurred since publication. Careful assessment of the data's relevance to current processes is critical, especially when considering recycling aspects or improvements in production efficiency.

## Review details
Inventory: The internal review was done by several iteration steps concerning raw data validation, raw data documentation, representativity, completeness and consistency of modelling with regard to ISO 14040 and 14044.

## Data sources
- Yin, R., Hu, S. & Yang, Y. Life cycle inventories of the commonly used materials for lithium-ion batteries in China. J. Clean. Prod. 227, 960–971 (2019).
