# Aluminum Recycling ; Recycled Aluminum Ingots ; Scrap Aluminum ; 2014

Dataset: ILCD process, Unit process, single operation
Geography: CN
Reference year: 2021
Classification: Unit processes / Materials production / Metals and semimetals
Generated by: Zimeng Cai, caizm6178@163.com
Owner: Tiangong LCI Data Working Group
Review: Dependent internal review by Tiangong LCI Data Working Group
Amounts: no units in this file; such an amount is in the reference unit of its flow, which a separate flow dataset defines
copyright: false
licenseType: Free of charge for all users and uses

## General comment
The recycled aluminum ingots produced through this industrial process are primarily used for manufacturing various aluminum products including construction materials, automotive components, packaging such as cans and foils, and consumer electronics. The ingots serve as a secondary raw material, substituting for primary aluminum obtained from bauxite ore, reducing the environmental impact from mining and processing.

## Time period
Date of publication

## Reference product
- secondary aluminium ingot: 1000; missing unimportant
  ingot

## Inputs
- electricity, high voltage, aluminium industry: 1148.4; missing unimportant
  electricity
- aluminium scrap, unspecified: 1180; missing unimportant
  aluminum scrap

## Data selection and combination
The data in this study refers to the LCA data of PA, SA, electricity, and other background data. The PA data were obtained from statistical data sources, and the SA data were mainly obtained from the literatures. The background data were mainly derived from the Chinese localization LCA database CAS RCEES 2018, which was established by the Research Center for Eco-Environmental Sciences, Chinese Academy of Sciences and covers LCA data for energy, materials, transportation, waste management etc.

## Use advice
When utilizing this LCA data for recycled aluminum ingots, it is critical to ensure the boundaries of the system are well-defined, particularly concerning the end-of-life treatment of products using this material. Take into account the allocation of impacts between recycling and primary production processes. Exclude the impacts from primary aluminum production when accounting for recycled content. The background data should be carefully considered as it is localized to the Chinese context from CAS RCEES 2018; differences in geographic and technological aspects could affect the applicability of the data for processes outside China.

## Review details
Inventory: The internal review was done by several iteration steps concerning raw data validation, raw data documentation, representativity, completeness and consistency of modelling with regard to ISO 14040 and 14044.

## Data sources
- Ding, N., Liu, N., Lu, B. & Yang, J. Life cycle greenhouse gas emissions of aluminum based on regional industrial transfer in China. J. Ind. Ecol. 25, 1657–1672 (2021).
