# mining and beneficiation of copper sulphate mine;copper sulphate mine;mining and dressing processes;a typical copper sulphate mine

Dataset: ILCD process, Unit process, single operation
Geography: JX-CN
Reference year: 2022
Classification: Unit processes / Materials production / Metals and semimetals
Functional unit: the mining process of one tonne of copper-sulfur raw ore was selected as the functional unit.
LCI method principle: Attributional
LCI method approaches: Allocation - market value
Generated by: Peng Wang, 2867919560@qq.com
Owner: Tiangong LCI Data Working Group
Review: Dependent internal review by Tiangong LCI Data Working Group
Amounts: no units in this file; such an amount is in the reference unit of its flow, which a separate flow dataset defines
copyright: false
licenseType: Free of charge for all users and uses

## General comment
The copper sulfide mining and beneficiation data set is intended for use in assessing the environmental impacts associated with the extraction and processing of copper-sulfur raw ore. It can be used by various stakeholders in the mining industry such as policymakers, environmental consultants, and mining engineers to evaluate and improve the sustainability of copper mining projects. The data can be applied in scenarios that require a comprehensive understanding of the life cycle impacts of copper mining activities, from resource extraction to beneficiation processes, including crushing, grinding, flotation, and the production of copper concentrate and tailings.

## Geography
The data source of this study was from the project feasibility assessment plan of a typical copper sulfide mine in Jiangxi Province, China.

## Technology and included processes
Upon drilling and blasting, the copper sulfide ore was broken underground, and then sent to the site of the mineral processing industry through lifting and transportation system for further crushing and grinding. The grinding products were transported to the next stage for flotation, copper concentrate and copper tailings were received through the copper flotation process initially, and subsequently, the by-products high-sulfur and low-sulfur concentrates were obtained from the graded copper tailings.

## Reference product
- Refined copper: 1000; software or database

## Inputs
- copper sulfide ore: 8.83; measured
  Copper
- sulfur: 84.47; measured
  Sulfur
- gold: 0.00014; measured
  Gold
- silver: 0.01066; measured
  Silver
- Explosive: 0.89; measured
  Explosive needs to be supplemented
- unspecified: 130000; measured
  Land occupation
- water: 4040; measured
- Electricity: 242.46; measured
- Diesel: 0.29; software or database
- Cleft timber: 0.17; software or database
  Cleft timber needs to be supplemented
- Lime: 7.5; software or database
  lime
- Alloy: 0.00157; software or database
  Alloy needs to be supplemented
- Steel: 0.19; software or database
  Steel needs to be replenished
- cement, unspecified: 70; software or database
  Cement needs to be supplemented
- sand: 80; software or database
- sodium hydroxide: 0.05194; software or database
  Sodium hydroxide
- Carbon disulfide: 0.09869; software or database
  Carbon disulfide needs to be supplemented with resources
- Terpenic oil: 0.068; software or database
  Terpenic oil needs to be supplemented

## Outputs
- carbon dioxide (fossil): 0.51; software or database
  原文未区分bio和fossil，根据专家判断此处为fossil
- carbon monoxide,carbon monoxide (fossil): 0.044; software or database
  原文未区分bio和fossil，根据专家判断此处为fossil
- Nitrogen oxides: 0.34494; software or database
  Nitrogen oxides need to be supplemented
- sulfur dioxide: 0.0006624; software or database
  Sulfur dioxide
- particles (PM2.5 - PM10): 0.00198; software or database
- chemical oxygen demand: 4.05e-6; software or database
  COD needs to be supplemented
- biological oxygen demand: 1.35e-6; software or database
  BOD needs to be supplemented
- Suspended solids, unspecified,Suspended solids, unspecified: 0.04882; software or database
  Suspended solid (SS) needs to be supplemented
- copper: 0.0009644; software or database
  Copper
- lead: 0.000668; software or database
  Lead
- arsenic: 0.00021376; software or database
  Arsenic
- zinc: 0.0009642; software or database
  Zinc
- cadmium: 0.0001675; software or database
  Cadmium
- chromium: 1.336e-5; software or database
  Chromium
- Ammonia Nitrogen: 0.00054; software or database
  Ammonia nitrogen needs to be supplemented
- Tailings, unspecified: 845; software or database
  Tailings
- hazardous waste (unspecified),hazardous waste (unspecified): 0.13; software or database
  Hazardous waste
- Copper concentrates: 30; measured
  Copper concentrates need to be replenished
- High-sulfur concentrate: 140; measured
  High-sulfur concentrate needs to be replenished
- Low-sulfur concentrate: 20; measured

## Deviations from the LCI method approaches
Life cycle assessment (LCA) was conducted using SimaPro with ReCiPe 2016 method.

## Data selection and combination
The foreground data, mainly including the consumption of raw materials and energy in each process, external and internal transportation, on-site emissions, and waste disposal, were collected from a typical copper sulfide mine in China. The background data as the production of generic materials, energy, transport, and waste management were obtained by the Ecoinvent 3.5 databases,

## Data treatment and extrapolations
using SimaPro

## Use advice
When using the data set for life cycle assessment, ensure that all foreground data such as raw material and energy consumption, transportation, emissions, and waste treatment are accurately reflected within the LCA model. Background data provided by the Ecoinvent 3.5 databases should be included with a clear distinction from project-specific data. The functional unit is the mining process of one tonne of copper-sulfur raw ore. Adjustments may be required if the LCA study's system boundaries or targeted functional units differ. Users must employ consistent methodological approaches, including the selected LCA method (ReCiPe 2016) and software (SimaPro), to ensure the validity of the study. Inclusion or exclusion of recycling, specific end-of-life scenarios, and other methodological choices must be justified and aligned with the goals of the assessment.

## Review details
Inventory: The internal review was done by several iteration steps concerning raw data validation, raw data documentation, representativity, completeness and consistency of modelling with regard to ISO 14040 and 14044.

## Data sources
- Tao, M., Nie, K., Zhao, R., Shi, Y. & Cao, W. Environmental impact of mining and beneficiation of copper sulphate mine based on life cycle assessment. Environ Sci Pollut Res 29, 87613–87627 (2022).
