# Brick production ; permeable brick ; Fabric blending process

Dataset: ILCD process, Unit process, single operation
Geography: JNA-SD-CN
Reference year: 2018
Classification: Unit processes / Materials production / Other mineralic materials
Functional unit: The functional unit is the area of 1 m2 brick products.
Generated by: Wang xiangjin, r99rt4@163.com
Owner: Tiangong LCI Data Working Group
Review: Dependent internal review by Tiangong LCI Data Working Group
Amounts: no units in this file; such an amount is in the reference unit of its flow, which a separate flow dataset defines
copyright: false
licenseType: Free of charge for all users and uses

## General comment
Production process of permeable bricks in non sintered bricks

## Technical purpose
The permeable bricks produced in this process are primarily used for the construction of pavement surfaces that require permeability to facilitate water drainage and reduce surface water runoff. Such bricks are often utilized in eco-friendly building projects, landscaping, and urban infrastructure to mitigate flooding and replenish groundwater levels.

## Reference product
- brick dust: 16; measured
  Fabric blending materials

## Inputs
All rows: measured
- portland cement: 6.17
- sand: 9.26
- freshwater: 0.617
- Iron oxide pigment: 0.0926
- Electricity: 0.32832

## Outputs
- particles (PM10): 7.5e-5; measured

## Deviations from the LCI method approaches
ReCiPe midpoint (H) model is applied in this study.

## Data selection and combination
In this study, the production energy consumption of concrete pavement brick and permeable brick as well as the relevant data of all kinds of raw materials and energy input and exhaust emissions are collected from Jinan Shunde Cement Products Co. Ltd. Shandong Province.

## Sampling procedure
Most data of raw materials, energy input and waste discharge were collected from the site investigation of manufacturer. Water reducer is also called water reducing agent, whose chemical constituents is the sodium salt of the sulfonate formaldehyde condensation

## Use advice
Users of this LCA data should note the functional unit of 1 m2 for brick products when modeling or making comparisons. It is also advised to consider the results of the sensitivity analysis, especially the variations in input and output of the key processes, to ensure accuracy in scenario modeling. This data set reflects the specific energy consumption and emissions profiles for the production of concrete pavement brick and permeable brick at Jinan Shunde Cement Products Co., Ltd., and may not be representative of other production sites or processes. Attention should be given to the geographical and technological applicability of the data, and adjustments may be necessary to account for regional differences in raw materials or production practices.

## Review details
Inventory: The internal review was done by several iteration steps concerning raw data validation, raw data documentation, representativity, completeness and consistency of modelling with regard to ISO 14040 and 14044.

## Data sources
- Yuan, X. et al. Environmental and economic impacts assessment of concrete pavement brick and permeable brick production process - A case study in China. Journal of Cleaner Production 171, 198–208 (2018).
