# Supercritical water gasification

Dataset: ILCD process, Unit process, single operation
Geography: CN
Reference year: 2019
Classification: Energy carriers and technologies / Other non-renewable fuels
Functional unit: 1 kg hydrogen
LCI method principle: Attributional
Generated by: Jinlu Gan, jinlu.gan1998@gmail.com
Owner: Tiangong LCI Data Working Group
Review: Dependent internal review by Tiangong LCI Data Working Group
Amounts: no units in this file; such an amount is in the reference unit of its flow, which a separate flow dataset defines
copyright: false
licenseType: Free of charge for all users and uses

## General comment
Supercritical water gasification (SCWG) of biomass is a promising technology for hydrogen production. SCWG is a complex process in which the biomass cracks into gaseous, liquid, and solid bioproducts, namely, syngas, bio-oil and char, respectively. The pilot plant includes four sub-systems, namely, biomass and water feed, heat exchanging, solar concentrator and SCW reaction, and gas separation and collection sub-systems. The main components of the pilot-scale SCWGSolar system comprises a solar concentrator, a solar receiver, SCW reactors, a biomass slurry feed system, heat exchangers, gas-liquid separators, and a product testing system.

## Time period
the publication date of the article

## Technical purpose
This supercritical water gasification (SCWG) process is aimed at the production of hydrogen predominantly for the energy sector. The hydrogen produced by this method can be used in fuel cells for zero-emission vehicles, as an energy carrier in power generation systems, or as a clean fuel in various industrial applications where reduction of carbon footprint is essential. This pilot-scale system is particularly suited for integration with biomass sources and renewable energy technologies such as solar power.

## Reference product
- Hydrogen: 1; calculated

## Inputs
- biomass; 14.7 MJ/kg: 6.24; article inperiodical
  wood sawdust
- Electricity: 10.944; article inperiodical
- primary energy from solar energy: 25.51; article inperiodical
- primary energy from solar energy: 4.04; article inperiodical
  can be solar energy or electricity

## Outputs
- methane: 0.17; calculated

## Use advice
When utilizing this dataset for Life Cycle Assessment (LCA) purposes, users should ensure the scope of their study aligns with the operation conditions of the pilot plant. Special attention should be paid to the biomass source, operational efficiencies, and energy inputs from the solar concentrator, as these parameters critically affect the environmental impact profile. Users must consider geographical and technological relevance, as well as methodological consistency with the SCWG process. It is important to include potential co-product allocation or energy credit for bio-oil and char by-products when accounting for the overall environmental performance.

## Review details
Inventory: The internal review was done by several iteration steps concerning raw data validation, raw data documentation, representativity, completeness and consistency of modelling with regard to ISO 14040 and 14044.
