# Cassava-based ethanol production ; Ethanol ; Fermentation ; Cassava

Dataset: ILCD process, Unit process, single operation
Geography: AH-CN
Classification: Energy carriers and technologies / Renewable fuels
Functional unit: The functional unit is 1.7 tonne of ethanol production.
LCI method principle: Attributional
LCI method approaches: Allocation - mass
Generated by: Zirui Tang, tangzirui123@gmail.com
Owner: Tiangong LCI Data Working Group
Review: Dependent internal review by Tiangong LCI Data Working Group
Amounts: no units in this file; such an amount is in the reference unit of its flow, which a separate flow dataset defines
copyright: false
licenseType: Free of charge for all users and uses

## General comment
Two alternative ethanol production scenarios, corn-based and cassava-based, were tested for ethylene production.

## Geography
Data related to the operation process (e.g., electricity, steam, water, chemicals, raw material consumption, and direct emissions) from the cassava-based ethanol and corn-based ethylene production plants in the Guangxi and Anhui Provinces in China were used [20], [21].

## Technology and included processes
Processes included in present study are summarized as follows:1) Corn and cassava production at farm; 2) Ethanol and ethylene production.

## Technical purpose
The described cassava-based ethanol production process is designed for the generation of ethanol, which can be subsequently used in the production of ethylene. Ethanol from this process is intended for use in applications that may include biofuel production, pharmaceuticals, beverage industries, or as a precursor chemical for other industrial processes.

## Reference product
- Ethanol: 1700; article inperiodical

## Inputs
All rows: article inperiodical
- Cassava: 4900
- Yeast: 0.11
- Amylase: 0.4
- Glucoamylase: 5.3
- Sulfuric acid: 15.9
- Alkali: 2.7
- Urea: 6.5
- electricity: 1523.88
- process steam: 5000
- water: 9400

## Outputs
- Protein Feed: 430; article inperiodical

## Deviations from the LCI method approaches
Co-product allocation based on product mass was performed.

## Data selection and combination
Data related to the operation process (e.g., electricity, steam, water, chemicals, raw material consumption, and direct emissions) from the cassava-based ethanol and corn-based ethylene production plants in the Guangxi and Anhui Provinces in China were used.2. Corn-based ethanol, with an annual production capacity of 370 kt in 2010, accounted for approximately 20% of the total biomass-based ethanol production, whereas cassava-based ethanol, with an annual total capacity of 20 kt, is currently the only non-grain-based ethanol production enterprise.3. The data related to corn and cassava production at farms, coal-based electricity generation, and road transport processes were taken from the references.4. Moreover, data on chemical production and relevant background data from Europe were used [26] because of the lack of information for China.

## Use advice
Data users should consider the specific context of cassava-based ethanol production in the Anhui province of China when applying this data to their life cycle assessments. Co-product allocation is based on mass, which must be consistently applied across similar assessments. Additionally, due to the reliance on European data for chemical production and background data, adjustments may be required when applying this data set in a different geographical context. The functional unit for allocation is 1.7 tonnes of ethanol production, and this should guide the scaling of inputs and outputs in the LCA model.

## Review details
Inventory: The internal review was done by several iteration steps concerning raw data validation, raw data documentation, representativity, completeness and consistency of modelling with regard to ISO 14040 and 14044.

## Data sources
- Hong, J., Zhang, Y., Xu, X. & Li, X. Life cycle assessment of corn- and cassava-based ethylene production. Biomass and Bioenergy 67, 304–311 (2014).
