# Dry sand Production; sand stone crushing ; cone crushing technology

Dataset: ILCD process, Unit process, single operation
Geography: HAIN-CN
Reference year: 2020
Classification: Unit processes / Materials production / Other mineralic materials
Generated by: Cui hang, Cuihang0716@163.com
Owner: Tiangong LCI Data Working Group
Review: Dependent internal review by Tiangong LCI Data Working Group
Amounts: no units in this file; such an amount is in the reference unit of its flow, which a separate flow dataset defines
copyright: false
licenseType: Free of charge for all users and uses

## General comment
Secondary crushing, screening and processing (cone crushing)

## Technology and included processes
After jaw crushing, it is transported to cone crusher through conveyor belt for second crushing, after crushing, it enters into vibrating screen for screening, and the crushed stone with smaller particle size goes into the finished product yard through conveyor belt, and the unqualified products with larger particle size go back to cone crusher for crushing, and sand making machine enters into sand making.

## Technical purpose
The described industrial process is primarily used in the production of construction aggregates. Specifically, this dry sand production process with secondary cone crushing technology is utilized to produce fine and coarse crushed stones suitable for concrete production, road building, and other construction-related applications. The process efficiently sizes material for different construction purposes by sequentially employing jaw crushing, followed by cone crushing for finer particle size reduction, and screening for size classification.

## Reference product
- gravel: 41870; measured

## Inputs
- gravel: 41870; measured
- Electricity: 1134; measured

## Use advice
Users of this dataset should consider the specific technological sequence and efficiency impacts of dry sand production with cone crushing technology when utilizing this data in Life Cycle Assessments. It is important to ensure consistency in system boundaries by including all relevant inputs and outputs in the assessment, such as electricity consumption, wear of machinery, and emissions from the operation. Methodological choices related to allocation in cases of co-production, as well as end-of-life treatment of the produced materials, need to be clearly documented.

## Review details
Inventory: The internal review was done by several iteration steps concerning raw data validation, raw data documentation, representativity, completeness and consistency of modelling with regard to ISO 14040 and 14044.

## Data sources
- 陵水海岛混凝土有限公司干法制砂项目
