# Open field vegetable production ; Crop Production (Tomatoes)

Dataset: ILCD process, Unit process, single operation
Geography: CN
Classification: Unit processes / Materials production / Agricultural production means
Functional unit: hm2
Generated by: Haoran Zhang, hrzhang@whu.edu.cn
Owner: Tiangong LCI Data Working Group
Review: Dependent internal review by Tiangong LCI Data Working Group
Amounts: no units in this file; such an amount is in the reference unit of its flow, which a separate flow dataset defines
copyright: false
licenseType: Free of charge for all users and uses

## General comment
The boundary of the system is concentrated in the whole process of open field vegetable production (from sowing to harvesting), which is divided into agricultural phase and agricultural phase. The agricultural phase focuses on greenhouse gas emissions from the production and transportation of fertilizers (fertilizers and organic fertilizers), pesticides and agricultural film. The agricultural stage mainly focuses on the greenhouse gas emissions generated by the application process of fertilizer and pesticide, the diesel consumption and artificial energy consumption in the process of agricultural operation (tillage, irrigation, etc.), and the fixation of soil organic carbon caused by the net primary productivity of vegetables and the input of organic fertilizer [16]. Select unit area (per hm2) for this system evaluation unit.

## Technology and included processes
Based on national agricultural statistical data, using the life cycle assessment (LCA) method, the net greenhouse gas emissions (NGHGE) of four typical field vegetable productions in China, including open-field tomatoes, cucumbers, Chinese cabbage, and radishes, were quantified. The study compared the differences in net greenhouse gas emissions among vegetable types and provinces, and analyzed emission reduction measures.

## Technical purpose
The data set represents the greenhouse gas emissions from the life cycle of vegetable production, specifically open-field cultivation of tomatoes, cucumbers, Chinese cabbage, and radishes in China. This data is pivotal for understanding the environmental impacts of agricultural practices and is applicable for researchers, policymakers, and agricultural businesses aiming for sustainable farming methodologies and the reduction of agricultural emissions. The data set can serve as a baseline for comparison among different regions within China and for the assessment of potential emission reduction strategies.

## Reference product
- Tomato: 71400; software or database
  tomato

## Inputs
All rows: software or database
- nitrogen: 406, 365, 41.1 (3 entries)
  tomato
- phosphorus: 232, 206, 26.1 (3 entries)
  tomato
- potassium: 229, 200, 28.9 (3 entries)
  tomato
- Rice Seeds: 108
  tomato
- Agricultural film: 74.8
  tomato
- Labor: 614
  tomato

## Deviations from the LCI method approaches
The process is divided into two phases: agricultural input and farming. The agricultural input phase mainly focuses on the greenhouse gas emissions produced and transported during the production of fertilizers (chemical and organic), pesticides, and agricultural films. The farming phase primarily concentrates on the greenhouse gas emissions from the application of fertilizers and pesticides, agricultural operations (such as plowing and irrigation), diesel consumption, and the energy consumed by human labor. Additionally, this phase considers the carbon sequestration in vegetables through net primary productivity and the fixation of soil organic carbon caused by the input of organic fertilizers.

## Data selection and combination
Based on the types of vegetables and the planting distribution information available in the database, four typical open-field vegetables were selected, namely fruit vegetables (tomatoes, cucumbers), leafy vegetables (Chinese cabbage), and root vegetables (radishes). The related planting production data from various provinces across the country for these four types of open-field vegetables were collected and organized for the year 2016 (data from Taiwan, China is temporarily unavailable).

## Data treatment and extrapolations
Various vegetables’ fertilizer application rates, diesel consumption, agricultural film usage, labor employment, and yield data are obtained from the literature. Diesel cost is calculated using the formula [18]: Diesel cost = (mechanical operation fee + irrigation fee - water fee) x 21% + fuel power fee, and the diesel price data comes from China's oil price network database [19]. Pesticide input data refer to Luo Wei’s [20] study results on the big data analysis of pesticide application in open-field vegetables across the country. The planting areas of various types of vegetables in different provinces were retrieved from the literature [15].

## Use advice
Users of this data set should consider the technological applicability, including the specificity of regional practices and inputs. It is recommended to take into account the representativeness of the data for the intended agricultural context when applying this LCA data. Additionally, users should be mindful of the methodological framework and assumptions used in the quantification of GHG emissions. The exclusion or inclusion of carbon sequestration effects due to vegetable growth and organic fertilizer application should be handled in accordance with the goal and scope of the intended assessment. The system boundary for this data set is confined to the entire process of open-field vegetable production; thus, users should not apply it to different agricultural systems without proper adaptation.

## Review details
Inventory: The internal review was done by several iteration steps concerning raw data validation, raw data documentation, representativity, completeness and consistency of modelling with regard to ISO 14040 and 14044.

## Data sources
- 张芬,程泰鸿,陈新平,王孝忠.我国典型露地蔬菜生产中的温室气体排放[J].环境科学,2020,41(07):3410-3417.
