# Scrap Aluminum Processing ; New Aluminum Scrap ; Old Aluminum Scrap

Dataset: ILCD process, Unit process, single operation
Geography: CN
Classification: Unit processes / Materials production / Metals and semimetals
Generated by: Huimin Chang, huiminchang@tsinghua.edu.cn
Owner: Tiangong LCI Data Working Group
Review: Dependent internal review by Tiangong LCI Data Working Group
Amounts: no units in this file; such an amount is in the reference unit of its flow, which a separate flow dataset defines
copyright: false
licenseType: Free of charge for all users and uses

## General comment
Recycled aluminum from this process is used in various industries where secondary aluminum is acceptable, such as automotive, packaging, construction, and consumer electronics. The material can serve as an input for the production of aluminum alloys, casting, and extrusion products. Recycled aluminum is particularly valued for its lower environmental impact compared to primary aluminum production.

## Reference product
- aluminium scrap, new: 1000; software or database
  Pre-processed aluminumscrap

## Inputs
- electricity, high voltage, aluminium industry: 414.9; software or database
  Electricity [kWh]
- aluminium scrap, post-consumer: 1042.45; estimated
  Unprocessed aluminum scrap [kg] ; 80% from CN and 20% from USA
- quicklime, in pieces, loose: 0.8961; estimated
  Quicklime ; EU-28 used as no specific data for CN and NO available
- sodium hydroxide, without water, in 50% solution state: 0.3409; software or database
  Sodium silicate
- freshwater: 1.4978; software or database
  Fresh water [kg]
- heat, district or industrial, natural gas: 896.99; software or database
  Natural gas [MJ]

## Data selection and combination
For reliable findings, the most recent and representative data were considered. Regional or country-specific data were used when provided in the GaBi© “professional and extension” database (SP 39) or in the literature. If location-specific data were not found, either comparable data for the country or global data were used. For consistency, data from the same source and year were used if available. Due to data availability, the study did not consider some inputs and background processes if they contributed less than 1% to the total input mass. In contrast, no established production process for secondary production exists as numerous different collectors, processors, and refiners apply various recycling methods (Green et al., 2007). The study used LCI data provided by the Aluminum Association from 2013 for secondary production (Aluminum Association, 2013; International Aluminium Institute, 2017a, International Aluminium Institute, 2017b). An exemplary case was examined, justifying the consideration of a specific dataset. In this study, two main changes were made: 1) a separate aluminium scrap collection process was added; 2) a higher salt input was assumed because many sources stated the large quantities of salt slag often remaining at the end of the recycling process (European Aluminium Association, 2018; Tsakiridis, 2012).

## Use advice
When utilizing this data set for LCA, ensure that inclusion or exclusion of recycling is consistent with the goal and scope of the study. When modelling the use phase behavior, particular attention should be paid to the actual end-life recycling rates and processes. The data from the Aluminum Association should be used for secondary production modeling. For accuracy, adjustments should be made to reflect higher salt inputs in the recycling process as indicated by the sources. It is also essential to consider the methodological differences due to the variety of collection, processing, and refining methods in secondary production when comparing with primary aluminum production data.

## Review details
Inventory: The internal review was done by several iteration steps concerning raw data validation, raw data documentation, representativity, completeness and consistency of modelling with regard to ISO 14040 and 14044.

## Data sources
- Luthin, A., Backes, J. G. & Traverso, M. A framework to identify environmental-economic trade-offs by combining life cycle assessment and life cycle costing – A case study of aluminium production. Journal of Cleaner Production 321, 128902 (2021).
