# Molten steel production;Molten steel;BOF(D01)

Dataset: ILCD process, Unit process, single operation
Geography: CN
Reference year: 1998
Classification: Materials production / Metals and semimetals
Generated by: Fuxiang, 1162850692@qq.com
Owner: Tiangong LCI Data Working Group
Review: Dependent internal review by Tiangong LCI Data Working Group
Amounts: no units in this file; such an amount is in the reference unit of its flow, which a separate flow dataset defines
copyright: false
licenseType: Free of charge for all users and uses

## General comment
来自表 4-17 D01 钢厂生产吨材环境负荷编目表

## Time period
论文提到钢铁企业环境总体数据为1998年的吨钢环境基础数据。

## Technical purpose
The molten steel produced through the Basic Oxygen Furnace (BOF) process is used for a broad range of steel products, which can include construction materials, automobiles, machinery, appliances, and various other applications requiring high-strength steel.

## Reference product
- Crude Steel: 1078; measured
  crude steel

## Inputs
- Energy, geothermal, converted: 1004.05; measured
- water: 24363; measured
- Molten Iron: 1065; measured
  molten iron

## Outputs
All rows: measured
- Dust (unspecified, from stack): 4.583
- Hydrocarbons, aliphatic, alkanes, unspecified: 0.001848
  Petro
- Suspended solids, unspecified: 0.469081
- chemical oxygen demand: 0.223435
- Dust (unspecified, from stack): 21.951
  dust collection
- Spoil (deposited, hibernating in ground, non elementary flow): 161.7

## Use advice
Users should note that the environmental load inventory data for the BOF steel production process is based on the 1998 baseline data for the tonnage of steel's environmental impact. Therefore, users should consider the time relevance of the data when applying it to current assessments. Also, attention must be paid to the considerations of recycling of the steel, technological applicability, and region-specific environmental impacts in the analysis.

## Review details
Inventory: The internal review was done by several iteration steps concerning raw data validation, raw data documentation, representativity, completeness and consistency of modelling with regard to ISO 14040 and 14044.

## Data sources
- 周和敏. 钢铁材料生产过程环境协调性评价研究. (北京工业大学, 2001).
