# East China (Hentai) Corn Production ; Raw Material Extraction and Transportation

Dataset: ILCD process, Partly terminated system
Geography: ZB-SD-CN
Reference year: 2003
Valid until: 2004
Classification: Unit processes / Transport services / Road
Functional unit: 1t
Generated by: Haoran Zhang, hrzhang@whu.edu.cn
Owner: Tiangong LCI Data Working Group
Review: Dependent internal review by Tiangong LCI Data Working Group
Amounts: no units in this file; such an amount is in the reference unit of its flow, which a separate flow dataset defines
copyright: false
licenseType: Free of charge for all users and uses

## General comment
This paper divides the research object into three stages , that is, raw material mining and transportation stage, agricultural chemical production and transportation stage and summer maize interfield planting stage , which are respectively referred to as raw material stage, agricultural material stage and planting stage. The impact of raw material stage includes energy and resource consumption and pollution emission caused by mineral and fossil energy exploitation. The effects of the agricultural phase include the large energy consumption and the discharge of waste water, waste gas and pollutants caused by the production of agricultural chemicals; The effects of planting stage include fuel, electricity and water consumption caused by management measures such as land preparation, irrigation, fertilization and pest control, and pollutant discharge from runoff, leaching and volatilization. The main influence of the transport process at each stage is fuel consumption and the resulting exhaust emissions.

## Geography
Hengtai County

## Technology and included processes
According to the LCA principles and framework proposed by ISO (2006) the LCA consists of four interrelated phases : Goal definition and scoping, inventory analysis, impactassessment and life cycle interpretation

## Technical purpose
This dataset describes the environmental impacts associated with the production and transport of corn in East China (Hengtai). It encompasses carbon emission factors, energy usage, and water consumption metrics relevant for life cycle assessments (LCA) in the agricultural sector. The data could be used in the LCA of corn cultivation, providing insight into the emissions resulting from raw material extraction, inputs like fertilizers, and the overall impact of planting and transportation activities.

## Reference product
- maize grain: 1000; measured

## Inputs
All rows: measured
- Electricity: 1051
  施氮水平N0
- Electricity: 2110
  施氮水平N1
- Electricity: 3824
  施氮水平N2
- Electricity: 6340
  施氮水平N3
- water: 186000
  施氮水平N0
- water: 192000
  施氮水平N1
- water: 244000
  施氮水平N2
- water: 323000
  施氮水平N3

## Outputs
All rows: measured
- carbon monoxide (fossil): 0.16
  施氮水平N0
- carbon monoxide (fossil): 0.21
  施氮水平N1
- carbon monoxide (fossil): 0.31
  施氮水平N2
- carbon monoxide (fossil): 0.47
  施氮水平N3
- nitrous oxide: 0.11
  施氮水平N0
- nitrous oxide: 0.18
  施氮水平N1
- nitrous oxide: 0.26
  施氮水平N2
- nitrous oxide: 0.15
  施氮水平N3
- carbon dioxide (fossil),carbon dioxide (fossil): 994.64
  施氮水平N0
- carbon dioxide (fossil),carbon dioxide (fossil): 979.07
  施氮水平N1
- carbon dioxide (fossil),carbon dioxide (fossil): 1244.75
  施氮水平N2
- carbon dioxide (fossil),carbon dioxide (fossil): 2218.82
  施氮水平N3
- methane (fossil),methane (fossil): 0.47
  施氮水平N0
- methane (fossil),methane (fossil): 0.67
  施氮水平N1
- methane (fossil),methane (fossil): 1.05
  施氮水平N2
- methane (fossil),methane (fossil): 1.6
  施氮水平N3
- sulfur dioxide: 0.59
  施氮水平N0
- sulfur dioxide: 1.5
  施氮水平N1
- sulfur dioxide: 2.83
  施氮水平N2
- sulfur dioxide: 4.78
  施氮水平N3
- Nitrogen oxides: 0.53
  施氮水平N0
- Nitrogen oxides: 2.13
  施氮水平N1
- Nitrogen oxides: 2.81
  施氮水平N2
- Nitrogen oxides: 3.86
  施氮水平N3
- ammonia: 1.13
  施氮水平N0
- ammonia: 2.06
  施氮水平N1
- ammonia: 3.5
  施氮水平N2
- ammonia: 5.61
  施氮水平N3
- nitrogen, total (excluding N2): 0.02
  施氮水平N1
- nitrogen, total (excluding N2): 0.05
  施氮水平N2
- nitrogen, total (excluding N2): 0.08
  施氮水平N3
- TotalPhosphorus: 0.03
  施氮水平N0
- TotalPhosphorus: 0.03
  施氮水平N1
- TotalPhosphorus: 0.04
  施氮水平N2
- TotalPhosphorus: 0.04
  施氮水平N3
- chemical oxygen demand: 0.19
  施氮水平N1
- chemical oxygen demand: 0.44
  施氮水平N2
- chemical oxygen demand: 0.8
  施氮水平N3

## Deviations from the LCI method approaches
The study starts from the mining of ores and energy related to the life cycle of summer maize. The termination boundary is the output of pollutants and agricultural products during crop planting management." "The accounting system boundary i

## Data selection and combination
The energy and water consumption in the raw material and agricultural input stages are based on the 'China Statistical Yearbook' (2005-2008), 'China Environmental Yearbook' (2004-2006), and 'China Energy Statistical Yearbook' (2004-2006). The data related to the planting stage comes from field records. Main atmospheric pollutants and water pollutants include SO2, CH4, CO2, CO, N2O, COD, NH3, and NOx, etc. The emission coefficients come from domestic publicly published literature

## Data treatment and extrapolations
Divided into three steps: characterization, normalization, and weighted assessment."

## Sampling procedure
Four nitrogen application treatments from the fertilizer experiment of summer maize in 2003-2004 at the Shandong Hantai Experimental Station of China Agricultural University were selected as typical research subjects. The four nitrogen fertilizer application rates were 0, 100, 200, 300 kg·hm-2·a-1, represented as N0, N1, N2, N3 respectively.

## Use advice
Users should apply this dataset exclusively for LCA models related to the cultivation of corn in Hengtai County, East China. When using this dataset for impact assessment, attention should be paid to methodological consistency with other data sources applied in the model. Special consideration should be given to the inclusion or exclusion of emissions during recycling phases, modeling use phase behavior, technological applicability, and emissions from nitrogen application treatments (N0, N1, N2, N3). The dataset should be used in connection with the system boundaries defined from the start of ore and energy extraction to the output of pollutants and agricultural products during the crop's life cycle management.

## Review details
Inventory: The internal review was done by several iteration steps concerning raw data validation, raw data documentation, representativity, completeness and consistency of modelling with regard to ISO 14040 and 14044.

## Data sources
- 王明新,吴文良,夏训峰. 2010. 华北高产粮区夏玉米生命周期环境影响评价 [J]. 环境科学学报 30(6): 1339—1344
