# Wet steaming cotton dyeing and finishing ; printing and dyeing cotton ; mercerization

Dataset: ILCD process, Unit process, single operation
Geography: SZ-JS-CN
Reference year: 2012
Classification: Unit processes / Materials production / Other materials
Generated by: Yingfan Duan, 1300925579@qq.com
Owner: Tiangong LCI Data Working Group
Review: Dependent internal review by Tiangong LCI Data Working Group
Amounts: no units in this file; such an amount is in the reference unit of its flow, which a separate flow dataset defines
copyright: false
licenseType: Free of charge for all users and uses

## General comment
"Mercerization" is a treatment in the printing and dyeing process aimed at applying a silk finishing agent to the fabric's surface, giving it a bright and silky luster. This process typically involves applying the silk finishing agent to the fabric after the printing or dyeing is complete, followed by curing through heating or other means to achieve a smooth and glossy surface.

## Geography
The study focuses on a printing and dyeing enterprise in Jiangsu Province, located in Changshu within the Yangtze River Delta Economic Zone.

## Technical purpose
This industrial process involves the wet steaming cotton dyeing and finishing method used in the textile industry, specifically for printing and dyeing cotton fabrics with mercerization. Mercerization enhances the luster, strength, and dye affinity of cotton. Coal is used in steam and conduction oil boilers to produce steam and maintain high operating temperatures, essential for various stages of textile processing, including scouring, bleaching, mercerizing, raising, width washing, stentering, and pad-dyeing. Steam is utilized for drying the fabric after each of the processes mentioned, with two drying steps for pad-dyeing and one for all other stages. The process is designed to efficiently allocate steam usage among different stages according to the proportion of 2:1:1:1:1:2 based on the assumption that each drying cylinder consumes an equal amount of steam.

## Reference product
- Cotton Fabric: 167; measured

## Inputs
- Electricity: 530; measured
- Standard coal: 981; measured
- Crude coal: 129; calculated
- Cleaned coal: 318; calculated
- Fuel Oil: 2.74; calculated
- heavy fuel oil: 0.826; calculated
- Diesel oil: 3.77; calculated
- Coke Oven Gas: 5.03; calculated
- natural gas: 0.0645; calculated
- process steam: 3.15e7; measured
- sodium hydroxide: 0.0336; measured
- Sulfuric acid: 14.4; calculated
- Acetic acid: 11.1; measured
- river water: 12500; measured
- freshwater: 2300; measured

## Outputs
- carbon dioxide (fossil): 2850; calculated
- carbon monoxide (fossil): 0.347; calculated
- sulfur dioxide: 2.15; calculated
- methane (fossil): 13.6; calculated
- Nitrogen oxides: 0.684; calculated
- nitrous oxide: 0.0431; measured
- particles (> PM10): 1.15; calculated
- non-methane volatile organic compounds: 0.0043; measured
- waste water - untreated: 11000; measured
- chemical oxygen demand: 12.6; calculated
- Suspended solids, unspecified,Suspended solids, unspecified: 1.39; calculated
- lead: 1.01e-5; calculated
- mercury: 2.12e-7; calculated
- fluorine: 1.91e-6; calculated
- cadmium: 3.75e-7; calculated
- arsenic: 8.65e-6; calculated

## Use advice
When utilizing this LCA data, users must pay close attention to the energy allocation amongst various processing stages in the dyeing and finishing of cotton fabrics. The reported coal consumption ratio for steam and conduction oil boilers should be accounted for in the use of coal as an energy source. Additionally, it is crucial to consider that this data is based on specific operations of a survey enterprise located in Changshu, within the Yangtze River Delta Economic Zone in Jiangsu Province. Users must consider regional energy mix and technology levels, and, if needed, adjust the data to reflect local or specific production conditions. Recycling and end-of-life scenarios are not included in this data set, and users need to handle these aspects separately as per their LCA study requirements.

## Review details
Inventory: The internal review was done by several iteration steps concerning raw data validation, raw data documentation, representativity, completeness and consistency of modelling with regard to ISO 14040 and 14044.

## Data sources
- 朱亚楠. 棉布连续轧染工艺生命周期环境影响评价. (南京大学, 2012).
