# cement production;cement, portland-composite cement;new dry process, 4500 t/d;mixed solid wastes

Dataset: ILCD process, Unit process, black box
Geography: CN
Reference year: 2012
Classification: Unit processes / Materials production / Other mineralic materials
Generated by: #REF!, ysqsophia@gmail.com
Owner: Tiangong LCI Data Working Group
Review: Dependent internal review by Tiangong LCI Data Working Group
Amounts: no units in this file; such an amount is in the reference unit of its flow, which a separate flow dataset defines
copyright: false
licenseType: Free of charge for all users and uses

## General comment
The company is equipped with a 4500t/d new dry process cement clinker production line.

## Geography
A cement plant in Northeast China

## Technical purpose
The industrial process data describes the production of Portland-composite cement using a new dry process with a capacity of 4500 tonnes per day, integrating mixed solid waste utilization. This type of cement is typically used in various construction activities including residential, commercial, and infrastructure projects, given its versatility and performance characteristics.

## Model description
The system boundary is the cement production system of the cement plant.

## Reference product
- cement, portland-composite cement: 1000
  Cement products

## Inputs
- limestone, crushed, for mill: 1140.24
  Limestone
- shale: 18.4146
  Shale
- silica stone: 17.8049
  Silica
- iron, powder: 31.8293
  Iron powder
- gypsum stone (CaSO4-dihydrate): 56.5244
  Gupsum
- ash: 134.756
  Fly ash
- blast furnace slag: 215.244
  Blast furnace slag
- hard coal; 26.3 MJ/kg: 109.39
  Coal. Annual coal consumption energy = (1.794E+8) kg x (2.149E+7) J/kg (average lower heating value) = (3.86E+15) J.
- Diesel oil: 4.42683
  Diesel. Diesel = (7.260E+6) kg x (46.04) MJ/kg (combustion value) = (3.34E+8) MJ.
- Electricity: 330.585
  Total electricity consumption. Annual electricity consumption energy = (1.506E+8) kWh x (3.60E+6) J/kWh = (5.42E+14) J.
- tap water: 251.22
  The original text refers to total water consumption, which includes tap water.

## Outputs
- carbon dioxide (fossil): 896.341
  CO2
- sulfur dioxide: 0.337805
  SO2
- Nitrogen oxides: 1.13415
  NOx
- particles (> PM10): 0.878049
  Dust, with an unspecified particle size, is treated as PM > 10 micrometers in diameter.

## Use advice
This dataset should be applied with consideration to the specific regional context of cement manufacturing in Northeast China. Users must note the integration of mixed solid wastes in the production process, which may impact the environmental profile. The technological scope covers the cement production system within the cement plant's boundary. When using this data for Life Cycle Assessment (LCA), ensure the system boundaries and technological assumptions align with the study's goals. Special attention should be given to the allocation of environmental impacts due to mixed solid waste utilization.

## Review details
Inventory: The internal review was done by several iteration steps concerning raw data validation, raw data documentation, representativity, completeness and consistency of modelling with regard to ISO 14040 and 14044.

## Data sources
- 邵帅. (2016). 基于Emergy和Em-LCA的水泥企业可持续发展水平评价 [硕士, 大连理工大学].
