# Aluminum electrolytic capacitor production ; separator paper ; separator paper slitting ; separator paper rolls

Dataset: ILCD process, Unit process, single operation
Geography: JS-CN
Reference year: 2020
Classification: Unit processes / Materials production / Other materials
Generated by: Huimin Chang, huiminchang@tsinghua.edu.cn
Owner: Tiangong LCI Data Working Group
Review: Dependent internal review by Tiangong LCI Data Working Group
Amounts: no units in this file; such an amount is in the reference unit of its flow, which a separate flow dataset defines
copyright: false
licenseType: Free of charge for all users and uses

## General comment
分隔纸分切 ; 铝电解电容器 (AEC) 生产 ; 420V 680uf

## Time period
The investigated manufacturer produced about 1.183 billion AECs of all kinds in 2020.

## Technical purpose
The production data described pertains to aluminum electrolytic capacitors (AECs) intended for usage in a variety of electronics that require stable and reliable energy storage, such as power supply filters and signal coupling. Specifically, the AECs produced use a 420V 680uf configuration, suitable for high-voltage applications. The separator paper is a critical component in AEC production, contributing to the capacitor's overall performance and durability.

## Reference product
- Separator paper: 110.868; measured
  Separator paper [kg]

## Inputs
- electricity, high voltage, aluminium industry: 6.588; measured
  Electricity [kWh]
- Separator Paper Coil,Separator Paper Coil: 115.488; measured
  Separator paper coil [kg]

## Outputs
- waste paper, sorted: 4.62; measured
  Scraps of separator paper [kg]

## Data selection and combination
The inventory data of capacitor production come from the AECs’ production factory in Jiangsu Province, China. The cut-off criteria of LCI data collection for each process is coverage of at least 95% of the mass and energy of the input and output flows. The inventory data of anode foil production and cathode foil production is obtained based on the analysis of the manufacturing processes and corresponding process parameters. The upstream data (i.e., aluminum ingots, separator paper, transport, electricity, and water) are acquired from the Gabi software (Version: 10.6.1.35). In detail, the profile of Chineses electricity grid from the China Electric Power Yearbook adopts the reference year 2016. The reference year of aluminum ingot production is 2015. The inaccessible data about ammonium citrate, ammonium pentaborate, NH4H2PO4, and HBO3 are estimated based on chemical equations using the existing materials (reactants) in the Gabi software. The use and end-of-life stage inventory data are obtained based on analysis and calculation.

## Use advice
This set of data should be employed with the context that it reflects the conditions and technologies of aluminum electrolytic capacitor production within a Chinese manufacturing context as of the reference years 2015 for aluminum ingot production, and 2016 for the Chinese electricity grid. Users should update the data on aluminum ingots and electricity if newer or region-specific data is available. The cut-off criteria for Life Cycle Inventory (LCI) data collection signifies at least 95% mass and energy coverage of input and output flows. Users modeling the production should account for this threshold in their assessment. Certain data have been estimated through chemical equations and should be verified with actual industrial data when available. Use phase and end-of-life stage data should also be incorporated into LCA models as per specific application and regulatory requirements.

## Review details
Inventory: The internal review was done by several iteration steps concerning raw data validation, raw data documentation, representativity, completeness and consistency of modelling with regard to ISO 14040 and 14044.

## Data sources
- Zhang, C., Jing, J., Yun, L., Zheng, Y. & Huang, H. A cradle-to-grave life cycle assessment of high-voltage aluminum electrolytic capacitors in China. J. Clean. Prod. 370, (2022).
