# clinker production|clinker, sulpho-aluminate cement clinker|carbide slag

Dataset: ILCD process, 碳排放因子（LCI结果）
Geography: CN
Reference year: 2022
Classification: Materials production / Other mineralic materials
LCI method principle: Other
Generated by: Siqi Yang
Amounts: no units in this file; such an amount is in the reference unit of its flow, which a separate flow dataset defines
copyright: false

## General comment
Prepare sulpho-aluminate cement clinker using calcium carbide slag, low-quality bauxite, limestone, and gypsum as raw materials.

## Model description
The functional unit is unknown and is presumed to be 1t of clinker based on literature data. The whole life cycle of cement production includes the extraction of raw materials and the entire process of producing cement from raw materials. In the process of cement production, the "two grindings and one burning" of the cement production process and the consumption of various fuels (mainly coal) directly output carbon dioxide to the environment, as well as the indirect output of carbon dioxide to the environment from the electricity consumed by cement production.

## Reference product
- clinker, sulpho-aluminate cement clinker: 1000
  Sulfate aluminum cement clinker (SAC)

## Inputs
All rows: article inperiodical
- Carbide slag: 750
- bauxite: 494
  Bauxite
- calcium carbonate: 635000
  Limestone
- gypsum: 280
  Gupsum
- hard coal: 118
  Coal consumption
- electricity, medium voltage: 374.4
  Power consumption

## Outputs
- carbon dioxide: 711.12; estimated
  Carbon emissions. Referring to the Greenhouse Gas Emissions Assessment Specification (PAS2050:2008) for products and services in their lifecycle and the National Greenhouse Gas Inventory Guidelines provided by the Intergovernmental Panel on Climate Change (IPCC), simplified LCA method is used to calculate the carbon emissions of the above-mentioned cement materials using carbon emission factors (the carbon emissions factors involved and the quality of carbon footprint are all based on CO2 mass).

## Cut-off and completeness
Only focus on the carbon footprint of cement clinker production.

## Data treatment and extrapolations
Carbon emission value: CO2 mass, cumulative carbon footprint data for unit processes.

## Data sources
- 光文涛, 隋晓萌, 王鹏刚, 田砾, & 赵明海. (2022). 采用固废制备的高贝利特硫铝酸盐水泥碳足迹核算与分析. 青岛理工大学学报, 43(4), 34–40.
