# clinker production|clinker, portland cement clinker, 52.5MPa|fly ash 4%

Dataset: ILCD process, LCI结果
Geography: CN
Classification: Materials production / Other mineralic materials
Generated by: Siqi Yang
Amounts: no units in this file; such an amount is in the reference unit of its flow, which a separate flow dataset defines
copyright: false

## General comment
The company utilizes fly ash (at a substitution rate of 4%) to replace a portion of the raw materials in the production of cement clinker.

## Model description
Select 1 ton of cement clinker with a strength of 52.5 MPa as the functional unit. The "cradle-to-gate" system boundary is adopted. The system of producing cement clinker from natural minerals includes the acquisition and transportation of raw materials and the production process of cement clinker. The system boundary of the production of cement clinker by comprehensive utilization of fly ash also includes the upstream power generation system and the process of avoiding fly ash pile disposal process.

## Reference product
- clinker, portland cement clinker, 52.5MPa: 1000
  Fly ash clinker, 52.5MPa

## Inputs
All rows: measured
- limestone, crushed, for mill: 1280
  Limestone
- wastewater, unpolluted: 109
  Sandstone
- iron, powder: 51
  Iron powder
- ash: 60
  Fly ash. The lifecycle inventory data for fly ash production process is obtained from literature.
- hard coal, run-of-mine: 156
  Raw coal
- electricity, medium voltage: 138.24
  Electricity

## Outputs
All rows: measured
- carbon dioxide: 836
  CO2
- Nitrogen oxides: 1.44
  NOx
- sulfur dioxide: 0.773
  SO2
- carbon monoxide: 0.34
  CO
- methane: 1.56
  CH4
- non-methane volatile organic compounds: 0.121
  NMVOC

## Deviations from the LCI method approaches
The inventory data for the extraction, energy production, transportation, fly ash disposal, and other processes of limestone, clay, sandstone, and other raw materials are sourced from the Ecoinvent database.

## Data sources
- 邵亦白, 刘宇, 郑焱, 任品桥, & 杜世伟. (2022). 利废水泥熟料产品系统的生命周期清单分析方法及应用. 中国水泥, 11, 59–62.
