# PP production;PP

Dataset: ILCD process, Unit process, black box
Geography: CN
Reference year: 2020
Classification: Unit processes / Materials production / Organic chemicals
Functional unit: considering 1 kg resin production as the functional unit.
Generated by: Huijuan Guo, GHJ@email.ncu.edu.cn
Owner: Tiangong LCI Data Working Group
Review: Dependent internal review by Tiangong LCI Data Working Group
Amounts: no units in this file; such an amount is in the reference unit of its flow, which a separate flow dataset defines
copyright: false
licenseType: Free of charge for all users and uses

## General comment
Ethylene and propylene were obtained by early-stage crude oil refining and then polymerized to PE and PP, respectively.

## Geography
Process-based data from China were used, yet if not available, data from Europe were applied instead.

## Time period
Process-based data from China were used, yet if not available, data from Europe were applied instead. The electricity input was developed based on the national grid structure in China (Table S3), which was obtained from the share of the electric power structure in 2020 (National Bureau Statistics of China, 2020).

## Technical purpose
Polypropylene (PP) resin produced by this process is utilized for a variety of applications, such as packaging, automotive components, consumer goods, and medical devices. The material's versatility stems from its properties, such as resistance to fatigue, chemical solvents, bases, and acids. Given its production process involves polymerization of propylene, which is derived from early-stage crude oil refining, this PP can be considered for usages requiring high purity and consistency.

## Model description
life cycle environmental and human health impacts were modeled using SimaPro software (version 8.5) with Ecoinvent 3 and ELCD (European Reference Life Cycle Database) databases.

## Reference product
- polypropylene granulate (PP): 1; missing unimportant
  PP

## Inputs
- propene (propylene): 1.05; missing unimportant
  Propylene
- naphtha: 1.64; missing unimportant
- Process water: 0.00234; missing unimportant
  Processed water
- Electricity: 4; missing unimportant

## Outputs
All rows: missing unimportant
- carbon dioxide (fossil): 1.21
  原文未区分bio和fossil，根据专家判断此处为fossil
- nitrogen: 0.037
- sulfur dioxide: 0.0121
- chemical oxygen demand: 0.00014
- chloroform: 1.5e-7
- toluene: 4.6e-6
- benzene: 0.0015
- 1,1,2-trichloroethane: 0.0058
  Trichloroethane
- Waste (unspecified): 5.53
- particles (>PM10): 0.0025
- Volatile Organic Compounds (VOCs): 0.00277

## Data treatment and extrapolations
ReCiPe method (Europe H/H) was used as the assessment method for consistency.

## Use advice
When using this PP production data set, ensure to adapt the data to reflect specific regional energy mixes if applying to areas outside of China or Europe, since the electricity input for the data set is based on the national grid structure of China and European benchmarks. Always use the specified functional unit of 1 kg resin for calculating the environmental impacts to maintain consistency. Be aware that the ReCiPe method (Europe H/H) was employed for assessment and consider this when comparing with studies using different impact assessment methods. If integrating with other LCA databases, make sure they are compatible with SimaPro (version 8.5), Ecoinvent 3, and ELCD for accurate modeling.

## Review details
Inventory: The internal review was done by several iteration steps concerning raw data validation, raw data documentation, representativity, completeness and consistency of modelling with regard to ISO 14040 and 14044.

## Data sources
- An, J., Wu, F., Wang, D. & You, J. Estimated material metabolism and life cycle greenhouse gas emission of major plastics in China: A commercial sector-scale perspective. Resources, Conservation and Recycling 180, (2022).
