# Electricity production ; Electricity mix ; Guizhou

Dataset: ILCD process, Unit process, single operation
Geography: GZ-CN
Reference year: 2019
Classification: Unit processes / Energy carriers and technologies / Electricity
Generated by: Ruoxi Xiong, xiongrx0126@163.com
Owner: Tiangong LCI Data Working Group
Review: Dependent internal review by Tiangong LCI Data Working Group
Amounts: no units in this file; such an amount is in the reference unit of its flow, which a separate flow dataset defines
copyright: false
licenseType: Free of charge for all users and uses

## General comment
Electricity mix includes thermal, hydro, wind, nuclear and solar generation

## Technical purpose
This dataset represents the mixed electricity generation in Guizhou, which can be utilized in various sectors requiring electricity. The electricity mix is composed of thermal (coal, gas, oil), hydro, wind, nuclear, and solar power generation processes. This mix is indicative of the energy used for residential, commercial, industrial, and transportation sectors within the region.

## Reference product
- Electricity: 3.6; missing unimportant
  [{'text': '能量', 'type': 'text'}]

## Inputs
All rows: missing unimportant
- electricity for thermal power: 2.21686
  [{'text': '能量', 'type': 'text'}]
- electricity from hydroelectric power plant: 1.2268
  [{'text': '能量', 'type': 'text'}]
- electricity for nuclear power: 0
  [{'text': '能量', 'type': 'text'}]
- electricity from wind power: 0.124434
  [{'text': '能量', 'type': 'text'}]
- electricity for solar power: 0.0319068
  [{'text': '能量', 'type': 'text'}]

## Use advice
When employing this data set for life cycle assessment or carbon footprint calculations, users should consider the specific energy structure of the electricity mix in Guizhou. It is important to account for the regional differences in electricity generation sources when comparing with other regions or assessing product life cycles. The temporal relevance of the data should also be considered, as the energy mix can change over time. Users should update the dataset to reflect the most current energy mix if available and ensure the technological applicability to their specific case study.

## Review details
Inventory: The internal review was done by several iteration steps concerning raw data validation, raw data documentation, representativity, completeness and consistency of modelling with regard to ISO 14040 and 14044.

## Data sources
- 能源统计年鉴2020
