# Low pressure absorption tower exhaust gas ; Acetic acid ; Methanol ; Methanol carbonylation to acetic acid ; All sizes; NESPS2 / 低压吸收塔尾气 ; 醋酸 ; 甲醇 ; 甲醇羰基化制醋酸 ; 所有规模 ; 全国第二次污染普查数据

Dataset: ILCD process, Unit process, single operation
Geography: CN
Reference year: 2019
Classification: Reference Parameters / Energy carriers and technologies / Other non-renewable fuels
Generated by: The data was created by the Office of the Second National Pollution Source Census of the Ministry of Ecology and Environment, and the data was organized by the TianGong Plan team for ILCD format / 生态环境部第二次全国污染源普查工作办公室创建数据，天工计划团队常慧敏整理数据为ILCD格式
Owner: Tiangong LCI Data Working Group / 天工LCI数据工作小组
Review: Dependent internal review by Tiangong LCI Data Working Group / 天工LCI数据工作小组
Amounts: no units in this file; such an amount is in the reference unit of its flow, which a separate flow dataset defines
copyright: false
licenseType: Free of charge for all users and uses

## General comment
the Technical of end-of-pipe management technology for pollution Exhaust gasis/，Its Technical efficiency of end-of-pipe management0

## Technical purpose
所描述的工艺是一个甲醇羰基化设施，旨在各种规模上生产醋酸。低压吸收塔用于管理来自反应的尾气。这种工业设置适用于生产高纯度醋酸，这是食品防腐剂、溶剂制造和乙烯醋酸酯单体生产的关键成分，后者用于制造粘合剂和油漆。此外，为了遵守环保法规，还实施了包括直接燃烧（焰火）和直接燃烧（不带加热炉）的末端管控技术，用于管理挥发性有机化合物(VOC)排放。

## Reference product
- acetic acid: 1000; calculated
  源文件中描述为为醋酸，此处对其进行了匹配工作，将其匹配到LCAflow库里面相最符合的流，污染物指标备注为工业废气量

## Outputs
- volatile organic compound: 0; calculated
  the Technical of end-of-pipe management technology for pollution volatile organic compoundisDirect combustion method (remove torch)，Its Technical efficiency of end-of-pipe management100
  污染物指标挥发性有机物的末端治理技术是直接燃烧法（去火炬），其效率为100。原文件中描述污染物类别为废气，污染物指标为挥发性有机物，此处对其进行了匹配工作，将其匹配到LCAflow库里面相最符合的流，污染物指标备注为挥发性有机物
- volatile organic compound: 0.00837; calculated
  the Technical of end-of-pipe management technology for pollution volatile organic compoundisDirect combustion method (remove heating furnace)，Its Technical efficiency of end-of-pipe management97
  污染物指标挥发性有机物的末端治理技术是直接燃烧法（去加热炉），其效率为97，末端治理设施实际运行率（k值）计算公式为k=处理设施运行时间(小时/年)/正常生产时间(小时/年)。原文件中描述污染物类别为废气，污染物指标为挥发性有机物，此处对其进行了匹配工作，将其匹配到LCAflow库里面相最符合的流，污染物指标备注为挥发性有机物
- Exhaust gas: 17.4; calculated
  the Technical of end-of-pipe management technology for pollution Exhaust gasis/，Its Technical efficiency of end-of-pipe management0
  污染物指标工业废气量的末端治理技术是/，其效率为0。原文件中描述污染物类别为废气，污染物指标为工业废气量，此处对其进行了匹配工作，将其匹配到LCAflow库里面相最符合的流，污染物指标备注为工业废气量

## Use advice
This dataset is derived from the Pollution Source Census Report and contains information on pollution emissions and related products. However, it does not include data on energy or chemical consumption, nor does it provide information on waste or co-product generation. When utilizing this dataset, please supplement the missing data based on actual conditions before use
该数据集来源于污染源普查报告，包含污染物排放及相关产品信息，但不包含能源或化学品消耗数据，也不提供废弃物或共生产物产生信息。在使用该数据集时，请根据实际情况补充缺失数据后再使用。

## Review details
Inventory: The internal review was done by several iteration steps concerning raw data validation, raw data documentation, representativity, completeness and consistency of modelling with regard to ISO 14040 and 14044.
清单： 内部审查通过几个迭代步骤完成，涉及原始数据验证、原始数据记录、代表性、完整性、与 ISO 14040 和 14044 有关的建模的一致性。

## Data sources
- 第二次全国污染源普查产排污核算系数手册（试用版）,二级代码26,四级代码2614文件，在完整版文件中第4111页
