# Groundwater remediation ; In-situ remediation ; Adsorption ; Disposal of spent adsorbents ; Brick manufacturing

Dataset: ILCD process, Unit process, single operation
Geography: ID
Reference year: 2022
Classification: Unit processes / Other Services / Repair and maintenance
Generated by: Xiao Meng, xiaomeng@mail.bnu.edu.cn
Owner: Tiangong LCI Data Working Group
Review: Dependent internal review by Tiangong LCI Data Working Group
Amounts: no units in this file; such an amount is in the reference unit of its flow, which a separate flow dataset defines
copyright: false
licenseType: Free of charge for all users and uses

## General comment
The disposal of spent adsorbents is managed by immobilizing them in bricks using 90% clay.

## Technical purpose
The process described is intended for the management of disposed spent adsorbents through their integration into the manufacturing of bricks. By mixing the spent adsorbents with 90% clay, they can safely be immobilized and repurposed in brick products. This integration primarily serves the construction industry, providing an eco-friendly solution for brick manufacturing while simultaneously addressing groundwater contamination issues through the in-situ remediation method.

## Reference product
- Aluminium hydroxide/oxide nanoparticles adsorption (Spent; waste): 3.06; input; measured
  Spent adsorbent

## Inputs
- clay: 27.54; measured
- Tap Water: 6; measured

## Outputs
- Brick: 30.6; measured

## Use advice
When utilizing this data set for life cycle assessment, users should note the integration of spent adsorbents in the brick manufacturing process. Special attention should be given to the quantification of environmental benefits from the diversion of waste from landfills to a productive use in brick making. Additionally, it is important to consider the technological feasibility and regional legality of recycling spent adsorbents in construction materials, as well as to adequately address any potential leaching of contaminants from the bricks into the environment during their use.

## Review details
Inventory: The internal review was done by several iteration steps concerning raw data validation, raw data documentation, representativity, completeness and consistency of modelling with regard to ISO 14040 and 14044.

## Data sources
- Goyal, H. & Mondal, P. Life cycle assessment (LCA) of the arsenic and fluoride removal from groundwater through adsorption and electrocoagulation: A comparative study. Chemosphere 304, 135243 (2022).
