# Gold ; Anode clay ; Anode slime gold extraction (pyrogenic process + wet process) ; All sizes; NESPS2 / 金 ; 阳极泥 ; 阳极泥提金（火法+湿法） ; 所有规模 ; 全国第二次污染普查数据

Dataset: ILCD process, Unit process, single operation
Geography: CN
Reference year: 2019
Classification: Reference Parameters / Materials production / Metals and semimetals
Generated by: The data was created by the Office of the Second National Pollution Source Census of the Ministry of Ecology and Environment, and the data was organized by the TianGong Plan team for ILCD format / 生态环境部第二次全国污染源普查工作办公室创建数据，天工计划团队常慧敏整理数据为ILCD格式
Owner: Tiangong LCI Data Working Group / 天工LCI数据工作小组
Review: Dependent internal review by Tiangong LCI Data Working Group / 天工LCI数据工作小组
Amounts: no units in this file; such an amount is in the reference unit of its flow, which a separate flow dataset defines
copyright: false
licenseType: Free of charge for all users and uses

## General comment
the Technical of end-of-pipe management technology for pollution Exhaust gasis/

## Technical purpose
该数据集描述了阳极泥在提取黄金中的使用，包括热法和湿法两种过程，适用于所有规模的生产设施。这种材料通常用于贵金属回收和精炼领域。此外，数据包括用于控制废气、颗粒物（具体为 PM2.5 - PM10）、二氧化硫、氮氧化物、铅和砷污染的末端管理技术，如布袋过滤器、文丘里和静电除雾器，其效率各不相同。

## Reference product
- Anode sludge: 1000; input; calculated
  源文件中描述为为阳极泥，此处对其进行了匹配工作，将其匹配到LCAflow库里面相最符合的流，污染物指标备注为工业废气量

## Outputs
All rows: calculated
- particles (PM2.5 - PM10): 0.8587
  the Technical of end-of-pipe management technology for pollution particles (PM2.5 - PM10)isBag filter, Venturi + electrostatic-demister，Its Technical efficiency of end-of-pipe management99
  污染物指标颗粒物的末端治理技术是布袋除尘、文丘里+电除雾，其效率为99，末端治理设施实际运行率（k值）计算公式为k=废气治理设施年正常运行时间（小时）/企业年正常生产时间（小时）。原文件中描述污染物类别为废气，污染物指标为颗粒物，此处对其进行了匹配工作，将其匹配到LCAflow库里面相最符合的流，污染物指标备注为颗粒物
- Nitrogen oxides: 4.935
  the Technical of end-of-pipe management technology for pollution Nitrogen oxidesisAlkali absorption，Its Technical efficiency of end-of-pipe management30
  污染物指标氮氧化物的末端治理技术是碱吸收，其效率为30，末端治理设施实际运行率（k值）计算公式为k=废气治理设施年正常运行时间（小时）/企业年正常生产时间（小时）。原文件中描述污染物类别为废气，污染物指标为氮氧化物，此处对其进行了匹配工作，将其匹配到LCAflow库里面相最符合的流，污染物指标备注为氮氧化物
- sulfur dioxide: 9.813
  the Technical of end-of-pipe management technology for pollution sulfur dioxideisAlkali absorption，Its Technical efficiency of end-of-pipe management90
  污染物指标二氧化硫的末端治理技术是碱吸收，其效率为90，末端治理设施实际运行率（k值）计算公式为k=废气治理设施年正常运行时间（小时）/企业年正常生产时间（小时）。原文件中描述污染物类别为废气，污染物指标为二氧化硫，此处对其进行了匹配工作，将其匹配到LCAflow库里面相最符合的流，污染物指标备注为二氧化硫
- arsenic: 0.0159
  the Technical of end-of-pipe management technology for pollution arsenicisBag filter, Venturi + electrostatic-demister，Its Technical efficiency of end-of-pipe management99
  污染物指标砷及其化合物的末端治理技术是布袋除尘、文丘里+电除雾，其效率为99，末端治理设施实际运行率（k值）计算公式为k=废气治理设施年正常运行时间（小时）/企业年正常生产时间（小时）。原文件中描述污染物类别为废气，污染物指标为砷及其化合物，此处对其进行了匹配工作，将其匹配到LCAflow库里面相最符合的流，污染物指标备注为砷及其化合物
- lead: 0.0227
  the Technical of end-of-pipe management technology for pollution leadisBag filter, Venturi + electrostatic-demister，Its Technical efficiency of end-of-pipe management99
  污染物指标铅及其化合物的末端治理技术是布袋除尘、文丘里+电除雾，其效率为99，末端治理设施实际运行率（k值）计算公式为k=废气治理设施年正常运行时间（小时）/企业年正常生产时间（小时）。原文件中描述污染物类别为废气，污染物指标为铅及其化合物，此处对其进行了匹配工作，将其匹配到LCAflow库里面相最符合的流，污染物指标备注为铅及其化合物
- Exhaust gas: 61339
  the Technical of end-of-pipe management technology for pollution Exhaust gasis/
  污染物指标工业废气量的末端治理技术是/，末端治理设施实际运行率（k值）计算公式为k=废气治理设施年正常运行时间（小时）/企业年正常生产时间（小时）。原文件中描述污染物类别为废气，污染物指标为工业废气量，此处对其进行了匹配工作，将其匹配到LCAflow库里面相最符合的流，污染物指标备注为工业废气量

## Use advice
This dataset is derived from the Pollution Source Census Report and contains information on pollution emissions and related products. However, it does not include data on energy or chemical consumption, nor does it provide information on waste or co-product generation. When utilizing this dataset, please supplement the missing data based on actual conditions before use
该数据集来源于污染源普查报告，包含污染物排放及相关产品信息，但不包含能源或化学品消耗数据，也不提供废弃物或共生产物产生信息。在使用该数据集时，请根据实际情况补充缺失数据后再使用。

## Review details
Inventory: The internal review was done by several iteration steps concerning raw data validation, raw data documentation, representativity, completeness and consistency of modelling with regard to ISO 14040 and 14044.
清单： 内部审查通过几个迭代步骤完成，涉及原始数据验证、原始数据记录、代表性、完整性、与 ISO 14040 和 14044 有关的建模的一致性。

## Data sources
- 第二次全国污染源普查产排污核算系数手册（试用版）,四级代码3221文件，在完整版文件中第5074页
