# Planting site ; Soil in-situ remediation ; Phytoextraction ; Engineering implementation ; Planting

Dataset: ILCD process, Unit process, single operation
Geography: IT
Reference year: 2021
Classification: Unit processes / Other Services / Repair and maintenance
Generated by: Xiao Meng, xiaomeng@mail
Owner: Tiangong LCI Data Working Group
Review: Dependent internal review by Tiangong LCI Data Working Group
Amounts: no units in this file; such an amount is in the reference unit of its flow, which a separate flow dataset defines
copyright: false
licenseType: Free of charge for all users and uses

## General comment
This in-situ reclamation technology exploits trees and herbaceous plants for the removal of various types of contaminants. Organic contaminants can undergo biochemical phytodegradation, while phytoextraction of heavy metals leads to an accumulation of toxic species in the roots and leaf systems; for contaminants that cannot be extracted, radical stabilization can take place.

## Geography
The site taken as a reference for the remediation is an area of 712 m2 located in a disused industrial district of Tuscany (Italy), in the past subjected to various productive activities that led to contamination with various metals, some of which potentially toxic such as lead (Pb), arsenic (As) and thallium (Tl). As it is a “site of national interest”, its exact location is considered confidential and cannot be disclosed.

## Technical purpose
This in-situ soil remediation technology is designed for application in contaminated land areas, specifically to decontaminate sites with a history of industrial use where soil is polluted with organic contaminants and heavy metals such as lead (Pb), arsenic (As), and thallium (Tl). It involves the use of trees and herbaceous plants for phytoremediation via phytodegradation and phytoextraction to remove or stabilize pollutants within the site without the need to excavate and transport contaminated soil.

## Reference product
- Planting site: 712; measured
  植物种植完成的场地

## Inputs
All rows: measured
- Urea: 14.24
  nitrogen fertilizer
- Phosphorus Pentoxide: 11.39
  肥料-P2O5（phosphoric acid anhydride）
- potassium oxide: 7.12
  肥料-K2O（potassium oxide）
- EDTA: 61
  土壤改良剂-EDTA
- Potassium phosphate: 1261
  土壤改良剂-K3PO4
- Seed of H. annuus: 1.14
  种子-H. annuus
- Seed of L. albus: 14.24
  种子-L. albus
- Seed of B. juncea: 1.14
  种子-B. juncea
- Tap Water: 384.48

## Use advice
When applying the provided LCA data of this soil remediation process, users should: 1) Ensure the application context matches the reference site conditions, with respect to contaminant types and soil characteristics. 2) Consider the efficiency of phytoremediation for specific contaminants present at their site of interest, as not all contaminants can be effectively stabilized or extracted. 3) Be aware that the exact site location for the reference dataset is confidential and cannot be disclosed. Caution should be taken when extrapolating data to different locations with differing environmental factors.

## Review details
Inventory: The internal review was done by several iteration steps concerning raw data validation, raw data documentation, representativity, completeness and consistency of modelling with regard to ISO 14040 and 14044.

## Data sources
- Vocciante, M., De Folly D’Auris, A., Franchi, E., Petruzzelli, G. & Ferro, S. CO2 footprint analysis of consolidated and innovative technologies in remediation activities. J Clean Prod 297, 126723 (2021).
