# Soil Remediation;In-situ Remediation;Thermal Desorption;Case 2;Operation;Remediated Soil

Dataset: ILCD process, Unit process, single operation
Geography: FI
Reference year: 2017
Classification: Unit processes / Other Services / Repair and maintenance
Generated by: Wang Ning, wang_ning@caep.org.cn
Owner: Tiangong LCI Data Working Group
Review: Dependent internal review by Tiangong LCI Data Working Group
Amounts: no units in this file; such an amount is in the reference unit of its flow, which a separate flow dataset defines
copyright: false
licenseType: Free of charge for all users and uses

## General comment
Contaminated soil from excavation is fed into thermal desorption equipment while water is treated with chemicals

## Technology and included processes
The volume of uncontaminated soil excavated was 45,916 m3, and the power consumption of the thermal desorption equipment was 2,300 kw/h, running for 20 h per day for a total of 141 d, with a large amount of chemicals consumed.

## Technical purpose
This thermal desorption unit process is used for in-situ soil remediation. It involves the excavation of contaminated soil and the use of thermal desorption equipment to clean the soil, making it suitable for reuse or safe disposal. Additionally, water used in the process is treated with chemicals to remove contaminants. This process is typically employed for large-scale environmental cleanup projects where soil contamination poses a significant risk to health or the environment.

## Reference product
- Remediated soil: 45916; measured

## Inputs
All rows: measured
- Excavated soil,Excavated soil: 45916
- Electricity: 2.33496e7
- Polyaluminium Chloride,Polyaluminium Chloride: 16325
- Polyacrylamide,Polyacrylamide: 22926.6
- Water: 240484
- sodium hydroxide: 2350.47
- LPG - liquefied petroleum gas: 2.2958e6

## Use advice
When using the data set for life cycle assessment (LCA), it is important to take into account the specific conditions under which the thermal desorption process operates. Ensure that the volume of soil treated, the power consumption of the equipment, and the chemical usage align with the case being assessed. Consider site-specific factors impacting the efficiency and environmental performance of the process. Inclusion or exclusion of downstream impacts, such as the fate of excavated soil post-treatment and the treatment of water used in the process should be clearly justified within the LCA framework.

## Review details
Inventory: The internal review was done by several iteration steps concerning raw data validation, raw data documentation, representativity, completeness and consistency of modelling with regard to ISO 14040 and 14044.

## Data sources
- Song, Y. et al. Environmental and socio-economic sustainability appraisal of contaminated land remediation strategies: A case study at a mega-site in China. Science of The Total Environment 610–611, 391–401 (2018).
