# Bioethanol ; Ammonia-based

Dataset: ILCD process
Geography: GLO
Classification: Energy carriers and technologies / Renewable fuels
Generated by: Jiayi Yuan, jiayi_y@mail.bnu.edu.cn
Owner: Tiangong LCI Data Working Group
Review: Dependent internal review by Tiangong LCI Data Working Group
Amounts: no units in this file; such an amount is in the reference unit of its flow, which a separate flow dataset defines
licenseType: Free of charge for all users and uses

## General comment
This bioethanol is synthesized using an ammonia-based process. The bioethanol produced through this method is suitable for use as a renewable fuel alternative to gasoline. It may be blended with gasoline in various proportions or used in its pure form in flexible fuel vehicles. Furthermore, it is applicable in sectors requiring clean-burning fuel, such as the transportation industry, and could also serve as a feedstock in the production of chemicals and pharmaceuticals where ethanol is a precursor.

## Inputs
All rows: uniform; missing unimportant
- Electricity: 0
- heat: 2940; min 90.1; max 9310
- Electricity: 500.4; min 51.48; max 3672
- heat: 2380; min 383; max 9300
- Electricity: 417.6; min 121.32; max 1209.6

## Outputs
- heat: 442; max 3010; uniform; missing unimportant

## Use advice
Users of this data set should note the specific production process for this bioethanol when applying life cycle assessment (LCA) methodologies. Care should be taken to ensure the energy inputs, emissions, and byproducts specific to the ammonia-based synthesis process are accurately accounted for. It's important to include the agricultural inputs for the biomass used in production and to assess the impact of their cultivation. If data is used for policy-making or comparative assertions, users must conform to relevant standards such as ISO 14044, and should verify the geographical and technological relevance of the data to their specific situation.

## Review details
Inventory: The internal review was done by several iteration steps concerning raw data validation, raw data documentation, representativity, completeness and consistency of modelling with regard to ISO 14040 and 14044.
