# copper-based mixed waste recycling;Electrolytic copper;electrolysis process;Anode coppe

Dataset: ILCD process, Unit process, single operation
Geography: JX-CN
Reference year: 2020
Classification: Unit processes / Materials production / Metals and semimetals
Functional unit: We consider the functional unit of the recycling of copper-based mixed waste to be 1000 kg electrolytic copper.
LCI method principle: Attributional
LCI method approaches: Allocation - market value
Generated by: Peng Wang, 2867919560@qq.com
Owner: Tiangong LCI Data Working Group
Review: Dependent internal review by Tiangong LCI Data Working Group
Amounts: no units in this file; such an amount is in the reference unit of its flow, which a separate flow dataset defines
copyright: false
licenseType: Free of charge for all users and uses

## General comment
The data set represents a process for recycling copper-based mixed waste to produce high-purity electrolytic copper, which is sold as a refined product. Additionally, the process generates by-products such as residual electrodes for refining, anode mud for gold and silver recovery, and nickel carbonate, which is also sold. This process is typically used in the metal recycling industry to recover valuable metals from waste and is exemplified by a case in Jiangxi Province, China.

## Geography
The typical case is a metal recycling enterprise located in Jiangxi Province, China,

## Technology and included processes
he electrolytic process uses anode copper as the main raw material, electricity as the main source of energy, and sulfuric acid, hydrochloric acid, gelatin, and water as auxiliary materials to generate high-purity electrolytic copper for sale. residual electrode (returned to the refining process), anode mud (sent to the gold and silver recovery process), and nickel carbonate (for sale) products are also produced.

## Reference product
- Refined copper: 1000; measured
  copper (99%) needs to be replenished

## Inputs
All rows: measured
- Electricity: 900
- Black copper: 1200
  Blister copper
- Glue: 0.1
  Glue needs to be supplemented
- hard coal,hard coal,hard coal: 100
  Hard coal
- Hydrochloric acid: 0.07
  Hydrochloric acid (32%) needs to be supplemented
- Sulfuric acid(98%): 8.3
  Sulfuric acid(98%) needs to be supplemented with resourse
- transport in t*km,transport in t*km: 2.71175
  Transport
- water: 343.5
  Water

## Outputs
- Anode sludge: 15; measured
  Anode sludge needs to be supplemented
- Anode copper: 210; measured
  Anode copper needs to be supplemented
- Nickel sulfate: 15; measured
  Nickel sulfate needs supplementation
- water vapour: 329.89; measured
  Water vapor

## Deviations from the LCI method approaches
Using the LCA-ReCiPe 2016 (Heijungs et al., 2017) characterization and normalization method (the midpoint and endpoint method), the life cycle inventory is converted into impact scores in multiple fields.

## Data selection and combination
foreground data and background data.

## Data treatment and extrapolations
GaBi 9.0 software is adopted to calculate the inventory, resource consumption, and waste emissions of the various copper-based mixed-waste recovery processes per unit mass.

## Use advice
Users of this data set should incorporate it within a Life Cycle Assessment framework using the GaBi 9.0 software. It is essential to include both foreground and background data when calculating the inventory, resource consumption, and waste emissions of the electrolysis process per unit mass of copper-based mixed waste recycling output. The impact assessment should employ the LCA-ReCiPe 2016 methodology for characterizing and normalizing life cycle inventory data. Furthermore, the functional unit for the data use should be maintained at 1000 kg of electrolytic copper to ensure consistency with the data set's basis.

## Review details
Inventory: The internal review was done by several iteration steps concerning raw data validation, raw data documentation, representativity, completeness and consistency of modelling with regard to ISO 14040 and 14044.

## Data sources
- Zhang, W. et al. Analyzing the environmental impact of copper-based mixed waste recycling-a LCA case study in China. Journal of Cleaner Production 284, 125256 (2021).
