# Separation of acid leach of Rare Earth Elements (REE)s;Rare Earth Elements (REE);bastnaesite route;Rare Earth Elements (REE) containing ore

Dataset: ILCD process, Unit process, single operation
Geography: NMG-CN
Reference year: 2014
Classification: Materials production / Non-energetic raw materials
Functional unit: The functional unit of this study is the production of 1 kg of the basket REO from each corresponding mineralogical and processing route.
LCI method principle: Attributional
LCI method approaches: Allocation - market value
Generated by: Tao Wang, twang@iue.ac.cn
Owner: Tiangong LCI Data Working Group
Review: Dependent internal review by Tiangong LCI Data Working Group
Amounts: no units in this file; such an amount is in the reference unit of its flow, which a separate flow dataset defines
copyright: false
licenseType: Free of charge for all users and uses

## General comment
The rare earth elements (REEs) extracted from the described industrial process are utilized in various high-tech applications, including the production of powerful permanent magnets, hybrid vehicle batteries, fluorescent lamps, and electronics. Specifically, the acid leach separation process applied to bastnaesite route REE-containing ore is a critical step for isolating pure REE compounds necessary for these applications.

## Technology and included processes
In this study, the REE production system was analyzed from mining up to and including solvent extraction which contains product finishing processes such as precipitation and calcination

## Reference product
- Rare Earth chloride solution: 1; calculated
  RE Chloride

## Inputs
- Sodium carbonate: 1; calculated
  Soda ash
- transport in t*km,transport in t*km: 0.53, 9.54 (2 entries); calculated
- Hydrochloric acid: 1; calculated
- Rare Earth chloride solution: 1.77; calculated
  RE Chloride

## Outputs
- water: 0.00756; calculated
- Water (sea water from technosphere, waste water): 7.56; calculated

## Deviations from the LCI method approaches
In this study, the REE production system was analyzed from mining up to and including solvent extraction which contains product finishing processes such as precipitation and calcination (Fig. 1). The other categories assessed in the literature review were mineral type, radioactivity, waste treatment, and co-mining. For mineral type, it was noted that the mineralogy accounted for in each study was different, which makes comparison difficult. For radioactivity, we marked with an X those studies which exemplified radioactivity flows in the LCI (if provided). For waste, we distinguished those LCIs which quantified waste treatment flows. For co-mining, since all REE are co-products of each other, this column is meant to highlight the co-products in addition to REE.

## Use advice
When using this dataset for Life Cycle Assessment, ensure you account for variations in mineralogy and processing routes, as they can affect the environmental impacts of REE production. Studies pertaining to radioactivity should include radioactivity flows if available. Quantification of waste treatment flows in LCIs is essential due to the potential environmental impacts. Co-mining aspects have to be considered, highlighting the co-products obtained in addition to REE. The functional unit for comparison is the production of 1 kg of a basket of REO (Rare Earth Oxides) from the specified mineralogical and processing route.

## Review details
Inventory: The internal review was done by several iteration steps concerning raw data validation, raw data documentation, representativity, completeness and consistency of modelling with regard to ISO 14040 and 14044.

## Data sources
- Bailey, G. et al. Review and new life cycle assessment for rare earth production from bastnäsite, ion adsorption clays and lateritic monazite. Resources, Conservation and Recycling 155, 104675 (2020).
