# LIB Hydrometallurgy--Alkaline leaching(Process F)

Dataset: ILCD process, Unit process, single operation
Geography: CN
Reference year: 2013
Valid until: 2017
Classification: Unit processes / End-of-life treatment / Material recycling
Functional unit: FU is a typical type of LIB electrode material of 100 kg
Generated by: maqingyuan, m1120498928@163.com
Owner: Tiangong LCI Data Working Group
Review: Dependent internal review by Tiangong LCI Data Working Group
Amounts: no units in this file; such an amount is in the reference unit of its flow, which a separate flow dataset defines
copyright: false
licenseType: Free of charge for all users and uses

## General comment
The ammonia/ammonium salt system can leach Li, Ni and Co from the ternary cathode materials without leaching Mn and Al. The selectivity is good and the system is alkaline, so the amount of alkali can be saved in the recovery of the products by precipitation method.

## Time period
Data source: 2013-2017

## Technical purpose
The alkaline leaching process (Process F) in Hydrometallurgy is specialized for selective extraction of lithium (Li), nickel (Ni), and cobalt (Co) from ternary cathode materials without leaching manganese (Mn) and aluminum (Al). This process is mainly utilized in the recovery and recycling of critical metals from spent lithium-ion batteries (LIBs). Given its alkaline nature, the process enables conservation of alkali usage during the precipitation recovery of products.

## Reference product
- Electrolyte: 100; input; missing unimportant
  Electrode paste

## Inputs
All rows: missing unimportant
- Ammonia (25%): 217.7
- Ammonium Chloride: 59.1
  Ammonium salt
- Sodium sulfite: 76.2
- sodium hydroxide: 2
- water,water: 700
- natural gas,natural gas: 2.3
  Natural gas:8500 kCal,Unit：Nm3
- Electricity: 90

## Outputs
All rows: missing unimportant
- Lithium carbonate: 10.6
- Graphite: 18
  Graphite powder
- Al/Cu foil: 5.7
- Nickel salt: 13
  Ni salt、metal
- Cobalt salt: 15.8
  Co salt、metal
- Manganese salt: 18
  Mn salt、metal
- Ternary precursor: 12
- sodium sulfate: 70
- Slags: 5.6
- carbon dioxide (fossil): 7
  The original text does not distinguish between bio and fossil, and according to experts, it is fossil here
- waste water - treated: 690

## Data selection and combination
The input-output of the process comes from the average results of the data reported in the literature review, reflecting the representative process from "tomb" to "cradle". This study does not consider the recycling or treatment of plastic and metal shells, and labor costs, factory construction costs, and their impact on the environment are also not included in this analysis.

## Data treatment and extrapolations
It is worth noting that the EU's data is not specific to a specific industry, and some import and export data and recycling information are not suitable for China's situation. Therefore, the improved CRMs evaluation method also combines official Chinese data, literature reports, and data from other interest groups such as trade/industry associations to conduct the best estimation of data from major LIB manufacturers, recycling companies, official management agencies in China, and other stakeholders. In terms of data timeliness, the reference period used in the evaluation of CRMs is based on the latest 4-year average (i.e. 2013-2016).

## Use advice
Users leveraging this data set should note that recycling or treatment of plastic and metal shells is excluded from this analysis, as are labor costs, factory construction costs, and their environmental impact. This data is specific to conditions in China and may not represent the process in other countries. Users should consider time relevance as data represents an average from 2013-2017, and adjust for changes in technology or processes that have occurred since then. Stakeholders should integrate this data with information from LIB manufacturers, recyclers, and official Chinese agencies to ensure a comprehensive assessment. When applying this data, it is important to adhere to the methodological advice that encapsulates 'cradle to grave' processes.

## Review details
Inventory: The internal review was done by several iteration steps concerning raw data validation, raw data documentation, representativity, completeness and consistency of modelling with regard to ISO 14040 and 14044.

## Data sources
- 宋佳丽. 面向能源金属高效回收的资源关键性评价模型与应用. (天津大学, 2019).
