# Remediated soil ; Soil remediation ; In Situ Thermal Remediation ; Radio frequency heating (RFH)

Dataset: ILCD process, Unit process, black box
Geography: DK
Reference year: 2013
Classification: Unit processes / Other Services / Repair and maintenance
Functional unit: Results are presented per unit volume (1 m3 ) of soil remediated in order to compare results for each site.
Generated by: Yang Xintong, yangxt@caep.org.cn
Owner: Tiangong LCI Data Working Group
Review: Dependent internal review by Tiangong LCI Data Working Group
Amounts: no units in this file; such an amount is in the reference unit of its flow, which a separate flow dataset defines
copyright: false
licenseType: Free of charge for all users and uses

## General comment
From Table 1 of the literature (Overview of Test Sites Used as a Basis for Data Collection), it can be seen that, the area and volume of the small site are 180 m2 and 1175 m3. Mass of contaminant is 400 kg of PCE.

## Geography
The data collection for the LCA was conducted for a smaller (180 m2) site representing typical Danish sites where remediation using ISTD has been conducted.

## Technology and included processes
RFH uses specialized antennas, applied to a low-permeability contaminant source zone. soil is heated to around 100 °C to enhance the volatilization of the chlorinated solvents. In this study, the solvent vapors are assumed to be continuously extracted from the subsurface under vacuum and treated above ground in an activated carbon air filtration unit and, as a proportion of the extracted vapors also condense, the condensed aqueous phase is treated in a separate activated carbon water filtration unit. A vapor cap of 40 cm foam concrete is installed above the heated zone in order to prevent intrusion of rain, create a vapor-tight seal to the surface and to reduce heat loss to the atmosphere. All technologies require the installation of a number of wells to generate soil heating as well as extraction wells.

## Technical purpose
The remediation process described is intended for the treatment of contaminated soil through In Situ Thermal Remediation using Radio Frequency Heating (RFH). It is specifically applied to smaller sites, typical of Danish landscape, with areas measuring 180 m2. This soil treatment method is ideal for low-permeability contaminant zones and involves heating the soil to approximately 100°C to enhance the volatilization of pollutants such as perchloroethylene (PCE). The remediation employs wells for heating the soil and for extracting vapors, which are then treated with activated carbon filters.

## Reference product
- Remediated soil: 1175; estimated

## Inputs
All rows: estimated
- Road Transport,Road Transport: 1.3056e7
  Travel by car （personkm）
- transport in t*km: 53, 2006, 1752 (3 entries)
- Road Transport,Road Transport: 6000, 90000, 1.2e6 (3 entries)
- Electricity: 3.56699e6
- Diesel,Diesel: 6.855
- sand: 11794
- Mortar: 905
- Concrete: 41600
- Activated Carbon: 2646, 405 (2 entries)
- Carbon Steel: 3659
- Stainless Steel: 6422
- Copper and copper alloys: 140
- Aluminium and aluminium alloy products: 90
- Fiber glass: 219
- Polyethylene,Polyethylene: 791
- contaminated soil: 1175

## Use advice
When utilizing the dataset for Life Cycle Assessment, it is critical to consider energy and material usage, construction and transportation activities related to equipment and personnel within the remedial technology assessment. The data collection reflects the system boundaries of standard Danish remediation sites using ISTD with RFH and should be contextualized to similar environmental and technological scenarios. Key aspects such as well field materials, capping construction, air and water treatment systems, electricity consumption, and transportation impacts must be accurately represented and compared to alternative remediation methods.

## Review details
Inventory: The internal review was done by several iteration steps concerning raw data validation, raw data documentation, representativity, completeness and consistency of modelling with regard to ISO 14040 and 14044.

## Data sources
- Lemming G ,Nielsen G S ,Weber K , et al. Optimizing the Environmental Performance of In Situ Thermal Remediation Technologies Using Life Cycle Assessment [J]. Groundwater Monitoring & Remediation, 2013, 33 (3): 38-51.
