# Bio-based ethylene glycol production ; Ethylene glycol ; Hydrogen+Dimethyl oxalate synthesis ; Rice straw

Dataset: ILCD process, Unit process, black box
Geography: CN
Classification: Materials production / Organic chemicals
Functional unit: For the convenience of comparison, we use 1 ton of ethylene glycol product as a functional unit.
LCI method principle: Attributional
Generated by: Zirui Tang, tangzirui123@gmail.com
Owner: Tiangong LCI Data Working Group
Review: Dependent internal review by Tiangong LCI Data Working Group
Amounts: no units in this file; such an amount is in the reference unit of its flow, which a separate flow dataset defines
copyright: false
licenseType: Free of charge for all users and uses

## General comment
The production of 1 ton of ethylene glycol consumes 2.48 tons of biomass, 47.6 GJ of coal, and 3.8 GJ of electricity.

## Geography
The results of this paper provide a reference for decision making in the structure change of energy in China.

## Technology and included processes
The biomass raw material first enters the biomass gasification (BGS) unit with 95% oxygen produced by the air separation (ASU) unit. The cooled synthesis gas is divided into two streams: one stream enters the water gas shift (WGS) unit to increase the H2/CO ratio of the synthesis gas and the other stream is the unshifted syngas as the bypass stream to adjust the H2/CO to a suitable ratio. Acid gases, such as CO2 and H2S, are removed in the following acid gas removal (AGR) unit equipment. The clean synthesis gas enters the H2/CO separation (HCS) unit to obtain high-purity CO and H2 gas streams. In the DMO synthesis (DMOS) unit, the CO stream is used to produce the intermediate product dimethyl oxalate (DMO), and the hydrogen stream is compressed into the ethylene glycol synthesis (ECS) unit for the production of ethylene glycol.

## Technical purpose
This process describes the production of bio-based ethylene glycol, a chemical primarily employed as a raw material in the fabrication of polyester fibers, resins, and antifreeze solutions. The bio-based nature of this ethylene glycol process indicates its use as a more sustainable alternative to petrochemical-derived counterparts, aligning with eco-friendly initiatives in various industries such as textiles, packaging, and automotive.

## Reference product
- Ethylene glycol: 1000; article inperiodical

## Inputs
All rows: article inperiodical
- biomass; 14.7 MJ/kg: 2480
- Hard coal, at consumer EU-27: 47600
- Diesel: 2000
- Gasoline (regular): 139
- Electricity: 3800

## Outputs
All rows: article inperiodical
- carbon dioxide (fossil): -281
- methane (fossil): 31.4
- nitrous oxide: 0.11
- carbon monoxide: 14
- nitrogen monoxide: 3.85
- sulfur dioxide: 2.13
- particles (PM10): 3.74
- non-methane volatile organic compounds: 0.105

## Data selection and combination
The data of this article mainly come from research papers on similar topics and some technical reports. The data used are all checked and compared to ensure the accuracy of the research results. For the researched route, the basic input and output energy consumption and specific pollution discharge data in the specific process are collected, such as raw material consumption, life cycle energy consumption, direct pollution discharge, etc.

## Use advice
To utilize this data effectively, users should consider the methodological specificity of biomass and coal input, along with electricity consumption in the production of bio-based ethylene glycol, ensuring alignment with the principles of Life Cycle Assessment (LCA). Data users must account for regional energy mixes and confirm the alignment of this data with the geographic scope of their study to maintain environmental result consistency. Potential variations in the efficiency of the biomass gasification process and subsequent gas treatment units must also be taken into consideration when applying this data in environmental performance evaluation.

## Review details
Inventory: The internal review was done by several iteration steps concerning raw data validation, raw data documentation, representativity, completeness and consistency of modelling with regard to ISO 14040 and 14044.

## Data sources
- Xu, S., Li, Z., Yang, Q., Chu, G., Zhang J., Zhang, D., Zhou, H. & Gao, M. Comparative Life Cycle Assessment of Energy Consumption, Pollutant Emission, and Cost Analysis of Coal/Oil/Biomass to Ethylene Glycol. ACS Sustainable Chem. Eng. 9, 15849–15860 (2021).
