# Refined iron ore production;Refined iron ore;Beneficiation(Z11)

Dataset: ILCD process, Unit process, single operation
Geography: CN
Reference year: 1998
Classification: Materials production / Metals and semimetals
Generated by: Fuxiang, 1162850692@qq.com
Owner: Tiangong LCI Data Working Group
Review: Dependent internal review by Tiangong LCI Data Working Group
Amounts: no units in this file; such an amount is in the reference unit of its flow, which a separate flow dataset defines
copyright: false
licenseType: Free of charge for all users and uses

## General comment
来自表 4-15 Z11 钢厂生产吨材环境负荷编目表

## Time period
论文提到钢铁企业环境总体数据为1998年的吨钢环境基础数据。

## Technical purpose
The refined iron ore produced by the beneficiation (Z11) process is used in the steel industry. This material is specifically intended for applications requiring high-quality iron feedstock for further processing and production of various steel products.

## Reference product
- Refined Iron Ore: 1456.88; measured
  Selected ore

## Inputs
- Energy, geothermal, converted: 1075.97; measured
- water: 50743; measured
- Iron ore: 3383; measured
  iron ore

## Outputs
All rows: measured
- Dust (unspecified, from stack): 0.306
- sulfur dioxide: 0.217
- cyanide: 5.2e-5
- phenol: 0.000177
  Volatile phenol
- Hydrocarbons, aliphatic, alkanes, unspecified: 0.017104
  Petro
- Suspended solids, unspecified: 1.0118
- chemical oxygen demand: 0.116259
- Spoil (deposited, hibernating in ground, non elementary flow): 1640.45

## Use advice
When using this data set, the user must consider the specific context of the refined iron ore's production in 1998 as mentioned in Table 4-15 Z11 from the Life Cycle Assessment report. Special attention should be paid to the environmental load cataloging of per tonne steel production within the iron and steel company. It is important to incorporate any updates or changes in the methodology or environmental load data post-1998 and ensure that the technological applicability aligns with the current situation.

## Review details
Inventory: The internal review was done by several iteration steps concerning raw data validation, raw data documentation, representativity, completeness and consistency of modelling with regard to ISO 14040 and 14044.

## Data sources
- 周和敏. 钢铁材料生产过程环境协调性评价研究. (北京工业大学, 2001).
