# 印花布生产|印花布|印花

Dataset: ILCD process, Unit process, black box
Geography: CN
Reference year: 2014
Classification: Materials production / Other mineralic materials
Generated by: Yingfan Duan, 1300925579@qq.com
Review: Dependent internal review by Tiangong LCI Data Working Group
Amounts: no units in this file; such an amount is in the reference unit of its flow, which a separate flow dataset defines
copyright: false

## General comment
印花阶段使用大量的染料，同时消耗很多蒸汽。

## Inputs
- Electricity: 206.449; measured
- Water for industrial use: 11.558; measured
- process steam: 1400; measured
- Dye: 38.3; measured

## Review details
Inventory: The internal review was done by several iteration steps concerning raw data validation, raw data documentation, representativity, completeness and consistency of modelling with regard to ISO 14040 and 14044.; Documentation: The review of the documentation was performed by Ecobilan and is in compliance with ISO 14040 and 14044. The data set documentation is correct in view of the appropriateness of the information provided. It includes all relevant information in view of data quality and scope of application of the respective LCI result.

## Data sources
- 王赛赛, 吴雄英 & 丁雪梅. 三种LCA核算软件对印花布碳足迹核算的比较. 印染 40, 41–44 (2014).
