# Apple production

Dataset: ILCD process, Unit process, black box
Geography: SAX-CN
Reference year: 2013
Valid until: 2014
Classification: Materials production / Agricultural production means
Functional unit: 1 公顷苹果园
Generated by: zhu xian, zzhu0918@163.com
Owner: Tiangong LCI Data Working Group
Review: Dependent internal review by Tiangong LCI Data Working Group
Amounts: no units in this file; such an amount is in the reference unit of its flow, which a separate flow dataset defines
copyright: false
licenseType: Free of charge for all users and uses

## General comment
Cultivate and plant apple seedlings, enter the agricultural material stage, apply pesticides, chemical fertilizers and film mulching, and enter the orchard management stage, including fertilization, pest control, bagging, film mulching, pruning, irrigation, electricity, etc., and harvest the apple fruit at the final harvest stage.

## Geography
The study was conducted in southern parts of Xianyang and Yan'an , which are regions that represent typical irrigated and rain-fed apple producing systems.

## Technical purpose
This data set represents the life cycle of apple production, including the stages of cultivating and planting apple seedlings, applying agricultural inputs like pesticides, chemical fertilizers, and film mulching, as well as orchard management activities such as fertilization, pest control, bagging, pruning, irrigation, and electricity usage. The data is applicable for environmental impact assessments of apple production in typical irrigated and rain-fed systems, particularly within the southern regions of Xianyang and Yan’an.

## Reference product
- Biological yield: 38400; min 19000; max 52500; measured

## Inputs
All rows: measured
- Nitrogenous fertilizer: 11185; min 216; max 2150
- Phosphate fertilizer: 681; min 117; max 1470
- Potassium fertilizer: 936.3; min 196; max 1518
- Irrigation water: 735; min 195; max 1800
- Pesticide: 32.2; min 15; max 39
- Plastic film,Plastic film: 96.5; min 76; max 105
- Paper bags: 677; min 653; max 698
- heavy fuel oil: 0.3505; min 0.305; max 0.365
- Electricity: 26683.2; min 23940; max 27975.6
- hard coal; 26.3 MJ/kg: 9580; min 8680; max 9940

## Use advice
When using this data set for Life Cycle Assessment of apple production, consider the regional differences such as the type of production system (irrigated or rain-fed) that is typical for the regions of study. Users should take into account the seasonal variations and their impact on agricultural inputs and orchard management practices. This information is crucial for accurate environmental modeling. Exclusions in the data (e.g. transportation of inputs and outputs) should be noted and included in the system boundaries where relevant.

## Review details
Inventory: The internal review was done by several iteration steps concerning raw data validation, raw data documentation, representativity, completeness and consistency of modelling with regard to ISO 14040 and 14044.
