# Heat drying and pulverization｜pre-treated straw｜no process

Dataset: ILCD process, Unit process, single operation
Geography: CN
Reference year: 2010
Classification: Unit processes / Energy carriers and technologies / Heat and steam
Functional unit: 1 ton of straw as a functional unit (0% moisture content).
LCI method principle: Consequential
Generated by: Chaoshuo Liu, liucs22@mails.jlu.edu.cn
Owner: Tiangong LCI Data Working Group
Review: Dependent internal review by Tiangong LCI Data Working Group
Amounts: no units in this file; such an amount is in the reference unit of its flow, which a separate flow dataset defines
copyright: false
licenseType: Free of charge for all users and uses

## General comment
The described industrial process is employed for the preparation of biomass from pre-treated straw. This material is often subsequently used in various bio-based products, biomass pellet production for heating, or as a raw material for biofuels and biochemicals.

## Reference product
- Crop straw: 1000; measured

## Outputs
- sulfur dioxide: 0.882; measured
- nitrous oxide: 0.615; measured
- carbon dioxide (fossil): 118.1; measured
  The expert notes that the original text does not differentiate between biogenic and fossil sources of emissions, and in their opinion, the emissions in question are fossil.

## Use advice
When using this data set, it is crucial to take into account that the process is defined for a functional unit of 1 ton of straw with 0% moisture content. Users should ensure that their study boundaries match the specifications of this data, and that any variability in moisture content or additional process parameters are appropriately adjusted for in their life cycle assessments.

## Review details
Inventory: The internal review was done by several iteration steps concerning raw data validation, raw data documentation, representativity, completeness and consistency of modelling with regard to ISO 14040 and 14044.

## Data sources
- Lu, W. & Zhang, T. Life-Cycle Implications of Using Crop Residues for Various Energy Demands in China. Environ. Sci. Technol. 44, 4026–4032 (2010).
