# Bioethanol ; Alkline ; Collection and transportation

Dataset: ILCD process
Geography: GLO
Classification: Unit processes / Energy carriers and technologies / Renewable fuels
Generated by: Jiayi Yuan, jiayi_y@mail.bnu.edu.cn
Owner: Tiangong LCI Data Working Group
Review: Dependent internal review by Tiangong LCI Data Working Group
Amounts: no units in this file; such an amount is in the reference unit of its flow, which a separate flow dataset defines
copyright: false
licenseType: Free of charge for all users and uses

## General comment
This dataset characterizes the life cycle of bioethanol from the collection and transportation phase through to pretreatment, focusing on the alkali method. It is applicable to various technological configurations within the bioethanol production industry. Moreover, this dataset aids in understanding the environmental impacts associated with the combustion of bioethanol in vehicles, as it includes LCI data for the process named 'Combustion of bioethanol in car' obtained from the GREET database.

## Technology and included processes
Through data quality evaluation, 141 datasets with high completeness and consistency were selected from the reported 561 datasets in 474 published papers and classified into eight technological configurations determined by the pretreatment technology. The technological steps following pretreatment were all the same, although actual flows and parameter values vary, as observed in the literature

## Inputs
- Diesel: 0.0006
  L/kg

## Data selection and combination
Global datasets were used where possible, since the study does not apply to any specific region. LCI data for one external process named “Combustion of bioethanol in car” were obtained from the GREET database

## Data treatment and extrapolations
We assessed the robustness of the modeling results through uncertainty propagation (Monte Carlo), discernibility analysis, global sensitivity analysis, and scenario variation.

## Use advice
When utilizing this dataset for Life Cycle Assessment, users should note that global datasets were prioritized over region-specific information. The robustness of the data should be taken into account during analysis, and users are encouraged to utilize the included uncertainty and sensitivity analyses such as Monte Carlo, discernibility analysis, and scenario variation to corroborate their findings. Furthermore, users should ensure that they account for the specific methodological considerations associated with recycling, use phase behavior, or technological applicability as outlined in the data pertaining to 'Combustion of bioethanol in car'.

## Review details
Inventory: The internal review was done by several iteration steps concerning raw data validation, raw data documentation, representativity, completeness and consistency of modelling with regard to ISO 14040 and 14044.
