# 涤棉生产|涤棉|印染|退浆

Dataset: ILCD process, Unit process, single operation
Geography: CN
Reference year: 2018
Classification: Materials production / Other mineralic materials
Generated by: Yingfan Duan, 1300925579@qq.com
Review: Dependent internal review by Tiangong LCI Data Working Group
Amounts: no units in this file; such an amount is in the reference unit of its flow, which a separate flow dataset defines
copyright: false

## General comment
印染阶段生产环节较多，可进一步分为烧毛、退浆、丝光、前定型、轧染、热熔、还原、定型、预缩环节。

## Inputs
- Water (fresh water): 1.207e6; measured
- Electricity: 24827.8; software or database
- Crude coal: 1.724e6; software or database
- sodium hydroxide: 10000; measured

## Outputs
All rows: measured
- Dust (unspecified, from stack): 344800
- carbon dioxide: 4.517e6
- sulfur dioxide: 14700
- Nitrogen oxides: 12760
- waste water - untreated: 698650
- chemical oxygen demand: 282.8
- sodium hydroxide: 4.83e7
- Suspended solids, unspecified: 34.5

## Review details
Inventory: The internal review was done by several iteration steps concerning raw data validation, raw data documentation, representativity, completeness and consistency of modelling with regard to ISO 14040 and 14044.; Documentation: The review of the documentation was performed by Ecobilan and is in compliance with ISO 14040 and 14044. The data set documentation is correct in view of the appropriateness of the information provided. It includes all relevant information in view of data quality and scope of application of the respective LCI result.

## Data sources
- 康宏. 基于LCA的棉印染生产过程改进设计研究. (大连理工大学, 2018).
