# Aluminum electrolysis and ingot casting ; Primary aluminum ingots ; Prebaked ; Alumina for metallurgy

Dataset: ILCD process, Unit process, single operation
Geography: CN
Reference year: 2022
Classification: Unit processes / Materials production / Metals and semimetals
Generated by: Ruoxi Xiong, xiongrx0126@163.com
Owner: Tiangong LCI Data Working Group
Review: Dependent internal review by Tiangong LCI Data Working Group
Amounts: no units in this file; such an amount is in the reference unit of its flow, which a separate flow dataset defines
copyright: false
licenseType: Free of charge for all users and uses

## General comment
Primary aluminum ingots obtained from aluminum electrolysis and ingot casting are most commonly used as basic raw material for the fabrication of parts and components in the transportation, construction, and packaging industries, among others. The prebaked process refers to the use of prebaked carbon anodes in the electrolytic production of aluminum, which is a necessary material in the production of metallurgical grade alumina used primarily in aluminum smelting.

## Time period
Date of publication

## Reference product
- aluminium, primary, ingot: 1000; missing unimportant
  electrolytic aluminium

## Inputs
All rows: missing unimportant
- electricity, high voltage, aluminium industry: 49971.6
- aluminium oxide, metallurgical: 1916
  alumina
- anode, prebake, for aluminium electrolysis: 469
  carbon electrode
- Fluoride: 19
  fluoride “氟化物”，我猜是萤石Flourite，但没有证据，就先新建了一个flow
- cryolite: 11.9
- hard coal: 77.8
- Diesel oil: 38.9
- solvent, unspecified: 4
  solvent 什么溶剂也没说明白
- coal gas: 311
- natural gas, high pressure: 41.8
  natural gas 天然气有很多种类，这里没说明白，姑且先新建一个flow

## Data selection and combination
According to the goal, scope, and system boundary definition, relevant specifications, standards, yearbooks, or other related materials are used to collect and summarize the input and output data of each stage of the life cycle.

## Use advice
When using this dataset for Life Cycle Assessment, ensure that the scope of the LCA includes the cradle-to-gate phases considering primary aluminum production and its potential environmental impact. Proper allocation procedures must be adopted if this dataset is part of a larger system involving co-products or recycling. The data should reflect the technological applicability of the stated period and adhere to the defined system boundaries. Updates to this dataset should be monitored and incorporated as new standards, specifications, or methodologies become available.

## Review details
Inventory: The internal review was done by several iteration steps concerning raw data validation, raw data documentation, representativity, completeness and consistency of modelling with regard to ISO 14040 and 14044.

## Data sources
- Zhang, Y. et al. Life cycle assessment of pollutants and emission reduction strategies based on the energy structure of the nonferrous metal industry in China. ENERGY 261, (2022).
