# Egg production ; Layer production

Dataset: ILCD process, Unit process, single operation
Geography: HLJ-CN
Reference year: 2009
Classification: Unit processes / Materials production / Agricultural production means
Functional unit: The main output product of laying hens is eggs, so the functional unit defined in this study is "1kg egg".
Generated by: Rui Yang, 1632707028@qq.com
Owner: Tiangong LCI Data Working Group
Review: Dependent internal review by Tiangong LCI Data Working Group
Amounts: no units in this file; such an amount is in the reference unit of its flow, which a separate flow dataset defines
copyright: false
licenseType: Free of charge for all users and uses

## General comment
The pollutants released to the environment in the production stage of laying hens are mainly divided into two stages: the pollutants released by laying hens themselves to the environment in the breeding stage and the pollutants released to the environment in the chicken manure treatment stage.

## Geography
Life cycle evaluation of intensive egg farm in Heilongjiang Province

## Technology and included processes
Quantitative method was used in this study. This evaluation includes a re-examination or revision of the objectives and scope of the research to determine how the objectives of the research can be met. According to the actual situation of layer production, the technical framework of life cycle impact assessment (FIG. Impact assessment includes four steps: classification, characterization, standardization and weighted assessment. (1) Classification: The input and output data in the life cycle inventory analysis were classified into different types of environmental impact. Based on the analysis results of the life cycle inventory of laying hens, the following four types of environmental impact were evaluated: global warming, environmental acidification, eutrophication and photochemical ozone synthesis. (2) Characterization: Quantitative inventory analysis of data to determine the degree of impact of four types of environmental impact. This makes the amount of environmental pollution that would otherwise not be comparable comparable. (3) Standardization: First of all, standardization benchmarks should be established to provide comparable standards for the relative sizes of the four environmental impact types of global warming, environmental acidification, eutrophication, and photochemical ozone synthesis. (4) Weighted assessment: is the process of grouping environmental impact into a unified indicator - environmental load size, so as to directly compare different production systems.

## Technical purpose
The main application of the egg production process described in this data set is the generation of eggs by layer hens. These eggs are used primarily as a food product for direct consumption or as an ingredient in various culinary applications. The process originates from an intensive egg farm located in Heilongjiang Province, focusing on producing high quantities of eggs through the mass breeding of laying hens.

## Reference product
- egg: 1; measured

## Inputs
- Electricity: 0.4284; measured
- hard coal: 0.04959; measured

## Outputs
All rows: measured
- methane (fossil): 0.00165355
- carbon dioxide (biogenic): 2.50535
- ammonia: 0.0152992
- nitrous oxide: 0.000177785
- nitrogen, total (excluding N2): 0.00533589
- carbon monoxide (fossil): 0.0001194
- sulfur oxides: 0.000780853

## Data selection and combination
本文以黑龙江省集约化蛋鸡场为例

## Use advice
When utilizing this data set for life cycle assessment of egg production at an intensive egg farm, users must account for all stages of production, including both the direct pollutants released by the laying hens and the pollutants associated with chicken manure treatment. The functional unit is defined as '1kg egg', and impacts should be allocated based on this unit. Care should be taken to ensure that system boundaries are correctly established and that any extrapolation to other contexts considers regional specificities such as climate, feed composition, and waste management practices.

## Review details
Inventory: The internal review was done by several iteration steps concerning raw data validation, raw data documentation, representativity, completeness and consistency of modelling with regard to ISO 14040 and 14044.

## Data sources
- 高雪. 黑龙江省集约化蛋鸡场的生命周期评价. (东北农业大学, 2012).
