# Soil Remediation;Isotopic Remediation;Soil Drenching;Case 2;Operation;Remediated Soil

Dataset: ILCD process, Unit process, single operation
Geography: SD-CN
Reference year: 2017
Classification: Unit processes / Other Services / Repair and maintenance
Generated by: Wang Ning, wang_ning@caep.org.cn
Owner: Tiangong LCI Data Working Group
Review: Dependent internal review by Tiangong LCI Data Working Group
Amounts: no units in this file; such an amount is in the reference unit of its flow, which a separate flow dataset defines
copyright: false
licenseType: Free of charge for all users and uses

## General comment
The excavated contaminated soil is put into the drenching equipment, while the chemical agent is used to configure the chemical agent for drenching

## Technology and included processes
The volume of excavated contaminated soil is 210,000m3, and the power consumption of the drenching equipment is 180kw/h, which runs for 20h per day for a total of 300d, while a large amount of chemicals are consumed.

## Technical purpose
The soil remediation process described is used for cleaning up excavated contaminated soil through isotopic remediation by soil drenching techniques. This particular case outlines a process ideally suited for large-scale environmental restoration projects where the volume of contaminated soil is substantial. It is applicable in scenarios where in-situ remediation is not feasible and the soil must be excavated and treated ex-situ in drenching equipment using a blend of chemical agents to remove pollutants.

## Reference product
- Remediated soil: 210000; measured

## Inputs
All rows: measured
- Excavated soil,Excavated soil: 210000
- Electricity: 3.888e6
- Activated Carbon: 27300
- Tap Water: 4899
- Sulfuric acid: 579
- sodium hydroxide: 24
- Sodium sulfide: 87

## Use advice
When using this dataset, ensure that the context of the remediation process aligns with the environmental conditions presented in the data. Consider the volume of soil treated, the energy consumption of the equipment, and the chemical usage. The data should be adapted to local conditions and regulations. It is also essential to integrate this process data with overall project assessments, including transportation of soil, treatment efficacy, and the final disposal of contaminants. Users must observe that the power consumption and chemical usage rates are based on a 20-hour operational day over 300 days, and scale the data accordingly for different project sizes and durations.

## Review details
Inventory: The internal review was done by several iteration steps concerning raw data validation, raw data documentation, representativity, completeness and consistency of modelling with regard to ISO 14040 and 14044.

## Data sources
- Song, Y. et al. Environmental and socio-economic sustainability appraisal of contaminated land remediation strategies: A case study at a mega-site in China. Science of The Total Environment 610–611, 391–401 (2018).
