# Livestock and poultry breeding ; feed processing stage ; dairy farming area

Dataset: ILCD process, Unit process, single operation
Geography: CN
Reference year: 2014
Classification: Unit processes / Materials production / Agricultural production means
Functional unit: 1kg milk
Generated by: Rui Yang, 1632707028@qq.com
Owner: Tiangong LCI Data Working Group
Review: Dependent internal review by Tiangong LCI Data Working Group
Amounts: no units in this file; such an amount is in the reference unit of its flow, which a separate flow dataset defines
copyright: false
licenseType: Free of charge for all users and uses

## General comment
Livestock and poultry feed processing mainly consumes electricity and coal.

## Geography
This study was conducted from 2014 to 2015, aiming at livestock and poultry feeding cycle, meat ratio, feed formula, feed consumption, coal and electricity consumption, etc. Has been to Shandong Gaomi Zhengda pig farm, Laixi City Zhishuang dairy farm, Jimo city Duan Bolan town Jiangjiapo village pig farm, Jimo City Liujiazhuang town livestock farm, Rizhao City Changling town Guanzhuang village, Juxian County Zhailihe town Dongxing Agriculture and animal husbandry company, Juxian Qiaoshan town east Chen dairy farm, Juxian Qiaoshan town Liu Jiayi water pig farm, Zhucheng Foreign Trade Co., LTD. Phoenix parents breeding duck farm, Xinjiang Fukang Hongfa Breeding professional cooperative, Jiuyun Street Town Xuhong laying Chicken cooperative, Jiuyun Street Town Liuyun Village self-contained breeding farm, China Australia Holding Group Co., LTD., Dezhou City Qingyun County Wayu Village, Shandong Province Qingyun County four Liu community beef cattle breeding base, Dezhou City Qingyun Qingnian chicken breeding base, Qingyun County Yongli Poultry layer breeding company, Qingyun County Xingchen youth chicken breeding Field research was carried out by professional breeding cooperatives, Qingyun Dongtai broiler breeding cooperatives, Hebei Yanshan Boyuan Feed Co., LTD., Yanshan Da Chinese Feed Co., LTD., Wudi Liuhe Feed Co., LTD., and China-Australia Oriental Hope Feed Co., LTD.

## Technology and included processes
In this paper, the life cycle of livestock and poultry farming is divided into six stages: feed crop planting, feed processing, livestock and poultry raising, manure treatment, slaughter and transportation. The specific life cycle process of livestock and poultry breeding is shown in Figure 2-1. Due to the lack of some data and the limitations of basic conditions, the production, transportation and use of pesticides, mulch and feed additives have not been analyzed, and the environmental impact caused by other related infrastructure construction, transport production and labor costs is no longer considered.

## Technical purpose
This data set corresponds to the feed processing stage of dairy farming areas and includes relevant energy consumption—specifically electricity and coal—during the production of 1kg of milk. This stage is crucial for sustaining healthy livestock for the dairy industry and ensures the provision of quality milk. The data set applies to agricultural operations and dairy farms where energy-efficient feed processing operations are critical.

## Reference product
- feed: 2.26027; calculated

## Inputs
- Electricity: 0.203424; calculated
- hard coal: 0.0271232; calculated
- maize grain: 2.05; measured
- soybean: 0.16; measured
- wheat: 0.57; measured

## Outputs
- carbon dioxide (fossil),carbon dioxide (fossil): 0.11313; measured
  Dairy breeding community
- sulfur dioxide: 0.00198; measured
  Dairy breeding community
- nitrogen, total (excluding N2): 0.00032; measured
  Dairy breeding community
- carbon monoxide (fossil): 5.1e-5; measured
  Dairy breeding community

## Use advice
Users of this data set should ensure they correctly attribute energy consumption figures to the appropriate stage in the milk production lifecycle. For the feed processing stage, include energy inputs from electricity and coal. Be attentive to the regional context of the data, as the operations researched were specific to various locations across Shandong and Hebei provinces and Xinjiang region. It is advisable to apply these data carefully in different geographical and technological contexts due to potential variations in energy consumption patterns and feed processing methodologies.

## Review details
Inventory: The internal review was done by several iteration steps concerning raw data validation, raw data documentation, representativity, completeness and consistency of modelling with regard to ISO 14040 and 14044.

## Data sources
- 周景月. 基于生命周期评价的畜禽养殖环境影响分析. (青岛科技大学, 2017).
