# Biochar ; Biochar production ; Coconut shell as raw material ; Agricultural land remediation ; In-situ stabilization

Dataset: ILCD process, Unit process, black box
Geography: HZ-GD-CN
Reference year: 2021
Classification: Unit processes / Other Services / Repair and maintenance
Functional unit: Using coconut shells as raw materials, 800kg of biochar is generated through processes such as thermal cracking.
Generated by: Yang Xintong, yangxt@caep.org.cn
Owner: Tiangong LCI Data Working Group
Review: Dependent internal review by Tiangong LCI Data Working Group
Amounts: no units in this file; such an amount is in the reference unit of its flow, which a separate flow dataset defines
copyright: false
licenseType: Free of charge for all users and uses

## General comment
Biochar, like ordinary charcoal, is the product of thermal decomposition of biomass energy raw materials, and its main component is carbon molecules.

## Geography
The study site is a paddy field contaminated by Cd, located inGongzhuang town, Huizhou city of the Pearl River Delta, Southern China.

## Technology and included processes
The biochar production process mainly contains biomass drying and pyrolysis, and the biomass comes from coconut shells.

## Technical purpose
Biochar derived from the thermal decomposition of biomass, in this case coconut shells, is typically used for agricultural land remediation. Specifically, it is applied in situ for stabilizing contaminated paddy fields, such as those suffering from cadmium pollution. It can also serve as a soil amendment to improve soil health and carbon sequestration.

## Reference product
- Biochar: 800; measured
  由于我国南方有早稻和晚稻两个生长季节，修复剂的施用量为3000公斤/公顷，施用频率为每年2次。从2017年到2018年，每个场景的整个修复时间为2年。总施加剂量=3000kg/ha*0.07ha*2次/年*2年≈800kg

## Inputs
- Coconut Shell: 3300; measured
- Electricity: 36; measured

## Outputs
- carbon dioxide (fossil): 1300; measured
  原表给出的仅为二氧化碳排放，我们通过分析，选择二氧化碳由化石燃料，即柴油燃烧产生
- carbon monoxide (fossil): 300; measured
- nitrogen dioxide: 49.5; measured
- sulfur dioxide: 21.12; measured

## Use advice
When utilizing this dataset for life cycle assessment, it is crucial to take into account the environmental benefits and potential trade-offs of using biochar for soil remediation. Users should consider the full lifecycle from production to application, including the energy consumption and emissions during the pyrolysis process. Additionally, users must address the long-term carbon sequestration effects and assess any downstream impacts on soil ecology and crop yield. Exclusion or inclusion of potential recycling pathways and secondary uses of biochar should be clearly justified within the LCA framework.

## Review details
Inventory: The internal review was done by several iteration steps concerning raw data validation, raw data documentation, representativity, completeness and consistency of modelling with regard to ISO 14040 and 14044.

## Data sources
- Kai L ,Liping F ,Fangbai L , et al. Sustainability assessment and carbon budget of chemical stabilization based multi-objective remediation of Cd contaminated paddy field. The Science of the total environment, 2021, 819 152022-152022.
