# Gas processing

Dataset: ILCD process
Geography: SC-CN
Classification: Materials production / Other mineralic materials
Generated by: Pu Hong, 15695258655@163.com
Review: Dependent internal review by Tiangong LCI Data Working Group
Amounts: no units in this file; such an amount is in the reference unit of its flow, which a separate flow dataset defines

## Reference product
- methane: 8.04963e7; min 1.0044e8; max 6.13551e7; calculated
  每口井的产量

## Outputs
- methane: 351689; min 764183; max 68007.4; calculated
  页岩气处理过程的泄露率依据文献选取平均值0.435%（来自美国数据）

## Review details
Inventory: The internal review was done by several iteration steps concerning raw data validation, raw data documentation, representativity, completeness and consistency of modelling with regard to ISO 14040 and 14044.; Documentation: The review of the documentation was performed by Ecobilan and is in compliance with ISO 14040 and 14044. The data set documentation is correct in view of the appropriateness of the information provided. It includes all relevant information in view of data quality and scope of application of the respective LCI result.

## Data sources
- Jiang, M. et al. Life cycle greenhouse gas emissions of Marcellus shale gas. Environ. Res. Lett. 6, 034014 (2011).
