# Waterways Sediment ; Sediment ex-situ Remediation ; Dredging

Dataset: ILCD process, Unit process, single operation
Geography: GB
Reference year: 2014
Classification: Unit processes / Other Services / Repair and maintenance
Functional unit: dredging over 2500 m of waterways and sediments generated during the process
Generated by: Yang Xintong, yangxt@caep.org.cn
Owner: Tiangong LCI Data Working Group
Review: Dependent internal review by Tiangong LCI Data Working Group
Amounts: no units in this file; such an amount is in the reference unit of its flow, which a separate flow dataset defines
copyright: false
licenseType: Free of charge for all users and uses

## General comment
Dredging has been a widely used approach in addressing contaminated sediment. The dredged materials may be cleanup by using physical processes.

## Geography
The studied project was part of the development at the London Olympics Park.

## Technology and included processes
The project consisted of dredging over 2500 m of waterways. It was estimated that nearly 30,000 m3 of dredging materials would be generated, including near 2700 m3 hazardous materials.

## Technical purpose
The dredging process described is used for environmental remediation of waterways by removing contaminated sediments. This process is part of the London Olympics Park development and is particularly applied to clear over 2500 meters of water channels, with an emphasis on the safe removal and subsequent treatment of nearly 30000 cubic meters of dredged material, including around 2700 cubic meters of hazardous substances. It is suitable for large-scale environmental restoration projects that require the extraction of sediment from aquatic systems to improve water quality and ecosystem health.

## Reference product
- Waterway: 2500; input; measured

## Inputs
- Diesel,Diesel: 1.88112e6; measured

## Outputs
- Contaminated Sediment: 29097; measured
  包含Non-hazardous sediment volume （26431 m3）Hazardous sediment can be washed （1877 m3）Hazardous sediment cannot be washed （789 m3）

## Use advice
When using this dataset for Life Cycle Assessment, consider the scope of the dredging process specifically in the context of the London Olympics Park development. Pay attention to the inclusion of diesel consumption data as the only energy input for the dredging operation as described. Ensure that hazard material handling and potential downstream processing such as physical remediation are taken into account. Apply this data set within the boundaries of similar environmental remediation projects and cautiously adjust it for projects with a differing context or scale.

## Review details
Inventory: The internal review was done by several iteration steps concerning raw data validation, raw data documentation, representativity, completeness and consistency of modelling with regard to ISO 14040 and 14044.

## Data sources
- Hou D, et al. Using a hybrid LCA method to evaluate the sustainability of sediment remediation at the London Olympic Park. Journal of Cleaner Production, 2014, 83 87-95.
