# Hot rolled steel production;Hot rolled steel;Hot rolling(Z08)

Dataset: ILCD process, Unit process, single operation
Geography: CN
Reference year: 1998
Classification: Materials production / Metals and semimetals
Generated by: Fuxiang, 1162850692@qq.com
Owner: Tiangong LCI Data Working Group
Review: Dependent internal review by Tiangong LCI Data Working Group
Amounts: no units in this file; such an amount is in the reference unit of its flow, which a separate flow dataset defines
copyright: false
licenseType: Free of charge for all users and uses

## General comment
来自表 4-16 Z08 钢厂生产吨材环境负荷编目表

## Time period
论文提到钢铁企业环境总体数据为1998年的吨钢环境基础数据。

## Technical purpose
The hot rolled steel production process is generally used in the steel industry to transform crude steel into hot rolled steel products which serve as the basic materials for various industrial applications such as construction, automotive, shipbuilding, heavy machinery, and appliances.

## Reference product
- Steel sections: 1000; measured

## Inputs
- Energy, geothermal, converted: 3042.13; measured
- water: 34720; measured
- Crude Steel: 1059.3; measured
  crude steel

## Outputs
All rows: measured
- Dust (unspecified, from stack): 0.216
  soot
- sulfur dioxide: 0.844
- Hydrocarbons, aliphatic, alkanes, unspecified: 0.0249
  Petro
- Suspended solids, unspecified: 0.27
- chemical oxygen demand: 0.136
- Spoil (deposited, hibernating in ground, non elementary flow): 14.883

## Use advice
When using the dataset for this industrial process, users should consider that the environmental load data cataloging unit process (single operation) is based on the steel industry's overall environmental data for the year 1998. Users need to account for technological advancements and updates in emissions standards in their assessments and should confirm if the dataset reflects current processing techniques and environmental regulations.

## Review details
Inventory: The internal review was done by several iteration steps concerning raw data validation, raw data documentation, representativity, completeness and consistency of modelling with regard to ISO 14040 and 14044.

## Data sources
- 周和敏. 钢铁材料生产过程环境协调性评价研究. (北京工业大学, 2001).
