# Soil Remediation;In-situ Remediation;Electric Remediation;Remediation Facility Construction;Electric Remediation Facility

Dataset: ILCD process, Unit process, single operation
Geography: KR
Reference year: 2014
Classification: Unit processes / Other Services / Repair and maintenance
Generated by: Wang Yipeng, wangyp@caep.org.cn
Owner: Tiangong LCI Data Working Group
Review: Dependent internal review by Tiangong LCI Data Working Group
Amounts: no units in this file; such an amount is in the reference unit of its flow, which a separate flow dataset defines
copyright: false
licenseType: Free of charge for all users and uses

## General comment
Site preparation, closure and dismantling system installed

## Technology and included processes
include：Excavation, rolling drillingand installing；Transportation of personnel and equipment；System install

## Technical purpose
The described industrial process is employed for the in-situ remediation of contaminated soils using an electrical treatment method. It involves the construction and operation of an electric soil remediation facility. The facility's process includes on-site preparation, excavation, drilling and installation of the remediation system, as well as transportation of personnel and equipment. This process is intended for sites where soil contamination poses environmental risks, and where electric remediation can effectively neutralize or remove pollutants without the need to transport the contaminated soil off-site.

## Reference product
- Electric restoration facilities: 1; measured

## Inputs
All rows: measured
- Diesel: 0.0799
  2 m3 /month
- Diesel: 0.0386
  Chemical (0.01 M)
- Steel: 48
  Pump, power supply, etc
- Stainless Steel: 2448
  Cathode electrode
- Polyvinyl chloride: 140.2
  Anode (casing)
- Polyvinyl chloride: 7.6
  Circulation pipe
- polyethylene high density granulate (PE-HD): 25
  Anode and cathode
- polyethylene low density foil(PE-LD): 112
  Electrolyte tank (2 m3 , 2 ea)
- Electricity: 1440
  Equipment and etc
- Tap Water: 1
  Equipment and etc
- Polyethylene,Polyethylene: 25.1
- Results of on-site investigations: 1

## Outputs
- Greenhouse Gases: 16130; measured
- Nitrogen oxides: 1.48; measured
- SOx: 0.779; measured
- particles (> PM10): 0.0922; measured

## Use advice
When using this data set, it is crucial to ensure that the data aligns with the specific site characteristics and contaminants being addressed. The efficacy of the electric remediation process may vary based on soil type, contaminant properties, and concentration levels. Users should validate the compatibility of the process with local regulations and guidelines. It is important to consider the entire lifecycle of the remediation process, including proper disposal of any waste generated and potential impacts on the environment and local community. The energy consumption data must be used to understand the full environmental footprint of the remediation process.

## Review details
Inventory: The internal review was done by several iteration steps concerning raw data validation, raw data documentation, representativity, completeness and consistency of modelling with regard to ISO 14040 and 14044.

## Data sources
- Kim, DH., Yoo, JC., Hwang, BR. et al. Environmental assessment on electrokinetic remediation of multimetal-contaminated site: a case study. Environ Sci Pollut Res 21, 6751–6758 (2014).
