# Milk production ; Feed and organic fertilizer transportation ; Integrated maize silage planting and dairy cow breeding system (IPBS)

Dataset: ILCD process, Unit process, single operation
Geography: QD-SD-CN
Reference year: 2016
Classification: Unit processes / Transport services / Road
Functional unit: The 1t FPCM corrected for protein and fat content was selected as the evaluation unit
Generated by: Rui Yang, 1632707028@qq.com
Owner: Tiangong LCI Data Working Group
Review: Dependent internal review by Tiangong LCI Data Working Group
Amounts: no units in this file; such an amount is in the reference unit of its flow, which a separate flow dataset defines
licenseType: Free of charge for all users and uses

## General comment
In the transport of feed and organic fertilizer, the difference between the two models lies in the transport of silage corn and organic fertilizer. In non-IPBS, silage corn is all purchased, assuming that the average transportation distance is 30km, and organic fertilizer is all sold to fruit and vegetable farmers, with an average transportation distance of 20km. The transportation distance of the two is 1km. Different transportation distances will lead to different energy consumption, and thus different impacts on the environment. Relevant studies have shown that long distance transport of organic fertilizers will increase the loss of N and P in feces and increase the risk of eutrophication in water [11]. According to the investigation, the fertilizer value of liquid fertilizer is low, and vegetable and fruit farmers are reluctant to buy liquid fertilizer. The liquid fertilizer of the two modes is sprayed by the farm car to the surrounding farmland or farm farmland, and the transportation distance is 1km. The other feed transportation distance of the two modes is the same, and the concentrated feed, soybean meal, corn kernel and wheat bran are from the local market, and the transportation distance is the same About 50km. Cottonseed from Gansu Province, the transport distance of about 1830km. Leymus chinensis from Heilongjiang Province, the transport distance of about 1720km. Oats and alfalfa come from the United States and travel a distance of about 18,000 km

## Geography
A questionnaire survey was conducted on dairy farms in Qingdao, Shandong Province from July to August 2020.

## Time period
From 2016, Shandong began to implement the silage corn planting subsidy policy, is one of the earliest provinces to implement the subsidy policy, the subsidy standard is 20~50 yuan /t. In 2019, Shandong Province silage corn planting area reached 14,100 hm2, accounting for 7.3% of the country.

## Technology and included processes
In the study area, there are mainly two milk production modes :IPBS and non-IPBS. In non-IPBS, the farms only have feeding links and manure treatment links, all the feed is purchased, and the manure pile fertilizer is made into organic fertilizer and sold to fruit and vegetable farmers. In IPBS, the silage corn planting process is increased in the farm, organic fertilizer and liquid fertilizer are mainly applied to the farm field, and the remaining part is sold to fruit farmers and vegetable farmers, etc. The differences between the two models are as follows :1) the sources of silage corn in the farm are different, resulting in different feed transportation distances and feed costs; 2) The use of organic fertilizer and liquid fertilizer is different, and the transportation distance is different. A total of 109 dairy farms were investigated in this study, and 83 valid questionnaires were obtained after excluding non-conforming questionnaires, among which 38 were non-IPBS and 45 were IPBS.

## Technical purpose
The described industrial process is primarily used for milk production within an Integrated Planting and Breeding System (IPBS), where feed and organic fertilizer transportation constitute key components. The silage corn and organic fertilizer are predominantly sourced locally, with transportation distances being a critical factor in determining the process's environmental impact. The objective is to minimize transportation distance (to 1 km within the IPBS system) to reduce energy consumption and environmental impact, as demonstrated by the reduced risks of nutrient loss (N and P) and eutrophication in water bodies when transportation distances are short. The byproducts, particularly liquid fertilizers, are used within local agricultural areas due to their low fertilizer value, which does not appeal to many vegetable and fruit farmers. Additionally, the import of key feed components such as oats and alfalfa involves long-distance transport from the United States, contributing to the life cycle environmental footprint of the milk production process.

## Reference product
- milk: 1000; estimated
  作为参考定量，非实际输出

## Inputs
All rows: measured
- feed: 11.4
  Concentrated feed (IPBS mode)
- maize grain: 5.6
  Corn kernels (IPBS mode)
- bean pulp: 2.6
  Soybean meal (IPBS model)
- wheat bran: 2.2
  Wheat bran (IPBS mode)
- maize grain: 20.5
  Purchased silage corn (IPBS model)
- maize grain: 0.3
  Self-produced silage corn (IPBS model)
- alfalfa: 1944
  Alfalfa (IPBS mode)
- oat: 2070
  Oats (IPBS mode)
- chinese wildrye: 498.8
  Leymus chinensis (IPBS mode)
- cottonseed: 69.5
  Cottonseed (IPBS mode)
- organic fertilizer: 10.4
  Organic fertilizer for external sale (IPBS model)
- Fertilizer: 10.2
  Liquid fertilizer (IPBS mode)
- organic fertilizer: 0.2
  Self-use organic fertilizer (IPBS model)

## Use advice
When utilizing this Life Cycle Assessment data for milk production within an IPBS, it is essential to capture the differences in environmental impact due to transportation distances of feed and organic fertilizer. Data users should account for energy consumption variances and nutrient loss associated with transportation, noting the localized nature of silage corn production and organic fertilizer use within IPBS, versus the longer transportation distances involved in non-IPBS scenarios. When assessing the transportation impact of imported feed components, consider the substantial distances involved for items like oats and alfalfa from the United States. Users must adjust the model to reflect varying transportation distances and potential subsidies affecting cultivation practices, like the silage corn planting subsidy policy in Shandong Province.

## Review details
Inventory: The internal review was done by several iteration steps concerning raw data validation, raw data documentation, representativity, completeness and consistency of modelling with regard to ISO 14040 and 14044.

## Data sources
- 黄显雷, 师博扬, 张英楠, 龙昭宇, & 尹昌斌. 基于生命周期视角的种养一体化奶牛场环境经济效益评估. 中国环境科学 41, 3944–3955 (2021).
