# Gasification;Raw gas;Gasification

Dataset: ILCD process, Unit process, single operation
Geography: CN
Classification: Unit processes / Energy carriers and technologies / Other non-renewable fuels
Generated by: Fuxiang, 1162850692@qq.com
Owner: Tiangong LCI Data Working Group
Review: Dependent internal review by Tiangong LCI Data Working Group
Amounts: no units in this file; such an amount is in the reference unit of its flow, which a separate flow dataset defines
copyright: false
licenseType: Free of charge for all users and uses

## General comment
This gasification process is used to produce raw gas from coal, which serves as a primary input for the Direct Reduction (DR) of iron in the steelmaking industry. This particular data set represents the life cycle inventory (LCI) of a Coal-based Direct Reduction (Coal-DR) process demonstrated in China.

## Geography
The LCI of Coal-DR is obtained, as shown in Table 9, based on the statistics of the demonstration project in China.

## Reference product
- Raw gas: 1306.9; calculated

## Inputs
- freshwater,freshwater: 400; calculated
- oxygen: 307.6; calculated
- lignite: 625.1; calculated
- Electricity: 176.04; calculated

## Outputs
- Slag: 14.8; calculated
- particles (> PM10): 0.4; calculated

## Data treatment and extrapolations
LCI of COG-DR and H-DR routes, which is not scaled-up in China are estimated based on Coal-DR routes combined with literature data from simulations, laboratory tests, and process modeling in Table 9 [49,50]. The LCI of Coal-DR is obtai

## Use advice
The data set user should consider the specificity of the regional production process captured in this LCI. The data reflects Direct Reduction processes specific to demonstration projects in China, and its applicability may vary for other locations or technological setups. The results from COG-DR (Coke Oven Gas Direct Reduction) and H-DR (Hydrogen Direct Reduction) are estimations based on the Coal-DR and should be scaled and adjusted based on regional conditions, simulation data, and available literature for accurate application. Attention should be paid to the scaling factors and assumptions made during the estimation process.

## Review details
Inventory: The internal review was done by several iteration steps concerning raw data validation, raw data documentation, representativity, completeness and consistency of modelling with regard to ISO 14040 and 14044.

## Data sources
- The carbon reduction potential of hydrogen in the low carbon transition of the iron and steel industry: The case of China
