# NCM pyrometallurgical-hydrometallurgical combined recycling

Dataset: ILCD process, Unit process, single operation
Geography: CN
Reference year: 2018
Classification: Unit processes / End-of-life treatment / Material recycling
Functional unit: Functional unit is recycling 1 kwh NCM battery
Generated by: huzhikang, hzk2503593129@163.com
Owner: Tiangong LCI Data Working Group
Review: Dependent internal review by Tiangong LCI Data Working Group
Amounts: no units in this file; such an amount is in the reference unit of its flow, which a separate flow dataset defines
copyright: false
licenseType: Free of charge for all users and uses

## General comment
After simple pre-treatment dismantling and discharging, the waste lithium ternary battery system is subjected to high-temperature melting, leaching and oxidizing, and high-temperature sintering to produce battery cathode materials again. The process is mainly the product of the fire recovery technology to further use wet purification, so that both the requirements of the reaction object is lower, but also can reduce the waste of metal elements.

## Technical purpose
The pyrometallurgical-hydrometallurgical combined recycling process is intended for the recovery of cathode materials from spent lithium ternary (NCM) batteries. This technology is utilized in recycling facilities to reclaim valuable metal elements through high-temperature smelting, leaching, and high-temperature sintering, thus contributing to the circular economy in the battery industry. The resulting purified materials can be used to manufacture new battery cathodes, supporting the sustainable lifecycle of lithium batteries.

## Reference product
- EoL NCM battery: 3.6; input; missing unimportant
  Waste NCM battery

## Inputs
All rows: missing unimportant
- Natural gas, at consumer EU-27: 0.213
  Natural Gas
- slagging agent: 1
  Slagging agent
- Limestone: 1
- Metallurgical Coke: 1.1
  Metallurgical coke
- water,water: 82.4
- hydrogen chloride: 1.37
  Hydrochloric acid
- hydrogen peroxide: 0.193
  Hydrogen peroxide
- Calcium hydroxide: 0.288
- Lithium carbonate: 0.696

## Outputs
- carbon dioxide (fossil): 2.45; missing unimportant
  Carbon dioxide (The original article did not distinguish between bio and fossil, but according to experts, this is fossil.)
- Ternary cathode material: 1.84; missing unimportant

## Data selection and combination
The data comes from a variety of literature and is not clear.

## Use advice
When using this dataset for Life Cycle Assessment (LCA), users should ensure that the system boundary includes pre-treatment dismantling and discharging. The functional unit must be clearly defined as the recycling of a 1 kWh NCM battery weighing 0.81kg. Attention should be given to the quality of recovered materials and potential losses during recycling. Users need to consider the technological applicability of the recycled materials in their specific context and the environmental impacts associated with the recovery process, including energy consumption and emissions.

## Review details
Inventory: The internal review was done by several iteration steps concerning raw data validation, raw data documentation, representativity, completeness and consistency of modelling with regard to ISO 14040 and 14044.

## Data sources
- 王琢璞. 新能源汽车动力电池回收利用潜力及生命周期评价. (清华大学, 2018)
