# Aluminum electrolysis carbon anode production ; carbon anode ; prebaked ; petroleum coke

Dataset: ILCD process, Partly terminated system
Geography: CN
Reference year: 2011
Classification: Unit processes / Materials production / Inorganic chemicals
Generated by: Jinliang Xie, jinliang.research@gmail.com
Owner: Tiangong LCI Data Working Group
Review: Dependent internal review by Tiangong LCI Data Working Group
Amounts: no units in this file; such an amount is in the reference unit of its flow, which a separate flow dataset defines
copyright: false
licenseType: Free of charge for all users and uses

## General comment
The prebaked carbon anode production using petroleum coke is intended for use in the aluminum electrolysis process. This high-grade consumable is critical in the conversion of alumina to primary aluminum metal by serving as a key component in the electrolytic reactions that occur within aluminum smelters.

## Time period
Dissertation Completion Date

## Reference product
- anode, prebake, for aluminium electrolysis: 1000; missing unimportant

## Outputs
- carbon dioxide (fossil),carbon dioxide (fossil): 1551.65; missing unimportant

## Use advice
When utilizing this data set for Life Cycle Assessment (LCA) of aluminum products, consider the aluminum production process as the dominant environmental impact factor due to substantial resource consumption, energy use, and waste emissions. Focus the LCA boundaries from bauxite mining to primary aluminum production, encompassing bauxite extraction, alumina production, anode production, and the aluminum electrolysis process. Exclude the extraction, production, and transportation processes of comparatively minor auxiliary materials such as limestone and bitumen from the assessment system.

## Review details
Inventory: The internal review was done by several iteration steps concerning raw data validation, raw data documentation, representativity, completeness and consistency of modelling with regard to ISO 14040 and 14044.

## Data sources
- 李贵奇. 基于生命周期思想的环境评估模型及其在铝工业中的应用. (中南大学, 2011).
