# Large yellow croaker production ;Large yellow croaker adult fish ;Traditional small cage culture

Dataset: ILCD process, Unit process, black box
Geography: ZS-ZJ-CN
Reference year: 2014
Valid until: 2014
Classification: Unit processes / Materials production / Food and renewable raw materials
Functional unit: 1000kg large yellow croaker
LCI method principle: Attributional
LCI method approaches: Allocation
Generated by: Kangni Wu, wukangni@xmu.stu.edu.cn
Owner: Tiangong LCI Data Working Group
Review: Dependent internal review by Tiangong LCI Data Working Group
Amounts: no units in this file; such an amount is in the reference unit of its flow, which a separate flow dataset defines
copyright: false
licenseType: Free of charge for all users and uses

## General comment
The system boundary of large yellow croaker cage culture includes the production of materials required for the construction of large yellow croaker cages (wood, polyethylene and cement), the production of materials required for large yellow croaker culture (compound feed, formaldehyde and refrigerators, etc.), the transportation of various materials and the production of aquaculture processes and the production and consumption of energy used in each process. It does not include the hatching of large yellow croaker fry to the breeding of semi-adult fish and the processing of large yellow croaker adult fish.

## Geography
The study is located in Dongji Town, Zhoushan City, China, large yellow croaker deep water cage culture base

## Time period
The literature does not specify the data or sampling time, and the breeding seedlings were purchased in June 2014, and the breeding period was about 6 months

## Technology and included processes
The traditional small net box is a small plate floating net box, the net box specification is 4m×4m×4m, mainly composed of wood, PE net clothing and floating dust device. Taking into account the instability of its structure, this type of cage will generally be arranged in the inner bay of the ocean, so it is also called the inner bay cage. The mesh coat and the box are made of polyethylene. In order to keep the mesh under the action of the trend does not deform, it is necessary to add a sink around the bottom of the mesh to fix, and the number of cement blocks used depends on the size of the box.

## Technical purpose
The data set provides information about traditional small cage aquaculture for large yellow croaker adult fish production. It is utilized to understand the inputs and outputs of the process for 1000kg large yellow croaker production, focusing on factors such as construction materials for cages, necessary feed and chemicals, and energy consumption. Applications of this data are relevant for environmental impact assessments, optimization of aquacultural practices, and policy-making regarding sustainable seafood industries.

## Model description
The world environmental impact per capita baseline for 2000 was used as the baseline for data standardization; The weighted evaluation uses the weight coefficient set by the panel review

## Reference product
- Large Yellow Croaker: 1000; measured

## Inputs
All rows: measured
- Electricity: 62.676
- polyethylene high density granulate (PE-HD): 72.61
- cement, unspecified: 6.31
- trash fish: 6844
- Assorted Feed: 1376
- Formaldehyde: 8.45
- Wood: 13.19

## Deviations from the LCI method approaches
This study calculates life cycle pollution emission based on pollutant emission according to the calculation formula. The energy consumption and environmental emission data of the energy production and use process, the production of polyethylene, refrigerator, preservative wood, cement and formaldehyde were respectively referred to the research results of the existing literature. Pollutant emissions from diesel combustion refer to the United States Environmental Protection Agency (EPA) List of automotive diesel production and combustion

## Data selection and combination
For each breeding or production stage of large yellow croaker cage culture, the basic data were collected through direct field detection, or indirect literature search and reports of government companies. The validity and authenticity of the data are very important. The correct data should be further collected and distributed for the establishment of the life cycle list. When the collected data is invalid, the collection method should be adjusted to transform it into valid data. The data that is still invalid or wrong should be eliminated, and the relevant data should be supplemented

## Data treatment and extrapolations
The literature calculates carbon footprints based on inventories and emission factors, and the emission factor data come from other literature and reported data.Each input data is converted according to the service life of the corresponding material

## Sampling procedure
The data mainly comes from Zhejiang Da Ocean Technology Co., LTD., which conducts traditional small cage farming of large yellow croaker in Shacheng, Putuo District, Zhoushan City.

## Use advice
Users of this dataset should note that it covers the range from the construction of cages to the production stage of adult large yellow croaker, excluding the hatching to semi-adult breeding stages and post-harvest processing of the fish. Use the data with caution when extrapolating beyond the system boundary described; for studies requiring full life cycle analysis, additional data on hatching, juvenile breeding, and processing should be sought. Energy consumption and allocation of shared resources in the aquaculture process should be accounted for accurately.

## Review details
Inventory: The internal review was done by several iteration steps concerning raw data validation, raw data documentation, representativity, completeness and consistency of modelling with regard to ISO 14040 and 14044.

## Data sources
- 付晓洋. 基于生命周期评价的大黄鱼网箱养殖环境影响分析. (浙江海洋大学, 2016).
