# Groundwater ex-situ remediation ; Pump and treat ; construction; Treatment facilities

Dataset: ILCD process, Unit process, single operation
Geography: CA
Reference year: 2007
Classification: Unit processes / Other Services / Repair and maintenance
Generated by: Wang Ning, wang_ning@caep.org.cn
Owner: Tiangong LCI Data Working Group
Review: Dependent internal review by Tiangong LCI Data Working Group
Amounts: no units in this file; such an amount is in the reference unit of its flow, which a separate flow dataset defines
copyright: false
licenseType: Free of charge for all users and uses

## General comment
Construction of wastewater disposal facilities using activated carbon, glass, latex

## Geography
The contaminated area was located 600 m from a river shore in the northern part of the prov-ince of Quebec， Canada.

## Technical purpose
The process described is utilized for the construction of wastewater disposal facilities specifically designed for groundwater ex-situ remediation. The facilities are constructed using materials such as activated carbon, glass, and latex. These facilities are essential for treating contaminated groundwater extracted from sites such as the one 600 meters from a river shore in the northern part of Quebec, Canada. This technology is pertinent for areas that require remediation due to environmental pollution.

## Reference product
- Treatment facilities: 1; estimated
  在现场建造一套废水处理装置

## Inputs
- Activated Carbon: 530700; estimated
  在现场建造废水处置装置所消耗的活性炭颗粒
- Latex: 52.8; estimated
  在现场建造废水处置装置所消耗的乳胶
- Glass (formed & finished): 6264; estimated
  在现场建造废水处置装置所消耗的玻璃

## Use advice
When using this data set for life cycle assessment, special consideration should be given to the geographical location and specific environmental conditions of the site where the wastewater disposal facilities will be constructed. The construction materials' inputs and the facility's outputs must be accounted for accurately in the inventory analysis. Attention should also be directed towards the methodological treatment of recycling processes if applicable and the modeling of the use phase behavior that the facilities undergo. Additionally, users should evaluate the technological applicability based on the local context and environmental regulations.

## Review details
Inventory: The internal review was done by several iteration steps concerning raw data validation, raw data documentation, representativity, completeness and consistency of modelling with regard to ISO 14040 and 14044.

## Data sources
- Cadotte, M., Deschênes, L. & Samson, R. Selection of a remediation scenario for a diesel-contaminated site using LCA. Int J Life Cycle Assess 12, 239–251 (2007).
