# Livestock and poultry breeding ; slaughtering stage ; pigs

Dataset: ILCD process, Unit process, single operation
Geography: SD-CN
Reference year: 2014
Classification: Unit processes / Materials production / Agricultural production means
Functional unit: 1kg pork
Generated by: Rui Yang, 1632707028@qq.com
Owner: Tiangong LCI Data Working Group
Review: Dependent internal review by Tiangong LCI Data Working Group
Amounts: no units in this file; such an amount is in the reference unit of its flow, which a separate flow dataset defines
copyright: false
licenseType: Free of charge for all users and uses

## General comment
The general energy consumed in the slaughterhouse stage is electricity, and the energy consumption coefficients of slaughterhouse processing for pork, beef, poultry meat, milk and poultry eggs are 3.76 KJ·kg-1, 4.37 KJ·kg-1, 2.59 KJ·kg-1, 1.12 KJ·kg-1 and 8.16 KJ·kg-1, respectively [61].

## Geography
This study was conducted from 2014 to 2015, aiming at livestock and poultry feeding cycle, meat ratio, feed formula, feed consumption, coal and electricity consumption, etc. Has been to Shandong Gaomi Zhengda pig farm, Laixi City Zhishuang dairy farm, Jimo city Duan Bolan town Jiangjiapo village pig farm, Jimo City Liujiazhuang town livestock farm, Rizhao City Changling town Guanzhuang village, Juxian County Zhailihe town Dongxing Agriculture and animal husbandry company, Juxian Qiaoshan town east Chen dairy farm, Juxian Qiaoshan town Liu Jiayi water pig farm, Zhucheng Foreign Trade Co., LTD. Phoenix parents breeding duck farm, Xinjiang Fukang Hongfa Breeding professional cooperative, Jiuyun Street Town Xuhong laying Chicken cooperative, Jiuyun Street Town Liuyun Village self-contained breeding farm, China Australia Holding Group Co., LTD., Dezhou City Qingyun County Wayu Village, Shandong Province Qingyun County four Liu community beef cattle breeding base, Dezhou City Qingyun Qingnian chicken breeding base, Qingyun County Yongli Poultry layer breeding company, Qingyun County Xingchen youth chicken breeding Field research was carried out by professional breeding cooperatives, Qingyun Dongtai broiler breeding cooperatives, Hebei Yanshan Boyuan Feed Co., LTD., Yanshan Da Chinese Feed Co., LTD., Wudi Liuhe Feed Co., LTD., and China-Australia Oriental Hope Feed Co., LTD.

## Technology and included processes
In this paper, the life cycle of livestock and poultry farming is divided into six stages: feed crop planting, feed processing, livestock and poultry raising, manure treatment, slaughter and transportation. The specific life cycle process of livestock and poultry breeding is shown in Figure 2-1. Due to the lack of some data and the limitations of basic conditions, the production, transportation and use of pesticides, mulch and feed additives have not been analyzed, and the environmental impact caused by other related infrastructure construction, transport production and labor costs is no longer considered.

## Technical purpose
This data set describes the energy consumption for the slaughtering stage in livestock and poultry breeding, specifically for pigs. The energy consumption coefficients are detailed for various animal products. This data is applicable for environmental impact assessments and optimization of energy usage in slaughterhouses during the process of slaughtering pigs, cattle, poultry, and for the production of milk and poultry eggs. Applicability extends to stakeholders in the agricultural industry and environmental scientists conducting life cycle assessments.

## Reference product
- pig: 1; measured

## Inputs
- Electricity: 0.00376; estimated
  屠宰阶段一般消耗的能源为电力

## Outputs
- carbon dioxide (fossil),carbon dioxide (fossil): 0.00112; measured
  pig
- sulfur dioxide: 3.1e-5; measured
  pig
- nitrogen, total (excluding N2): 3.7e-6; measured
  pig

## Data selection and combination
直接数据：畜禽饲养阶段数据皆来自实地调研，通过现场收集及企业可公开 数据获得。背景数据：化肥、电力、燃煤等数据来自相关统计年鉴及国家统计局、农业 部网站的公开数据。

## Use advice
Users of this data set should apply the energy consumption coefficients carefully when assessing the environmental impact of the slaughterhouse stage in livestock production. It is important to ensure the usage of current electricity consumption rates and adjust the data if necessary. Recalculation should be considered if the data set is applied in different geographical locations or under different technological conditions. The data should also be updated accordingly if there are significant changes in the energy supply or slaughtering techniques. Users should ensure that the background data such as for fertilizer, electricity, and coal are obtained from reliable sources and are up-to-date.

## Review details
Inventory: The internal review was done by several iteration steps concerning raw data validation, raw data documentation, representativity, completeness and consistency of modelling with regard to ISO 14040 and 14044.

## Data sources
- 周景月. 基于生命周期评价的畜禽养殖环境影响分析. (青岛科技大学, 2017).
