# Bauxite Mining ; Bauxite ; Cradle ; 2016

Dataset: ILCD process, Unit process, single operation
Geography: CN
Reference year: 2021
Classification: Unit processes / Materials production / Non-energetic raw materials
Generated by: Zimeng Cai, caizm6178@163.com
Owner: Tiangong LCI Data Working Group
Review: Dependent internal review by Tiangong LCI Data Working Group
Amounts: no units in this file; such an amount is in the reference unit of its flow, which a separate flow dataset defines
copyright: false
licenseType: Free of charge for all users and uses

## General comment
氧化铝生产2017

## Time period
Date of publication

## Technical purpose
The data set describes the environmental impacts associated with the extraction of bauxite, the raw material from which alumina (Al2O3) is produced. It encompasses the bauxite mining processes from the initial point ('cradle') up to, but not including, the alumina production phase ('gate'). This LCA data set is intended for use by analysts and practitioners evaluating the environmental aspects in the lifecycle of aluminum products, from raw material extraction to the end-of-life phase.

## Reference product
- bauxite: 6.73303e10; software or database

## Inputs
- electricity, high voltage, aluminium industry: 1.46534e8; software or database
  electricity
- Coal, brown, in ground: 4.0276e7; software or database
  coal
- Diesel oil: 1.8013e7; software or database
  diesel
- petrol, unleaded, burned in machinery: 1.815e6; software or database
  gasoline

## Data selection and combination
The data in this study refers to the LCA data of PA, SA, electricity, and other background data. The PA data were obtained from statistical data sources, and the SA data were mainly obtained from the literatures. The background data were mainly derived from the Chinese localization LCA database CAS RCEES 2018, which was established by the Research Center for Eco-Environmental Sciences, Chinese Academy of Sciences and covers LCA data for energy, materials, transportation, waste management etc.

## Use advice
Users of this LCA data set should ensure that all relevant stages of bauxite mining are accounted for, including the potential impacts of land use, water consumption, and emissions. When integrating this data into the wider lifecycle of an aluminum product, attention should be paid to methodological consistency, ensuring comparable functional and reference units. Data for alumina production and processing should be sourced from corresponding LCA data sets for accurate assessment. Reliance on local Chinese data for background processes, such as energy production and transportation, is advisable due to this dataset using Chinese localization LCA database (CAS RCEES 2018).

## Review details
Inventory: The internal review was done by several iteration steps concerning raw data validation, raw data documentation, representativity, completeness and consistency of modelling with regard to ISO 14040 and 14044.

## Data sources
- Ding, N., Liu, N., Lu, B. & Yang, J. Life cycle greenhouse gas emissions of aluminum based on regional industrial transfer in China. J. Ind. Ecol. 25, 1657–1672 (2021).
