# Steel products ; steel ; Steel production

Dataset: ILCD process, Unit process, single operation
Geography: NJ-JS-CN
Reference year: 2012
Classification: Unit processes / Materials production / Metals and semimetals
Generated by: Wanghuanyu, wanghuanyu00@126.com
Owner: Tiangong LCI Data Working Group
Review: Dependent internal review by Tiangong LCI Data Working Group
Amounts: no units in this file; such an amount is in the reference unit of its flow, which a separate flow dataset defines
copyright: false
licenseType: Free of charge for all users and uses

## General comment
This data set pertains to the production of steel products by the Nanjing Iron and Steel Co., Ltd. The steel produced is suitable for a wide range of applications including construction, automotive industry, shipbuilding, infrastructure, and the manufacture of machinery and appliances.

## Geography
南京钢铁联合有限公司

## Reference product
- iron: 1000; measured

## Inputs
All rows: measured
- Coking coal: 318.2
  coking coal
- Coal injection: 318.2
  Blast furnace coal injection
- Coal injection: 318.2
  Coal for sintering/converter
- coke,Coke: 313.8
  Coke
- Limestone: 2272.7
- dolomite: 2123.1
- Electricity: 3777.48

## Outputs
- carbon dioxide (fossil): 990; measured
  原文未区分bio和fossil，根据专家判断,钢铁生产过程中碳排放源此处为fossil）

## Use advice
When utilizing this data, attention should be paid to the specific life cycle stage of the steel production that has been assessed. Users must consider the technological applicability, such as the energy sources used, the type of production processes employed (e.g., blast furnace, electric arc furnace), and emissions standards adhered to by Nanjing Iron and Steel Co., Ltd. Ensure proper allocation when dealing with multi-output processes and consider the potential for recycling and end-of-life stages.

## Review details
Inventory: The internal review was done by several iteration steps concerning raw data validation, raw data documentation, representativity, completeness and consistency of modelling with regard to ISO 14040 and 14044.
