# Rare earth oxides direct Emission;Rare earth oxides;ion-adsorption process;ion-adsorption clays

Dataset: ILCD process, Unit process, single operation
Geography: CN
Reference year: 2014
Valid until: 2016
Classification: Unit processes / Materials production / Inorganic chemicals
Functional unit: The functional unit is defined as the production of 1 kg of 90–92% purity mixed REOs by the in-situ leaching method from ion-adsorption clays in southern China.
LCI method principle: Attributional
LCI method approaches: Allocation - market value
Generated by: Tao Wang, twang@iue.ac.cn
Owner: Tiangong LCI Data Working Group
Review: Dependent internal review by Tiangong LCI Data Working Group
Amounts: no units in this file; such an amount is in the reference unit of its flow, which a separate flow dataset defines
copyright: false
licenseType: Free of charge for all users and uses

## General comment
This dataset describes the direct emission process for rare earth oxides from ion-adsorption clays in Southern China. The described process is specifically for the production of mixed rare earth oxides, typically used in the manufacturing of magnets, catalysts, alloys, and glass. However, downstream processes including solvent extraction and metal production are not included within the system boundary of this dataset.

## Geography
Southern China

## Technology and included processes
The process ends at mixed rare earth oxides and downstream processes such as solvent extraction and metal production are not included in the system boundary. At certain sites further processing may occur (e.g., separating REEs into light and groups).

## Reference product
- Rare Earth Oxides: 1; calculated
  LANGUAGE

## Outputs
- ammonium: 1.88; min 0.26; max 3.5; uniform; software or database
  Ammonium, ion
- sulfate: 6.5; min 4.72; max 8.28; uniform; software or database
- carbon dioxide (fossil): 0.46; software or database
  From calcination
- ammonia: 0.34; software or database

## Deviations from the LCI method approaches
In this study, the material and energy flow data is gathered from Chinese literature and verified through personal communications with Chinese experts working in this industry. These datasets are derived based on attributional modeling (instead of consequential) and for most multi-products processes economic allocation is used. Since the data was collected from different sources

## Use advice
When employing this dataset for a Life Cycle Assessment (LCA), ensure that it is applicable to the geographical scope of your assessment – specifically Southern China. Recognize that this dataset represents attributional modeling based on economic allocation for multi-product processes and may not be suitable for studies necessitating consequential modeling. Downstream processes must be independently considered and are not covered by this dataset. Data users should also consider it is based on personal communications with experts and literature from China and may require review if applied in different technological or geographical contexts.

## Review details
Inventory: The internal review was done by several iteration steps concerning raw data validation, raw data documentation, representativity, completeness and consistency of modelling with regard to ISO 14040 and 14044.

## Data sources
- Vahidi, E., Navarro, J. & Zhao, F. An initial life cycle assessment of rare earth oxides production from ion-adsorption clays. Resources, Conservation and Recycling 113, 1–11 (2016).
