# Aluminum Recycling ; Recycled Aluminum Ingots ; Scrap Aluminum ; 2007

Dataset: ILCD process, Unit process, single operation
Geography: CN
Reference year: 2021
Classification: Unit processes / Materials production / Metals and semimetals
Generated by: Zimeng Cai, caizm6178@163.com
Owner: Tiangong LCI Data Working Group
Review: Dependent internal review by Tiangong LCI Data Working Group
Amounts: no units in this file; such an amount is in the reference unit of its flow, which a separate flow dataset defines
copyright: false
licenseType: Free of charge for all users and uses

## General comment
This data set represents the process of recycling aluminum into recycled aluminum ingots from scrap aluminum. The recycled ingots can be used in various industries, including automobile manufacturing, construction, and packaging, where high-quality aluminum products are required.

## Time period
Date of publication

## Reference product
- secondary aluminium ingot: 1000; missing unimportant
  ingot

## Inputs
- electricity, high voltage, aluminium industry: 925.2; missing unimportant
  electricity
- aluminium scrap, unspecified: 1350; missing unimportant
  aluminum scrap

## Data selection and combination
The data in this study refers to the LCA data of PA, SA, electricity, and other background data. The PA data were obtained from statistical data sources, and the SA data were mainly obtained from the literatures. The background data were mainly derived from the Chinese localization LCA database CAS RCEES 2018, which was established by the Research Center for Eco-Environmental Sciences, Chinese Academy of Sciences and covers LCA data for energy, materials, transportation, waste management etc.

## Use advice
When utilizing this data set for life cycle assessment purposes, users should note that the primary aluminum (PA) data were obtained from statistical sources, while secondary aluminum (SA) data stemmed from literature. Users should ensure the context of their LCA study matches the technological scope of this data set. Background data should be considered with the understanding that it is localized to the Chinese market and is derived from the CAS RCEES 2018 database. Adjustments may be necessary if applying the data to different geographical contexts.

## Review details
Inventory: The internal review was done by several iteration steps concerning raw data validation, raw data documentation, representativity, completeness and consistency of modelling with regard to ISO 14040 and 14044.

## Data sources
- Ding, N., Liu, N., Lu, B. & Yang, J. Life cycle greenhouse gas emissions of aluminum based on regional industrial transfer in China. J. Ind. Ecol. 25, 1657–1672 (2021).
