# Secondary copper;Refined copper;fire refining and electrorefining;Copper scrap

Dataset: ILCD process, Unit process, single operation
Geography: CN
Reference year: 2018
Classification: Unit processes / Materials production / Metals and semimetals
Functional unit: The production of 1000 kg of refined copper (99.99% cathode copper) was selected as the FU in this paper” (Chen 等, 2019, p. 36)
LCI method principle: Attributional
LCI method approaches: Allocation - market value
Generated by: Peng Wang, 2867919560@qq.com
Owner: Tiangong LCI Data Working Group
Review: Dependent internal review by Tiangong LCI Data Working Group
Amounts: no units in this file; such an amount is in the reference unit of its flow, which a separate flow dataset defines
copyright: false
licenseType: Free of charge for all users and uses

## General comment
The process described pertains to the production of refined copper through fire refining and electrorefining techniques, utilizing copper scrap. This refined copper, with a purity of 99.99%, is applicable in various industries where high conductivity and corrosion resistance are required, such as in the manufacture of electrical wires, circuits, and high-quality roofing materials.

## Geography
Resources, energy consumption and pollution data of primary copper production were collected mainly from the survey of production technology and typical enterprises in this study.

## Technology and included processes
The system boundary for both technologies covered the major production process, including mining (mining and beneficiation), smelting (smelting and converting), fire refining and electrorefining for primary copper, and pretreatment (disassembling and separation), fire refining and electrorefining for secondary copper, a

## Reference product
- Refined copper: 1000; measured
  Refined copper needs to be supplemented

## Inputs
- crude oil; 42.3 MJ/kg: 8.78; software or database
  Crude oil (resource)
- hard coal,hard coal,hard coal: 162; software or database
  Hard coal (resource)
- natural gas; 44.1 MJ/kg: 492; software or database
  Natural gas (resource)
- Copper scrap（Cu 95%）,Copper scrap（Cu 95%）: 1860; measured
  Copper scrap needs to be supplemented
- freshwater,freshwater: 1400; measured
  Fresh water
- Limestone: 8.46; software or database
- Refractory material: 7.62; measured
  Refractory material needs to be supplemented
- Industrial oxygen: 91.4; measured
  Industrial oxygen needs to be replenished
- Sulfuric acid(98%): 6.8; measured
  Sulfuric acid resourse needs supplementation
- Spray mold: 5.08; measured
  Spray mold needs to be replenished
- sodium hydroxide: 0.04; measured
  Sodium hydroxide
- Sodium chlorate: 0.454; measured
  Sodium chlorite needs to be supplemented
- Sodium hypochlorite: 0.374; measured
  Sodium hypochlorite needs to be supplemented

## Outputs
All rows: measured
- carbon dioxide (fossil): 278
  原文未区分bio和fossil，根据专家判断此处为fossil
- sulfur dioxide: 0.783
  Sulfur dioxide
- nitrous oxide: 0.0832
  Nitrogen oxide
- carbon monoxide,carbon monoxide (fossil): 0.366
  原文未区分bio和fossil，根据专家判断此处为fossil
- methane (fossil): 1.32
  原文未区分bio和fossil，根据专家判断此处为fossil
- nitrous oxide: 0.00588
  Nitrous oxide
- sulphuric acid: 0.00034
- particles (PM2.5 - PM10): 2.62
- mercury: 0.00142
  Mercury
- lead: 0.00117
  Lead
- zinc: 0.00101
- nickel: 0.000593
  Nickel
- arsenic: 0.000136
  Arsenic
- chemical oxygen demand: 0.231
  Chemical oxygen demand
- biological oxygen demand: 0.00241
  Biochemical oxygen demand needs to be supplemented
- Solid suspension: 0.177
  Solid suspension needs to be supplemented
- Ammonia Nitrogen: 1.64e-7
  Ammonia nitrogen needs to be supplemented
- municipal solid waste deposition: 1330
  Solid waste

## Deviations from the LCI method approaches
Combined with the characteristics of refined copper production in China, the CML2001 method (2016 revision), was selected for environmental impact accounting in this study.

## Data selection and combination
Resources, energy consumption and pollution data of primary copper production were collected mainly from the survey of production technology and typical enterprises in this study. The upstream date was from GaBi (ts vision) and Ecoinvent database

## Data treatment and extrapolations
This study used Gabi software (ts version) as the calculation software and the model was built for both technologies.

## Use advice
When utilizing this LCA data set for calculating environmental impacts, it is essential to adhere to the CML2001 method (2016 revision). Ensure that the system boundaries include raw copper mining, smelting, fire refining, electrorefining for primary copper, and pretreatment, fire refining, and electrorefining for secondary copper. The data should not be extrapolated to different production processes or geographic regions without relevant adjustments. It is recommended to use the GaBi software (ts version) as per the study's practice for consistent modeling and analysis.

## Review details
Inventory: The internal review was done by several iteration steps concerning raw data validation, raw data documentation, representativity, completeness and consistency of modelling with regard to ISO 14040 and 14044.

## Data sources
- Chen, J. et al. Environmental benefits of secondary copper from primary copper based on life cycle assessment in China. Resources, Conservation and Recycling 146, 35–44 (2019).
