# cement production;cement, ordinary portland cement;new dry process, 5000 t/d;mixed solid wastes

Dataset: ILCD process, Unit process, black box
Geography: CN
Classification: Unit processes / Materials production / Other mineralic materials
Generated by: #REF!, ysqsophia@gmail.com
Owner: Tiangong LCI Data Working Group
Review: Dependent internal review by Tiangong LCI Data Working Group
Amounts: no units in this file; such an amount is in the reference unit of its flow, which a separate flow dataset defines
copyright: false
licenseType: Free of charge for all users and uses

## General comment
Equipped with a 5000T/D new dry process cement clinker production line, which adopts advanced enhanced suspension preheater five-stage kiln decomposition technology and advanced cement production equipment such as vertical raw material mill and large ball mill with roller press.

## Geography
Two cement plants in the Northeast

## Technical purpose
The cement production data set represents ordinary Portland cement manufactured using the new dry process technology with a capacity of 5000 tonnes per day (t/d). This type of cement is widely used in general construction, including buildings, bridges, pavements, and other infrastructure projects. It may also be utilized for residential and commercial construction, due to its hydraulic properties and strength. The incorporation of mixed solid wastes suggests an environmental consideration in the production process, allowing for waste-to-resource strategies within the cement industry.

## Model description
The system boundary is the cement production system of the cement plant.

## Reference product
- cement, ordinary portland cement: 1000
  Cement products

## Inputs
- limestone, crushed, for mill: 1142.86
  Limestone
- sandstone: 73.6264
  Sandstone
- shale: 54.9451
  Shale
- ash: 107.692
  Fly ash
- iron, powder: 19.0659
  Iron powder
- gypsum stone (CaSO4-dihydrate): 47.8022
  Gupsum
- blast furnace slag: 38.7912
  Blast furnace slag
- hard coal: 134.011
  Bituminous coal. Annual energy consumption of coal = (2.439E+8) kg x (2.1477E+7) J/kg (average lower heating value) = (5.24E+15) J
- Electricity: 352.8
  Total electricity consumption. Annual energy consumption of electricity = (1.7836E+8) kWh x (3.60E+6) J/kWh = (6.42E+14) J
- tap water: 369.78
  The original text refers to total water consumption, which includes tap water.

## Outputs
- particles (> PM10): 0.295604
  Dust, with an unspecified particle size, is treated as PM > 10 micrometers in diameter.
- nitrogen dioxide: 1.56593
  NO2
- sulfur dioxide: 0.308
  SO2
- carbon dioxide (fossil): 409.341
  CO2

## Use advice
When utilizing this data set for Life Cycle Assessment (LCA), it is crucial to ensure that the technological scope of the assessment aligns with the advanced machinery and production techniques employed in the described facilities. Consideration should be given to the replacement of traditional raw materials with mixed solid wastes when conducting an environmental impact assessment. Data users must also respect the defined system boundary, which is confined to the cement production system of the cement plant. For any extrapolation or comparison with other production methods and scales, proper scaling and normalization techniques should be applied. It's also recommended to monitor updates, as technology and production practices may evolve, potentially impacting the LCA results.

## Review details
Inventory: The internal review was done by several iteration steps concerning raw data validation, raw data documentation, representativity, completeness and consistency of modelling with regard to ISO 14040 and 14044.

## Data sources
- 邵帅. (2016). 基于Emergy和Em-LCA的水泥企业可持续发展水平评价 [硕士, 大连理工大学].
