# underground coal mining ;coal mining

Dataset: ILCD process, Unit process, black box
Geography: CN
Reference year: 2018
Classification: Energy carriers and technologies / Hard coal based fuels
Generated by: Linlin Yin, yinlinlin0623@163.com
Owner: Tiangong LCI Data Working Group
Review: Dependent internal review by Tiangong LCI Data Working Group
Amounts: no units in this file; such an amount is in the reference unit of its flow, which a separate flow dataset defines
licenseType: Free of charge for all users and uses

## General comment
The described process relates to the mining of coal from low and high gaseous underground coal mines in China. This data set is intended for use in life cycle assessments of products and services that involve coal extracted from such mines. It can serve stakeholders in the coal industry, including mining companies, environmental analysts, and policymakers. Applications include, but are not limited to, energy production, metallurgical processes, and as a raw material for chemical synthesis.

## Geography
According to the measured data of CO2 relative emission in 1161 high gassy mines among 7575 underground coal mines in China in 2011, the CO2 escape emission factors in the mining process of low gassy underground coal mines in China were calculated and analyzed.

## Technology and included processes
Underground coal mining

## Reference product
- Hard coal, at consumer EU-27: 1000; uniform; estimated
  In 2011, China 's underground coal mine high gas mine group mined 1 ton of coal.

## Outputs
- carbon dioxide (fossil): 9.38; max 93.14; normal; software or database
  Emission factor, the average CO2 escape emission factor of high-gas mines is 9.38m3 - that is, 9.38m3 of CO2 is released for every 1 ton of coal mined. The CO2 escape emission factors of high-gas mines in 7575 mines are not normally distributed but are generally similar.
- carbon dioxide (fossil): 9.38; uniform; calculated
  In 2011, the amount of CO2 released by 1 ton of coal mining in high gas mine group of China 's underground coal mine.

## Data selection and combination
The emission sources of CO2 escape in the process of underground coal mining are sorted out, and a calculation method based on emission factors is proposed to calculate the total amount of CO2 emission, and then consider the reduction contribution of gas recovery and / or the incremental contribution of torch destruction. Secondly, according to the measured data of CO2 relative emission of 1161 high gas mines in 7575 underground coal mines in China in 2011, the CO2 escape emission factors in the mining process of high gas underground coal mines in China were calculated and analyzed.

## Use advice
Users of this data set should carefully consider the specific CO2 escape emission factors presented for low and high gas underground coal mines, as these factors are vital for assessing the environmental impact during the life cycle analysis of coal-derived products or services. It is crucial to account for the total CO2 emissions, including the reduction due to gas recovery efforts and any increases from torch destruction of gases. The data set reflects conditions specific to the year 2011 and should be updated or adjusted for use in different temporal contexts. When applying this data, users should ensure any assumptions and methodological choices are consistent with the goal and scope of their particular life cycle assessment study.

## Review details
Inventory: The internal review was done by several iteration steps concerning raw data validation, raw data documentation, representativity, completeness and consistency of modelling with regard to ISO 14040 and 14044.

## Data sources
- 于胜民, 朱松丽, & 张俊龙. 中国井工煤矿开采过程的二氧化碳逃逸排放因子研究. 中国能源 40, 10-16+33 (2018).
