# underground coal mining ; coal mining

Dataset: ILCD process, Unit process, black box
Geography: CN
Reference year: 2005
Classification: Unit processes / Energy carriers and technologies / Hard coal based fuels
Generated by: Linlin Yin, yinlinlin0623@163.com
Owner: Tiangong LCI Data Working Group
Review: Dependent internal review by Tiangong LCI Data Working Group
Amounts: no units in this file; such an amount is in the reference unit of its flow, which a separate flow dataset defines
licenseType: Free of charge for all users and uses

## General comment
With the increase of mining depth, the gas content of coal seam increases.

## Geography
Methane emission during underground coal mining in ' East China ' region in 2000.

## Technology and included processes
The amount of methane discharged into the atmosphere from coal mines in China in 1994 and 2000 was investigated and studied. Through the collation and analysis of a large number of mine gas grade identification data of state-owned key, state-owned local and township coal mines, the amount of methane drainage and utilization in mines was investigated, and some laboratory measurements were supplemented. On this basis, in accordance with the IPCC Guidelines for the revision of the second.

## Technical purpose
The process described is the underground extraction of coal within the 'East China' region, specifically focusing on the emission of methane (CH4) during the coal mining activities in the year 2000. This coal is likely used as a fuel source in power generation and other industrial applications requiring high-grade coal. Particular attention is paid to the methane emissions, suggesting that this data set may be especially relevant for studies on environmental impact, air quality control, greenhouse gas inventory, and climate change mitigation strategies. The coal extracted might also contribute to raw materials for the production of coal-based chemical products.

## Reference product
- Hard coal, at consumer EU-27: 1.766e11; uniform; software or database
  Coal production in the process of underground coal mining in East China in 2000.

## Inputs
- Hard coal, at consumer EU-27: 1.766e11; uniform; estimated
  The literature does not explain the amount of coal input. Assume : the amount of coal input : output = 1 : 1.

## Outputs
- methane (fossil): 1.0988e9; uniform; calculated
  Methane emissions from underground coal mining in East China in 2000 (methane emission coefficient 6.22 m3 / t * coal production 176.60 Mt ) ; the original text does not distinguish the flow of bio and fossil, which is judged by experts to be fossil.

## Use advice
Users of this data set should consider it in the context of environmental impact assessments regarding methane emissions from coal mining activities. When using the data, they should adopt the IPCC's 'Tier 2' approach with regional average methane coefficients for calculation, as applied in the creation of the dataset. Due attention should be given to technological changes since 2000 which may have altered the efficiency of methane capture and utilization in coal mines. If used for comparative studies or temporal analyses, adjustments may be required to account for technological and methodological advancements over time.

## Review details
Inventory: The internal review was done by several iteration steps concerning raw data validation, raw data documentation, representativity, completeness and consistency of modelling with regard to ISO 14040 and 14044.
