# Cutting and forming ; Paper-faced gypsum board ; Desulfurization gypsum, finishing paper, etc. ; Cutting and forming ; All sizes; NESPS2 / 切割成型 ; 纸面石膏板 ; 脱硫石膏、饰面纸等 ; 切割成型 ; 所有规模 ; 全国第二次污染普查数据

Dataset: ILCD process, Unit process, single operation
Geography: CN
Reference year: 2019
Classification: Reference Parameters / Materials production / Paper and cardboards
Generated by: The data was created by the Office of the Second National Pollution Source Census of the Ministry of Ecology and Environment, and the data was organized by the TianGong Plan team for ILCD format / 生态环境部第二次全国污染源普查工作办公室创建数据，天工计划团队常慧敏整理数据为ILCD格式
Owner: Tiangong LCI Data Working Group / 天工LCI数据工作小组
Review: Dependent internal review by Tiangong LCI Data Working Group / 天工LCI数据工作小组
Amounts: no units in this file; such an amount is in the reference unit of its flow, which a separate flow dataset defines
copyright: false
licenseType: Free of charge for all users and uses

## General comment
the Technical of end-of-pipe management technology for pollution Exhaust gasis/，The formula for calculating the actual operation rate (k-value) of the end-of-pipe treatment facility is k = operating time of wastewater treatment facilities (days/year) / production time (days/year)

## Technical purpose
所描述的工艺用于切割和成型各种尺寸的纸面石膏板。它使用脱硫石膏和饰面纸作为材料。这个制造过程可用于生产在建筑中用于墙体、天花板和隔断系统等地方所需的石膏板。用于管理颗粒污染的技术包括使用袋式过滤器捕捉 PM2.5 至 PM10 颗粒，端部处理的技术效率为99%。

## Reference product
- Drywall: 1000; calculated
  源文件中描述为为纸面石膏板，此处对其进行了匹配工作，将其匹配到LCAflow库里面相最符合的流

## Outputs
- particles (PM2.5 - PM10): 0.123; calculated
  the Technical of end-of-pipe management technology for pollution particles (PM2.5 - PM10)isBag filter，Its Technical efficiency of end-of-pipe management99，The formula for calculating the actual operation rate (k-value) of the end-of-pipe treatment facility is /
  污染物指标颗粒物的末端治理技术是袋式除尘，其效率为99，末端治理设施实际运行率（k值）计算公式为k=治理设施正常运行小时数（小时/年）/企业正常运转小时数（小时/年）。原文件中描述污染物类别为废气，污染物指标为颗粒物，此处对其进行了匹配工作，将其匹配到LCAflow库里面相最符合的流
- Exhaust gas: 1670; calculated
  the Technical of end-of-pipe management technology for pollution Exhaust gasis/，The formula for calculating the actual operation rate (k-value) of the end-of-pipe treatment facility is k = operating time of wastewater treatment facilities (days/year) / production time (days/year)
  污染物指标废气量的末端治理技术是/。原文件中描述污染物类别为废气，污染物指标为废气量，此处对其进行了匹配工作，将其匹配到LCAflow库里面相最符合的流

## Use advice
This dataset is derived from the Pollution Source Census Report and contains information on pollution emissions and related products. However, it does not include data on energy or chemical consumption, nor does it provide information on waste or co-product generation. When utilizing this dataset, please supplement the missing data based on actual conditions before use
该数据集来源于污染源普查报告，包含污染物排放及相关产品信息，但不包含能源或化学品消耗数据，也不提供废弃物或共生产物产生信息。在使用该数据集时，请根据实际情况补充缺失数据后再使用。

## Review details
Inventory: The internal review was done by several iteration steps concerning raw data validation, raw data documentation, representativity, completeness and consistency of modelling with regard to ISO 14040 and 14044.
清单： 内部审查通过几个迭代步骤完成，涉及原始数据验证、原始数据记录、代表性、完整性、与 ISO 14040 和 14044 有关的建模的一致性。

## Data sources
- 第二次全国污染源普查产排污核算系数手册（试用版）,二级代码30,三级代码302.0,四级代码3024文件，在完整版文件中第723页
