# Production of perovskite photovoltaic module;mixed cation module 1m2;spin coating method;lead iodide

Dataset: ILCD process, Unit process, single operation
Geography: US
Classification: Unit processes / Energy carriers and technologies / Electricity
Functional unit: 1 square meter perovskite photovoltaic module
Generated by: Xijing Yao, 15898832265@163.com
Owner: Tiangong LCI Data Working Group
Review: Dependent internal review by Tiangong LCI Data Working Group
Amounts: no units in this file; such an amount is in the reference unit of its flow, which a separate flow dataset defines
copyright: false
licenseType: Free of charge for all users and uses

## General comment
The main process steps include substrate glass production, deposition of perovskite layers, deposition of electron transport layers, and packaging.

## Technology and included processes
Spin-coating method: The spin-coating process is relatively simple, and it is the mainstream preparation method of perovskite light-absorbing layer. Firstly, PbX2 was dissolved in solvent and spun on the substrate to form a film; Then PbX2 is soaked in solution or spun on the substrate again to react with PbX2 film to produce perovskite.

## Technical purpose
This mixed-cation perovskite photovoltaic module of 1 square meter is intended for use in solar power applications to convert solar energy into electrical power. It can be integrated into various systems such as residential solar panels, commercial photovoltaic arrays, and in utility-scale solar farms. Due to its specific material properties, it offers enhanced performance in diverse climatic conditions and is suited for regions with high solar insolation.

## Reference product
- Solar Module,Solar Module,Solar Module: 1; log-normal

## Inputs
All rows: log-normal
- ethanol: 0.0271, 0.0271 (2 entries)
  Cleaning solvent
- acetone: 0.147
  Cleaning solvent
- Titanium dioxide, chloride and sulphate processes, >80% TiO2, production mix, at plant: 0.00627
  30 nm of blocking layer
- water: 0.0327
  Cleaning solvent
- Titanium dioxide, chloride and sulphate processes, >80% TiO2, production mix, at plant: 0.00113
  200 nm of ETL
- ethanol: 0.000216
  Solvent of TiO2 paste
- dimethyl formamide: 0.00164
  Solvent of mixed-cation mixtures
- chlorobenzene: 0.000122
  Additive
- acetonitrile: 0.000263
  Solvent of HTFSI
- chlorobenzene: 0.00733
  Solvent of Spiro-OMeTAD
- copper: 0.00115
  80 nm of electrode
- argon: 0.0865
- oxygen: 8.65e-5
- polyethylene terephthalate (PET) granulate: 0.0202
- Adhesives: 0.0617
- dimethyl sulfoxide: 0.000479
  Solvent of mixed-cation mixtures
- 4-tert-butylpyridine: 0.000178
  Additive
- Electricity: 265.451
- Fluorine Doped Tin Oxide Coated Glass: 5.04; calculated
- Formamidinium iodide: 0.000412; calculated
- Lead iodide: 0.00116; calculated
- Lead(II) bromide: 0.00163; calculated
- methylammounium iodide: 4.97e-5; calculated
- Spiro-OMeTAD: 0.000485; calculated
- Bis(trifluoromethane)sulfonimide: 5.68e-5; calculated
- FK 209 Co(III) TFSI salt: 1.79e-5; calculated

## Outputs
All rows: log-normal
- ethanol: 0.00589
  Solvent of BL-TiO2 ink and TiO2 paste
- isopropanol: 0.000381
  Solvent of BL-TiO2 ink
- acetone: 0.000184
  Solvent of BL-TiO2 ink
- Titanium dioxide, chloride and sulphate processes, >80% TiO2, production mix, at plant: 0.00079
  Wasted TiO2 paste
- dimethyl formamide: 0.00164
  Solvent of mixed-cation mixtures
- chlorobenzene: 0.00745
  Solvent of Spiro-OMeTAD and waste from spin coating
- acetonitrile: 0.000263
  Solvent of HTFSI
- copper: 0.000573
  Wasted copper
- argon: 0.0865
- oxygen: 8.65e-5
- acetic anhydride: 0.000325
  Solvent of BL-TiO2 ink
- dimethyl sulfoxide: 0.000479
  Solvent of mixed-cation mixtures
- 4-tert-butylpyridine: 0.000125
  Wasted 4-tert-Butylpyridine
- landfill of glas/inert waste: 5.041
  Landfill
- Titanium tetrachloride: 6.03e-5; calculated
- Formamidinium iodide: 0.000288; calculated
- Lead iodide: 0.000811; calculated
- Bis(trifluoromethane)sulfonimide: 0.000114, 3.98e-5 (2 entries); calculated
- Methylamine bromide: 3.48e-5; calculated
- Spiro-OMeTAD: 0.00034; calculated
- FK 209 Co(III) TFSI salt: 1.25e-5; calculated

## Use advice
When using this data for life cycle assessments, it is critical to account for the geographical location of installation due to variances in solar irradiance. Additionally, end-of-life management practices such as recycling or disposal should be clearly outlined. For accurate modelling, users should consider the efficiency degradation over time and maintenance requirements of the photovoltaic modules.

## Review details
Inventory: The internal review was done by several iteration steps concerning raw data validation, raw data documentation, representativity, completeness and consistency of modelling with regard to ISO 14040 and 14044.
