# Metal oxide inorganic mixed-phase pigment ; Metal oxide ; Solid phase reaction method ; All sizes; NESPS2 / 金属氧化物无机混相颜料 ; 金属氧化物 ; 固相反应法 ; 所有规模 ; 全国第二次污染普查数据

Dataset: ILCD process, Unit process, single operation
Geography: CN
Reference year: 2019
Classification: Reference Parameters / Materials production / Inorganic chemicals
Generated by: The data was created by the Office of the Second National Pollution Source Census of the Ministry of Ecology and Environment, and the data was organized by the TianGong Plan team for ILCD format / 生态环境部第二次全国污染源普查工作办公室创建数据，天工计划团队常慧敏整理数据为ILCD格式
Owner: Tiangong LCI Data Working Group / 天工LCI数据工作小组
Review: Dependent internal review by Tiangong LCI Data Working Group / 天工LCI数据工作小组
Amounts: no units in this file; such an amount is in the reference unit of its flow, which a separate flow dataset defines
copyright: false
licenseType: Free of charge for all users and uses

## General comment
the Technical of end-of-pipe management technology for pollution Exhaust gasis/，Its Technical efficiency of end-of-pipe management0

## Technical purpose
该过程涉及通过固相反应方法生产金属氧化物无机混相颜料，适用于各种规模的生产。这些颜料通常用于染色各种材料，如陶瓷、塑料和涂料。末端处理技术在此背景下表示对废水和固废的污染控制措施，以及对铬和颗粒物(PM2.5 - PM10)排放的控制。铬通过还原氧化过程处理，展现高效的污染控制效率，而颗粒物则通过袋式过滤器处理。

## Reference product
- Composite Metal Oxide: 1000; calculated
  源文件中描述为为金属氧化物无机混相颜料，此处对其进行了匹配工作，将其匹配到LCAflow库里面相最符合的流，污染物指标备注为工业废水量

## Outputs
- particles (PM2.5 - PM10): 0.72; calculated
  the Technical of end-of-pipe management technology for pollution particles (PM2.5 - PM10)isBag filter，Its Technical efficiency of end-of-pipe management94
  污染物指标颗粒物的末端治理技术是袋式除尘，其效率为94，末端治理设施实际运行率（k值）计算公式为k=设施年耗电量千瓦时/年生产运行时间小时数×设备额定功率千瓦。原文件中描述污染物类别为废气，污染物指标为颗粒物，此处对其进行了匹配工作，将其匹配到LCAflow库里面相最符合的流，污染物指标备注为颗粒物
- Chromium: 0.00768; calculated
  the Technical of end-of-pipe management technology for pollution ChromiumisRedox process，Its Technical efficiency of end-of-pipe management99
  污染物指标总铬的末端治理技术是氧化还原法，其效率为99，末端治理设施实际运行率（k值）计算公式为k=设施年耗电量千瓦时/年生产运行时间小时数×设备额定功率千瓦。原文件中描述污染物类别为废水，污染物指标为总铬，此处对其进行了匹配工作，将其匹配到LCAflow库里面相最符合的流，污染物指标备注为总铬
- Waste water: 30000; calculated
  the Technical of end-of-pipe management technology for pollution Waste wateris/，Its Technical efficiency of end-of-pipe management0
  污染物指标工业废水量的末端治理技术是/，其效率为0。原文件中描述污染物类别为废水，污染物指标为工业废水量，此处对其进行了匹配工作，将其匹配到LCAflow库里面相最符合的流，污染物指标备注为工业废水量
- Exhaust gas: 7870; calculated
  the Technical of end-of-pipe management technology for pollution Exhaust gasis/，Its Technical efficiency of end-of-pipe management0
  污染物指标工业废气量的末端治理技术是/，其效率为0。原文件中描述污染物类别为废气，污染物指标为工业废气量，此处对其进行了匹配工作，将其匹配到LCAflow库里面相最符合的流，污染物指标备注为工业废气量

## Use advice
This dataset is derived from the Pollution Source Census Report and contains information on pollution emissions and related products. However, it does not include data on energy or chemical consumption, nor does it provide information on waste or co-product generation. When utilizing this dataset, please supplement the missing data based on actual conditions before use
该数据集来源于污染源普查报告，包含污染物排放及相关产品信息，但不包含能源或化学品消耗数据，也不提供废弃物或共生产物产生信息。在使用该数据集时，请根据实际情况补充缺失数据后再使用。

## Review details
Inventory: The internal review was done by several iteration steps concerning raw data validation, raw data documentation, representativity, completeness and consistency of modelling with regard to ISO 14040 and 14044.
清单： 内部审查通过几个迭代步骤完成，涉及原始数据验证、原始数据记录、代表性、完整性、与 ISO 14040 和 14044 有关的建模的一致性。

## Data sources
- 第二次全国污染源普查产排污核算系数手册（试用版）,二级代码26,四级代码2643文件，在完整版文件中第4111页
