# Rare Earth Roasting;Rare Earth;In-situ leaching;neodymium iron boron (NdFeB) magnet

Dataset: ILCD process, Unit process, single operation
Geography: NMG-CN
Reference year: 2014
Classification: Materials production / Metals and semimetals
Functional unit: The functional unit is a 1 kg NdFeB magnet
LCI method principle: Attributional
LCI method approaches: Allocation - market value; Allocation - mass
Generated by: Tao Wang, twang@iue.ac.cn
Owner: Tiangong LCI Data Working Group
Review: Dependent internal review by Tiangong LCI Data Working Group
Amounts: no units in this file; such an amount is in the reference unit of its flow, which a separate flow dataset defines
copyright: false
licenseType: Free of charge for all users and uses

## General comment
This data set pertains to the process of roasting rare earth elements and in-situ leaching specifically for the production of neodymium and praseodymium, which are essential components in the manufacture of neodymium iron boron (NdFeB) magnets. These magnets are widely used in various applications including electric motors, wind turbine generators, hard disk drives, and other electronics that require strong permanent magnets.

## Geography
Bayan Obo (China)

## Technology and included processes
The basic process for Nd and Pr production is the same at all three deposits. It is identical for Nd and Pr except for the last solvent extraction step (SX5) where both are separated.

## Reference product
- Roasted concentrate: 10.2; article inperiodical
  Roasted concentrate. Bayan Obo: input for next process, Leaching

## Inputs
- Natural gas: 0.75; software or database
  Natural gas. Bayan Obo: calculated with ASPEN PLUS
- Electricity: 2.592; article inperiodical
  After Obo
- sulphuric acid: 10.6; article inperiodical
  After Obo
- hydrated lime dry slaked: 2.57; article inperiodical
  Bayan Obo: stoichiometric calculation
- transport in t*km,transport in t*km: 0.26; measured
  Bayan Obo: 20 km, lorry EURO3

## Outputs
- Sludge: 5.02
  After Obo: estimation
- fluoride: 0.00141; article inperiodical
  Bayan Obo: Rare earth control standards
- carbon dioxide: 2605; article inperiodical
  Bayan Obo: stoichiometric calculation and combustion of natural gas
- sulfur dioxide: 58.25; article inperiodical
  After Obo
- sulphuric acid: 5.23; article inperiodical
  After Obo
- Dust (unspecified, from stack): 5.83; article inperiodical
  After Obo
- nitrous oxide: 27.97; article inperiodical
  After Obo

## Deviations from the LCI method approaches
In this study, an allocation method based on the market prices of REOs28 is considered. To estimate uncertainties that refer to the allocation method, a mass-based allocation is undertaken as a sensitivity analysis

## Use advice
When utilizing this data set for Life Cycle Assessments (LCAs), users should ensure the appropriate application of the market price-based allocation method described for Nd and Pr production. Since methodological uncertainties are considered regarding the allocation method, it is advised to conduct a sensitivity analysis using a mass-based allocation as well for consistency and robustness of the results. Additionally, LCA practitioners should model the usage phase behavior of NdFeB magnets accurately, taking into account their specific application and lifespan. The functional unit defined in this study is 1 kg of NdFeB magnets; users must maintain this unit for comparative purposes.

## Review details
Inventory: The internal review was done by several iteration steps concerning raw data validation, raw data documentation, representativity, completeness and consistency of modelling with regard to ISO 14040 and 14044.

## Data sources
- Marx, J., Schreiber, A., Zapp, P. & Walachowicz, F. Comparative Life Cycle Assessment of NdFeB Permanent Magnet Production from Different Rare Earth Deposits. ACS Sustainable Chem. Eng. 6, 5858–5867 (2018).
