# cement production;cement, ordinary portland cement, 48.0MPa;mechanical vertical kiln;blast furnace slag

Dataset: ILCD process, Unit process, black box
Geography: CN
Reference year: 2001
Classification: Materials production / Other mineralic materials
Generated by: Siqi Yang, ysqsophia@gmail.com
Owner: Tiangong LCI Data Working Group
Review: Dependent internal review by Tiangong LCI Data Working Group
Amounts: no units in this file; such an amount is in the reference unit of its flow, which a separate flow dataset defines
copyright: false
licenseType: Free of charge for all users and uses

## General comment
The rotary kiln factory produces cement.

## Technology and included processes
The cement production process in shaft kiln plants is relatively simple, and the main processes are shown in Figure 3.4.

## Technical purpose
The cement produced from this process, specifically ordinary portland cement with a strength of 48.0MPa, is likely employed in general construction activities such as structural concretes, bridges, roads, and buildings. This material is characterized by its mechanical performance and is suitable for both residential and commercial construction projects.

## Model description
The research scope is defined as raw material entering the plant, raw material pretreatment, raw meal grinding, raw meal calcination, clinker grinding, until cement homogenization and storage. Specific processes such as mining, transportation, and cement packaging are not included.

## Reference product
- cement, ordinary portland cement, 48.0MPa: 1000
  The average grade of cement is 480.

## Inputs
- limestone, crushed, for mill: 1000.03
  Limestone
- clay: 145.937
  Clay
- iron, powder: 51.7668
  Iron powder
- gypsum stone (CaSO4-dihydrate): 51.8984
  Gupsum
- fluorspar: 13.973
  Fluorspar
- blast furnace slag: 81.5358
  The original literature was labeled with water slag (i.e., ironmarking blast furnace slag).
- Water (fresh water): 1954.53
  Fresh water
- hard coal: 192.164
  The original data is 38.007kt standard coal, here converted to hard coal, the conversion formula is 1kg hard coal = 0.929kg standard coal.
- electricity, medium voltage: 273.333
  Electricity

## Outputs
- particles (> PM10): 1.69618
  Dust, with an unspecified particle size, is treated as PM > 10 micrometers in diameter.
- particles (> PM10): 0.0458563
  Smoke, with an unspecified particle size, is treated as PM > 10 micrometers in diameter.
- sulfur dioxide: 0.0884894
  Sulfur dioxide
- Nitrogen oxides: 0.439957
- carbon dioxide: 925.623
  Carbon dioxide

## Data treatment and extrapolations
CO2 data processing: Based on the CO2 emission data of 1 functional unit, the CO2 emissions of producing 212,839 tons of cement were calculated.

## Use advice
When utilizing the LCA data from the described process, users must consider that the scope is confined from the entry of raw materials to the plant to their storage as cement, excluding mining, transport, and packaging processes. Therefore, any assessment or comparison should include similar system boundaries. Additionally, CO2 emissions are based on a single functional unit; for other quantities of cement, users need to adjust emission calculations proportionally.

## Review details
Inventory: The internal review was done by several iteration steps concerning raw data validation, raw data documentation, representativity, completeness and consistency of modelling with regard to ISO 14040 and 14044.

## Data sources
- 狄向华. (2001). 材料环境协调性评价的标准流程方法研究 [硕士, 北京工业大学].
