# Municipal sludge treatment and disposal;wet sludge moisture content 80%;drying-incineration

Dataset: ILCD process, Unit process, single operation
Geography: CN
Classification: End-of-life treatment / Other end-of-life services
Functional unit: In this paper, 1 t of 80% sludge with a moisture content is used as the functional unit for calculating environmental impact, resource consumption and economic cost.
Generated by: Jin Sitian, 2331276@tongji.edu.cn
Owner: Tiangong LCI Data Working Group
Review: Dependent internal review by Tiangong LCI Data Working Group
Amounts: no units in this file; such an amount is in the reference unit of its flow, which a separate flow dataset defines
licenseType: Free of charge for all users and uses

## General comment
The described process pertains to municipal sludge treatment and disposal. The sludge, characterized by a high moisture content of 80%, undergoes a process of drying followed by incineration. This is a unit process (single operation) capable of handling wet sludge at the specified moisture level. It is commonly utilized in the management of wastewater treatment plant byproducts and is a critical step for reducing sludge volume before final disposal.

## Reference product
- Sludge: 1000; input; estimated
  1 t moisture content 80% sludge

## Outputs
All rows: calculated
- carbon dioxide: 312
- methane: 0.15
- nitrous oxide: 0.0008
- Nitrogen oxides: 0.38
- sulfur dioxide: 0.52
- carbon monoxide: 0.01
- hydrocarbons (unspecified): 0.005
- particles (PM10): 0.15
- hydrogen sulfide: 8e-5
- hydrogen chloride: 0.03
- 2,3,7,8-tetrachlorodibenzo-p-dioxin: 1e-10
- mercury: 2e-7, 3e-6, 0.0008 (3 entries)
- lead: 4e-6, 0.0002 (2 entries)
- nickel: 0.0001, 7e-5, 0.007 (3 entries)
- cadmium: 2e-6, 1e-5, 0.002 (3 entries)
- zinc: 4e-5, 0.0007, 0.04, 0.4 (4 entries)
- copper: 4e-6, 8e-5, 0.04 (3 entries)
- chromium: 6e-6, 0.0001, 0.06 (3 entries)
- tin: 7e-5, 4e-5, 0.005 (3 entries)
- chemical oxygen demand: 1.5
- nitrogen, total (excluding N2): 0.1
- phosphorus, total: 0.01
- ammonia: 0.07
- Waste (solid): 69.7

## Use advice
When utilizing this dataset for Life Cycle Assessment, it is important to treat the described unit process as a distinct operation within the sludge management system. Consider the energy and resource inputs required for both drying and incineration stages, as well as the emissions and residues resulting from the process. Users should ensure that the dataset is applicable to the geographic and technological context of the sludge treatment and correct for any differences in practice or scale. Additionally, if considering recycling or the environmental impact post-disposal, these aspects must be integrated into the overall LCA framework separately.

## Review details
Inventory: The internal review was done by several iteration steps concerning raw data validation, raw data documentation, representativity, completeness and consistency of modelling with regard to ISO 14040 and 14044.

## Data sources
- 袁言言,肖军,黄瑛等.基于LCA和AHP的污泥处理技术的综合性能评价[J].环境科学与技术,2015,38(S1):263-268.
