# Leather gelatin ; Cowhide, pigskin, sheepskin, fishskin, etc. as raw material ; Acid method ; All sizes; NESPS2 / 皮明胶 ; 牛皮、猪皮、羊皮、鱼皮等为原料 ; 酸法 ; 所有规模 ; 全国第二次污染普查数据

Dataset: ILCD process, Unit process, single operation
Geography: CN
Reference year: 2019
Classification: Reference Parameters / Materials production / Non-energetic raw materials
Generated by: The data was created by the Office of the Second National Pollution Source Census of the Ministry of Ecology and Environment, and the data was organized by the TianGong Plan team for ILCD format / 生态环境部第二次全国污染源普查工作办公室创建数据，天工计划团队常慧敏整理数据为ILCD格式
Owner: Tiangong LCI Data Working Group / 天工LCI数据工作小组
Review: Dependent internal review by Tiangong LCI Data Working Group / 天工LCI数据工作小组
Amounts: no units in this file; such an amount is in the reference unit of its flow, which a separate flow dataset defines
copyright: false
licenseType: Free of charge for all users and uses

## General comment
the Technical of end-of-pipe management technology for pollution chemical oxygen demandisAnaerobic hydrolysis，Its Technical efficiency of end-of-pipe management70

## Technical purpose
此数据集代表使用牛皮、猪皮、羊皮和鱼皮等各种原料的皮明胶生产过程。采用酸法处理方式，适用于各种规模的生产。所生产的明胶适用于食品工业、制药和其他需要高等级明胶的行业。数据集重点介绍了处理废水和减少污染的管尾管理技术。其中包括A2/O工艺、SBR、生物接触氧化、厌氧水解、化学沉淀、物理吸附等方法，旨在针对化学需氧量、氨氮、总磷、有机氮、铬、颗粒物和挥发性有机化合物等各种污染物进行处理。

## Reference product
- Hide Glue: 1000; calculated
  源文件中描述为为皮明胶，此处对其进行了匹配工作，将其匹配到LCAflow库里面相最符合的流，污染物指标备注为工业废水量

## Outputs
All rows: calculated
- volatile organic compound: 0.0512
  the Technical of end-of-pipe management technology for pollution volatile organic compoundisAdsorption + steam desorption，Its Technical efficiency of end-of-pipe management36
  污染物指标挥发性有机物的末端治理技术是吸附+蒸气解析，其效率为36，末端治理设施实际运行率（k值）计算公式为k=设施年耗电量(千瓦时)/（年生产运行小时数(小时)×设备额定功率(千瓦))。原文件中描述污染物类别为废气，污染物指标为挥发性有机物，此处对其进行了匹配工作，将其匹配到LCAflow库里面相最符合的流，污染物指标备注为挥发性有机物
- volatile organic compound: 0.0512
  the Technical of end-of-pipe management technology for pollution volatile organic compoundisAdsorption/catalytic combustion method，Its Technical efficiency of end-of-pipe management36
  污染物指标挥发性有机物的末端治理技术是吸附/催化燃烧法，其效率为36，末端治理设施实际运行率（k值）计算公式为k=设施年耗电量(千瓦时)/（年生产运行小时数(小时)×设备额定功率(千瓦))。原文件中描述污染物类别为废气，污染物指标为挥发性有机物，此处对其进行了匹配工作，将其匹配到LCAflow库里面相最符合的流，污染物指标备注为挥发性有机物
- ammonia: 0.06
  the Technical of end-of-pipe management technology for pollution ammoniaisBiological filtration method，Its Technical efficiency of end-of-pipe management50
  污染物指标氨的末端治理技术是生物过滤法，其效率为50，末端治理设施实际运行率（k值）计算公式为k=设施年耗电量(千瓦时)/（年生产运行小时数(小时)×设备额定功率(千瓦))。原文件中描述污染物类别为废气，污染物指标为氨，此处对其进行了匹配工作，将其匹配到LCAflow库里面相最符合的流，污染物指标备注为氨
- ammonia: 0.06
  the Technical of end-of-pipe management technology for pollution ammoniaisPhysical adsorption，Its Technical efficiency of end-of-pipe management50
  污染物指标氨的末端治理技术是物理吸附法，其效率为50，末端治理设施实际运行率（k值）计算公式为k=设施年耗电量(千瓦时)/（年生产运行小时数(小时)×设备额定功率(千瓦))。原文件中描述污染物类别为废气，污染物指标为氨，此处对其进行了匹配工作，将其匹配到LCAflow库里面相最符合的流，污染物指标备注为氨
- volatile organic compound: 0.0608
  the Technical of end-of-pipe management technology for pollution volatile organic compoundisPhotolysis，Its Technical efficiency of end-of-pipe management24
  污染物指标挥发性有机物的末端治理技术是光解，其效率为24，末端治理设施实际运行率（k值）计算公式为k=设施年耗电量(千瓦时)/（年生产运行小时数(小时)×设备额定功率(千瓦))。原文件中描述污染物类别为废气，污染物指标为挥发性有机物，此处对其进行了匹配工作，将其匹配到LCAflow库里面相最符合的流，污染物指标备注为挥发性有机物
- volatile organic compound: 0.0656
  the Technical of end-of-pipe management technology for pollution volatile organic compoundisLow temperature plasma，Its Technical efficiency of end-of-pipe management18
  污染物指标挥发性有机物的末端治理技术是低温等离子体，其效率为18，末端治理设施实际运行率（k值）计算公式为k=设施年耗电量(千瓦时)/（年生产运行小时数(小时)×设备额定功率(千瓦))。原文件中描述污染物类别为废气，污染物指标为挥发性有机物，此处对其进行了匹配工作，将其匹配到LCAflow库里面相最符合的流，污染物指标备注为挥发性有机物
- particles (PM2.5 - PM10): 0.86
  the Technical of end-of-pipe management technology for pollution particles (PM2.5 - PM10)isBag filter，Its Technical efficiency of end-of-pipe management95
  污染物指标颗粒物的末端治理技术是袋式除尘，其效率为95，末端治理设施实际运行率（k值）计算公式为k=设施年耗电量(千瓦时)/（年生产运行小时数(小时)×设备额定功率(千瓦))。原文件中描述污染物类别为废气，污染物指标为颗粒物，此处对其进行了匹配工作，将其匹配到LCAflow库里面相最符合的流，污染物指标备注为颗粒物
- particles (PM2.5 - PM10): 0.86
  the Technical of end-of-pipe management technology for pollution particles (PM2.5 - PM10)isCyclone dust removal + bag filter，Its Technical efficiency of end-of-pipe management95
  污染物指标颗粒物的末端治理技术是旋风+布袋，其效率为95，末端治理设施实际运行率（k值）计算公式为k=设施年耗电量(千瓦时)/（年生产运行小时数(小时)×设备额定功率(千瓦))。原文件中描述污染物类别为废气，污染物指标为颗粒物，此处对其进行了匹配工作，将其匹配到LCAflow库里面相最符合的流，污染物指标备注为颗粒物
- Waste water: 650000
  the Technical of end-of-pipe management technology for pollution Waste wateris/，Its Technical efficiency of end-of-pipe management0
  污染物指标工业废水量的末端治理技术是/，其效率为0。原文件中描述污染物类别为废水，污染物指标为工业废水量，此处对其进行了匹配工作，将其匹配到LCAflow库里面相最符合的流，污染物指标备注为工业废水量
- phosphorus, total: 2.409
  the Technical of end-of-pipe management technology for pollution phosphorus, totalisChemical precipitation，Its Technical efficiency of end-of-pipe management70
  污染物指标总磷的末端治理技术是化学沉淀法，其效率为70，末端治理设施实际运行率（k值）计算公式为k=设施年耗电量(千瓦时)/（年生产运行小时数(小时)×设备额定功率(千瓦))。原文件中描述污染物类别为废水，污染物指标为总磷，此处对其进行了匹配工作，将其匹配到LCAflow库里面相最符合的流，污染物指标备注为总磷
- phosphorus, total: 4.818
  the Technical of end-of-pipe management technology for pollution phosphorus, totalisA2/O process，Its Technical efficiency of end-of-pipe management40
  污染物指标总磷的末端治理技术是A2/O工艺，其效率为40，末端治理设施实际运行率（k值）计算公式为k=设施年耗电量(千瓦时)/（年生产运行小时数(小时)×设备额定功率(千瓦))。原文件中描述污染物类别为废水，污染物指标为总磷，此处对其进行了匹配工作，将其匹配到LCAflow库里面相最符合的流，污染物指标备注为总磷
- phosphorus, total: 4.818
  the Technical of end-of-pipe management technology for pollution phosphorus, totalisAnaerobic hydrolysis，Its Technical efficiency of end-of-pipe management40
  污染物指标总磷的末端治理技术是厌氧水解类，其效率为40，末端治理设施实际运行率（k值）计算公式为k=设施年耗电量(千瓦时)/（年生产运行小时数(小时)×设备额定功率(千瓦))。原文件中描述污染物类别为废水，污染物指标为总磷，此处对其进行了匹配工作，将其匹配到LCAflow库里面相最符合的流，污染物指标备注为总磷
- phosphorus, total: 4.818
  the Technical of end-of-pipe management technology for pollution phosphorus, totalisBio-contact oxidation process，Its Technical efficiency of end-of-pipe management40
  污染物指标总磷的末端治理技术是生物接触氧化法，其效率为40，末端治理设施实际运行率（k值）计算公式为k=设施年耗电量(千瓦时)/（年生产运行小时数(小时)×设备额定功率(千瓦))。原文件中描述污染物类别为废水，污染物指标为总磷，此处对其进行了匹配工作，将其匹配到LCAflow库里面相最符合的流，污染物指标备注为总磷
- phosphorus, total: 4.818
  the Technical of end-of-pipe management technology for pollution phosphorus, totalisSBR，Its Technical efficiency of end-of-pipe management40
  污染物指标总磷的末端治理技术是SBR类，其效率为40，末端治理设施实际运行率（k值）计算公式为k=设施年耗电量(千瓦时)/（年生产运行小时数(小时)×设备额定功率(千瓦))。原文件中描述污染物类别为废水，污染物指标为总磷，此处对其进行了匹配工作，将其匹配到LCAflow库里面相最符合的流，污染物指标备注为总磷
- Chromium: 5.25
  the Technical of end-of-pipe management technology for pollution ChromiumisChemical precipitation，Its Technical efficiency of end-of-pipe management75
  污染物指标铬的末端治理技术是化学沉淀法，其效率为75，末端治理设施实际运行率（k值）计算公式为k=设施年耗电量(千瓦时)/（年生产运行小时数(小时)×设备额定功率(千瓦))。原文件中描述污染物类别为废水，污染物指标为铬，此处对其进行了匹配工作，将其匹配到LCAflow库里面相最符合的流，污染物指标备注为铬
- Ammonia Nitrogen: 5.675
  the Technical of end-of-pipe management technology for pollution Ammonia NitrogenisBio-contact oxidation process，Its Technical efficiency of end-of-pipe management75
  污染物指标氨氮的末端治理技术是生物接触氧化法，其效率为75，末端治理设施实际运行率（k值）计算公式为k=设施年耗电量(千瓦时)/（年生产运行小时数(小时)×设备额定功率(千瓦))。原文件中描述污染物类别为废水，污染物指标为氨氮，此处对其进行了匹配工作，将其匹配到LCAflow库里面相最符合的流，污染物指标备注为氨氮
- Ammonia Nitrogen: 5.675
  the Technical of end-of-pipe management technology for pollution Ammonia NitrogenisSBR，Its Technical efficiency of end-of-pipe management75
  污染物指标氨氮的末端治理技术是SBR类，其效率为75，末端治理设施实际运行率（k值）计算公式为k=设施年耗电量(千瓦时)/（年生产运行小时数(小时)×设备额定功率(千瓦))。原文件中描述污染物类别为废水，污染物指标为氨氮，此处对其进行了匹配工作，将其匹配到LCAflow库里面相最符合的流，污染物指标备注为氨氮
- Nitrogen, organic bound: 5.8
  the Technical of end-of-pipe management technology for pollution Nitrogen, organic boundisBio-contact oxidation process，Its Technical efficiency of end-of-pipe management75
  污染物指标总氮的末端治理技术是生物接触氧化法，其效率为75，末端治理设施实际运行率（k值）计算公式为k=设施年耗电量(千瓦时)/（年生产运行小时数(小时)×设备额定功率(千瓦))。原文件中描述污染物类别为废水，污染物指标为总氮，此处对其进行了匹配工作，将其匹配到LCAflow库里面相最符合的流，污染物指标备注为总氮
- Nitrogen, organic bound: 5.8
  the Technical of end-of-pipe management technology for pollution Nitrogen, organic boundisSBR，Its Technical efficiency of end-of-pipe management75
  污染物指标总氮的末端治理技术是SBR类，其效率为75，末端治理设施实际运行率（k值）计算公式为k=设施年耗电量(千瓦时)/（年生产运行小时数(小时)×设备额定功率(千瓦))。原文件中描述污染物类别为废水，污染物指标为总氮，此处对其进行了匹配工作，将其匹配到LCAflow库里面相最符合的流，污染物指标备注为总氮
- Ammonia Nitrogen: 6.81
  the Technical of end-of-pipe management technology for pollution Ammonia NitrogenisA2/O process，Its Technical efficiency of end-of-pipe management70
  污染物指标氨氮的末端治理技术是A2/O工艺，其效率为70，末端治理设施实际运行率（k值）计算公式为k=设施年耗电量(千瓦时)/（年生产运行小时数(小时)×设备额定功率(千瓦))。原文件中描述污染物类别为废水，污染物指标为氨氮，此处对其进行了匹配工作，将其匹配到LCAflow库里面相最符合的流，污染物指标备注为氨氮
- Ammonia Nitrogen: 6.81
  the Technical of end-of-pipe management technology for pollution Ammonia NitrogenisAnaerobic hydrolysis，Its Technical efficiency of end-of-pipe management70
  污染物指标氨氮的末端治理技术是厌氧水解类，其效率为70，末端治理设施实际运行率（k值）计算公式为k=设施年耗电量(千瓦时)/（年生产运行小时数(小时)×设备额定功率(千瓦))。原文件中描述污染物类别为废水，污染物指标为氨氮，此处对其进行了匹配工作，将其匹配到LCAflow库里面相最符合的流，污染物指标备注为氨氮
- Nitrogen, organic bound: 6.96
  the Technical of end-of-pipe management technology for pollution Nitrogen, organic boundisA2/O process，Its Technical efficiency of end-of-pipe management70
  污染物指标总氮的末端治理技术是A2/O工艺，其效率为70，末端治理设施实际运行率（k值）计算公式为k=设施年耗电量(千瓦时)/（年生产运行小时数(小时)×设备额定功率(千瓦))。原文件中描述污染物类别为废水，污染物指标为总氮，此处对其进行了匹配工作，将其匹配到LCAflow库里面相最符合的流，污染物指标备注为总氮
- Nitrogen, organic bound: 6.96
  the Technical of end-of-pipe management technology for pollution Nitrogen, organic boundisAnaerobic hydrolysis，Its Technical efficiency of end-of-pipe management70
  污染物指标总氮的末端治理技术是厌氧水解类，其效率为70，末端治理设施实际运行率（k值）计算公式为k=设施年耗电量(千瓦时)/（年生产运行小时数(小时)×设备额定功率(千瓦))。原文件中描述污染物类别为废水，污染物指标为总氮，此处对其进行了匹配工作，将其匹配到LCAflow库里面相最符合的流，污染物指标备注为总氮
- Chromium: 14.7
  the Technical of end-of-pipe management technology for pollution ChromiumisRedox process，Its Technical efficiency of end-of-pipe management30
  污染物指标铬的末端治理技术是氧化还原法，其效率为30，末端治理设施实际运行率（k值）计算公式为k=设施年耗电量(千瓦时)/（年生产运行小时数(小时)×设备额定功率(千瓦))。原文件中描述污染物类别为废水，污染物指标为铬，此处对其进行了匹配工作，将其匹配到LCAflow库里面相最符合的流，污染物指标备注为铬
- Exhaust gas: 26600
  the Technical of end-of-pipe management technology for pollution Exhaust gasis/，Its Technical efficiency of end-of-pipe management0
  污染物指标工业废气量的末端治理技术是/，其效率为0。原文件中描述污染物类别为废气，污染物指标为工业废气量，此处对其进行了匹配工作，将其匹配到LCAflow库里面相最符合的流，污染物指标备注为工业废气量
- chemical oxygen demand: 272.5
  the Technical of end-of-pipe management technology for pollution chemical oxygen demandisBio-contact oxidation process，Its Technical efficiency of end-of-pipe management75
  污染物指标化学需氧量的末端治理技术是生物接触氧化法，其效率为75，末端治理设施实际运行率（k值）计算公式为k=设施年耗电量(千瓦时)/（年生产运行小时数(小时)×设备额定功率(千瓦))。原文件中描述污染物类别为废水，污染物指标为化学需氧量，此处对其进行了匹配工作，将其匹配到LCAflow库里面相最符合的流，污染物指标备注为化学需氧量
- chemical oxygen demand: 272.5
  the Technical of end-of-pipe management technology for pollution chemical oxygen demandisSBR，Its Technical efficiency of end-of-pipe management75
  污染物指标化学需氧量的末端治理技术是SBR类，其效率为75，末端治理设施实际运行率（k值）计算公式为k=设施年耗电量(千瓦时)/（年生产运行小时数(小时)×设备额定功率(千瓦))。原文件中描述污染物类别为废水，污染物指标为化学需氧量，此处对其进行了匹配工作，将其匹配到LCAflow库里面相最符合的流，污染物指标备注为化学需氧量
- chemical oxygen demand: 327
  the Technical of end-of-pipe management technology for pollution chemical oxygen demandisA2/O process，Its Technical efficiency of end-of-pipe management70
  污染物指标化学需氧量的末端治理技术是A2/O工艺，其效率为70，末端治理设施实际运行率（k值）计算公式为k=设施年耗电量(千瓦时)/（年生产运行小时数(小时)×设备额定功率(千瓦))。原文件中描述污染物类别为废水，污染物指标为化学需氧量，此处对其进行了匹配工作，将其匹配到LCAflow库里面相最符合的流，污染物指标备注为化学需氧量
- chemical oxygen demand: 327
  the Technical of end-of-pipe management technology for pollution chemical oxygen demandisAnaerobic hydrolysis，Its Technical efficiency of end-of-pipe management70
  污染物指标化学需氧量的末端治理技术是厌氧水解类，其效率为70，末端治理设施实际运行率（k值）计算公式为k=设施年耗电量(千瓦时)/（年生产运行小时数(小时)×设备额定功率(千瓦))。原文件中描述污染物类别为废水，污染物指标为化学需氧量，此处对其进行了匹配工作，将其匹配到LCAflow库里面相最符合的流，污染物指标备注为化学需氧量

## Use advice
This dataset is derived from the Pollution Source Census Report and contains information on pollution emissions and related products. However, it does not include data on energy or chemical consumption, nor does it provide information on waste or co-product generation. When utilizing this dataset, please supplement the missing data based on actual conditions before use
该数据集来源于污染源普查报告，包含污染物排放及相关产品信息，但不包含能源或化学品消耗数据，也不提供废弃物或共生产物产生信息。在使用该数据集时，请根据实际情况补充缺失数据后再使用。

## Review details
Inventory: The internal review was done by several iteration steps concerning raw data validation, raw data documentation, representativity, completeness and consistency of modelling with regard to ISO 14040 and 14044.
清单： 内部审查通过几个迭代步骤完成，涉及原始数据验证、原始数据记录、代表性、完整性、与 ISO 14040 和 14044 有关的建模的一致性。

## Data sources
- 第二次全国污染源普查产排污核算系数手册（试用版）,二级代码26,四级代码2667文件，在完整版文件中第4111页
