# Potable water production ; Reverse osmosis, spiral-wound, CN

Dataset: ILCD process, Unit process, single operation
Geography: US
Reference year: 2022
Classification: Unit processes / Materials production / Water
Functional unit: 1 t drinking water
Generated by: Jiaqi Lu, wilsherelu@foxmail.com
Owner: Tiangong LCI Data Working Group
Review: Dependent internal review by Tiangong LCI Data Working Group
Amounts: no units in this file; such an amount is in the reference unit of its flow, which a separate flow dataset defines
copyright: false
licenseType: Free of charge for all users and uses

## General comment
The potable water production process described by this data set employs reverse osmosis technology, specifically using spiral-wound configurations. The high-quality water produced is intended for consumption and can be used in residential, commercial, and industrial settings where potable water of high purity is required.

## Reference product
- drinking water: 1000; measured

## Inputs
- Reverse Osmosis Component: 9.61e-5; measured
  RO components
- Electricity: 28.944; measured
  Process power consumption
- freshwater: 1310; measured
  raw water

## Use advice
When using this data set for Life Cycle Assessment, users should ensure that the boundaries of the assessed system include the energy and material inputs specifically for the reverse osmosis process. Consideration must also be given to the end-of-life treatment of reverse osmosis membranes and the environmental impacts associated with their disposal. It is advised to take into account any water pre-treatment or post-treatment stages that might be part of the overall production process.

## Review details
Inventory: The internal review was done by several iteration steps concerning raw data validation, raw data documentation, representativity, completeness and consistency of modelling with regard to ISO 14040 and 14044.

## Data sources
- DuPont. Product Data Sheet
