# Soil In Situ Remediation ; Soil Bioventilation ; Injection Well

Dataset: ILCD process, Unit process, single operation
Geography: CA
Reference year: 2007
Classification: Unit processes / Other Services / Repair and maintenance
Generated by: Wang Ning, wang_ning@caep.org.cn
Owner: Tiangong LCI Data Working Group
Review: Dependent internal review by Tiangong LCI Data Working Group
Amounts: no units in this file; such an amount is in the reference unit of its flow, which a separate flow dataset defines
copyright: false
licenseType: Free of charge for all users and uses

## General comment
Construction of injection wells using polyvinyl chloride, bentonite, silica, diesel fuel and bentonite, etc.

## Geography
The contaminated area was located 600 m from a river shore in the northern part of the prov-ince of Quebec， Canada.

## Technology and included processes
Construction of injection wells using polyvinyl chloride, bentonite, quartz sand, gravel, diesel fuel, etc.

## Technical purpose
This process is for the construction of injection wells for in situ soil remediation, particularly soil bioventilation. Such wells are constructed using materials including polyvinyl chloride (PVC), bentonite, quartz sand, gravel, and diesel fuel. These injection wells are used in environmental engineering to treat contaminated soils by injecting air or other compounds to stimulate the biodegradation of pollutants.

## Reference product
- injection well: 1; estimated
  建造好的通风井

## Inputs
All rows: estimated
- Diesel: 0.38
  使用柴油建造通风井
- cement, unspecified: 12.6
  使用混凝土建造通风井
- bentonite: 612
  使用膨润土建造通风井
- sand: 218
  使用石英砂建造通风井
- gravel: 62.5
  使用碎石建造通风井
- Polyvinyl chloride: 199
  使用聚氯乙烯建造通风井

## Use advice
Users should ensure the methodological rigor of this data set when applying it to Life Cycle Assessment of soil remediation projects. It is important to consider the geographical specificity (northern part of the province of Quebec, Canada) and to adjust the data for local conditions if applying elsewhere. The inclusion of all materials (PVC, bentonite, quartz sand, gravel, diesel fuel) involved in the construction of the injection wells must be considered in the analysis. Additionally, the environmental impact of the construction and operational phases of the injection wells should be distinguished and assessed separately.

## Review details
Inventory: The internal review was done by several iteration steps concerning raw data validation, raw data documentation, representativity, completeness and consistency of modelling with regard to ISO 14040 and 14044.

## Data sources
- Cadotte, M., Deschênes, L. & Samson, R. Selection of a remediation scenario for a diesel-contaminated site using LCA. Int J Life Cycle Assess 12, 239–251 (2007).
