# PE production and waste ; PE materials

Dataset: ILCD process, Unit process, black box
Geography: CN
Reference year: 1995
Classification: Unit processes / Materials production / Plastics
Generated by: Huijuan Guo, GHJ@email.ncu.edu.cn
Owner: Tiangong LCI Data Working Group
Review: Dependent internal review by Tiangong LCI Data Working Group
Amounts: no units in this file; such an amount is in the reference unit of its flow, which a separate flow dataset defines
copyright: false
licenseType: Free of charge for all users and uses

## General comment
The starting and ending points of this study are focused on the extraction, transportation, extraction, production of polymers, and waste disposal of crude oil. However, the use stage of materials is not considered in this article, and waste disposal has chosen the landfill method that is considered to have a significant environmental impact in relevant literature, And this landfill method is also widely used in the disposal of urban solid waste in China. The environmental emissions brought by energy production are included in the energy consumption ratio of each stage

## Geography
我国的国情出发

## Technical purpose
The PE material data set refers to the life cycle stages of polyethylene production, including crude oil extraction, transportation, refining, polymerization, and waste disposal via landfilling, which is a common practice in urban solid waste management in China. The PE produced can be used for various commercial and industrial applications, commonly including packaging, plastic parts manufacturing, and as a raw material in various polyethylene-based products. However, the usage phase is not considered within this study.

## Reference product
- Polyethylene: 1000; measured
  ON

## Inputs
- crude oil; 42.3 MJ/kg: 1.507; measured
  crude
- Energy,unspecified: 32546.7; measured
  Energy consumption

## Outputs
All rows: measured
- carbon dioxide (fossil): 6408.5
  原文未区分bio和fossil，根据专家判断此处为fossil
- sulfur dioxide: 42.53
- Nitrogen oxides: 0.172047
  NOx
- ethane: 2.017
- methane (fossil): 13
  原文未区分bio和fossil，根据专家判断此处为fossil
- waste water - untreated: 15223
  wastewater
- Waste (unspecified): 489.27
  Waste residue

## Data selection and combination
本文评价中所使用的数据来源有：企业内部实际生产数据、工艺改进的设计数据、国家环 境保护部门数据；我国相关的统计年鉴、文献等公开出版

## Data treatment and extrapolations
由于本文所研究的材料涉及到多产品系统，我们将各产品系统的输入和输出数据按照质量比例进行了分配

## Use advice
When using this data set for life cycle assessment, pay attention to the methodological choices made. Data for the lifecycle stages are based on a combination of actual production data from enterprises, design data from process improvements, and data from national environmental protection departments in China, as well as publicly available yearbooks and literature. The study considers a multi-product system with the input and output data allocated according to mass proportions. For assessments regarding PE, the chosen functional unit is 1000 kg. Users should not include the material use phase as it is excluded from this study, and they should be aware of the chosen end-of-life scenario being landfilling due to its significant environmental impact.

## Review details
Inventory: The internal review was done by several iteration steps concerning raw data validation, raw data documentation, representativity, completeness and consistency of modelling with regard to ISO 14040 and 14044.

## Data sources
- 陈红, 郝维昌, 石凤 & 王天民. 几种典型高分子材料的生命周期评价. 环境科学学报 24, 545–549 (2004).
