# Logging engineering ; Conventional light oil layer ; Quantitative calculation of gas-oil ratio of fluid properties

Dataset: ILCD process, Unit process, single operation
Geography: GD-CN
Reference year: 2003
Classification: Unit processes / Energy carriers and technologies / Crude oil based fuels
LCI method principle: Attributional
LCI method approaches: Consequential
Generated by: Shikang Kang, 908798159@qq.com
Owner: Tiangong LCI Data Working Group
Review: Dependent internal review by Tiangong LCI Data Working Group
Amounts: no units in this file; such an amount is in the reference unit of its flow, which a separate flow dataset defines
copyright: false
licenseType: Free of charge for all users and uses

## General comment
In this paper, four gas logging derivative parameters which are sensitive to critical fluids such as condensate gas and volatile oil are selected, and the optimal logging interpretation objective function is constructed together with conventional logging response equation. The formation components are inversed together, and then the key parameters of gas-oil ratio are calculated by gas state equation, so as to achieve the purpose of quantitatively identifying fluid properties by comprehensive logging data

## Geography
Zhusan Depression in Pearl River Mouth Basin

## Time period
Literature review mentioned that

## Technology and included processes
The accuracy of identifying fluid properties by calculating quantitative parameters of gas-oil ratio is as high as 94%, which greatly improves the accuracy of identifying fluid properties in the study area and provides an effective basis for subsequent exploration and development decisions

## Technical purpose
The technical usage of the described industrial process is to facilitate the identification of fluid properties in petroleum exploration within the Zhusan Depression in the Pearl River Mouth Basin. By employing a combination of gas logging derivative parameters, conventional logging response equations, and gas state equations, this process enables the accurate calculation of the gas-oil ratio, which is a critical indicator for classifying hydrocarbon resources like condensate gas and volatile oil. It is primarily used in the interpretation of formation components to improve the accuracy of exploration and development decisions in the oil and gas industry.

## Model description
Firstly, according to the gas equation of state of natural gas, the equation of state of natural gas under ground conditions is obtained The gas equation of state under formation conditions can also be obtained. Gas-oil ratio is defined as the ratio of natural gas volume Vgm to oil volume Vom under surface conditions

## Reference product
- Gasoline (regular): 2673.8; log-normal; calculated
  Calculate average gas/oil ratio

## Inputs
- Well pad: 3176.5; log-normal; missing unimportant
  cable formation
- natural gas: 2673.8; log-normal
  There is no natural gas input in the literature, assuming that the input and output during natural gas extraction process are 1:1

## Outputs
- Gasoline (regular): 297.1; log-normal; missing unimportant
  Nozzle oil flow

## Data selection and combination
This paper introduces a comprehensive identification method of fluid properties in the Pearl River Mouth Basin based on logging data, which can improve the interpretation coincidence rate and efficiency, and provide a basis for critical fluid identification and subsequent exploration and development decision-making

## Data treatment and extrapolations
The basic principle is to use logging data and mud logging data to establish equations with each component under formation conditions, to form overdetermined equations, to obtain the optimal solution of the equations, and to obtain the relative content of each component under formation conditions, and then to convert the gas volume under formation conditions to surface conditions by using gas state equation, so as to calculate the gas-oil ratio

## Use advice
When using the data from this industrial process, researchers and engineers should ensure that the gas logging derivative parameters and conventional logging response equations are appropriately selected for sensitivity to the critical fluids of interest. Accurate initial assumptions for the formation components are necessary for reliable inversion results. The calculated gas-oil ratio must be based on equations that properly account for variations in pressure, temperature, and composition of hydrocarbons under both formation and surface conditions. This methodology is advised to be incorporated into decision-making workflows for exploration and development, as it has been validated to have an accuracy rate of 94%. Consideration should also be given to the expedited application of this method to practical production to improve interpretation coincidence rate and efficiency. Users should address potential overfitting of the overdetermined equation system and computational efficiency in the optimization process.

## Review details
Inventory: The internal review was done by several iteration steps concerning raw data validation, raw data documentation, representativity, completeness and consistency of modelling with regard to ISO 14040 and 14044.

## Data sources
- 张恒荣;肖立志;张顺超;汤翟;陈嵘; 基于测录井资料的流体性质综合识别方法研究——以珠江口盆地珠三坳陷为例. 地球物理学进展 940–949 (2023).
