# Bio-based methanol production ; Methanol ; Rice straw gasification route ; Rice straw

Dataset: ILCD process, Unit process, single operation
Geography: JS-CN
Classification: Energy carriers and technologies / Renewable fuels
Functional unit: The functional unit for the evaluation of the life cycle is 1000 kg of biomethanol.
LCI method principle: Attributional
LCI method approaches: Allocation - market value
Generated by: Zirui Tang, tangzirui123@gmail.com
Owner: Tiangong LCI Data Working Group
Review: Dependent internal review by Tiangong LCI Data Working Group
Amounts: no units in this file; such an amount is in the reference unit of its flow, which a separate flow dataset defines
copyright: false
licenseType: Free of charge for all users and uses

## General comment
The proposed gasification technology of interconnected fluidized beds resembles a circulating fluidized bed with the extra bubbling fluidized bed after the cyclone. The circulating fluidized bed is designed for combustion fed with air; the bubbling fluidized bed for biomass gasification is fed with steam. Direct contact between the gasification and combustion processes is avoided; the gasification-required heat is achieved by means of the circulation of bed particles (such as sand, catalyst). One part of biomass is rapidly pyrolysis and gasified with steam to produce syngas, including H2, CO, etc. in the bubbling fluidized bed.

## Geography
The biomass studied in the paper is the rice straw from Jiangsu Province, China.

## Technology and included processes
The whole system could be regarded as the combination of three subsystems, i.e., the gasification subsystem, where the biomass is converted into raw syngas; the cleanup subsystem, where the impurities contained in the raw syngas are removed; and the synthesis system, where the biomass syngas is converted into liquid methanol.

## Technical purpose
The data set represents the industrial process of bio-based methanol production using a gasification route based on rice straw as a feedstock. The interconnected fluidized bed technology is employed here, which closely resembles a circulating fluidized bed with the addition of a bubbling fluidized bed following the cyclone separator. The produced liquid methanol is intended for use as a renewable energy source or as a chemical intermediate in various industrial applications. It may serve as a fossil fuel alternative or may be used in the synthesis of other chemicals.

## Reference product
- Methanol: 1; article inperiodical

## Inputs
- Straw: 3.25; article inperiodical
  In this case, energy are provided by combustion of flue gas, hot/cold process fluid

## Outputs
All rows: article inperiodical
- carbon dioxide (fossil): 1.83
- carbon monoxide: 0.00112
- methane: 0.000234
- nitrous oxide: 0.000928
- sulfur dioxide: 0.000524
- particles (PM10): 0.00093

## Deviations from the LCI method approaches
The environment impact coefficient allocated to rice straw is calculated as, where Krs is the environment impact coefficient allocated to rice straw; MFrs is the ratio of the yield of rice straw to rice grain, which is 0.9; Prs is the price of rice straw, which is 250 RMB/t; and Prg is the price of rice grain, which is 1540 RMB/t.

## Data selection and combination
The data collection and assumption of the life cycle are obtained and defined in this step. Data concerning the demand for fertilizers and pesticides, energy consumption of transport, and pollutant emissions during the production upstream and downstream processes are taken from refs 45−49 and national statistical data of China. (-50, 51)

## Data treatment and extrapolations
For the production process, the inventory data of both rice straw consumption and the emissions come from the above Aspen Plus simulation of the biomethanol production system.

## Use advice
When utilizing this dataset for Life Cycle Assessment (LCA), users should account for the environmental impact coefficient allocated specifically to rice straw. Consideration of the technology-specific parameters, such as the ratio of yield for rice straw to rice grain and the regional economic factors like straw and rice grain prices from Jiangsu Province, China, are important. The data must be integrated with the cleanup and synthesis subsystems of the process for a complete evaluation. The functional unit of the LCA should align with the specified unit of 1000 kg of biomethanol. Ensure that the data sources referenced for the upstream and downstream processes, including emissions, are coherent with the LCA's goal and scope. Avoid direct extrapolation to different geographical or technological contexts without proper adjustments.

## Review details
Inventory: The internal review was done by several iteration steps concerning raw data validation, raw data documentation, representativity, completeness and consistency of modelling with regard to ISO 14040 and 14044.

## Data sources
- Xiao, J., Shen, L., Zhang, Y. & Gu, J. Integrated Analysis of Energy, Economic, and Environmental Performance of Biomethanol from Rice Straw in China. Ind. Eng. Chem. Res. 48, 9999–10007 (2009).
