# Substation Construction and Operation ; voltage level 110/10kV, planning capacity of 3 × 50MVA substation ; full indoor arrangement mode

Dataset: ILCD process, Partly terminated system
Geography: NJ-JS-CN
Reference year: 2021
Valid until: 2071
Classification: Energy carriers and technologies / Electricity
LCI method principle: Other
Generated by: Wang, Yuxuan , wyx135230@163.com
Owner: Tiangong LCI Data Working Group
Review: Dependent internal review by Tiangong LCI Data Working Group
Amounts: no units in this file; such an amount is in the reference unit of its flow, which a separate flow dataset defines
copyright: false
licenseType: Free of charge for all users and uses

## General comment
The literature adopts the method of life cycle calculation of carbon footprint, specifies the carbon emission sources in the four stages of the life cycle of this 110kV substation scheme: the preparation stage, the construction stage, the operation stage and the end-of-life stage, determines the carbon emission factors and engineering data, and calculates the carbon footprints of each stage.

## Geography
The authors did not specify in the literature that the geographic location of the electric utility where the authors are located was selected

## Time period
The starting time of the dataset was not specified in the literature, and the time of publication of the literature was used as the beginning of the validity period. The lifetime of the project was recorded as 50 years, so 50 years was used as the validity period.

## Technology and included processes
Construction phase: 2×50 MVA transformers will be built in this phase. 110 kV outgoing line 4 times in this phase (including two backup), vision 4 times; this phase adopts single bus sectional wiring, vision wiring type unchanged; fluorine-free environmentally friendly GIS. 10 kV outgoing line 24 times in this phase, adopts single bus three-section wiring; vision 36 times, adopts single bus four-section wiring; adopts the center cabinet, with a vacuum circuit breaker. Each of the two main transformers in this phase is equipped with one set of 4 Mvar shunt capacitor and one set of 6 Mvar shunt reactor. There is a steel structure power distribution building, which is partially one floor underground and partially two floors. According to the planning requirements, the enclosure wall is not set up as a solid enclosure wall, and green plants are used to isolate the site, and the site is laid with lawn. Operation stage: environmentally friendly new products are adopted, no SF6 electrical equipment is used in the station, green plants are used to isolate the station, and lawn is laid on the site.

## Technical purpose
The 110/10kV 3×50MVA substation described is designed to support medium to high voltage electricity transmission and distribution for urban developments or industrial areas. It is used to transform the voltage from high transmission levels to levels suitable for distribution and end use. The full indoor arrangement implies that all the equipment is housed within a building, offering additional protection from the environment. This substation is also equipped with environmentally friendly GIS (Gas Insulated Switchgear) systems that do not use SF6, a potent greenhouse gas, making it suitable for regions with stringent environmental regulations.

## Reference product
- Transformer Substation: 1; measured
  全户内布置方式，电压等级110/10kV，规划容量3×50MVA变电站

## Inputs
All rows: measured
- pre-cast concrete: 28.175
- Cast-In-Place Concrete: 1146
- Steel sections: 5000
- Transformer: 4.60225e6
  The original data is electromechanical equipment, including transformers, switch cabinets, GIS, etc. This information cannot be found in da.tiangong.world. The construction in this phase is mainly 2×50MVA transformer, so the transformer is selected as the input flow
- Hardware: 2.12687e6
  Metal structure
- Electricity: 284400
  Electricity input flow during construction phase
- Diesel: 800
- Electricity: 57600
  One year’s electricity consumption during operation

## Outputs
- carbon dioxide: 0; calculated
  Carbon footprint in the preparation stage: The carbon footprint in the substation preparation stage mainly comes from site cleanup. Since this project is located in the city center and there are no obstacles on the construction site that need to be removed or relocated, the carbon footprint in the preparation stage of this project can be ignored.
- carbon dioxide: 4.32874e6; calculated
  Carbon footprint during construction phase
- carbon dioxide: 544965; calculated
  For the carbon footprint during the operation phase, the project is recorded based on a 50-year life span. The carbon footprint of the electricity consumed by the substation is 633.680tCO2. Ignoring the growth period of trees and lawns, the carbon reduction amount of green plants is 88.715tCO2.
- carbon dioxide: 432874; calculated
  Carbon footprint in the scrapping stage. The carbon footprint in the scrapping stage of the project is simplified based on 10% of the carbon footprint in the construction stage.

## Data selection and combination
The value of the carbon footprint factor is taken in accordance with the baseline emission factor of China's regional power grids, China's power grid enterprises' greenhouse gas emission accounting methodology and reporting guidelines (for trial implementation) and other relevant research results. The amount of relevant I/O flow is obtained by consulting the relevant construction unit and combining with the historical data of the operation and inspection unit.

## Use advice
Users of this LCA data set should ensure they apply it specifically to the construction and operation of indoor medium to high voltage substations, especially those employing environmentally friendly technologies such as non-SF6 GIS. Care should be taken when extrapolating this data to ensure regional specificities, such as local carbon emission factors and technological applicability, are properly accounted for. For construction phase modeling, aspects like the planned number of transformers, busbar configuration, type of switchgear, and inclusion of shunt capacitors and reactors should be reflected. The service life assumed should be verified for alignment with the 50-year validity period used in this data set. During operation phase assessment, consideration of the environmentally friendly products and absence of SF6 equipment alongside operational inputs/outputs should be included. Users must obtain more recent and location-specific emission factors as part of their LCA study.

## Review details
Inventory: The internal review was done by several iteration steps concerning raw data validation, raw data documentation, representativity, completeness and consistency of modelling with regard to ISO 14040 and 14044.

## Data sources
- 唐忠达. 110kV变电站生命周期碳排放分析. 电工电气 35–38 (2021).
