# Penaeus white shrimp culture ; Penaeus white shrimp adult shrimp ; Factory farming

Dataset: ILCD process, Unit process, black box
Geography: RZ-SD-CN
Reference year: 2019
Valid until: 2021
Classification: Unit processes / Materials production / Food and renewable raw materials
Functional unit: 1 ton of white shrimp
LCI method principle: Attributional
LCI method approaches: Allocation
Generated by: Kangni Wu, wukangni@xmu.stu.edu.cn
Owner: Tiangong LCI Data Working Group
Review: Dependent internal review by Tiangong LCI Data Working Group
Amounts: no units in this file; such an amount is in the reference unit of its flow, which a separate flow dataset defines
copyright: false
licenseType: Free of charge for all users and uses

## General comment
The research scope of this paper includes five stages: infrastructure construction of aquaculture farms, transportation of shrimp seedlings, shrimp breeding, shrimp transportation to market, and infrastructure disposal. Among them, feed production for shrimp breeding stage is a link, is the use of fish meal, soybeans, peanuts, fish oil, flour, minerals and adhesives production of compound feed

## Geography
The study is located in Tao Luo Town, Rizhao City, Shandong Province.

## Time period
The sampling time was not specified in the literature. The researcher conducted a survey at the fixed observation point of Taoluo Town, Rizhao City, Shandong Province in June and November 2019.

## Technology and included processes
Technology of factory culture of Penaeus alba. Factory farming is divided into three types: factory stillwater farming, factory running water farming and factory circulating water farming. The shrimp farmers in Rizhao City where this research institute is located mostly adopt factory running water farming. In this farming mode, farmers have a number of breeding sheds with brick-concrete structure, good light transmission and heat preservation. Each breeding shed will have a number of breeding ponds, the shape is mostly regular quadrilateral, the scale is mostly 4m(length)*4m (width), 5m(length)*5m (width), 6m(length)*6m (width), and the depth of the pool is mostly between 1m and 1.3m. The bottom of the pool is in the shape of a pot to drain water to the middle [110], and the center of the bottom of the pool is set with a Φ110 mm polyvinyl riser for drainage. Drainage is generally divided into three stages, the early displacement is small, about 8-10cm per day, the duration is mostly 25-35 days; In the middle period, the displacement is large, and the drainage is about 25-40cm per day, and the duration is mostly 50-60 days. The latter stage displaces the most, draining about 60-70cm per day for a duration of 30-45 days. The growth cycle of the South American white shrimp in this region is mostly 110-130 days, and the majority of the shrimp are raised 2 times a year, and the survival rate is about 35%-55%. Regarding the input of feed, factory farming generally only throws compound feed. In addition, every year, farmers have to clean the pond disinfection, the frequency is twice a year.

## Technical purpose
Penaeus vannamei, commonly known as white shrimp, is cultured in this process for the purpose of seafood production. The cultivated shrimp are intended for consumption and distributed to various markets after reaching maturity. This factory farming method is designed for high-volume, controlled production of shrimp to meet consumer demand in food industries. The shrimps are grown using a compound feed that includes ingredients such as fish meal, soybeans, peanuts, fish oil, flour, minerals, and adhesives.

## Model description
In this study, the equivalent factor method is used for the characteristics. According to the impact potential degree of different substances on the same environmental impact type, one of them is used as the reference substance, and the impact potential value is 1. The equivalent factor is the ratio of the impact potential of other substances of the same quality to the impact potential value of the reference substance

## Reference product
- Litopenaeus vannamei: 1000; measured

## Inputs
All rows: measured
- cement, unspecified: 42.354
- iron: 53
  It belongs to the infrastructure construction stage and has a service life of 20 years. This data is the input data equivalent to one breeding cycle.
- polyethylene low density granulate (PE-LD): 14.6
  It belongs to the infrastructure construction stage and has a service life of 15 years. This data is the input data equivalent to one breeding cycle.
- transport in t*km: 207.064
  Transport of shrimp seedlings by air. The original data is mass * distance = (0.09412t * 2200km)
- water: 8.47059e6
  Belongs to the adult shrimp breeding stage
- Electricity: 60504.2
  Belongs to the adult shrimp breeding stage
- Diesel: 9.76
  Belongs to the adult shrimp breeding stage
- fish meal: 411.765
- Soybean: 288.236
- Peanut: 222.353
- Fish Oil: 24.7059
- Flour: 378.824
- Mineral: 49.4118
- Adhesives: 5.7647
- Hydrogen peroxide: 141.18
- Fertilizer paste for aquaculture: 117.65
- Multivitamins: 0.94
- Immunopolysaccharide: 2.35

## Outputs
All rows: measured
- waste water - untreated: 8.47059e6
- phosphate: 0.091788
- ammonia: 0.17099
- nitrite: 0.05497
- Chemical Oxygen Demand (COD): 13.2178

## Deviations from the LCI method approaches
The research done in this paper is a typical case study rather than a statistical study: firstly, taking a Penaeus vannamei farm in Rizhao City as an example, using the life cycle assessment method and SimaPro9.0 software, the carbon emissions of Penaeus vannamei farming industry chain at each stage are quantified and analyzed. Then the same method was used to calculate the carbon emissions of the shrimp industry chain of 13 farms and take the mean value for analysis

## Data selection and combination
The data come from field investigation of 13 farms, and the data are real, effective and reliable. The calculated carbon emissions of the 13 cases were analyzed by taking the mean value. Secondly, part of the data is derived from the SimaPro database, which contains the latest science-based multiple life cycle impact assessment methods and databases

## Data treatment and extrapolations
Literature researchers used SimaPro9.0 software to quantify the carbon emissions at each stage of the shrimp breeding industry chain, and on this basis, analyzed the carbon emissions of the shrimp industry chain of 13 farms and took the mean value. Among them, the information of the infrastructure construction stage of the breeding farm mainly includes the type, quantity and service life of construction materials, etc. The information of shrimp fry transportation stage mainly includes the source and destination of shrimp fry transportation, transportation mode, transportation weight, transportation distance, energy consumption during transportation, etc. The information of adult shrimp breeding stage mainly includes the input quantity of water, electricity, feed and other energy substances, as well as the quantity of wastewater discharged in the breeding process and the quality inspection of wastewater, etc. The information from the transportation of adult shrimp to the market stage mainly includes the transportation mode, transportation weight, transportation distance, transportation destination and energy consumption during transportation. The information in the stage of infrastructure waste disposal mainly includes the transportation destination, transportation mode, transportation weight, transportation distance, and energy consumption generated by the transportation process of waste.The basic assumptions of the literature in LCA analysis are as follows: the transportation mode of shrimp fry is air transportation; Fuel consumption is calculated according to gasoline for land transport and jet fuel for air transport; The electric energy consumed in the life cycle comes from the residential power output of the state grid. Aquaculture water is groundwater by default.

## Sampling procedure
There are two main sources of data in this paper. There are two main sources of data in this paper. First, it comes from field research. In June and November 2019, it was conducted at the fixed observation point in Taoluo Town, Rizhao City, Shandong Province. Most of the input and output data of the breeding industry came from the questionnaire survey of the heads of breeding plants and feed processing plants, and the water quality monitoring data were taken from the fixed monitoring point of the local Institute of Marine and Fishery. The data on the transportation of adult shrimp to the market were obtained from the survey of Rizhao aquatic product wholesale market and the head of the breeding farm. The second is from the database of life cycle assessment software Simapro. The first is from field research, which was conducted at fixed observation points in Taoluo Town, Rizhao City, Shandong Province in June and November 2019. Most of the input and output data of the breeding industry come from the questionnaire survey of the heads of breeding plants and feed processing plants. The water quality monitoring data were obtained from the fixed monitoring points of the local Marine and fishery Research Institute, and the data of the transportation of adult shrimp to the market were obtained from the survey of the directors of the fishery products wholesale market and aquaculture farms in Rizhao City. The second is the database derived from the life cycle assessment software Simapro

## Use advice
When using this data set for Life Cycle Assessment, it is important to include all stages mentioned: infrastructure for farm construction, shrimp seedling transport, shrimp breeding, market transportation, and infrastructure disposal. Special attention should be given to the representative nature of the inputs and outputs from the aquaculture and feed processing factories, as well as the local water quality monitoring data. Ensure that the time and location of data collection are relevant for the assessed system and account for seasonal differences by considering the data from June and November 2019. If modeling transport to the market, use the provided transportation data from Rizhao City’s seafood wholesale market and aquaculture farm surveys.

## Review details
Inventory: The internal review was done by several iteration steps concerning raw data validation, raw data documentation, representativity, completeness and consistency of modelling with regard to ISO 14040 and 14044.

## Data sources
- 马一鸣. 基于生命周期评价方法的南美白对虾养殖产业链碳排放研究. (上海海洋大学, 2021).
