# LFP cathode slurry production ; LFP cathode slurry ; LFP, carbon black, PTFE

Dataset: ILCD process, Unit process, single operation
Classification: Materials production / Inorganic chemicals
Functional unit: Produce 1kg LFP cathode slurry
Generated by: Xin Chen, xinchen@mail.nankai.edu.cn
Owner: Tiangong LCI Data Working Group
Review: Dependent internal review by Tiangong LCI Data Working Group
Amounts: no units in this file; such an amount is in the reference unit of its flow, which a separate flow dataset defines
copyright: false
licenseType: Free of charge for all users and uses

## General comment
Simply mix LFP, PTFE and carbon black to make positive electrode slurry

## Inputs
- Lithium Iron Phosphate: 0.87; estimated
  Data based on assumptions

## Outputs
- 1-methyl-2-pyrrolidone: 0.28
  The data was simply estimated with reference to the ecoivent database.

## Data selection and combination
Some data refer to the ecoinvent database, and some data are based on assumptions.

## Data treatment and extrapolations
The production process is not expected to result in any significant energy consumption, emissions or material losses.

## Review details
Inventory: The internal review was done by several iteration steps concerning raw data validation, raw data documentation, representativity, completeness and consistency of modelling with regard to ISO 14040 and 14044.

## Data sources
- Majeau-Bettez, G., Hawkins, T. R. & Strømman, A. H. Life Cycle Environmental Assessment of Lithium-Ion and Nickel Metal Hydride Batteries for Plug-In Hybrid and Battery Electric Vehicles. Environ. Sci. Technol. 45, 4548–4554 (2011).
