# Diesel fraction, bitumen, gasoline fraction, coke ; Coal tar, hydrogen ; Whole distillate fixed bed hydrotreating process ; All sizes; NESPS2 / 柴油组分、沥青、汽油组分、焦炭 ; 煤焦油、氢气 ; 全馏分固定床加氢工艺 ; 所有规模 ; 全国第二次污染普查数据

Dataset: ILCD process, Unit process, single operation
Geography: CN
Reference year: 2019
Classification: Reference Parameters / Energy carriers and technologies / Crude oil based fuels
Generated by: The data was created by the Office of the Second National Pollution Source Census of the Ministry of Ecology and Environment, and the data was organized by the TianGong Plan team for ILCD format / 生态环境部第二次全国污染源普查工作办公室创建数据，天工计划团队常慧敏整理数据为ILCD格式
Owner: Tiangong LCI Data Working Group / 天工LCI数据工作小组
Review: Dependent internal review by Tiangong LCI Data Working Group / 天工LCI数据工作小组
Amounts: no units in this file; such an amount is in the reference unit of its flow, which a separate flow dataset defines
copyright: false
licenseType: Free of charge for all users and uses

## General comment
the Technical of end-of-pipe management technology for pollution chemical oxygen demandisOthers (biochemical treatment)，Its Technical efficiency of end-of-pipe management93

## Technical purpose
纳米级柴油组分、沥青、汽油组分、焦炭煤焦油的制备涉及全馏分固定床加氢工艺，适用于所有规模的操作。这些产品适用于不同的应用领域：柴油组分用作燃料，沥青用于道路建设，汽油组分作为汽车燃料，焦炭用于冶金过程，煤焦油用于化学合成。加氢工艺保证了硫和其他杂质的去除，提高了最终产品的质量。这个过程还产生氢气副产品，可在炼油厂内部或其他行业中使用。用于废物处理的技术包括针对化学需氧量、氰化物、酚、氨氮和石油相关废物的生化处理方法，技术效率高，范围在93%至99%之间，确保了大幅度降低环境影响。

## Reference product
- Coal tar: 1000; input; calculated
  源文件中描述为为煤焦油、氢气，此处对其进行了匹配工作，将其匹配到LCAflow库里面相最符合的流，污染物指标备注为化学需氧量

## Outputs
All rows: calculated
- Petroleum-related waste: 3.98e-5
  the Technical of end-of-pipe management technology for pollution Petroleum-related wasteisOthers (biochemical treatment)，Its Technical efficiency of end-of-pipe management99
  污染物指标石油类的末端治理技术是其他（生化处理），其效率为99，末端治理设施实际运行率（k值）计算公式为k=污水治理设施运行时间（小时/年）/正常生产时间（小时/年）。原文件中描述污染物类别为废水，污染物指标为石油类，此处对其进行了匹配工作，将其匹配到LCAflow库里面相最符合的流，污染物指标备注为石油类
- cyanide: 8.66e-5
  the Technical of end-of-pipe management technology for pollution cyanideisOthers (biochemical treatment)，Its Technical efficiency of end-of-pipe management0
  污染物指标氰化物的末端治理技术是其他（生化处理），其效率为0，末端治理设施实际运行率（k值）计算公式为k=污水治理设施运行时间（小时/年）/正常生产时间（小时/年）。原文件中描述污染物类别为废水，污染物指标为氰化物，此处对其进行了匹配工作，将其匹配到LCAflow库里面相最符合的流，污染物指标备注为氰化物
- Ammonia Nitrogen: 0.00669
  the Technical of end-of-pipe management technology for pollution Ammonia NitrogenisOthers (biochemical treatment)，Its Technical efficiency of end-of-pipe management97
  污染物指标氨氮的末端治理技术是其他（生化处理），其效率为97，末端治理设施实际运行率（k值）计算公式为k=污水治理设施运行时间（小时/年）/正常生产时间（小时/年）。原文件中描述污染物类别为废水，污染物指标为氨氮，此处对其进行了匹配工作，将其匹配到LCAflow库里面相最符合的流，污染物指标备注为氨氮
- phenol: 0.01188
  the Technical of end-of-pipe management technology for pollution phenolisOthers (biochemical treatment)，Its Technical efficiency of end-of-pipe management99
  污染物指标挥发酚的末端治理技术是其他（生化处理），其效率为99，末端治理设施实际运行率（k值）计算公式为k=污水治理设施运行时间（小时/年）/正常生产时间（小时/年）。原文件中描述污染物类别为废水，污染物指标为挥发酚，此处对其进行了匹配工作，将其匹配到LCAflow库里面相最符合的流，污染物指标备注为挥发酚
- chemical oxygen demand: 0.2037
  the Technical of end-of-pipe management technology for pollution chemical oxygen demandisOthers (biochemical treatment)，Its Technical efficiency of end-of-pipe management93
  污染物指标化学需氧量的末端治理技术是其他（生化处理），其效率为93，末端治理设施实际运行率（k值）计算公式为k=污水治理设施运行时间（小时/年）/正常生产时间（小时/年）。原文件中描述污染物类别为废水，污染物指标为化学需氧量，此处对其进行了匹配工作，将其匹配到LCAflow库里面相最符合的流，污染物指标备注为化学需氧量

## Use advice
This dataset is derived from the Pollution Source Census Report and contains information on pollution emissions and related products. However, it does not include data on energy or chemical consumption, nor does it provide information on waste or co-product generation. When utilizing this dataset, please supplement the missing data based on actual conditions before use
该数据集来源于污染源普查报告，包含污染物排放及相关产品信息，但不包含能源或化学品消耗数据，也不提供废弃物或共生产物产生信息。在使用该数据集时，请根据实际情况补充缺失数据后再使用。

## Review details
Inventory: The internal review was done by several iteration steps concerning raw data validation, raw data documentation, representativity, completeness and consistency of modelling with regard to ISO 14040 and 14044.
清单： 内部审查通过几个迭代步骤完成，涉及原始数据验证、原始数据记录、代表性、完整性、与 ISO 14040 和 14044 有关的建模的一致性。

## Data sources
- 第二次全国污染源普查产排污核算系数手册（试用版）,二级代码25,四级代码2519文件，在完整版文件中第4111页
