# Rare Earth milling;Rare Earth;Molten Salt Electrolysis;NdFeB Magnet Scrap

Dataset: ILCD process, Unit process, single operation
Geography: CN
Reference year: 2013
Valid until: 2016
Classification: Materials production / Metals and semimetals
Functional unit: The functional unit of this analysis was chosen as the production of one kg Nd–Pr alloy through extraction from NdFeB magnet scrap
LCI method principle: Attributional
LCI method approaches: Allocation - market value
Generated by: Tao Wang, twang@iue.ac.cn
Owner: Tiangong LCI Data Working Group
Review: Dependent internal review by Tiangong LCI Data Working Group
Amounts: no units in this file; such an amount is in the reference unit of its flow, which a separate flow dataset defines
copyright: false
licenseType: Free of charge for all users and uses

## General comment
The one-step recycling process is designed for the recovery of rare earth metals from NdFeB magnet scrap. It is applicable in the recycling industry, particularly for companies specializing in rare earth metal recovery. The extracted Nd-Pr alloy is utilized in the manufacture of new NdFeB magnets, which are widely used in various applications such as electric motors, generators, and other devices that require strong permanent magnets.

## Technology and included processes
The one-step recycling process to extract rare earth metals from scrap magnets is being developed on a laboratory scale at TU Delft. Nonmagnetized, uncoated magnet samples were used in the experiment. The magnets were ball milled under inert atmosphere to increase the surface area to facilitate the electrochemical reactions, and the powder was inserted into the salt bath.

## Reference product
- magnet: 1; article inperiodical
  magnet. Pre-treatment steps: Only process variant without milling

## Inputs
- Electricity: 0.1206; min 0.0252; max 0.216; uniform; article inperiodical
  Pre-treatment steps: Ball milling
- argon: 0.4; min 0.2; max 0.6; uniform; article inperiodical
  Pre-treatment steps

## Outputs
- magnet powder, ca 200 micron: 0.95; min 0.9; max 1; uniform; article inperiodical
  magnet powder, ca 200 micron. Pre-treatment steps: Only process variant with milling

## Deviations from the LCI method approaches
The allocation of environmental flows to Nd and Pr was updated. Value allocation was used to share the process impacts from both multi-output stages, reflecting prices from recent years (2013–2016). There are two stages in the primary production of rare earths for which assumptions regarding coproductions are necessary: the beneficiation stage, where concentrated iron ore and rare earth concentrate are separated, and the solvent extraction stage undertaken to separate individual rare earths.

## Use advice
When utilizing this LCA data, users should note the specific lab-scale context in which the recycling process was developed. The environmental impact allocation between Nd and Pr should reflect the value allocation based on market prices between 2013–2016. Consideration of coproducts from the primary production stages, such as during the beneficiation and solvent extraction processes where iron ore and rare earth concentrate are separated and individual rare earths are isolated, respectively, is required. Users should ensure that their models account for these stages when estimating the environmental impacts of Nd-Pr alloy production from magnet scrap.

## Review details
Inventory: The internal review was done by several iteration steps concerning raw data validation, raw data documentation, representativity, completeness and consistency of modelling with regard to ISO 14040 and 14044.

## Data sources
- Schulze, R., Abbasalizadeh, A., Bulach, W., Schebek, L. & Buchert, M. An Ex-ante LCA Study of Rare Earth Extraction from NdFeB Magnet Scrap Using Molten Salt Electrolysis. J. Sustain. Metall. 4, 493–505 (2018).
