# Treatment facilities ; Groundwater pump and treatment

Dataset: ILCD process, Unit process, single operation
Geography: UM
Reference year: 2009
Classification: Unit processes / Other Services / Repair and maintenance
Generated by: Yang Xintong, yangxt@caep.org.cn
Owner: Tiangong LCI Data Working Group
Review: Dependent internal review by Tiangong LCI Data Working Group
Amounts: no units in this file; such an amount is in the reference unit of its flow, which a separate flow dataset defines
copyright: false
licenseType: Free of charge for all users and uses

## General comment
PTS removes the contaminated groundwater by pumping and use of aboveground treatment facilities. A PTS provides quick initial reductions in contaminant concentrations, but often results in a slow, steady reduction for the long-term.

## Geography
The case study was conducted using publicly available design documents for two remediation strategies designed by Battelle for Dover Air Force Base (AFB) in Dover, DE

## Technology and included processes
The PTS was modeled with five subsystems: extraction wells, air-stripping unit (ASU), catalytic oxidation unit (COU), granular activated carbon (GAC) unit, and treatment facilities.Model treatment facilities included a 37.1 m2 , 0.15 m thick structural slab poured from concrete mixing truck (260 kW at 0.14 m3 /hour), 61 m of 0.05 m diameter PVC piping, miscellaneous PVC fittings and valves, and a steel shed.

## Technical purpose
The described groundwater pump and treatment process (PTS) are intended for environmental remediation applications. Specifically, it is used at sites like Dover Air Force Base to remove contaminants from groundwater using extraction wells and aboveground treatment facilities, which include air stripping, catalytic oxidation, and granular activated carbon treatment systems.

## Reference product
- Treatment facilities: 1; measured

## Inputs
- polyvinylchloride resin (S-PVC): 80; measured
  Treatment Tacilities pyc Pipe
- Concrete: 12100; measured
  Treatment Facilities Concrete
- Steel: 450; measured
  Treatment Facililies Sleel
- Energy, unspecified: 37500; measured
  Treatment Facilities Congtruction Energy

## Use advice
When using the data set for the PTS process, attention should be paid to ensure that assumed site characteristics align with actual conditions. Users must consider long-term contaminant reduction trends in their impact assessments. Estimations and omitted data, based on available literature or fundamental principles, should be critically evaluated, and limitations due to the exclusion of certain inputs or emissions should be taken into account.

## Review details
Inventory: The internal review was done by several iteration steps concerning raw data validation, raw data documentation, representativity, completeness and consistency of modelling with regard to ISO 14040 and 14044.

## Data sources
- Life-Cycle Case Study Comparison of Permeable Reactive Barrier versus Pump-and-Treat Remediation
