# Propylene Production ; Propylene ; Propane Dehydrogenation Route ; Propane

Dataset: ILCD process, Unit process, black box
Geography: NJ-JS-CN
Reference year: 2015
Classification: Unit processes / Materials production / Organic chemicals
Functional unit: A functional unit is defined as 1 ton of propylene product
LCI method principle: Attributional
LCI method approaches: Allocation - mass
Generated by: Yanan Ren, renyn15@tsinghua.org.cn
Owner: Tiangong LCI Data Working Group
Review: Dependent internal review by Tiangong LCI Data Working Group
Amounts: no units in this file; such an amount is in the reference unit of its flow, which a separate flow dataset defines
copyright: false
licenseType: Free of charge for all users and uses

## General comment
Propane dehydrogenation adopts Oleflex process of UOP company, mainly including feed treatment, depropanizer, reaction unit catalyst continuous regeneration unit, reactor effluent compression, drying unit, separation unit, selective hydrogenation, deethanizer, propylene propane Separator unit. The key input parameters of this project include raw materials (propane), energy sources (electricity, steam, fresh water, natural gas) and auxiliary materials (catalyst Pt, etc.). The products are by-products of propylene and hydrogen, and by-products C4 and C2 are produced at the same time. The process produces by-product fuel gas, which is recycled as energy, which belongs to closed-loop energy recovery, so this process does not participate in the quality distribution of environmental impact.

## Geography
The process case comes from Sinopec Yangzi Petrochemical Company. The company is located in Jiangsu Province, the process was built in 2015, and the propylene production capacity is 600,000 tons/year.

## Time period
Craft built in 2015

## Technology and included processes
Propane raw materials in my country's coastal areas are mainly imported from the Middle East. The main reason is that the Oleflex process has high requirements on the purity of propane raw materials, and most of the propane in my country comes from liquefied petroleum gas, a by-product of oil refining, which has high impurity content and the purity cannot meet the requirements of the process. The propane raw materials of this enterprise are all imported, so the LCA model of the PDH route considers the raw material transportation stage. Assume that propane is transported 11,000km by sea to the port of Nanjing, China, and then transported to the enterprise through a 400km pipeline.

## Technical purpose
The Oleflex process of UOP company is utilized for the dehydrogenation of propane to produce propylene. This process is applied in the petrochemical industry to generate propylene with a high level of purity required for the production of polypropylene, acrylonitrile, propylene oxide, and other derivatives used in various industries such as plastics, automotive, and textiles. It is equipped for a large scale production with an annual capacity of 600,000 tons. The by-products such as hydrogen, and C4 and C2 hydrocarbons, also have their respective applications in chemical synthesis and as a fuel source, contributing to an integrated approach in the utilization of feedstock and energy.

## Model description
The consumption of raw materials, energy, electricity, steam, water and auxiliary chemicals involved in each sub-stage is considered, and the output considers propylene and by-products (such as C4 products produced by the propane dehydrogenation process. The mass distribution method is used to quantify the products The environmental load between propylene and by-products. In addition, this model also considers the waste discharge of each process. This study focuses on the environmental impact analysis of different propylene production processes. Therefore, the utilization of propylene hydrocarbons and the end-of-life treatment of their products, as well as infrastructure Construction and equipment maintenance are outside the scope of this assessment.

## Reference product
- propene (propylene): 1000; measured
  Acrylic

## Inputs
All rows: measured
- Propane: 1240
  propane
- platinum: 0.38667
  Pt
- palladium: 0.022
  Pd
- Poly(styrene-divinylbenzene): 0.164
  Styrene-divinylbenzene polymer
- Aluminum oxide (alumina): 0.93085
  Alumina
- chlorine: 0.10883
  Chlorine
- Dimethyl disulfide: 0.03717
  dimethyl disulfide
- sodium hydroxide: 7.49
- nitrogen: 8.8
  Nitrogen
- air: 38.7
  installation style
- freshwater: 7390
  fresh water
- Electricity: 531.18
  electricity
- process steam: 2860
  steam
- natural gas: 110
  fuel gas

## Outputs
All rows: measured
- C4 Hydrocarbon Mixture: 60
  C4+
- Hydrogen: 40
  hydrogen
- Ethane: 100
  C2
- carbon dioxide (fossil): 410
  CO2
- sulfur dioxide: 0.0314
  SO2
- nitrous oxide: 0.25167
  NOx
- particles (> PM10): 0.065
  particulates
- chlorine: 0.00462
  Chlorine
- hydrogen chloride: 0.00168
  HCl
- chemical oxygen demand: 0.00345
  COD
- ammonia: 5e-5
  Ammonia nitrogen

## Deviations from the LCI method approaches
Quantification of environmental load between product propylene and by-products using mass distribution method

## Data selection and combination
The detailed input-output data of the propylene production process comes from the company's public environmental impact assessment report, including the input of raw materials and auxiliary materials, energy and resource consumption, and discharge of waste gas, wastewater and solid waste.

## Use advice
When applying this data set for Life Cycle Assessment, it is essential to carefully consider the system boundaries and to apply the mass distribution method for the allocation of the environmental load between the main product, propylene, and the various by-products. Recycling, energy recovery and potential environmental impact offsets due to by-product utilization should be taken into account. Data on emissions should be considered context-specific and may require adjustment when applying to different geographical regions or technological scenarios. The infrastructure and maintenance of the production process are excluded from this LCA model.

## Review details
Inventory: The internal review was done by several iteration steps concerning raw data validation, raw data documentation, representativity, completeness and consistency of modelling with regard to ISO 14040 and 14044.

## Data sources
- 吕琳. 丙烯产品环境负荷及温室气体减排的碳税政策. (大连理工大学, 2022).
