# Wet steaming cotton dyeing and finishing ; printing and dyeing cotton ; open width washing

Dataset: ILCD process, Unit process, single operation
Geography: SZ-JS-CN
Reference year: 2012
Classification: Unit processes / Materials production / Other materials
Generated by: Yingfan Duan, 1300925579@qq.com
Owner: Tiangong LCI Data Working Group
Review: Dependent internal review by Tiangong LCI Data Working Group
Amounts: no units in this file; such an amount is in the reference unit of its flow, which a separate flow dataset defines
copyright: false
licenseType: Free of charge for all users and uses

## General comment
"Open width washing" is a step in the dyeing and finishing process, involving the washing of fabric to achieve cleanliness and treatment effects in the widthwise direction. This process helps to eliminate residual dyes, auxiliaries, or other impurities, while also adjusting the fabric's texture and appearance.

## Geography
The study focuses on a printing and dyeing enterprise in Jiangsu Province, located in Changshu within the Yangtze River Delta Economic Zone.

## Technical purpose
The described industrial process pertains to the wet steam method of cotton cloth dyeing and finishing, which involves the printing and dyeing of cotton fabrics utilizing the open width washing technique. Coal is utilized in steam and thermal oil boilers to generate steam and maintain higher operating temperatures for the process. The sequence of processing steps that employ steam generated by these boilers includes scouring and oxygen bleaching, calendering, napping, open width washing, stentering, and pad dyeing. In this sequence, steam is applied to dry the greige fabric, with the stenter and pad dyeing requiring double drying steps while the others use a single drying step. The steam consumption ratios for these processes are 2:1:1:1:1:2. This detailed data set specifically examines a textile printing and dyeing enterprise located in Changshu, within the Yangtze River Delta Economic Zone in Jiangsu Province.

## Reference product
- Cotton Fabric: 167; measured

## Inputs
- Electricity: 310; measured
- Standard coal: 981; measured
- Crude coal: 56.5; calculated
- Cleaned coal: 140; calculated
- Fuel Oil: 1.21; calculated
- heavy fuel oil: 0.363; calculated
- Diesel oil: 1.66; calculated
- Coke Oven Gas: 2.21; calculated
- natural gas: 0.0283; calculated
- process steam: 3.15e7; measured
- Hydrogen peroxide: 10.7; measured
- Stabilizer: 10.9; measured
- Penetrant: 1.57; measured
- river water: 20300; measured
- freshwater: 2300; measured

## Outputs
- carbon dioxide (fossil): 2780; calculated
- carbon monoxide (fossil): 0.177; calculated
- sulfur dioxide: 2.09; calculated
- methane (fossil): 13.6; calculated
- Nitrogen oxides: 0.365; calculated
- nitrous oxide: 0.0431; measured
- particles (> PM10): 0.562; calculated
- ammonia: 9.11e-6; measured
- non-methane volatile organic compounds: 0.00429; measured
- waste water - untreated: 18800; measured
- chemical oxygen demand: 21.4; calculated
- Suspended solids, unspecified,Suspended solids, unspecified: 2.32; calculated
- lead: 4.44e-6; calculated
- mercury: 9.32e-8; calculated
- fluorine: 8.39e-7; calculated
- cadmium: 1.65e-7; calculated
- arsenic: 3.8e-6; calculated

## Use advice
When utilizing this data set, it is important for users to note that it reflects the specific energy and steam consumption patterns of the Jiangsu enterprise under study, which may not be representative of all operations in this industry. Users should adjust their calculations when applying this data to different contexts, taking into consideration the ratio of coal consumption for the two boiler types (17:1) and the steam usage ratio for the various drying cylinders (2:1:1:1:1:2). Users are also advised to account for the fact that the stenter and pad dyeing processes require double drying steps, and that steam usage calculations should be adapted accordingly. Recycling and environmental practices vary from region to region, and it is imperative to verify that these practices align with the conditions of the data set location.

## Review details
Inventory: The internal review was done by several iteration steps concerning raw data validation, raw data documentation, representativity, completeness and consistency of modelling with regard to ISO 14040 and 14044.

## Data sources
- 朱亚楠. 棉布连续轧染工艺生命周期环境影响评价. (南京大学, 2012).
