# Wetblueleather-Blankleather/Finishedleather|Cattleblankleather/finishedleather|Bovinebluewetleather|Chromiumretanning|All sizes / 蓝湿皮-坯革/成品革|牛坯革/成品革|牛蓝湿皮|铬复鞣|所有规模

Dataset: ILCD process, Unit process, single operation
Geography: CN
Reference year: 2019
Classification: Materials production / Other materials
Generated by: The data was created by the Office of the Second National Pollution Source Census of the Ministry of Ecology and Environment, and the data was organized by the TianGong Plan team for ILCD format / 生态环境部第二次全国污染源普查工作办公室创建数据，天工计划团队常慧敏整理数据为ILCD格式
Owner: Tiangong LCI Data Working Group / 天工LCI数据工作小组
Review: Dependent internal review by Tiangong LCI Data Working Group / 天工LCI数据工作小组
Amounts: no units in this file; such an amount is in the reference unit of its flow, which a separate flow dataset defines
copyright: false
licenseType: Free of charge for all users and uses

## General comment
the Technical of end-of-pipe management technology for pollution Nitrogen, organic boundisBio-contact oxidation process，Its Technical efficiency of end-of-pipe management65，The formula for calculating the actual operation rate (k-value) of the end-of-pipe treatment facility is k = power consumption of wastewater treatment facilities (kWh/year) / (total rated power (kW) × annual operating time (hours))

## Reference product
- Blue Wet Hide: 1000; input; calculated
  源文件中描述为为牛蓝湿皮，此处对其进行了匹配工作，将其匹配到LCAflow库里面相最符合的流

## Outputs
All rows: calculated
- Waste water: 34900
  污染物指标工业废水量的末端治理技术未说明。原文件中描述污染物类别为废水，污染物指标为工业废水量，此处对其进行了匹配工作，将其匹配到LCAflow库里面相最符合的流
- chemical oxygen demand: 0.868
  污染物指标化学需氧量的末端治理技术是其他（好氧生物处理法+氧化还原法），其效率为98，末端治理设施实际运行率（k值）计算公式为k=设备运行时间（小时）/总生产时间（小时）。原文件中描述污染物类别为废水，污染物指标为化学需氧量，此处对其进行了匹配工作，将其匹配到LCAflow库里面相最符合的流
- chemical oxygen demand: 1.736
  污染物指标化学需氧量的末端治理技术是A2/O，其效率为96，末端治理设施实际运行率（k值）计算公式为k=设备运行时间（小时）/总生产时间（小时）。原文件中描述污染物类别为废水，污染物指标为化学需氧量，此处对其进行了匹配工作，将其匹配到LCAflow库里面相最符合的流
- chemical oxygen demand: 2.604
  污染物指标化学需氧量的末端治理技术是A/O，其效率为94，末端治理设施实际运行率（k值）计算公式为k=设备运行时间（小时）/总生产时间（小时）。原文件中描述污染物类别为废水，污染物指标为化学需氧量，此处对其进行了匹配工作，将其匹配到LCAflow库里面相最符合的流
- chemical oxygen demand: 2.604
  污染物指标化学需氧量的末端治理技术是MBR类，其效率为94，末端治理设施实际运行率（k值）计算公式为k=设备运行时间（小时）/总生产时间（小时）。原文件中描述污染物类别为废水，污染物指标为化学需氧量，此处对其进行了匹配工作，将其匹配到LCAflow库里面相最符合的流
- chemical oxygen demand: 6.51
  污染物指标化学需氧量的末端治理技术是SBR类，其效率为85，末端治理设施实际运行率（k值）计算公式为k=设备运行时间（小时）/总生产时间（小时）。原文件中描述污染物类别为废水，污染物指标为化学需氧量，此处对其进行了匹配工作，将其匹配到LCAflow库里面相最符合的流
- chemical oxygen demand: 6.51
  污染物指标化学需氧量的末端治理技术是氧化沟类，其效率为85，末端治理设施实际运行率（k值）计算公式为k=设备运行时间（小时）/总生产时间（小时）。原文件中描述污染物类别为废水，污染物指标为化学需氧量，此处对其进行了匹配工作，将其匹配到LCAflow库里面相最符合的流
- chemical oxygen demand: 8.68
  污染物指标化学需氧量的末端治理技术是生物接触氧化，其效率为80，末端治理设施实际运行率（k值）计算公式为k=设备运行时间（小时）/总生产时间（小时）。原文件中描述污染物类别为废水，污染物指标为化学需氧量，此处对其进行了匹配工作，将其匹配到LCAflow库里面相最符合的流
- chemical oxygen demand: 30.38
  污染物指标化学需氧量的末端治理技术是沉淀分离，其效率为30，末端治理设施实际运行率（k值）计算公式为k=设备运行时间（小时）/总生产时间（小时）。原文件中描述污染物类别为废水，污染物指标为化学需氧量，此处对其进行了匹配工作，将其匹配到LCAflow库里面相最符合的流
- phosphorus, total: 0.012441
  污染物指标总磷的末端治理技术是A2/O，其效率为67，末端治理设施实际运行率（k值）计算公式为k=设备运行时间（小时）/总生产时间（小时）。原文件中描述污染物类别为废水，污染物指标为总磷，此处对其进行了匹配工作，将其匹配到LCAflow库里面相最符合的流
- phosphorus, total: 0.016965
  污染物指标总磷的末端治理技术是A/O，其效率为55，末端治理设施实际运行率（k值）计算公式为k=设备运行时间（小时）/总生产时间（小时）。原文件中描述污染物类别为废水，污染物指标为总磷，此处对其进行了匹配工作，将其匹配到LCAflow库里面相最符合的流
- phosphorus, total: 0.016965
  污染物指标总磷的末端治理技术是SBR类，其效率为55，末端治理设施实际运行率（k值）计算公式为k=设备运行时间（小时）/总生产时间（小时）。原文件中描述污染物类别为废水，污染物指标为总磷，此处对其进行了匹配工作，将其匹配到LCAflow库里面相最符合的流
- phosphorus, total: 0.016965
  污染物指标总磷的末端治理技术是MBR类，其效率为55，末端治理设施实际运行率（k值）计算公式为k=设备运行时间（小时）/总生产时间（小时）。原文件中描述污染物类别为废水，污染物指标为总磷，此处对其进行了匹配工作，将其匹配到LCAflow库里面相最符合的流
- phosphorus, total: 0.016965
  污染物指标总磷的末端治理技术是氧化沟类，其效率为55，末端治理设施实际运行率（k值）计算公式为k=设备运行时间（小时）/总生产时间（小时）。原文件中描述污染物类别为废水，污染物指标为总磷，此处对其进行了匹配工作，将其匹配到LCAflow库里面相最符合的流
- phosphorus, total: 0.016965
  污染物指标总磷的末端治理技术是生物接触氧化，其效率为55，末端治理设施实际运行率（k值）计算公式为k=设备运行时间（小时）/总生产时间（小时）。原文件中描述污染物类别为废水，污染物指标为总磷，此处对其进行了匹配工作，将其匹配到LCAflow库里面相最符合的流
- Ammonia Nitrogen: 0.0291
  污染物指标氨氮的末端治理技术是A2/O，其效率为99，末端治理设施实际运行率（k值）计算公式为k=设备运行时间（小时）/总生产时间（小时）。原文件中描述污染物类别为废水，污染物指标为氨氮，此处对其进行了匹配工作，将其匹配到LCAflow库里面相最符合的流
- phosphorus, total: 0.0377
  污染物指标总磷的末端治理技术是沉淀分离，末端治理设施实际运行率（k值）计算公式为k=设备运行时间（小时）/总生产时间（小时）。原文件中描述污染物类别为废水，污染物指标为总磷，此处对其进行了匹配工作，将其匹配到LCAflow库里面相最符合的流
- Ammonia Nitrogen: 0.0582
  污染物指标氨氮的末端治理技术是其他（好氧生物处理法+氧化还原法），其效率为98，末端治理设施实际运行率（k值）计算公式为k=设备运行时间（小时）/总生产时间（小时）。原文件中描述污染物类别为废水，污染物指标为氨氮，此处对其进行了匹配工作，将其匹配到LCAflow库里面相最符合的流
- Ammonia Nitrogen: 0.1746
  污染物指标氨氮的末端治理技术是A/O，其效率为94，末端治理设施实际运行率（k值）计算公式为k=设备运行时间（小时）/总生产时间（小时）。原文件中描述污染物类别为废水，污染物指标为氨氮，此处对其进行了匹配工作，将其匹配到LCAflow库里面相最符合的流
- Ammonia Nitrogen: 0.1746
  污染物指标氨氮的末端治理技术是MBR类，其效率为94，末端治理设施实际运行率（k值）计算公式为k=设备运行时间（小时）/总生产时间（小时）。原文件中描述污染物类别为废水，污染物指标为氨氮，此处对其进行了匹配工作，将其匹配到LCAflow库里面相最符合的流
- Ammonia Nitrogen: 0.291
  污染物指标氨氮的末端治理技术是SBR类，其效率为90，末端治理设施实际运行率（k值）计算公式为k=设备运行时间（小时）/总生产时间（小时）。原文件中描述污染物类别为废水，污染物指标为氨氮，此处对其进行了匹配工作，将其匹配到LCAflow库里面相最符合的流
- Ammonia Nitrogen: 0.291
  污染物指标氨氮的末端治理技术是氧化沟类，其效率为90，末端治理设施实际运行率（k值）计算公式为k=设备运行时间（小时）/总生产时间（小时）。原文件中描述污染物类别为废水，污染物指标为氨氮，此处对其进行了匹配工作，将其匹配到LCAflow库里面相最符合的流
- chemical oxygen demand: 0.434
  污染物指标化学需氧量的末端治理技术是生物滤池，其效率为99，末端治理设施实际运行率（k值）计算公式为k=设备运行时间（小时）/总生产时间（小时）。原文件中描述污染物类别为废水，污染物指标为化学需氧量，此处对其进行了匹配工作，将其匹配到LCAflow库里面相最符合的流
- chemical oxygen demand: 0.434
  污染物指标化学需氧量的末端治理技术是好氧化塘，其效率为99，末端治理设施实际运行率（k值）计算公式为k=设备运行时间（小时）/总生产时间（小时）。原文件中描述污染物类别为废水，污染物指标为化学需氧量，此处对其进行了匹配工作，将其匹配到LCAflow库里面相最符合的流
- Ammonia Nitrogen: 0.4365
  污染物指标氨氮的末端治理技术是生物接触氧化，其效率为85，末端治理设施实际运行率（k值）计算公式为k=设备运行时间（小时）/总生产时间（小时）。原文件中描述污染物类别为废水，污染物指标为氨氮，此处对其进行了匹配工作，将其匹配到LCAflow库里面相最符合的流
- Nitrogen, organic bound: 0.789
  污染物指标总氮的末端治理技术是MBR类，其效率为85，末端治理设施实际运行率（k值）计算公式为k=设备运行时间（小时）/总生产时间（小时）。原文件中描述污染物类别为废水，污染物指标为总氮，此处对其进行了匹配工作，将其匹配到LCAflow库里面相最符合的流
- Nitrogen, organic bound: 1.4728
  污染物指标总氮的末端治理技术是A/O，其效率为72，末端治理设施实际运行率（k值）计算公式为k=设备运行时间（小时）/总生产时间（小时）。原文件中描述污染物类别为废水，污染物指标为总氮，此处对其进行了匹配工作，将其匹配到LCAflow库里面相最符合的流
- Nitrogen, organic bound: 1.4728
  污染物指标总氮的末端治理技术是A2/O，其效率为72，末端治理设施实际运行率（k值）计算公式为k=设备运行时间（小时）/总生产时间（小时）。原文件中描述污染物类别为废水，污染物指标为总氮，此处对其进行了匹配工作，将其匹配到LCAflow库里面相最符合的流
- Nitrogen, organic bound: 1.4728
  污染物指标总氮的末端治理技术是SBR类，其效率为72，末端治理设施实际运行率（k值）计算公式为k=设备运行时间（小时）/总生产时间（小时）。原文件中描述污染物类别为废水，污染物指标为总氮，此处对其进行了匹配工作，将其匹配到LCAflow库里面相最符合的流
- Nitrogen, organic bound: 1.841
  污染物指标总氮的末端治理技术是氧化沟类，其效率为65，末端治理设施实际运行率（k值）计算公式为k=设备运行时间（小时）/总生产时间（小时）。原文件中描述污染物类别为废水，污染物指标为总氮，此处对其进行了匹配工作，将其匹配到LCAflow库里面相最符合的流
- Ammonia Nitrogen: 2.91
  污染物指标氨氮的末端治理技术是沉淀分离，末端治理设施实际运行率（k值）计算公式为k=设备运行时间（小时）/总生产时间（小时）。原文件中描述污染物类别为废水，污染物指标为氨氮，此处对其进行了匹配工作，将其匹配到LCAflow库里面相最符合的流
- Nitrogen, organic bound: 4.8392
  污染物指标总氮的末端治理技术是沉淀分离，其效率为8，末端治理设施实际运行率（k值）计算公式为k=设备运行时间（小时）/总生产时间（小时）。原文件中描述污染物类别为废水，污染物指标为总氮，此处对其进行了匹配工作，将其匹配到LCAflow库里面相最符合的流
- Chromium: 0.003486
  污染物指标铬的末端治理技术是化学沉淀法，其效率为99.3，末端治理设施实际运行率（k值）计算公式为k=设备运行时间（小时）/总生产时间（小时）。原文件中描述污染物类别为废水，污染物指标为铬，此处对其进行了匹配工作，将其匹配到LCAflow库里面相最符合的流
- Nitrogen, organic bound: 18.41
  污染物指标总氮的末端治理技术是生物接触氧化，其效率为65，末端治理设施实际运行率（k值）计算公式为k=设备运行时间（小时）/总生产时间（小时）。原文件中描述污染物类别为废水，污染物指标为总氮，此处对其进行了匹配工作，将其匹配到LCAflow库里面相最符合的流

## Use advice
This dataset is derived from the Pollution Source Census Report and contains information on pollution emissions and related products. However, it does not include data on energy or chemical consumption, nor does it provide information on waste or co-product generation. When utilizing this dataset, please supplement the missing data based on actual conditions before use
该数据集来源于污染源普查报告，包含污染物排放及相关产品信息，但不包含能源或化学品消耗数据，也不提供废弃物或共生产物产生信息。在使用该数据集时，请根据实际情况补充缺失数据后再使用。

## Review details
Inventory: The internal review was done by several iteration steps concerning raw data validation, raw data documentation, representativity, completeness and consistency of modelling with regard to ISO 14040 and 14044.
清单： 内部审查通过几个迭代步骤完成，涉及原始数据验证、原始数据记录、代表性、完整性、与 ISO 14040 和 14044 有关的建模的一致性。

## Data sources
- 第二次全国污染源普查产排污核算系数手册（试用版）,三级代码191.0文件，在完整版文件中第2724页
