# Prepared wine ; White wine (or edible alcohol plus excipients) ; All prosscesses; NESPS2 / 配制酒 ; 白酒（或食用酒精加辅料） ; 全部工艺 ; 小于0.5万千升/年 ; 全国第二次污染普查数据

Dataset: ILCD process, Unit process, single operation
Geography: CN
Reference year: 2019
Classification: Reference Parameters / Materials production / Food and renewable raw materials
Generated by: The data was created by the Office of the Second National Pollution Source Census of the Ministry of Ecology and Environment, and the data was organized by the TianGong Plan team for ILCD format / 生态环境部第二次全国污染源普查工作办公室创建数据，天工计划团队常慧敏整理数据为ILCD格式
Owner: Tiangong LCI Data Working Group / 天工LCI数据工作小组
Review: Dependent internal review by Tiangong LCI Data Working Group / 天工LCI数据工作小组
Amounts: no units in this file; such an amount is in the reference unit of its flow, which a separate flow dataset defines
copyright: false
licenseType: Free of charge for all users and uses

## General comment
the Technical of end-of-pipe management technology for pollution chemical oxygen demandisPhysical treatment + aerobic biological treatment + chemical treatment，Its Technical efficiency of end-of-pipe management53

## Technical purpose
该数据集描述的是一种小规模制备葡萄酒或白葡萄酒的生产过程，使用食用酒精和辅料，年产量小于5,000千升。该设施采用物理处理、好氧生物处理和化学处理相结合的末端污染管理技术。这些工艺专门设计用于处理废水，减少出水中的化学需氧量、氨氮、有机氮和总磷。

## Reference product
- Wine: 1; calculated
  源文件中描述为为配制酒，此处对其进行了匹配工作，将其匹配到LCAflow库里面相最符合的流，污染物指标备注为工业废水量

## Outputs
All rows: calculated
- Waste water: 25000
  the Technical of end-of-pipe management technology for pollution Waste waterisPhysical treatment + aerobic biological treatment + chemical treatment，Its Technical efficiency of end-of-pipe management0
  污染物指标工业废水量的末端治理技术是物理法+好氧生物处法+化学法，其效率为0，末端治理设施实际运行率（k值）计算公式为/。原文件中描述污染物类别为废水，污染物指标为工业废水量，此处对其进行了匹配工作，将其匹配到LCAflow库里面相最符合的流，污染物指标备注为工业废水量
- phosphorus, total: 0.1248
  the Technical of end-of-pipe management technology for pollution phosphorus, totalisPhysical treatment + aerobic biological treatment + chemical treatment，Its Technical efficiency of end-of-pipe management22
  污染物指标总磷的末端治理技术是物理法+好氧生物处法+化学法，其效率为22，末端治理设施实际运行率（k值）计算公式为k=污水末端治理设施运行时间（小时）/正常生产时间（小时）。原文件中描述污染物类别为废水，污染物指标为总磷，此处对其进行了匹配工作，将其匹配到LCAflow库里面相最符合的流，污染物指标备注为总磷
- Ammonia Nitrogen: 0.2
  the Technical of end-of-pipe management technology for pollution Ammonia NitrogenisPhysical treatment + aerobic biological treatment + chemical treatment，Its Technical efficiency of end-of-pipe management0
  污染物指标氨氮的末端治理技术是物理法+好氧生物处法+化学法，其效率为0，末端治理设施实际运行率（k值）计算公式为/。原文件中描述污染物类别为废水，污染物指标为氨氮，此处对其进行了匹配工作，将其匹配到LCAflow库里面相最符合的流，污染物指标备注为氨氮
- Nitrogen, organic bound: 0.8
  the Technical of end-of-pipe management technology for pollution Nitrogen, organic boundisPhysical treatment + aerobic biological treatment + chemical treatment，Its Technical efficiency of end-of-pipe management0
  污染物指标总氮的末端治理技术是物理法+好氧生物处法+化学法，其效率为0，末端治理设施实际运行率（k值）计算公式为/。原文件中描述污染物类别为废水，污染物指标为总氮，此处对其进行了匹配工作，将其匹配到LCAflow库里面相最符合的流，污染物指标备注为总氮
- chemical oxygen demand: 7.52
  the Technical of end-of-pipe management technology for pollution chemical oxygen demandisPhysical treatment + aerobic biological treatment + chemical treatment，Its Technical efficiency of end-of-pipe management53
  污染物指标化学需氧量的末端治理技术是物理法+好氧生物处法+化学法，其效率为53，末端治理设施实际运行率（k值）计算公式为k=污水末端治理设施运行时间（小时）/正常生产时间（小时）。原文件中描述污染物类别为废水，污染物指标为化学需氧量，此处对其进行了匹配工作，将其匹配到LCAflow库里面相最符合的流，污染物指标备注为化学需氧量

## Use advice
This dataset is derived from the Pollution Source Census Report and contains information on pollution emissions and related products. However, it does not include data on energy or chemical consumption, nor does it provide information on waste or co-product generation. When utilizing this dataset, please supplement the missing data based on actual conditions before use
该数据集来源于污染源普查报告，包含污染物排放及相关产品信息，但不包含能源或化学品消耗数据，也不提供废弃物或共生产物产生信息。在使用该数据集时，请根据实际情况补充缺失数据后再使用。

## Review details
Inventory: The internal review was done by several iteration steps concerning raw data validation, raw data documentation, representativity, completeness and consistency of modelling with regard to ISO 14040 and 14044.
清单： 内部审查通过几个迭代步骤完成，涉及原始数据验证、原始数据记录、代表性、完整性、与 ISO 14040 和 14044 有关的建模的一致性。

## Data sources
- 第二次全国污染源普查产排污核算系数手册（试用版）,二级代码15,四级代码1519文件，在完整版文件中第4075页
