# Municipal sludge treatment and disposal;wet sludge moisture content 76.2%;landfill

Dataset: ILCD process, Unit process, single operation
Geography: XA-SAX-CN
Classification: Unit processes / End-of-life treatment / Wastewater treatment
Functional unit: The residual sludge sludge of Xi'an No. 3 Sewage Treatment Plant has a moisture content of 76.2% and a functional unit of 1t residual sludge.
Generated by: Jin Sitian, 2331276@tongji.edu.cn
Owner: Tiangong LCI Data Working Group
Review: Dependent internal review by Tiangong LCI Data Working Group
Amounts: no units in this file; such an amount is in the reference unit of its flow, which a separate flow dataset defines
copyright: ['opt4ROkqig']
licenseType: Free of charge for all users and uses

## General comment
The estimation of soot, solid waste and leachate is based on literature and experience, and the environmental emissions of COD, BOD, ammonia nitrogen and SS are calculated according to the water pollutant emission concentration limits of the "Pollution Control Standards for Domestic Waste Landfills".

## Geography
Xi'an No. 3 Sewage Treatment Plant

## Technology and included processes
The sludge needs to be dried and dewatered first, using a heat pump dehumidification dryer, and the assumed moisture content is reduced from 76.2% to 60%.

## Technical purpose
The residual sludge from the Xi'an No. 3 Sewage Treatment Plant is intended for landfill disposal. With a moisture content of 76.2%, this treated waste product can be used in the management of municipal solid waste by creating landfill material that has been processed to control for contaminants and reduce volume.

## Reference product
- Sludge: 1000; input; estimated
  1t of remaining sludge with a moisture content of 76.2%

## Inputs
- Electricity: 6.426; calculated
- Diesel: 0.000238; calculated

## Outputs
All rows: calculated
- carbon dioxide (biogenic): 55.033
  The original text does not distinguish between biogenic and fossil, and according to experts, it is biogenic here.
- methane (biogenic),methane (biogenic): 24.459
  The original text does not distinguish between biogenic and fossil, and according to experts, it is biogenic here
- carbon monoxide (biogenic): 0.0007783
  (same comment as for methane (biogenic),methane (biogenic))
- hydrogen chloride: 0.004047
- hydrogen fluoride: 0.0008094
- hydrogen sulfide: 0.01245
- ammonia: 0.04726
- hydrocarbons (unspecified): 0.1245
- cadmium: 0.0001221
- chromium: 0.004736
- lead: 0.003927
- mercury: 4.189e-5
- zinc: 0.02311
- copper: 0.00545
- nickel: 0.001159
- chemical oxygen demand: 0.00595
- ammonia: 0.00149
  Ammonia nitrogen
- Suspended solids, unspecified,Suspended solids, unspecified,Suspended solids, unspecified: 0.00179
- Non Hazardous non organic waste for disposal (unspecific sludges and dusts): 0.399
  soot
- Waste (solid): 595
- biological oxygen demand: 0.00179

## Use advice
When using data related to the residual sludge of Xi'an No. 3 Sewage Treatment Plant with a moisture content of 76.2%, users should consider the specific treatment processes involved and how these processes may affect the local environment and landfill operation. The functional unit of data is 1 ton of residual sludge, which must correlate with the intended application to ensure accurate life cycle assessment outcomes. Care should be taken where moisture content can influence the overall impact, especially in methane generation within landfill contexts.

## Review details
Inventory: The internal review was done by several iteration steps concerning raw data validation, raw data documentation, representativity, completeness and consistency of modelling with regard to ISO 14040 and 14044.

## Data sources
- 齐星昊. 基于生命周期评价的典型剩余污泥处理方法的环境影响比较研究[D].河南师范大学,2020.
