# Substrate Remediation;In-situ Mulching;Transportation;Transportation of Equipment and Materials to Site

Dataset: ILCD process, Unit process, black box
Geography: NO
Reference year: 2011
Classification: Unit processes / Other Services / Repair and maintenance
Generated by: Sang Chunhui, sangch@mail.bnu.edu.cn
Owner: Tiangong LCI Data Working Group
Review: Dependent internal review by Tiangong LCI Data Working Group
Amounts: no units in this file; such an amount is in the reference unit of its flow, which a separate flow dataset defines
copyright: false
licenseType: Free of charge for all users and uses

## General comment
Sources for the production of AC is a fossil anthracite coal-based product from China. Transport from China 20 000 km.

## Geography
After investigation, no relevant domestic research literature has been found yet.

## Time period
There is no clear start time for data collection in the literature, and the start time of the validity period is based on the publication time of the literature

## Technology and included processes
The transportation distance is 20000km.

## Technical purpose
The data set represents the industrial process of substrate remediation through in-situ mulching, which involves the use of activated carbon (AC) derived from fossil anthracite coal sourced from China. This process typically includes the transportation of necessary equipment and materials over a distance of 20,000 km to the remediation site. The primary use of this data is for environmental impact assessments within Life Cycle Assessments (LCAs) related to large-scale substrate remediation projects, particularly those which align with the scenario of Southern China.

## Reference product
- Equipment and Materials Arriving on Site: 1; calculated

## Inputs
- Road Transport,Road Transport: 9.52e8; calculated

## Data selection and combination
Process inventory data were obtained in accordance with ISO 14040 on LCA.35 Primary data were obtained from site-specific pot experiments, pilot studies, and vendors, which were representative of situations in Southern China.

## Use advice
When using this data set for Life Cycle Assessments, it is necessary to consider the scope and regional applicability concerning substrate remediation projects in Southern China. The transportation distance of 20,000 km for equipment and materials should be factored into the assessment. Since no domestic research literature is available, the dataset lacks specific regional data; therefore, assumptions based on local conditions must be made with caution. The dataset's validity starts at the publication time of the literature due to the absence of a specific data collection start time. Lastly, the inventory data should only be used for LCA related to similar technological processes and within the frame of ISO 14040 LCA.35 guidelines.

## Review details
Inventory: The internal review was done by several iteration steps concerning raw data validation, raw data documentation, representativity, completeness and consistency of modelling with regard to ISO 14040 and 14044.

## Data sources
- Sparrevik, M. et al. Use of Life Cycle Assessments To Evaluate the Environmental Footprint of Contaminated Sediment Remediation. Environ. Sci. Technol. 45, 4235–4241 (2011).
