# Mechanical Process + simple chemistry;PV waste;module delamination

Dataset: ILCD process, Unit process, black box
Geography: CN
Classification: Unit processes / End-of-life treatment / Other end-of-life services
Generated by: Nan Wang, 1209824595@qq.com
Owner: Tiangong LCI Data Working Group
Review: Dependent internal review by Tiangong LCI Data Working Group
Amounts: no units in this file; such an amount is in the reference unit of its flow, which a separate flow dataset defines
copyright: false
licenseType: Free of charge for all users and uses

## General comment
Mechanical upcycling that aims to fully recover components. Additional chemical processes are involved, referred as “mechanical recycling” . Several studies have investigated mechanical operations to recover glass and separate it from other parts. We sort these methods as M1, M2, M3, and M4. Inmethod M1, Granata et al. proposed a method to shred the module in atwo-rotor motor followed by hammer milling. Larger fractions (diameter > 0.08 mm) were identified as recoverable glass and smallfractions (diameter < 0.08 mm) were identified to contain Si andmetals that need further pyro/hydrometallurgical treatments. Afterthermal removal of the polymer residue from the glass, this methodproduces recyclable glass at a quantity 80–85%w of the PV module. A follow-up study further improved this process by replacing thecrushing and milling with triple shredding, achieving a glass recoveryrate of 91%w. In method M2, instead of thermal removal of theEVA residue, Yingli Solar developed a cryogenic process to delaminateSi modules. After cooling at sufficiently low temperatures (−196 °C),the interfacial bonding of the sandwich structures are weakened.Then, an abrasive grinding machine can easily peel Si powders fromplastic powders. In method M3, which targets at the unbroken glass pieces, Trina Solar investigated a glass detachment processunder oxidant hydrothermal subcritical conditions to detach the wholeglass sheet from the module. Note that, for M2 and M3 the recycling yield was unclear. Therefore, the viability should be furtherinvestigated and validated. In method M4, another reliable approachwas used: hot knife cutting. The Full Recovery End of Life Photovoltaic(FRELP) project demonstrated a pilot recycling approach that cuts apartthe entire module glass sheet by a high-frequency knife at slightlyelevated temperatures. 98%w of the glass was recovered, and the rest ofthe EVA/solar cell/backsheet sandwiches were sent to an incinerationplant for further treatment. Cutting has a clear advantage to detach glass in a single step to avoid multiple crushing and thermal processes. The hot-cutting concept has been implemented using differentdesigns, such as a heated cutting blade, a fast spinning steel brush, andchisel sheets.

## Technology and included processes
Chemical delamination. The adhesive encapsulation layer can also be dissolved in either inorganic (C1) or organic (C2) solvents to delaminate the module. In method C1, solar glass was firstly separated fromsolar cells by immersing the module in nitric acid (HNO3) for 24 hours. In method C2, Doi et al. reported successfully dissolution of EVAin trichloroethylene at 80 °C for 10 days. The chemical process canbe accelerated with ultrasonic radiation. For example, Kim and Leereported the most effective organic dissolution of EVA in O-dichlorobenzene within 30 minutes to recover damage-free solar cells. Azeumo et al. reported complete dissolution of EVA in less than60 minutes in toluene with the presence of ultrasonic radiation. Insome occasions, the organic solvents could not remove the swollen EVAremaining on the surface, hence a secondary treatment such as pyrolysis is required. This unavoidably adds complexity.In addition to the front glass, fluorine-contained backsheets must beremoved before recycling solar cells because of its toxicity. The backsheet can be peeledoff from the module at elevated temperatures, mechanically removed during scrapping, grinding or milling operations, or thermally combusted in a licensed incinerator. For glass-glass modulesand those with fluorine-free backsheet, this step is unnecessary.

## Technical purpose
The described recycling methods are designed to recover components from end-of-life photovoltaic (PV) modules, particularly the glass and silicon parts. These processes, which include a combination of mechanical and chemical treatments, aim to reclaim and upcycle materials, thus diverting waste from landfills and contributing to sustainable production in the solar industry.

## Reference product
- PV Module Waste: 1000; input; min 1000; max 1000; uniform; estimated

## Inputs
- Landfill liquid: 306; min 612; max 245; uniform; software or database

## Outputs
All rows: uniform
- Landfill disposal: 14; min 14; max 14; software or database
- mineral waste (ash): 2; min 2; max 2; software or database
- Sludge: 50; min 200; max 15; software or database
- aluminium: 180; min 180; max 180; software or database
  Aluminum frame
- Glass for recovery (shards): 665; min 686; max 560; software or database
- copper wire: 2.97; min 3.3; max 2.805; software or database
  Copper cable
- copper wire: 0.9; min 1.14; max 0.342; software or database
  Copper ribbon
- Junction Box: 50; min 50; max 50; software or database
- silver: 0.49; min 0.5; max 0.27; software or database
- Silicon: 35; min 36; max 29; software or database
  Metallurgical grade silicon
- Energy, gross calorific value, in biomass, primary forest: 349; min 449; max 309
  energy recovery

## Use advice
Users of this data set should consider the applicability of each recycling method (M1, M2, M3, M4, C1, C2) described for different PV module types and conditions. Attention must be paid to the recycling yields, environmental implications, and technological feasibility of these methods. For methods where recycling yield is not clear (M2, M3), additional research and validation are necessary. The toxicity of fluorine-contained backsheets must also be addressed, potentially altering the treatment process for modules with such backsheets.

## Review details
Inventory: The internal review was done by several iteration steps concerning raw data validation, raw data documentation, representativity, completeness and consistency of modelling with regard to ISO 14040 and 14044.

## Data sources
- Deng, R., Chang, N. L., Ouyang, Z. & Chong, C. M. A techno-economic review of silicon photovoltaic module recycling. Renewable and Sustainable Energy Reviews 109, 532–550 (2019).
