# Overhead cables manufacture ; 20 km of Outside

Dataset: ILCD process, Unit process, single operation
Geography: NMG-CN
Reference year: 2017
Classification: Systems / Construction
Functional unit: The functional unit is 1.5 MW wind turbine
LCI method principle: Attributional
LCI method approaches: Allocation
Generated by: Yunzhi Zhao, ll10088@163.com
Owner: Tiangong LCI Data Working Group
Review: Dependent internal review by Tiangong LCI Data Working Group
Amounts: no units in this file; such an amount is in the reference unit of its flow, which a separate flow dataset defines
copyright: false
licenseType: Free of charge for all users and uses

## General comment
The overhead cables, which are crucial components of a wind farm's electrical infrastructure, are designed for transmitting electricity generated by wind turbines over long distances with minimal power loss. They are specifically manufactured for use in wind farm projects like the one located in northeastern Inner Mongolia, featuring domestic 1.5 MW wind turbines. These cables support the transfer of clean energy, contributing to the reduction of the environmental impact of power generation.

## Geography
The data regarding the parameters of wind power has been collected from Wang (2012). A wind farm equipped with 33 domestic 1.5 megawatts (MW) wind turbines is regarded as a case study to analyze the environmental impact and its substitution effects. The wind farm is located in the northeast of Inner Mongolia, the province in which most of China’s wind power is installed (Xia and Song, 2017).

## Reference product
- Steel Wire,Cable: 20000; article inperiodical

## Inputs
- aluminium: 280000; article inperiodical

## Deviations from the LCI method approaches
The life cycle inventory for wind power is illustrated as follows. The production and manufacturing stage include the production of wind turbines, substations, and cables, which consume a large amount of energy and emit pollutants (Xue et al., 2015).

## Use advice
While using the LCA data for the overhead cable manufacturing process, ensure to consider the parameters specific to the wind farm case study provided by Wang (2012) and the additional context given by Xia and Song (2017). Users should account for the energy consumption and pollutant emissions during the production of cables, as reported by Xue et al. (2015), in their assessment of the environmental impact. The baseline functional unit for comparison is a 1.5 MW wind turbine. Any variations from this setup must be adjusted accordingly to maintain data integrity and applicability.

## Review details
Inventory: The internal review was done by several iteration steps concerning raw data validation, raw data documentation, representativity, completeness and consistency of modelling with regard to ISO 14040 and 14044.

## Data sources
- Li, H., Jiang, H.-D., Dong, K.-Y., Wei, Y.-M. & Liao, H. A comparative analysis of the life cycle environmental emissions from wind and coal power: Evidence from China. Journal of Cleaner Production 248, 119192 (2020).
