# Natural gas liquefaction; Coke oven gas ;Decarburization process

Dataset: ILCD process, Unit process, single operation
Geography: CN
Reference year: 2021
Classification: Unit processes / Energy carriers and technologies / Natural gas based fuels
LCI method principle: Attributional
LCI method approaches: Consequential
Generated by: Shikang Kang, 908798159@qq.com
Owner: Tiangong LCI Data Working Group
Review: Dependent internal review by Tiangong LCI Data Working Group
Amounts: no units in this file; such an amount is in the reference unit of its flow, which a separate flow dataset defines
copyright: false
licenseType: Free of charge for all users and uses

## General comment
Using coke oven gas (COG) to produce liquefied natural gas (LNG) is a promising choice to partially alleviate the shortage of natural gas supply and effectively utilize the by-products of coking production in China. In order to systematically evaluate the energy consumption and environmental impact of LNG process based on COG,

## Geography
A representative coking plant in China

## Time period
Publication time of literature

## Technology and included processes
This study involves four LNG production processes, as follows: 1) COG-based decarburization process for LNG production ("decarburization process"), 2) COG-based LNG production with hydrogen-free extraction methanation process ("methanation process"), 3) COG-based LNG extraction by methanation process and hydrogen extraction ("H for methanation process") 2), and 4) domestic NG direct liquefaction process ("domestic NG liquefaction")

## Technical purpose
The described technology pertains to the production of liquefied natural gas (LNG) from coke oven gas (COG), which is a useful approach for supplementing natural gas supply and utilizing by-products of coking processes in China. The technology can be incorporated in industrial applications where natural gas shortages are prevalent and in coking plants aiming to optimize the use of generated COG. The LNG production techniques mentioned include COG-based decarburization, hydrogen-free extraction methanation, methanation with hydrogen extraction, and domestic natural gas direct liquefaction processes.

## Reference product
- Hard coal, at consumer EU-27: 1330; input; log-normal; software or database
  Coal washing input

## Inputs
- Electricity: 234.864; log-normal; software or database
  Electricity input

## Outputs
- methane (fossil): 1000; log-normal; software or database
  The original text did not distinguish between Bio and Fossil. According to experts, this is Fossil. The output of coke.
- methane (fossil): 43; log-normal; software or database
  The original text did not distinguish between Bio and Fossil. According to experts, this is Fossil. The output of tar oil.

## Data selection and combination
This study is based on gear-based LNG production based on decarburization process, because the field data of a representative coking plant in China are sufficient.

## Data treatment and extrapolations
The functional unit is defined as 1 Nm3 to supply natural gas to users. The system scope consists of six life cycle stages: coal mining and processing, coal transportation, coking production, LNG production, LNG transportation and LNG evaporation

## Use advice
The study provides essential data on the energy and environmental impacts of various LNG production processes based on coke oven gas (COG). Users should take into account the comprehensive life cycle stages from coal mining to LNG evaporation in their assessments. The reference process in this study, which is the gear-based LNG production from decarburization, should be specifically considered when the field data from a representative coking plant in China is relevant. Additionally, the choice of the production process may affect the scope and results of the LCA, hence must be selected judiciously based on target application and geographical context.

## Review details
Inventory: The internal review was done by several iteration steps concerning raw data validation, raw data documentation, representativity, completeness and consistency of modelling with regard to ISO 14040 and 14044.

## Data sources
- Li, J. et al. Life cycle assessment of liquefied natural gas production from coke oven gas in China. Journal of Cleaner Production 329, 129609 (2021).
