# Pyrometallurgical recycling of waste power batteries to produce lithium nickel-cobalt-manganese oxide (LNCMO)

Dataset: ILCD process, Unit process, single operation
Geography: CN
Reference year: 2015
Classification: Unit processes / End-of-life treatment / Material recycling
Functional unit: 1 000 kg of lithium nickel cobalt manganese oxide (ternary material) as a functional unit.
Generated by: huzhikang, hzk2503593129@163.com
Owner: Tiangong LCI Data Working Group
Review: Dependent internal review by Tiangong LCI Data Working Group
Amounts: no units in this file; such an amount is in the reference unit of its flow, which a separate flow dataset defines
copyright: false
licenseType: Free of charge for all users and uses

## General comment
The method crushes waste batteries and then melts, blows, grinds and floats, melts and casts anodes, electrolyzes and refines, dissolves, precipitates, sintering, respectively.

## Technical purpose
Pyrometallurgical recycling of waste power batteries for the production of lithium nickel-cobalt-manganese oxide (LNCMO) is a process used to recover valuable metals from spent battery cells. The LNCMO produced is typically used as a cathode material in the manufacturing of new lithium-ion batteries for various applications such as electric vehicles, portable electronics, and energy storage systems.

## Reference product
- Ternary cathode material: 1000; measured
  Lithium nickel cobalt manganese oxide (ternary material)

## Inputs
All rows: measured
- Battery: 3330
  Waste Power Battery
- Sulfuric acid(98%): 3080
  H2SO4（98%）
- sodium hydroxide: 6230
  NaOH（30%）
- Sodium carbonate: 69.86
  Na2CO3
- Ammonia (28%): 373.35
- water,water: 30300
  Industrial water
- Lithium carbonate: 402.51
- brown coal; 11.9 MJ/kg: 3270.23
  Raw coal
- Electricity: 27507.4
- natural gas,natural gas: 465.79
  Natural Gas

## Outputs
All rows: measured
- Water,Water: 33270
  Waste water
- Ammonia Nitrogen: 0.26616
- nickel: 0.03327
  Ni
- carbon dioxide (fossil): 224
  Carbon dioxide (The original article did not distinguish between bio and fossil, but according to experts, this is fossil.)
- Other Solid Waste: 1658
  Residue and ash

## Data selection and combination
The data are derived from field research and calculation by the authors.

## Use advice
When utilizing this data set for Life Cycle Assessment, ensure that the recycling process stage is accurately modeled in the system boundary. Account for energy consumption and emissions associated with each step of the process: crushing, melting, blowing, grinding and floating, melting and casting anodes, electrolyzing and refining, dissolving, precipitating, and sintering. The functional unit of 1000 kg of LNCMO should be used as the basis for comparison when assessing the environmental impact. Methodological considerations such as allocation of impacts between recycled and virgin material should be thoroughly addressed.

## Review details
Inventory: The internal review was done by several iteration steps concerning raw data validation, raw data documentation, representativity, completeness and consistency of modelling with regard to ISO 14040 and 14044.

## Data sources
- 谢英豪, 余海军, 欧彦楠, & 李长东. 废旧动力电池回收的环境影响评价研究. 无机盐工业 47, 43-46+61 (2015).
