# transporting coal ; coal mining ; underground fully mechanized coal mining

Dataset: ILCD process, Unit process, single operation
Geography: ZZ-SD-CN
Reference year: 2022
Classification: Energy carriers and technologies / Hard coal based fuels
Generated by: Linlin Yin, yinlinlin0623@163.com
Owner: Tiangong LCI Data Working Group
Review: Dependent internal review by Tiangong LCI Data Working Group
Amounts: no units in this file; such an amount is in the reference unit of its flow, which a separate flow dataset defines
licenseType: Free of charge for all users and uses

## Geography
The Fifth-II mining area of the Jinda Coal Mine is located in Tengzhou City, Shandong Province, China . The average east–west width of the Fifth-II mining area is about 0.66 km, the average north–south length is about 2.9 km, and the total area is about 1.94 km^2.

## Technology and included processes
Scraper conveyor, band conveyor, loader conveyor, mining equipment train are uesd in this process.

## Reference product
- Hard coal, at consumer EU-27: 1000; uniform; estimated
  The process of coal transportation in 5 coal mining areas is used to mine 1 ton of coal.

## Outputs
- carbon dioxide (fossil): 1.5902e7; uniform; measured
  The amount of CO2 released by the coal transportation process in 5 coal mining areas.
- carbon dioxide (fossil): 11141.5; uniform; calculated
  The amount of CO2 released from 1 ton of coal mined by the coal transportation process in 5 coal mining areas.

## Data selection and combination
The B-R model is used to obtain the carbon emissions in the mining process of the mining area.

## Review details
Inventory: The internal review was done by several iteration steps concerning raw data validation, raw data documentation, representativity, completeness and consistency of modelling with regard to ISO 14040 and 14044.

## Data sources
- Li, B. et al. Research on a Carbon Emission Calculation Model and Method for an Underground Fully Mechanized Mining Process. Energies 15, 2871 (2022).
