# Cyanidation ; Gold clay or gold-bearing carbon ; Gold Concentrate ; Direct cyanation ; All sizes; NESPS2 / 氰化 ; 金泥或载金炭 ; 金精矿 ; 直接氰化 ; 所有规模 ; 全国第二次污染普查数据

Dataset: ILCD process, Unit process, single operation
Geography: CN
Reference year: 2019
Classification: Reference Parameters / Materials production / Metals and semimetals
Generated by: The data was created by the Office of the Second National Pollution Source Census of the Ministry of Ecology and Environment, and the data was organized by the TianGong Plan team for ILCD format / 生态环境部第二次全国污染源普查工作办公室创建数据，天工计划团队常慧敏整理数据为ILCD格式
Owner: Tiangong LCI Data Working Group / 天工LCI数据工作小组
Review: Dependent internal review by Tiangong LCI Data Working Group / 天工LCI数据工作小组
Amounts: no units in this file; such an amount is in the reference unit of its flow, which a separate flow dataset defines
copyright: false
licenseType: Free of charge for all users and uses

## General comment
the Technical of end-of-pipe management technology for pollution Waste wateris/

## Technical purpose
该工业数据集涉及所有生产规模的氰化金泥或载金炭金精矿的直接氰化提取金过程。它通常用于需要提取和加工金精矿的采矿工业中。所描述的尾端处理技术专门用于处理废水，并在排放前将化学需氧量、氨氮、氰化物、铅和砷等污染物降低到允许的水平。

## Reference product
- Gold concentrate: 1000; input; calculated
  源文件中描述为为金精矿，此处对其进行了匹配工作，将其匹配到LCAflow库里面相最符合的流，污染物指标备注为工业废水量

## Outputs
All rows: calculated
- cyanide: 0.0019
  the Technical of end-of-pipe management technology for pollution cyanideisElectrochemical + physical chemical treatment，Its Technical efficiency of end-of-pipe management99.5
  污染物指标氰化物的末端治理技术是电化学+物理化学，其效率为99.5，末端治理设施实际运行率（k值）计算公式为k=废水治理设施年正常运行时间（小时）/企业年正常生产时间（小时）。原文件中描述污染物类别为废水，污染物指标为氰化物，此处对其进行了匹配工作，将其匹配到LCAflow库里面相最符合的流，污染物指标备注为氰化物
- Ammonia Nitrogen: 0.003
  the Technical of end-of-pipe management technology for pollution Ammonia NitrogenisBiochemical method，Its Technical efficiency of end-of-pipe management90
  污染物指标氨氮的末端治理技术是生化法，其效率为90，末端治理设施实际运行率（k值）计算公式为k=废水治理设施年正常运行时间（小时）/企业年正常生产时间（小时）。原文件中描述污染物类别为废水，污染物指标为氨氮，此处对其进行了匹配工作，将其匹配到LCAflow库里面相最符合的流，污染物指标备注为氨氮
- arsenic: 9e-6
  the Technical of end-of-pipe management technology for pollution arsenicisElectrochemical + physical chemical treatment，Its Technical efficiency of end-of-pipe management90
  污染物指标砷的末端治理技术是电化学+物理化学，其效率为90，末端治理设施实际运行率（k值）计算公式为k=废水治理设施年正常运行时间（小时）/企业年正常生产时间（小时）。原文件中描述污染物类别为废水，污染物指标为砷，此处对其进行了匹配工作，将其匹配到LCAflow库里面相最符合的流，污染物指标备注为砷
- lead: 1.6e-5
  the Technical of end-of-pipe management technology for pollution leadisElectrochemical + physical chemical treatment，Its Technical efficiency of end-of-pipe management90
  污染物指标铅的末端治理技术是电化学+物理化学，其效率为90，末端治理设施实际运行率（k值）计算公式为k=废水治理设施年正常运行时间（小时）/企业年正常生产时间（小时）。原文件中描述污染物类别为废水，污染物指标为铅，此处对其进行了匹配工作，将其匹配到LCAflow库里面相最符合的流，污染物指标备注为铅
- chemical oxygen demand: 0.216
  the Technical of end-of-pipe management technology for pollution chemical oxygen demandisElectrochemical + physical chemical treatment + biochemical treatment，Its Technical efficiency of end-of-pipe management90
  污染物指标化学需氧量的末端治理技术是电化学+物理化学+生化法，其效率为90，末端治理设施实际运行率（k值）计算公式为k=废水治理设施年正常运行时间（小时）/企业年正常生产时间（小时）。原文件中描述污染物类别为废水，污染物指标为化学需氧量，此处对其进行了匹配工作，将其匹配到LCAflow库里面相最符合的流，污染物指标备注为化学需氧量
- Waste water: 6850
  the Technical of end-of-pipe management technology for pollution Waste wateris/
  污染物指标工业废水量的末端治理技术是/。原文件中描述污染物类别为废水，污染物指标为工业废水量，此处对其进行了匹配工作，将其匹配到LCAflow库里面相最符合的流，污染物指标备注为工业废水量

## Use advice
This dataset is derived from the Pollution Source Census Report and contains information on pollution emissions and related products. However, it does not include data on energy or chemical consumption, nor does it provide information on waste or co-product generation. When utilizing this dataset, please supplement the missing data based on actual conditions before use
该数据集来源于污染源普查报告，包含污染物排放及相关产品信息，但不包含能源或化学品消耗数据，也不提供废弃物或共生产物产生信息。在使用该数据集时，请根据实际情况补充缺失数据后再使用。

## Review details
Inventory: The internal review was done by several iteration steps concerning raw data validation, raw data documentation, representativity, completeness and consistency of modelling with regard to ISO 14040 and 14044.
清单： 内部审查通过几个迭代步骤完成，涉及原始数据验证、原始数据记录、代表性、完整性、与 ISO 14040 和 14044 有关的建模的一致性。

## Data sources
- 第二次全国污染源普查产排污核算系数手册（试用版）,四级代码3221文件，在完整版文件中第5074页
