# Aluminum hydroxide production ; Aluminum hydroxide ; Bauxite

Dataset: ILCD process, Unit process, single operation
Geography: CN
Reference year: 2019
Classification: Unit processes / Materials production / Inorganic chemicals
Generated by: Ruoxi Xiong, xiongrx0126@163.com
Owner: Tiangong LCI Data Working Group
Review: Dependent internal review by Tiangong LCI Data Working Group
Amounts: no units in this file; such an amount is in the reference unit of its flow, which a separate flow dataset defines
copyright: false
licenseType: Free of charge for all users and uses

## General comment
无流程图

## Time period
The year of publication

## Technical purpose
The aluminum hydroxide produced from this process is commonly used as a raw material in the manufacturing of aluminum metals, as a fire retardant, in water purification, as a feedstock for the production of other aluminum compounds, and as an abrasive in toothpaste.

## Reference product
- aluminium hydroxide: 1; missing unimportant

## Inputs
- transport, freight, lorry 16-32 metric ton, unregulated: 0.25; software or database
  Lorry, 30t
- electricity, high voltage, aluminium industry: 0.26388; software or database
- bauxite: 1.26; missing unimportant
- calcium carbonate: 0.06; software or database
- Sodium chloride, in ground: 0.04; software or database

## Use advice
When using this data set for Life Cycle Assessment, consider the geographical relevance and technological applicability. Ensure the production year aligns with the temporal scope of the assessment. Pay attention to the allocation methods if co-products exist in the process. If recycling is part of the lifecycle, include it according to the LCA's goal and scope definition.

## Review details
Inventory: The internal review was done by several iteration steps concerning raw data validation, raw data documentation, representativity, completeness and consistency of modelling with regard to ISO 14040 and 14044.

## Data sources
- Yin, R., Hu, S. & Yang, Y. Life cycle inventories of the commonly used materials for lithium-ion batteries in China. J. Clean. Prod. 227, 960–971 (2019).
