# Equipment and Materials Arriving on Site ; Lime ; Agricultural land remediation ; In-situ stabilization

Dataset: ILCD process, Unit process, single operation
Geography: HZ-GD-CN
Reference year: 2021
Classification: Unit processes / Other Services / Repair and maintenance
Functional unit: 800kg of lime is transported from the production site to the repair site.
Generated by: Yang Xintong, yangxt@caep.org.cn
Owner: Tiangong LCI Data Working Group
Review: Dependent internal review by Tiangong LCI Data Working Group
Amounts: no units in this file; such an amount is in the reference unit of its flow, which a separate flow dataset defines
copyright: false
licenseType: Free of charge for all users and uses

## General comment
The process of transporting repair reagents to the site.

## Geography
The study site is a paddy field contaminated by Cd, located inGongzhuang town, Huizhou city of the Pearl River Delta, Southern China.

## Technology and included processes
The lime transport distance data is calculated based on the production address of the reagent and remediation site.

## Technical purpose
The high-quality lime described in this dataset is intended for use in environmental remediation, specifically for in-situ stabilization of contaminated agricultural land. The primary application is the treatment of Cd-contaminated paddy fields, where it aids in neutralizing soil acidity and immobilizing heavy metals to prevent further environmental degradation and to improve soil health for agricultural productivity.

## Reference product
- Equipment and Materials Arriving on Site: 1; measured

## Inputs
- Lime,Lime: 800; measured
- transport in t*km: 136; measured

## Use advice
When utilizing this dataset, users must account for the specific transportation distances of lime from the production address to the remediation site. This is crucial for an accurate life cycle assessment in the context of environmental remediation. Users should also consider the methodological implications of material inputs and outputs, energy use, resource consumption, emissions, and carbon footprint associated with each stage of the process. Additionally, users should take into account local soil conditions and regulatory requirements for the application of lime in agricultural remediation processes.

## Review details
Inventory: The internal review was done by several iteration steps concerning raw data validation, raw data documentation, representativity, completeness and consistency of modelling with regard to ISO 14040 and 14044.

## Data sources
- Kai L ,Liping F ,Fangbai L , et al. Sustainability assessment and carbon budget of chemical stabilization based multi-objective remediation of Cd contaminated paddy field. The Science of the total environment, 2021, 819 152022-152022.
