# Soil In Situ Remediation ; Soil Bioventilation ; Treatment facilities

Dataset: ILCD process, Unit process, single operation
Geography: CA
Reference year: 2007
Classification: Unit processes / Other Services / Repair and maintenance
Generated by: Wang Ning, wang_ning@caep.org.cn
Owner: Tiangong LCI Data Working Group
Review: Dependent internal review by Tiangong LCI Data Working Group
Amounts: no units in this file; such an amount is in the reference unit of its flow, which a separate flow dataset defines
copyright: false
licenseType: Free of charge for all users and uses

## General comment
Construction of surface soil gas treatment facilities using latex, glass, HDPE, biofilters

## Geography
The contaminated area was located 600 m from a river shore in the northern part of the prov-ince of Quebec， Canada.

## Technology and included processes
Construction of surface treatment facilities using high-density polyethylene, latex, glass, etc.

## Technical purpose
The described industrial process relates to an environmental engineering application. It is specifically used for in situ soil remediation through bioventilation, aimed at treating contaminated soil without the necessity for excavation and transport. High-density polyethylene (HDPE), latex, glass, and biofilters are used in constructing gas treatment facilities needed for the bioventing process. This setup is particularly applicable for restoring ecological balance and preventing pollution dispersion. It is suitable for addressing soil contamination close to sensitive areas, such as river shores.

## Reference product
- Treatment facilities: 1; input; estimated
  建造好的地表土壤气处理设施

## Inputs
- polyethylene high density granulate (PE-HD): 19; estimated
  使用高密度聚乙烯建造地表土壤气处理设施
- Biofilter: 1015; estimated
  使用生物滤池建造地表土壤气处理设施
- Latex: 1.4; estimated
  使用乳胶建造地表土壤气处理设施
- glass wool: 108; estimated
  使用玻璃建造地表土壤气处理设施

## Use advice
When utilizing this dataset, users must consider site-specific conditions including proximity to water bodies, soil composition, and the type of contaminants being addressed. The data set's relevance is geographically and contextually specific to the described location in Quebec, Canada, and therefore may not be straightforwardly applicable to different regions with varying environmental conditions. Data users should also factor in the longevity and maintenance of the constructed treatment facilities and the potential need for their adaptation or upgrading with technological advancements.

## Review details
Inventory: The internal review was done by several iteration steps concerning raw data validation, raw data documentation, representativity, completeness and consistency of modelling with regard to ISO 14040 and 14044.

## Data sources
- Cadotte, M., Deschênes, L. & Samson, R. Selection of a remediation scenario for a diesel-contaminated site using LCA. Int J Life Cycle Assess 12, 239–251 (2007).
