# Remediated soil ; In-situ soil remediation ; Biopile ; Remediatied soi l Surface asphalt coverage ; In situ bioventing

Dataset: ILCD process, Unit process, black box
Geography: CA
Reference year: 2014
Classification: Unit processes / Other Services / Repair and maintenance
Functional unit: Defining the functional unit as “the treatment of 112 m3 of soil contaminated with diesel to an acceptable risk level over the short term” .
Generated by: Yang Xintong, yangxt@caep.org.cn
Owner: Tiangong LCI Data Working Group
Review: Dependent internal review by Tiangong LCI Data Working Group
Amounts: no units in this file; such an amount is in the reference unit of its flow, which a separate flow dataset defines
copyright: false
licenseType: Free of charge for all users and uses

## General comment
Consisted of paving the parking lot with asphalt (190 m2 ) to eliminate the exposure pathway between contaminants and residents. The machinery and material necessary for paving were shipped to Hopedale by barge from Goose Bay (Goose Bay, 800 km away). Both areas 1 and 2 were treated by bioventing. Installation of the in-situ treatment system included qualified staff travelling from Kingston and the material used in treatment. Aeration was provided by a windmill-powered pump. Air was humidified before being injected into the soil through perforated PVC pipes. A nutrient solution (ammonium nitrate and ammonium phosphate) was applied at the beginning of treatment. Monitoring consisted of a visit by qualified staff at the beginning and end of each warm season. At the end of the life cycle of the facility, the material was disposed of in the landfill.

## Geography
Soil contaminated with diesel fuel was identified in a residential/commercial area of Hopedale, NL, Canada.

## Time period
Publication time of literature

## Technical purpose
This dataset represents the process of in-situ remediation of soil contaminated with diesel fuel in a residential/commercial area of Hopedale, NL, Canada. The application involves capping a temporary storage site with asphalt to eliminate potential exposure routes between contaminants and residents. Bioventing is utilized to treat two specific areas by aerating contaminated soil with humidified air supplied by a windmill-powered pump through perforated PVC pipes, with nutrient solutions applied to promote biodegradation. This process is particularly intended for addressing contamination in a controlled site while limiting the potential for environmental exposure and is applicable in similar remediation projects.

## Reference product
- Remediated soil: 112; missing unimportant

## Inputs
All rows: missing unimportant
- Ammonium nitrate: 52.6
- Ammonium Phosphate: 13.6
- Transported asphalt: 22800
- Concrete: 4870
- Polyethylene,Polyethylene: 2
- polyvinylchloride resin (S-PVC): 33.6
- Steel: 17.9
- transport in t*km: 42
- Road Transport,Road Transport: 33600, 14000, 15 (3 entries)
- Diesel,Diesel: 0.125
  Operation backhoe, diesel
- Diesel,Diesel: 0.0416667
  Operation forklift, diesel
- contaminated soil: 112

## Use advice
Users of this dataset should note that the provided information on remediation process holds site-specific characteristics and may not be directly applicable to different environmental contexts without adjustment. Users need to consider local conditions, such as climate, soil type, and extent of contamination, when utilizing this data for similar remediation projects. The transport of materials and staff is not included in the system due to its site specificity; hence users should account for these aspects separately in their assessments. End-of-life management, like landfill disposal of materials, should also be factored into the overall environmental impact assessment.

## Review details
Inventory: The internal review was done by several iteration steps concerning raw data validation, raw data documentation, representativity, completeness and consistency of modelling with regard to ISO 14040 and 14044.

## Data sources
- Sanscartier D ,Margni M ,Reimer K , et al. Comparison of the Secondary Environmental Impacts of Three Remediation Alternatives for a Diesel-contaminated Site in Northern Canada [J]. Soil and Sediment Contamination: An International Journal, 2010, 19 (3): 338-355.
