# Pesticide Manufacturing ; IDA Method-Diethanolamine Reduction Bis-Glyphosate Process + Glyphosate Synthesis

Dataset: ILCD process, Unit process, black box
Geography: CN
Reference year: 2021
Classification: Materials production / Organic chemicals
Functional unit: producing 1 ton glyphosate
Generated by: Kailingli Liao, calinly@163.com
Owner: Tiangong LCI Data Working Group
Review: Dependent internal review by Tiangong LCI Data Working Group
Amounts: no units in this file; such an amount is in the reference unit of its flow, which a separate flow dataset defines
copyright: false
licenseType: Free of charge for all users and uses

## General comment
No flowchart

## Technical purpose
This dataset describes the production process of glyphosate using the IDA (Iminodiacetic Acid) method combined with diethanolamine reduction, also known as the bis-glyphosate process. Glyphosate synthesized through this specific pathway is commonly utilized as a broad-spectrum systemic herbicide to kill weeds and is widely applied in agriculture and gardening. The purity and properties of the glyphosate may cater to various market segments from consumer use in domestic gardens to industrial agricultural settings where large-scale weed control is required.

## Reference product
- glyphosate: 1000; software or database
  Product glyphosate glyphosate not found in flow_list

## Outputs
All rows: software or database
- Exhaust gas: 9830
  exhaust gas
- waste water - untreated: 8280
  Industrial waste
- chemical oxygen demand: 167
  Cod
- Ammonia Nitrogen: 0.71
  Ammonia nitrogen
- nitrogen, total (excluding N2): 12.4
  total nitrogen
- phosphorus, total: 52.2
  total phosphorus
- volatile organic compound: 103
  volatile organic compounds
- hazardous waste (unspecified): 36
  Hazardous Waste

## Use advice
Users of this Life Cycle Assessment data should be aware that the dataset primarily contains information on pollutant emissions for the production of 1 ton of glyphosate using the IDA process with diethanolamine reduction. It is crucial to note that the dataset does not include data on raw material inputs, energy consumption, water usage, or transportation, which might be significant for completing a comprehensive environmental impact assessment. Therefore, additional information should be sourced to comprehensively address these aspects. Users should consider these factors when applying this data to LCA models and ensure that any extrapolations or modeling assumptions regarding these missing data points are justified and documented.

## Review details
Inventory: The internal review was done by several iteration steps concerning raw data validation, raw data documentation, representativity, completeness and consistency of modelling with regard to ISO 14040 and 14044.

## Data sources
- 生态环境部. 263农药制造行业系数手册.pdf. (2021).
