# Insurance powder (even sodium dithionite) ; Sodium formate, sodium metabisulfite, sulfur dioxide ; Sodium neoformate method ; All sizes; NESPS2 / 保险粉（连二亚硫酸钠） ; 甲酸钠、焦亚硫酸钠、二氧化硫 ; 新甲酸钠法 ; 所有规模 ; 全国第二次污染普查数据

Dataset: ILCD process, Unit process, single operation
Geography: CN
Reference year: 2019
Classification: Reference Parameters / Materials production / Inorganic chemicals
Generated by: The data was created by the Office of the Second National Pollution Source Census of the Ministry of Ecology and Environment, and the data was organized by the TianGong Plan team for ILCD format / 生态环境部第二次全国污染源普查工作办公室创建数据，天工计划团队常慧敏整理数据为ILCD格式
Owner: Tiangong LCI Data Working Group / 天工LCI数据工作小组
Review: Dependent internal review by Tiangong LCI Data Working Group / 天工LCI数据工作小组
Amounts: no units in this file; such an amount is in the reference unit of its flow, which a separate flow dataset defines
copyright: false
licenseType: Free of charge for all users and uses

## General comment
the Technical of end-of-pipe management technology for pollution Exhaust gasis/，Its Technical efficiency of end-of-pipe management0

## Technical purpose
使用甲酸钠、焦亚硫酸钠和二氧化硫的新甲酸钠生产过程适用于各种规模的保险粉（连二亚硫酸钠）的生产。这种化学品通常用作纸张和纺织行业的漂白剂，以及某些清洁和剥离应用。

## Reference product
- Sodium hydrosulfite: 1000; calculated
  源文件中描述为为保险粉（连二亚硫酸钠），此处对其进行了匹配工作，将其匹配到LCAflow库里面相最符合的流，污染物指标备注为工业废水量

## Outputs
All rows: calculated
- Ammonia Nitrogen: 0.0008
  the Technical of end-of-pipe management technology for pollution Ammonia NitrogenisChemical treatment + physical treatment + A/O process，Its Technical efficiency of end-of-pipe management92
  污染物指标氨氮的末端治理技术是化学处理+物理处理+A/O工艺，其效率为92，末端治理设施实际运行率（k值）计算公式为k=治理设施运行时间（小时/年）/正常生产时间（小时/年）。原文件中描述污染物类别为废水，污染物指标为氨氮，此处对其进行了匹配工作，将其匹配到LCAflow库里面相最符合的流，污染物指标备注为氨氮
- Ammonia Nitrogen: 0.001
  the Technical of end-of-pipe management technology for pollution Ammonia NitrogenisChemical treatment + A/O process，Its Technical efficiency of end-of-pipe management90
  污染物指标氨氮的末端治理技术是化学处理+A/O工艺，其效率为90，末端治理设施实际运行率（k值）计算公式为k=治理设施运行时间（小时/年）/正常生产时间（小时/年）。原文件中描述污染物类别为废水，污染物指标为氨氮，此处对其进行了匹配工作，将其匹配到LCAflow库里面相最符合的流，污染物指标备注为氨氮
- volatile organic compound: 0.00186
  the Technical of end-of-pipe management technology for pollution volatile organic compoundisPhysical treatment + chemical treatment + thermal combustion，Its Technical efficiency of end-of-pipe management99.7
  污染物指标挥发性有机物的末端治理技术是物理处理法+化学处理法+热力燃烧，其效率为99.7，末端治理设施实际运行率（k值）计算公式为k=治理设施运行时间（小时/年）/正常生产时间（小时/年）。原文件中描述污染物类别为废气，污染物指标为挥发性有机物，此处对其进行了匹配工作，将其匹配到LCAflow库里面相最符合的流，污染物指标备注为挥发性有机物
- sulfur dioxide: 0.00225
  the Technical of end-of-pipe management technology for pollution sulfur dioxideisPhysical treatment + chemical treatment + thermal combustion，Its Technical efficiency of end-of-pipe management99.5
  污染物指标二氧化硫的末端治理技术是物理处理法+化学处理法+热力燃烧，其效率为99.5，末端治理设施实际运行率（k值）计算公式为k=治理设施运行时间（小时/年）/正常生产时间（小时/年）。原文件中描述污染物类别为废气，污染物指标为二氧化硫，此处对其进行了匹配工作，将其匹配到LCAflow库里面相最符合的流，污染物指标备注为二氧化硫
- chemical oxygen demand: 0.107
  the Technical of end-of-pipe management technology for pollution chemical oxygen demandisChemical treatment + physical treatment + A/O process，Its Technical efficiency of end-of-pipe management99
  污染物指标化学需氧量的末端治理技术是化学处理+物理处理+A/O工艺，其效率为99，末端治理设施实际运行率（k值）计算公式为k=治理设施运行时间（小时/年）/正常生产时间（小时/年）。原文件中描述污染物类别为废水，污染物指标为化学需氧量，此处对其进行了匹配工作，将其匹配到LCAflow库里面相最符合的流，污染物指标备注为化学需氧量
- chemical oxygen demand: 0.214
  the Technical of end-of-pipe management technology for pollution chemical oxygen demandisChemical treatment + A/O process，Its Technical efficiency of end-of-pipe management98
  污染物指标化学需氧量的末端治理技术是化学处理+A/O工艺，其效率为98，末端治理设施实际运行率（k值）计算公式为k=治理设施运行时间（小时/年）/正常生产时间（小时/年）。原文件中描述污染物类别为废水，污染物指标为化学需氧量，此处对其进行了匹配工作，将其匹配到LCAflow库里面相最符合的流，污染物指标备注为化学需氧量
- Waste water: 0.97
  the Technical of end-of-pipe management technology for pollution Waste wateris/，Its Technical efficiency of end-of-pipe management0
  污染物指标工业废水量的末端治理技术是/，其效率为0。原文件中描述污染物类别为废水，污染物指标为工业废水量，此处对其进行了匹配工作，将其匹配到LCAflow库里面相最符合的流，污染物指标备注为工业废水量
- Exhaust gas: 175
  the Technical of end-of-pipe management technology for pollution Exhaust gasis/，Its Technical efficiency of end-of-pipe management0
  污染物指标工业废气量的末端治理技术是/，其效率为0。原文件中描述污染物类别为废气，污染物指标为工业废气量，此处对其进行了匹配工作，将其匹配到LCAflow库里面相最符合的流，污染物指标备注为工业废气量

## Use advice
This dataset is derived from the Pollution Source Census Report and contains information on pollution emissions and related products. However, it does not include data on energy or chemical consumption, nor does it provide information on waste or co-product generation. When utilizing this dataset, please supplement the missing data based on actual conditions before use
该数据集来源于污染源普查报告，包含污染物排放及相关产品信息，但不包含能源或化学品消耗数据，也不提供废弃物或共生产物产生信息。在使用该数据集时，请根据实际情况补充缺失数据后再使用。

## Review details
Inventory: The internal review was done by several iteration steps concerning raw data validation, raw data documentation, representativity, completeness and consistency of modelling with regard to ISO 14040 and 14044.
清单： 内部审查通过几个迭代步骤完成，涉及原始数据验证、原始数据记录、代表性、完整性、与 ISO 14040 和 14044 有关的建模的一致性。

## Data sources
- 第二次全国污染源普查产排污核算系数手册（试用版）,二级代码26,四级代码2613文件，在完整版文件中第4111页
