# Alumina production ; Alumina for metallurgy ; Combined process ; Bauxite

Dataset: ILCD process, Unit process, single operation
Geography: CN
Reference year: 2022
Classification: Unit processes / Materials production / Non-energetic raw materials
Generated by: Ruoxi Xiong, xiongrx0126@163.com
Owner: Tiangong LCI Data Working Group
Review: Dependent internal review by Tiangong LCI Data Working Group
Amounts: no units in this file; such an amount is in the reference unit of its flow, which a separate flow dataset defines
copyright: false
licenseType: Free of charge for all users and uses

## General comment
The alumina produced through this industrial process is destined for metallurgical applications. It is particularly utilized in aluminum production as a raw material to produce primary aluminum via the electrolytic process. This high-grade alumina is suitable for the aluminum smelting industry and may be used in the manufacturing of various aluminum products including, but not limited to, construction materials, transportation components, packaging materials, and electrical conductors.

## Time period
Date of publication

## Reference product
- aluminium oxide, metallurgical: 1000; missing unimportant

## Inputs
All rows: missing unimportant
- electricity, high voltage, aluminium industry: 879.48, 1152 (2 entries)
- bauxite: 2456
- sodium hydroxide, without water, in 50% solution state: 281, 69 (2 entries)
  alkali
- lime: 154, 569 (2 entries)
- hard coal: 24.7, 485 (2 entries)
- Petroleum Coke: 44, 33.1 (2 entries)
- heavy fuel oil: 131, 83.9 (2 entries)

## Data selection and combination
According to the goal, scope, and system boundary definition, relevant specifications, standards, yearbooks, or other related materials are used to collect and summarize the input and output data of each stage of the life cycle.

## Use advice
When utilizing this dataset for Life Cycle Assessment of aluminum products, users should consider the specific type of alumina described, which is intended for metallurgical use. It is important to note the production method - the combined process based on bauxite - and integrate this information into the LCA model accurately. The dataset should be used carefully, ensuring that allocation methods are consistent with the defined system boundaries of the study. Any updates or changes in production technology or efficiency should be reflected in the data used.

## Review details
Inventory: The internal review was done by several iteration steps concerning raw data validation, raw data documentation, representativity, completeness and consistency of modelling with regard to ISO 14040 and 14044.

## Data sources
- Zhang, Y. et al. Life cycle assessment of pollutants and emission reduction strategies based on the energy structure of the nonferrous metal industry in China. ENERGY 261, (2022).
