# Roasting waste gas ; Sodium dichromate ; Chromite, soda ash, sulfuric acid ; Calcium free roasting ; All sizes; NESPS2 / 焙烧废气 ; 重铬酸钠 ; 铬铁矿、纯碱、硫酸 ; 无钙焙烧 ; 所有规模 ; 全国第二次污染普查数据

Dataset: ILCD process, Unit process, single operation
Geography: CN
Reference year: 2019
Classification: Reference Parameters / Energy carriers and technologies / Other non-renewable fuels
Generated by: The data was created by the Office of the Second National Pollution Source Census of the Ministry of Ecology and Environment, and the data was organized by the TianGong Plan team for ILCD format / 生态环境部第二次全国污染源普查工作办公室创建数据，天工计划团队常慧敏整理数据为ILCD格式
Owner: Tiangong LCI Data Working Group / 天工LCI数据工作小组
Review: Dependent internal review by Tiangong LCI Data Working Group / 天工LCI数据工作小组
Amounts: no units in this file; such an amount is in the reference unit of its flow, which a separate flow dataset defines
copyright: false
licenseType: Free of charge for all users and uses

## General comment
the Technical of end-of-pipe management technology for pollution Exhaust gasis/，Its Technical efficiency of end-of-pipe management0

## Technical purpose
该数据集代表了一种工业过程，该过程涉及使用纯碱和硫酸烧结铬铁矿生产重铬酸钠。该过程中指定的末端污染管理技术适用于处理产生的废气，可能包括使用重力除尘系统和电袋复合沉降器处理的颗粒物（PM2.5 - PM10）、通过直排处理的二氧化硫和使用选择性催化还原（SCR）技术处理的氮氧化物。该过程用于生产重铬酸钠，重铬酸钠通常用作生产颜料、木材防腐剂和化学工业中各种其他化学品的前体物质。

## Reference product
- Sodium dichromate: 1000; calculated
  源文件中描述为为重铬酸钠，此处对其进行了匹配工作，将其匹配到LCAflow库里面相最符合的流，污染物指标备注为工业废气量

## Outputs
- particles (PM2.5 - PM10): 0.54; calculated
  the Technical of end-of-pipe management technology for pollution particles (PM2.5 - PM10)isGravity dust removal + electric-bag composite precipitator，Its Technical efficiency of end-of-pipe management99.8
  污染物指标颗粒物的末端治理技术是重力+电袋组合，其效率为99.8，末端治理设施实际运行率（k值）计算公式为k=治理设施运行时间（小时/年）/正常生产时间（小时/年）。原文件中描述污染物类别为废气，污染物指标为颗粒物，此处对其进行了匹配工作，将其匹配到LCAflow库里面相最符合的流，污染物指标备注为颗粒物
- sulfur dioxide: 2.2; calculated
  the Technical of end-of-pipe management technology for pollution sulfur dioxideisDirect discharge，Its Technical efficiency of end-of-pipe management0
  污染物指标二氧化硫的末端治理技术是直排，其效率为0。原文件中描述污染物类别为废气，污染物指标为二氧化硫，此处对其进行了匹配工作，将其匹配到LCAflow库里面相最符合的流，污染物指标备注为二氧化硫
- Nitrogen oxides: 5.04; calculated
  the Technical of end-of-pipe management technology for pollution Nitrogen oxidesisSCR，Its Technical efficiency of end-of-pipe management80
  污染物指标氮氧化物的末端治理技术是选择性催化还原法，其效率为80，末端治理设施实际运行率（k值）计算公式为k=治理设施运行时间（小时/年）/正常生产时间（小时/年）。原文件中描述污染物类别为废气，污染物指标为氮氧化物，此处对其进行了匹配工作，将其匹配到LCAflow库里面相最符合的流，污染物指标备注为氮氧化物
- Exhaust gas: 23800; calculated
  the Technical of end-of-pipe management technology for pollution Exhaust gasis/，Its Technical efficiency of end-of-pipe management0
  污染物指标工业废气量的末端治理技术是/，其效率为0。原文件中描述污染物类别为废气，污染物指标为工业废气量，此处对其进行了匹配工作，将其匹配到LCAflow库里面相最符合的流，污染物指标备注为工业废气量

## Use advice
This dataset is derived from the Pollution Source Census Report and contains information on pollution emissions and related products. However, it does not include data on energy or chemical consumption, nor does it provide information on waste or co-product generation. When utilizing this dataset, please supplement the missing data based on actual conditions before use
该数据集来源于污染源普查报告，包含污染物排放及相关产品信息，但不包含能源或化学品消耗数据，也不提供废弃物或共生产物产生信息。在使用该数据集时，请根据实际情况补充缺失数据后再使用。

## Review details
Inventory: The internal review was done by several iteration steps concerning raw data validation, raw data documentation, representativity, completeness and consistency of modelling with regard to ISO 14040 and 14044.
清单： 内部审查通过几个迭代步骤完成，涉及原始数据验证、原始数据记录、代表性、完整性、与 ISO 14040 和 14044 有关的建模的一致性。

## Data sources
- 第二次全国污染源普查产排污核算系数手册（试用版）,二级代码26,四级代码2613文件，在完整版文件中第4111页
