# Bio-based ammonia production ; Ammonia ; Electrolysis-based route ; N2, H2

Dataset: ILCD process, Unit process, black box
Geography: CN
Classification: Energy carriers and technologies / Other non-renewable fuels
Functional unit: In this study, the functional unit is defined as 1 kg of H2 carrier produced from coal, natural gas, and renewables.
LCI method principle: Attributional
Generated by: Zirui Tang, tangzirui123@gmail.com
Owner: Tiangong LCI Data Working Group
Review: Dependent internal review by Tiangong LCI Data Working Group
Amounts: no units in this file; such an amount is in the reference unit of its flow, which a separate flow dataset defines
copyright: false
licenseType: Free of charge for all users and uses

## General comment
Electrolysis-based ammonia manufacture technology combines water electrolysis for hydrogen production and the Haber-Bosch process for ammonia synthesis.

## Geography
The study assumes that both methanol and ammonia production plants are located in northwest China, where coal, natural gas and solar energy resources are abundant.

## Technology and included processes
In this work, we select solar photovoltaic (PV) as the power source for splitting water to produce H2 and O2. Solar PV, which can directly convert solar radiation into electricity, is gradually regarded as a potential alternative to fossil fuels due to its own advantages.

## Technical purpose
The bio-based ammonia produced through the electrolysis-based route is intended for use as a hydrogen carrier and can be utilized for various applications including fertilizers, refrigeration, and industrial feedstocks. The process combines water electrolysis for hydrogen production and the Haber-Bosch process for ammonia synthesis, providing an alternative to traditional methods that rely on fossil fuels. As the production is situated in a region rich in coal, natural gas, and solar resources, it leverages local renewable energy (solar PV) for an environmentally friendly and sustainable production process.

## Reference product
- Ammonia: 1000; article inperiodical

## Inputs
All rows: article inperiodical
- electricity: 7200
- Hydrogen: 177
- nitrogen: 822.5
- Ferric oxide: 0.002
- sodium hydroxide: 0.002
- Potassium hydroxide: 0.002

## Data selection and combination
The relevant data are collected from the Bicer's research work (Bicer et al., 2017).

## Data treatment and extrapolations
For solar PV-based ammonia production route, Bicer et al.33 concluded that for an ideal Haber-Bosch process, combining 0.177 kg hydrogen with 0.823 kg nitrogen can produce 1 kg ammonia through analyzing electrolysis-based ammonia generation processes.

## Use advice
When utilizing the data set from Bicer et al. (2017) for life cycle assessment, ensure the methodological framework is appropriate for calculating the environmental impact of bio-based ammonia production. Include considerations for energy source mix (coal, natural gas, and renewables) and geographic conditions (northwest China) that could affect the process's environmental profile. Factor in the ideal gas ratios from the Haber-Bosch process (0.177 kg H₂ to 0.823 kg N₂ for 1 kg NH₃) for accurate inventory analysis. The functional unit for comparison should be 1 kg of H₂ carrier (ammonia), and users should account for potential environmental benefits of using renewable solar PV energy and the trade-offs associated with other energy sources in the region.

## Review details
Inventory: The internal review was done by several iteration steps concerning raw data validation, raw data documentation, representativity, completeness and consistency of modelling with regard to ISO 14040 and 14044.

## Data sources
- Zhu, R., Wang, Z., He, Y., Zhu, Y. & Cen, K. LCA comparison analysis for two types of H2 carriers: Methanol and ammonia. Int. J. Energy Res. 46, 11818–11833 (2022).
