# Thermal treatment of Ethylene-vinyl acetate copolymer;Ethylene-vinyl acetate copolymer（EVA）;Thermal treatment

Dataset: ILCD process, Unit process, single operation
Geography: CN
Classification: Unit processes / Energy carriers and technologies / Heat and steam
Generated by: Nan Wang, 1209824595@qq.com
Owner: Tiangong LCI Data Working Group
Review: Dependent internal review by Tiangong LCI Data Working Group
Amounts: no units in this file; such an amount is in the reference unit of its flow, which a separate flow dataset defines
copyright: false
licenseType: Free of charge for all users and uses

## General comment
Glass need to be remelted, EVA (Ethylene Vinyl Acetat) need thermal treatment, and aluminum need remetling and chemical treatment before they may substitute virgin materials in the module assembling process. Meanwhile, chemical treatment is necessary for silicon and silver before recycling in polysilicon production and multi-Si PV cell respectively.

## Technical purpose
Thermal treatment of Ethylene-vinyl acetate (EVA) refers to the process necessary for the preparation of EVA for use in multi-Si photovoltaic (PV) module assembly. Pre-treated EVA, along with remelted glass and chemically treated aluminum and silicon, is used as a substitute for virgin materials in manufacturing these modules. Additionally, pre-treated EVA is crucial in the recycling process of multi-Si PV cells to ensure the efficient recovery of materials and components.

## Reference product
- Ethylene-vinyl acetate copolymer,Ethylene-vinyl acetate copolymer,Ethylene-vinyl acetate copolymer: 15.4; input; min 10.1024; max 20.6976; uniform; software or database
  EVA

## Inputs
- nitrogen: 16.2; software or database
- Oxidant: 9.63; software or database
- Electricity: 10.8; software or database
  Unit kw

## Outputs
All rows: software or database
- Ethylene-vinyl acetate copolymer,Ethylene-vinyl acetate copolymer,Ethylene-vinyl acetate copolymer: 12.47
  EVA
- carbon dioxide: 2.71
- nitrogen dioxide: 18.26
- methane: 4.26
- ethene (ethylene): 2.59
- propene (propylene): 1.56

## Data selection and combination
The inventory data of the multi-Si PV modules are collectedfrom several sources: (1) Literatures including Fu (2013), whichcontain material inventory of several photovoltaic enterprises inJiangsu province; Diao and Shi (2011), which contain materialinventory of two photovoltaic enterprises in Beijing; He (2013),which contain material inventory of four photovoltaic enterprisesin Gansu and Sichuan province. (2) Environment Impact Assessment Statements (EIAS) of multi-Si PV production companies fromSichuan (EIAS-Sichuan, 2008), Henan (EIAS-Henan, 2009) andChongqing (EIAS-Chongqing, 2008). (3) Industry report of marketforesight and investment prospect for China’s photovoltaicdevelopment (2014) and Industrial report of market foresightand investment prospect for China’s polysilicon development(2014). The mean value is applied when there are different datasources for specific materials.

## Use advice
When using the LCA dataset for multi-Si PV modules, it is essential to average the values provided by the multiple data sources if discrepancies exist. Consider the data gathered from literature, environmental impact assessment statements, and industry reports. Ensure that the appropriate environmental impact assessments are chosen based on the geographic relevance of the product lifecycle under consideration. Remember to account for any methodological differences between sources and apply consistent system boundaries.

## Review details
Inventory: The internal review was done by several iteration steps concerning raw data validation, raw data documentation, representativity, completeness and consistency of modelling with regard to ISO 14040 and 14044.

## Data sources
- Huang, B. et al. Environmental influence assessment of China’s multi-crystalline silicon (multi-Si) photovoltaic modules considering recycling process. Solar Energy 143, 132–141 (2017).
