# Electricity production ; Thermal power ; Fujian

Dataset: ILCD process, Unit process, single operation
Geography: FJ-CN
Reference year: 2019
Classification: Unit processes / Energy carriers and technologies / Electricity
Generated by: Ruoxi Xiong, xiongrx0126@163.com
Owner: Tiangong LCI Data Working Group
Review: Dependent internal review by Tiangong LCI Data Working Group
Amounts: no units in this file; such an amount is in the reference unit of its flow, which a separate flow dataset defines
copyright: false
licenseType: Free of charge for all users and uses

## General comment
Thermal power generation includes seventeen fossil fuels such as raw coal, washed coal, oil and natural gas. The process only considers the direct power generation process, not the upstream raw material extraction and processing and the downstream power consumption

## Time period
Calculated based on data from the 2019 Energy Statistics Yearbook

## Technical purpose
This thermal power generation data set applies to electricity production facilities within Fujian province, specifically those utilizing fossil fuels such as raw coal, washed coal, oil, and natural gas for the generation of electric power. The data solely accounts for the direct generation of electricity and does not encompass upstream activities such as the extraction and processing of raw materials, nor the consumption of electricity downstream.

## Reference product
- electricity for thermal power: 3.6; calculated

## Inputs
All rows: calculated
- Raw coal: 0.372466
- Gangue, in ground: 0.00515459
- Coke oven gas: 0.002253
- blast furnace gas: 0.105789
- Converter gas: 0.004805
- Diesel: 1.09e-5
- Petroleum Coke: 7.63e-5
- refinery gas: 1.272e-5
- natural gas: 0.000845

## Outputs
- carbon dioxide (fossil): 0.791614; calculated
- sulfur dioxide: 0.000137503; calculated
- Nitrogen oxides: 0.000211146; calculated
- particles (> PM10): 2.87541e-5; calculated

## Data treatment and extrapolations
For the accounting method, please refer to the "Enterprise Greenhouse Gas Emissions Accounting Methods and Reporting Guidelines for Power Generation Facilities". Different forms of power generation and fuel consumption come from Chapter 3 (Energy Production) and Chapter 6 (Regional Energy Balance Sheet) in the "China Energy Statistical Yearbook 2020". The fuel parameters such as low calorific value and carbon content per unit calorific value used to calculate the carbon dioxide emission factor come from the "2019 China Regional Power Grid Carbon Dioxide Baseline Emission Factor Calculation Instructions OM" and the "Enterprise Greenhouse Gas Emission Accounting Method and Reporting Guide for Power Generation Facilities" 》

## Use advice
When using this data set for Life Cycle Assessment or other analytical purposes, ensure that the scope of your analysis aligns with the direct power generation process. Exclude considerations related to upstream raw material extraction and processing as well as downstream electricity consumption. Refer to the 'Enterprise Greenhouse Gas Emissions Accounting Methods and Reporting Guidelines for Power Generation Facilities' for methodological consistency. Use the detailed fuel consumption data from Chapter 3 and Chapter 6 of the 'China Energy Statistical Yearbook 2020' along with the fuel parameters from the '2019 China Regional Power Grid Carbon Dioxide Baseline Emission Factor Calculation Instructions OM' to calculate carbon dioxide emission factors accurately.

## Review details
Inventory: The internal review was done by several iteration steps concerning raw data validation, raw data documentation, representativity, completeness and consistency of modelling with regard to ISO 14040 and 14044.

## Data sources
- 熊若熙. 中国电力生产和消费二氧化碳与污染物排放因子核算. (清华大学, 2023).
