# Polymer Aluminum Electrolytic Capacitors (PAEC) Shipping ; Polymer Aluminum Electrolytic Capacitors (PAEC)

Dataset: ILCD process, Unit process, single operation
Geography: CN
Reference year: 2022
Classification: Unit processes / Systems / Electrics and electronics
Generated by: Yuzhen Feng, fyz22
Owner: Tiangong LCI Data Working Group
Review: Dependent internal review by Tiangong LCI Data Working Group
Amounts: no units in this file; such an amount is in the reference unit of its flow, which a separate flow dataset defines
copyright: false
licenseType: Free of charge for all users and uses

## General comment
接着49，待定，不知道什么是Total freight volume

## Time period
Literature published on 2022-11-15 in the literature The reference year of the elementary data (alumminum ingots, separator paper, tansport, electricity, and water) is around 2016 and qcruired from the Gabi database (Version: 10.6.1.35)

## Technical purpose
Polymer Aluminum Electrolytic Capacitors (PAEC) are electronic components used for energy storage, widely applied in consumer electronics, automotive power systems, aerospace technology, and various industrial electronics where high-grade capacitors are necessary. They are designed to offer stability and longevity in devices that require reliable and high-performance capacitors.

## Reference product
- capacitor, electrolyte type, > 2cm height: 1e6; measured

## Inputs
- transport, freight, lorry 16-32 metric ton, unregulated: 661.216; measured
- capacitor, electrolyte type, > 2cm height: 1e6; measured

## Data selection and combination
The material information and performance parameters of the three types of AECs are from the investigated manufacturer. Moreover, through the field research of several factories in the AEC industry, the original data on aluminum blank foil fabrication (made from aluminum ingots), anode/cathode foil fabrication (made from aluminum blank foil), and capacitor fabrication were obtained. Due to technical confidentiality, the LCI data of the fabrication of the cathode foil for PHAECs cannot be obtained directly from the supplier. Therefore, the manufacturing LCI of aluminum cathode foil in PHAECs is adjusted according to the coating process data of cathode foil of PAECs, considering their similarity. In the transportation stage, the data of the main raw materials from the material origin to the capacitor manufacturer and the data of the manufactured capacitor products from the manufacturer to the customers are from the supply chain system of the manufacturer. The energy consumption in the use stage is calculated based on the physical equations and the electrical parameters of the AECs. To ensure the completeness of the analysis, the data of the end-of-life stage is obtained based on the analysis and calculation.The reference year of the elementary data is around 2016. The elementary data (i.e., aluminum ingots, separator paper, transport, electricity, and water) are acquired from the Gabi database (Version: 10.6.1.35). In addition, some background data, including 3, 4-ethylene dioxythiophene (EDOT), ammonium adipate, ammonium citrate, etc., are not available in the Gabi database. They are estimated based on the chemical reactions with the material preparation process from the existing raw materials in the Gabi database. The data on the preparation process of the dispersive solution (PEDOT:PSS, 1%wt) for PHAECs' fabrication are scaled from the lab data. The detailed LCI data of the three types of AEC and unit impact of the substance flow is provided in Sheets 5–7 and Sheet 2 of Supporting Info B.

## Use advice
The provided LCA data set for PAEC shipping should be used with consideration of the reference year (around 2016) for the elementary data. Users should take into account the technological advancements and changes in emissions since 2016 when applying this data to current assessments. The confidential nature of certain fabrication data (PHAECs' cathode foil) means adjustments based on similar processes (coating data of PAECs' cathode foil) are necessary. This should be noted when assessing process impacts. For the transportation stage data, users should consider the geographic and logistical differences between the assessed transport routes and the data's origin. The differences between lab-scale and industrial-scale data should also be accounted for when scaling up the preparation process for the dispersive solution (PEDOT:PSS, 1%wt). It is essential that users validate the compatibility and technological applicability of the data with respect to their specific conditions and requirements.

## Review details
Inventory: The internal review was done by several iteration steps concerning raw data validation, raw data documentation, representativity, completeness and consistency of modelling with regard to ISO 14040 and 14044.

## Data sources
- Zhang, C., Zheng, Y., Jing, J., Liu, Y. & Huang, H. A comparative LCA study on aluminum electrolytic capacitors: From liquid-state electrolyte, solid-state polymer to their hybrid. J. Clean. Prod. 375, (2022).
