# Purified terephthalic acid ; Paraxylene, acetic acid, hydrogen ; Paraxylene oxidation and hydrogenation refining; NESPS2 / 精对苯二甲酸 ; 对二甲苯、醋酸、氢气 ; 对二甲苯氧化加氢精制 ; 小于100万吨/年 ; 全国第二次污染普查数据

Dataset: ILCD process, Unit process, single operation
Geography: CN
Reference year: 2019
Classification: Reference Parameters / Materials production / Organic chemicals
Generated by: The data was created by the Office of the Second National Pollution Source Census of the Ministry of Ecology and Environment, and the data was organized by the TianGong Plan team for ILCD format / 生态环境部第二次全国污染源普查工作办公室创建数据，天工计划团队常慧敏整理数据为ILCD格式
Owner: Tiangong LCI Data Working Group / 天工LCI数据工作小组
Review: Dependent internal review by Tiangong LCI Data Working Group / 天工LCI数据工作小组
Amounts: no units in this file; such an amount is in the reference unit of its flow, which a separate flow dataset defines
copyright: false
licenseType: Free of charge for all users and uses

## General comment
the Technical of end-of-pipe management technology for pollution Exhaust gasis/，Its Technical efficiency of end-of-pipe management0

## Technical purpose
该工艺用于生产纯度较高的对苯二甲酸（PTA），年产量小于100万吨。PTA是生产聚对苯二甲酸乙二醇酯（PET）的关键原料，PET用于生产各种塑料制品，如瓶子、包装材料和聚酯纤维。该过程包括使用醋酸和氢气对二甲苯进行氧化和加氢精制。

## Reference product
- Terephthalic acid: 1000; calculated
  源文件中描述为为精对苯二甲酸，此处对其进行了匹配工作，将其匹配到LCAflow库里面相最符合的流，污染物指标备注为工业废水量

## Outputs
All rows: calculated
- Petroleum-related waste: 4e-8
  the Technical of end-of-pipe management technology for pollution Petroleum-related wasteisPhysicochemical treatment，Its Technical efficiency of end-of-pipe management60
  污染物指标石油类的末端治理技术是物理化学处理法，其效率为60，末端治理设施实际运行率（k值）计算公式为k=设施年耗电量（千瓦时/(设备功率(千瓦)×年运行小时数(时))。原文件中描述污染物类别为废水，污染物指标为石油类，此处对其进行了匹配工作，将其匹配到LCAflow库里面相最符合的流，污染物指标备注为石油类
- particles (PM2.5 - PM10): 0.0013
  the Technical of end-of-pipe management technology for pollution particles (PM2.5 - PM10)isBag filter，Its Technical efficiency of end-of-pipe management95
  污染物指标颗粒物的末端治理技术是袋式除尘，其效率为95，末端治理设施实际运行率（k值）计算公式为k=设施年耗电量（千瓦时/(设备功率(千瓦)×年运行小时数(时))。原文件中描述污染物类别为废气，污染物指标为颗粒物，此处对其进行了匹配工作，将其匹配到LCAflow库里面相最符合的流，污染物指标备注为颗粒物
- particles (PM2.5 - PM10): 0.0013
  the Technical of end-of-pipe management technology for pollution particles (PM2.5 - PM10)isElectric-bag composite precipitator，Its Technical efficiency of end-of-pipe management95
  污染物指标颗粒物的末端治理技术是电袋组合，其效率为95，末端治理设施实际运行率（k值）计算公式为k=设施年耗电量（千瓦时/(设备功率(千瓦)×年运行小时数(时))。原文件中描述污染物类别为废气，污染物指标为颗粒物，此处对其进行了匹配工作，将其匹配到LCAflow库里面相最符合的流，污染物指标备注为颗粒物
- particles (PM2.5 - PM10): 0.0078
  the Technical of end-of-pipe management technology for pollution particles (PM2.5 - PM10)isSpray tower/water shock bath，Its Technical efficiency of end-of-pipe management70
  污染物指标颗粒物的末端治理技术是喷淋塔/冲击水浴，其效率为70，末端治理设施实际运行率（k值）计算公式为k=设施年耗电量（千瓦时/(设备功率(千瓦)×年运行小时数(时))。原文件中描述污染物类别为废气，污染物指标为颗粒物，此处对其进行了匹配工作，将其匹配到LCAflow库里面相最符合的流，污染物指标备注为颗粒物
- particles (PM2.5 - PM10): 0.0104
  the Technical of end-of-pipe management technology for pollution particles (PM2.5 - PM10)isVenturi，Its Technical efficiency of end-of-pipe management60
  污染物指标颗粒物的末端治理技术是文丘里，其效率为60，末端治理设施实际运行率（k值）计算公式为k=设施年耗电量（千瓦时/(设备功率(千瓦)×年运行小时数(时))。原文件中描述污染物类别为废气，污染物指标为颗粒物，此处对其进行了匹配工作，将其匹配到LCAflow库里面相最符合的流，污染物指标备注为颗粒物
- phosphorus, total: 1.35e-5
  the Technical of end-of-pipe management technology for pollution phosphorus, totalisPhysicochemical treatment + anaerobic biological treatment + activated sludge process，Its Technical efficiency of end-of-pipe management91
  污染物指标总磷的末端治理技术是物理化学法+厌氧生物处理法+活性污泥法，其效率为91，末端治理设施实际运行率（k值）计算公式为k=设施年耗电量（千瓦时/(设备功率(千瓦)×年运行小时数(时))。原文件中描述污染物类别为废水，污染物指标为总磷，此处对其进行了匹配工作，将其匹配到LCAflow库里面相最符合的流，污染物指标备注为总磷
- phosphorus, total: 1.35e-5
  the Technical of end-of-pipe management technology for pollution phosphorus, totalisPhysicochemical treatment + anaerobic biological treatment + biofilm process，Its Technical efficiency of end-of-pipe management91
  污染物指标总磷的末端治理技术是物理化学法+厌氧生物处理法+生物膜法，其效率为91，末端治理设施实际运行率（k值）计算公式为k=设施年耗电量（千瓦时/(设备功率(千瓦)×年运行小时数(时))。原文件中描述污染物类别为废水，污染物指标为总磷，此处对其进行了匹配工作，将其匹配到LCAflow库里面相最符合的流，污染物指标备注为总磷
- particles (PM2.5 - PM10): 0.0182
  the Technical of end-of-pipe management technology for pollution particles (PM2.5 - PM10)isMulti-tube cyclone dust removal，Its Technical efficiency of end-of-pipe management30
  污染物指标颗粒物的末端治理技术是多管旋风，其效率为30，末端治理设施实际运行率（k值）计算公式为k=设施年耗电量（千瓦时/(设备功率(千瓦)×年运行小时数(时))。原文件中描述污染物类别为废气，污染物指标为颗粒物，此处对其进行了匹配工作，将其匹配到LCAflow库里面相最符合的流，污染物指标备注为颗粒物
- phosphorus, total: 4.5e-5
  the Technical of end-of-pipe management technology for pollution phosphorus, totalisPhysicochemical treatment + activated sludge process，Its Technical efficiency of end-of-pipe management70
  污染物指标总磷的末端治理技术是物理化学法+活性污泥法，其效率为70，末端治理设施实际运行率（k值）计算公式为k=设施年耗电量（千瓦时/(设备功率(千瓦)×年运行小时数(时))。原文件中描述污染物类别为废水，污染物指标为总磷，此处对其进行了匹配工作，将其匹配到LCAflow库里面相最符合的流，污染物指标备注为总磷
- phosphorus, total: 4.5e-5
  the Technical of end-of-pipe management technology for pollution phosphorus, totalisPhysicochemical treatment + biofilm process，Its Technical efficiency of end-of-pipe management70
  污染物指标总磷的末端治理技术是物理化学法+生物膜法，其效率为70，末端治理设施实际运行率（k值）计算公式为k=设施年耗电量（千瓦时/(设备功率(千瓦)×年运行小时数(时))。原文件中描述污染物类别为废水，污染物指标为总磷，此处对其进行了匹配工作，将其匹配到LCAflow库里面相最符合的流，污染物指标备注为总磷
- phosphorus, total: 6e-5
  the Technical of end-of-pipe management technology for pollution phosphorus, totalisChemical treatment，Its Technical efficiency of end-of-pipe management60
  污染物指标总磷的末端治理技术是化学处理法，其效率为60，末端治理设施实际运行率（k值）计算公式为k=设施年耗电量（千瓦时/(设备功率(千瓦)×年运行小时数(时))。原文件中描述污染物类别为废水，污染物指标为总磷，此处对其进行了匹配工作，将其匹配到LCAflow库里面相最符合的流，污染物指标备注为总磷
- sulfur dioxide: 0.102
  the Technical of end-of-pipe management technology for pollution sulfur dioxideisDouble alkali process，Its Technical efficiency of end-of-pipe management80
  污染物指标二氧化硫的末端治理技术是双碱法，其效率为80，末端治理设施实际运行率（k值）计算公式为k=设施年耗电量（千瓦时/(设备功率(千瓦)×年运行小时数(时))。原文件中描述污染物类别为废气，污染物指标为二氧化硫，此处对其进行了匹配工作，将其匹配到LCAflow库里面相最符合的流，污染物指标备注为二氧化硫
- Nitrogen oxides: 0.1209
  the Technical of end-of-pipe management technology for pollution Nitrogen oxidesisSNCR，Its Technical efficiency of end-of-pipe management61
  污染物指标氮氧化物的末端治理技术是选择性非化还原法（SNCR），其效率为61，末端治理设施实际运行率（k值）计算公式为k=设施年耗电量（千瓦时/(设备功率(千瓦)×年运行小时数(时))。原文件中描述污染物类别为废气，污染物指标为氮氧化物，此处对其进行了匹配工作，将其匹配到LCAflow库里面相最符合的流，污染物指标备注为氮氧化物
- Nitrogen oxides: 0.124
  the Technical of end-of-pipe management technology for pollution Nitrogen oxidesisSCR，Its Technical efficiency of end-of-pipe management60
  污染物指标氮氧化物的末端治理技术是选择性化还原法（SCR），其效率为60，末端治理设施实际运行率（k值）计算公式为k=设施年耗电量（千瓦时/(设备功率(千瓦)×年运行小时数(时))。原文件中描述污染物类别为废气，污染物指标为氮氧化物，此处对其进行了匹配工作，将其匹配到LCAflow库里面相最符合的流，污染物指标备注为氮氧化物
- sulfur dioxide: 0.153
  the Technical of end-of-pipe management technology for pollution sulfur dioxideisCalcium spray in furnace，Its Technical efficiency of end-of-pipe management70
  污染物指标二氧化硫的末端治理技术是炉内喷钙，其效率为70，末端治理设施实际运行率（k值）计算公式为k=设施年耗电量（千瓦时/(设备功率(千瓦)×年运行小时数(时))。原文件中描述污染物类别为废气，污染物指标为二氧化硫，此处对其进行了匹配工作，将其匹配到LCAflow库里面相最符合的流，污染物指标备注为二氧化硫
- Nitrogen oxides: 0.155
  the Technical of end-of-pipe management technology for pollution Nitrogen oxidesisOxidation/absorption method，Its Technical efficiency of end-of-pipe management50
  污染物指标氮氧化物的末端治理技术是氧化/吸收法，其效率为50，末端治理设施实际运行率（k值）计算公式为k=设施年耗电量（千瓦时/(设备功率(千瓦)×年运行小时数(时))。原文件中描述污染物类别为废气，污染物指标为氮氧化物，此处对其进行了匹配工作，将其匹配到LCAflow库里面相最符合的流，污染物指标备注为氮氧化物
- Nitrogen oxides: 0.186
  the Technical of end-of-pipe management technology for pollution Nitrogen oxidesisLow NOx combustion method，Its Technical efficiency of end-of-pipe management40
  污染物指标氮氧化物的末端治理技术是低氮燃烧法，其效率为40，末端治理设施实际运行率（k值）计算公式为k=设施年耗电量（千瓦时/(设备功率(千瓦)×年运行小时数(时))。原文件中描述污染物类别为废气，污染物指标为氮氧化物，此处对其进行了匹配工作，将其匹配到LCAflow库里面相最符合的流，污染物指标备注为氮氧化物
- Nitrogen oxides: 0.217
  the Technical of end-of-pipe management technology for pollution Nitrogen oxidesisActivated carbon (coke) method，Its Technical efficiency of end-of-pipe management30
  污染物指标氮氧化物的末端治理技术是活性炭（焦）法，其效率为30，末端治理设施实际运行率（k值）计算公式为k=设施年耗电量（千瓦时/(设备功率(千瓦)×年运行小时数(时))。原文件中描述污染物类别为废气，污染物指标为氮氧化物，此处对其进行了匹配工作，将其匹配到LCAflow库里面相最符合的流，污染物指标备注为氮氧化物
- volatile organic compound: 0.8
  the Technical of end-of-pipe management technology for pollution volatile organic compoundisAdsorption + steam desorption，Its Technical efficiency of end-of-pipe management50
  污染物指标挥发性有机物的末端治理技术是吸附+蒸气解析，其效率为50，末端治理设施实际运行率（k值）计算公式为k=设施年耗电量（千瓦时/(设备功率(千瓦)×年运行小时数(时))。原文件中描述污染物类别为废气，污染物指标为挥发性有机物，此处对其进行了匹配工作，将其匹配到LCAflow库里面相最符合的流，污染物指标备注为挥发性有机物
- volatile organic compound: 0.8
  the Technical of end-of-pipe management technology for pollution volatile organic compoundisRegenerative catalytic combustion method，Its Technical efficiency of end-of-pipe management50
  污染物指标挥发性有机物的末端治理技术是蓄热式化燃烧法，其效率为50，末端治理设施实际运行率（k值）计算公式为k=设施年耗电量（千瓦时/(设备功率(千瓦)×年运行小时数(时))。原文件中描述污染物类别为废气，污染物指标为挥发性有机物，此处对其进行了匹配工作，将其匹配到LCAflow库里面相最符合的流，污染物指标备注为挥发性有机物
- volatile organic compound: 0.8
  the treatment technology for the pollution of volatile organic compounddidn't offered，Its Technical efficiency of end-of-pipe management50
  污染物指标挥发性有机物的末端治理技术是化燃烧法，其效率为50，末端治理设施实际运行率（k值）计算公式为k=设施年耗电量（千瓦时/(设备功率(千瓦)×年运行小时数(时))。原文件中描述污染物类别为废气，污染物指标为挥发性有机物，此处对其进行了匹配工作，将其匹配到LCAflow库里面相最符合的流，污染物指标备注为挥发性有机物
- volatile organic compound: 0.96
  the Technical of end-of-pipe management technology for pollution volatile organic compoundisDirect combustion，Its Technical efficiency of end-of-pipe management40
  污染物指标挥发性有机物的末端治理技术是直接燃烧法，其效率为40，末端治理设施实际运行率（k值）计算公式为k=设施年耗电量（千瓦时/(设备功率(千瓦)×年运行小时数(时))。原文件中描述污染物类别为废气，污染物指标为挥发性有机物，此处对其进行了匹配工作，将其匹配到LCAflow库里面相最符合的流，污染物指标备注为挥发性有机物
- Nitrogen, organic bound: 0.001008
  the Technical of end-of-pipe management technology for pollution Nitrogen, organic boundisPhysicochemical treatment + anaerobic biological treatment + biofilm process，Its Technical efficiency of end-of-pipe management91
  污染物指标总氮的末端治理技术是物理化学法+厌氧生物处理法+生物膜法，其效率为91，末端治理设施实际运行率（k值）计算公式为k=设施年耗电量（千瓦时/(设备功率(千瓦)×年运行小时数(时))。原文件中描述污染物类别为废水，污染物指标为总氮，此处对其进行了匹配工作，将其匹配到LCAflow库里面相最符合的流，污染物指标备注为总氮
- Ammonia Nitrogen: 0.001115
  the Technical of end-of-pipe management technology for pollution Ammonia NitrogenisPhysicochemical treatment + anaerobic biological treatment + activated sludge process，Its Technical efficiency of end-of-pipe management75
  污染物指标氨氮的末端治理技术是物理化学法+厌氧生物处理法+活性污泥法，其效率为75，末端治理设施实际运行率（k值）计算公式为k=设施年耗电量（千瓦时/(设备功率(千瓦)×年运行小时数(时))。原文件中描述污染物类别为废水，污染物指标为氨氮，此处对其进行了匹配工作，将其匹配到LCAflow库里面相最符合的流，污染物指标备注为氨氮
- Nitrogen, organic bound: 0.00112
  the Technical of end-of-pipe management technology for pollution Nitrogen, organic boundisPhysicochemical treatment + activated sludge process，Its Technical efficiency of end-of-pipe management90
  污染物指标总氮的末端治理技术是物理化学法+活性污泥法，其效率为90，末端治理设施实际运行率（k值）计算公式为k=设施年耗电量（千瓦时/(设备功率(千瓦)×年运行小时数(时))。原文件中描述污染物类别为废水，污染物指标为总氮，此处对其进行了匹配工作，将其匹配到LCAflow库里面相最符合的流，污染物指标备注为总氮
- Nitrogen, organic bound: 0.00112
  the Technical of end-of-pipe management technology for pollution Nitrogen, organic boundisPhysicochemical treatment + biofilm process，Its Technical efficiency of end-of-pipe management90
  污染物指标总氮的末端治理技术是物理化学法+生物膜法，其效率为90，末端治理设施实际运行率（k值）计算公式为k=设施年耗电量（千瓦时/(设备功率(千瓦)×年运行小时数(时))。原文件中描述污染物类别为废水，污染物指标为总氮，此处对其进行了匹配工作，将其匹配到LCAflow库里面相最符合的流，污染物指标备注为总氮
- volatile organic compound: 1.28
  the Technical of end-of-pipe management technology for pollution volatile organic compoundisPhotocatalyst，Its Technical efficiency of end-of-pipe management20
  污染物指标挥发性有机物的末端治理技术是光化，其效率为20，末端治理设施实际运行率（k值）计算公式为k=设施年耗电量（千瓦时/(设备功率(千瓦)×年运行小时数(时))。原文件中描述污染物类别为废气，污染物指标为挥发性有机物，此处对其进行了匹配工作，将其匹配到LCAflow库里面相最符合的流，污染物指标备注为挥发性有机物
- Nitrogen, organic bound: 0.001344
  the Technical of end-of-pipe management technology for pollution Nitrogen, organic boundisPhysicochemical treatment + anaerobic biological treatment + activated sludge process，Its Technical efficiency of end-of-pipe management88
  污染物指标总氮的末端治理技术是物理化学法+厌氧生物处理法+活性污泥法，其效率为88，末端治理设施实际运行率（k值）计算公式为k=设施年耗电量（千瓦时/(设备功率(千瓦)×年运行小时数(时))。原文件中描述污染物类别为废水，污染物指标为总氮，此处对其进行了匹配工作，将其匹配到LCAflow库里面相最符合的流，污染物指标备注为总氮
- Waste water: 2560
  the Technical of end-of-pipe management technology for pollution Waste wateris/，Its Technical efficiency of end-of-pipe management0
  污染物指标工业废水量的末端治理技术是/，其效率为0。原文件中描述污染物类别为废水，污染物指标为工业废水量，此处对其进行了匹配工作，将其匹配到LCAflow库里面相最符合的流，污染物指标备注为工业废水量
- chemical oxygen demand: 0.0127
  the Technical of end-of-pipe management technology for pollution chemical oxygen demandisPhysicochemical treatment + anaerobic biological treatment + activated sludge process，Its Technical efficiency of end-of-pipe management90
  污染物指标化学需氧量的末端治理技术是物理化学法+厌氧生物处理法+活性污泥法，其效率为90，末端治理设施实际运行率（k值）计算公式为k=设施年耗电量（千瓦时/(设备功率(千瓦)×年运行小时数(时))。原文件中描述污染物类别为废水，污染物指标为化学需氧量，此处对其进行了匹配工作，将其匹配到LCAflow库里面相最符合的流，污染物指标备注为化学需氧量
- Exhaust gas: 3000
  the Technical of end-of-pipe management technology for pollution Exhaust gasis/，Its Technical efficiency of end-of-pipe management0
  污染物指标工业废气量的末端治理技术是/，其效率为0。原文件中描述污染物类别为废气，污染物指标为工业废气量，此处对其进行了匹配工作，将其匹配到LCAflow库里面相最符合的流，污染物指标备注为工业废气量

## Use advice
This dataset is derived from the Pollution Source Census Report and contains information on pollution emissions and related products. However, it does not include data on energy or chemical consumption, nor does it provide information on waste or co-product generation. When utilizing this dataset, please supplement the missing data based on actual conditions before use
该数据集来源于污染源普查报告，包含污染物排放及相关产品信息，但不包含能源或化学品消耗数据，也不提供废弃物或共生产物产生信息。在使用该数据集时，请根据实际情况补充缺失数据后再使用。

## Review details
Inventory: The internal review was done by several iteration steps concerning raw data validation, raw data documentation, representativity, completeness and consistency of modelling with regard to ISO 14040 and 14044.
清单： 内部审查通过几个迭代步骤完成，涉及原始数据验证、原始数据记录、代表性、完整性、与 ISO 14040 和 14044 有关的建模的一致性。

## Data sources
- 第二次全国污染源普查产排污核算系数手册（试用版）,二级代码26,四级代码2653文件，在完整版文件中第4111页
