# recycling NCM battery by hydrometallurgy

Dataset: ILCD process, Unit process, single operation
Geography: CN
Reference year: 2022
Classification: Unit processes / End-of-life treatment / Material recycling
Functional unit: retired NCM battery of 48V,12Ah
Generated by: Chen, Lipeng, lpchen07@163.com
Owner: Tiangong LCI Data Working Group
Review: Dependent internal review by Tiangong LCI Data Working Group
Amounts: no units in this file; such an amount is in the reference unit of its flow, which a separate flow dataset defines
copyright: false
licenseType: Free of charge for all users and uses

## General comment
Spent lithium nickel cobalt manganese oxide (NCM) batteries were managed through hydrometallurgy to recover the precursor materials.

## Technical purpose
The hydrometallurgical recycling process is used to manage spent lithium nickel cobalt manganese oxide (NCM) batteries. It is intended for recovering valuable precursor materials for use in producing new battery cells or other related applications requiring such materials.

## Reference product
- EoL NCM battery: 1; input; measured
  NCM battery, 4×12V, 12Ah

## Inputs
All rows: measured
- Sulfuric acid(98%): 4.614
- Hydrochloric acid (32%): 0.168
- Sodium Hydroxide solution（1mol/L）: 0.4428
- Liquid ammonia: 0.471
- 2-ethylhexyl hydrogen -2-ethylhexylphosphonate: 0.0204
- Kerosene: 0.0204
- Hydrogen peroxide (27.5%): 5.586
- water,water: 58.8
- Lithium carbonate: 0.5076
- silicon: 0.0126
- sodium chloride: 0.0003
- magnesium chloride: 0.00054
- potassium chloride: 0.00024
- carbon: 0.0012
- Light gas oil: 0.0078
- Electricity: 29.16
- Natural gas, at consumer EU-27: 0.5874
- Heavy oil: 0.0096

## Outputs
All rows: measured
- aluminium: 0.21
- copper: 0.1944
- Graphite: 0.726
- polypropylene granulate (PP): 0.1188
- carbon monoxide (fossil): 0.0002826
- Total particulate matter: 6e-6
- nitrous oxide: 9e-6
- nickel: 1.68e-5
- hazardous waste (unspecified): 0.03138
- Cathode Material: 0.3462
  Lithium nickel cobalt manganese

## Use advice
When using this data, consider the specific composition and purity of the recovered materials, as this may vary based on the recycling process. The data set is applicable only for the recycling of 48V, 12Ah NCM batteries using hydrometallurgy. It is important to ensure that assumptions made about energy consumption and recovery efficiencies are consistent with the specific methodologies used. Users should also consider the geographic relevance of the data and its alignment with local recycling regulations and practices.

## Review details
Inventory: The internal review was done by several iteration steps concerning raw data validation, raw data documentation, representativity, completeness and consistency of modelling with regard to ISO 14040 and 14044.

## Data sources
- Liu, M. et al. Life cycle environmental and economic assessment of electric bicycles with different batteries in China. Journal of Cleaner Production 385, 135715 (2023).
