# Livestock and poultry breeding ; feed crop planting stage ; beef cattle breeding area

Dataset: ILCD process, Unit process, single operation
Geography: CN
Reference year: 2014
Classification: Unit processes / Materials production / Agricultural production means
Functional unit: 1kg beef
Generated by: Rui Yang, 1632707028@qq.com
Owner: Tiangong LCI Data Working Group
Review: Dependent internal review by Tiangong LCI Data Working Group
Amounts: no units in this file; such an amount is in the reference unit of its flow, which a separate flow dataset defines
copyright: false
licenseType: Free of charge for all users and uses

## General comment
The feed described in this paper is mainly energy feed, including: corn, wheat, soybean, sorghum, rice. In fact, in the process of livestock breeding, livestock feed is mainly composed of corn, wheat and soybeans. Feed crop planting stage mainly includes fertilizer production stage, corn, soybean, wheat planting stage.

## Geography
This study was conducted from 2014 to 2015, aiming at livestock and poultry feeding cycle, meat ratio, feed formula, feed consumption, coal and electricity consumption, etc. Has been to Shandong Gaomi Zhengda pig farm, Laixi City Zhishuang dairy farm, Jimo city Duan Bolan town Jiangjiapo village pig farm, Jimo City Liujiazhuang town livestock farm, Rizhao City Changling town Guanzhuang village, Juxian County Zhailihe town Dongxing Agriculture and animal husbandry company, Juxian Qiaoshan town east Chen dairy farm, Juxian Qiaoshan town Liu Jiayi water pig farm, Zhucheng Foreign Trade Co., LTD. Phoenix parents breeding duck farm, Xinjiang Fukang Hongfa Breeding professional cooperative, Jiuyun Street Town Xuhong laying Chicken cooperative, Jiuyun Street Town Liuyun Village self-contained breeding farm, China Australia Holding Group Co., LTD., Dezhou City Qingyun County Wayu Village, Shandong Province Qingyun County four Liu community beef cattle breeding base, Dezhou City Qingyun Qingnian chicken breeding base, Qingyun County Yongli Poultry layer breeding company, Qingyun County Xingchen youth chicken breeding Field research was carried out by professional breeding cooperatives, Qingyun Dongtai broiler breeding cooperatives, Hebei Yanshan Boyuan Feed Co., LTD., Yanshan Da Chinese Feed Co., LTD., Wudi Liuhe Feed Co., LTD., and China-Australia Oriental Hope Feed Co., LTD.

## Technology and included processes
In this paper, the life cycle of livestock and poultry farming is divided into six stages: feed crop planting, feed processing, livestock and poultry raising, manure treatment, slaughter and transportation. The specific life cycle process of livestock and poultry breeding is shown in Figure 2-1. Due to the lack of some data and the limitations of basic conditions, the production, transportation and use of pesticides, mulch and feed additives have not been analyzed, and the environmental impact caused by other related infrastructure construction, transport production and labor costs is no longer considered.

## Technical purpose
The documented process relates to the lifecycle stages of livestock and poultry breeding, with a specific focus on beef cattle. The energy feeds used primarily consist of maize, wheat, soybeans, sorghum, and rice, which are integral components of the feed formula during the livestock breeding cycle. These crops are cultivated during the feed crop planting stage, which includes the production of fertilizers and the growing of maize, soybeans, and wheat. This data is applicable to agricultural production systems and livestock and poultry breeding operations. It also pertains to the environmental assessment of input materials and resources, such as feed consumption and the use of coal and electricity during the breeding cycle.

## Reference product
- beef: 1; measured
  作为参考定量，非实际输出

## Inputs
- Fertilizer: 0.130717; calculated
- hard coal: 0.00566327; calculated

## Outputs
All rows: measured
- nitrous oxide: 0.0052621
  Beef cattle breeding community
- nitrogen, total (excluding N2): 0.0104152
  Beef cattle breeding community
- Nitrogen trioxide: 0.0066483
  Beef cattle breeding community
- ammonia: 0.014806
  Beef cattle breeding community
- hydrocarbons (unspecified): 6.99e-5
  Beef cattle breeding community
- carbon monoxide (fossil): 0.0005184
  Beef cattle breeding community
- sulfur dioxide: 0.0006285
  Beef cattle breeding community
- carbon dioxide (fossil),carbon dioxide (fossil): 1.25289
  Beef cattle breeding community

## Use advice
This dataset should be deployed for lifecycle assessments of livestock breeding processes, specifically for determining the environmental impact of beef cattle production. Users must take into account the regional and temporal relevance of the data, as it pertains to the specific geographical and climatic conditions of the studied locations in China, and the study was carried over 2014-2015. Methodological attention should be given to the allocation of inputs, such as feed ingredients and energy consumption, to the correct stages of livestock production, including the growth and maintenance of the animals. It is essential to ensure that the data used for comparisons or further modeling is relevant and up-to-date. Furthermore, attention should be paid to factors influencing the feed conversion ratio, as these may significantly affect the environmental outcomes of the assessment.

## Review details
Inventory: The internal review was done by several iteration steps concerning raw data validation, raw data documentation, representativity, completeness and consistency of modelling with regard to ISO 14040 and 14044.

## Data sources
- 周景月. 基于生命周期评价的畜禽养殖环境影响分析. (青岛科技大学, 2017).
