# Contaminated Cd agricultural soil remediation;Phytoremediation;Sedum plumbizincicola;The growth management of remedial plants;Plant dry weight

Dataset: ILCD process, Unit process, black box
Geography: CN
Reference year: 2021
Classification: Unit processes / Other Services / Repair and maintenance
Generated by: Sang Chunhui, sangch@mail.bnu.edu.cn
Owner: Tiangong LCI Data Working Group
Review: Dependent internal review by Tiangong LCI Data Working Group
Amounts: no units in this file; such an amount is in the reference unit of its flow, which a separate flow dataset defines
copyright: false
licenseType: Free of charge for all users and uses

## General comment
Using organic and compound fertilizers to promote the growth of Sedum plumbizincicola, while also accompanied by Jingtian's absorption of cadmium in the soil.

## Geography
Instead of clarifying specific locations, the paper indicated that contaminated agricultural field was located in Southern China.

## Time period
There is no clear start time for data collection in the literature, and the start time of the validity period is based on the publication time of the literature

## Technology and included processes
The yield of remedial plants: 22.5 t/ha.yr ，which have 10% dry matter.

## Technical purpose
The given industrial process describes the use of phytoremediation for the remediation of cadmium (Cd) contaminated agricultural soil using the plant Sedum plumbizincicola. This approach is intended for application in soil remediation to reduce the concentration of cadmium in tainted farmlands, particularly in Southern China. The plant is cultivated using organic and compound fertilizers, which enhances its growth and facilitates the absorption of cadmium from the soil.

## Reference product
- Plant dry weight: 11250
  该处实际填写的是植物的植株干重，即从移栽到污染土壤的幼苗，经过5年的种植后，收获后得到的植物

## Inputs
- Organic fertilizer: 22500
- Compound Fertilizer,Compound Fertilizer: 1200
- trifluralin: 11.03
- fluazifop-p-butyl: 8.22
- Haloxyfop-P-methyl: 6.774
- Phoxim: 360
- cypermethrin: 7.44

## Outputs
- arsenic: 0.12
- Cadmium: 0.02
- trifluralin: 2.206
- fluazifop-p-butyl: 1.8084
- Haloxyfop-P-methyl: 1.0161
- Phoxim: 54
- cypermethrin: 0.8928

## Data selection and combination
Process inventory data were obtained in accordance with ISO 14040 on LCA.35 Primary data were obtained from site-specific pot experiments, pilot studies, and vendors, which were representative of situations in Southern China. Secondary data were obtained from the Ecoinvent database v2.3, from which processes of the most similar geographic origin and technological factors are selected.

## Use advice
Users of this dataset are advised to consider the geospatial relevance and timeline as primary data reflects the specific conditions of Southern China without a precise location. Secondary data are obtained from the Ecoinvent database that must be chosen based on the closest geographic and technological similarity. Users should ensure that this LCA data is used in the context of similar climatic and soil conditions for accurate modeling. Data validity starts from the literature publication date as no explicit data collection start time is mentioned.

## Review details
Inventory: The internal review was done by several iteration steps concerning raw data validation, raw data documentation, representativity, completeness and consistency of modelling with regard to ISO 14040 and 14044.

## Data sources
- Jin, Y. et al. Integrated Life Cycle Assessment for Sustainable Remediation of Contaminated Agricultural Soil in China. Environ. Sci. Technol. 55, 12032–12042 (2021).
