# Water electrolysis

Dataset: ILCD process, Unit process, single operation
Geography: CN
Reference year: 2022
Classification: Energy carriers and technologies / Electricity
Functional unit: 1000 N m3 hydrogen
LCI method principle: Attributional
Generated by: Jinlu Gan, jinlu.gan1998@gmail.com
Owner: Tiangong LCI Data Working Group
Review: Dependent internal review by Tiangong LCI Data Working Group
Amounts: no units in this file; such an amount is in the reference unit of its flow, which a separate flow dataset defines
copyright: false
licenseType: Free of charge for all users and uses

## General comment
Water electrolysis splits water into hydrogen and oxygen using electricity in an electrolyser.

## Time period
the publication date of the article

## Technical purpose
The hydrogen produced via water electrolysis is suitable for applications requiring high purity such as fuel cell usage, semiconductor manufacturing, or as a feedstock for synthetic fuel production.

## Reference product
- Hydrogen: 1000; article inperiodical

## Inputs
- Water (desalinated; deionized): 820; article inperiodical
- electricity mix: 18000; article inperiodical

## Use advice
When using this LCA dataset, consider the electricity mix used for the electrolysis process as it significantly impacts the environmental footprint. Ensure to model any upstream impacts associated with the production of input power. Also, assess the end-of-life phase, paying particular attention to the potential recycling of any generated byproducts.

## Review details
Inventory: The internal review was done by several iteration steps concerning raw data validation, raw data documentation, representativity, completeness and consistency of modelling with regard to ISO 14040 and 14044.

## Data sources
- Chen, Y., Lan, L., Hao, Z. & Fu, P. Cradle-grave energy consumption, greenhouse gas and acidification emissions in current and future fuel cell vehicles: Study based on five hydrogen production methods in China. Energy Reports 8, 7931–7944 (2022).
