# Painting|Coatedparts|Primer,middlecoat,topcoat,overcoat,colorstripingpaint,thinner|Dry after spraying (water-based paint)|All sizes / 涂装|涂装件|底漆、中涂漆、面漆、罩光漆、彩条漆、稀释剂|喷漆后烘干（水性漆）|所有规模

Dataset: ILCD process, Partly terminated system
Geography: CN
Reference year: 2019
Classification: Materials production / Other mineralic materials
Generated by: The data was created by the Office of the Second National Pollution Source Census of the Ministry of Ecology and Environment, and the data was organized by the TianGong Plan team for ILCD format / 生态环境部第二次全国污染源普查工作办公室创建数据，天工计划团队常慧敏整理数据为ILCD格式
Amounts: no units in this file; such an amount is in the reference unit of its flow, which a separate flow dataset defines
copyright: false

## Technology and included processes
the treatment technology for the pollution of Base Coatdidn't offered，The formula for calculating the actual operation rate (k-value) of the end-of-pipe treatment facility is /
污染物指标工业废气量的末端治理技术未说明

## Reference product
- Base Coat: 1000; input; calculated
  原文件中描述污染物类别为Product，污染物指标为底漆、中涂漆、面漆、罩光漆、彩条漆、稀释剂，此处对其进行了匹配工作，将其匹配到LCAflow库里面相最符合的流

## Outputs
- Exhaust gas: 108126; calculated
  原文件中描述污染物类别为废气，污染物指标为工业废气量，此处对其进行了匹配工作，将其匹配到LCAflow库里面相最符合的流
- volatile organic compound: 15, 0.75, 0.75, 2.25, 0.75, 0.75, 2.25, 0.75, 10.5, 10.5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 (12 entries); calculated
  原文件中描述污染物类别为废气，污染物指标为挥发性有机物，此处对其进行了匹配工作，将其匹配到LCAflow库里面相最符合的流

## Data sources
- 第二次全国污染源普查产排污核算系数手册（试用版）,二级代码33-37文件，在完整版文件中第1008页
