# Mining ; Aluminum ore ; Aluminum ore ; Pit mining ; All sizes; NESPS2 / 采矿 ; 铝矿石 ; 铝矿 ; 坑采 ; 所有规模 ; 全国第二次污染普查数据

Dataset: ILCD process, Unit process, single operation
Geography: CN
Reference year: 2019
Classification: Reference Parameters / Materials production / Metals and semimetals
Generated by: The data was created by the Office of the Second National Pollution Source Census of the Ministry of Ecology and Environment, and the data was organized by the TianGong Plan team for ILCD format / 生态环境部第二次全国污染源普查工作办公室创建数据，天工计划团队常慧敏整理数据为ILCD格式
Owner: Tiangong LCI Data Working Group / 天工LCI数据工作小组
Review: Dependent internal review by Tiangong LCI Data Working Group / 天工LCI数据工作小组
Amounts: no units in this file; such an amount is in the reference unit of its flow, which a separate flow dataset defines
copyright: false
licenseType: Free of charge for all users and uses

## General comment
the Technical of end-of-pipe management technology for pollution chemical oxygen demandisChemical coagulation，Its Technical efficiency of end-of-pipe management70

## Technical purpose
此描述中的铝矿石采矿工艺涉及适用于所有规模操作的露天采矿。采矿得到的铝矿石通常用作生产铝金属的原材料，通过冶炼和精炼等过程。此外，所述的尾水处理技术，包括化学混凝和袋式过滤，用于在排放前处理和减少废水和颗粒物污染，以确保符合环境法规。

## Reference product
- bauxite: 1000; calculated
  源文件中描述为为铝矿石，此处对其进行了匹配工作，将其匹配到LCAflow库里面相最符合的流，污染物指标备注为工业废水量

## Outputs
All rows: calculated
- particles (PM2.5 - PM10): 0.0094
  the Technical of end-of-pipe management technology for pollution particles (PM2.5 - PM10)isBag filter，Its Technical efficiency of end-of-pipe management98
  污染物指标颗粒物的末端治理技术是布袋除尘，其效率为98，末端治理设施实际运行率（k值）计算公式为k=除尘设施年运行时间（小时/年）/企业年正常生产时间（小时/年）。原文件中描述污染物类别为废气，污染物指标为颗粒物，此处对其进行了匹配工作，将其匹配到LCAflow库里面相最符合的流，污染物指标备注为颗粒物
- Ammonia Nitrogen: 0.00036
  the Technical of end-of-pipe management technology for pollution Ammonia NitrogenisChemical coagulation，Its Technical efficiency of end-of-pipe management25
  污染物指标氨氮的末端治理技术是化学混凝法，其效率为25，末端治理设施实际运行率（k值）计算公式为k=废水治理设施年运行时间（小时/年）/企业年正常生产时间（小时/年）。原文件中描述污染物类别为废水，污染物指标为氨氮，此处对其进行了匹配工作，将其匹配到LCAflow库里面相最符合的流，污染物指标备注为氨氮
- Nitrogen, organic bound: 0.00204
  the Technical of end-of-pipe management technology for pollution Nitrogen, organic boundisChemical coagulation，Its Technical efficiency of end-of-pipe management25
  污染物指标总氮的末端治理技术是化学混凝法，其效率为25，末端治理设施实际运行率（k值）计算公式为k=废水治理设施年运行时间（小时/年）/企业年正常生产时间（小时/年）。原文件中描述污染物类别为废水，污染物指标为总氮，此处对其进行了匹配工作，将其匹配到LCAflow库里面相最符合的流，污染物指标备注为总氮
- Waste water: 2040
  the Technical of end-of-pipe management technology for pollution Waste wateris/
  污染物指标工业废水量的末端治理技术是/。原文件中描述污染物类别为废水，污染物指标为工业废水量，此处对其进行了匹配工作，将其匹配到LCAflow库里面相最符合的流，污染物指标备注为工业废水量
- chemical oxygen demand: 0.003975
  the Technical of end-of-pipe management technology for pollution chemical oxygen demandisChemical coagulation，Its Technical efficiency of end-of-pipe management70
  污染物指标化学需氧量的末端治理技术是化学混凝法，其效率为70，末端治理设施实际运行率（k值）计算公式为k=废水治理设施年运行时间（小时/年）/企业年正常生产时间（小时/年）。原文件中描述污染物类别为废水，污染物指标为化学需氧量，此处对其进行了匹配工作，将其匹配到LCAflow库里面相最符合的流，污染物指标备注为化学需氧量

## Use advice
This dataset is derived from the Pollution Source Census Report and contains information on pollution emissions and related products. However, it does not include data on energy or chemical consumption, nor does it provide information on waste or co-product generation. When utilizing this dataset, please supplement the missing data based on actual conditions before use
该数据集来源于污染源普查报告，包含污染物排放及相关产品信息，但不包含能源或化学品消耗数据，也不提供废弃物或共生产物产生信息。在使用该数据集时，请根据实际情况补充缺失数据后再使用。

## Review details
Inventory: The internal review was done by several iteration steps concerning raw data validation, raw data documentation, representativity, completeness and consistency of modelling with regard to ISO 14040 and 14044.
清单： 内部审查通过几个迭代步骤完成，涉及原始数据验证、原始数据记录、代表性、完整性、与 ISO 14040 和 14044 有关的建模的一致性。

## Data sources
- 第二次全国污染源普查产排污核算系数手册（试用版）,二级代码09,四级代码0916文件，在完整版文件中第3413页
