# Lithium Carbonate Production ; Battery Grade Lithium Carbonate ; Direct Lithium Extraction ; Brine, Clayton Valley, Nevada, USA

Dataset: ILCD process, Unit process, single operation
Geography: US
Reference year: 2020
Classification: Unit processes / Materials production / Inorganic chemicals
Generated by: Sun Xin, xs389@cornell.edu
Owner: Tiangong LCI Data Working Group
Review: Dependent internal review by Tiangong LCI Data Working Group
Amounts: no units in this file; such an amount is in the reference unit of its flow, which a separate flow dataset defines
licenseType: Free of charge for all users and uses

## General comment
In this study, our objective is to understand and analyze the environmental impacts caused by lithium production from brine in Clayton Valley, Nevada, using a new method to produce lithium carbonate without using large evaporation ponds. Direct Lithium Extraction technologies strive to address the environmental and technoeconomic limitations of traditional evaporitic methods. The objective is to eliminate the need for open-air evaporation ponds. Numerous alternative technologies have been proposed, such as ion exchange resins, thermally assisted processes, and electrochemical methods .

## Technology and included processes
The raw brine is directly sourced from underground and sent to the plant, where the pretreatment stage is the first step. The raw brine is heated in this section, and its pH is fixed for an optimized extraction. The pretreated brine then follows the DLE process, generating a stream about ten times more concentrated in lithium. At the next stage of the process, more reagents are required to modify the process conditions and remove impurities. Sodium hydroxide, hydrochloric acid, polymer, and other reagents are crucial for precipitating and removing the sludge from the brine, like chloride removal (Rahmani et al., 2019). In the lithium concentration section, the concentration in the brine increases about 15 times. Any surplus water from this process is then directed to the freshwater generation unit. The process involves using antiscalant, sodium hydroxide, and other reagents to adjust the pH and chloride levels of the brine. Additionally, this process relies on energy consumption in the form of electricity to concentrate the brine through pressure. The final stage of producing lithium carbonate in this plant is converting the dissolved lithium to solid lithium carbonate through sodium carbonate. The final stage, in which freshwater is generated, focuses on recovering water from the brines for use as freshwater in the plant by adding various additives to balance the pH and remove impurities

## Technical purpose
Battery-grade lithium carbonate produced through direct lithium extraction in Clinton Valley, Nevada, USA, is primarily used in lithium-ion batteries, which are used in a wide range of portable electronic devices, electric vehicles and grid energy storage solutions.

## Reference product
- Lithium carbonate,Lithium carbonate: 1; measured

## Inputs
All rows: measured
- Brine (0.016% Li): 1.55e6
- sodium carbonate: 1530
- Electricity: 212760
- sodium hydroxide: 196
- O-ethyl potassium carbonodithioate: 65
- hydrogen chloride: 310
- Calcium Oxide: 140
- sodium sulfate: 18
- Polyacrylamide,Polyacrylamide: 22.7
- bromine: 1.24

## Use advice
When using this data set for life cycle assessment, please take into account that the production processes for raw materials and any associated energy flows less than 1% are not included in the system boundary. This omission should be kept in mind for the completeness of the assessment and when comparing with data sets with different system boundaries. Users should also consider the geographical specificity of the data as it pertains to lithium spodumene sourced from Finland.

## Review details
Inventory: The internal review was done by several iteration steps concerning raw data validation, raw data documentation, representativity, completeness and consistency of modelling with regard to ISO 14040 and 14044.

## Data sources
- Mousavinezhad, S., Nili, S., Fahimi, A. & Vahidi, E. Environmental impact assessment of direct lithium extraction from brine resources: Global warming potential, land use, water consumption, and charting sustainable scenarios. Resources, Conservation and Recycling 205, 107583 (2024).
