# Regional exploration ; Favorable oil and gas bearing zone ; Geophysical and geochemical exploration survey

Dataset: ILCD process, Unit process, single operation
Geography: SC-CN
Reference year: 2022
Classification: Unit processes / Energy carriers and technologies / Energetic raw materials
LCI method principle: Attributional
LCI method approaches: Consequential
Generated by: Shikang Kang, 908798159@qq.com
Owner: Tiangong LCI Data Working Group
Review: Dependent internal review by Tiangong LCI Data Working Group
Amounts: no units in this file; such an amount is in the reference unit of its flow, which a separate flow dataset defines
copyright: false
licenseType: Free of charge for all users and uses

## General comment
The whole process from the beginning of petroleum geological survey in the basin to the optimization of favorable oil-bearing zones. This is the most basic and integral oil and gas exploration based on the region, which has the characteristics of comprehensiveness, regionality and integrity, and is a multi-type comprehensive exploration method

## Geography
Sichuan basin

## Time period
Publication time of literature

## Technology and included processes
Starting from the region, the overall geological survey

## Technical purpose
This dataset represents the process of regional exploration and identification of favorable oil and gas bearing zones, focusing on comprehensive geophysical and geochemical exploration surveys. Its practical application is typically limited to the oil and gas industry, where it is used to inform decisions about locating and evaluating potential regions for exploratory drilling and subsequent development of gas fields, such as those found in the Sichuan Basin.

## Reference product
- natural gas: 32000; input; min 4000; max 16000; uniform; software or database
  Census line distance

## Outputs
- natural gas: 6.8e8; log-normal
  In 2021, China's proven shale gas reserves on land and sea exceeded 6.8E08m3

## Data selection and combination
From the beginning of the 20th century to the 1980s, the theory of gas formation in China mainly stayed at the stage of oil generation, and the theoretical cognition at this stage limited the possibility of discovering gas reservoirs under more conditions for Chinese researchers

## Data treatment and extrapolations
After proving the location of the gas field or drilling natural gas, the natural gas reserves in the target area should be evaluated immediately. Based on the accurate composition analysis of the extracted natural gas, the prediction and evaluation results of natural gas reserves and related subsequent exploitation schemes are optimized according to the conditions of the target area

## Sampling procedure
Virtual exploration technology based on big data and supercomputing, measurement and control remote sensing technology of satellites and high-altitude unmanned aerial vehicles, etc., have played an important role in the exploration of land-based and sea-based gas fields in recent years. At the same time, the above technologies also provide strong support for proving the growth mechanism of natural gas, such as helping to prove that the key to the development of shale gas in Sichuan Basin lies in the high pressure of reservoir fluid. At the same time, the rapid development of geophysical technology also provides key technical support for the exploration, development and research of natural gas in China

## Use advice
Users should apply this data in the context of regional geological surveys and exploration activities, accounting for advancements in theories of gas formation and exploration technologies. Methodological advice includes immediate evaluation of gas reserves upon discovery, precise component analysis of natural gas, and adjusting exploitation plans based on target area conditions. Users should also consider recent technological developments in virtual exploration and remote sensing when interpreting the data. It is essential to incorporate the pressure conditions of reservoir fluids, specifically in contexts similar to the development of shale gas in Sichuan Basin.

## Review details
Inventory: The internal review was done by several iteration steps concerning raw data validation, raw data documentation, representativity, completeness and consistency of modelling with regard to ISO 14040 and 14044.

## Data sources
- 郭田超;刘博;邓明; 天然气勘探开发研究. 山西化工 101–102 (2022)
