# clinker production|clinker|steel slag 3.5%

Dataset: ILCD process, LCI结果
Geography: CN
Reference year: 2022
Classification: Materials production / Other mineralic materials
LCI method principle: Other
Generated by: Siqi Yang
Amounts: no units in this file; such an amount is in the reference unit of its flow, which a separate flow dataset defines
copyright: false

## General comment
Steel slag is used for iron correction materials for cement production. Steel slag does not contain carbonate. It can not only replace iron ore when preparing cement clinkers, but also provides calcium, silicon and aluminum, which has a good carbon reduction effect.
The main raw materials of the cement are calcium, silica, aluminum and iron materials. Each raw material forms the mineral phase of cement clinker through high temperature solid phase reaction. It can be seen from the chemical components, mineral characteristics, and micro -structures of the steel slag that the steel slag also contains RO, Feo, Fe2O3 and other iron phases, thereby having the conditions to replace iron correction materials. In addition, the steel slag also contains calcium, silicon, aluminum, etc. that can be burned into raw materials such as CAO (most of the content between 40% and 50%)), which can save some calcium, silicon and aluminum raw materials. In view of this steel slag fot iron correctional material technology route. Generally, tthe mineral component of iron correction material for cement is hematite Fe2O3, while the iron phase in steel slag mainly exists in the form of RO, FeO, Fe2O3, Fe, CF and so on. When steel slag is used as raw material, regardless of the form of iron, the iron phase in its high temperature solid phase reaction can provide the iron component to form the C4AF mineral phase required for cement clinker.
Combined with the actual production, the target value of WISCO steel slag clinker for transportation to a cement company along the Yangtze River for burning cement clinker is KH=0.91士0.02, SM=2.5士0.1, IM=1.5士0.1.

## Geography
A Cement Co., Ltd. along the Yangtze River

## Model description
The functional unit is 1 ton of P·I type portland cement. The carbon emission boundary for the entire life cycle of cement is set from the "cradle" to the "gate", which means from the upstream energy extraction, production and transportation stages to the transportation of finished cement to the using enterprise.

## Reference product
- clinker: 1000
  Clinker

## Inputs
- limestone, crushed, for mill: 1352; measured
  Limestone
- sandstone: 48; measured
  Sandstone
- steel slag: 39; measured
  Steel slag. As steel slag does not require further mining and processing, it is considered that CO2 is not emitted during its mining and processing process.

## Outputs
- carbon dioxide: 511.591; calculated
  CO2. Carbon emissions during skilled calcination are not included.

## Cut-off and completeness
Only the carbon footprint of clinker production is considered. The data is incomplete because the carbon emissions do not include "carbon emissions from the clinker calcination process".

## Data treatment and extrapolations
Carbon emissions value: The carbon footprint data of each unit process is accumulated.

## Data sources
- 甘万贵 & 赵青林. (2022). 钢渣烧制硅酸盐水泥熟料的减碳效果分析. 建材世界, 43(6), 121–125.
