# Rare Earth crushing;Rare Earth;In-situ leaching;neodymium iron boron (NdFeB) magnet

Dataset: ILCD process, Unit process, single operation
Geography: NMG-CN
Reference year: 2014
Classification: Unit processes / Materials production / Non-energetic raw materials
Functional unit: The functional unit is a 1 kg NdFeB magnet
LCI method principle: Attributional
LCI method approaches: Allocation - market value; Allocation - mass
Generated by: Tao Wang, twang@iue.ac.cn
Owner: Tiangong LCI Data Working Group
Review: Dependent internal review by Tiangong LCI Data Working Group
Amounts: no units in this file; such an amount is in the reference unit of its flow, which a separate flow dataset defines
copyright: false
licenseType: Free of charge for all users and uses

## General comment
This data set represents the industrial process involved in the production of neodymium iron boron (NdFeB) magnets, which are critical components in various high-tech and clean energy applications such as in wind turbines, electric vehicle motors, and hard disk drives. It encompasses the rare earth crushing, in-situ leaching, and subsequent separation processes specific to the Bayan Obo region in China, where the basic production techniques for neodymium (Nd) and praseodymium (Pr) are identical until the solvent extraction step where they are separated.

## Geography
Bayan Obo (China)

## Technology and included processes
The basic process for Nd and Pr production is the same at all three deposits. It is identical for Nd and Pr except for the last solvent extraction step (SX5) where both are separated.

## Reference product
- Steel: 0.012; input; calculated
  Steel. Bayan Obo: 0.035 kg/t ore, data estimated by experts from RWTH Aachen University

## Inputs
- Electricity: 2.088; calculated
  Bayan Obo: Value per crushing step; data estimated by experts from RWTH Aachen University, 1.0 kWh/t ore (carbonatite)
- transport in t*km,transport in t*km: 0.00023; measured
  Obo town: 20 km, lorry

## Outputs
- particles (> PM10),particles (> PM10),particles (>PM10): 1.035; calculated
  Bayan Obo: MW calculation is based on Western Regional Air Partnership
- Radioactive dust, waste: 1.496; calculated
  Radioactive dust. Bayan Obo: based on Th232 and U238 activity in the ore

## Deviations from the LCI method approaches
In this study, an allocation method based on the market prices of REOs28 is considered. To estimate uncertainties that refer to the allocation method, a mass-based allocation is undertaken as a sensitivity analysis

## Use advice
Users of this data set should apply the allocation method based on market prices of Rare Earth Oxides (REOs) as considered in this study, specifically for the production of 1 kg of NdFeB magnets. When modeling the life cycle assessment, attention should be paid to the methodological advice concerning the inclusion of recycling scenarios or exclusion criteria for materials. It is essential to utilize mass-based allocation as a sensitivity analysis to estimate uncertainties related to the allocation method. The technological applicability mentioned should be carefully adhered to when this data is used in environmental impact analyses or comparisons.

## Review details
Inventory: The internal review was done by several iteration steps concerning raw data validation, raw data documentation, representativity, completeness and consistency of modelling with regard to ISO 14040 and 14044.

## Data sources
- Marx, J., Schreiber, A., Zapp, P. & Walachowicz, F. Comparative Life Cycle Assessment of NdFeB Permanent Magnet Production from Different Rare Earth Deposits. ACS Sustainable Chem. Eng. 6, 5858–5867 (2018).
