# Grape production

Dataset: ILCD process, Unit process, black box
Geography: IR
Reference year: 2018
Valid until: 2019
Classification: Unit processes / Materials production / Agricultural production means
Functional unit: 1 hectare vineyard
Generated by: zhu xian, zzhu0918@163.com
Owner: Tiangong LCI Data Working Group
Review: Dependent internal review by Tiangong LCI Data Working Group
Amounts: no units in this file; such an amount is in the reference unit of its flow, which a separate flow dataset defines
copyright: false
licenseType: Free of charge for all users and uses

## General comment
The grape seeds are sown, chemical fertilizers, pesticides and artificial fertilizers are applied in the growth stage, and irrigation is carried out at the same time, and the grape fruits are obtained at the harvest stage after the grape blossoms.

## Geography
In this study, grape production in Arak county is studied.Arak county is located at 34°5′30″ N and 49 °41′30″ E.

## Technical purpose
Grape production as described is intended for cultivating grapevines with the purpose of fruit harvest. The grown grapes can be used in fresh consumption, as well as in the production of raisins, wine, grape juice, jams, and other grape-derived products. The process applies to agriculture sectors involved in vineyard management and grape cultivation.

## Reference product
- Grape: 17942; measured

## Inputs
All rows: measured
- diesel oil: 0.02364
- Labor: 84.9583
- Farmyard manure: 28379
- Nitrogenous fertilizer: 108.27
- Phosphate fertilizer: 109.31
- Potassium fertilizer: 155.77
- sulfur: 107.5
- Pesticide: 4.143
- Irrigation water: 6005.6

## Use advice
When using this data set for Life Cycle Assessment, it is important to account for the specific conditions such as local climate, soil type, and agricultural practices in Arak county. The data represents the inputs and outputs for grape production on a one hectare vineyard scale. If scaling to larger areas or different regions, adjustments need to be made to reflect local agronomic conditions and practices. Additionally, consideration should be given to the functional unit for which the grapes are allocated in the assessment – for example, whether the grapes are considered on a per-kilogram or per-hectare basis. Users should ensure that end-of-life scenarios such as grape waste treatment or byproducts are appropriately accounted for.

## Review details
Inventory: The internal review was done by several iteration steps concerning raw data validation, raw data documentation, representativity, completeness and consistency of modelling with regard to ISO 14040 and 14044.
