# Electricity production ; Thermal power ; Guangdong

Dataset: ILCD process, Unit process, single operation
Geography: GD-CN
Reference year: 2019
Classification: Unit processes / Energy carriers and technologies / Electricity
Generated by: Ruoxi Xiong, xiongrx0126@163.com
Owner: Tiangong LCI Data Working Group
Review: Dependent internal review by Tiangong LCI Data Working Group
Amounts: no units in this file; such an amount is in the reference unit of its flow, which a separate flow dataset defines
copyright: false
licenseType: Free of charge for all users and uses

## General comment
Thermal power generation includes seventeen fossil fuels such as raw coal, washed coal, oil and natural gas. The process only considers the direct power generation process, not the upstream raw material extraction and processing and the downstream power consumption

## Time period
Calculated based on data from the 2019 Energy Statistics Yearbook

## Technical purpose
The data set pertains to the process of electricity production using thermal power generation in Guangdong. This includes the use of seventeen different types of fossil fuels such as raw coal, washed coal, oil, and natural gas. The data is specific to the direct power generation process.

## Reference product
- electricity for thermal power: 3.6; calculated

## Inputs
All rows: calculated
- Raw coal: 0.322099
- hard coal briquettes: 0.00319929
- Gangue, in ground: 0.00700255
- Coke oven gas: 0.001905
- blast furnace gas: 0.034532
- Converter gas: 0.003058
- Diesel: 5.737e-5
- fuel oil, unspecified: 7.106e-5
- naphtha: 0.00034975
- Petroleum Coke: 0.00104837
- refinery gas: 3.582e-5
- natural gas: 0.022106
- Natural gas, liquefied: 0.00671891

## Outputs
- carbon dioxide (fossil): 0.710971; calculated
- sulfur dioxide: 0.000116837; calculated
- Nitrogen oxides: 0.000186099; calculated
- particles (> PM10): 2.389e-5; calculated

## Data treatment and extrapolations
For the accounting method, please refer to the "Enterprise Greenhouse Gas Emissions Accounting Methods and Reporting Guidelines for Power Generation Facilities". Different forms of power generation and fuel consumption come from Chapter 3 (Energy Production) and Chapter 6 (Regional Energy Balance Sheet) in the "China Energy Statistical Yearbook 2020". The fuel parameters such as low calorific value and carbon content per unit calorific value used to calculate the carbon dioxide emission factor come from the "2019 China Regional Power Grid Carbon Dioxide Baseline Emission Factor Calculation Instructions OM" and the "Enterprise Greenhouse Gas Emission Accounting Method and Reporting Guide for Power Generation Facilities" 》

## Use advice
Users of this data should note that it only accounts for direct power generation processes. It does not include considerations for upstream raw material extraction and processing, nor downstream power consumption. When applying this data set for life cycle assessments or carbon footprint calculations, be aware that the data is calculated based on the 2019 Energy Statistics Yearbook and other relevant Chinese guidelines for greenhouse gas emissions accounting in power generation facilities. It is essential that users apply the correct methodological approach aligned with these guidelines and utilize the provided emission factors when making calculations.

## Review details
Inventory: The internal review was done by several iteration steps concerning raw data validation, raw data documentation, representativity, completeness and consistency of modelling with regard to ISO 14040 and 14044.

## Data sources
- 熊若熙. 中国电力生产和消费二氧化碳与污染物排放因子核算. (清华大学, 2023).
