# Steel | production | steel | rolling | billets

Dataset: ILCD process, Unit process, single operation
Geography: CN
Reference year: 2006
Classification: Materials production / Other mineralic materials
Generated by: Wanghuanyu, wanghuanyu00@126.com
Review: Dependent internal review by Tiangong LCI Data Working Group
Amounts: no units in this file; such an amount is in the reference unit of its flow, which a separate flow dataset defines

## Reference product
- steel hot rolled coil: 1.4772, 1.1858, 1.321, 0.5768, 0.4794, 0.504, 0.9932, 0.4822, 0.4098, 0.2026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 (18 entries); measured

## Inputs
- Steel sections: 1098, 1131, 1089, 1184, 1163, 1119, 1113, 1059, 1156, 1120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 (18 entries); measured
- Energy, geothermal, converted: 1582.61, 1787.76, 2051.53, 1524, 5861.52, 2403.22, 2022.22, 2491.15, 1641.23, 0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 (18 entries); measured

## Outputs
- phenol,Sulphur oxides (as SO2): 0.094, 2.213, 0.487, 2.128, 0.802, 1.05, 0.57, 0.844, 0.438, 2.419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 (18 entries); measured
- Flue dust: 0.007, 0.483, 0.099, 0.002, 0.206, 0.116, 0.098, 0.216, 0.029, 0.11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 (18 entries); measured
- Oils (unspecified): 0.001049, 0.059189, 0.00354, 0.041761, 0.000225, 0.001452, 0.039128, 0, 0.005852, 0.026555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 (18 entries); measured

## Review details
Inventory: The internal review was done by several iteration steps concerning raw data validation, raw data documentation, representativity, completeness and consistency of modelling with regard to ISO 14040 and 14044.; Documentation: The review of the documentation was performed by Ecobilan and is in compliance with ISO 14040 and 14044. The data set documentation is correct in view of the appropriateness of the information provided. It includes all relevant information in view of data quality and scope of application of the respective LCI result.

## Data sources
- 1.
