# Coal gangue bricks ; Coal gangue, sludge, etc. ; Brick and tile industry roasting kiln (hard plastic molding, etc.) ; All sizes; NESPS2 / 煤矸石砖 ; 煤矸石、污泥等 ; 砖瓦工业焙烧窑炉（硬塑成型等） ; 所有规模 ; 全国第二次污染普查数据

Dataset: ILCD process, Unit process, single operation
Geography: CN
Reference year: 2019
Classification: Reference Parameters / Energy carriers and technologies / Hard coal based fuels
Generated by: The data was created by the Office of the Second National Pollution Source Census of the Ministry of Ecology and Environment, and the data was organized by the TianGong Plan team for ILCD format / 生态环境部第二次全国污染源普查工作办公室创建数据，天工计划团队常慧敏整理数据为ILCD格式
Owner: Tiangong LCI Data Working Group / 天工LCI数据工作小组
Review: Dependent internal review by Tiangong LCI Data Working Group / 天工LCI数据工作小组
Amounts: no units in this file; such an amount is in the reference unit of its flow, which a separate flow dataset defines
copyright: false
licenseType: Free of charge for all users and uses

## General comment
the Technical of end-of-pipe management technology for pollution Exhaust gasis/

## Technical purpose
该数据集代表了煤矸石砖在砖瓦工业中的应用，该工业使用硬塑成型的焙烧窑炉，适用于所有规模的生产。它包括用于处理废气和颗粒物（PM2.5 - PM10）的末端控制技术，具体包括静电除尘（干法除尘、湿式沉淀）、湿式除尘器和布袋除尘器，以及其他未指定的技术。它还包括用于控制二氧化硫和氮氧化物排放的技术，如石灰石/石膏湿法、双碱法、SNCR和氧化吸收方法。

## Reference product
- Coal Gangue: 10000, 10000 (2 entries); calculated
  源文件中描述为为煤矸石砖，此处对其进行了匹配工作，将其匹配到LCAflow库里面相最符合的流，污染物指标备注为工业废气量（窑炉）

## Outputs
All rows: calculated
- particles (PM2.5 - PM10): 0.13
  the Technical of end-of-pipe management technology for pollution particles (PM2.5 - PM10)isBag filter，Its Technical efficiency of end-of-pipe management98
  污染物指标颗粒物（窑炉）的末端治理技术是袋式除尘，其效率为98，末端治理设施实际运行率（k值）计算公式为k=处理设施耗电量（千瓦时/年）/（设备额定功率（千瓦）×设备运行时间（小时/年））。原文件中描述污染物类别为废气，污染物指标为颗粒物（窑炉），此处对其进行了匹配工作，将其匹配到LCAflow库里面相最符合的流，污染物指标备注为颗粒物（窑炉）
- particles (PM2.5 - PM10): 0.52
  the Technical of end-of-pipe management technology for pollution particles (PM2.5 - PM10)isElectrostatic precipitation (dry dust removal, wet precipitation)，Its Technical efficiency of end-of-pipe management92
  污染物指标颗粒物（窑炉）的末端治理技术是静电除尘（干式电除尘、湿式电除尘），其效率为92，末端治理设施实际运行率（k值）计算公式为k=处理设施耗电量（千瓦时/年）/（设备额定功率（千瓦）×设备运行时间（小时/年））。原文件中描述污染物类别为废气，污染物指标为颗粒物（窑炉），此处对其进行了匹配工作，将其匹配到LCAflow库里面相最符合的流，污染物指标备注为颗粒物（窑炉）
- particles (PM2.5 - PM10): 0.975
  the Technical of end-of-pipe management technology for pollution particles (PM2.5 - PM10)isWet precipitator，Its Technical efficiency of end-of-pipe management85
  污染物指标颗粒物（窑炉）的末端治理技术是湿式除尘器，其效率为85，末端治理设施实际运行率（k值）计算公式为k=处理设施耗电量（千瓦时/年）/（设备额定功率（千瓦）×设备运行时间（小时/年））。原文件中描述污染物类别为废气，污染物指标为颗粒物（窑炉），此处对其进行了匹配工作，将其匹配到LCAflow库里面相最符合的流，污染物指标备注为颗粒物（窑炉）
- particles (PM2.5 - PM10): 2.6
  the Technical of end-of-pipe management technology for pollution particles (PM2.5 - PM10)isOthers①，Its Technical efficiency of end-of-pipe management60
  污染物指标颗粒物（窑炉）的末端治理技术是其他①，其效率为60，末端治理设施实际运行率（k值）计算公式为k=处理设施耗电量（千瓦时/年）/（设备额定功率（千瓦）×设备运行时间（小时/年）），①其他包括机械除尘、喷雾降尘等。。原文件中描述污染物类别为废气，污染物指标为颗粒物（窑炉），此处对其进行了匹配工作，将其匹配到LCAflow库里面相最符合的流，污染物指标备注为颗粒物（窑炉）
- particles (PM2.5 - PM10): 6.5
  the Technical of end-of-pipe management technology for pollution particles (PM2.5 - PM10)is/，Its Technical efficiency of end-of-pipe management0
  污染物指标颗粒物（窑炉）的末端治理技术是/，其效率为0。原文件中描述污染物类别为废气，污染物指标为颗粒物（窑炉），此处对其进行了匹配工作，将其匹配到LCAflow库里面相最符合的流，污染物指标备注为颗粒物（窑炉）
- Nitrogen oxides: 22.52
  the Technical of end-of-pipe management technology for pollution Nitrogen oxidesisOxidative absorption，Its Technical efficiency of end-of-pipe management60
  污染物指标氮氧化物（窑炉）的末端治理技术是氧化吸收，其效率为60，末端治理设施实际运行率（k值）计算公式为k=处理设施耗电量（千瓦时/年）/（设备额定功率（千瓦）×设备运行时间（小时/年））。原文件中描述污染物类别为废气，污染物指标为氮氧化物（窑炉），此处对其进行了匹配工作，将其匹配到LCAflow库里面相最符合的流，污染物指标备注为氮氧化物（窑炉）
- sulfur dioxide: 24.35
  the Technical of end-of-pipe management technology for pollution sulfur dioxideisLimestone/lime-gypsum wet process，Its Technical efficiency of end-of-pipe management95
  污染物指标二氧化硫（窑炉）的末端治理技术是石灰石/石灰-石膏湿法，其效率为95，末端治理设施实际运行率（k值）计算公式为k=处理设施耗电量（千瓦时/年）/（设备额定功率（千瓦）×设备运行时间（小时/年））。原文件中描述污染物类别为废气，污染物指标为二氧化硫（窑炉），此处对其进行了匹配工作，将其匹配到LCAflow库里面相最符合的流，污染物指标备注为二氧化硫（窑炉）
- Nitrogen oxides: 28.15
  the Technical of end-of-pipe management technology for pollution Nitrogen oxidesisSNCR，Its Technical efficiency of end-of-pipe management50
  污染物指标氮氧化物（窑炉）的末端治理技术是选择性非催化还原，其效率为50，末端治理设施实际运行率（k值）计算公式为k=处理设施耗电量（千瓦时/年）/（设备额定功率（千瓦）×设备运行时间（小时/年））。原文件中描述污染物类别为废气，污染物指标为氮氧化物（窑炉），此处对其进行了匹配工作，将其匹配到LCAflow库里面相最符合的流，污染物指标备注为氮氧化物（窑炉）
- sulfur dioxide: 48.7
  the Technical of end-of-pipe management technology for pollution sulfur dioxideisDouble alkali process，Its Technical efficiency of end-of-pipe management90
  污染物指标二氧化硫（窑炉）的末端治理技术是双碱法，其效率为90，末端治理设施实际运行率（k值）计算公式为k=处理设施耗电量（千瓦时/年）/（设备额定功率（千瓦）×设备运行时间（小时/年））。原文件中描述污染物类别为废气，污染物指标为二氧化硫（窑炉），此处对其进行了匹配工作，将其匹配到LCAflow库里面相最符合的流，污染物指标备注为二氧化硫（窑炉）
- Nitrogen oxides: 56.3
  the Technical of end-of-pipe management technology for pollution Nitrogen oxidesis/，Its Technical efficiency of end-of-pipe management0
  污染物指标氮氧化物（窑炉）的末端治理技术是/，其效率为0。原文件中描述污染物类别为废气，污染物指标为氮氧化物（窑炉），此处对其进行了匹配工作，将其匹配到LCAflow库里面相最符合的流，污染物指标备注为氮氧化物（窑炉）
- sulfur dioxide: 73.05
  the Technical of end-of-pipe management technology for pollution sulfur dioxideisOthers①，Its Technical efficiency of end-of-pipe management85
  污染物指标二氧化硫（窑炉）的末端治理技术是其他①，其效率为85，末端治理设施实际运行率（k值）计算公式为k=处理设施耗电量（千瓦时/年）/（设备额定功率（千瓦）×设备运行时间（小时/年）），①其他包括机械除尘、喷雾降尘等。。原文件中描述污染物类别为废气，污染物指标为二氧化硫（窑炉），此处对其进行了匹配工作，将其匹配到LCAflow库里面相最符合的流，污染物指标备注为二氧化硫（窑炉）
- sulfur dioxide: 487
  the Technical of end-of-pipe management technology for pollution sulfur dioxideis/，Its Technical efficiency of end-of-pipe management0
  污染物指标二氧化硫（窑炉）的末端治理技术是/，其效率为0。原文件中描述污染物类别为废气，污染物指标为二氧化硫（窑炉），此处对其进行了匹配工作，将其匹配到LCAflow库里面相最符合的流，污染物指标备注为二氧化硫（窑炉）
- Exhaust gas: 152000
  the Technical of end-of-pipe management technology for pollution Exhaust gasis/
  污染物指标工业废气量（窑炉）的末端治理技术是/。原文件中描述污染物类别为废气，污染物指标为工业废气量（窑炉），此处对其进行了匹配工作，将其匹配到LCAflow库里面相最符合的流，污染物指标备注为工业废气量（窑炉）

## Use advice
This dataset is derived from the Pollution Source Census Report and contains information on pollution emissions and related products. However, it does not include data on energy or chemical consumption, nor does it provide information on waste or co-product generation. When utilizing this dataset, please supplement the missing data based on actual conditions before use
该数据集来源于污染源普查报告，包含污染物排放及相关产品信息，但不包含能源或化学品消耗数据，也不提供废弃物或共生产物产生信息。在使用该数据集时，请根据实际情况补充缺失数据后再使用。

## Review details
Inventory: The internal review was done by several iteration steps concerning raw data validation, raw data documentation, representativity, completeness and consistency of modelling with regard to ISO 14040 and 14044.
清单： 内部审查通过几个迭代步骤完成，涉及原始数据验证、原始数据记录、代表性、完整性、与 ISO 14040 和 14044 有关的建模的一致性。

## Data sources
- 第二次全国污染源普查产排污核算系数手册（试用版）,二级代码30,四级代码3031文件，在完整版文件中第3368页
