# Municipal sludge treatment and disposal;wet sludge moisture content 80%;850℃ pyrolysis

Dataset: ILCD process, Unit process, single operation
Geography: CN
Classification: Unit processes / End-of-life treatment / Wastewater treatment
Functional unit: 1 t of sludge is selected as the functional unit, the moisture content of wet sludge is 80%.
Generated by: Jin Sitian, 2331276@tongji.edu.cn
Owner: Tiangong LCI Data Working Group
Review: Dependent internal review by Tiangong LCI Data Working Group
Amounts: no units in this file; such an amount is in the reference unit of its flow, which a separate flow dataset defines
copyright: ['opt4ROkqig']
licenseType: Free of charge for all users and uses

## General comment
Through experiments, the relevant data of the sludge pyrolysis treatment process under different working conditions are collected and distributed, and the input and output of materials and energy in each process are quantified, and the environmental pollutant emissions are quantified.

## Technology and included processes
The rated power of the tube furnace in the pyrolysis link is 4 kW, the no-load power is 1.4 kW, nitrogen is introduced for 2~3 minutes before the reaction to ensure an oxygen-free environment, the nitrogen flow rate is 30 ml/min, the heating rate of the tube furnace is 80 °C/min, and the final temperature of pyrolysis is maintained for 10min.

## Technical purpose
The municipal sludge treatment and disposal process described represents a unit process for the pyrolysis of wet sludge with a moisture content of 80% at a temperature of 850℃. It typically serves the purpose of converting wet municipal sludge into more stable materials, which can be used for energy recovery, soil amendment, or further chemical processing. The functional unit for this process is defined as the treatment of 1 ton of municipal sludge.

## Reference product
- Sludge: 1000; input; estimated
  The moisture content of 1t of wet sludge is 80%

## Inputs
- Electricity: 2080.01; calculated
- nitrogen: 5.63; calculated

## Outputs
All rows: calculated
- hydrogen: 1.29
- carbon monoxide (biogenic): 22.13
  The original text does not distinguish between biogenic and fossil, and according to experts, it is biogenic here.
- methane (biogenic),methane (biogenic): 3.37
  (same comment as for carbon monoxide (biogenic))
- non-methane volatile organic compounds: 0.45
- carbon dioxide (biogenic): 21.19
  (same comment as for carbon monoxide (biogenic))
- Heat treatment oil: 69.68
- Semi-coke: 75.76

## Use advice
When utilizing this data set for Life Cycle Assessment (LCA), ensure that the sludge processing conditions mirror those specified (e.g., moisture content of 80% and pyrolysis temperature of 850℃). For the impact assessment phase, consider the potential outputs and their treatment methods, such as syngas production, char utilization, and liquid effluent treatment. Exclude the impacts of upstream processes (such as sludge collection and transportation) and include any significant emissions during the pyrolysis step.

## Review details
Inventory: The internal review was done by several iteration steps concerning raw data validation, raw data documentation, representativity, completeness and consistency of modelling with regard to ISO 14040 and 14044.

## Data sources
- 王久兵. 污泥热解反应机制及其能源化工艺的全生命周期评价研究[D].浙江工业大学,2017.
