# Substation Construction and Operation ; Semi-Underground Substations

Dataset: ILCD process, Partly terminated system
Geography: SJZ-HEB-CN
Reference year: 2023
Valid until: 2073
Classification: Systems / Construction
LCI method principle: Other
Generated by: Wang, Yuxuan , wyx135230@163.com
Owner: Tiangong LCI Data Working Group
Review: Dependent internal review by Tiangong LCI Data Working Group
Amounts: no units in this file; such an amount is in the reference unit of its flow, which a separate flow dataset defines
copyright: false
licenseType: Free of charge for all users and uses

## General comment
The literature has derived the carbon footprint of the semi-underground substation building at each stage of its life cycle, including the physicalization stage, operation stage, and construction and dismantling stage, through the establishment of a whole life cycle carbon emission model. The physical phase includes the production and transportation of building materials.

## Geography
The author stated in the article that the substation was located in a cold region without giving a specific geographic location, using the geographic location of the author's grid company as the geographic location of the substation

## Time period
The literature does not specify the starting time of the dataset, so the time of publication of the literature is used as the starting time of the dataset, and the building life of the substation is 50 years, so 50 years is used as the valid time period

## Technology and included processes
Construction stage: The semi-underground substation is located in a cold area, with one underground floor, two floors above ground and three floors locally. It adopts reinforced concrete frame structure for the first floor and below, and steel frame structure for the first floor and above. The height of the building is 17.9m. The total floor area is 8402.6m2, and the total floor area above ground is 4982.6m2. Operation phase: In the substation, a large amount of residual heat is generated by the equipment in the main transformer room, distribution room, reactor room, capacitor room, cable layer, etc., and fans are needed to dissipate the heat, so as to ensure that the indoor temperature stays below 40°C. The substation is located in a cold area, and the building has 1 underground floor and 2 above ground floors.

## Technical purpose
The semi-underground substation, designed for use in cold regions, facilitates the distribution and transformation of electrical power. It consists of one underground level and two to three above-ground floors, using reinforced concrete and steel frame structures. This infrastructure serves to manage and regulate the electrical power flow in the grid, ensuring continuous and reliable electricity supply.

## Reference product
- Transformer Substation: 1; measured
  半地下变电站

## Inputs
All rows: measured
- Concrete: 1.42896e7
- steel rebar: 526950
- Z-section steel: 49710
  Section steel
- Floor Slab: 74570
  Steel-concrete precast floor slab
- Gypsum plasterboard: 2.08791e6
  Steel-concrete prefabricated wall panels, the detailed information cannot be found in da.tiangong.world, and the existing flow will be used instead.
- Cement: 447410
- Mortar: 1.33228e6
  The original flow name is ready-mixed mortar. Select the existing mortar in the flow data table as the flow name.
- sand: 1.44762e6
- lightweight concrete block: 894820
  The original stream name is block, and the detailed type is not given. It is replaced by the lightweight concrete block already in the stream data table.
- brick: 1.38398e6
- Exterior Window: 11020
- solid wood composite door: 1870
  The stream name in the original data is insulation door. This detailed information cannot be found in da.tiangong.world, so the existing stream is used instead.
- Ceramics: 78450
- Paint: 49710
- Cable: 1310
- Welding Steel Pipe: 2780
  The original data flow name is pipe, which is not clearly stated. It is replaced by the input flow of welded steel pipe in the flow data table.

## Outputs
- carbon dioxide: 6.19472e6; calculated
  The carbon footprint of the materialization stage of the substation (including the production and transportation stages of building materials)
- carbon dioxide: 3.27243e7; calculated
  The carbon footprint of the substation operation phase is recorded based on a 50-year lifespan. The source of carbon emissions during the substation building operation phase mainly comes from electric energy, mainly involving building cooling, heating, lighting, and fan equipment.
- carbon dioxide: 83858; calculated
  Carbon footprint during construction and dismantling of substations

## Data selection and combination
Based on the bill of quantities and combined with the building construction drawings to determine the consumption of major building materials. Determination of carbon emission factor: Based on the literature to derive the carbon emission factor of major building materials and its transportation carbon emission factor, the grid emission factor in the operation stage is selected, such as the "Notice on Doing a Good Job on the Management of Greenhouse Gas Emission Reporting for Enterprises in the Power Generation Industry in 2023-2025".

## Use advice
Data set users must consider the specific geographical and climatic conditions of cold regions when interpreting the carbon emission data. The starting point for the data set usage is the publication time of the literature source, and the data is applicable over the substation's 50-year lifespan. The bill of quantities, construction drawings, and carbon emission factors for material production and transportation should be referenced for accurate carbon footprint calculation. It's important to apply the correct grid emission factors, which are influenced by policies such as the 'Notice on Doing a Good Job on the Management of Greenhouse Gas Emission Reporting for Enterprises in the Power Generation Industry in 2023-2025'.

## Review details
Inventory: The internal review was done by several iteration steps concerning raw data validation, raw data documentation, representativity, completeness and consistency of modelling with regard to ISO 14040 and 14044.

## Data sources
- 乔军 et al. 半地下变电站建筑全生命周期碳排放与减碳策略研究. 粉煤灰综合利用 37, 94–100 (2023).
