# Silicon aluminum alloy production ; Silicon aluminum alloy ; Old aluminum scrap

Dataset: ILCD process, Unit process, single operation
Geography: CN
Reference year: 2012
Classification: Materials production / Metals and semimetals
Generated by: Chenling Fu, fu-chenling@tsinghua.edu.cn
Owner: Tiangong LCI Data Working Group
Review: Dependent internal review by Tiangong LCI Data Working Group
Amounts: no units in this file; such an amount is in the reference unit of its flow, which a separate flow dataset defines
copyright: false
licenseType: Free of charge for all users and uses

## General comment
The silicon aluminum alloy produced from this process is typically utilized in the automotive and aerospace industries due to its enhanced material properties such as lightweight and high thermal conductivity. This alloy may also find applications in the construction industry, for structural components where strength-to-weight ratio is a critical factor.

## Time period
Literature published in March, 2012

## Reference product
- Silicon-Aluminum Alloy (Si, 12%): 1000; missing unimportant
  silicon-aluminum alloy (Si, 12%)

## Inputs
All rows: missing unimportant
- electricity, high voltage, aluminium industry: 7416
  Electricity
- steam, in chemical industry: 0.02
  Steam
- fluoride salt: 0.94
  Fluoride salt
- diesel: 0.06
  Diesel
- hard coal: 0.22
  Coal
- Copper, in ground: 8
  Copper
- inorganic chemicals: 4.1
  Inorganic chemicals
- anthracene oil: 0.14
  Anthracene oil
- natural gas, high pressure: 87.73
  Natural gas
- Nitrogen: 2.5
  Nitrogen gas
- coal gas: 21.75
  Coal gas
- Old Aluminum: 1080
  Old aluminum
- bauxite: 160
  Bauxite
- lime: 10
  Lime
- Sodium Hydroxide (100%): 20
  NaOH (100%)
- fresh water: 920
  Fresh water
- petroleum coke: 110
  Petroleum coke
- bitumen: 10
  Bitumen
- anthracite: 4.8
  Anthracite
- silicon dioxide: 300
  Silica
- charcoal: 120
  Charcoal

## Outputs
All rows: missing unimportant
- Dust: 0.51
- sulfur dioxide: 0.21
  SO2
- Methane, tetrafluoro-, R-14: 0.0097
  Tetrafluoro methane
- hexafluoroethane: 0.001
  Hexa-fluoro ethane
- hydrogen fluoride: 0.02
  HF
- chemical oxygen demand: 0.01747
  COD
- ammonia nitrogen: 0.00184
  NH3eN
- petroleum pollutions: 0.00205
  Petroleum pollutions
- Phenol: 1e-5
- Polycyclic Aromatic Hydrocarbon (PAH): 3e-5
  B(a)P

## Use advice
Users of this data set should take into account that the silicon aluminum alloy production process is based on recycling old aluminum scrap and the literature referenced was published in March, 2012. This may affect the environmental impact assessment depending on technological advancements and changes in recycling practices since publication. It is advisable to validate the relevancy of the data with current manufacturing processes and recycling rates before application in Life Cycle Assessment.

## Review details
Inventory: The internal review was done by several iteration steps concerning raw data validation, raw data documentation, representativity, completeness and consistency of modelling with regard to ISO 14040 and 14044.

## Data sources
- Hong, J., Hong, J., Zhou, J. & Xu, X. Environmental and economic life cycle assessment of aluminum-silicon alloys production: A case study in China. J. Clean. Prod. 24, 11–19 (2012).
