# Aluminum Recycling ; Recycled Aluminum Ingots ; Scrap Aluminum ; 2015

Dataset: ILCD process, Unit process, single operation
Geography: CN
Reference year: 2021
Classification: Unit processes / Materials production / Metals and semimetals
Generated by: Zimeng Cai, caizm6178@163.com
Owner: Tiangong LCI Data Working Group
Review: Dependent internal review by Tiangong LCI Data Working Group
Amounts: no units in this file; such an amount is in the reference unit of its flow, which a separate flow dataset defines
copyright: false
licenseType: Free of charge for all users and uses

## General comment
Recycled aluminum ingots produced from this process are primarily used in metallurgy and manufacturing industries. These ingots serve as a raw material for products where aluminum's light weight and corrosion resistance are valued, such as in the construction of vehicles, packaging materials, and in the production of aluminum-based components.

## Time period
Date of publication

## Reference product
- secondary aluminium ingot: 1000; missing unimportant
  ingot

## Inputs
- electricity, high voltage, aluminium industry: 1148.4; missing unimportant
  electricity
- aluminium scrap, unspecified: 1180; missing unimportant
  aluminum scrap

## Data selection and combination
The data in this study refers to the LCA data of PA, SA, electricity, and other background data. The PA data were obtained from statistical data sources, and the SA data were mainly obtained from the literatures. The background data were mainly derived from the Chinese localization LCA database CAS RCEES 2018, which was established by the Research Center for Eco-Environmental Sciences, Chinese Academy of Sciences and covers LCA data for energy, materials, transportation, waste management etc.

## Use advice
When using this LCA data, ensure accurate allocation of impacts for the recycled content and consider the end-of-life phase for the aluminum products. Exclude primary aluminum impacts where applicable. Pay attention to the regional context, as the dataset is specific to Chinese production and recycling conditions outlined by CAS RCEES 2018. Update the dataset with more recent data if available, especially when using it for comparative studies or policy-making decisions to reflect current technological advancements and environmental regulations.

## Review details
Inventory: The internal review was done by several iteration steps concerning raw data validation, raw data documentation, representativity, completeness and consistency of modelling with regard to ISO 14040 and 14044.

## Data sources
- Ding, N., Liu, N., Lu, B. & Yang, J. Life cycle greenhouse gas emissions of aluminum based on regional industrial transfer in China. J. Ind. Ecol. 25, 1657–1672 (2021).
