# Soybean isolate protein ; Soybean meal ; Alkali dissolution and acid deposition method ; All sizes; NESPS2 / 大豆分离蛋白 ; 豆粕 ; 碱溶酸沉法 ; 所有规模 ; 全国第二次污染普查数据

Dataset: ILCD process, Unit process, single operation
Geography: CN
Reference year: 2019
Classification: Reference Parameters / Materials production / Food and renewable raw materials
Generated by: The data was created by the Office of the Second National Pollution Source Census of the Ministry of Ecology and Environment, and the data was organized by the TianGong Plan team for ILCD format / 生态环境部第二次全国污染源普查工作办公室创建数据，天工计划团队常慧敏整理数据为ILCD格式
Owner: Tiangong LCI Data Working Group / 天工LCI数据工作小组
Review: Dependent internal review by Tiangong LCI Data Working Group / 天工LCI数据工作小组
Amounts: no units in this file; such an amount is in the reference unit of its flow, which a separate flow dataset defines
copyright: false
licenseType: Free of charge for all users and uses

## General comment
the Technical of end-of-pipe management technology for pollution chemical oxygen demandisPhysical treatment + anaerobic treatment + aerobic treatment，Its Technical efficiency of end-of-pipe management97.11

## Technical purpose
该数据集涉及采用碱溶酸沉方法从大豆粕中提取的大豆分离蛋白，适用于各种规模的生产。它专门用于需要高质量蛋白质成分的应用，如营养补充剂、肉类替代品、无奶制品以及其他需要使用最少污染物的蛋白质来源的食品工业。此外，数据集包括有关在制造过程中产生的废水、化学需氧量(COD)、氨氮和有机结合氮的末端处理技术的信息。

## Reference product
- Soybean Meal: 1000; input; calculated
  源文件中描述为为豆粕，此处对其进行了匹配工作，将其匹配到LCAflow库里面相最符合的流，污染物指标备注为工业废水量

## Outputs
All rows: calculated
- Waste water: 28800
  the Technical of end-of-pipe management technology for pollution Waste wateris/，Its Technical efficiency of end-of-pipe management0
  污染物指标工业废水量的末端治理技术是/，其效率为0，末端治理设施实际运行率（k值）计算公式为/。原文件中描述污染物类别为废水，污染物指标为工业废水量，此处对其进行了匹配工作，将其匹配到LCAflow库里面相最符合的流，污染物指标备注为工业废水量
- Ammonia Nitrogen: 0.20064
  the Technical of end-of-pipe management technology for pollution Ammonia NitrogenisPhysical treatment + chemical treatment + aerobic biological treatment + anaerobic biological treatment，Its Technical efficiency of end-of-pipe management93.4
  污染物指标氨氮的末端治理技术是物理处理法+化学处理法+厌氧生物处理法+好氧生物处理法，其效率为93.4，末端治理设施实际运行率（k值）计算公式为k=污水处理设施年耗电量/(总额定功率(千瓦)×年运行时间(小时)。原文件中描述污染物类别为废水，污染物指标为氨氮，此处对其进行了匹配工作，将其匹配到LCAflow库里面相最符合的流，污染物指标备注为氨氮
- Ammonia Nitrogen: 0.207328
  the Technical of end-of-pipe management technology for pollution Ammonia NitrogenisPhysical treatment + anaerobic treatment + aerobic treatment，Its Technical efficiency of end-of-pipe management93.18
  污染物指标氨氮的末端治理技术是物理处理法+厌氧处理法+好氧处理法，其效率为93.18，末端治理设施实际运行率（k值）计算公式为k=污水处理设施年耗电量/(总额定功率(千瓦)×年运行时间(小时)。原文件中描述污染物类别为废水，污染物指标为氨氮，此处对其进行了匹配工作，将其匹配到LCAflow库里面相最符合的流，污染物指标备注为氨氮
- Nitrogen, organic bound: 0.659286
  the Technical of end-of-pipe management technology for pollution Nitrogen, organic boundisPhysical treatment + chemical treatment + aerobic biological treatment + anaerobic biological treatment，Its Technical efficiency of end-of-pipe management92.17
  污染物指标总氮的末端治理技术是物理处理法+化学处理法+厌氧生物处理法+好氧生物处理法，其效率为92.17，末端治理设施实际运行率（k值）计算公式为k=污水处理设施年耗电量/(总额定功率(千瓦)×年运行时间(小时)。原文件中描述污染物类别为废水，污染物指标为总氮，此处对其进行了匹配工作，将其匹配到LCAflow库里面相最符合的流，污染物指标备注为总氮
- Nitrogen, organic bound: 0.682862
  the Technical of end-of-pipe management technology for pollution Nitrogen, organic boundisPhysical treatment + anaerobic treatment + aerobic treatment，Its Technical efficiency of end-of-pipe management91.89
  污染物指标总氮的末端治理技术是物理处理法+厌氧处理法+好氧处理法，其效率为91.89，末端治理设施实际运行率（k值）计算公式为k=污水处理设施年耗电量/(总额定功率(千瓦)×年运行时间(小时)。原文件中描述污染物类别为废水，污染物指标为总氮，此处对其进行了匹配工作，将其匹配到LCAflow库里面相最符合的流，污染物指标备注为总氮
- chemical oxygen demand: 9.7092
  the Technical of end-of-pipe management technology for pollution chemical oxygen demandisPhysical treatment + chemical treatment + aerobic biological treatment + anaerobic biological treatment，Its Technical efficiency of end-of-pipe management97.21
  污染物指标化学需氧量的末端治理技术是物理处理法+化学处理法+厌氧生物处理法+好氧生物处理法，其效率为97.21，末端治理设施实际运行率（k值）计算公式为k=污水处理设施年耗电量/(总额定功率(千瓦)×年运行时间(小时)。原文件中描述污染物类别为废水，污染物指标为化学需氧量，此处对其进行了匹配工作，将其匹配到LCAflow库里面相最符合的流，污染物指标备注为化学需氧量
- chemical oxygen demand: 10.0572
  the Technical of end-of-pipe management technology for pollution chemical oxygen demandisPhysical treatment + anaerobic treatment + aerobic treatment，Its Technical efficiency of end-of-pipe management97.11
  污染物指标化学需氧量的末端治理技术是物理处理法+厌氧处理法+好氧处理法，其效率为97.11，末端治理设施实际运行率（k值）计算公式为k=污水处理设施年耗电量/(总额定功率(千瓦)×年运行时间(小时)。原文件中描述污染物类别为废水，污染物指标为化学需氧量，此处对其进行了匹配工作，将其匹配到LCAflow库里面相最符合的流，污染物指标备注为化学需氧量

## Use advice
This dataset is derived from the Pollution Source Census Report and contains information on pollution emissions and related products. However, it does not include data on energy or chemical consumption, nor does it provide information on waste or co-product generation. When utilizing this dataset, please supplement the missing data based on actual conditions before use
该数据集来源于污染源普查报告，包含污染物排放及相关产品信息，但不包含能源或化学品消耗数据，也不提供废弃物或共生产物产生信息。在使用该数据集时，请根据实际情况补充缺失数据后再使用。

## Review details
Inventory: The internal review was done by several iteration steps concerning raw data validation, raw data documentation, representativity, completeness and consistency of modelling with regard to ISO 14040 and 14044.
清单： 内部审查通过几个迭代步骤完成，涉及原始数据验证、原始数据记录、代表性、完整性、与 ISO 14040 和 14044 有关的建模的一致性。

## Data sources
- 第二次全国污染源普查产排污核算系数手册（试用版）,二级代码13,四级代码1392文件，在完整版文件中第3413页
