# Cotton Yarn Production ; Cotton Yarn ; Fiber Acquisition

Dataset: ILCD process, Unit process, black box
Geography: XJ-CN
Reference year: 2013
Classification: Unit processes / Materials production / Non-energetic raw materials
Generated by: Yingfan Duan, 1300925579@qq.com
Owner: Tiangong LCI Data Working Group
Review: Dependent internal review by Tiangong LCI Data Working Group
Amounts: no units in this file; such an amount is in the reference unit of its flow, which a separate flow dataset defines
copyright: false
licenseType: Free of charge for all users and uses

## General comment
Including the cultivation and harvesting of raw cotton, as well as the ginning process.

## Geography
A textile enterprise in Xinjiang currently has a total of 6,912 spinning spindles, with a cotton yarn production capacity of 15,000 tons per annum. The factory covers an area of 6.67 hectares. There are 16 open-end spinning production lines that primarily produce high-grade OE yarns used for weaving various fabrics. The cotton yarn production process includes stages such as cotton opening, cleaning, feeding, carding, drawing, spinning, and winding. The enterprise's total assets amount to 138.98 million yuan, with fixed assets accounting for 81.81 million yuan. The total liabilities stand at 57.17 million yuan, resulting in an asset-liability ratio of 41%.

## Technical purpose
The cotton yarn produced from this industrial process is intended for use in textile manufacturing, which includes the creation of fabrics for clothing, home textiles like bed sheets and curtains, and industrial textile products. The high-quality yarn is suitable for a wide range of textile applications where strength, softness, and durability are required.

## Reference product
- Cotton Yarn: 1; measured

## Inputs
All rows: measured
- Energy, unspecified: 59.8
- Electricity: 12.1
- Non-renewable resources: 1.4
- natural gas: 0.35
- crude oil; 42.3 MJ/kg: 0.53
- hard coal,hard coal: 0.52
- LPG - liquefied petroleum gas: 0.03
- electricity from hydroelectric power plant: 1
- Fertilizer: 0.457
- Pesticide: 0.016
- freshwater: 22200

## Outputs
All rows: measured
- carbon dioxide (biogenic): 4.265
  原文说明此处为农业化肥施用的排放
- methane (biogenic): 0.0076
  原文说明此处为农业活动产生的排放
- sulfur dioxide: 0.004
- Nitrogen oxides: 0.0227
- carbon monoxide (biogenic): 0.0161
  原文说明此处为农业活动产生的排放

## Use advice
This dataset representing cotton yarn production should be used with consideration of regional differences in cotton cultivation practices and the associated environmental impacts. It is important to ensure that the system boundaries include all relevant processes from the plantation to the ginning. Users should verify if the data aligns with the geographical location of their LCA case study to maintain accuracy, and should account for variations in technology and energy efficiency. The dataset excludes subsequent textile manufacturing processes like weaving or knitting, which should be considered separately in a life cycle assessment.

## Review details
Inventory: The internal review was done by several iteration steps concerning raw data validation, raw data documentation, representativity, completeness and consistency of modelling with regard to ISO 14040 and 14044.

## Data sources
- 章媛媛 & 左强. 生命周期评价在纺织企业清洁生产审核中的应用. 新疆环境保护 36, 36–41 (2014).
