# Silicon ore mining ; Silicon ore ; Multiple-row delay blasting technique

Dataset: ILCD process, Unit process, single operation
Geography: CN
Reference year: 2017
Classification: Unit processes / Materials production / Non-energetic raw materials
Functional unit: In this paper, a 1 kWp solar PV system consisting of five 200 Wmodules made of 54 multi-Si cells, each with a size of 156*156 mm2 and 16% efficiency, was used as the primary study object
LCI method principle: Attributional
LCI method approaches: Allocation
Generated by: Jinfeng Yang, yjfzfshn@163.com
Owner: Tiangong LCI Data Working Group
Review: Dependent internal review by Tiangong LCI Data Working Group
Amounts: no units in this file; such an amount is in the reference unit of its flow, which a separate flow dataset defines
copyright: false
licenseType: Free of charge for all users and uses

## General comment
Multi-Si

## Geography
Environmental effects of China's solar photovoltaic industry during2011e2016: A life cycle assessment approach

## Time period
Available online

## Technology and included processes
Small down-the-hole drill and explosives are used to take apart the source containing the desired deposits by themultiple-row delay blasting technique

## Technical purpose
The described process is utilized in the extraction of silicon ore through the multiple-row delay blasting technique. This technique is part of the production chain for multi-crystalline silicon (Multi-Si) used predominantly in the manufacturing of solar photovoltaic (PV) systems. Specifically, a 1 kWp solar PV system composed of five 200 W modules, each made from 54 Multi-Si cells sized 156*156 mm2 with 16% efficiency, serves as the primary research subject for life cycle assessment studies within the Chinese solar PV industry, representing the application of silicon obtained from this mining process.

## Reference product
- quartz sand: 20.2568; measured
  silicon ore

## Inputs
- Explosive: 1.1254; measured
  explosive
- gasoline (regular): 0.0081; measured
  gasoline
- Electricity: 2.77128; software or database
  electricity

## Outputs
All rows: measured
- carbon dioxide (fossil): 0.1324
  carbon dioxide
- sulfur dioxide: 0.1926
- Nitrogen oxides: 0.1384
  oxynitride
- hydrogen sulfide: 0.0963
- ammonia: 0.0512
- particles (> PM10),particles (>PM10): 0.0033
  dust
- mineral treatment residue (unspecified): 0.0014
  solid waste

## Deviations from the LCI method approaches
Building on the existing literature on LCA of China's solar PVsystem (Fu et al., 2015; He, 2013; Hong et al., 2016; Li and Yu, 2014; Li and Chang, 2012; Liang, 2012; Yang et al., 2015; Yu et al., 2017; Xie et al., 2015), the LCI is obtained for this study.

## Use advice
When applying the data set derived from the life cycle inventory (LCI) of China's solar PV industry for the period 2011-2016 for environmental impact assessments, users should ensure consistent methodology with previously established literature, particularly that referenced in the description (e.g., Fu et al., 2015; He, 2013; Hong et al., 2016, etc.). Consideration of the specific multiple-row delay blasting technique in silicon ore extraction must be included when modelling the environmental impacts of silicon production for solar PV systems. Additionally, accurate representation of the solar PV system configuration, efficiency, and the time period of study is crucial for accurate results.

## Review details
Inventory: The internal review was done by several iteration steps concerning raw data validation, raw data documentation, representativity, completeness and consistency of modelling with regard to ISO 14040 and 14044.

## Data sources
- Xu, L., Zhang, S., Yang, M., Li, W. & Xu, J. Environmental effects of China’s solar photovoltaic industry during 2011–2016: A life cycle assessment approach. Journal of Cleaner Production 170, 310–329 (2018).
