# iron and steel waste slag ; concrete unburned brick ; melting reduction technology for iron and steel waste slag

Dataset: ILCD process, Unit process, single operation
Geography: TS-HEB-CN
Classification: Unit processes / Materials production / Other mineralic materials
Generated by: 刘逸飞
Owner: Tiangong LCI Data Working Group
Review: Dependent internal review by Tiangong LCI Data Working Group
Amounts: no units in this file; such an amount is in the reference unit of its flow, which a separate flow dataset defines
licenseType: Free of charge for all users and uses

## General comment
The iron and steel waste slag is utilized as a raw material for the production of concrete unburned bricks, employing melting reduction technology. This process is intended for the construction industry, specifically in the manufacturing of eco-friendly building materials that incorporate recycled waste from the iron and steel industry.

## Reference product
- reduction-melting iron: 1000

## Inputs
- Electricity: 112.32; measured
- Diesel oil: 0.66; measured
- small grain steel slag: 984.55
- gas ash: 403.92
- OG mud: 252.45
- dust removal ash: 504.9
- sulfuric acid slag: 631.12
- type slags powder: 474.6
- gas: 179.94
- Electricity: 450.144, 112.32 (2 entries)
- diesel fuel: 0.66
- Cooling water: 5900.42
- Coke: 807.69
- type slags: 2524.23
- coal powder: 180
- Diesel oil: 0.66, 0.66 (2 entries)
- water slag: 1000
- tailings steel slag: 1000
- Plaster: 125
- Cement: 275
- water: 100

## Outputs
- small grain steel slag: 984.55; measured
- agglomerates: 2524.23; measured
- water slag: 1000
- concrete unburned brick: 0.004
- sulfur dioxide: 1.75915
- carbon dioxide: 552.05
- nitric oxides: 1.79536
- Ammonia nitrogen: 0.05125
- chemical oxygen demand: 0.48602

## Use advice
When utilizing this data set, users should ensure that the system boundary includes the upstream processes associated with the generation of iron and steel waste slag. A careful assessment of the environmental impacts related to the melting reduction technology should be incorporated, including energy consumption and emissions. Users should also account for any transportation impacts associated with the delivery of the waste slag to the production facility and the distribution of the concrete unburned bricks.

## Review details
Inventory: The internal review was done by several iteration steps concerning raw data validation, raw data documentation, representativity, completeness and consistency of modelling with regard to ISO 14040 and 14044.

## Data sources
- Li, Y., Lv, M., Li, R. & Liu, Z. Life cycle assessment of melting reduction treatment for iron and steel waste slag: A case study in Tangshan, China. Resources, Conservation & Recycling Advances 15, 200108 (2022).
