# Soil Remediation;Isotopic Remediation;Soil Drenching;Soil Column Drenching;Contaminated Soil Columns

Dataset: ILCD process, Unit process, single operation
Geography: CN
Reference year: 2023
Classification: Unit processes / Other Services / Repair and maintenance
Generated by: Wang Ning, wang_ning@caep.org.cn
Owner: Tiangong LCI Data Working Group
Review: Dependent internal review by Tiangong LCI Data Working Group
Amounts: no units in this file; such an amount is in the reference unit of its flow, which a separate flow dataset defines
copyright: false
licenseType: Free of charge for all users and uses

## General comment
Anhydrous sodium sulfate, acetone, n-hexane, dichloromethane, acetonitrile, etc. to make contaminated soil columns

## Technology and included processes
Use of quartz sand, plastics, anhydrous sodium sulfate, acetone, n-hexane, dichloromethane, acetonitrile, etc. to make contaminated soil columns

## Technical purpose
This set of data represents an ex situ soil remediation process specifically designed for soil column drenching. It involves the use of quartz sand, plastic materials, and various solvents like anhydrous sodium sulfate, acetone, n-hexane, dichloromethane, and acetonitrile for the purpose of creating simulated contaminated soil columns. This process is applied as a research tool or in environmental engineering applications to study the effects and efficiency of soil remediation techniques.

## Reference product
- Contaminated soil columns: 0.0008

## Inputs
- sand: 0.1
- Plastic (unspecified): 0.0004
- sodium sulfate: 0.002
- acetone: 6e-5
- hexane: 9.2e-5
- dichloromethane: 9e-6
- acetonitrile: 1e-6
- Tap Water: 0.01

## Outputs
- Wastewater: 0.01508

## Use advice
Users of this dataset should consider the ex situ remediation context when applying the data. The dataset specifically pertains to simulated conditions and may not fully represent in situ remediation scenarios. Users should account for the life cycle of chemicals and plastics used in the soil columns and consider the end-of-life treatment for the remediation equipment and materials. Ensure that the input and output data accurately reflect the major raw material consumption and energy usage associated with the process. It is advisable to also model any transportation of materials as well as the use phase behavior of the soil columns, including potential leaching of contaminants.

## Review details
Inventory: The internal review was done by several iteration steps concerning raw data validation, raw data documentation, representativity, completeness and consistency of modelling with regard to ISO 14040 and 14044.

## Data sources
- 张雅鑫 et al. 基于生命周期评价的焦化污染土壤 淋洗技术环境影响研究. 安全、健康和环境 23, (2023).
