# PV cell production ; PV cell ; Semiconductor technology

Dataset: ILCD process, Unit process, single operation
Geography: SC-CN
Reference year: 2013
Classification: Unit processes / Materials production / Metals and semimetals
Functional unit: 1 kg solar grade multi-Si
LCI method principle: Attributional
LCI method approaches: Allocation
Generated by: Jinfeng Yang, yjfzfshn@163.com
Owner: Tiangong LCI Data Working Group
Review: Dependent internal review by Tiangong LCI Data Working Group
Amounts: no units in this file; such an amount is in the reference unit of its flow, which a separate flow dataset defines
copyright: false
licenseType: Free of charge for all users and uses

## General comment
Multi-Si

## Geography
A solar cell manufacturer in Sichuan

## Time period
Available online

## Technology and included processes
Semiconductor technology

## Technical purpose
This dataset relates to the manufacturing process of solar photovoltaic (PV) cells using multi-crystalline silicon (multi-Si) semiconductor technology. The solar PV cells produced by this process are typically used in the fabrication of solar panels which convert sunlight into electricity. These panels are employed in various applications ranging from residential and commercial solar installations to large-scale photovoltaic power stations.

## Reference product
- Multi-Si solar cell,Multi-Si solar cell,Multi-Si solar cell: 1e6; measured
  Solar cells (MW)

## Inputs
All rows: measured
- Multi-Si wafer,Multi-Si wafer,Multi-Si wafer: 3420
  Polycrystalline silicon wafer
- Electricity: 55548
  Power consumption
- freshwater: 1.23654e6
  fresh water
- Silver Paste: 60
  silver paste
- Aluminum Paste: 430
  Aluminum paste
- Ammonia: 40
- Silane: 10
- Phosphorus Oxychloride: 8
  POCl3
- Sodium hydroxide: 195
  NaOH
- Hydrochloric acid: 450
  HCl
- Hydrofluoric acid: 860
  HF
- Nitrogen oxides: 1550
  nitric acid
- oxygen: 113

## Outputs
All rows: measured
- chlorine: 81.23
  Chlorine
- Nitrogen oxides: 26.78
- ammonia: 31.04
  Ammonia
- non-methane volatile organic compounds: 33.4
  TVOC
- hydrogen chloride: 7.29
  HCl
- chloride: 15.89
- fluoride: 83.65
  Fluoride
- nitrogen, total (excluding N2): 49.32
  TN
- chemical oxygen demand: 126.89
  COD
- industrial waste (unspecified): 283
  Solid Waste

## Deviations from the LCI method approaches
In this paper, solar-grade polysilicon is taken as the research object, and the value of resource, energy input and environment emission of solar-grade polysilicon life cycle process at domestic and general production level is calculated quantitatively by using LCA evaluation method

## Data selection and combination
Based on the data collection and organization of the production process of a PV cell manufacturer in Sichuan Province

## Use advice
When employing this LCA dataset for solar-grade multi-Si, it is important to ensure that the scope and boundaries of the analysis match the dataset's specifications. This includes proper accounting for energy and resource inputs as well as environmental emissions during the life cycle stages. Special attention should also be paid to the geographical relevance (as the data is specific to Sichuan Province, China) and the technology level represented. The data should not be generalized beyond the production practices of the specified solar cell manufacturer without careful consideration of technological and process variations.

## Review details
Inventory: The internal review was done by several iteration steps concerning raw data validation, raw data documentation, representativity, completeness and consistency of modelling with regard to ISO 14040 and 14044.

## Data sources
- 何洋. 太阳能级多晶硅的生命周期评价. (西南交通大学, 2013).
