# cement production;cement, portland fly-ash cement, 52.5MPa;dry process precalciner kiln;fly ash

Dataset: ILCD process, Unit process, black box
Geography: CN
Reference year: 2001
Classification: Materials production / Other mineralic materials
Generated by: Siqi Yang, ysqsophia@gmail.com
Owner: Tiangong LCI Data Working Group
Review: Dependent internal review by Tiangong LCI Data Working Group
Amounts: no units in this file; such an amount is in the reference unit of its flow, which a separate flow dataset defines
copyright: false
licenseType: Free of charge for all users and uses

## General comment
Dry precalciner kilns produce cement. The computer automation system is used to fully control the entire cement production from raw material storage to cement storage. The main equipment includes raw meal mills, clinker mills, and clinker calcination equipment.The clinker calcining equipment consists of a coal-fired New SuspensionPreheater-Flash Furnace (NSF) kiln and a clinker cooler. The NSF system consists of two columns of four-stage cyclone preheaters and a calciner (F.F).

## Technology and included processes
Dry Process Plant A uses a computer automation system to comprehensively control the entire cement production from raw material storage to cement storage. The main equipment includes raw material mill, clinker mill and clinker calcining equipment. The clinker calcining equipment consists of a coal-fired NSF kiln and a clinker cooler. The NSF system consists of two rows of four-stage cyclone preheaters and a calciner (F.F).

## Technical purpose
The described industrial process details the production of Portland fly-ash cement with a strength grade of 52.5MPa using a dry process precalciner kiln. This grade of cement is utilized in various construction projects requiring high strength cement, including infrastructure such as bridges, buildings, roads as well as in residential construction. The process is highly controlled by a computer automation system and involves advanced equipment for the grinding and calcination of raw meal and clinker.

## Model description
The research scope is defined as raw material entering the plant, raw material pretreatment, raw meal grinding, raw meal calcination, clinker grinding, until cement homogenization and storage. Specific processes such as mining, transportation, and cement packaging are not included.

## Reference product
- cement, portland fly-ash cement, 52.5MPa: 1000
  The average grade of cement is 525.

## Inputs
- limestone, crushed, for mill: 1274.77
  Limestone
- sandstone: 0.007784
  Sandstone
- iron, powder: 51.9989
  Iron powder
- bauxite: 61.2503
- gypsum stone (CaSO4-dihydrate): 56.1461
  Gupsum
- ash: 10.9485
  Fly ash
- Water (fresh water): 1169.37
  Fresh water
- hard coal: 106.55
  The original data is 155.517kt standard coal, here converted to hard coal, the conversion formula is 1kg hard coal = 0.929kg standard coal.
- electricity, medium voltage: 458.389
  Electricity

## Outputs
- particles (> PM10): 0.320632
  Dust, with an unspecified particle size, is treated as PM > 10 micrometers in diameter.
- particles (> PM10): 0.37466
  Smoke, with an unspecified particle size, is treated as PM > 10 micrometers in diameter.
- sulfur dioxide: 0.574625
  Sulfur dioxide
- Nitrogen oxides: 0.535697
- carbon monoxide: 0.080097
  Carbon dioxide
- carbon dioxide: 811.3
- Water (groundwater from technosphere, waste water): 630.543
  The original text is industrial wastewater (i.e. wastewater from cement production).

## Data treatment and extrapolations
CO2 data processing: Based on the CO2 emission data of one functional unit, the CO2 emissions when producing 1,567,340 tons of cement were calculated.

## Use advice
When using this LCA data, ensure that it aligns with the scope of your study. It is suitable for assessments of cement production emissions and energy consumption without consideration for mining, transportation, or packaging processes. Be cautious when applying this data to projects outside the defined scope, and recalibrate it based on specific regional conditions or technological variations if necessary. When calculating CO2 emissions, adhere to the methodological guidelines provided for evaluating functional units and scaling to other production quantities.

## Review details
Inventory: The internal review was done by several iteration steps concerning raw data validation, raw data documentation, representativity, completeness and consistency of modelling with regard to ISO 14040 and 14044.

## Data sources
- 狄向华. (2001). 材料环境协调性评价的标准流程方法研究 [硕士, 北京工业大学].
