# Turbine manufacture ; 5 MW wind turbine

Dataset: ILCD process, Unit process, black box
Geography: SH-CN
Reference year: 2009
Classification: Unit processes / Energy carriers and technologies / Mechanical energy
Functional unit: The functional unit is 1 kWh on-grid electricity provision.
LCI method principle: Attributional
LCI method approaches: Allocation
Generated by: Yunzhi Zhao, ll10088@163.com
Owner: Tiangong LCI Data Working Group
Review: Dependent internal review by Tiangong LCI Data Working Group
Amounts: no units in this file; such an amount is in the reference unit of its flow, which a separate flow dataset defines
copyright: false
licenseType: Free of charge for all users and uses

## General comment
The data set is intended for assessing the environmental impact and energy use associated with the manufacture, installation, operation, maintenance, dismantling, and recycling of a 5 MW wind turbine, specifically for the Donghai Bridge Offshore Wind Farm (DBOWF) in Shanghai, China. It can be applied in sustainability analyses, policy-making regarding renewable energy installations, and by engineers and technicians to optimize the environmental performance of offshore wind farms.

## Geography
The studied wind farm, the Donghai Bridge Offshore Wind Farm (DBOWF), is China's first offshore wind farm within the jurisdiction of Shanghai, as well as the first offshore wind farm outside Europe. The project has two-phases of construction, located on each side of the Donghai bridge (Fig. 1).

## Reference product
- Wind turbine: 1; measured

## Inputs
- Resin: 242000
  Resin and fiber glass
- iron: 118800
- Steel,Steel: 495300
- silicon: 1000
- copper: 9600

## Deviations from the LCI method approaches
The present study employed the PLCA modeling approach to calculate the energy and environmental emissions of a typical offshore wind farm in China. The cradle-to-grave process includes four stages, materials and equipment manufacturing, transportation and installation, operation and maintenance, and dismantling and recycling (Fig. 2).

## Data selection and combination
The technical parameters of wind turbines, foundations and cables are obtained from the design documents of the DBOWF (Table 2). The energy and emissions factors (i.e., the energy consumption and environmental emissions of per unit material and component production) are derived from the Ecoinvent 2.2 dataset (Ecoinvent Centre, 2009), and the coefficients of China's practices were preferentially referred. For key materials and equipment, their sea transportation energy is calculated from the transportation load and shipping energy intensity. The facility installation energy and emissions were estimated based on the construction plan. The wind farm's operation and maintenance data, such as the frequency and working time of maintenance, were obtained from site investigations with engineers and technicians. The uncertainties associated with model parameters and input data are illustrated in the sensitivity analysis section of this paper.

## Use advice
Users should ensure that the methodological framework adopted is consistent with the PLCA (Product Life Cycle Assessment) model used in the study. Attention should be paid to the unit of analysis, which is the provision of 1 kWh of on-grid electricity. Users must reference the Ecoinvent 2.2 dataset and specifically the coefficients that apply to Chinese practices when considering energy and emissions factors. Any shipping of key materials and equipment should account for transportation load and shipping energy intensity. Installation energy and emissions should be estimated in accordance with the construction project plans. Furthermore, site-specific data such as maintenance frequency and work time must be considered for operation and maintenance stages. Lastly, the uncertainties in model parameters and input data should be acknowledged, referring to the sensitivity analysis provided in the study.

## Review details
Inventory: The internal review was done by several iteration steps concerning raw data validation, raw data documentation, representativity, completeness and consistency of modelling with regard to ISO 14040 and 14044.

## Data sources
- Yang, J. et al. The life-cycle energy and environmental emissions of a typical offshore wind farm in China. Journal of Cleaner Production 180, 316–324 (2018).
