# Sinter production;Sinter;Sintering(D01)

Dataset: ILCD process, Unit process, single operation
Geography: CN
Reference year: 1998
Classification: Materials production / Other mineralic materials
Generated by: Fuxiang, 1162850692@qq.com
Owner: Tiangong LCI Data Working Group
Review: Dependent internal review by Tiangong LCI Data Working Group
Amounts: no units in this file; such an amount is in the reference unit of its flow, which a separate flow dataset defines
copyright: false
licenseType: Free of charge for all users and uses

## General comment
来自表 4-17 D01 钢厂生产吨材环境负荷编目表

## Time period
论文提到钢铁企业环境总体数据为1998年的吨钢环境基础数据。

## Technical purpose
The sinter production process is used in the iron and steel industry to form a coarse, pre-fused material by agglomerating iron ore fines along with fluxes and coke, which is then fed into a blast furnace as part of the iron-making process.

## Reference product
- Sinter: 1751; measured

## Inputs
- Energy, geothermal, converted: 4068.45; measured
- water: 2967; measured
- Refined Iron Ore: 955; measured
  Concentrated iron ore

## Outputs
All rows: measured
- Dust (unspecified, from stack): 1.362
- sulfur dioxide: 8.09
- Suspended solids, unspecified: 0.176268
- chemical oxygen demand: 0.129346
- Dust (unspecified, from stack): 33.269
  dust collection
- Spoil (deposited, hibernating in ground, non elementary flow): 35.02

## Use advice
When utilizing this data set for Life Cycle Assessment (LCA), ensure that the data is consistent with the geographical context and temporal scope (e.g. referencing to the year 1998) of the manufacturing site in question. It is advised to consider the inclusion of subsequent environmental impacts when incorporating the sinter production process into LCA models, such as emissions from specific unit operations outlined in the referenced literature. Users should align the data use with the technological scope, such as the scale and technology level of the steel production from which the data was derived.

## Review details
Inventory: The internal review was done by several iteration steps concerning raw data validation, raw data documentation, representativity, completeness and consistency of modelling with regard to ISO 14040 and 14044.

## Data sources
- 周和敏. 钢铁材料生产过程环境协调性评价研究. (北京工业大学, 2001).
