# DRI production;DRI;H-DR (full)

Dataset: ILCD process, Unit process, single operation
Geography: CN
Classification: Energy carriers and technologies / Heat and steam
Generated by: Fuxiang, 1162850692@qq.com
Owner: Tiangong LCI Data Working Group
Review: Dependent internal review by Tiangong LCI Data Working Group
Amounts: no units in this file; such an amount is in the reference unit of its flow, which a separate flow dataset defines
copyright: false
licenseType: Free of charge for all users and uses

## General comment
Direct Reduced Iron (DRI) produced through the hydrogen-based reduction process is typically used within the steelmaking industry. As a raw material, this form of iron is instrumental for steel production facilities that aim to reduce their reliance on traditional blast furnace methods and decrease carbon emissions. It is suitable for manufacturing various steel products, adhering to environmental standards.

## Geography
The average operating data of Coal-DR, NG-DR (MID), and NG-DR (ENE) demonstration projects in China are used as the benchmark for the LCI of DR routes.

## Reference product
- Direct Reduced Iron: 1000; calculated
  The average operating data of Coal-DR, NG-DR (MID), and NG-DR (ENE) demonstration projects in China are used as the benchmark for the LCI of DR routes. LCI of COG-DR and H-DR routes, which is not scaled-up in China are estimated based on Coal-DR routes combined with literature data from simulations, laboratory tests, and process modeling in

## Inputs
All rows: calculated
- Pellet: 1357.3
  (same comment as for Direct Reduced Iron)
- Water (fresh water): 200
  (same comment as for Direct Reduced Iron)
- Natural gas, at consumer EU-27: 18.1
  (same comment as for Direct Reduced Iron)
- hydrogen: 979.4
  (same comment as for Direct Reduced Iron)
- Electricity: 356.4
  (same comment as for Direct Reduced Iron)

## Outputs
- Dust (unspecified, from stack): 0.1; calculated
  (same comment as for Direct Reduced Iron)

## Data treatment and extrapolations
LCI of COG-DR and H-DR routes, which is not scaled-up in China are estimated based on Coal-DR routes combined with literature data from simulations, laboratory tests, and process modeling in Table 9 [49,50]. The LCI of Coal-DR is obtai

## Use advice
When integrating the LCI data of DRI production into a Life Cycle Assessment, users must consider the specific regional context of the data, which is based on the average operating data from projects in China. As the LCI for Coal-DR, NG-DR, and H-DR routes not scaled up in China are estimated rather than measured, users should account for this by considering additional uncertainty in the results. Data should be contextualized with current technological advancements and should not be applied directly to different technological or geographical contexts without adjustments. Special attention should be paid to the methodological differences in the inclusion or exclusion of recycling, as well as specific use phase modeling behavior, which may affect the final environmental impact assessment.

## Review details
Inventory: The internal review was done by several iteration steps concerning raw data validation, raw data documentation, representativity, completeness and consistency of modelling with regard to ISO 14040 and 14044.

## Data sources
- The carbon reduction potential of hydrogen in the low carbon transition of the iron and steel industry: The case of China
