# Platinum strip ; Platinum metal ingot ; Billeting + cold rolling ; All sizes; NESPS2 / 铂带材 ; 铂金属锭 ; 开坯+冷轧 ; 所有规模 ; 全国第二次污染普查数据

Dataset: ILCD process, Unit process, single operation
Geography: CN
Reference year: 2019
Classification: Reference Parameters / Materials production / Metals and semimetals
Generated by: The data was created by the Office of the Second National Pollution Source Census of the Ministry of Ecology and Environment, and the data was organized by the TianGong Plan team for ILCD format / 生态环境部第二次全国污染源普查工作办公室创建数据，天工计划团队常慧敏整理数据为ILCD格式
Owner: Tiangong LCI Data Working Group / 天工LCI数据工作小组
Review: Dependent internal review by Tiangong LCI Data Working Group / 天工LCI数据工作小组
Amounts: no units in this file; such an amount is in the reference unit of its flow, which a separate flow dataset defines
copyright: false
licenseType: Free of charge for all users and uses

## General comment
the Technical of end-of-pipe management technology for pollution Strip and Foil MaterialisOil Separation + physical precipitation

## Technical purpose
所述工艺涉及从铂金属锭开始生产铂带材。该过程包括开坯和冷轧以达到铂带的必要尺寸规格。采用该工艺生产的铂带适用于包括电子，汽车催化剂和珠宝制造在内的各种工业应用，铂具有抗腐蚀性好，电导率高和催化特性等属性。

## Reference product
- Strip and Foil Material: 1; calculated
  源文件中描述为为铂带材，此处对其进行了匹配工作，将其匹配到LCAflow库里面相最符合的流，污染物指标备注为工业废水量

## Outputs
- Petroleum-related waste: 3.496e-6; calculated
  the Technical of end-of-pipe management technology for pollution Petroleum-related wasteisOil Separation + physical precipitation，Its Technical efficiency of end-of-pipe management77
  污染物指标石油类的末端治理技术是隔油+物理沉淀，其效率为77，末端治理设施实际运行率（k值）计算公式为k=废水治理设施年运行时间（小时）/企业年正常生产时间（小时）。原文件中描述污染物类别为废水，污染物指标为石油类，此处对其进行了匹配工作，将其匹配到LCAflow库里面相最符合的流，污染物指标备注为石油类
- chemical oxygen demand: 0.0002084; calculated
  the Technical of end-of-pipe management technology for pollution chemical oxygen demandisOil Separation + physical precipitation，Its Technical efficiency of end-of-pipe management60
  污染物指标化学需氧量的末端治理技术是隔油+物理沉淀，其效率为60，末端治理设施实际运行率（k值）计算公式为k=废水治理设施年运行时间（小时）/企业年正常生产时间（小时）。原文件中描述污染物类别为废水，污染物指标为化学需氧量，此处对其进行了匹配工作，将其匹配到LCAflow库里面相最符合的流，污染物指标备注为化学需氧量
- Waste water: 396; calculated
  the Technical of end-of-pipe management technology for pollution Waste waterisOil Separation + physical precipitation
  污染物指标工业废水量的末端治理技术是隔油+物理沉淀，末端治理设施实际运行率（k值）计算公式为/。原文件中描述污染物类别为废水，污染物指标为工业废水量，此处对其进行了匹配工作，将其匹配到LCAflow库里面相最符合的流，污染物指标备注为工业废水量

## Use advice
This dataset is derived from the Pollution Source Census Report and contains information on pollution emissions and related products. However, it does not include data on energy or chemical consumption, nor does it provide information on waste or co-product generation. When utilizing this dataset, please supplement the missing data based on actual conditions before use
该数据集来源于污染源普查报告，包含污染物排放及相关产品信息，但不包含能源或化学品消耗数据，也不提供废弃物或共生产物产生信息。在使用该数据集时，请根据实际情况补充缺失数据后再使用。

## Review details
Inventory: The internal review was done by several iteration steps concerning raw data validation, raw data documentation, representativity, completeness and consistency of modelling with regard to ISO 14040 and 14044.
清单： 内部审查通过几个迭代步骤完成，涉及原始数据验证、原始数据记录、代表性、完整性、与 ISO 14040 和 14044 有关的建模的一致性。

## Data sources
- 第二次全国污染源普查产排污核算系数手册（试用版）,四级代码3253文件，在完整版文件中第5117页
