# Wafer slicing ; Multi-Si wafer ; Ingot breaker is used to slice the ingot

Dataset: ILCD process, Unit process, single operation
Geography: CN
Reference year: 2017
Classification: Unit processes / Materials production / Other materials
Functional unit: In this paper, a 1 kWp solar PV system consisting of five 200 Wmodules made of 54 multi-Si cells, each with a size of 156*156 mm2 and 16% efficiency, was used as the primary study object
LCI method principle: Attributional
LCI method approaches: Allocation
Generated by: Jinfeng Yang, yjfzfshn@163.com
Owner: Tiangong LCI Data Working Group
Review: Dependent internal review by Tiangong LCI Data Working Group
Amounts: no units in this file; such an amount is in the reference unit of its flow, which a separate flow dataset defines
copyright: false
licenseType: Free of charge for all users and uses

## General comment
Multi-Si

## Geography
Environmental effects of China's solar photovoltaic industry during2011e2016: A life cycle assessment approach

## Time period
Available online

## Technology and included processes
Ingot breaker is used to slice the ingot

## Technical purpose
The described industrial process involves slicing ingots of multi-crystalline silicon (multi-Si) to produce wafers for photovoltaic (PV) modules. Each PV module is part of a larger solar energy system, with a focus on a 1 kWp system that incorporates five individual 200 W modules, each composed of 54 multi-Si cells. These cells have dimensions of 156 x 156 mm2 and possess an efficiency of 16%. The process is therefore crucial for the manufacturing of PV panels, which are used in the solar power industry to capture and convert solar energy into electricity.

## Reference product
- Multi-Si wafer,Multi-Si wafer,Multi-Si wafer: 3.4203; measured
  Multi-Si wafer (Multi-Si wafer)

## Inputs
All rows: measured
- Multi-Si ingot: 5.6014
  Multi-Si ingot (Multi-Si wafer)
- Silicon carbide,Silicon carbide: 0.1799
  Silicon carbide (Multi-Si wafer)
- Steel Wire,Cable: 17.7336
  Steel wire
- Electricity: 24.6262
  Electricity (Multi-Si wafer)
- Detergent: 2.2837
  Detergent (Multi-Si wafer)

## Deviations from the LCI method approaches
Building on the existing literature on LCA of China's solar PVsystem (Fu et al., 2015; He, 2013; Hong et al., 2016; Li and Yu, 2014; Li and Chang, 2012; Liang, 2012; Yang et al., 2015; Yu et al., 2017; Xie et al., 2015), the LCI is obtained for this study.

## Use advice
When utilizing the life cycle inventory (LCI) data for the described process, users should ensure that they are applying this information within the context of photovoltaic module production, specifically for multi-crystalline silicon PV cells from 2011 to 2016 in China. It is important to account for technological changes over the time period and to consider geographical specificity when interpreting results. Careful attention should also be given to the boundaries of the study, ensuring that recycling processes, where applicable, are included, and that use-phase behavior of the PV systems, including energy output and degradation rates, is accurately modeled based on the available literature.

## Review details
Inventory: The internal review was done by several iteration steps concerning raw data validation, raw data documentation, representativity, completeness and consistency of modelling with regard to ISO 14040 and 14044.

## Data sources
- Xu, L., Zhang, S., Yang, M., Li, W. & Xu, J. Environmental effects of China’s solar photovoltaic industry during 2011–2016: A life cycle assessment approach. Journal of Cleaner Production 170, 310–329 (2018).
