# Steam/hot water/other ; Bituminous coal ; Circulating fluidized bed furnace ; All sizes; NESPS2 / 蒸汽/热水/其它 ; 烟煤 ; 循环流化床炉 ; 所有规模 ; 全国第二次污染普查数据

Dataset: ILCD process, Unit process, single operation
Geography: CN
Reference year: 2019
Classification: Reference Parameters / Energy carriers and technologies / Heat and steam
Generated by: The data was created by the Office of the Second National Pollution Source Census of the Ministry of Ecology and Environment, and the data was organized by the TianGong Plan team for ILCD format / 生态环境部第二次全国污染源普查工作办公室创建数据，天工计划团队常慧敏整理数据为ILCD格式
Owner: Tiangong LCI Data Working Group / 天工LCI数据工作小组
Review: Dependent internal review by Tiangong LCI Data Working Group / 天工LCI数据工作小组
Amounts: no units in this file; such an amount is in the reference unit of its flow, which a separate flow dataset defines
copyright: false
licenseType: Free of charge for all users and uses

## General comment
the Technical of end-of-pipe management technology for pollution sulfur dioxideisSpray drying process，Its Technical efficiency of end-of-pipe management70

## Technical purpose
该数据集代表用于所有规模的循环流化床炉的烟煤，用于产生蒸汽、热水或其他需要热能或能量的应用。包括的末端治理技术是针对排气气体、二氧化硫、烟尘和氮氧化物的污染处理措施。这些在工业环境中用于根据环境标准和指南减少排放。

## Reference product
- Bituminite: 1000; input; calculated
  源文件中描述为为烟煤，此处对其进行了匹配工作，将其匹配到LCAflow库里面相最符合的流，污染物指标备注为工业废气量

## Outputs
All rows: calculated
- Nitrogen oxides: 0.54
  the Technical of end-of-pipe management technology for pollution Nitrogen oxidesisSCR，Its Technical efficiency of end-of-pipe management80
  污染物指标氮氧化物的末端治理技术是SCR，其效率为80，末端治理设施实际运行率（k值）计算公式为K=脱硝设施年运行小时数/锅炉年运行小时数。原文件中描述污染物类别为废气，污染物指标为氮氧化物，此处对其进行了匹配工作，将其匹配到LCAflow库里面相最符合的流，污染物指标备注为氮氧化物
- Nitrogen oxides: 0.54
  the Technical of end-of-pipe management technology for pollution Nitrogen oxidesisSNCR-SCR combination，Its Technical efficiency of end-of-pipe management80
  污染物指标氮氧化物的末端治理技术是SNCR-SCR联合，其效率为80，末端治理设施实际运行率（k值）计算公式为K=脱硝设施年运行小时数/锅炉年运行小时数。原文件中描述污染物类别为废气，污染物指标为氮氧化物，此处对其进行了匹配工作，将其匹配到LCAflow库里面相最符合的流，污染物指标备注为氮氧化物
- Nitrogen oxides: 1.35
  the Technical of end-of-pipe management technology for pollution Nitrogen oxidesisSNCR，Its Technical efficiency of end-of-pipe management50
  污染物指标氮氧化物的末端治理技术是SNCR，其效率为50，末端治理设施实际运行率（k值）计算公式为K=脱硝设施年运行小时数/锅炉年运行小时数。原文件中描述污染物类别为废气，污染物指标为氮氧化物，此处对其进行了匹配工作，将其匹配到LCAflow库里面相最符合的流，污染物指标备注为氮氧化物
- Nitrogen oxides: 2.7
  the Technical of end-of-pipe management technology for pollution Nitrogen oxidesis/，Its Technical efficiency of end-of-pipe management0
  污染物指标氮氧化物的末端治理技术是/，其效率为0。原文件中描述污染物类别为废气，污染物指标为氮氧化物，此处对其进行了匹配工作，将其匹配到LCAflow库里面相最符合的流，污染物指标备注为氮氧化物
- Exhaust gas: 9416
  the Technical of end-of-pipe management technology for pollution Exhaust gasis/
  污染物指标工业废气量的末端治理技术是/。原文件中描述污染物类别为废气，污染物指标为工业废气量，此处对其进行了匹配工作，将其匹配到LCAflow库里面相最符合的流，污染物指标备注为工业废气量
- Exhaust gas: 9416
  the Technical of end-of-pipe management technology for pollution Exhaust gasisWith terminal treatment technology
  污染物指标工业废气量的末端治理技术是有末端治理。原文件中描述污染物类别为废气，污染物指标为工业废气量，此处对其进行了匹配工作，将其匹配到LCAflow库里面相最符合的流，污染物指标备注为工业废气量
- sulfur dioxide: 0
  Pollutant indicator sulfur dioxide end-of-pipe treatment technology is /, its efficiency is 0. The original document describes the pollutant category as exhaust gas, the pollutant indicator is sulfur dioxide, here to match it to the LCAflow library of the flow that most closely matches the pollutant indicator, the pollutant indicator note for sulfur dioxide original description of the production coefficient of 15S (no desulfurizer). Please modify the corresponding emissions after accounting according to the note.
  污染物指标二氧化硫的末端治理技术是/，其效率为0。原文件中描述污染物类别为废气，污染物指标为二氧化硫，此处对其进行了匹配工作，将其匹配到LCAflow库里面相最符合的流，污染物指标备注为二氧化硫原文描述的产污系数为 15S(无脱硫剂)。请根据备注自行核算后修改对应的排放量。
- sulfur dioxide: 0
  Pollutant indicators of sulfur dioxide end-of-pipe treatment technology is wet de-dusting method, the efficiency of which is 15, end-of-pipe treatment facilities actual operating rate (k value) calculation formula for K = annual operating hours of dust removal facilities / boiler annual operating hours. The original document describes the pollutant category as exhaust gas, the pollutant indicator for sulfur dioxide, here to match it to the LCAflow library face to face the most compatible flow, the pollutant indicator note for sulfur dioxide original description of the production coefficient of 15S (no desulfurizer). Please modify the corresponding emissions after accounting according to the note.
  污染物指标二氧化硫的末端治理技术是湿法除尘法，其效率为15，末端治理设施实际运行率（k值）计算公式为K=除尘设施年运行小时数/锅炉年运行小时数。原文件中描述污染物类别为废气，污染物指标为二氧化硫，此处对其进行了匹配工作，将其匹配到LCAflow库里面相最符合的流，污染物指标备注为二氧化硫原文描述的产污系数为 15S(无脱硫剂)。请根据备注自行核算后修改对应的排放量。
- sulfur dioxide: 0
  The end-of-pipe treatment technology for sulfur dioxide is /, and its efficiency is 0. The original document describes the pollutant category as exhaust gas, and the pollutant indicator as sulfur dioxide, which is matched here to the most compatible stream in the LCAflow library, and the pollutant indicator note for sulfur dioxide is 4.5S (with desulfurizer added6). Please modify the corresponding emissions according to the note after self-calculation..The original article describes the pollution production coefficients as 4.5S(添加脱硫剂6)。Please revise the corresponding emissions after accounting for them according to the notes.。.The original article describes the pollution production coefficients as 4.5S(添加脱硫剂6). Please revise the corresponding emissions after accounting for them according to the notes.
  污染物指标二氧化硫的末端治理技术是/，其效率为0。原文件中描述污染物类别为废气，污染物指标为二氧化硫，此处对其进行了匹配工作，将其匹配到LCAflow库里面相最符合的流，污染物指标备注为二氧化硫原文描述的产污系数为 4.5S(添加脱硫剂6)。请根据备注自行核算后修改对应的排放量。
- Flue dust: 0
  The end-of-pipe treatment technology for the pollutant indicator soot is /, and its efficiency is 0. The original document describes the pollutant category as exhaust gas, and the pollutant indicator as soot, and the matching work is carried out here to match it to the flow that is most compatible with the LCAflow library, and the production coefficient of the pollutant indicator, commented in the original document for the soot, is 5.19 A. Please modify the corresponding emission level according to the comment after self-calculation..The original article describes the pollution production coefficients as 5.19A。Please revise the corresponding emissions after accounting for them according to the notes.。.The original article describes the pollution production coefficients as 5.19A. Please revise the corresponding emissions after accounting for them according to the notes.
  污染物指标烟尘的末端治理技术是/，其效率为0。原文件中描述污染物类别为废气，污染物指标为烟尘，此处对其进行了匹配工作，将其匹配到LCAflow库里面相最符合的流，污染物指标备注为烟尘原文描述的产污系数为 5.19A。请根据备注自行核算后修改对应的排放量。
- Flue dust: 0
  the Technical of end-of-pipe management technology for pollution Flue dustisBag filter technology，Its Technical efficiency of end-of-pipe management99.6.The original article describes the pollution production coefficients as 5.19A。Please revise the corresponding emissions after accounting for them according to the notes.。.The original article describes the pollution production coefficients as 5.19A. Please revise the corresponding emissions after accounting for them according to the notes.
  污染物指标烟尘的末端治理技术是袋式除尘技术，其效率为99.6，末端治理设施实际运行率（k值）计算公式为K=除尘设施年运行小时数/锅炉年运行小时数。原文件中描述污染物类别为废气，污染物指标为烟尘，此处对其进行了匹配工作，将其匹配到LCAflow库里面相最符合的流，污染物指标备注为烟尘原文描述的产污系数为 5.19A。请根据备注自行核算后修改对应的排放量。
- Flue dust: 0
  the Technical of end-of-pipe management technology for pollution Flue dustisDry electrostatic precipitation technology，Its Technical efficiency of end-of-pipe management97.The original article describes the pollution production coefficients as 5.19A。Please revise the corresponding emissions after accounting for them according to the notes.。.The original article describes the pollution production coefficients as 5.19A. Please revise the corresponding emissions after accounting for them according to the notes.
  污染物指标烟尘的末端治理技术是干式电除尘技术，其效率为97，末端治理设施实际运行率（k值）计算公式为K=除尘设施年运行小时数/锅炉年运行小时数。原文件中描述污染物类别为废气，污染物指标为烟尘，此处对其进行了匹配工作，将其匹配到LCAflow库里面相最符合的流，污染物指标备注为烟尘原文描述的产污系数为 5.19A。请根据备注自行核算后修改对应的排放量。
- Flue dust: 0
  the Technical of end-of-pipe management technology for pollution Flue dustisElectric-bag composite precipitator，Its Technical efficiency of end-of-pipe management99.8.The original article describes the pollution production coefficients as 5.19A。Please revise the corresponding emissions after accounting for them according to the notes.。.The original article describes the pollution production coefficients as 5.19A. Please revise the corresponding emissions after accounting for them according to the notes.
  污染物指标烟尘的末端治理技术是电袋复合除尘技术，其效率为99.8，末端治理设施实际运行率（k值）计算公式为K=除尘设施年运行小时数/锅炉年运行小时数。原文件中描述污染物类别为废气，污染物指标为烟尘，此处对其进行了匹配工作，将其匹配到LCAflow库里面相最符合的流，污染物指标备注为烟尘原文描述的产污系数为 5.19A。请根据备注自行核算后修改对应的排放量。
- Flue dust: 0
  the Technical of end-of-pipe management technology for pollution Flue dustisMechanical dust removal + wet precipitation and desulfurization7，Its Technical efficiency of end-of-pipe management92.The original article describes the pollution production coefficients as 5.19A。Please revise the corresponding emissions after accounting for them according to the notes.。.The original article describes the pollution production coefficients as 5.19A. Please revise the corresponding emissions after accounting for them according to the notes.
  污染物指标烟尘的末端治理技术是机械+湿式除尘脱硫7，其效率为92，末端治理设施实际运行率（k值）计算公式为K=除尘设施年运行小时数/锅炉年运行小时数。原文件中描述污染物类别为废气，污染物指标为烟尘，此处对其进行了匹配工作，将其匹配到LCAflow库里面相最符合的流，污染物指标备注为烟尘原文描述的产污系数为 5.19A。请根据备注自行核算后修改对应的排放量。
- Flue dust: 0
  the Technical of end-of-pipe management technology for pollution Flue dustisMechanical dust removal + wet precipitation7，Its Technical efficiency of end-of-pipe management92.The original article describes the pollution production coefficients as 5.19A。Please revise the corresponding emissions after accounting for them according to the notes.。.The original article describes the pollution production coefficients as 5.19A. Please revise the corresponding emissions after accounting for them according to the notes.
  污染物指标烟尘的末端治理技术是机械+湿法除尘法7，其效率为92，末端治理设施实际运行率（k值）计算公式为K=除尘设施年运行小时数/锅炉年运行小时数。原文件中描述污染物类别为废气，污染物指标为烟尘，此处对其进行了匹配工作，将其匹配到LCAflow库里面相最符合的流，污染物指标备注为烟尘原文描述的产污系数为 5.19A。请根据备注自行核算后修改对应的排放量。
- Flue dust: 0
  the Technical of end-of-pipe management technology for pollution Flue dustisWet electrostatic precipitation，Its Technical efficiency of end-of-pipe management70.The original article describes the pollution production coefficients as 5.19A。Please revise the corresponding emissions after accounting for them according to the notes.。.The original article describes the pollution production coefficients as 5.19A. Please revise the corresponding emissions after accounting for them according to the notes.
  污染物指标烟尘的末端治理技术是湿式电除尘，其效率为70，末端治理设施实际运行率（k值）计算公式为K=除尘设施年运行小时数/锅炉年运行小时数。原文件中描述污染物类别为废气，污染物指标为烟尘，此处对其进行了匹配工作，将其匹配到LCAflow库里面相最符合的流，污染物指标备注为烟尘原文描述的产污系数为 5.19A。请根据备注自行核算后修改对应的排放量。
- sulfur dioxide: 0
  the Technical of end-of-pipe management technology for pollution sulfur dioxideisAmmonia method，Its Technical efficiency of end-of-pipe management92.5.The original article describes the pollution production coefficients as 15S(无脱硫剂)。Please revise the corresponding emissions after accounting for them according to the notes.。.The original article describes the pollution production coefficients as 15S(无脱硫剂). Please revise the corresponding emissions after accounting for them according to the notes.
  污染物指标二氧化硫的末端治理技术是氨法，其效率为92.5，末端治理设施实际运行率（k值）计算公式为K=除尘设施年运行小时数/锅炉年运行小时数。原文件中描述污染物类别为废气，污染物指标为二氧化硫，此处对其进行了匹配工作，将其匹配到LCAflow库里面相最符合的流，污染物指标备注为二氧化硫原文描述的产污系数为 15S(无脱硫剂)。请根据备注自行核算后修改对应的排放量。
- sulfur dioxide: 0
  the Technical of end-of-pipe management technology for pollution sulfur dioxideisAmmonia method，Its Technical efficiency of end-of-pipe management92.5.The original article describes the pollution production coefficients as 4.5S(添加脱硫剂6)。Please revise the corresponding emissions after accounting for them according to the notes.。.The original article describes the pollution production coefficients as 4.5S(添加脱硫剂6). Please revise the corresponding emissions after accounting for them according to the notes.
  污染物指标二氧化硫的末端治理技术是氨法，其效率为92.5，末端治理设施实际运行率（k值）计算公式为K=脱硫设施年运行小时数/锅炉年运行小时数。原文件中描述污染物类别为废气，污染物指标为二氧化硫，此处对其进行了匹配工作，将其匹配到LCAflow库里面相最符合的流，污染物指标备注为二氧化硫原文描述的产污系数为 4.5S(添加脱硫剂6)。请根据备注自行核算后修改对应的排放量。
- sulfur dioxide: 0
  the Technical of end-of-pipe management technology for pollution sulfur dioxideisDouble alkali process，Its Technical efficiency of end-of-pipe management92.5.The original article describes the pollution production coefficients as 15S(无脱硫剂)。Please revise the corresponding emissions after accounting for them according to the notes.。.The original article describes the pollution production coefficients as 15S(无脱硫剂). Please revise the corresponding emissions after accounting for them according to the notes.
  污染物指标二氧化硫的末端治理技术是双碱法，其效率为92.5，末端治理设施实际运行率（k值）计算公式为K=除尘设施年运行小时数/锅炉年运行小时数。原文件中描述污染物类别为废气，污染物指标为二氧化硫，此处对其进行了匹配工作，将其匹配到LCAflow库里面相最符合的流，污染物指标备注为二氧化硫原文描述的产污系数为 15S(无脱硫剂)。请根据备注自行核算后修改对应的排放量。
- sulfur dioxide: 0
  the Technical of end-of-pipe management technology for pollution sulfur dioxideisDouble alkali process，Its Technical efficiency of end-of-pipe management92.5.The original article describes the pollution production coefficients as 4.5S(添加脱硫剂6)。Please revise the corresponding emissions after accounting for them according to the notes.。.The original article describes the pollution production coefficients as 4.5S(添加脱硫剂6). Please revise the corresponding emissions after accounting for them according to the notes.
  污染物指标二氧化硫的末端治理技术是双碱法，其效率为92.5，末端治理设施实际运行率（k值）计算公式为K=脱硫设施年运行小时数/锅炉年运行小时数。原文件中描述污染物类别为废气，污染物指标为二氧化硫，此处对其进行了匹配工作，将其匹配到LCAflow库里面相最符合的流，污染物指标备注为二氧化硫原文描述的产污系数为 4.5S(添加脱硫剂6)。请根据备注自行核算后修改对应的排放量。
- sulfur dioxide: 0
  the Technical of end-of-pipe management technology for pollution sulfur dioxideisFlue gas circulating fluidized bed method，Its Technical efficiency of end-of-pipe management85.The original article describes the pollution production coefficients as 15S(无脱硫剂)。Please revise the corresponding emissions after accounting for them according to the notes.。.The original article describes the pollution production coefficients as 15S(无脱硫剂). Please revise the corresponding emissions after accounting for them according to the notes.
  污染物指标二氧化硫的末端治理技术是烟气循环流化床法，其效率为85，末端治理设施实际运行率（k值）计算公式为K=除尘设施年运行小时数/锅炉年运行小时数。原文件中描述污染物类别为废气，污染物指标为二氧化硫，此处对其进行了匹配工作，将其匹配到LCAflow库里面相最符合的流，污染物指标备注为二氧化硫原文描述的产污系数为 15S(无脱硫剂)。请根据备注自行核算后修改对应的排放量。
- sulfur dioxide: 0
  the Technical of end-of-pipe management technology for pollution sulfur dioxideisFlue gas circulating fluidized bed method，Its Technical efficiency of end-of-pipe management85.The original article describes the pollution production coefficients as 4.5S(添加脱硫剂6)。Please revise the corresponding emissions after accounting for them according to the notes.。.The original article describes the pollution production coefficients as 4.5S(添加脱硫剂6). Please revise the corresponding emissions after accounting for them according to the notes.
  污染物指标二氧化硫的末端治理技术是烟气循环流化床法，其效率为85，末端治理设施实际运行率（k值）计算公式为K=脱硫设施年运行小时数/锅炉年运行小时数。原文件中描述污染物类别为废气，污染物指标为二氧化硫，此处对其进行了匹配工作，将其匹配到LCAflow库里面相最符合的流，污染物指标备注为二氧化硫原文描述的产污系数为 4.5S(添加脱硫剂6)。请根据备注自行核算后修改对应的排放量。
- sulfur dioxide: 0
  the Technical of end-of-pipe management technology for pollution sulfur dioxideisLimestone/lime-gypsum wet process，Its Technical efficiency of end-of-pipe management92.5.The original article describes the pollution production coefficients as 15S(无脱硫剂)。Please revise the corresponding emissions after accounting for them according to the notes.。.The original article describes the pollution production coefficients as 15S(无脱硫剂). Please revise the corresponding emissions after accounting for them according to the notes.
  污染物指标二氧化硫的末端治理技术是石灰石/石灰-石膏湿法，其效率为92.5，末端治理设施实际运行率（k值）计算公式为K=除尘设施年运行小时数/锅炉年运行小时数。原文件中描述污染物类别为废气，污染物指标为二氧化硫，此处对其进行了匹配工作，将其匹配到LCAflow库里面相最符合的流，污染物指标备注为二氧化硫原文描述的产污系数为 15S(无脱硫剂)。请根据备注自行核算后修改对应的排放量。
- sulfur dioxide: 0
  the Technical of end-of-pipe management technology for pollution sulfur dioxideisLimestone/lime-gypsum wet process，Its Technical efficiency of end-of-pipe management92.5.The original article describes the pollution production coefficients as 4.5S(添加脱硫剂6)。Please revise the corresponding emissions after accounting for them according to the notes.。.The original article describes the pollution production coefficients as 4.5S(添加脱硫剂6). Please revise the corresponding emissions after accounting for them according to the notes.
  污染物指标二氧化硫的末端治理技术是石灰石/石灰-石膏湿法，其效率为92.5，末端治理设施实际运行率（k值）计算公式为K=脱硫设施年运行小时数/锅炉年运行小时数。原文件中描述污染物类别为废气，污染物指标为二氧化硫，此处对其进行了匹配工作，将其匹配到LCAflow库里面相最符合的流，污染物指标备注为二氧化硫原文描述的产污系数为 4.5S(添加脱硫剂6)。请根据备注自行核算后修改对应的排放量。
- sulfur dioxide: 0
  the Technical of end-of-pipe management technology for pollution sulfur dioxideisMagnesium oxide method，Its Technical efficiency of end-of-pipe management92.5.The original article describes the pollution production coefficients as 15S(无脱硫剂)。Please revise the corresponding emissions after accounting for them according to the notes.。.The original article describes the pollution production coefficients as 15S(无脱硫剂). Please revise the corresponding emissions after accounting for them according to the notes.
  污染物指标二氧化硫的末端治理技术是氧化镁法，其效率为92.5，末端治理设施实际运行率（k值）计算公式为K=除尘设施年运行小时数/锅炉年运行小时数。原文件中描述污染物类别为废气，污染物指标为二氧化硫，此处对其进行了匹配工作，将其匹配到LCAflow库里面相最符合的流，污染物指标备注为二氧化硫原文描述的产污系数为 15S(无脱硫剂)。请根据备注自行核算后修改对应的排放量。
- sulfur dioxide: 0
  the Technical of end-of-pipe management technology for pollution sulfur dioxideisMagnesium oxide method，Its Technical efficiency of end-of-pipe management92.5.The original article describes the pollution production coefficients as 4.5S(添加脱硫剂6)。Please revise the corresponding emissions after accounting for them according to the notes.。.The original article describes the pollution production coefficients as 4.5S(添加脱硫剂6). Please revise the corresponding emissions after accounting for them according to the notes.
  污染物指标二氧化硫的末端治理技术是氧化镁法，其效率为92.5，末端治理设施实际运行率（k值）计算公式为K=脱硫设施年运行小时数/锅炉年运行小时数。原文件中描述污染物类别为废气，污染物指标为二氧化硫，此处对其进行了匹配工作，将其匹配到LCAflow库里面相最符合的流，污染物指标备注为二氧化硫原文描述的产污系数为 4.5S(添加脱硫剂6)。请根据备注自行核算后修改对应的排放量。
- sulfur dioxide: 0
  the Technical of end-of-pipe management technology for pollution sulfur dioxideisSodium alkali method，Its Technical efficiency of end-of-pipe management92.5.The original article describes the pollution production coefficients as 15S(无脱硫剂)。Please revise the corresponding emissions after accounting for them according to the notes.。.The original article describes the pollution production coefficients as 15S(无脱硫剂). Please revise the corresponding emissions after accounting for them according to the notes.
  污染物指标二氧化硫的末端治理技术是钠碱法，其效率为92.5，末端治理设施实际运行率（k值）计算公式为K=除尘设施年运行小时数/锅炉年运行小时数。原文件中描述污染物类别为废气，污染物指标为二氧化硫，此处对其进行了匹配工作，将其匹配到LCAflow库里面相最符合的流，污染物指标备注为二氧化硫原文描述的产污系数为 15S(无脱硫剂)。请根据备注自行核算后修改对应的排放量。
- sulfur dioxide: 0
  the Technical of end-of-pipe management technology for pollution sulfur dioxideisSodium alkali method，Its Technical efficiency of end-of-pipe management92.5.The original article describes the pollution production coefficients as 4.5S(添加脱硫剂6)。Please revise the corresponding emissions after accounting for them according to the notes.。.The original article describes the pollution production coefficients as 4.5S(添加脱硫剂6). Please revise the corresponding emissions after accounting for them according to the notes.
  污染物指标二氧化硫的末端治理技术是钠碱法，其效率为92.5，末端治理设施实际运行率（k值）计算公式为K=脱硫设施年运行小时数/锅炉年运行小时数。原文件中描述污染物类别为废气，污染物指标为二氧化硫，此处对其进行了匹配工作，将其匹配到LCAflow库里面相最符合的流，污染物指标备注为二氧化硫原文描述的产污系数为 4.5S(添加脱硫剂6)。请根据备注自行核算后修改对应的排放量。
- sulfur dioxide: 0
  the Technical of end-of-pipe management technology for pollution sulfur dioxideisSpray drying process，Its Technical efficiency of end-of-pipe management70.The original article describes the pollution production coefficients as 15S(无脱硫剂)。Please revise the corresponding emissions after accounting for them according to the notes.。.The original article describes the pollution production coefficients as 15S(无脱硫剂). Please revise the corresponding emissions after accounting for them according to the notes.
  污染物指标二氧化硫的末端治理技术是喷雾干燥法，其效率为70，末端治理设施实际运行率（k值）计算公式为K=除尘设施年运行小时数/锅炉年运行小时数。原文件中描述污染物类别为废气，污染物指标为二氧化硫，此处对其进行了匹配工作，将其匹配到LCAflow库里面相最符合的流，污染物指标备注为二氧化硫原文描述的产污系数为 15S(无脱硫剂)。请根据备注自行核算后修改对应的排放量。
- sulfur dioxide: 0
  the Technical of end-of-pipe management technology for pollution sulfur dioxideisSpray drying process，Its Technical efficiency of end-of-pipe management70.The original article describes the pollution production coefficients as 4.5S(添加脱硫剂6)。Please revise the corresponding emissions after accounting for them according to the notes.。.The original article describes the pollution production coefficients as 4.5S(添加脱硫剂6). Please revise the corresponding emissions after accounting for them according to the notes.
  污染物指标二氧化硫的末端治理技术是喷雾干燥法，其效率为70，末端治理设施实际运行率（k值）计算公式为K=脱硫设施年运行小时数/锅炉年运行小时数。原文件中描述污染物类别为废气，污染物指标为二氧化硫，此处对其进行了匹配工作，将其匹配到LCAflow库里面相最符合的流，污染物指标备注为二氧化硫原文描述的产污系数为 4.5S(添加脱硫剂6)。请根据备注自行核算后修改对应的排放量。

## Use advice
This dataset is derived from the Pollution Source Census Report and contains information on pollution emissions and related products. However, it does not include data on energy or chemical consumption, nor does it provide information on waste or co-product generation. When utilizing this dataset, please supplement the missing data based on actual conditions before use
该数据集来源于污染源普查报告，包含污染物排放及相关产品信息，但不包含能源或化学品消耗数据，也不提供废弃物或共生产物产生信息。在使用该数据集时，请根据实际情况补充缺失数据后再使用。

## Review details
Inventory: The internal review was done by several iteration steps concerning raw data validation, raw data documentation, representativity, completeness and consistency of modelling with regard to ISO 14040 and 14044.
清单： 内部审查通过几个迭代步骤完成，涉及原始数据验证、原始数据记录、代表性、完整性、与 ISO 14040 和 14044 有关的建模的一致性。

## Data sources
- 第二次全国污染源普查产排污核算系数手册（试用版）,四级代码4430文件，在完整版文件中第5426页
