# cement production|cement, ordinary portland cement, 42.5MPa

Dataset: ILCD process, LCI结果
Geography: BJ-CN
Reference year: 2008
Classification: Materials production / Other mineralic materials
Generated by: Siqi Yang
Amounts: no units in this file; such an amount is in the reference unit of its flow, which a separate flow dataset defines
copyright: false

## General comment
The coal consumption of this cement factory includes two parts: coal for clinker calcination and coal for supplementary firing of waste heat power generation boilers.

## Geography
Beijing Liulihe Cement Plant

## Model description
The performance of 1 kg of 42.5 ordinary silicate cement is defined as a functional unit; the scope of the study includes the production processes from raw material extraction, energy production, raw meal preparation, clinker calcination, up to cement grinding.

## Reference product
- cement, ordinary portland cement, 42.5MPa: 1000
  42.5 Ordinary portland cement.

## Inputs
All rows: measured
- calcium carbonate: 1060
  Limestone
- sandstone: 90.4
  Sandstone
- iron: 61.6
  Iron
- bauxite: 65.3
  Bauxite
- gypsum: 76.1
  Gupsum
- hard coal, run-of-mine: 394
  Coal consumption
- heavy fuel oil: 7.15
  The original literature is fuel oil consumption (i.e. heavy oil).
- natural gas, high pressure: 0.657
  Natural gas

## Outputs
- carbon dioxide: 846; article inperiodical
  CO2. The main sources of CO2 emissions are from the combustion of fossil fuels such as fuel and coal, as well as the decomposition of limestone in raw materials used in cement production. (1) The formula for estimating the amount of CO2 emissions from fossil fuel combustion is E = 3.67FQka, where E is the amount of CO2 emissions (kg), F is the amount of fuel consumption (kg), Q is fuel heat (MJ/kg), k is the carbon emission coefficient of the fuel, and a is the fuel carbon oxidation rate. (2) During cement production, the chemical reaction of raw material limestone produces a large amount of CO2, the chemical reaction formula is as follows CaCO3→CaO+CO2↑, the calcium carbonate content of limestone is estimated at 96%, 1kg decomposition generates about 0.54kg of CaO, and 0.42kg of CO2 is generated. The formula for estimating CO2 emissions is CO2 emissions = limestone consumption × CaCO3 content × (CO2 molecular weight/CaCO3 molecular weight) + E.
- Nitrogen oxides: 3.4; article inperiodical
  The NOx emission estimation formula is E = 0.001Fa (1-rf), where E is the amount of NOx emissions (kg), F is the amount of fuel consumption (kg), a is the NOx emission factor during fuel combustion, r is the coverage of nitrogen removal equipment, and f is the average nitrogen removal efficiency. Currently, there are few nitrogen removal equipment in China, so nitrogen removal is not considered. The emission factors for raw coal and crude oil are 9.95 kg/t and 7.24 kg/t, respectively, and for natural gas it is 4.1 g/m3.
- sulfur dioxide: 2.24; article inperiodical
  The formula for estimating SO2 emissions is E = Fa (1-rf), where E is the amount of SO2 emissions (kg), F is the amount of fuel consumption (kg), a is the SO2 emission factor during fuel combustion, r is the coverage rate of desulfurization equipment, and f is the average desulfurization efficiency. Emission factor of SO2, raw coal is taken as (1.05E-2) kg/kg.
- carbon monoxide: 0.59; article inperiodical
  The formula for estimating CO emissions is E = Fqa, where E is the amount of CO emissions (kg), F is the amount of fuel consumption (kg), a is the CO emission factor during fuel combustion, and Q is the fuel heat content (MJ/kg). The CO emission factor for raw coal generation is taken as 106kg/MJ.
- particles (> PM10): 24.5; measured
  Dust, with an unspecified particle size, is treated as PM > 10 micrometers in diameter.

## Deviations from the LCI method approaches
Primary resource consumption for resource and energy production and the basic data for cement production at Beijing Liulihe Cement Plant were used to calculate the LCI data for each unit process.

## Data selection and combination
The primary resource consumption adopts the life cycle emission data of resource and energy production in China calculated by Di Xianghua. Basic cement production data (process resources, energy consumption) of Beijing Liulihe Cement Plant.

## Data treatment and extrapolations
Energy consumption and atmospheric pollutant data: cumulative data for unit processes.

## Data sources
- 姜德义, 苍大强, 关生林, 吴红, 崔素萍, & 王志宏. (2008). 北京典型水泥企业生产过程环境负荷评价. 武汉理工大学学报, 4, 36–39.
