# Wet steaming cotton dyeing and finishing processing ; printing and dyeing cotton ; pad dyeing ; reactive dyes

Dataset: ILCD process, Unit process, single operation
Geography: SZ-JS-CN
Reference year: 2012
Classification: Unit processes / Materials production / Organic chemicals
Generated by: Yingfan Duan, 1300925579@qq.com
Owner: Tiangong LCI Data Working Group
Review: Dependent internal review by Tiangong LCI Data Working Group
Amounts: no units in this file; such an amount is in the reference unit of its flow, which a separate flow dataset defines
copyright: false
licenseType: Free of charge for all users and uses

## General comment
"Reactive dyes are a type of dye capable of forming a covalent bond with fibers, particularly well-suited for dyeing cotton fibers. They typically require application under alkaline conditions to ensure the dye thoroughly binds with the fibers, enhancing the permanence of the dyeing effects. In the roller dyeing process, research indicates that the energy consumption for dyeing with reactive dyes constitutes 47% of the total process energy consumption."

## Geography
The study focuses on a printing and dyeing enterprise in Jiangsu Province, located in Changshu within the Yangtze River Delta Economic Zone.

## Technical purpose
The wet steaming cotton dyeing and finishing process described is specifically used for pad dyeing cotton fabrics with reactive dyes in the textile industry. The process involves energy-intensive operations such as singeing, desizing, mercerizing, scouring, bleaching, and drying. The use of coal in steam and thermal oil boilers is intended to generate steam and maintain higher operating temperatures required by these operations.

## Reference product
- Cotton Fabric: 78.3; measured

## Inputs
- Electricity: 449; measured
- Standard coal: 922; measured
- Crude coal: 105; calculated
- Cleaned coal: 260; calculated
- Fuel Oil: 2.24; calculated
- heavy fuel oil: 0.673; calculated
- Diesel oil: 3.08; calculated
- Coke Oven Gas: 4.1; calculated
- natural gas: 0.0526; calculated
- process steam: 2.96e7; measured
- sodium chloride: 800; measured
- sodium carbonate: 160; calculated
- Chemicals (unspecified): 70; measured
  LE-500
- Soap Detergent: 12; measured
- Reactive Dye: 114; measured
- river water: 52100; measured
- freshwater: 2160; measured

## Outputs
- carbon dioxide (fossil): 2670; calculated
- carbon monoxide (fossil): 0.323; calculated
- sulfur dioxide: 2.01; calculated
- methane (fossil): 12.8; calculated
- Nitrogen oxides: 0.723; calculated
- nitrous oxide: 0.0408; measured
- particles (> PM10): 0.954; calculated
- ammonia: 0.000117; measured
- non-methane volatile organic compounds: 0.0162; measured
- waste water - untreated: 54200; measured
- chemical oxygen demand: 61.8; calculated
- Suspended solids, unspecified,Suspended solids, unspecified: 6.65; calculated
- lead: 8.24e-6; calculated
- mercury: 1.73e-7; calculated
- fluorine: 1.56e-6; calculated
- cadmium: 3.06e-7; calculated
- arsenic: 7.05e-6; calculated

## Use advice
When utilizing this dataset for Life Cycle Assessments, it is necessary to properly allocate energy consumption based on the reported proportion of energy use for dyeing relative to the total process energy consumption, which is 47%. Consider the reported coal consumption ratio for the two types of boilers, 17:1, in your calculations. It is essential to ensure methodological consistency in system boundaries by assessing the steam usage in each step of the process according to the provided steam usage ratio of 2:1:1:1:1:2. This data should be contextualized within the regional economic conditions of the Changshu area, located in the Yangtze River Delta economic zone of Jiangsu Province.

## Review details
Inventory: The internal review was done by several iteration steps concerning raw data validation, raw data documentation, representativity, completeness and consistency of modelling with regard to ISO 14040 and 14044.

## Data sources
- 朱亚楠. 棉布连续轧染工艺生命周期环境影响评价. (南京大学, 2012).
