# raw meal preparation;raw meal;new dry process, >4000 t/d

Dataset: ILCD process, Unit process, single operation
Geography: CN
Reference year: 2020
Classification: Energy carriers and technologies / Heat and steam
Generated by: Siqi Yang, ysqsophia@gmail.com
Owner: Tiangong LCI Data Working Group
Review: Dependent internal review by Tiangong LCI Data Working Group
Amounts: no units in this file; such an amount is in the reference unit of its flow, which a separate flow dataset defines
copyright: false
licenseType: Free of charge for all users and uses

## General comment
The new dry process has a relatively large market share in the cement industry process. The contaminant in the raw material preparation process is particulate matter.

## Technical purpose
The new dry process described is utilized in the cement industry, specifically for the creation of raw meal used in the production of P·O 42.5 type cement clinker. The process is designed to handle a throughput of more than 4000 tons per day of raw meal. Its application is targeted towards large-scale cement manufacturing facilities where pollution control for particulate matter is critical during raw meal preparation.

## Model description
Taking P·O 42.5 type cement clinker as the research object, the functional unit and base flow are the production of 1.00 tons of cement clinker, and the base year is 2020. The system boundary is the unit process of raw meal preparation (raw material mining, raw material pretreatment and homogenization, raw meal grinding and raw meal homogenization). The real-life process ranges from raw material preprocessing and batching to raw meal homogenization.

## Reference product
- raw meal: 1000
  Raw materials

## Inputs
- limestone, crushed, for mill: 782.191
  Limestone
- shale: 141.355
  Shale
- sandstone: 61.3713
  Sandstone
- iron, powder: 15.0834
  Iron powder
- electricity, medium voltage: 57.7873
  Electricity. Electricity is supplied from power plants.

## Outputs
- particles (> PM10): 0.0129523
  Particulate matter, with an unspecified particle size, is treated as PM > 10 micrometers in diameter. The particulate matter collected by the bag filter is returned to the raw material homogenization stage through the recycling system, and the solid waste generated during the process can be effectively recycled and reused.

## Deviations from the LCI method approaches
Data on limestone mining, shale mining, sandstone mining, iron powder production, coal mining, electricity and tap water production, and direct pollutant emissions were obtained from the CLCD-China-ECER 0.8 database.

## Data selection and combination
In addition to CO2, other data come from corporate reports such as Gaoan Red Lion and Jiangxi De'an Evergreen, the cement industry's cleaner production evaluation index system, and cement clinker research papers.

## Use advice
When utilizing this LCA data for the new dry process in cement production, adherence to the CLCD trade-off principles is essential, as outlined: neglect upstream production data of raw materials weighing less than 1% of the product; ignore upstream production of waste or low-value waste materials; generally overlook production equipment, buildings, amenities; and do not ignore known emissions within the environmental impact scope. This dataset is derived from the CLCD-China-ECER 0.8 database. Consider the technology's representativeness and the specific geographical location when applying this data. Pay special attention to the inventory uncertainty assessments and the uncertainty impacts calculated using analytical formulae to reflect accurate LCA results.

## Review details
Inventory: The internal review was done by several iteration steps concerning raw data validation, raw data documentation, representativity, completeness and consistency of modelling with regard to ISO 14040 and 14044.

## Data sources
- 陆柳鲜. (2022). 江西省多源有色冶炼固废资源化过程生命周期评价研究 [硕士, 江西理工大学].
