# Electricity production ; Electricity mix ; Jilin

Dataset: ILCD process, Unit process, single operation
Geography: JL-CN
Reference year: 2019
Classification: Unit processes / Energy carriers and technologies / Electricity
Generated by: Ruoxi Xiong, xiongrx0126@163.com
Owner: Tiangong LCI Data Working Group
Review: Dependent internal review by Tiangong LCI Data Working Group
Amounts: no units in this file; such an amount is in the reference unit of its flow, which a separate flow dataset defines
copyright: false
licenseType: Free of charge for all users and uses

## General comment
Electricity mix includes thermal, hydro, wind, nuclear and solar generation

## Technical purpose
This dataset describes the electricity mix used in Jilin, which includes a blend of thermal, hydroelectric, wind, nuclear, and solar power generation. This electricity is utilized for multiple applications ranging from residential and commercial power supply to industrial processes that require a reliable electricity source.

## Reference product
- Electricity: 3.6; missing unimportant
  [{'text': '能量', 'type': 'text'}]

## Inputs
All rows: missing unimportant
- electricity for thermal power: 2.7379
  [{'text': '能量', 'type': 'text'}]
- electricity from hydroelectric power plant: 0.260183
  [{'text': '能量', 'type': 'text'}]
- electricity for nuclear power: 0
  [{'text': '能量', 'type': 'text'}]
- electricity from wind power: 0.446584
  [{'text': '能量', 'type': 'text'}]
- electricity for solar power: 0.155333
  [{'text': '能量', 'type': 'text'}]

## Use advice
When utilizing this dataset for Life Cycle Assessment, careful consideration should be given to the specific blend of electricity sources provided. The mix should reflect the actual energy consumption profile for the assessed process and life cycle stage. It's also crucial to consider temporal variations and any grid-specific policies or changes that might affect the generation mix over time.

## Review details
Inventory: The internal review was done by several iteration steps concerning raw data validation, raw data documentation, representativity, completeness and consistency of modelling with regard to ISO 14040 and 14044.

## Data sources
- 能源统计年鉴2020
