# Soil remediation ; ex situ remediation ; Biopile ; Project implementation ; Backfilling ; Remedied site

Dataset: ILCD process, Unit process, single operation
Geography: KR
Reference year: 2011
Classification: Unit processes / Other Services / Repair and maintenance
Generated by: Sang Chunhui, sangch@mail.bnu.edu.cn
Owner: Tiangong LCI Data Working Group
Review: Dependent internal review by Tiangong LCI Data Working Group
Amounts: no units in this file; such an amount is in the reference unit of its flow, which a separate flow dataset defines
copyright: false
licenseType: Free of charge for all users and uses

## General comment
After repair, backfill the soil to the original excavation pit

## Technical purpose
The described process is used for soil remediation through ex situ biopile treatment. This involves the excavation of contaminated soil which is then treated externally and biologically to reduce pollutants. The treated soil is backfilled into the original excavation pit. It is typically applied to sites contaminated with organic pollutants, where it's necessary to restore the soil's environmental quality for either general or specific land-use requirements.

## Reference product
- Remedied site: 200; estimated

## Inputs
- Diesel: 0.803; estimated
- Remediated soil: 10000; estimated

## Use advice
When using this dataset for LCA analysis, ensure all input materials and energy listed in the associated remedial system standardization report are included. Account for the transportation of excavated soil and any emissions associated with the biopile treatment. If the treated soil is reused, consider potential benefits such as avoided use of virgin materials. Do not include the impact of constructing the remediation facility itself if it is out of the scope of your study.

## Review details
Inventory: The internal review was done by several iteration steps concerning raw data validation, raw data documentation, representativity, completeness and consistency of modelling with regard to ISO 14040 and 14044.

## Data sources
- Jeong, S.-W. & Suh, S.-W. Assessment of Environmental Impacts and CO 2 Emissions from Soil Remediation Technologies using Life Cycle Assessment - Case Studies on SVE and Biopile Systems -. Journal of Korean Society of Environmental Engineers 33, 267–274 (2011).
