# Remediated soil ; Soil remediation ; Laboratory research ; Bioslurry ; TPH contaminated soil

Dataset: ILCD process, Unit process, single operation
Geography: IT
Reference year: 2023
Classification: Unit processes / Other Services / Repair and maintenance
Functional unit: The functional unit for this study is related to treated soil polluted with petroleum hydrocarbons using bioslurry (100 g, 36.5 kWh). The initial concentration of total petroleum hydrocarbons is 4500 mg/kg.
Generated by: Yang Xintong, yangxt@caep.org.cn
Owner: Tiangong LCI Data Working Group
Review: Dependent internal review by Tiangong LCI Data Working Group
Amounts: no units in this file; such an amount is in the reference unit of its flow, which a separate flow dataset defines
copyright: false
licenseType: Free of charge for all users and uses

## General comment
Transfer the contaminated soil to a bioreactor, mix it with water to form a slurry, adjust the appropriate pH, and add a certain amount of nutrients and surfactants. At the same time, air is blown into the bottom for oxygenation, meeting the oxygen needs of microorganisms while allowing them to fully contact pollutants and accelerate their degradation. After degradation is completed, filter and dehydrate the soil

## Geography
This study is based on indoor experiments, where the author's hometown is filled in.

## Technology and included processes
Degradation studies were conducted in mesocosm consisting of bioslurry reactors using 100 g of soil polluted with diesel oil suspended in 500 mL of distilled water with a 1:5 soil-to-water ratio. They stimulated with 1.5 g NH4Cl and 0.1 g KH2PO4 + 5 g/L of activated sludge + supplemented with crude novel rhamnolipids (275 mL). 1 L Erlenmeyer/conical flasks were used as bioreactors with constant mixing by mechanical mixers at 150 rpm to ensure substrate availability and oxygen transfer for about 20 days. The analyses revealed that the combination of activated sludge, nutrients, and biosurfactant showed a 79.4 % reduction in TPHs after 20 days in the mesocosm experiment.

## Technical purpose
This detailed LCA data pertains to a laboratory-scale soil remediation process where bioslurry reactors are utilized to treat petroleum hydrocarbon-contaminated soil. The process is suited for experimental research purposes and provides a basis for potential upscaled industrial applications in the environmental engineering sector, such as large-scale soil decontamination projects.

## Reference product
- Remediated soil: 1

## Inputs
- Deionized Water: 0.225; normal
- Ammonium Chloride: 0.0015; normal
- Potassium Dihydrogen Phosphate: 0.0001; normal
- Biosurfactant: 0.000225; normal
- Digested Sludge,Digester sludge: 0.005; normal
- Electricity: 129.6; normal
- contaminated soil: 1

## Outputs
- Wastewater: 0.0004; normal

## Use advice
Users should apply this data for laboratory-level soil remediation scenarios only and not extrapolate to field-level without proper scaling and modifications. The system's low maintenance and resource requirements are specific to the lab setting; large-scale applications will differ significantly. Special attention should be given to the correct proportioning of soils, nutrients, and biosurfactants and continuous monitoring of process parameters such as pH and oxygen transfer rates. It is crucial to consider the inoculum cultivation and chemical usage on upscaling the process, which are excluded in this LCA data set.

## Review details
Inventory: The internal review was done by several iteration steps concerning raw data validation, raw data documentation, representativity, completeness and consistency of modelling with regard to ISO 14040 and 14044.

## Data sources
- Gebregiorgis T A ,Francesca F ,Silvia S , et al. Life cycle assessment of bioslurry and bioelectrochemical processes for sustainable remediation of soil polluted with petroleum hydrocarbons: An experimental study [J]. Sustainable Production and Consumption, 2023, 36 416-424.
