# Electrodialysis module production ; spiral-wound, CN

Dataset: ILCD process, Unit process, single operation
Geography: CN
Reference year: 2023
Classification: Materials production / Other materials
Functional unit: 1 item of electrodialysis module
Generated by: Jiaqi Lu, wilsherelu@foxmail.com
Owner: Tiangong LCI Data Working Group
Review: Dependent internal review by Tiangong LCI Data Working Group
Amounts: no units in this file; such an amount is in the reference unit of its flow, which a separate flow dataset defines
copyright: false
licenseType: Free of charge for all users and uses

## General comment
This electrodialysis module with spiral-wound configuration is used for the separation of electrolytes from aqueous solutions. Suitable for processes such as water treatment, salt production, and waste brine purification in industrial applications.

## Reference product
- Electrodialysis Component: 1; input; article inperiodical
  ED components

## Inputs
All rows: article inperiodical
- Anion exchange resin: 8.45
  anion exchange membrane
- Cation Exchange Resin: 9.49
  cation exchange membrane
- Titanium Ruthenium Electrode: 1.8
  Titanium coated ruthenium anode
- Titanium Coated Ruthenium Cathode: 1.1
  Titanium coated ruthenium cathode
- UPVC Casing: 8.5
  (UPVC) cathode casing
- UPVC Casing: 49.8
  UPVC casing
- electricity mix: 594
  Process power consumption

## Outputs
All rows: article inperiodical
- Anion exchange resin: 0.00845
  anion exchange membrane
- Cation Exchange Resin: 0.00949
  cation exchange membrane
- Titanium Ruthenium Electrode: 0.0018
  Titanium coated ruthenium anode
- Titanium Coated Ruthenium Cathode: 0.0011
  Titanium coated ruthenium cathode
- UPVC Casing: 0.0085
  (UPVC) cathode casing
- UPVC Casing: 0.0498
  UPVC casing

## Use advice
When utilizing this data set for life cycle assessment, consider the specific energy consumption and maintenance requirements of the electrodialysis process. Include provisions for the end-of-life treatment of the modules, such as recycling or disposal impact. Ensure that the geographical relevance of the data set (CN unit process) corresponds to the region of the LCA application.

## Review details
Inventory: The internal review was done by several iteration steps concerning raw data validation, raw data documentation, representativity, completeness and consistency of modelling with regard to ISO 14040 and 14044.

## Data sources
- Xue, N. et al. Carbon footprint analysis and carbon neutrality potential of desalination by electrodialysis for different applications. Water Res. 232, 119716 (2023).
