# Bioethanol ; Fungi

Dataset: ILCD process
Geography: GLO
Classification: Energy carriers and technologies / Renewable fuels
Generated by: Jiayi Yuan, jiayi_y@mail.bnu.edu.cn
Owner: Tiangong LCI Data Working Group
Review: Dependent internal review by Tiangong LCI Data Working Group
Amounts: no units in this file; such an amount is in the reference unit of its flow, which a separate flow dataset defines
licenseType: Free of charge for all users and uses

## General comment
This bioethanol produced using fungi is intended for use as a renewable energy source. It can be blended with gasoline to create a biofuel for transportation, or used in its pure form in flexible-fuel vehicles. Additionally, it may serve as a feedstock for chemical synthesis in the production of biodegradable plastics, pharmaceuticals, and other bio-based products.

## Inputs
All rows: uniform; missing unimportant
- Electricity: 0
- heat: 376; min 254; max 540
- Electricity: 71.28; max 96.84
- heat: 4230; min 1040; max 5220
- Electricity: 124.2; min 76.68; max 181.08

## Outputs
- heat: 0; uniform; missing unimportant

## Use advice
When utilizing this data for life cycle assessment, users should consider the agricultural practices for the cultivation of fungi, including resource inputs like water and energy. Attention should be paid to the potential allocation of environmental impacts between the bioethanol and any co-products when applying the data. Depending on the geographical context, extrapolation of the data might require adjustment due to climatic, procedural, or technological variability.

## Review details
Inventory: The internal review was done by several iteration steps concerning raw data validation, raw data documentation, representativity, completeness and consistency of modelling with regard to ISO 14040 and 14044.
