# Municipal sludge treatment and disposal;wet sludge moisture content 76.2%;incineration

Dataset: ILCD process, Unit process, single operation
Geography: XA-SAX-CN
Classification: End-of-life treatment / Other end-of-life services
Functional unit: The residual sludge sludge of Xi'an No. 3 Sewage Treatment Plant has a moisture content of 76.2% and a functional unit of 1t residual sludge.
Generated by: Jin Sitian, 2331276@tongji.edu.cn
Owner: Tiangong LCI Data Working Group
Review: Dependent internal review by Tiangong LCI Data Working Group
Amounts: no units in this file; such an amount is in the reference unit of its flow, which a separate flow dataset defines
licenseType: Free of charge for all users and uses

## General comment
The provided data set describes the municipal sludge treatment and disposal process specifically for wet sludge with a moisture content of 76.2% by means of incineration. This process is carried out at the Xi'an No. 3 Sewage Treatment Plant and is a critical component in managing the plant's residual sludge by reducing volume and potentially eliminating pathogens and organic substances. The resulting ash could be used for various applications, such as in construction materials or landfill cover.

## Geography
Xi'an No. 3 Sewage Treatment Plant

## Reference product
- Sludge: 1000; input; estimated
  1t of remaining sludge with a moisture content of 76.2%

## Inputs
- Electricity: 554.508; measured

## Outputs
All rows: measured
- carbon dioxide: 268.35
- Nitrogen oxides: 2.753
- sulfur dioxide: 4.538
- carbon monoxide: 1.035
- methane: 0.01228
- nitrous oxide: 0.01079
- volatile organic compound: 0.0119
- Flue dust: 2.355
- mineral waste (ash): 105.87
- lead: 0.01044
- cadmium: 0.000723
- zinc: 0.065
- copper: 0.01444
- nickel: 0.00144
- chromium: 0.00476

## Use advice
When using this data set for Life Cycle Assessment (LCA) of products or services involving the treatment and disposal of municipal sludge, users should consider the specific characteristics of the wet sludge with a moisture content of 76.2%. Users must take into account the environmental impacts of the incineration process and any subsequent use of residual ash. It is imperative to follow local regulations regarding waste treatment and disposal. Any extrapolation of data must be cautiously made by keeping the technological applicability and geographical context in mind.

## Review details
Inventory: The internal review was done by several iteration steps concerning raw data validation, raw data documentation, representativity, completeness and consistency of modelling with regard to ISO 14040 and 14044.

## Data sources
- 齐星昊. 基于生命周期评价的典型剩余污泥处理方法的环境影响比较研究[D].河南师范大学,2020.
