# Wet steaming cotton dyeing and finishing ; printing and dyeing cotton ; pad dyeing ; Shilin dye

Dataset: ILCD process, Unit process, single operation
Geography: SZ-JS-CN
Reference year: 2012
Classification: Unit processes / Materials production / Organic chemicals
Generated by: Yingfan Duan, 1300925579@qq.com
Owner: Tiangong LCI Data Working Group
Review: Dependent internal review by Tiangong LCI Data Working Group
Amounts: no units in this file; such an amount is in the reference unit of its flow, which a separate flow dataset defines
copyright: false
licenseType: Free of charge for all users and uses

## General comment
"Reducing dyes refer to dyes that color fibers by undergoing reduction under alkaline conditions, followed by oxidation to restore the original insoluble dye on the fibers. This process is employed for dyeing cellulose fibers. Insoluble reducing dyes are converted into sodium sulfate esters to become soluble, mainly utilized in the printing of cotton fabrics. In the roller dyeing process, research indicates that the energy consumption for dyeing with Soling dyes constitutes 53% of the total process energy consumption."

## Geography
The study focuses on a printing and dyeing enterprise in Jiangsu Province, located in Changshu within the Yangtze River Delta Economic Zone.

## Technical purpose
The process described is used in the textile industry, specifically for pad dyeing of cotton fabric using Shilin dyes. It involves wet steaming dyeing and finishing steps integral to the production of dyed cotton materials. Typical applications include the creation of colored textiles for use in the manufacturing of clothing, home furnishings, and other fabric-based articles requiring durability and colorfastness. The high energy consumption highlighted in the dyeing step indicates that this process is suitable for facilities capable of large-scale operation where energy efficiency measures can be applied.

## Reference product
- Cotton Fabric: 88.3; measured

## Inputs
- Electricity: 507; measured
- Standard coal: 1040; measured
- Crude coal: 118; calculated
- Cleaned coal: 293; calculated
- Fuel Oil: 2.52; calculated
- heavy fuel oil: 0.759; calculated
- Diesel oil: 3.47; calculated
- Coke Oven Gas: 4.63; calculated
- natural gas: 0.0593; calculated
- process steam: 3.34e7; measured
- Chemicals (unspecified): 25; measured
  LE-500
- Soap Detergent: 8; measured
- sodium hydroxide: 250; measured
- Sodium hydrosulfite: 100; measured
- Vat dye: 63.1; measured
- river water: 41300; measured
- freshwater: 2440; measured

## Outputs
- carbon dioxide (fossil): 3010; calculated
- carbon monoxide (fossil): 0.357; calculated
- sulfur dioxide: 2.26; calculated
- methane (fossil): 14.4; calculated
- Nitrogen oxides: 0.784; calculated
- nitrous oxide: 0.046; measured
- particles (> PM10): 1.07; calculated
- ammonia: 0.000109; measured
- non-methane volatile organic compounds: 0.0158; measured
- waste water - untreated: 42900; measured
- chemical oxygen demand: 48.9; calculated
- Suspended solids, unspecified,Suspended solids, unspecified: 5.28; calculated
- lead: 9.29e-6; calculated
- mercury: 1.95e-7; calculated
- fluorine: 1.76e-6; calculated
- cadmium: 3.45e-7; calculated
- arsenic: 7.95e-6; calculated

## Use advice
When utilizing the provided data, users should account for the proportion of energy consumed by the dyeing process relative to the entire operation as it represents a significant portion (53%). Specific attention should be given to the energy usage in steam and thermal oil boilers, with a consumption ratio of 17:1. The steam consumption pattern in various processing stages (scouring, bleaching, mercerizing, sueding, flat washing, backing, and pad dyeing) should follow the ratio 2:1:1:1:1:2. It is imperative to model energy consumption based on these ratios, especially when considering environmental impacts and implementing cleaner production measures. Users are advised to apply this data in the context of Jiangsu Province's textile industry practices and constraints.

## Review details
Inventory: The internal review was done by several iteration steps concerning raw data validation, raw data documentation, representativity, completeness and consistency of modelling with regard to ISO 14040 and 14044.

## Data sources
- 朱亚楠. 棉布连续轧染工艺生命周期环境影响评价. (南京大学, 2012).
