# cement production;cement, ordinary portland cement, 52.5MPa;dry process rotary kiln, incineration of waste

Dataset: ILCD process, Unit process, black box
Geography: BJ-CN
Classification: Materials production / Other mineralic materials
Generated by: Siqi Yang, ysqsophia@gmail.com
Owner: Tiangong LCI Data Working Group
Review: Dependent internal review by Tiangong LCI Data Working Group
Amounts: no units in this file; such an amount is in the reference unit of its flow, which a separate flow dataset defines
copyright: false
licenseType: Free of charge for all users and uses

## General comment
Incineration of waste. The environmental impact of waste incineration in a new dry process rotary kiln system is analyzed.

## Geography
A cement plant under Beijing Jinyu Group in Beijing

## Technical purpose
This dataset describes the production of ordinary Portland cement (OPC) with a strength of 52.5MPa using a new dry precalciner kiln technology. This type of cement is primarily used for construction purposes requiring high-strength concrete, such as commercial and residential buildings, infrastructure projects, and other civil engineering constructions. The kiln's co-processing capabilities allow for the incineration of waste, utilizing waste as an alternative fuel and raw material (AFR) in cement manufacturing.

## Model description
Combined with the characteristics of the cement production process itself, the research scope is defined as: from raw material entering the factory, raw material pretreatment, raw meal grinding, raw meal calcination, clinker grinding, until cement homogenization, storage, and packaging. The production and processing process of raw materials is not considered here, only the impact of the production process on the environment is considered, that is, the process of direct raw material consumption and direct waste emissions. Taking the performance of 1 ton of 525# ordinary Portland cement as a functional unit, 1Fu=52.5tMPa.

## Reference product
- cement, ordinary portland cement, 52.5MPa: 1000
  P.O. 52.5 Cement

## Inputs
- limestone, crushed, for mill: 1318.5
  limestone
- clay: 94.5
  clay-based raw materials
- iron, powder: 27
  Iron correction raw material
- gypsum stone (CaSO4-dihydrate): 60
  The proportion of gypsum is 5.5%
- mixed materials, mineral: 200
  Mixed material
- industrial waste (unspecified): 12.5; min 10; max 15; uniform
  Industrial waste
- hard coal; 26.3 MJ/kg: 120
  Coal consumption
- electricity, medium voltage: 363.6
  Electricity consumption
- hard coal: 129.156
  Standard coal. The original text refers to the consumption of fuel oil (L), which is converted to the equivalent amount of standard coal. The original data is 120kg standard coal, here converted to hard coal, the conversion formula is 1kg hard coal = 0.929kg standard coal.

## Outputs
- Nitrogen oxides: 1.43
  NOx
- sulfur dioxide: 0.003
  SO2
- hydrogen chloride: 0.00945
  HCI
- fluorine: 0.000685
  F
- particles (> PM10): 0.0098
  Smoke, with an unspecified particle size, is treated as PM > 10 micrometers in diameter.
- mercury: 1.55e-6; min 1.3e-6; max 1.8e-6; uniform
  Hg
- arsenic: 5.1e-5; min 1.3e-5; max 8.9e-5; uniform
  AS
- chromium: 2.6e-5
  Cr
- copper: 3.53e-5; min 2.6e-6; max 6.8e-5; uniform
  With
- lead: 5.25e-5; min 2.6e-5; max 7.9e-5; uniform
  Pb
- zinc: 0.00062; min 0.00014; max 0.0011; uniform
  Zn
- cadmium: 3.95e-6; min 2.6e-6; max 5.3e-6; uniform
  Cd
- nickel: 3.15e-5; min 2.6e-5; max 3.7e-5; uniform
  Ni

## Use advice
When utilizing this dataset, users should be aware that recycling processes have not been taken into account. Only direct raw material consumption and direct waste emissions related to the cement manufacturing process are considered within the system boundaries. The missing CO2 emissions data should be supplemented based on site-specific or industry average figures to ensure a comprehensive environmental impact assessment. The functional unit is 1 ton of 525# OPC, with performance categorized as 1Fu=52.5tMPa. This dataset should be used for analyzing the environmental impact of the cement production phase and not for the upstream raw material production or downstream product use stages.

## Review details
Inventory: The internal review was done by several iteration steps concerning raw data validation, raw data documentation, representativity, completeness and consistency of modelling with regard to ISO 14040 and 14044.

## Data sources
- 富丽. (2004). 生态水泥生命周期评价研究 [硕士, 北京工业大学].
