# Soil Remediation;Isotopic Remediation;Bioreactor;Construction;Bioreactor Facility

Dataset: ILCD process, Unit process, single operation
Geography: IT
Reference year: 2018
Classification: Unit processes / Other Services / Repair and maintenance
Generated by: Wang Ning, wang_ning@caep.org.cn
Owner: Tiangong LCI Data Working Group
Review: Dependent internal review by Tiangong LCI Data Working Group
Amounts: no units in this file; such an amount is in the reference unit of its flow, which a separate flow dataset defines
copyright: false
licenseType: Free of charge for all users and uses

## General comment
Construction of a biopile facility of 385 square metres in size and 1.3 metres in height using HDPE, steel, etc.

## Technical purpose
This data set represents the construction of a biopile facility for soil remediation purposes. A biopile is a type of bioreactor used for the biodegradation of contaminated soil, often employed in situ or ex-situ for environmental clean-up projects. The biopile constructed using materials such as HDPE and steel measures 385 square meters in area and 1.3 meters in height, and is designed for the treatment of contaminated soils through biological means.

## Reference product
- biopile facility: 1; measured

## Inputs
- Polyethylene,Polyethylene: 16500; measured
- Steel: 100; measured

## Use advice
When using this data set for Life Cycle Assessment (LCA), users must ensure proper allocation of environmental impacts related to the construction of the biopile facility. Consideration should be given to the inclusion of potential indirect effects, such as those associated with the extraction and processing of raw materials (HDPE, steel, etc.) used in the construction. Energy consumption during the construction phase should be accounted for. The user should also consider the operational phase of the biopile, including electricity and water use, maintenance, and final dismantling or repurposing at the end of its useful life. It is advised that data quality, such as time-related coverage and technological representativeness, should be evaluated to ensure relevance and accuracy.

## Review details
Inventory: The internal review was done by several iteration steps concerning raw data validation, raw data documentation, representativity, completeness and consistency of modelling with regard to ISO 14040 and 14044.

## Data sources
- D’Imporzano, G. et al. OPTIMIZING BIOREMEDIATION OF HYDROCARBON POLLUTED SOIL BY LIFE CYCLE ASSESSMENT (LCA) APPROACH. Environmental Engineering and Management Journal (2019).
