# cement production;cement, portland cement, 42.5MPa;shaft kiln

Dataset: ILCD process, Unit process, black box
Geography: CN
Reference year: 2004
Classification: Materials production / Other mineralic materials
Generated by: Siqi Yang, ysqsophia@gmail.com
Owner: Tiangong LCI Data Working Group
Review: Dependent internal review by Tiangong LCI Data Working Group
Amounts: no units in this file; such an amount is in the reference unit of its flow, which a separate flow dataset defines
copyright: false
licenseType: Free of charge for all users and uses

## General comment
Typical cement production process.

## Technical purpose
The described cement production process is used for manufacturing Portland cement with a strength grade of 42.5MPa. This type of cement is widely used in construction for structures requiring high mechanical strength, road pavements, and commercial concrete applications. The shaft kiln method specified in the process is employed to produce cement in areas where the scale of production or technological considerations dictate its use over other types of kilns.

## Model description
The study used 1kg of 42.5 grade Portland cement as the functional unit for evaluation. The scope of evaluation is defined as the in-plant production process of cement products and its surrounding environment. Among them, the in-plant production process refers to the entire production process in which raw materials undergo pretreatment, raw meal grinding, calcination, clinker mill and cement homogenization in sequence and finally become cement products. The surrounding environment of the cement production process refers to the input of external resources and energy and the emission of pollutants.

## Reference product
- cement, portland cement, 42.5MPa: 1000
  1kg42.5 MPa Portland cement

## Inputs
- limestone, crushed, for mill: 1125.9
  Limestone
- clay: 166.5
  Clay
- gypsum stone (CaSO4-dihydrate): 56.8
  Gupsum
- iron, powder: 61.3
  Iron powder
- hard coal: 210.201
  Standard coal. The original data is 0.1953kg standard coal, here converted to hard coal, the conversion formula is 1kg hard coal = 0.929kg standard coal.
- electricity, medium voltage: 298.8
  Electricity

## Outputs
- particles (> PM10): 0.325
  Particulates, with an unspecified particle size, is treated as PM > 10 micrometers in diameter.
- sulfur dioxide: 0.3993
  SO2
- Nitrogen oxides: 2.4
  NOx
- carbon dioxide: 1070.3
  CO2

## Use advice
When utilizing this LCA dataset for Portland cement production, it is critical to ensure that the system boundary includes the entire in-plant production process from raw material pretreatment to the homogenization of cement, as well as the input of external resources and release of emissions. It is important to consider the specific emissions profiles of the shaft kiln process, particularly the consumption of electricity and coal, and the generation of particulate matter, SO2, NOx, and CO2. The functional unit for this dataset is 1kg of 42.5 grade Portland cement, and this detail must be considered when scaling the data for use in broader models or assessments. Any considerations for the end-of-life phase, including recycling or waste treatment, must be added to the existing data set according to the specific context of the evaluation.

## Review details
Inventory: The internal review was done by several iteration steps concerning raw data validation, raw data documentation, representativity, completeness and consistency of modelling with regard to ISO 14040 and 14044.

## Data sources
- 朱天乐, 何炜, 曾小岚, 黄新, & 马保国. (2006). 中国水泥生产环境负荷研究. 环境科学, 10, 2135–2138.
