# Crude steel production;Crude steel;Casting(BF-BOF)

Dataset: ILCD process, Unit process, single operation
Geography: CN
Classification: Unit processes / Materials production / Metals and semimetals
Generated by: Fuxiang, 1162850692@qq.com
Owner: Tiangong LCI Data Working Group
Review: Dependent internal review by Tiangong LCI Data Working Group
Amounts: no units in this file; such an amount is in the reference unit of its flow, which a separate flow dataset defines
copyright: false
licenseType: Free of charge for all users and uses

## General comment
This dataset represents a process crucial for the production of crude steel through the Blast Furnace-Basic Oxygen Furnace (BF-BOF) route (long process of steelmaking). It is typically used for the production of bulk quantities of steel and is the primary method employed in large-scale integrated steel plants. The cast steel is suitable for a wide range of end-uses from construction materials to automotive industry parts.

## Geography
The data of the BF-BOF pathway were obtained from the large-scale integrated steel plants in China with an attached coking plant and EAF plant.

## Reference product
- Crude Steel: 1000; measured
  Crude steel

## Inputs
- Molten steel: 1023.4; measured
- freshwater,freshwater: 800; measured
- Electricity: 211.32; measured

## Use advice
Users of this data set should consider the technological specifics of the BF-BOF casting process as representative of large-scale steel production with integrated coking and electric arc furnace (EAF) plants. Recycling data, if applicable, should be handled with care, ensuring consistency with the defined system boundary and local recycling practices. Emissions data should be contextualized within regional environmental regulations.

## Review details
Inventory: The internal review was done by several iteration steps concerning raw data validation, raw data documentation, representativity, completeness and consistency of modelling with regard to ISO 14040 and 14044.

## Data sources
- The carbon reduction potential of hydrogen in the low carbon transition of the iron and steel industry: The case of China
