# Soil remediation;In-situ;In-situ Chemical Oxidation;Pumping Wells, Injection Wells Arrangement;Polyvinyl chloride;

Dataset: ILCD process, Unit process, single operation
Geography: CN
Reference year: 2021
Classification: Unit processes / Other Services / Repair and maintenance
Generated by: Wang Yipeng, wangyp@caep.org.cn
Owner: Tiangong LCI Data Working Group
Review: Dependent internal review by Tiangong LCI Data Working Group
Amounts: no units in this file; such an amount is in the reference unit of its flow, which a separate flow dataset defines
copyright: false
licenseType: Free of charge for all users and uses

## General comment
Pumping Wells, Injection Wells Arrangement

## Technology and included processes
Placement of 20 injection sites within the restoration area

## Technical purpose
This soil remediation process, specifically employing in-situ chemical oxidation via pumping wells, injection wells arrangement, is used to decontaminate polluted soils without the need for excavation. It's applicable for cleaning contaminants such as chlorinated solvents, pesticides, and some metals by chemical oxidation. This is particularly relevant for sites where the contamination is deep and soil removal is impractical or too disruptive.

## Reference product
- injection well: 1; measured

## Inputs
All rows: measured
- Polyvinyl chloride: 341
- cement, unspecified: 232.6
- silica sand: 150
- steel rebar: 112
- Electricity: 2477.88
- Stainless Steel: 324

## Outputs
- Solid Waste: 46.74; measured
- SOx: 6.84; measured
- sulfur dioxide: 0.717; measured
- carbon dioxide (fossil): 321.9; measured

## Use advice
When utilizing this dataset for Life Cycle Assessment, users must ensure that all the major input and output streams, which include all raw materials and energy consumption, are comprehensively documented and accounted for. Additionally, this dataset represents a single operation unit process with 20 injection points and should be scaled accordingly depending on the area to be remediated. Users should also take into account the technological applicability of the method, specific to the contaminants and site conditions, and may need to adjust the dataset based on site-specific geological and chemical data.

## Review details
Inventory: The internal review was done by several iteration steps concerning raw data validation, raw data documentation, representativity, completeness and consistency of modelling with regard to ISO 14040 and 14044.

## Data sources
- 王顺扬. 基于多目标决策方法改进LCA的污染场地修复技术比选研究.山西大学（硕士论文）,2021.
