# Desalination for seawater ; Electrodialysis, spiral-wound, CN

Dataset: ILCD process, Unit process, single operation
Geography: CN
Reference year: 2023
Classification: Energy carriers and technologies / Electricity
Functional unit: 1 t sodium chloride
Generated by: Jiaqi Lu, wilsherelu@foxmail.com
Owner: Tiangong LCI Data Working Group
Review: Dependent internal review by Tiangong LCI Data Working Group
Amounts: no units in this file; such an amount is in the reference unit of its flow, which a separate flow dataset defines
copyright: false
licenseType: Free of charge for all users and uses

## General comment
This dataset represents the process of desalination of seawater using electrodialysis with a spiral-wound configuration to produce 1 tonne of sodium chloride. The high purity salt obtained is typically used in applications requiring stringent quality parameters such as in the food industry for human consumption, in pharmaceuticals for medical use, or as a feedstock in chemical synthesis where impurities may affect the reaction processes.

## Reference product
- sodium chloride: 1000; article inperiodical
  product salt

## Inputs
- electricity mix: 215.82; article inperiodical
  Process power consumption
- Electrodialysis Component: 0.0167; article inperiodical
  ED components
- Water (fresh water): 4085; article inperiodical
  raw water

## Outputs
- High-concentration saline wastewater: 817; article inperiodical
  thick water
- Deionized Water: 3268; article inperiodical
  freshwater

## Use advice
When using this dataset for life cycle assessment, ensure that the scope of the assessment includes specific energy and material inputs for the electrodialysis process. Note that the dataset assumes a production output of 1 tonne of sodium chloride, so scale adjustments may be necessary for other production volumes. Methodologically, account for the potential environmental impacts of restoring the concentrated brine byproduct back to the sea, if applicable, and include the impacts of any pre-treatment and post-treatment of the seawater or sodium chloride product.

## Review details
Inventory: The internal review was done by several iteration steps concerning raw data validation, raw data documentation, representativity, completeness and consistency of modelling with regard to ISO 14040 and 14044.

## Data sources
- Xue, N. et al. Carbon footprint analysis and carbon neutrality potential of desalination by electrodialysis for different applications. Water Res. 232, 119716 (2023).
