# Soil remediation;soil vapor extraction;in-situ;construction;SVE system assembly;

Dataset: ILCD process, Unit process, single operation
Geography: KR
Reference year: 2011
Classification: Other Services / Repair and maintenance
Generated by: Lei Qiushuang, leiqs@caep.org.cn
Owner: Tiangong LCI Data Working Group
Review: Dependent internal review by Tiangong LCI Data Working Group
Amounts: no units in this file; such an amount is in the reference unit of its flow, which a separate flow dataset defines
copyright: false
licenseType: Free of charge for all users and uses

## General comment
The soil vapor extraction (SVE) system installation described is used for in-situ soil remediation. This unit process is a single operation intended for the construction phase of a project aiming to treat and improve the quality of contaminated soil by removing volatile compounds.

## Reference product
- SVE system: 1; measured
  焊接烟气

## Inputs
- sand: 4; measured
- Concrete: 5; measured
- Flexible Polyurethane Hose: 340; measured
  flexible polyurethane hose（聚氨酯软管）
- Welding Strip: 100; measured
  焊接条

## Use advice
When using this dataset for Life Cycle Assessment (LCA), ensure that the system boundaries include the relevant construction phase and that the data represents the environmental impact of an SVE system installation only. Ensure that the dataset is appropriately scaled to reflect the scale of the remediation project. For comprehensive assessment, consider integrating this dataset with data on operational and decommissioning phases, as well as any emissions related to the transportation of the SVE system components.

## Review details
Inventory: The internal review was done by several iteration steps concerning raw data validation, raw data documentation, representativity, completeness and consistency of modelling with regard to ISO 14040 and 14044.

## Data sources
- Assessment of Environmental Impacts and CO2 Emissions from Soil Remediation Technologies using Life cycle Assessment - Case Studies on SVE and Biopile Systems
