# Electrolyticlead|Leadconcentrate+leadpaste|Oxygen-richsmelting-liquidhighleadslagreductionleadrefining+refiningprocess|All sizes / 电解铅|铅精矿+铅膏|富氧熔炼-液态高铅渣还原炼铅+精炼工艺|所有规模

Dataset: ILCD process, Unit process, single operation
Geography: CN
Reference year: 2019
Classification: Materials production / Metals and semimetals
Generated by: The data was created by the Office of the Second National Pollution Source Census of the Ministry of Ecology and Environment, and the data was organized by the TianGong Plan team for ILCD format / 生态环境部第二次全国污染源普查工作办公室创建数据，天工计划团队常慧敏整理数据为ILCD格式
Owner: Tiangong LCI Data Working Group / 天工LCI数据工作小组
Review: Dependent internal review by Tiangong LCI Data Working Group / 天工LCI数据工作小组
Amounts: no units in this file; such an amount is in the reference unit of its flow, which a separate flow dataset defines
copyright: false
licenseType: Free of charge for all users and uses

## General comment
the Technical of end-of-pipe management technology for pollution MercuryisNeutralization + chemical precipitation，Its Technical efficiency of end-of-pipe management98

## Reference product
- lead: 1000; calculated
  源文件中描述为为电解铅，此处对其进行了匹配工作，将其匹配到LCAflow库里面相最符合的流，污染物指标备注为工业废气量

## Outputs
All rows: calculated
- Exhaust gas: 38217
  污染物指标工业废气量的末端治理技术是/，末端治理设施实际运行率（k值）计算公式为k=治理设施运行时间（小时/年）/正常生产时间（小时/年）。原文件中描述污染物类别为废气，污染物指标为工业废气量，此处对其进行了匹配工作，将其匹配到LCAflow库里面相最符合的流，污染物指标备注为工业废气量
- particles (PM2.5 - PM10): 30.45
  污染物指标颗粒物的末端治理技术是湿式除尘法（喷淋塔），其效率为80，末端治理设施实际运行率（k值）计算公式为k=治理设施运行时间（小时/年）/正常生产时间（小时/年）。原文件中描述污染物类别为废气，污染物指标为颗粒物，此处对其进行了匹配工作，将其匹配到LCAflow库里面相最符合的流，污染物指标备注为颗粒物
- particles (PM2.5 - PM10): 15.225
  污染物指标颗粒物的末端治理技术是湿式除尘法（文丘里），其效率为90，末端治理设施实际运行率（k值）计算公式为k=治理设施运行时间（小时/年）/正常生产时间（小时/年）。原文件中描述污染物类别为废气，污染物指标为颗粒物，此处对其进行了匹配工作，将其匹配到LCAflow库里面相最符合的流，污染物指标备注为颗粒物
- particles (PM2.5 - PM10): 7.6125
  污染物指标颗粒物的末端治理技术是湿式除尘法（泡沫塔），其效率为95，末端治理设施实际运行率（k值）计算公式为k=治理设施运行时间（小时/年）/正常生产时间（小时/年）。原文件中描述污染物类别为废气，污染物指标为颗粒物，此处对其进行了匹配工作，将其匹配到LCAflow库里面相最符合的流，污染物指标备注为颗粒物
- particles (PM2.5 - PM10): 1.5225
  污染物指标颗粒物的末端治理技术是湿式除尘法（动力波），其效率为99，末端治理设施实际运行率（k值）计算公式为k=治理设施运行时间（小时/年）/正常生产时间（小时/年）。原文件中描述污染物类别为废气，污染物指标为颗粒物，此处对其进行了匹配工作，将其匹配到LCAflow库里面相最符合的流，污染物指标备注为颗粒物
- particles (PM2.5 - PM10): 0.76125
  污染物指标颗粒物的末端治理技术是过滤除尘法（布袋除尘器-覆膜），其效率为99.5，末端治理设施实际运行率（k值）计算公式为k=治理设施运行时间（小时/年）/正常生产时间（小时/年）。原文件中描述污染物类别为废气，污染物指标为颗粒物，此处对其进行了匹配工作，将其匹配到LCAflow库里面相最符合的流，污染物指标备注为颗粒物
- particles (PM2.5 - PM10): 1.5225
  污染物指标颗粒物的末端治理技术是过滤除尘法（布袋除尘器-无覆膜），其效率为99，末端治理设施实际运行率（k值）计算公式为k=治理设施运行时间（小时/年）/正常生产时间（小时/年）。原文件中描述污染物类别为废气，污染物指标为颗粒物，此处对其进行了匹配工作，将其匹配到LCAflow库里面相最符合的流，污染物指标备注为颗粒物
- particles (PM2.5 - PM10): 1.5225
  污染物指标颗粒物的末端治理技术是电除尘技术，其效率为99，末端治理设施实际运行率（k值）计算公式为k=治理设施运行时间（小时/年）/正常生产时间（小时/年）。原文件中描述污染物类别为废气，污染物指标为颗粒物，此处对其进行了匹配工作，将其匹配到LCAflow库里面相最符合的流，污染物指标备注为颗粒物
- particles (PM2.5 - PM10): 53.2875
  污染物指标颗粒物的末端治理技术是旋风收尘，其效率为65，末端治理设施实际运行率（k值）计算公式为k=治理设施运行时间（小时/年）/正常生产时间（小时/年）。原文件中描述污染物类别为废气，污染物指标为颗粒物，此处对其进行了匹配工作，将其匹配到LCAflow库里面相最符合的流，污染物指标备注为颗粒物
- particles (PM2.5 - PM10): 76.125
  污染物指标颗粒物的末端治理技术是石灰/石灰石-石膏法、活性焦吸附法、，其效率为50，末端治理设施实际运行率（k值）计算公式为k=治理设施运行时间（小时/年）/正常生产时间（小时/年）。原文件中描述污染物类别为废气，污染物指标为颗粒物，此处对其进行了匹配工作，将其匹配到LCAflow库里面相最符合的流，污染物指标备注为颗粒物
- particles (PM2.5 - PM10): 38.0625
  污染物指标颗粒物的末端治理技术是有机溶液循环吸收法、金属氧化物吸收法、氨法吸收法、钠碱法、双氧水脱硫法，其效率为75，末端治理设施实际运行率（k值）计算公式为k=治理设施运行时间（小时/年）/正常生产时间（小时/年）。原文件中描述污染物类别为废气，污染物指标为颗粒物，此处对其进行了匹配工作，将其匹配到LCAflow库里面相最符合的流，污染物指标备注为颗粒物
- sulfur dioxide: 4.9345
  污染物指标二氧化硫的末端治理技术是石灰/石灰石-石膏法，其效率为90，末端治理设施实际运行率（k值）计算公式为k=治理设施运行时间（小时/年）/正常生产时间（小时/年）。原文件中描述污染物类别为废气，污染物指标为二氧化硫，此处对其进行了匹配工作，将其匹配到LCAflow库里面相最符合的流，污染物指标备注为二氧化硫
- sulfur dioxide: 4.9345
  污染物指标二氧化硫的末端治理技术是有机溶液循环吸收法，其效率为90，末端治理设施实际运行率（k值）计算公式为k=治理设施运行时间（小时/年）/正常生产时间（小时/年）。原文件中描述污染物类别为废气，污染物指标为二氧化硫，此处对其进行了匹配工作，将其匹配到LCAflow库里面相最符合的流，污染物指标备注为二氧化硫
- sulfur dioxide: 4.9345
  污染物指标二氧化硫的末端治理技术是金属氧化物吸收法，其效率为90，末端治理设施实际运行率（k值）计算公式为k=治理设施运行时间（小时/年）/正常生产时间（小时/年）。原文件中描述污染物类别为废气，污染物指标为二氧化硫，此处对其进行了匹配工作，将其匹配到LCAflow库里面相最符合的流，污染物指标备注为二氧化硫
- sulfur dioxide: 4.9345
  污染物指标二氧化硫的末端治理技术是活性焦吸附法，其效率为90，末端治理设施实际运行率（k值）计算公式为k=治理设施运行时间（小时/年）/正常生产时间（小时/年）。原文件中描述污染物类别为废气，污染物指标为二氧化硫，此处对其进行了匹配工作，将其匹配到LCAflow库里面相最符合的流，污染物指标备注为二氧化硫
- sulfur dioxide: 4.9345
  污染物指标二氧化硫的末端治理技术是氨法吸收法，其效率为90，末端治理设施实际运行率（k值）计算公式为k=治理设施运行时间（小时/年）/正常生产时间（小时/年）。原文件中描述污染物类别为废气，污染物指标为二氧化硫，此处对其进行了匹配工作，将其匹配到LCAflow库里面相最符合的流，污染物指标备注为二氧化硫
- sulfur dioxide: 7.40175
  污染物指标二氧化硫的末端治理技术是钠碱法，其效率为85，末端治理设施实际运行率（k值）计算公式为k=治理设施运行时间（小时/年）/正常生产时间（小时/年）。原文件中描述污染物类别为废气，污染物指标为二氧化硫，此处对其进行了匹配工作，将其匹配到LCAflow库里面相最符合的流，污染物指标备注为二氧化硫
- sulfur dioxide: 4.9345
  污染物指标二氧化硫的末端治理技术是双氧水脱硫法，其效率为90，末端治理设施实际运行率（k值）计算公式为k=治理设施运行时间（小时/年）/正常生产时间（小时/年）。原文件中描述污染物类别为废气，污染物指标为二氧化硫，此处对其进行了匹配工作，将其匹配到LCAflow库里面相最符合的流，污染物指标备注为二氧化硫
- Nitrogen oxides: 2.7215
  污染物指标氮氧化物的末端治理技术是选择性非化还原法，其效率为50，末端治理设施实际运行率（k值）计算公式为k=治理设施运行时间（小时/年）/正常生产时间（小时/年）。原文件中描述污染物类别为废气，污染物指标为氮氧化物，此处对其进行了匹配工作，将其匹配到LCAflow库里面相最符合的流，污染物指标备注为氮氧化物
- Nitrogen oxides: 1.6329
  污染物指标氮氧化物的末端治理技术是选择性化还原法，其效率为70，末端治理设施实际运行率（k值）计算公式为k=治理设施运行时间（小时/年）/正常生产时间（小时/年）。原文件中描述污染物类别为废气，污染物指标为氮氧化物，此处对其进行了匹配工作，将其匹配到LCAflow库里面相最符合的流，污染物指标备注为氮氧化物
- Nitrogen oxides: 2.7215
  污染物指标氮氧化物的末端治理技术是氧化/吸收法，其效率为50，末端治理设施实际运行率（k值）计算公式为k=治理设施运行时间（小时/年）/正常生产时间（小时/年）。原文件中描述污染物类别为废气，污染物指标为氮氧化物，此处对其进行了匹配工作，将其匹配到LCAflow库里面相最符合的流，污染物指标备注为氮氧化物
- lead: 2.17411
  污染物指标铅的末端治理技术是同颗粒物，末端治理设施实际运行率（k值）计算公式为k=治理设施运行时间（小时/年）/正常生产时间（小时/年）。原文件中描述污染物类别为废气，污染物指标为铅，此处对其进行了匹配工作，将其匹配到LCAflow库里面相最符合的流，污染物指标备注为铅
- cadmium: 0.107132
  污染物指标镉的末端治理技术是同颗粒物，末端治理设施实际运行率（k值）计算公式为k=治理设施运行时间（小时/年）/正常生产时间（小时/年）。原文件中描述污染物类别为废气，污染物指标为镉，此处对其进行了匹配工作，将其匹配到LCAflow库里面相最符合的流，污染物指标备注为镉
- arsenic: 0.243694
  污染物指标砷的末端治理技术是同颗粒物，末端治理设施实际运行率（k值）计算公式为k=治理设施运行时间（小时/年）/正常生产时间（小时/年）。原文件中描述污染物类别为废气，污染物指标为砷，此处对其进行了匹配工作，将其匹配到LCAflow库里面相最符合的流，污染物指标备注为砷
- mercury: 0.001759
  污染物指标汞的末端治理技术是同颗粒物，末端治理设施实际运行率（k值）计算公式为k=治理设施运行时间（小时/年）/正常生产时间（小时/年）。原文件中描述污染物类别为废气，污染物指标为汞，此处对其进行了匹配工作，将其匹配到LCAflow库里面相最符合的流，污染物指标备注为汞
- Waste water: 5712
  污染物指标工业废水量的末端治理技术是/，末端治理设施实际运行率（k值）计算公式为K=废水处理设施正常运行时间（小时/年）/企业正常生产时间（小时/年）。原文件中描述污染物类别为废水，污染物指标为工业废水量，此处对其进行了匹配工作，将其匹配到LCAflow库里面相最符合的流，污染物指标备注为工业废水量
- chemical oxygen demand: 0.259504
  污染物指标化学需氧量的末端治理技术是氧化还原法+化学沉淀法，其效率为36，末端治理设施实际运行率（k值）计算公式为K=废水处理设施正常运行时间（小时/年）/企业正常生产时间（小时/年）。原文件中描述污染物类别为废水，污染物指标为化学需氧量，此处对其进行了匹配工作，将其匹配到LCAflow库里面相最符合的流，污染物指标备注为化学需氧量
- chemical oxygen demand: 0.121643
  污染物指标化学需氧量的末端治理技术是中和法+氧化还原法+化学沉淀法+膜分离法，其效率为70，末端治理设施实际运行率（k值）计算公式为K=废水处理设施正常运行时间（小时/年）/企业正常生产时间（小时/年）。原文件中描述污染物类别为废水，污染物指标为化学需氧量，此处对其进行了匹配工作，将其匹配到LCAflow库里面相最符合的流，污染物指标备注为化学需氧量
- chemical oxygen demand: 0.154081
  污染物指标化学需氧量的末端治理技术是中和法+氧化还原法+化学沉淀法，其效率为62，末端治理设施实际运行率（k值）计算公式为K=废水处理设施正常运行时间（小时/年）/企业正常生产时间（小时/年）。原文件中描述污染物类别为废水，污染物指标为化学需氧量，此处对其进行了匹配工作，将其匹配到LCAflow库里面相最符合的流，污染物指标备注为化学需氧量
- chemical oxygen demand: 0.194628
  污染物指标化学需氧量的末端治理技术是中和法+化学沉淀法，其效率为52，末端治理设施实际运行率（k值）计算公式为K=废水处理设施正常运行时间（小时/年）/企业正常生产时间（小时/年）。原文件中描述污染物类别为废水，污染物指标为化学需氧量，此处对其进行了匹配工作，将其匹配到LCAflow库里面相最符合的流，污染物指标备注为化学需氧量
- Ammonia Nitrogen: 0.0338125
  污染物指标氨氮的末端治理技术是氧化还原法+化学沉淀法，其效率为36，末端治理设施实际运行率（k值）计算公式为K=废水处理设施正常运行时间（小时/年）/企业正常生产时间（小时/年）。原文件中描述污染物类别为废水，污染物指标为氨氮，此处对其进行了匹配工作，将其匹配到LCAflow库里面相最符合的流，污染物指标备注为氨氮
- Ammonia Nitrogen: 0.0158496
  污染物指标氨氮的末端治理技术是中和法+氧化还原法+化学沉淀法+膜分离法，其效率为70，末端治理设施实际运行率（k值）计算公式为K=废水处理设施正常运行时间（小时/年）/企业正常生产时间（小时/年）。原文件中描述污染物类别为废水，污染物指标为氨氮，此处对其进行了匹配工作，将其匹配到LCAflow库里面相最符合的流，污染物指标备注为氨氮
- Ammonia Nitrogen: 0.0200762
  污染物指标氨氮的末端治理技术是中和法+氧化还原法+化学沉淀法，其效率为62，末端治理设施实际运行率（k值）计算公式为K=废水处理设施正常运行时间（小时/年）/企业正常生产时间（小时/年）。原文件中描述污染物类别为废水，污染物指标为氨氮，此处对其进行了匹配工作，将其匹配到LCAflow库里面相最符合的流，污染物指标备注为氨氮
- Ammonia Nitrogen: 0.0253594
  污染物指标氨氮的末端治理技术是中和法+化学沉淀法，其效率为52，末端治理设施实际运行率（k值）计算公式为K=废水处理设施正常运行时间（小时/年）/企业正常生产时间（小时/年）。原文件中描述污染物类别为废水，污染物指标为氨氮，此处对其进行了匹配工作，将其匹配到LCAflow库里面相最符合的流，污染物指标备注为氨氮
- phosphorus, total: 0.00369856
  污染物指标总磷的末端治理技术是氧化还原法+化学沉淀法，其效率为36，末端治理设施实际运行率（k值）计算公式为K=废水处理设施正常运行时间（小时/年）/企业正常生产时间（小时/年）。原文件中描述污染物类别为废水，污染物指标为总磷，此处对其进行了匹配工作，将其匹配到LCAflow库里面相最符合的流，污染物指标备注为总磷
- phosphorus, total: 0.0017337
  污染物指标总磷的末端治理技术是中和法+氧化还原法+化学沉淀法+膜分离法，其效率为70，末端治理设施实际运行率（k值）计算公式为K=废水处理设施正常运行时间（小时/年）/企业正常生产时间（小时/年）。原文件中描述污染物类别为废水，污染物指标为总磷，此处对其进行了匹配工作，将其匹配到LCAflow库里面相最符合的流，污染物指标备注为总磷
- phosphorus, total: 0.00219602
  污染物指标总磷的末端治理技术是中和法+氧化还原法+化学沉淀法，其效率为62，末端治理设施实际运行率（k值）计算公式为K=废水处理设施正常运行时间（小时/年）/企业正常生产时间（小时/年）。原文件中描述污染物类别为废水，污染物指标为总磷，此处对其进行了匹配工作，将其匹配到LCAflow库里面相最符合的流，污染物指标备注为总磷
- phosphorus, total: 0.00277392
  污染物指标总磷的末端治理技术是中和法+化学沉淀法，其效率为52，末端治理设施实际运行率（k值）计算公式为K=废水处理设施正常运行时间（小时/年）/企业正常生产时间（小时/年）。原文件中描述污染物类别为废水，污染物指标为总磷，此处对其进行了匹配工作，将其匹配到LCAflow库里面相最符合的流，污染物指标备注为总磷
- Nitrogen, organic bound: 0.064695
  污染物指标总氮的末端治理技术是氧化还原法+化学沉淀法，其效率为36，末端治理设施实际运行率（k值）计算公式为K=废水处理设施正常运行时间（小时/年）/企业正常生产时间（小时/年）。原文件中描述污染物类别为废水，污染物指标为总氮，此处对其进行了匹配工作，将其匹配到LCAflow库里面相最符合的流，污染物指标备注为总氮
- Nitrogen, organic bound: 0.0303258
  污染物指标总氮的末端治理技术是中和法+氧化还原法+化学沉淀法+膜分离法，其效率为70，末端治理设施实际运行率（k值）计算公式为K=废水处理设施正常运行时间（小时/年）/企业正常生产时间（小时/年）。原文件中描述污染物类别为废水，污染物指标为总氮，此处对其进行了匹配工作，将其匹配到LCAflow库里面相最符合的流，污染物指标备注为总氮
- Nitrogen, organic bound: 0.0384127
  污染物指标总氮的末端治理技术是中和法+氧化还原法+化学沉淀法，其效率为62，末端治理设施实际运行率（k值）计算公式为K=废水处理设施正常运行时间（小时/年）/企业正常生产时间（小时/年）。原文件中描述污染物类别为废水，污染物指标为总氮，此处对其进行了匹配工作，将其匹配到LCAflow库里面相最符合的流，污染物指标备注为总氮
- Nitrogen, organic bound: 0.0485213
  污染物指标总氮的末端治理技术是中和法+化学沉淀法，其效率为52，末端治理设施实际运行率（k值）计算公式为K=废水处理设施正常运行时间（小时/年）/企业正常生产时间（小时/年）。原文件中描述污染物类别为废水，污染物指标为总氮，此处对其进行了匹配工作，将其匹配到LCAflow库里面相最符合的流，污染物指标备注为总氮
- lead: 0.00164512
  污染物指标铅的末端治理技术是氧化还原法+化学沉淀法，其效率为98，末端治理设施实际运行率（k值）计算公式为K=废水处理设施正常运行时间（小时/年）/企业正常生产时间（小时/年）。原文件中描述污染物类别为废水，污染物指标为铅，此处对其进行了匹配工作，将其匹配到LCAflow库里面相最符合的流，污染物指标备注为铅
- lead: 0.00041128
  污染物指标铅的末端治理技术是中和法+氧化还原法+化学沉淀法+膜分离法，其效率为99.5，末端治理设施实际运行率（k值）计算公式为K=废水处理设施正常运行时间（小时/年）/企业正常生产时间（小时/年）。原文件中描述污染物类别为废水，污染物指标为铅，此处对其进行了匹配工作，将其匹配到LCAflow库里面相最符合的流，污染物指标备注为铅
- lead: 0.00082256
  污染物指标铅的末端治理技术是中和法+氧化还原法+化学沉淀法，其效率为99，末端治理设施实际运行率（k值）计算公式为K=废水处理设施正常运行时间（小时/年）/企业正常生产时间（小时/年）。原文件中描述污染物类别为废水，污染物指标为铅，此处对其进行了匹配工作，将其匹配到LCAflow库里面相最符合的流，污染物指标备注为铅
- lead: 0.00164512
  污染物指标铅的末端治理技术是中和法+化学沉淀法，其效率为98，末端治理设施实际运行率（k值）计算公式为K=废水处理设施正常运行时间（小时/年）/企业正常生产时间（小时/年）。原文件中描述污染物类别为废水，污染物指标为铅，此处对其进行了匹配工作，将其匹配到LCAflow库里面相最符合的流，污染物指标备注为铅
- arsenic: 0.00077398
  污染物指标砷的末端治理技术是氧化还原法+化学沉淀法，其效率为98，末端治理设施实际运行率（k值）计算公式为K=废水处理设施正常运行时间（小时/年）/企业正常生产时间（小时/年）。原文件中描述污染物类别为废水，污染物指标为砷，此处对其进行了匹配工作，将其匹配到LCAflow库里面相最符合的流，污染物指标备注为砷
- arsenic: 0.000193495
  污染物指标砷的末端治理技术是中和法+氧化还原法+化学沉淀法+膜分离法，其效率为99.5，末端治理设施实际运行率（k值）计算公式为K=废水处理设施正常运行时间（小时/年）/企业正常生产时间（小时/年）。原文件中描述污染物类别为废水，污染物指标为砷，此处对其进行了匹配工作，将其匹配到LCAflow库里面相最符合的流，污染物指标备注为砷
- arsenic: 0.00038699
  污染物指标砷的末端治理技术是中和法+氧化还原法+化学沉淀法，其效率为99，末端治理设施实际运行率（k值）计算公式为K=废水处理设施正常运行时间（小时/年）/企业正常生产时间（小时/年）。原文件中描述污染物类别为废水，污染物指标为砷，此处对其进行了匹配工作，将其匹配到LCAflow库里面相最符合的流，污染物指标备注为砷
- arsenic: 0.00077398
  污染物指标砷的末端治理技术是中和法+化学沉淀法，其效率为98，末端治理设施实际运行率（k值）计算公式为K=废水处理设施正常运行时间（小时/年）/企业正常生产时间（小时/年）。原文件中描述污染物类别为废水，污染物指标为砷，此处对其进行了匹配工作，将其匹配到LCAflow库里面相最符合的流，污染物指标备注为砷
- cadmium: 0.00023794
  污染物指标镉的末端治理技术是氧化还原法+化学沉淀法，其效率为98，末端治理设施实际运行率（k值）计算公式为K=废水处理设施正常运行时间（小时/年）/企业正常生产时间（小时/年）。原文件中描述污染物类别为废水，污染物指标为镉，此处对其进行了匹配工作，将其匹配到LCAflow库里面相最符合的流，污染物指标备注为镉
- cadmium: 5.9485e-5
  污染物指标镉的末端治理技术是中和法+氧化还原法+化学沉淀法+膜分离法，其效率为99.5，末端治理设施实际运行率（k值）计算公式为K=废水处理设施正常运行时间（小时/年）/企业正常生产时间（小时/年）。原文件中描述污染物类别为废水，污染物指标为镉，此处对其进行了匹配工作，将其匹配到LCAflow库里面相最符合的流，污染物指标备注为镉
- cadmium: 0.00011897
  污染物指标镉的末端治理技术是中和法+氧化还原法+化学沉淀法，其效率为99，末端治理设施实际运行率（k值）计算公式为K=废水处理设施正常运行时间（小时/年）/企业正常生产时间（小时/年）。原文件中描述污染物类别为废水，污染物指标为镉，此处对其进行了匹配工作，将其匹配到LCAflow库里面相最符合的流，污染物指标备注为镉
- cadmium: 0.00023794
  污染物指标镉的末端治理技术是中和法+化学沉淀法，其效率为98，末端治理设施实际运行率（k值）计算公式为K=废水处理设施正常运行时间（小时/年）/企业正常生产时间（小时/年）。原文件中描述污染物类别为废水，污染物指标为镉，此处对其进行了匹配工作，将其匹配到LCAflow库里面相最符合的流，污染物指标备注为镉
- Mercury: 4.518e-5
  污染物指标汞的末端治理技术是氧化还原法+化学沉淀法，其效率为98，末端治理设施实际运行率（k值）计算公式为K=废水处理设施正常运行时间（小时/年）/企业正常生产时间（小时/年）。原文件中描述污染物类别为废水，污染物指标为汞，此处对其进行了匹配工作，将其匹配到LCAflow库里面相最符合的流，污染物指标备注为汞
- Mercury: 1.1295e-5
  污染物指标汞的末端治理技术是中和法+氧化还原法+化学沉淀法+膜分离法，其效率为99.5，末端治理设施实际运行率（k值）计算公式为K=废水处理设施正常运行时间（小时/年）/企业正常生产时间（小时/年）。原文件中描述污染物类别为废水，污染物指标为汞，此处对其进行了匹配工作，将其匹配到LCAflow库里面相最符合的流，污染物指标备注为汞
- Mercury: 2.259e-5
  污染物指标汞的末端治理技术是中和法+氧化还原法+化学沉淀法，其效率为99，末端治理设施实际运行率（k值）计算公式为K=废水处理设施正常运行时间（小时/年）/企业正常生产时间（小时/年）。原文件中描述污染物类别为废水，污染物指标为汞，此处对其进行了匹配工作，将其匹配到LCAflow库里面相最符合的流，污染物指标备注为汞
- Mercury: 4.518e-5
  污染物指标汞的末端治理技术是中和法+化学沉淀法，其效率为98，末端治理设施实际运行率（k值）计算公式为K=废水处理设施正常运行时间（小时/年）/企业正常生产时间（小时/年）。原文件中描述污染物类别为废水，污染物指标为汞，此处对其进行了匹配工作，将其匹配到LCAflow库里面相最符合的流，污染物指标备注为汞

## Use advice
This dataset is derived from the Pollution Source Census Report and contains information on pollution emissions and related products. However, it does not include data on energy or chemical consumption, nor does it provide information on waste or co-product generation. When utilizing this dataset, please supplement the missing data based on actual conditions before use
该数据集来源于污染源普查报告，包含污染物排放及相关产品信息，但不包含能源或化学品消耗数据，也不提供废弃物或共生产物产生信息。在使用该数据集时，请根据实际情况补充缺失数据后再使用。

## Review details
Inventory: The internal review was done by several iteration steps concerning raw data validation, raw data documentation, representativity, completeness and consistency of modelling with regard to ISO 14040 and 14044.
清单： 内部审查通过几个迭代步骤完成，涉及原始数据验证、原始数据记录、代表性、完整性、与 ISO 14040 和 14044 有关的建模的一致性。

## Data sources
- 第二次全国污染源普查产排污核算系数手册（试用版）,四级代码3212文件，在完整版文件中第4878页
