# Plexiglass ; Tempered glass ; Tempered treatment

Dataset: ILCD process, Unit process, single operation
Geography: KM-YN-CN
Reference year: 2015
Valid until: 2023
Classification: Unit processes / Materials production / Glass and ceramics
Generated by: He xiaxia, 18616148319@163.com
Owner: Tiangong LCI Data Working Group
Review: Dependent internal review by Tiangong LCI Data Working Group
Amounts: no units in this file; such an amount is in the reference unit of its flow, which a separate flow dataset defines
copyright: false
licenseType: Free of charge for all users and uses

## General comment
This dataset describes the tempered treatment stage in glass production, which results in the manufacture of tempered glass. Tempered glass is a type of safety glass that is processed by controlled thermal or chemical treatments to increase its strength compared with normal glass. Due to its safety and strength, it is commonly used in a variety of applications such as vehicle windows, shower doors, architectural glass doors and tables, as well as in protective screens and bulletproof glass.

## Reference product
- Glass (formed & finished): 250000; measured
  tempered glass

## Inputs
- Electricity: 518130; measured
- Glass (formed & finished): 303000; measured

## Outputs
- Glass (formed & finished): 50000; measured
  Insulated glass
- cullet float glass: 3201.5; measured

## Use advice
When utilizing this dataset for Life Cycle Assessment (LCA) purposes, consider the energy consumption and emissions associated with the tempering process. The dataset should be used to model the impact specific to the creation of tempered glass, as opposed to other types of glass. Care should be taken to ensure the data is applied to the correct life cycle stage. Additionally, if the tempered glass is later recycled or reused, the end-of-life phase should be appropriately accounted for in the LCA, which may include the use of separate datasets for reuse or recycling processes.

## Review details
Inventory: The internal review was done by several iteration steps concerning raw data validation, raw data documentation, representativity, completeness and consistency of modelling with regard to ISO 14040 and 14044.

## Data sources
- 建设项目环境影响报告表（国环评证乙字 第 2501 号）
