# Post-press finishing ; Printed products (substrate is paper), printed products (substrate is plastic), printed products (substrate is metal), printed products (other substrates) ; Adhesives (solvent-based) ; All finishing processes after printing ; All sizes; NESPS2 / 印后整理 ; 印刷品（承印物为纸）、印刷品（承印物为塑料）、印刷品（承印物为金属）、印刷品（其他承印物） ; 胶粘剂（溶剂型） ; 所有印后整理工艺 ; 所有规模 ; 全国第二次污染普查数据

Dataset: ILCD process, Unit process, single operation
Geography: CN
Reference year: 2019
Classification: Reference Parameters / Systems / Packaging
Generated by: The data was created by the Office of the Second National Pollution Source Census of the Ministry of Ecology and Environment, and the data was organized by the TianGong Plan team for ILCD format / 生态环境部第二次全国污染源普查工作办公室创建数据，天工计划团队常慧敏整理数据为ILCD格式
Owner: Tiangong LCI Data Working Group / 天工LCI数据工作小组
Review: Dependent internal review by Tiangong LCI Data Working Group / 天工LCI数据工作小组
Amounts: no units in this file; such an amount is in the reference unit of its flow, which a separate flow dataset defines
copyright: false
licenseType: Free of charge for all users and uses

## General comment
the treatment technology for the pollution of volatile organic compounddidn't offered，The formula for calculating the actual operation rate (k-value) of the end-of-pipe treatment facility is k = power consumption of wastewater treatment facilities (kWh/year) / operating time of wastewater treatment facilities (hours/year) / total power of wastewater treatment facilities (kW)

## Technical purpose
此数据集适用于印刷行业中的印后整理工艺，涉及纸张、塑料、金属等各种承印物材料的涂胶完成工序。该数据集涵盖了所有规模的印后整理工艺，特别适用于评估使用溶剂型胶粘剂的印刷过程中挥发性有机化合物（VOC）排放的环境影响。数据有助于优化末端治理VOC污染处理的工艺，其中技术效率是关键因素。

## Reference product
- Adhesive Composition: 1000; input; calculated
  源文件中描述为为胶粘剂（溶剂型），此处对其进行了匹配工作，将其匹配到LCAflow库里面相最符合的流

## Outputs
All rows: calculated
- volatile organic compound: 18
  the treatment technology for the pollution of volatile organic compounddidn't offered，Its Technical efficiency of end-of-pipe management94，The formula for calculating the actual operation rate (k-value) of the end-of-pipe treatment facility is k = power consumption of wastewater treatment facilities (kWh/year) / operating time of wastewater treatment facilities (hours/year) / total power of wastewater treatment facilities (kW)
  污染物指标挥发性有机物的末端治理技术是3、蓄热式热力燃烧法，其效率为94，末端治理设施实际运行率（k值）计算公式为k=治理设施正常运行时间（小时/年）/总生产时间（小时/年）。原文件中描述污染物类别为废气，污染物指标为挥发性有机物，此处对其进行了匹配工作，将其匹配到LCAflow库里面相最符合的流
- volatile organic compound: 30
  the treatment technology for the pollution of volatile organic compounddidn't offered，Its Technical efficiency of end-of-pipe management90，The formula for calculating the actual operation rate (k-value) of the end-of-pipe treatment facility is k = power consumption of wastewater treatment facilities (kWh/year) / operating time of wastewater treatment facilities (hours/year) / total power of wastewater treatment facilities (kW)
  污染物指标挥发性有机物的末端治理技术是12、热力燃烧，其效率为90，末端治理设施实际运行率（k值）计算公式为k=治理设施正常运行时间（小时/年）/总生产时间（小时/年）。原文件中描述污染物类别为废气，污染物指标为挥发性有机物，此处对其进行了匹配工作，将其匹配到LCAflow库里面相最符合的流
- volatile organic compound: 45
  the treatment technology for the pollution of volatile organic compounddidn't offered，Its Technical efficiency of end-of-pipe management85，The formula for calculating the actual operation rate (k-value) of the end-of-pipe treatment facility is k = power consumption of wastewater treatment facilities (kWh/year) / operating time of wastewater treatment facilities (hours/year) / total power of wastewater treatment facilities (kW)
  污染物指标挥发性有机物的末端治理技术是7、吸附/催化燃烧法，其效率为85，末端治理设施实际运行率（k值）计算公式为k=治理设施正常运行时间（小时/年）/总生产时间（小时/年）。原文件中描述污染物类别为废气，污染物指标为挥发性有机物，此处对其进行了匹配工作，将其匹配到LCAflow库里面相最符合的流
- volatile organic compound: 45
  the treatment technology for the pollution of volatile organic compounddidn't offered，Its Technical efficiency of end-of-pipe management85，The formula for calculating the actual operation rate (k-value) of the end-of-pipe treatment facility is k = power consumption of wastewater treatment facilities (kWh/year) / operating time of wastewater treatment facilities (hours/year) / total power of wastewater treatment facilities (kW)
  污染物指标挥发性有机物的末端治理技术是8、催化燃烧法，其效率为85，末端治理设施实际运行率（k值）计算公式为k=治理设施正常运行时间（小时/年）/总生产时间（小时/年）。原文件中描述污染物类别为废气，污染物指标为挥发性有机物，此处对其进行了匹配工作，将其匹配到LCAflow库里面相最符合的流
- volatile organic compound: 105
  the treatment technology for the pollution of volatile organic compounddidn't offered，Its Technical efficiency of end-of-pipe management65，The formula for calculating the actual operation rate (k-value) of the end-of-pipe treatment facility is k = power consumption of wastewater treatment facilities (kWh/year) / operating time of wastewater treatment facilities (hours/year) / total power of wastewater treatment facilities (kW)
  污染物指标挥发性有机物的末端治理技术是6、冷凝法，其效率为65，末端治理设施实际运行率（k值）计算公式为k=治理设施正常运行时间（小时/年）/总生产时间（小时/年）。原文件中描述污染物类别为废气，污染物指标为挥发性有机物，此处对其进行了匹配工作，将其匹配到LCAflow库里面相最符合的流
- volatile organic compound: 141
  the treatment technology for the pollution of volatile organic compounddidn't offered，Its Technical efficiency of end-of-pipe management53，The formula for calculating the actual operation rate (k-value) of the end-of-pipe treatment facility is k = power consumption of wastewater treatment facilities (kWh/year) / operating time of wastewater treatment facilities (hours/year) / total power of wastewater treatment facilities (kW)
  污染物指标挥发性有机物的末端治理技术是10、生物过滤法，其效率为53，末端治理设施实际运行率（k值）计算公式为k=治理设施正常运行时间（小时/年）/总生产时间（小时/年）。原文件中描述污染物类别为废气，污染物指标为挥发性有机物，此处对其进行了匹配工作，将其匹配到LCAflow库里面相最符合的流
- volatile organic compound: 183
  the treatment technology for the pollution of volatile organic compounddidn't offered，Its Technical efficiency of end-of-pipe management39，The formula for calculating the actual operation rate (k-value) of the end-of-pipe treatment facility is k = power consumption of wastewater treatment facilities (kWh/year) / operating time of wastewater treatment facilities (hours/year) / total power of wastewater treatment facilities (kW)
  污染物指标挥发性有机物的末端治理技术是9、低温等离子体，其效率为39，末端治理设施实际运行率（k值）计算公式为k=治理设施正常运行时间（小时/年）/总生产时间（小时/年）。原文件中描述污染物类别为废气，污染物指标为挥发性有机物，此处对其进行了匹配工作，将其匹配到LCAflow库里面相最符合的流
- volatile organic compound: 198
  the treatment technology for the pollution of volatile organic compounddidn't offered，Its Technical efficiency of end-of-pipe management34，The formula for calculating the actual operation rate (k-value) of the end-of-pipe treatment facility is k = power consumption of wastewater treatment facilities (kWh/year) / operating time of wastewater treatment facilities (hours/year) / total power of wastewater treatment facilities (kW)
  污染物指标挥发性有机物的末端治理技术是2、其他（沸石转轮吸附法），其效率为34，末端治理设施实际运行率（k值）计算公式为k=治理设施正常运行时间（小时/年）/总生产时间（小时/年）。原文件中描述污染物类别为废气，污染物指标为挥发性有机物，此处对其进行了匹配工作，将其匹配到LCAflow库里面相最符合的流
- volatile organic compound: 249
  the treatment technology for the pollution of volatile organic compounddidn't offered，Its Technical efficiency of end-of-pipe management17，The formula for calculating the actual operation rate (k-value) of the end-of-pipe treatment facility is k = power consumption of wastewater treatment facilities (kWh/year) / operating time of wastewater treatment facilities (hours/year) / total power of wastewater treatment facilities (kW)
  污染物指标挥发性有机物的末端治理技术是4、光解，其效率为17，末端治理设施实际运行率（k值）计算公式为k=治理设施正常运行时间（小时/年）/总生产时间（小时/年）。原文件中描述污染物类别为废气，污染物指标为挥发性有机物，此处对其进行了匹配工作，将其匹配到LCAflow库里面相最符合的流
- volatile organic compound: 249
  the treatment technology for the pollution of volatile organic compounddidn't offered，Its Technical efficiency of end-of-pipe management17，The formula for calculating the actual operation rate (k-value) of the end-of-pipe treatment facility is k = power consumption of wastewater treatment facilities (kWh/year) / operating time of wastewater treatment facilities (hours/year) / total power of wastewater treatment facilities (kW)
  污染物指标挥发性有机物的末端治理技术是5、光催化，其效率为17，末端治理设施实际运行率（k值）计算公式为k=治理设施正常运行时间（小时/年）/总生产时间（小时/年）。原文件中描述污染物类别为废气，污染物指标为挥发性有机物，此处对其进行了匹配工作，将其匹配到LCAflow库里面相最符合的流
- volatile organic compound: 255
  the treatment technology for the pollution of volatile organic compounddidn't offered，Its Technical efficiency of end-of-pipe management15，The formula for calculating the actual operation rate (k-value) of the end-of-pipe treatment facility is k = power consumption of wastewater treatment facilities (kWh/year) / operating time of wastewater treatment facilities (hours/year) / total power of wastewater treatment facilities (kW)
  污染物指标挥发性有机物的末端治理技术是1、其他（活性炭法），其效率为15，末端治理设施实际运行率（k值）计算公式为k=治理设施正常运行时间（小时/年）/总生产时间（小时/年）。原文件中描述污染物类别为废气，污染物指标为挥发性有机物，此处对其进行了匹配工作，将其匹配到LCAflow库里面相最符合的流
- volatile organic compound: 264
  the treatment technology for the pollution of volatile organic compounddidn't offered，Its Technical efficiency of end-of-pipe management12，The formula for calculating the actual operation rate (k-value) of the end-of-pipe treatment facility is k = power consumption of wastewater treatment facilities (kWh/year) / operating time of wastewater treatment facilities (hours/year) / total power of wastewater treatment facilities (kW)
  污染物指标挥发性有机物的末端治理技术是11、其他（溶剂法），其效率为12，末端治理设施实际运行率（k值）计算公式为k=治理设施正常运行时间（小时/年）/总生产时间（小时/年）。原文件中描述污染物类别为废气，污染物指标为挥发性有机物，此处对其进行了匹配工作，将其匹配到LCAflow库里面相最符合的流
- volatile organic compound: 300
  the treatment technology for the pollution of volatile organic compounddidn't offered，The formula for calculating the actual operation rate (k-value) of the end-of-pipe treatment facility is k = power consumption of wastewater treatment facilities (kWh/year) / operating time of wastewater treatment facilities (hours/year) / total power of wastewater treatment facilities (kW)
  污染物指标挥发性有机物的末端治理技术是13、无治理，末端治理设施实际运行率（k值）计算公式为k=治理设施正常运行时间（小时/年）/总生产时间（小时/年）。原文件中描述污染物类别为废气，污染物指标为挥发性有机物，此处对其进行了匹配工作，将其匹配到LCAflow库里面相最符合的流

## Use advice
This dataset is derived from the Pollution Source Census Report and contains information on pollution emissions and related products. However, it does not include data on energy or chemical consumption, nor does it provide information on waste or co-product generation. When utilizing this dataset, please supplement the missing data based on actual conditions before use
该数据集来源于污染源普查报告，包含污染物排放及相关产品信息，但不包含能源或化学品消耗数据，也不提供废弃物或共生产物产生信息。在使用该数据集时，请根据实际情况补充缺失数据后再使用。

## Review details
Inventory: The internal review was done by several iteration steps concerning raw data validation, raw data documentation, representativity, completeness and consistency of modelling with regard to ISO 14040 and 14044.
清单： 内部审查通过几个迭代步骤完成，涉及原始数据验证、原始数据记录、代表性、完整性、与 ISO 14040 和 14044 有关的建模的一致性。

## Data sources
- 第二次全国污染源普查产排污核算系数手册（试用版）,二级代码23,三级代码231.0文件，在完整版文件中第519页
