# Sinter production | sinter | sinter | powder ore

Dataset: ILCD process, Unit process, single operation
Geography: CN
Reference year: 2006
Classification: Materials production / Other mineralic materials
Generated by: Wanghuanyu, wanghuanyu00@126.com
Review: Dependent internal review by Tiangong LCI Data Working Group
Amounts: no units in this file; such an amount is in the reference unit of its flow, which a separate flow dataset defines

## Reference product
All rows: measured
- Sinter / Pellet Dust: 2.4546
  z01
- Sinter / Pellet Dust: 3.2104
  z02
- Sinter / Pellet Dust: 2.6962
  z03
- Sinter / Pellet Dust: 1.3864
  z04
- Sinter / Pellet Dust: 1.1352
  z05
- Sinter / Pellet Dust: 0.7622
  z06
- Sinter / Pellet Dust: 1.9554
  z07
- Sinter / Pellet Dust: 0.8746
  z08
- Sinter / Pellet Dust: 1.6014
  z09
- Sinter / Pellet Dust: 1.304
  z11
- Sinter / Pellet Dust: 0.2882
  z12
- Sinter / Pellet Dust: 0.3472
  z13
- Sinter / Pellet Dust: 0.513
  z14
- Sinter / Pellet Dust: 0.648
  z15
- Sinter / Pellet Dust: 0.6184
  z17
- Sinter / Pellet Dust: 0.9
  z20

## Inputs
All rows: measured
- iron: 977, 895, 873, 908, 933, 946, 954, 898, 915, 892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 (16 entries)
  含铁原料
- anthracite: 49, 67, 54, 72, 55, 66, 53, 58, 78, 60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 (15 entries)
  固体燃料/无烟煤
- Energy, geothermal, converted: 1817.07
  z01
- Energy, geothermal, converted: 2168.76
  z02
- Energy, geothermal, converted: 2080.84
  z03
- Energy, geothermal, converted: 2784.22
  z04
- Energy, geothermal, converted: 2051.53
  z05
- Energy, geothermal, converted: 2227.38
  z06
- Energy, geothermal, converted: 1934.3
  z07
- Energy, geothermal, converted: 2403.22
  z08
- Energy, geothermal, converted: 2373.92
  z09
- hard coal; 26.3 MJ/kg: 69
  固体燃料/无烟煤
- Energy, geothermal, converted: 2344.61
  z11
- Energy, geothermal, converted: 2491.15
  z12
- Energy, geothermal, converted: 2315.3
  z13
- Energy, geothermal, converted: 2168.76
  z14
- Energy, geothermal, converted: 2608.38
  z15
- Energy, geothermal, converted: 2051.53
  z17
- Energy, geothermal, converted: 2285.99
  z20

## Outputs
All rows: measured
- phenol,Sulphur oxides (as SO2): 0.345
  z01
- Flue dust: 0.155
  z01
- phenol,Sulphur oxides (as SO2): 0.872
  z02
- Flue dust: 0.781
  z02
- phenol,Sulphur oxides (as SO2): 3.326
  z03
- Flue dust: 0.339
  z03
- phenol,Sulphur oxides (as SO2): 5.5
  z04
- Flue dust: 0.485
  z04
- phenol,Sulphur oxides (as SO2): 0.876
  z05
- Flue dust: 2.504
  z05
- phenol,Sulphur oxides (as SO2): 1.284
  z06
- Flue dust: 0.418
  z06
- phenol,Sulphur oxides (as SO2): 2.453
  z07
- Flue dust: 0.643
  z07
- phenol,Sulphur oxides (as SO2): 0.246
  z08
- Flue dust: 2.395
  z08
- phenol,Sulphur oxides (as SO2): 6.391
  z09
- Flue dust: 0.351
  z09
- phenol,Sulphur oxides (as SO2): 1.68
  z11
- Flue dust: 1.737
  z11
- phenol,Sulphur oxides (as SO2): 1.8
  z12
- Flue dust: 0
  z12
- phenol,Sulphur oxides (as SO2): 0.043
  z13
- Flue dust: 0.64
  z13
- phenol,Sulphur oxides (as SO2): 0.4
  z14
- Flue dust: 0.903
  z14
- phenol,Sulphur oxides (as SO2): 3.046
  z15
- Flue dust: 1.415
  z15
- phenol,Sulphur oxides (as SO2): 5.13
  z17
- Flue dust: 0.48
  z17
- phenol,Sulphur oxides (as SO2): 4.62
  z20
- Flue dust: 0.778
  z20

## Review details
Inventory: The internal review was done by several iteration steps concerning raw data validation, raw data documentation, representativity, completeness and consistency of modelling with regard to ISO 14040 and 14044.; Documentation: The review of the documentation was performed by Ecobilan and is in compliance with ISO 14040 and 14044. The data set documentation is correct in view of the appropriateness of the information provided. It includes all relevant information in view of data quality and scope of application of the respective LCI result.

## Data sources
- 1.
