# Site preparation stage-Solid wasteand landfill construction

Dataset: ILCD process
Geography: SC-CN
Reference year: 2014
Valid until: 2016
Classification: Materials production / Other mineralic materials
Generated by: Pu Hong, 15695258655@163.com
Review: Dependent internal review by Tiangong LCI Data Working Group
Amounts: no units in this file; such an amount is in the reference unit of its flow, which a separate flow dataset defines

## Geography
China's shale gas extraction work is currently concentrated in the Sichuan and Chongqing areas, and the data from Sichuan and Chongqing are selected for LCA calculations.

## Time period
Raw data dates between 2014-2016

## Inputs
All rows: uniform; article inperiodical
- #325 cement: 199000; min 282000; max 149000
  Components of C30 concrete
- sand: 341000; min 482000; max 255000
  Components of C30 concrete
- gravel: 590000; min 834000; max 441000
  Components of C30 concrete
- freshwater: 94000; min 132000; max 70000
  Components of C30 concrete
- Diesel: 5050; min 7251; max 3689
  Used for material transportation, etc.
- Electricity: 1846.8; min 2610; max 1382.4
  Used for concrete mixing, etc.

## Review details
Inventory: The internal review was done by several iteration steps concerning raw data validation, raw data documentation, representativity, completeness and consistency of modelling with regard to ISO 14040 and 14044.

## Data sources
- Wang, J., Liu, M., McLellan, B. C., Tang, X. & Feng, L. Environmental impacts of shale gas development in China: A hybrid life cycle analysis. Resources, Conservation and Recycling 120, 38–45 (2017).
