# Toluene Production ; Toluene ; Naphtha Route ; Naphtha

Dataset: ILCD process, Unit process, black box
Geography: CN
Reference year: 2006
Classification: Unit processes / Materials production / Organic chemicals
Functional unit: A functional unit is defined as 1 ton of toluene product
LCI method principle: Attributional
LCI method approaches: Allocation - mass
Generated by: Yanan Ren, renyn15@tsinghua.org.cn
Owner: Tiangong LCI Data Working Group
Review: Dependent internal review by Tiangong LCI Data Working Group
Amounts: no units in this file; such an amount is in the reference unit of its flow, which a separate flow dataset defines
copyright: false
licenseType: Free of charge for all users and uses

## General comment
Aromatics Complex, Arosa Grammar Process

## Geography
On-site research and data collection were carried out on the operation status and environmental load of the p-xylene production process

## Time period
Not mentioned, replaced by the publication time of the document

## Technical purpose
Toluene produced via the naphtha route in an aromatics complex using the Arosa Grammar process is commonly used for the synthesis of benzene and xylene derivatives, which are precursors for various chemicals and polymers in the chemical industry. It is also utilized as an industrial solvent for paints, paint thinners, silicone sealants, chemical reactants, and in the production of pharmaceuticals and explosives.

## Reference product
- toluene: 1; measured
  Toluene

## Inputs
- naphtha: 0.68; measured
- light fuel oil: 0.27; measured
  fuel oil
- Electricity: 0.072; measured
  electricity

## Outputs
All rows: measured
- waste water - untreated: 0.11
  Total wastewater
- Oils, unspecified: 1e-5
  Petro
- chemical oxygen demand: 0.00124
  COD
- sulfur dioxide: 0.0018
  SO2
- nitrous oxide: 0.00413
  NOx
- carbon monoxide (fossil): 0.00363
  CO
- carbon dioxide (fossil): 0.74
  CO2
- particles (> PM10): 0.00189
  soot

## Deviations from the LCI method approaches
Study adopting product quality as allocation principle for inventory data

## Data treatment and extrapolations
Quantification of environmental load between products and by-products using mass allocation method

## Use advice
When using this dataset, users must consider the specific conditions of the production such as geographic location, applied technologies and environmental regulations which may differ from the one referenced in the study. The mass allocation method has been used for environmental load quantification, and users should take this into account especially when comparing datasets with different allocation methods. Ensure that the dataset aligns with the goal and scope of the intended LCA. For comparison purposes, the functional unit should be maintained as 1 ton of toluene product.

## Review details
Inventory: The internal review was done by several iteration steps concerning raw data validation, raw data documentation, representativity, completeness and consistency of modelling with regard to ISO 14040 and 14044.

## Data sources
- 马骕. 涤纶纺织品的生命周期评价. (东华大学, 2007).
