# Collection and Transportation of straw｜straw｜Trucks with a capacity of 16 tons

Dataset: ILCD process, Unit process, single operation
Geography: CN
Reference year: 2010
Classification: Unit processes / Transport services / Road
Functional unit: 1 ton of straw as a functional unit (0% moisture content).
LCI method principle: Consequential
Generated by: Chaoshuo Liu, liucs22@mails.jlu.edu.cn
Owner: Tiangong LCI Data Working Group
Review: Dependent internal review by Tiangong LCI Data Working Group
Amounts: no units in this file; such an amount is in the reference unit of its flow, which a separate flow dataset defines
copyright: false
licenseType: Free of charge for all users and uses

## General comment
The system boundary of this document includes the growth stage of crops, the acquisition stage of agricultural waste (straw), the pretreatment stage of agricultural waste (straw), and the stage of combustion and power generation (the stage of final use of electricity is also included, but there is no emission in the process).This process is the collection and transportation stage of agricultural waste.

## Technical purpose
This industrial process pertains to the logistics of agricultural waste, specifically the collection and transportation of straw for use in energy production. The straw gathered through this process is intended as a biomass fuel for combustion and power generation, with the service provided by trucks with a carrying capacity of 16 tons. The transported straw has zero moisture content and is quantified per ton, following its full lifecycle from crop growth to energy conversion.

## Reference product
- Crop straw: 1000; measured

## Outputs
All rows: measured
- sulfur dioxide: 0.00585
- carbon monoxide,carbon monoxide (fossil): 0.00342
  The expert notes that the original text does not differentiate between biogenic and fossil sources of emissions, and in their opinion, the emissions in question are fossil.
- nitrous oxide: 0.171, 0.01369 (2 entries)
- particles (> PM10),particles (> PM10): 0.00279
- hydrocarbons (unspecified): 0.0102
- carbon dioxide (fossil): 14.68
  (same comment as for carbon monoxide,carbon monoxide (fossil))
- methane (fossil): 0.044
  (same comment as for carbon monoxide,carbon monoxide (fossil))

## Use advice
When utilizing this data set for Life Cycle Assessment (LCA), ensure to include it within the scope of inventory analysis specifically for the collection and transportation stage of straw as a biomass feedstock. It is crucial to bear in mind the functional unit of 1 ton of straw at 0% moisture content, and to consider the system boundaries that encompass the crop growth, straw acquisition, pretreatment, and associated emissions up to the power generation stage. Exclusion of the usage phase might be applicable when the final electricity usage does not result in further direct emissions associated with this LCA study.

## Review details
Inventory: The internal review was done by several iteration steps concerning raw data validation, raw data documentation, representativity, completeness and consistency of modelling with regard to ISO 14040 and 14044.

## Data sources
- Lu, W. & Zhang, T. Life-Cycle Implications of Using Crop Residues for Various Energy Demands in China. Environ. Sci. Technol. 44, 4026–4032 (2010).
