# NCM pyrometallurgical recycling

Dataset: ILCD process, Unit process, single operation
Geography: CN
Reference year: 2020
Classification: Unit processes / End-of-life treatment / Material recycling
Functional unit: The product systems evaluated in this study are EB batteries. The service provided by these batteries is the distance driven; thus, the functional unit in this study is defined as an overall 100-km driving distance of a typical EB driven by a group of batteries (4 × 12 V, 20 Ah). According to the data of EB manufacturers, LFP, and NCM batteries can support a typical EB to travel for approximately 45 km and 50 km with one charge, the calculated lifetime distance is of 36, 000 km, and 30,000 km, respectively.
Generated by: maqingyuan, m1120498928@163.com
Owner: Tiangong LCI Data Working Group
Review: Dependent internal review by Tiangong LCI Data Working Group
Amounts: no units in this file; such an amount is in the reference unit of its flow, which a separate flow dataset defines
copyright: false
licenseType: Free of charge for all users and uses

## General comment
Recycle the precursor material (lithium nickel cobalt manganate oxide) from NCM batteries.

## Technical purpose
The NCM pyrometallurgical recycling process is utilized for recovering the precursor materials, specifically lithium nickel cobalt manganate oxide, from spent NCM batteries. It supports the sustainability of lithium-ion battery technology by enabling the circular economy of these materials. This process is applicable to battery recycling plants that manage end-of-life batteries, turning them into valuable raw materials for new battery production.

## Reference product
- Ni-Co-Mn precursor: 0.604; measured
  Lithium nickel cobalt manganese

## Inputs
All rows: measured
- sulfate: 6.47
  Sulfate (98%)
- Heavy oil: 0.016
- silicon: 0.021
- Light gas oil: 0.013
- Water for industrial use: 64
- Electricity: 101.88
- carbon: 0.002
- natural gas,natural gas: 0.979
- magnesium chloride: 0.0009
- potassium chloride: 0.0004
- sodium chloride: 0.0005
- Lithium carbonate: 0.846
- Raw coal: 6.87

## Outputs
All rows: measured
- Secondary Synthetic Graphite: 1.21
- Secondary Aluminum: 0.35
- Secondary copper: 0.324
- Recycled Polypropylene: 0.198
- carbon dioxide (fossil): 0.953
  The original text does not distinguish between bio and fossil, and according to experts, it is fossil here
- nickel: 7e-5
- Total particulate matter: 2.2e-5
- sulfur dioxide: 2.16e-6
- nitrogen monoxide: 1.5e-5
- aluminium: 0.005
- Waste Graphite: 5.1e-5
- chemical oxygen demand: 7.3e-8
- hazardous waste (unspecified): 0.0523
- waste incineration of plastics (PE, PP, PS, PB): 0.005

## Data selection and combination
The life cycle inventories of NCM and LFP batteries were established based on the survey data from 2018 to 2019, representing the current status of the lithium-ion battery technology.

## Sampling procedure
The LCI of battery recycling is established based on the survey data of several battery recyclers in China, including Chunxing, Yuguang Gold Lead (for LABs), GEM, and Brunp (for LIBs). The distance from the waste battery collection site to the battery recycling plant is assumed to be 100 km.

## Use advice
When using the lifecycle inventory (LCI) data for NCM and LFP batteries, it is essential to consider the technological scope and time frame of the data collected between 2018 and 2019 which may not reflect future advancements. The assumption of a 100 km transport distance from collection site to recycling plant must be adapted to match specific geographical and logistic conditions. For LCA purposes, the functional unit's defined lifetime distance of 36,000 km for LFP batteries and 30,000 km for NCM batteries should be used to model the use phase behavior accurately. Furthermore, methodological advice includes considering potential technological changes in recycling processes and updating data for more accurate future assessments.

## Review details
Inventory: The internal review was done by several iteration steps concerning raw data validation, raw data documentation, representativity, completeness and consistency of modelling with regard to ISO 14040 and 14044.

## Data sources
- Liu, W., Liu, H., Liu, W. & Cui, Z. Life cycle assessment of power batteries used in electric bicycles in China. RENEWABLE & SUSTAINABLE ENERGY REVIEWS 139, (2021).
