# Soil Remediation;In-situ Remediation;In-situ Chemical Oxidation;Transportation of Equipment and Materials to Site

Dataset: ILCD process, Unit process, single operation
Geography: CN
Reference year: 2021
Classification: Unit processes / Other Services / Repair and maintenance
Generated by: Wang Ning, wang_ning@caep.org.cn
Owner: Tiangong LCI Data Working Group
Review: Dependent internal review by Tiangong LCI Data Working Group
Amounts: no units in this file; such an amount is in the reference unit of its flow, which a separate flow dataset defines
copyright: false
licenseType: Free of charge for all users and uses

## General comment
Transportation of required equipment, materials, chemicals, etc. to the site

## Technical purpose
The provided data set describes the transportation phase within soil remediation projects specifically employing in-situ chemical oxidation techniques. It is applicable for environmental engineering firms and consultants focused on the restoration of contaminated land through on-site chemical treatment processes.

## Reference product
- Equipment and Materials Arriving on Site: 1.43586e6; measured

## Inputs
- transport in t*km: 2153.8; measured

## Use advice
When utilizing this data, users should include all transportation activities of equipment, materials, and chemicals as part of the in-situ soil remediation process life cycle assessment. Users must account for the entire unit process, including all major raw materials and energy consumption associated with the on-site delivery. This data should not be used in isolation but rather in conjunction with the overall environmental impact study of the in-situ soil remediation project.

## Review details
Inventory: The internal review was done by several iteration steps concerning raw data validation, raw data documentation, representativity, completeness and consistency of modelling with regard to ISO 14040 and 14044.

## Data sources
- 王顺扬. 基于多目标决策方法改进LCA的污染场地修复技术比选研究.山西大学（硕士论文）,2021.
