# Treatment of wasted electrodeionization module ; mix of incineration and landfilling, CN

Dataset: ILCD process, Unit process, single operation
Geography: CN
Reference year: 2022
Classification: End-of-life treatment / Other end-of-life services
Functional unit: 1 item of EDI module
Generated by: Jiaqi Lu, wilsherelu@foxmail.com
Owner: Tiangong LCI Data Working Group
Review: Dependent internal review by Tiangong LCI Data Working Group
Amounts: no units in this file; such an amount is in the reference unit of its flow, which a separate flow dataset defines
copyright: false
licenseType: Free of charge for all users and uses

## General comment
The process data described pertains to the end-of-life treatment of electrodeionization (EDI) modules. These modules are typically used in water purification systems for industrial applications requiring high-purity water, such as power generation plants, pharmaceutical production, and microelectronics manufacturing.

## Reference product
- Electrodeionization components: 1; input; article inperiodical
  1 wasted EDI module

## Outputs
All rows: article inperiodical
- landfill of ferro metals: 1.2
  Waste titanium-coated ruthenium electrodes
- waste incineration of plastics (unspecified) fraction in municipal solid waste (MSW): 4.5
  Waste stainless steel electrodes
- waste incineration of plastics (unspecified) fraction in municipal solid waste (MSW): 12.71
  Obsolete EDI Shell (UPVC)
- waste incineration of plastics (unspecified) fraction in municipal solid waste (MSW): 3.82
  Abandoned EDI shell (ABS)
- waste incineration of plastics (unspecified) fraction in municipal solid waste (MSW): 3.35
  Waste anion exchange resin
- waste incineration of plastics (unspecified) fraction in municipal solid waste (MSW): 2.75
  Waste cation exchange resin
- waste incineration of plastics (unspecified) fraction in municipal solid waste (MSW): 1.55
  Waste polyethylene
- waste incineration of plastics (unspecified) fraction in municipal solid waste (MSW): 3.36
  Waste anion exchange membrane
- waste incineration of plastics (unspecified) fraction in municipal solid waste (MSW): 4.38
  Waste cation exchange membrane
- waste incineration of plastics (unspecified) fraction in municipal solid waste (MSW): 0.71
  Waste epoxy resin glue

## Use advice
When utilizing this data set, users should consider the environmental impact of both the incineration and landfilling components of the treatment process. The data is specific to the Chinese context (indicated by 'CN'), and hence may not be directly applicable to other regional settings without adjustments for local environmental regulations and practices. It is also important to account for technology advancements that could affect the end-of-life processing measures for EDI modules over time.

## Review details
Inventory: The internal review was done by several iteration steps concerning raw data validation, raw data documentation, representativity, completeness and consistency of modelling with regard to ISO 14040 and 14044.

## Data sources
- Yuan, Y. et al. Deduction of carbon footprint for membrane desalination processes towards carbon neutrality: A case study on electrodeionization for ultrapure water preparation. Desalination 559, 116648 (2023).
