# Circulating water system ; Circulating cold water ; Circulating water ; Circulating cooling water ; All sizes; NESPS2 / 循环水系统 ; 循环冷水 ; 循环水量 ; 循环冷却水 ; 所有规模 ; 全国第二次污染普查数据

Dataset: ILCD process, Unit process, single operation
Geography: CN
Reference year: 2019
Classification: Reference Parameters / Energy carriers and technologies / Heat and steam
Generated by: The data was created by the Office of the Second National Pollution Source Census of the Ministry of Ecology and Environment, and the data was organized by the TianGong Plan team for ILCD format / 生态环境部第二次全国污染源普查工作办公室创建数据，天工计划团队常慧敏整理数据为ILCD格式
Owner: Tiangong LCI Data Working Group / 天工LCI数据工作小组
Review: Dependent internal review by Tiangong LCI Data Working Group / 天工LCI数据工作小组
Amounts: no units in this file; such an amount is in the reference unit of its flow, which a separate flow dataset defines
copyright: false
licenseType: Free of charge for all users and uses

## General comment
the Technical of end-of-pipe management technology for pollution chemical oxygen demandisPhysical treatment + biological treatment，Its Technical efficiency of end-of-pipe management83

## Technical purpose
所描述的工业过程用于循环冷水的水处理系统。它适用于各种规模，并专门设计用于处理废水污染物的末端管控技术，如化学需氧量（COD）、氨氮、有机结合氮、石油相关废物、苯酚、氰化物和总磷。末端管控处理的有效性取决于所应用的物理、生物和物理化学或化学处理的组合。

## Reference product
- Cooling water: 1; input; calculated
  源文件中描述为为循环水量，此处对其进行了匹配工作，将其匹配到LCAflow库里面相最符合的流，污染物指标备注为工业废水量

## Outputs
All rows: calculated
- cyanide: 0
  the Technical of end-of-pipe management technology for pollution cyanideisPhysical treatment + biological treatment + physicochemical treatment (or physical treatment, chemical treatment)，Its Technical efficiency of end-of-pipe management88
  污染物指标氰化物的末端治理技术是物理处理法+生物处理法+物理化学处理法（或物理处理法、化学处理法），其效率为88，末端治理设施实际运行率（k值）计算公式为k=污水治理设施运行时间/正常生产时间。原文件中描述污染物类别为废水，污染物指标为氰化物，此处对其进行了匹配工作，将其匹配到LCAflow库里面相最符合的流，污染物指标备注为氰化物原文描述的产污系数为 未检出。请根据备注自行核算后修改对应的排放量。
- cyanide: 0
  the Technical of end-of-pipe management technology for pollution cyanideisPhysical treatment + biological treatment，Its Technical efficiency of end-of-pipe management79
  污染物指标氰化物的末端治理技术是物理处理法+生物处理法，其效率为79，末端治理设施实际运行率（k值）计算公式为k=污水治理设施运行时间/正常生产时间。原文件中描述污染物类别为废水，污染物指标为氰化物，此处对其进行了匹配工作，将其匹配到LCAflow库里面相最符合的流，污染物指标备注为氰化物原文描述的产污系数为 0。请根据备注自行核算后修改对应的排放量。
- Petroleum-related waste: 8.5e-5
  the Technical of end-of-pipe management technology for pollution Petroleum-related wasteisPhysical treatment + biological treatment + physicochemical treatment (or physical treatment, chemical treatment)，Its Technical efficiency of end-of-pipe management98
  污染物指标石油类的末端治理技术是物理处理法+生物处理法+物理化学处理法（或物理处理法、化学处理法），其效率为98，末端治理设施实际运行率（k值）计算公式为k=污水治理设施运行时间/正常生产时间。原文件中描述污染物类别为废水，污染物指标为石油类，此处对其进行了匹配工作，将其匹配到LCAflow库里面相最符合的流，污染物指标备注为石油类
- phenol: 0.0001578
  the Technical of end-of-pipe management technology for pollution phenolisPhysical treatment + biological treatment + physicochemical treatment (or physical treatment, chemical treatment)，Its Technical efficiency of end-of-pipe management98
  污染物指标挥发酚的末端治理技术是物理处理法+生物处理法+物理化学处理法（或物理处理法、化学处理法），其效率为98，末端治理设施实际运行率（k值）计算公式为k=污水治理设施运行时间/正常生产时间。原文件中描述污染物类别为废水，污染物指标为挥发酚，此处对其进行了匹配工作，将其匹配到LCAflow库里面相最符合的流，污染物指标备注为挥发酚
- phenol: 0.0002367
  the Technical of end-of-pipe management technology for pollution phenolisPhysical treatment + biological treatment，Its Technical efficiency of end-of-pipe management97
  污染物指标挥发酚的末端治理技术是物理处理法+生物处理法，其效率为97，末端治理设施实际运行率（k值）计算公式为k=污水治理设施运行时间/正常生产时间。原文件中描述污染物类别为废水，污染物指标为挥发酚，此处对其进行了匹配工作，将其匹配到LCAflow库里面相最符合的流，污染物指标备注为挥发酚
- Petroleum-related waste: 0.0002975
  the Technical of end-of-pipe management technology for pollution Petroleum-related wasteisPhysical treatment + biological treatment，Its Technical efficiency of end-of-pipe management93
  污染物指标石油类的末端治理技术是物理处理法+生物处理法，其效率为93，末端治理设施实际运行率（k值）计算公式为k=污水治理设施运行时间/正常生产时间。原文件中描述污染物类别为废水，污染物指标为石油类，此处对其进行了匹配工作，将其匹配到LCAflow库里面相最符合的流，污染物指标备注为石油类
- Waste water: 463
  the Technical of end-of-pipe management technology for pollution Waste wateris/，Its Technical efficiency of end-of-pipe management0
  污染物指标工业废水量的末端治理技术是/，其效率为0，末端治理设施实际运行率（k值）计算公式为k=污水治理设施运行时间/正常生产时间。原文件中描述污染物类别为废水，污染物指标为工业废水量，此处对其进行了匹配工作，将其匹配到LCAflow库里面相最符合的流，污染物指标备注为工业废水量
- phosphorus, total: 0.0009154
  the Technical of end-of-pipe management technology for pollution phosphorus, totalisPhysical treatment + biological treatment + physicochemical treatment (or physical treatment, chemical treatment)，Its Technical efficiency of end-of-pipe management77
  污染物指标总磷的末端治理技术是物理处理法+生物处理法+物理化学处理法（或物理处理法、化学处理法），其效率为77，末端治理设施实际运行率（k值）计算公式为k=污水治理设施运行时间/正常生产时间。原文件中描述污染物类别为废水，污染物指标为总磷，此处对其进行了匹配工作，将其匹配到LCAflow库里面相最符合的流，污染物指标备注为总磷
- phosphorus, total: 0.0010746
  the Technical of end-of-pipe management technology for pollution phosphorus, totalisPhysical treatment + biological treatment，Its Technical efficiency of end-of-pipe management73
  污染物指标总磷的末端治理技术是物理处理法+生物处理法，其效率为73，末端治理设施实际运行率（k值）计算公式为k=污水治理设施运行时间/正常生产时间。原文件中描述污染物类别为废水，污染物指标为总磷，此处对其进行了匹配工作，将其匹配到LCAflow库里面相最符合的流，污染物指标备注为总磷
- Ammonia Nitrogen: 0.0019875
  the Technical of end-of-pipe management technology for pollution Ammonia NitrogenisPhysical treatment + biological treatment + physicochemical treatment (or physical treatment, chemical treatment)，Its Technical efficiency of end-of-pipe management75
  污染物指标氨氮的末端治理技术是物理处理法+生物处理法+物理化学处理法（或物理处理法、化学处理法），其效率为75，末端治理设施实际运行率（k值）计算公式为k=污水治理设施运行时间/正常生产时间。原文件中描述污染物类别为废水，污染物指标为氨氮，此处对其进行了匹配工作，将其匹配到LCAflow库里面相最符合的流，污染物指标备注为氨氮
- Ammonia Nitrogen: 0.0019875
  the Technical of end-of-pipe management technology for pollution Ammonia NitrogenisPhysical treatment + biological treatment，Its Technical efficiency of end-of-pipe management75
  污染物指标氨氮的末端治理技术是物理处理法+生物处理法，其效率为75，末端治理设施实际运行率（k值）计算公式为k=污水治理设施运行时间/正常生产时间。原文件中描述污染物类别为废水，污染物指标为氨氮，此处对其进行了匹配工作，将其匹配到LCAflow库里面相最符合的流，污染物指标备注为氨氮
- Nitrogen, organic bound: 0.008584
  the Technical of end-of-pipe management technology for pollution Nitrogen, organic boundisPhysical treatment + biological treatment + physicochemical treatment (or physical treatment, chemical treatment)，Its Technical efficiency of end-of-pipe management71
  污染物指标总氮的末端治理技术是物理处理法+生物处理法+物理化学处理法（或物理处理法、化学处理法），其效率为71，末端治理设施实际运行率（k值）计算公式为k=污水治理设施运行时间/正常生产时间。原文件中描述污染物类别为废水，污染物指标为总氮，此处对其进行了匹配工作，将其匹配到LCAflow库里面相最符合的流，污染物指标备注为总氮
- Nitrogen, organic bound: 0.010952
  the Technical of end-of-pipe management technology for pollution Nitrogen, organic boundisPhysical treatment + biological treatment，Its Technical efficiency of end-of-pipe management63
  污染物指标总氮的末端治理技术是物理处理法+生物处理法，其效率为63，末端治理设施实际运行率（k值）计算公式为k=污水治理设施运行时间/正常生产时间。原文件中描述污染物类别为废水，污染物指标为总氮，此处对其进行了匹配工作，将其匹配到LCAflow库里面相最符合的流，污染物指标备注为总氮
- chemical oxygen demand: 0.02664
  the Technical of end-of-pipe management technology for pollution chemical oxygen demandisPhysical treatment + biological treatment + physicochemical treatment (or physical treatment, chemical treatment)，Its Technical efficiency of end-of-pipe management88
  污染物指标化学需氧量的末端治理技术是物理处理法+生物处理法+物理化学处理法（或物理处理法、化学处理法），其效率为88，末端治理设施实际运行率（k值）计算公式为k=污水治理设施运行时间/正常生产时间。原文件中描述污染物类别为废水，污染物指标为化学需氧量，此处对其进行了匹配工作，将其匹配到LCAflow库里面相最符合的流，污染物指标备注为化学需氧量
- chemical oxygen demand: 0.03774
  the Technical of end-of-pipe management technology for pollution chemical oxygen demandisPhysical treatment + biological treatment，Its Technical efficiency of end-of-pipe management83
  污染物指标化学需氧量的末端治理技术是物理处理法+生物处理法，其效率为83，末端治理设施实际运行率（k值）计算公式为k=污水治理设施运行时间/正常生产时间。原文件中描述污染物类别为废水，污染物指标为化学需氧量，此处对其进行了匹配工作，将其匹配到LCAflow库里面相最符合的流，污染物指标备注为化学需氧量

## Use advice
This dataset is derived from the Pollution Source Census Report and contains information on pollution emissions and related products. However, it does not include data on energy or chemical consumption, nor does it provide information on waste or co-product generation. When utilizing this dataset, please supplement the missing data based on actual conditions before use
该数据集来源于污染源普查报告，包含污染物排放及相关产品信息，但不包含能源或化学品消耗数据，也不提供废弃物或共生产物产生信息。在使用该数据集时，请根据实际情况补充缺失数据后再使用。

## Review details
Inventory: The internal review was done by several iteration steps concerning raw data validation, raw data documentation, representativity, completeness and consistency of modelling with regard to ISO 14040 and 14044.
清单： 内部审查通过几个迭代步骤完成，涉及原始数据验证、原始数据记录、代表性、完整性、与 ISO 14040 和 14044 有关的建模的一致性。

## Data sources
- 第二次全国污染源普查产排污核算系数手册（试用版）,二级代码25,四级代码2511文件，在完整版文件中第4111页
