# Stratigraphic exploration;Gypsum salt layer; Geophysical and geochemical exploration survey

Dataset: ILCD process, Unit process, single operation
Geography: SC-CN
Reference year: 2014
Classification: Unit processes / Energy carriers and technologies / Energetic raw materials
LCI method principle: Attributional
LCI method approaches: Consequential
Generated by: Shikang Kang, 908798159@qq.com
Owner: Tiangong LCI Data Working Group
Review: Dependent internal review by Tiangong LCI Data Working Group
Amounts: no units in this file; such an amount is in the reference unit of its flow, which a separate flow dataset defines
copyright: false
licenseType: Free of charge for all users and uses

## General comment
Based on the detailed interpretation of seismic data in the range of 6 × 104 km ~ 2 in the central and eastern Sichuan Basin, the regional distribution characteristics of the Middle and Lower Cambrian gypsum salt rocks in the eastern Sichuan Basin are revealed. Fault-related folds are developed above gypsum salt rocks, while 6-7 rows of NNE and NE-trending gentle anticlines are mainly distributed below gypsum salt rocks.

## Geography
East Sichuan Basin

## Time period
Publication time of literature

## Technology and included processes
Based on the comprehensive analysis of outcrop and drilling data and the interpretation of seismic data above 6 × 104km ~ 2, the regional distribution of the Middle-Lower Cambrian gypsum salt layer in the eastern Sichuan Basin is described, the reservoir-forming conditions of the deep-salt Lower Sinian-Cambrian natural gas in the eastern Sichuan Basin are discussed, and the favorable exploration direction is pointed out

## Technical purpose
The seismic and geological data for the stratigraphic exploration process pertain to the identification of reservoir-forming conditions and potential exploration areas in the East Sichuan Basin. This data is crucial for organizations involved in natural gas exploration, particularly those that specialize in locating and characterizing subsalt hydrocarbon reservoirs. The analysis of specific geologic formations (like the Dengying Formation and Shilongdong Formation) for their capacity to act as source rocks, reservoir rocks, or regional caps, informs decisions on drilling locations and exploration strategies in the quest for deep-salt Lower Sinian-Cambrian natural gas deposits.

## Reference product
- Well pad: 6e10; input; log-normal
  Basin range

## Inputs
- natural gas: 4.45e-7; log-normal
  There is no natural gas input in the literature, assuming that the input and output during natural gas extraction process are 1:1

## Outputs
- natural gas: 4.45e-7; log-normal; calculated
  Maximum permeability

## Data selection and combination
Source rocks of Doushantuo Formation of Sinian, the third member of Dengying Formation of Sinian and Shuijingtuo Formation of Dominant Cambrian; The second and fourth members of Dengying Formation of Sinian and the third group of weathering crust karst reservoirs and grain beach reservoirs of Shilongdong Formation of Cambrian; Regional cap of gypsum salt and shale of middle and lower Cambrian in Shuijingtuo Formation. The primary target of deep subsalt exploration in East Sichuan Basin should be the fourth member of Dengying Formation, followed by Shilongdong Formation and the second member of Dengying Formation

## Use advice
Users of this dataset should apply it with caution, ensuring that the geological parameters and regional characteristics specific to the East Sichuan Basin are considered when modeling reservoir potentials and designing exploration strategies. It is crucial to take the regional geology, such as the fault-related folds and the layout of anticlines, into account when using the data. Additionally, the identified priority targets for exploration, namely the fourth member of the Dengying Formation followed by the Shilongdong Formation and the second member of the Dengying Formation, should guide the use of this data set in exploration endeavors.

## Review details
Inventory: The internal review was done by several iteration steps concerning raw data validation, raw data documentation, representativity, completeness and consistency of modelling with regard to ISO 14040 and 14044.

## Data sources
- Gu, Z. et al. Accumulation conditions and exploration directions of natural gas in deep subsalt Sinian-Cambrian System in the eastern Sichuan Basin, SW China. Petroleum Exploration and Development 42, 152–166 (2015).
