# Aluminum fluoride production ; Aluminum fluoride ; Cradle

Dataset: ILCD process, Unit process, single operation
Geography: CN
Reference year: 2019
Classification: Unit processes / Materials production / Inorganic chemicals
Generated by: Zimeng Cai, caizm6178@163.com
Owner: Tiangong LCI Data Working Group
Review: Dependent internal review by Tiangong LCI Data Working Group
Amounts: no units in this file; such an amount is in the reference unit of its flow, which a separate flow dataset defines
copyright: false
licenseType: Free of charge for all users and uses

## General comment
Aluminum fluoride produced through this industrial process is primarily utilized as a flux in the production of aluminum by electrolysis. It is also used in the manufacture of ceramics, enamels, and in the glassmaking industry.

## Time period
Date of publication

## Reference product
- aluminium fluoride: 1000; software or database
  aluminum fluoride

## Inputs
- hard coal; 26.3 MJ/kg: 108.896; software or database
  Fuel mix: raw coal (1%), raw NG (1%), crude oil (24%), clean coal (73%),
- natural gas, high pressure: 108.906; software or database
  Fuel mix: raw coal (1%), raw NG (1%), crude oil (24%), clean coal (73%),
- crude oil; 42.3 MJ/kg: 2613.98; software or database
  Fuel mix: raw coal (1%), raw NG (1%), crude oil (24%), clean coal (73%),
- hard coal: 7951.58; software or database
  Fuel mix: raw coal (1%), raw NG (1%), crude oil (24%), clean coal (73%),

## Data selection and combination
Inventories of energy input and material flow are collected from updated yearbook s, published papers, official reports and databases. The details of the inventory are presented as Table 1. It should be noted that the data for the material transportation assumptions are based on relevant studies, whic h may be slightly different from the actual situation. The life-cycle intensities of each end-use energy type are based on the results of our previous studies.

## Use advice
When utilizing this dataset for Life Cycle Assessment, incorporate the inventories of energy input and material flow as specified in Table 1, ensuring that the transportation assumptions are adjusted to reflect the actual situation as closely as possible. The life-cycle intensities for each end-use energy type must be applied in accordance with the results from previous related studies. Considerations regarding technological applicability should include any updates or changes in production technology that could affect the environmental impacts of the process.

## Review details
Inventory: The internal review was done by several iteration steps concerning raw data validation, raw data documentation, representativity, completeness and consistency of modelling with regard to ISO 14040 and 14044.

## Data sources
- Peng, T., Ou, X., Yan, X. & Wang, G. Life-cycle analysis of energy consumption and GHG emissions of aluminium production in China. in Energy Procedia vol. 158 3937–3943 (2019).
