# Brick production ; concrete pavement brick ; Curing process

Dataset: ILCD process, Unit process, single operation
Geography: JNA-SD-CN
Reference year: 2018
Classification: Unit processes / Materials production / Other mineralic materials
Functional unit: The functional unit is the area of 1 m2 brick products.
Generated by: Wang xiangjin, r99rt4@163.com
Owner: Tiangong LCI Data Working Group
Review: Dependent internal review by Tiangong LCI Data Working Group
Amounts: no units in this file; such an amount is in the reference unit of its flow, which a separate flow dataset defines
copyright: false
licenseType: Free of charge for all users and uses

## General comment
Non sintering process of concrete pavement bricks

## Technical purpose
The concrete pavement bricks produced in this process are primarily used for constructing durable road surfaces and pedestrian paths. They are suitable for various outdoor applications including public squares, parking lots, and urban road systems. The inclusion of permeable bricks allows for better water management, making the surfaces more environmentally friendly by reducing runoff and facilitating groundwater recharge.

## Reference product
- concrete pavement brick: 1; measured

## Inputs
- green brick: 90; measured
- freshwater: 3.9; measured

## Deviations from the LCI method approaches
ReCiPe midpoint (H) model is applied in this study.

## Data selection and combination
In this study, the production energy consumption of concrete pavement brick and permeable brick as well as the relevant data of all kinds of raw materials and energy input and exhaust emissions are collected from Jinan Shunde Cement Products Co. Ltd. Shandong Province.

## Sampling procedure
Most data of raw materials, energy input and waste discharge were collected from the site investigation of manufacturer. Water reducer is also called water reducing agent, whose chemical constituents is the sodium salt of the sulfonate formaldehyde condensation

## Use advice
When utilizing the LCA data from the given study, pay close attention to the production energy consumption figures of concrete pavement and permeable bricks. Make sure to account for all inputs including raw materials and energy, as well as outputs such as waste and exhaust emissions. The sensitivity analysis should be noted, whereby changes in inputs and outputs by more than 5% in key processes must be considered. The ReCiPe midpoint (H) model must be applied for impact assessment. The functional unit should be regarded as 1m2 of brick product area for any comparisons or analyses carried out.

## Review details
Inventory: The internal review was done by several iteration steps concerning raw data validation, raw data documentation, representativity, completeness and consistency of modelling with regard to ISO 14040 and 14044.

## Data sources
- Yuan, X. et al. Environmental and economic impacts assessment of concrete pavement brick and permeable brick production process - A case study in China. Journal of Cleaner Production 171, 198–208 (2018).
