# Soil Remediation;In-situ Remediation;Electro Remediation;Remediation;Remediated Soil

Dataset: ILCD process, Unit process, single operation
Geography: IT
Reference year: 2015
Classification: Unit processes / Other Services / Repair and maintenance
Generated by: Wang Ning, wang_ning@caep.org.cn
Owner: Tiangong LCI Data Working Group
Review: Dependent internal review by Tiangong LCI Data Working Group
Amounts: no units in this file; such an amount is in the reference unit of its flow, which a separate flow dataset defines
copyright: false
licenseType: Free of charge for all users and uses

## General comment
The electrolyte is fed and energised, and the contaminated soil is remediated.

## Technical purpose
This in-situ electro-remediation process is applied for the decontamination of polluted soil. The process involves the application of an electric current to the contaminated land through an electrolyte solution, leading to the soil's remediation. It is intended for environmental restoration activities and can be employed across various sectors, including industrial, residential, and agricultural areas where soil pollution is a concern.

## Reference product
- Remediated soil: 168; measured

## Inputs
All rows: measured
- Tap Water: 43408
- Electricity: 139968
- contaminated soil: 168
- Urea: 2805
- Potassium iodide: 135

## Outputs
- Wastewater: 40819; measured
- Tap Water: 2803; measured
  土壤中流失的水分
- Urea: 2726; measured
  土壤中的硝酸流失

## Use advice
When utilizing this data for Life Cycle Assessment (LCA), ensure the in-situ electro-remediation process data is applicable to the specific contamination scenario within your assessment. Consider site-specific variables such as soil type, pollution level, and local regulations. It is crucial to include all relevant inputs and outputs in your LCA model, particularly those related to the essential raw materials and energy consumption. Pay attention to regional specificity and the technological applicability of the remediation method in the context of the intended remediation objectives.

## Review details
Inventory: The internal review was done by several iteration steps concerning raw data validation, raw data documentation, representativity, completeness and consistency of modelling with regard to ISO 14040 and 14044.

## Data sources
- Vocciante, M., Caretta, A., Bua, L., Bagatin, R. & Ferro, S. Enhancements in ElectroKinetic Remediation Technology: Environmental assessment in comparison with other configurations and consolidated solutions. Chemical Engineering Journal 289, 123–134 (2016).
