# Crude steel production;Crude steel;Casting(Coal-DR)

Dataset: ILCD process, Unit process, single operation
Geography: CN
Classification: Unit processes / Materials production / Metals and semimetals
Generated by: Fuxiang, 1162850692@qq.com
Owner: Tiangong LCI Data Working Group
Review: Dependent internal review by Tiangong LCI Data Working Group
Amounts: no units in this file; such an amount is in the reference unit of its flow, which a separate flow dataset defines
copyright: false
licenseType: Free of charge for all users and uses

## General comment
Crude steel produced through the coal-based direct reduction and continuous casting process is primarily used for structural components, construction materials, manufacturing of machinery, and as a feedstock for further processing into various steel products.

## Geography
The LCI of Coal-DR is obtained, as shown in Table 9, based on the statistics of the demonstration project in China.

## Reference product
- Crude Steel: 1000; calculated
  Crude steel

## Inputs
- Molten steel: 1000; calculated
- freshwater,freshwater: 800; calculated
- Electricity: 211.32; calculated

## Data treatment and extrapolations
LCI of COG-DR and H-DR routes, which is not scaled-up in China are estimated based on Coal-DR routes combined with literature data from simulations, laboratory tests, and process modeling in Table 9 [49,50]. The LCI of Coal-DR is obtai

## Use advice
When utilizing this LCA data set, users should consider the technological specificity of the data based on coal direct reduction (Coal-DR) methodologies in China. The data must be scaled appropriately if applied to contexts outside of the demonstrated project. Assumptions from simulations, laboratory tests, and process modelling should be critically evaluated especially when comparing with other steel production routes or applying to geographical regions with different energy mixes, technological standards, or environmental regulations.

## Review details
Inventory: The internal review was done by several iteration steps concerning raw data validation, raw data documentation, representativity, completeness and consistency of modelling with regard to ISO 14040 and 14044.

## Data sources
- The carbon reduction potential of hydrogen in the low carbon transition of the iron and steel industry: The case of China
