# Plexiglass ; PMMA: Polymethyl Methacrylate (also known as Acrylic or Plexiglass); monomer MMA

Dataset: ILCD process, Unit process, single operation
Geography: JX-CN
Classification: Unit processes / Materials production / Glass and ceramics
Generated by: He xiaxia, 18616148319@163.com
Owner: Tiangong LCI Data Working Group
Review: Dependent internal review by Tiangong LCI Data Working Group
Amounts: no units in this file; such an amount is in the reference unit of its flow, which a separate flow dataset defines
copyright: false
licenseType: Free of charge for all users and uses

## General comment
The monomer MMA (Methyl Methacrylate) is predominantly utilized in the production of PMMA (Polymethyl Methacrylate), commonly known as acrylic or acrylic glass. PMMA is extensively used in applications that require transparency and high strength, such as light fixtures, shatterproof alternative to glass, construction materials, automotive components, and various consumer goods.

## Reference product
- methyl methacrylate: 1000; measured

## Inputs
- Electricity: 476.64; measured
- methyl methacrylate: 997.513; measured
- organic waste (unspecified): 2.487; measured

## Outputs
All rows: measured
- methyl methacrylate: 981.4
- freshwater: 1.5
- methanol: 9.5
- methacrylic acid: 1
- methacrylate: 6
- organic waste (unspecified): 0.6

## Use advice
When utilizing this LCA data, users should ensure the inclusion of the energy required for the entire production process of MMA and its subsequent polymerization to PMMA. It is important to account for upstream impacts, such as raw material extraction and processing. For accuracy, consider the geographical location and technological specifics as they can significantly impact the environmental footprint. Exclude recycling processes unless the study specifically incorporates end-of-life scenarios.

## Review details
Inventory: The internal review was done by several iteration steps concerning raw data validation, raw data documentation, representativity, completeness and consistency of modelling with regard to ISO 14040 and 14044.

## Data sources
- 江西旺达新材料有限公司年产20000吨有机玻璃原料生产项目
