# Primary aluminum production ; Primary aluminum ingots ; Bauxite ; 2008

Dataset: ILCD process, Unit process, single operation
Geography: CN
Reference year: 2014
Classification: Unit processes / Materials production / Metals and semimetals
Generated by: Yuzhen Feng, fyz22
Owner: Tiangong LCI Data Working Group
Review: Dependent internal review by Tiangong LCI Data Working Group
Amounts: no units in this file; such an amount is in the reference unit of its flow, which a separate flow dataset defines
copyright: false
licenseType: Free of charge for all users and uses

## General comment
Primary aluminum production is an industrial process that involves extracting aluminum metal from bauxite ore. The primary aluminum ingots produced through this process are utilized as a raw material in various industries, including the manufacturing of transportation vehicles, construction materials, packaging products, consumer electronics, and power transmission lines. This data set particularly represents the aluminum ingots intended for such widespread industrial applications.

## Time period
Date of publication

## Reference product
- aluminium, primary, ingot: 1000; missing unimportant

## Inputs
All rows: missing unimportant
- electricity, high voltage, aluminium industry: 53312.4
  电力
- hard coal: 475
  煤炭
- Petroleum Coke: 53.8
  焦炭
- drying, natural gas: 112
  天然气
- coal gas: 872
  煤气
- light fuel oil: 105
  燃料油

## Data selection and combination
The resource and energy consumption data of primary aluminum production are based on the statistical data in Fig. 1 System boundary of primary aluminum production. For some non-statistical process data, they were obtained from research on production processes and technical indicators of typical enterprises and published literature.

## Use advice
When using this data set, it's important to apply it in the context of the year 2008, as the resource and energy consumption data for primary aluminum production are derived from the 'Non-Ferrous Metals Industry Yearbook' statistics of that year. Methodological consistency should be maintained for LCA studies, ensuring that adopted processes and technological indicators reflect the production techniques and technical standards reported by typical enterprises and published literature of the time. Consideration should be given to potential updates in production methods and emissions factors if used for current assessments.

## Review details
Inventory: The internal review was done by several iteration steps concerning raw data validation, raw data documentation, representativity, completeness and consistency of modelling with regard to ISO 14040 and 14044.

## Data sources
- 郭杰, 高峰, 王志宏, 刘宇, & 龚先政. 原铝生产流程温室气体排放主要影响因素的关联度分析. 环境工程学报 8, 4858–4863 (2014).
