# Copper production ; Total of all wind farm

Dataset: ILCD process, Unit process, single operation
Geography: SH-CN
Reference year: 2009
Classification: Materials production / Metals and semimetals
Functional unit: The functional unit is 1 kWh on-grid electricity provision.
LCI method principle: Attributional
LCI method approaches: Allocation
Generated by: Yunzhi Zhao, ll10088@163.com
Owner: Tiangong LCI Data Working Group
Review: Dependent internal review by Tiangong LCI Data Working Group
Amounts: no units in this file; such an amount is in the reference unit of its flow, which a separate flow dataset defines
copyright: false
licenseType: Free of charge for all users and uses

## General comment
The data set describes the Donghai Bridge Offshore Wind Farm (DBOWF), which is used for the generation of on-grid electricity through wind power. This wind farm, being the first of its kind in China and outside of Europe, serves as a facility for sustainable energy production, harnessing wind resources to produce clean electricity. The technical usage includes the manufacturing, transportation and installation of materials and equipment, operation and maintenance of the wind farm, and ultimately dismantling and recycling towards the end of its life cycle.

## Geography
The studied wind farm, the Donghai Bridge Offshore Wind Farm (DBOWF), is China's first offshore wind farm within the jurisdiction of Shanghai, as well as the first offshore wind farm outside Europe. The project has two-phases of construction, located on each side of the Donghai bridge (Fig. 1).

## Reference product
- copper: 700000; article inperiodical

## Inputs
- Energy, geothermal, converted: 7.28e7; software or database

## Outputs
- carbon dioxide: 1.31e9; software or database
- particles (PM2.5): 7420; software or database
- sulfur dioxide: 9100; software or database
- nitrous oxide: 14910; software or database

## Deviations from the LCI method approaches
The present study employed the PLCA modeling approach to calculate the energy and environmental emissions of a typical offshore wind farm in China. The cradle-to-grave process includes four stages, materials and equipment manufacturing, transportation and installation, operation and maintenance, and dismantling and recycling (Fig. 2).

## Data selection and combination
The technical parameters of wind turbines, foundations and cables are obtained from the design documents of the DBOWF (Table 2). The energy and emissions factors (i.e., the energy consumption and environmental emissions of per unit material and component production) are derived from the Ecoinvent 2.2 dataset (Ecoinvent Centre, 2009), and the coefficients of China's practices were preferentially referred. For key materials and equipment, their sea transportation energy is calculated from the transportation load and shipping energy intensity. The facility installation energy and emissions were estimated based on the construction plan. The wind farm's operation and maintenance data, such as the frequency and working time of maintenance, were obtained from site investigations with engineers and technicians. The uncertainties associated with model parameters and input data are illustrated in the sensitivity analysis section of this paper.

## Use advice
Users of the data set should apply it for life cycle assessments of offshore wind farms, especially for those similar to the DBOWF. The data, including energy and emission factors, installation, operation, and maintenance parameters, should be used to evaluate the environmental impacts of wind farms from cradle to grave. When using the data, attention should be paid to the Ecoinvent 2.2 dataset's applicability to the Chinese context and the sensitivity analysis provided, to address any uncertainties. It is also important to consider methodological advice regarding the inclusion or exclusion of recycling processes and to model the behavior during use phases as referenced in the technological applicability sections.

## Review details
Inventory: The internal review was done by several iteration steps concerning raw data validation, raw data documentation, representativity, completeness and consistency of modelling with regard to ISO 14040 and 14044.

## Data sources
- Yang, J. et al. The life-cycle energy and environmental emissions of a typical offshore wind farm in China. Journal of Cleaner Production 180, 316–324 (2018).
