# Brick production ; permeable brick ; Extrusion process

Dataset: ILCD process, Unit process, single operation
Geography: JNA-SD-CN
Reference year: 2018
Classification: Materials production / Other mineralic materials
Functional unit: The functional unit is the area of 1 m2 brick products.
Generated by: Wang xiangjin, r99rt4@163.com
Owner: Tiangong LCI Data Working Group
Review: Dependent internal review by Tiangong LCI Data Working Group
Amounts: no units in this file; such an amount is in the reference unit of its flow, which a separate flow dataset defines
licenseType: Free of charge for all users and uses

## General comment
The permeable bricks produced through the extrusion process are intended for applications in pavement construction. Specifically designed to allow water to pass through the surface, these bricks are commonly used in sidewalks, streets, and other areas that require effective drainage systems to reduce water runoff and increase groundwater recharge.

## Reference product
- Clay Body: 106; measured
  Rough blank

## Inputs
- brick dust: 16; measured
- brickbat aggregate: 104; measured
- electricity mix: 1.96992; measured

## Outputs
- particles (PM10): 0.000144; measured

## Deviations from the LCI method approaches
ReCiPe midpoint (H) model is applied in this study.

## Data selection and combination
本研究从济南顺德水泥制品有限公司收集了混凝土路面砖和透水砖的生产能耗以及各种原材料、能源投入和废气排放的相关数据。济南顺德水泥制品有限公司 山东省。

## Sampling procedure
Most data of raw materials, energy input and waste discharge were collected from the site investigation of manufacturer. Water reducer is also called water reducing agent, whose chemical constituents is the sodium salt of the sulfonate formaldehyde condensation

## Use advice
When using the LCA data for the production of concrete pavement bricks and permeable bricks, it is important to apply the functional unit of 1 square meter to ensure comparability. The ReCiPe midpoint (H) model has been employed, and sensitivity analysis within a 5% variation in inputs and outputs should be acknowledged for key process changes. For accurate LCA calculations, consider the inclusion of all raw materials, energy inputs, and exhaust emissions data as provided in this dataset, and validate against site-specific information when available.

## Review details
Inventory: The internal review was done by several iteration steps concerning raw data validation, raw data documentation, representativity, completeness and consistency of modelling with regard to ISO 14040 and 14044.

## Data sources
- Yuan, X. et al. Environmental and economic impacts assessment of concrete pavement brick and permeable brick production process - A case study in China. Journal of Cleaner Production 171, 198–208 (2018).
