# betwixt anaerobic and aerobic treatment

Dataset: ILCD process, Unit process, single operation
Geography: SC-CN
Classification: Materials production / Other mineralic materials
Generated by: HUANG Runyao, runyaoh@163.com
Review: Dependent internal review by Tiangong LCI Data Working Group
Amounts: no units in this file; such an amount is in the reference unit of its flow, which a separate flow dataset defines

## Inputs
- chemical oxygen demand: 0.168, 0.151 (2 entries); article inperiodical
- nitrogen trifluoride: 0.0119; article inperiodical
- nitrogen monoxide: 0.0008; article inperiodical

## Review details
Inventory: The internal review was done by several iteration steps concerning raw data validation, raw data documentation, representativity, completeness and consistency of modelling with regard to ISO 14040 and 14044.

## Data sources
- Assessment of upgrading WWTP in southwest China: Towards a cleaner production
