# cement production;cement, common portland cement;new dry process kiln;waste, solid, from steel industry

Dataset: ILCD process, Unit process, black box
Geography: SD-CN
Reference year: 2012
Classification: Unit processes / Materials production / Other mineralic materials
Generated by: #REF!, ysqsophia@gmail.com
Owner: Tiangong LCI Data Working Group
Review: Dependent internal review by Tiangong LCI Data Working Group
Amounts: no units in this file; such an amount is in the reference unit of its flow, which a separate flow dataset defines
copyright: false
licenseType: Free of charge for all users and uses

## General comment
Under the use of a new dry kiln, the steel industry solid waste is used as an alternative raw material for cement production.

## Geography
The typical cement enterprise of the average production level of Shandong Province

## Technical purpose
This dataset describes the use of a new dry process kiln for the production of common portland cement, with the substitution of raw materials using solids waste from the steel industry. The cement produced from this process is used in various construction applications, serving as a fundamental component in concrete for buildings, infrastructure, and other civil engineering projects.

## Model description
1 ton of recycled cement is the functional unit; the geographical scope of the study is Shandong, and the system boundary is all direct processes involved in cement production, including all auxiliary links such as raw material mining, processing, energy production, production equipment, transportation, sales and use stages. resources, energy consumption and environmental emissions are not considered for the time being.

## Reference product
- cement, common portland cement: 1000
  Universal cement is a research object

## Inputs
- limestone, crushed, for mill: 670
  Limestone
- clay: 120
  Clay
- iron, powder: 27
  Iron correction raw material
- gypsum stone (CaSO4-dihydrate): 60
  Gupsum
- mixed materials, mineral: 200
  Mixed material
- Waste, from steel production: 400
  The steel industry is solid. The steel industry's solid waste contains a large amount of recyclable metals and limestone.
- hard coal: 92.398
  Raw coal (standard coal). Coal consumption is converted into standard coal consumption according to the low heating value. Coal consumption in the literature is converted to standard coal consumption (0.066t) according to the low level heating value, the conversion formula is 1kg raw coal = 0.7143kg standard coal. Here the conversion is made into raw coal for entry.
- Electricity: 0.225554
  Electricity. The power is mainly from thermal power. The electricity consumption in the literature is converted to standard coal (0.051t). The conversion formula used here is 1 kWh = 0.814 kg of standard coal. This conversion is used for inputting electricity data.

## Outputs
- sulfur dioxide: 0.3
  SO2
- particles (> PM10): 2
  Dust, with an unspecified particle size, is treated as PM > 10 micrometers in diameter.
- particles (> PM10): 0.23
  Smoke, with an unspecified particle size, is treated as PM > 10 micrometers in diameter.
- Nitrogen oxides: 1.11
  NOx
- carbon dioxide (fossil): 427
  CO2. CO2 emissions are generally not tested. According to the source of it, it is obtained according to the formula reasoning. The CO2 released during the production of cement is mainly produced in the decomposition of lumite of coal -fired and cement production raw materials. E = E1+E2, in the formula: E is CO2 emissions (KG) during the production of cement; E1 is CO2 emissions (KG) during the process of coal -fired; Essence E1 can be calculated by the calorie carbon volume method. The amount of CO2 released by 1J heat is equivalent to 8.494342e-8kg, and 1kg standard coal is equivalent to 2.93e+7J heat (the heat value of the standard coal). That is the heat generated by standard coal combustion, that is, the E1 calculation formula is as follows: E1 = coal consumption (standard coal) × (2.93e+7) × (8.494342e-8) coal consumption (standard coal) × 2.489, E2 can be based on carbonated carbonated carbonated carbonated carbonated carbonated carbonated carbonated carbonate. Calcium decomposition equilibrium equation calculation, assuming that the CAO content in 1kg limestone is calculated at 50%, and the estimated formula for CO2 emissions is CACO3 → Cao+CO2 ↑, E2 = limestone consumption × (50%XCO2 molecular weight CO%)

## Data selection and combination
The cement industry in Shandong Province occupies an important position in the country, ranking first in the country for more than ten years in a row. Every year, cement products account for 11% to 13% of the country's total, making it a veritable cement province. Therefore, the data mainly comes from the production data of typical cement companies representing the average production level in Shandong Province and the monitoring data of the local environmental protection department.

## Use advice
Users of this dataset should note that it represents the average production level of a typical cement enterprise in Shandong Province and includes data from local environmental monitoring. The system boundary covers all direct processes involved in cement production with solid waste from the steel industry as an alternative raw material. However, it does not presently consider the auxiliary processes like raw material mining, processing, energy production, production equipment, transportation, sales and usage stages energy consumption and environmental emissions. For accurate LCA results, users should ensure that these factors are separately accounted for or that the boundary conditions of the study are compatible with the aim of their LCA.

## Review details
Inventory: The internal review was done by several iteration steps concerning raw data validation, raw data documentation, representativity, completeness and consistency of modelling with regard to ISO 14040 and 14044.

## Data sources
- 邓琪 & 陈吉宁. (2012). 钢铁工业固废应用于水泥生产的降耗与减排. 生态环境学报, 21(2), 298–302.
