# cement production;cement, unspecified;mixed solid wastes

Dataset: ILCD process, Unit process, black box
Geography: CN
Classification: Unit processes / Materials production / Other mineralic materials
Generated by: #REF!, ysqsophia@gmail.com
Owner: Tiangong LCI Data Working Group
Review: Dependent internal review by Tiangong LCI Data Working Group
Amounts: no units in this file; such an amount is in the reference unit of its flow, which a separate flow dataset defines
copyright: false
licenseType: Free of charge for all users and uses

## General comment
Preparation of ecological cement with phosphogypsum. Laboratory data. In the phosphogypsum-based ecological cement experiment, the main raw materials include phosphogypsum, fly ash, hydrate lime, cement, and early strength agent.Firstly, phosphogypsum is dried in an oven at 45°C to a constant weight to remove free water from phosphogypsum, and then then the dried phosphogypsum is calcined in a high-temperature electric furnace for a certain period of time. The calcined phosphogypsum is then put into a planetary ball mill for grinding for 6 minutes and screened through a standard sieve with a mesh size of 0.08 mm. At the same time, fly ash and hydrate lime are also sieved through a 0.08 mm sieve and dried in a drying oven. The cement used in the experiment also needs to be dried. After the above raw materials are pre-treated, the ingredients are calculated according to the designed ratio, and the mixed material is ball-milled for 3 minutes to mix evenly. After the mixed material is homogenized for 2-3 hours, it is weighed and poured into a JJ-5 planetary cement mortar mixer for stirring, and then molded into cement test blocks using a ZS-15 cement mortar vibrating table. The molded cement test blocks are placed for 24 hours, demolded, and naturally cured. After a certain age, their strength is tested.

## Technology and included processes
First put the phosphogypsum in an oven at a temperature of 45°C and dry it to a constant weight to remove free water in the phosphogypsum. Then put the dried phosphogypsum into a high-temperature electric furnace and calcine it for a certain period of time. Put the calcined phosphogypsum into a planetary ball mill and ball mill for 6 minutes, and then pass the ball-milled phosphogypsum through a 0.08mm standard sieve. While preparing phosphogypsum, fly ash and slaked lime are also passed through a 0.08mm sieve and then placed in a drying box for drying. The cement used in the experiment also needs to be dried. After the above raw materials are pretreated, the ingredients are calculated according to the designed ratio, and then the prepared mixture is ball milled in a ball mill for 3 minutes to mix evenly. After the homogenized mixture is homogenized for 2-3 hours, weigh it and pour it into the JJ-5 planetary cement mortar mixer for mixing. Use the ZS-15 cement mortar vibrating table to vibrate and shape the formed cement. After the block is placed for 24 hours, it is demoulded and naturally cured. After reaching a certain age, the strength is tested.

## Technical purpose
The phosphogypsum-based ecological cement, as described, is intended for experimental and research purposes in laboratory settings. The process is designed to investigate the production and application of sustainable building materials by utilizing industrial by-products such as phosphogypsum and fly ash. This type of ecological cement can be used in construction once fully developed and tested for its mechanical properties and sustainability credentials.

## Model description
1t of phosphogypsum-based ecological cement developed in the laboratory as a functional unit. The system scope boundary of the phosphogypsum-based eco-cement study is defined as calcination of phosphogypsum, clinker grinding and eco-cement preparation, ending with cement storage.

## Reference product
- cement, unspecified: 1000
  Ecological cement based on phosphogypsum. From laboratory data.

## Inputs
- phosphogypsum: 340
  Phosphogypsum. The data is from laboratory experiments. The phosphogypsum used in the laboratory was provided by Qiantai Chemical Co., Ltd. in Xiangyang, Hubei. It has a dark gray color and is a mixture resembling sediment, with a moisture content of 21.66%.
- ash: 430
  Fly ash. The data is from laboratory experiments. The fly ash used in this experiment comes from Pingdingshan and is dry discharged.
- hydrated lime dry slaked: 10
  Hydrated lime. The data is from laboratory experiments. Hydrated lime is a product of slaked lime mixed with water.
- cement, ordinary portland cement, 32.5MPa: 200
  PO32.5. From laboratory data. The cement used in the experiment is PO32.5 ordinary Portland cement.
- early strength agent: 20
  Early strength agent. From laboratory data. The early strength agent used in the experiment is a self-made composite additive.
- hard coal; 26.3 MJ/kg: 100
  Coal. From the laboratory data.
- Electricity: 165.6
  Electricity. From the laboratory data.

## Outputs
- carbon dioxide (fossil): 257
  CO2. From the laboratory data.

## Use advice
This dataset represents laboratory-scale preparation of phosphogypsum-based ecological cement and should be used for life cycle assessment (LCA) within the context of research and development. Users should note that the process data is derived from controlled laboratory conditions and may not directly correspond to industrial scale processes. Adjustments to the data may be required when scaling up the process. The dataset includes consideration of raw materials preparation, such as drying and grinding, and the processing stages up to but not including the use phase of the produced cement. Users should ensure that system boundaries are consistent when comparing to other LCA datasets and should incorporate end-of-life considerations if extending the scope of the study beyond storage of the cement.

## Review details
Inventory: The internal review was done by several iteration steps concerning raw data validation, raw data documentation, representativity, completeness and consistency of modelling with regard to ISO 14040 and 14044.

## Data sources
- 张乐. (2009). 磷石膏基生态水泥的开发及其生命周期评价研究 [硕士, 华中科技大学].
