# Aluminum Recycling ; Recycled Aluminum Ingots ; Scrap Aluminum ; 2012

Dataset: ILCD process, Unit process, single operation
Geography: CN
Reference year: 2021
Classification: Unit processes / Materials production / Metals and semimetals
Generated by: Zimeng Cai, caizm6178@163.com
Owner: Tiangong LCI Data Working Group
Review: Dependent internal review by Tiangong LCI Data Working Group
Amounts: no units in this file; such an amount is in the reference unit of its flow, which a separate flow dataset defines
copyright: false
licenseType: Free of charge for all users and uses

## General comment
The recycled aluminum ingots, derived from scrap aluminum, are intended for use in applications where primary aluminum would traditionally be used. Examples include construction materials, automotive parts, electronics, packaging, and household items. This recycled material contributes to sustainability in manufacturing processes by reducing the demand for virgin aluminum, which involves high energy consumption and associated emissions during production.

## Time period
Date of publication

## Reference product
- secondary aluminium ingot: 1000; missing unimportant
  ingot

## Inputs
- electricity, high voltage, aluminium industry: 1148.4; missing unimportant
  electricity
- aluminium scrap, unspecified: 1180; missing unimportant
  aluminum scrap

## Data selection and combination
The data in this study refers to the LCA data of PA, SA, electricity, and other background data. The PA data were obtained from statistical data sources, and the SA data were mainly obtained from the literatures. The background data were mainly derived from the Chinese localization LCA database CAS RCEES 2018, which was established by the Research Center for Eco-Environmental Sciences, Chinese Academy of Sciences and covers LCA data for energy, materials, transportation, waste management etc.

## Use advice
Users of this LCA data should take into account that the data provided is specific to the year 2012 and applies to the geographical context of China. Methodological considerations should include the specific recycling processes involved in producing the recycled aluminum ingots, as these can influence the environmental impact assessment. When integrating this data into broader assessments or comparing with other datasets, users must ensure temporal, geographical, and technological consistency. Recycling and end-of-life scenarios for aluminum products should be considered in the context of technology applicability when using this dataset.

## Review details
Inventory: The internal review was done by several iteration steps concerning raw data validation, raw data documentation, representativity, completeness and consistency of modelling with regard to ISO 14040 and 14044.

## Data sources
- Ding, N., Liu, N., Lu, B. & Yang, J. Life cycle greenhouse gas emissions of aluminum based on regional industrial transfer in China. J. Ind. Ecol. 25, 1657–1672 (2021).
