# Syngas Production ; Syngas ; Crude Syngas Cleanup Route ; Crude Syngas

Dataset: ILCD process, Unit process, black box
Geography: ZJ-GD-CN
Reference year: 2018
Classification: Unit processes / Energy carriers and technologies / Energetic raw materials
Functional unit: A functional unit is defined as 4.82 ton of syngas product
LCI method principle: Attributional
LCI method approaches: Allocation - mass
Generated by: Yanan Ren, renyn15@tsinghua.org.cn
Owner: Tiangong LCI Data Working Group
Review: Dependent internal review by Tiangong LCI Data Working Group
Amounts: no units in this file; such an amount is in the reference unit of its flow, which a separate flow dataset defines
copyright: false
licenseType: Free of charge for all users and uses

## General comment
ID14 Propylene Production ; Propylene ; Coal to Olefins Route ; Coal ; Subordinate Process 3

## Geography
The case plant of the catalytic cracking route comes from Sinopec Zhanjiang Dongxing Petrochemical Co., Ltd. The company is located in Zhanjiang City, Guangdong Province. Its catalytic cracking olefins process was built in 2018, with an annual production capacity of 116,000 tons of propylene.

## Time period
Craft built in 2018

## Technical purpose
The syngas product from this process is a feedstock for industrial applications, including but not limited to the production of chemicals such as propylene via the coal to olefins route. The catalytic cracking process for olefins production at Sinopec Zhanjiang Dongxing Petrochemical Co., Ltd is specifically designed for the production of propylene, with a capacity of 116,000 tons annually, which can be utilized in a variety of chemical synthesis operations and manufacturing processes where propylene is a requisite raw material.

## Model description
The consumption of raw materials, energy, electricity, steam, water and auxiliary chemicals involved in each sub-stage is considered, and the output considers propylene and by-products (such as C4 products produced by the propane dehydrogenation process. The mass distribution method is used to quantify the products The environmental load between propylene and by-products. In addition, this model also considers the waste discharge of each process. This study focuses on the environmental impact analysis of different propylene production processes. Therefore, the utilization of propylene hydrocarbons and the end-of-life treatment of their products, as well as infrastructure Construction and equipment maintenance are outside the scope of this assessment.

## Reference product
- Syngas: 4820; measured
  Purifying gas

## Inputs
All rows: measured
- Crude Syngas: 14640
  crude syngas
- Methanol: 2.83007
- sodium hydroxide: 0.5751
- nitrogen: 1064.68
  low pressure nitrogen
- natural gas: 13.8
  fuel gas
- process steam: 230
  steam
- freshwater: 2590
  fresh water
- Electricity: 1544.36
  electricity

## Outputs
All rows: measured
- sulphur: 50
  liquid sulfur
- carbon dioxide (fossil): 5380
  CO2
- carbon monoxide (fossil): 3.90686
  CO
- hydrogen sulfide: 0.01907
  H2S
- nitrous oxide: 0.01846
  NOx
- sulfur dioxide: 0.01943
  SO2
- chemical oxygen demand: 0.35073
  COD
- biological oxygen demand: 0.20976
  BOD5
- Dissolved solids: 0.00138
  TDS

## Data selection and combination
The detailed input-output data of the propylene production process comes from the company's public environmental impact assessment report, including the input of raw materials and auxiliary materials, energy and resource consumption, and discharge of waste gas, wastewater and solid waste.

## Use advice
When using this LCA data set, ensure consideration of all relevant inputs such as raw materials, energy, electricity, steam, water, and auxiliary chemicals for the sub-stages involved in the production of syngas and propylene. Pay particular attention to the environmental burden allocation between the main product and by-products using the mass distribution method. The waste emissions of each process should also be included. Note that this evaluation does not cover the end-of-life treatment of products produced using propylene, as well as infrastructure and equipment maintenance. The functional unit of 4.82 tons should be used as a reference point for scaling data to larger or smaller production capacities as needed for your specific application.

## Review details
Inventory: The internal review was done by several iteration steps concerning raw data validation, raw data documentation, representativity, completeness and consistency of modelling with regard to ISO 14040 and 14044.

## Data sources
- 吕琳. 丙烯产品环境负荷及温室气体减排的碳税政策. (大连理工大学, 2022).
