# sintering

Dataset: ILCD process, Unit process, single operation
Geography: CN
Classification: Unit processes / Materials production / Other mineralic materials
Generated by: Jiwei, 1299801467@qq.com
Owner: Tiangong LCI Data Working Group
Review: Dependent internal review by Tiangong LCI Data Working Group
Amounts: no units in this file; such an amount is in the reference unit of its flow, which a separate flow dataset defines
copyright: false
licenseType: Free of charge for all users and uses

## General comment
The sintered ore production described by this dataset is used in the iron and steel manufacturing industry. The sintering process, indicated as a single unit operation, involves the agglomeration of fine iron ores and other constituents, which after sintering form a lumpy material suitable for feeding into the blast furnace.

## Reference product
- Sinter ore: 1000; measured

## Inputs
All rows: measured
- Iron ore (Domestic): 1053.5
- quicklime: 111.9
- freshwater,freshwater: 92.8
- compressed air: 45.3
- Electricity: 147.6
- coke,Coke: 29.47
- Coal gas: 26
- process steam: 9.65
- anthracite: 26.91

## Outputs
All rows: measured
- carbon dioxide (fossil): 189.85
  原文未区分bio和fossil，根据专家判断此处为carbon dioxide (fossil)
- carbon monoxide (fossil): 28
  原文未区分bio和fossil，根据专家判断此处为carbon monoxide (fossil)
- sulfur dioxide: 0.408
- particles (> PM10): 0.11
- Nitrogen oxides: 0.549

## Use advice
When utilizing this dataset for Life Cycle Assessment (LCA), it is important to consider the specific characteristics of the sintering process as they apply to the region and technology used. The dataset may not include downstream processing or recycling of materials. Users should ensure the inclusion of these aspects when relevant to the scope of their assessment, according to the goal and scope definition phase of the LCA. Additionally, users need to be aware of any updates or changes in the technological applicability that may affect the data's relevance over time.

## Review details
Inventory: The internal review was done by several iteration steps concerning raw data validation, raw data documentation, representativity, completeness and consistency of modelling with regard to ISO 14040 and 14044.

## Data sources
- Yang, L. et al. Life cycle carbon footprint of electric arc furnace steelmaking processes under different smelting modes in China. Sustainable Materials and Technologies 35, e00564 (2023).
