# NMC532 direct recycling（molten-salt-based method (MSDR) ）(LCC)

Dataset: ILCD process, Unit process, single operation
Geography: CN
Reference year: 2021
Classification: Unit processes / End-of-life treatment / Material recycling
Functional unit: 333.9 kg of the degraded NMC532 can be sorted from per 1 ton of degraded battery
Generated by: maqingyuan, m1120498928@163.com
Owner: Tiangong LCI Data Working Group
Review: Dependent internal review by Tiangong LCI Data Working Group
Amounts: no units in this file; such an amount is in the reference unit of its flow, which a separate flow dataset defines
copyright: false
licenseType: Free of charge for all users and uses

## General comment
To upcycle the degraded NMC532 (Li1-xNi0.5Mn0.3Co0.2O2) into Ni66-NMC, 0.2 mol of the degraded NMC532 cathode powder (?20 g, a mixture of NMC532, carbon black, and polymer binder) was mixed with 0.2 mol Ni0.83Mn0.09Co0.08(OH)2, 0.5 mol LiOH, and 0.1 mol Li2SO4 and transferred into a crucible. LiOH was in excess (excess % = (1.5 ? x)/(1 + x)) to facilitate complete re-lithiation, which is a self-saturated process according to the literature.1 The crucible used for the reaction was loosely covered by a lid to allow air intake during the synthesis but avoid excess evaporation of Li salts. The material mixture was heated to 900℃ at aram pin g r a t e o f ?10℃ min-1 and held at 900℃ for 5 h and then at 860℃ for 15h in air before slow cooling at a rate of 2℃ min-1 to 300℃. The carbon black and the poly merbinder were burned away during the high-temperature MSDR process. After that, the mixture was allowed to cool down naturally. The obtained powders were recovered from the crucible, ground in an agate mortar, and washed using deionized water to separate the material from the water-soluble Li salts, which could be recycled after water evaporation and reused. The Ni66-NMC powder was collected by centrifugation and dried at 70℃ in air before being thermally treated at 700℃ for 4 h in air. T h e powder was ground again to pass through a 400-mesh sieve and then stored in a humidity-controlled storage chamber before further tests. To upcycle the degraded NMC532 into Ni80-NMC via MSDR, 0.2 mol of the degraded NMC532 cathode powder (?20 g) was mixed with 0.3 mol Ni(OH)2, 0.625 mol LiOH, and 0.125 mol Li2SO4 and transferred into a crucible. The experimental procedures were the same as those for the Ni66-NMC, except the sintering temperature was lowered to 780℃.

## Technical purpose
The industrial process described is for the upcycling of degraded NMC532 cathode material into Ni66-NMC or Ni80-NMC using the molten-salt-based direct recycling (MSDR) method. This rejuvenated material is intended for use in the manufacture of high-nickel content cathodes for lithium-ion batteries. Due to the high purity requirements and specific chemical composition, it is applicable in advanced battery technologies which are part of energy storage solutions in electronic devices and electric vehicles.

## Reference product
- Degraded NMC532: 226680; input; calculated

## Inputs
- Nickel sulfate: 160034; calculated
- Lithium Hydroxide Monohydrate: 369684; calculated
- oxygen: 36000; calculated
- Average labor (Disassemble degraded battery): 5475
- Average labor（Material preparation）: 5475
- Equipment Depreciation: 52612.5
- Electricity: 64800; calculated
- water,water: 7200

## Outputs
- Sewage treatment: 300
- Ni-rich NMC: 1.4475e6

## Data treatment and extrapolations
① We calculated the cost per one ton of recycled cathode materials. The recycle process can be divided into two steps: DISASSEMBLE degraded battery & RECYLCE to produce Ni-rich cathode materials.② During the DISASSEMBLE process, we use degraded NMC532 as raw material.③ During the RECYLCE process, only Ni and Co is added.

## Use advice
When using this data set, it is crucial to account for the entire upcycling process, including the energy consumed during the MSDR method and the yield of the Ni-rich cathode material. It is also imperative to consider the environmental impact of recycling the water-soluble Li salts and the disposal of non-reusable by-products. Practitioners should ensure that input quantities such as degraded NMC532 cathode powder and chemicals used in the process are accurately reflected in their assessment. Additionally, thorough thermodynamic analysis might be necessary to ascertain the efficiency of the re-lithiation process.

## Review details
Inventory: The internal review was done by several iteration steps concerning raw data validation, raw data documentation, representativity, completeness and consistency of modelling with regard to ISO 14040 and 14044.

## Data sources
- Qian, G. et al. Value-creating upcycling of retired electric vehicle battery cathodes. Cell Reports Physical Science 3, 100741 (2022).
