# Desalination for organic solvent ; Electrodialysis, spiral-wound, CN

Dataset: ILCD process, Unit process, single operation
Geography: CN
Reference year: 2023
Classification: Energy carriers and technologies / Electricity
Functional unit: 1 t sodium chloride
Generated by: Jiaqi Lu, wilsherelu@foxmail.com
Owner: Tiangong LCI Data Working Group
Review: Dependent internal review by Tiangong LCI Data Working Group
Amounts: no units in this file; such an amount is in the reference unit of its flow, which a separate flow dataset defines
copyright: false
licenseType: Free of charge for all users and uses

## General comment
This process of electrodialysis with a spiral-wound configuration is used for the desalination of organic solvents in Chinese industries. The spiral-wound design refers to the specific structure of the electrodialysis membranes. This process is specialized for the treatment of one ton of sodium chloride within the solvent, aiming to achieve high purity standards that may be required in various chemical synthesis applications or other industrial processes where the presence of salts may hinder performance or quality.

## Reference product
- sodium chloride: 1000; article inperiodical
  product salt

## Inputs
- Electrodialysis Component: 0.0038; article inperiodical
  ED components
- electricity mix: 903.06; article inperiodical
  Process power consumption
- Water (fresh water): 386; article inperiodical
  raw water

## Outputs
- High-concentration saline wastewater: 77.2; article inperiodical
  thick water
- Deionized Water: 308.8; article inperiodical
  freshwater

## Use advice
When utilizing this data set for Life Cycle Assessment purposes, it is essential to ensure that the scope of the analysis matches the specific use of the electrodialysis process in organic solvent desalination. The input and output flows should be carefully accounted for based on the quantity of sodium chloride treated. Consideration must be given to downstream processing requirements and potential environmental impacts of the concentrated brine waste stream. The technological applicability might be limited to certain types of organic solvents that are compatible with spiral-wound electrodialysis systems.

## Review details
Inventory: The internal review was done by several iteration steps concerning raw data validation, raw data documentation, representativity, completeness and consistency of modelling with regard to ISO 14040 and 14044.

## Data sources
- Xue, N. et al. Carbon footprint analysis and carbon neutrality potential of desalination by electrodialysis for different applications. Water Res. 232, 119716 (2023).
