# Livestock and poultry breeding ; manure treatment stage ; broiler retail

Dataset: ILCD process, Unit process, single operation
Geography: SD-CN
Reference year: 2014
Classification: Unit processes / Materials production / Agricultural production means
Functional unit: 1kg eggs
Generated by: Rui Yang, 1632707028@qq.com
Owner: Tiangong LCI Data Working Group
Review: Dependent internal review by Tiangong LCI Data Working Group
Amounts: no units in this file; such an amount is in the reference unit of its flow, which a separate flow dataset defines
copyright: false
licenseType: Free of charge for all users and uses

## General comment
Livestock and poultry manure treatment methods include dry cleaning manure, water flushing manure, bedding material treatment. The treatment method of water flushing manure is strictly restricted by the "Water Pollution Prevention and Control Action Plan" (referred to as "Water Ten") [88] and the new "Environmental Protection Law", which shows a downward trend year by year; The bedding method has less pollutant discharge and less harm to the environment, and can be directly applied to the field after simple composting, but it is highly restricted by economic cost, and is commonly used in poultry house manure treatment. The environmental harm of dry cleaning is between the two, and the economic cost is lower [89,90].

## Geography
This study was conducted from 2014 to 2015, aiming at livestock and poultry feeding cycle, meat ratio, feed formula, feed consumption, coal and electricity consumption, etc. Has been to Shandong Gaomi Zhengda pig farm, Laixi City Zhishuang dairy farm, Jimo city Duan Bolan town Jiangjiapo village pig farm, Jimo City Liujiazhuang town livestock farm, Rizhao City Changling town Guanzhuang village, Juxian County Zhailihe town Dongxing Agriculture and animal husbandry company, Juxian Qiaoshan town east Chen dairy farm, Juxian Qiaoshan town Liu Jiayi water pig farm, Zhucheng Foreign Trade Co., LTD. Phoenix parents breeding duck farm, Xinjiang Fukang Hongfa Breeding professional cooperative, Jiuyun Street Town Xuhong laying Chicken cooperative, Jiuyun Street Town Liuyun Village self-contained breeding farm, China Australia Holding Group Co., LTD., Dezhou City Qingyun County Wayu Village, Shandong Province Qingyun County four Liu community beef cattle breeding base, Dezhou City Qingyun Qingnian chicken breeding base, Qingyun County Yongli Poultry layer breeding company, Qingyun County Xingchen youth chicken breeding Field research was carried out by professional breeding cooperatives, Qingyun Dongtai broiler breeding cooperatives, Hebei Yanshan Boyuan Feed Co., LTD., Yanshan Da Chinese Feed Co., LTD., Wudi Liuhe Feed Co., LTD., and China-Australia Oriental Hope Feed Co., LTD.

## Technology and included processes
In this paper, the life cycle of livestock and poultry farming is divided into six stages: feed crop planting, feed processing, livestock and poultry raising, manure treatment, slaughter and transportation. The specific life cycle process of livestock and poultry breeding is shown in Figure 2-1. Due to the lack of some data and the limitations of basic conditions, the production, transportation and use of pesticides, mulch and feed additives have not been analyzed, and the environmental impact caused by other related infrastructure construction, transport production and labor costs is no longer considered.

## Technical purpose
This dataset provides information on manure treatment methods in the livestock and poultry breeding industry, specifically focusing on aspects such as their environmental impact, associated economic costs, and regulatory constraints. It is utilized in the assessment of broiler chicken retail, detailing the implementation and performance of dry cleaning manure, water flushing manure, and bedding material treatment techniques. This data is relevant for agricultural and environmental management organizations, waste processing facilities, and policymakers concerned with sustainable agricultural practices and environmental regulations within the poultry sector.

## Reference product
- manure: 0.0595238; input; calculated
  根据文献中畜禽排放系数计算

## Outputs
- methane (biogenic): 0.00111; measured
  Broiler retail investors
- nitrous oxide: 0.00111; measured
  Broiler retail investors
- ammonia: 0.00693; measured
  Broiler retail investors

## Use advice
When using this dataset for life cycle assessment or policy formulation, data users should take into consideration the technological variability of manure treatment methods across different farms. Users should factor in the regional regulations such as 'Water Pollution Prevention and Control Action Plan' and 'Environmental Protection Law' which impact the adoption and efficiency of these methods. It is also advised to consider the economic viability of the different manure treatment methods, including the potential for composting and subsequent application to fields as described in the bedding method. Users must pay attention to the specifics of the data gathered from 2014 to 2015, including the various livestock breeds, feed consumption, and energy use across multiple locations. Additionally, when considering the environmental performance of poultry farming, the data should be contextualized within the global aim of reducing environmental impacts from the agriculture sector.

## Review details
Inventory: The internal review was done by several iteration steps concerning raw data validation, raw data documentation, representativity, completeness and consistency of modelling with regard to ISO 14040 and 14044.

## Data sources
- 周景月. 基于生命周期评价的畜禽养殖环境影响分析. (青岛科技大学, 2017).
