# Fattening pig production ; pig production

Dataset: ILCD process, Unit process, single operation
Geography: LN-CN
Reference year: 2010
Classification: Unit processes / Materials production / Agricultural production means
Functional unit: The evaluation unit was 1000 fattening pigs
Generated by: Rui Yang, 1632707028@qq.com
Owner: Tiangong LCI Data Working Group
Review: Dependent internal review by Tiangong LCI Data Working Group
Amounts: no units in this file; such an amount is in the reference unit of its flow, which a separate flow dataset defines
copyright: false
licenseType: Free of charge for all users and uses

## General comment
According to the survey, due to the low resistance of piglets, their nursery requires electrical insulation, and the average power consumption is 15 kWh·head-1.

## Geography
The yield per hectare of corn, soybean and wheat in Liaoning Province in 2010 was ··

## Time period
The yield per hectare of corn, soybean and wheat in Liaoning Province in 2010 was respectively

## Technology and included processes
The content of evaluation is: the pollutant emission caused by the electricity consumption of the pig house in the process of animal growth;

## Technical purpose
The data set is intended for environmental impact assessment within the scope of agricultural animal production, specifically for large-scale fattening pig production processes. The data refers to fattening pig farms in Liaoning Province and includes energy consumption requirements for maintaining the necessary conditions for piglets, as well as potential environmental impacts related to global warming, acidification, and eutrophication linked to the production process.

## Reference product
- pig: 1000; measured
  1,000 fattening pigs

## Inputs
- Electricity: 54000; measured
- feed: 308000; measured

## Outputs
All rows: measured
- carbon dioxide (fossil),carbon dioxide (fossil): 1605
- carbon monoxide (fossil): 23.25
- nitrogen, total (excluding N2): 96.9
  1 NOx
- sulfur oxides: 148.95
  1Sulfur oxides
- methane (biogenic): 39

## Deviations from the LCI method approaches
In this study, LCA method was applied to evaluate the environmental impact of fattening pig production on large-scale chemical fattening pig farms in Liaoning Province

## Data selection and combination
The data in this paper were collected from 36 large-scale chemical fattening pig farms in Liaoning province. The potential impacts of global warming, environmental acidification and eutrophication in the process of fattening pig production were calculated with reference to the relevant data provided by Liaoning Statistical Yearbook.

## Use advice
Users should apply this data exclusively for environmental assessment of fattening pig production processes, and not for other types of animal farming. The electricity consumption data for piglet nurseries must be considered for its significant contribution to pollution. When using this data, users must note that it represents the specific context of Liaoning Province's agricultural yields in 2010 and may require updating for current assessments. Additionally, users must acknowledge the methodological framework of Life Cycle Assessment (LCA) as the basis for environmental impact studies and adapt their models accordingly, ensuring that the methodological requirements of the LCA are met.

## Review details
Inventory: The internal review was done by several iteration steps concerning raw data validation, raw data documentation, representativity, completeness and consistency of modelling with regard to ISO 14040 and 14044.

## Data sources
- 刘鸣达, 赵妍, 刘显军, & 王耀晶. 辽宁省育肥猪生产环境影响的生命周期评价. 农业环境科学学报 31, 1250–1255 (2012).
