# Livestock and poultry breeding ; feed processing stage ; beef cattle scale

Dataset: ILCD process, Unit process, single operation
Geography: CN
Reference year: 2014
Classification: Unit processes / Materials production / Agricultural production means
Functional unit: 1kg beef
Generated by: Rui Yang, 1632707028@qq.com
Owner: Tiangong LCI Data Working Group
Review: Dependent internal review by Tiangong LCI Data Working Group
Amounts: no units in this file; such an amount is in the reference unit of its flow, which a separate flow dataset defines
copyright: false
licenseType: Free of charge for all users and uses

## General comment
Livestock and poultry feed processing mainly consumes electricity and coal.

## Geography
This study was conducted from 2014 to 2015, aiming at livestock and poultry feeding cycle, meat ratio, feed formula, feed consumption, coal and electricity consumption, etc. Has been to Shandong Gaomi Zhengda pig farm, Laixi City Zhishuang dairy farm, Jimo city Duan Bolan town Jiangjiapo village pig farm, Jimo City Liujiazhuang town livestock farm, Rizhao City Changling town Guanzhuang village, Juxian County Zhailihe town Dongxing Agriculture and animal husbandry company, Juxian Qiaoshan town east Chen dairy farm, Juxian Qiaoshan town Liu Jiayi water pig farm, Zhucheng Foreign Trade Co., LTD. Phoenix parents breeding duck farm, Xinjiang Fukang Hongfa Breeding professional cooperative, Jiuyun Street Town Xuhong laying Chicken cooperative, Jiuyun Street Town Liuyun Village self-contained breeding farm, China Australia Holding Group Co., LTD., Dezhou City Qingyun County Wayu Village, Shandong Province Qingyun County four Liu community beef cattle breeding base, Dezhou City Qingyun Qingnian chicken breeding base, Qingyun County Yongli Poultry layer breeding company, Qingyun County Xingchen youth chicken breeding Field research was carried out by professional breeding cooperatives, Qingyun Dongtai broiler breeding cooperatives, Hebei Yanshan Boyuan Feed Co., LTD., Yanshan Da Chinese Feed Co., LTD., Wudi Liuhe Feed Co., LTD., and China-Australia Oriental Hope Feed Co., LTD.

## Technology and included processes
In this paper, the life cycle of livestock and poultry farming is divided into six stages: feed crop planting, feed processing, livestock and poultry raising, manure treatment, slaughter and transportation. The specific life cycle process of livestock and poultry breeding is shown in Figure 2-1. Due to the lack of some data and the limitations of basic conditions, the production, transportation and use of pesticides, mulch and feed additives have not been analyzed, and the environmental impact caused by other related infrastructure construction, transport production and labor costs is no longer considered.

## Technical purpose
The dataset represents the feed processing stage for beef cattle scale operations as a part of the livestock and poultry breeding process. The data points to energy and resource consumption, specifically electricity and coal usage during feed processing for beef production. Industrial applications include agricultural operations focused on optimizing the feed cycle and improving the efficiency of feed formulas within the context of large-scale beef cattle farming.

## Reference product
- feed: 4.91053; calculated

## Inputs
- Electricity: 0.441948; calculated
- hard coal: 0.0589263; calculated
- maize grain: 4.59; measured
- soybean: 0.32; measured
- wheat: 0.56; measured

## Outputs
- carbon dioxide (fossil),carbon dioxide (fossil): 0.24578; measured
  Beef cattle scale
- sulfur dioxide: 0.0043; measured
  Beef cattle scale
- nitrogen, total (excluding N2): 0.00068; measured
  Beef cattle scale
- carbon monoxide (fossil): 0.000111; measured
  Beef cattle scale

## Use advice
Data users conducting Life Cycle Assessments should account for regional variation in energy sources, as the dataset is primarily based on factual research from specific regions in China. It is critical to consider the timeline of the data, as it represents a specific period (2014-2015) and may not reflect current practices. Users should also explore the possibility of these figures changing due to technological or management advancements in feed processing. Special attention should be given to the inclusion or exclusion of factors such as greenhouse gas emissions from electricity and coal consumption, which are relevant to the feed processing stage.

## Review details
Inventory: The internal review was done by several iteration steps concerning raw data validation, raw data documentation, representativity, completeness and consistency of modelling with regard to ISO 14040 and 14044.

## Data sources
- 周景月. 基于生命周期评价的畜禽养殖环境影响分析. (青岛科技大学, 2017).
