# Metallurgical ash production;Metallurgical ash;Mining and burning(Z11)

Dataset: ILCD process, Unit process, single operation
Geography: CN
Reference year: 1998
Classification: Materials production / Metals and semimetals
Generated by: Fuxiang, 1162850692@qq.com
Owner: Tiangong LCI Data Working Group
Review: Dependent internal review by Tiangong LCI Data Working Group
Amounts: no units in this file; such an amount is in the reference unit of its flow, which a separate flow dataset defines
copyright: false
licenseType: Free of charge for all users and uses

## General comment
来自表 4-15 Z11 钢厂生产吨材环境负荷编目表

## Time period
论文提到钢铁企业环境总体数据为1998年的吨钢环境基础数据。

## Technical purpose
Metallurgical ash, as obtained from the Mining and burning (Z11) process, is used in steel production facilities. This material is an integral part of the production process, serving to remove impurities during metal refinement and thus, is a necessary component in the manufacturing of high-grade steel products.

## Reference product
- Metallurgical ash: 182; measured
  Metallurgical white ash

## Inputs
- Energy, geothermal, converted: 790133; measured

## Outputs
All rows: measured
- Dust (unspecified, from stack): 0.379
- sulfur dioxide: 0.036
- cyanide: 7.7e-5
- Hydrocarbons, aliphatic, alkanes, unspecified: 0.000238
  Petro
- Suspended solids, unspecified: 0.143289
- chemical oxygen demand: 0.092964
- Spoil (deposited, hibernating in ground, non elementary flow): 6.916

## Use advice
When utilizing this data set for Life Cycle Assessment (LCA) of steel production, note that the environmental load data corresponds to the base year of 1998. Users should take into consideration technological advancements and changes in production processes since then. It is essential to check whether the environmental impacts have been updated to reflect current standards. Additionally, if recycling of steel or metallurgical ash is involved, ensure that its inclusion or exclusion in the assessment is consistent with the goal and scope of the LCA study.

## Review details
Inventory: The internal review was done by several iteration steps concerning raw data validation, raw data documentation, representativity, completeness and consistency of modelling with regard to ISO 14040 and 14044.

## Data sources
- 周和敏. 钢铁材料生产过程环境协调性评价研究. (北京工业大学, 2001).
