# waste Polypropylene recycling; the recycled Polypropylene; mechanical recycling ; waste Polypropylene

Dataset: ILCD process, Unit process, black box
Geography: TJ-CN
Reference year: 2016
Valid until: 2016
Classification: Unit processes / End-of-life treatment / Material recycling
Functional unit: 1 ton of waste Polypropylene
Generated by: Xiaoyu Cheng, xiaoyucheng@email.ncu.edu.cn
Owner: Tiangong LCI Data Working Group
Review: Dependent internal review by Tiangong LCI Data Working Group
Amounts: no units in this file; such an amount is in the reference unit of its flow, which a separate flow dataset defines
copyright: false
licenseType: Free of charge for all users and uses

## General comment
After calibration, the respective process data in 2016 were selected to assess the environmental impacts of mechanical recycling of waste plastics.

## Geography
The ZEDA is located in southwest of Tianjin, which is the largest renewable resource processing industrial park in China.

## Time period
The literature only states that it was in 2016.

## Technical purpose
The recycled polypropylene derived from waste polypropylene mechanical recycling process is primarily utilized as a raw material for manufacturing various plastic products. This includes items such as automotive parts, plastic containers, garden furniture, and carpet fibers. The mechanical recycling process, as described, reflects industry standard practices within large-scale recycling operations and is specific to the applications that demand materials of secondary grade, often in bulk quantities.

## Reference product
- Polypropylene Wastes: 1000; input; measured

## Inputs
- Water for industrial use: 420; measured
- Electricity: 1065.53; measured
- natural gas; 44.1 MJ/kg: 45.6; measured

## Outputs
All rows: measured
- particles (>PM10): 0.48
- non-methane volatile organic compounds: 0.31
- Suspended solids, unspecified,Suspended solids, unspecified: 0.01271
- chemical oxygen demand: 0.09421
- biological oxygen demand: 0.02013
- Ammonia Nitrogen: 0.00786
- Phosphorus: 0.00068
- Oils, unspecified: 0.0004
- waste water - untreated: 302
- General Solid Waste: 92.81
- Hazardous Solid Waste: 3.8
- Recycled Polypropylene Granules: 902.6

## Data selection and combination
In 2016, the recycled plastics production was 327 kilotons, covering all major categories of plastics.

## Data treatment and extrapolations
calibration

## Use advice
When utilizing this data set, users should ensure that they consider the calibrated process data from 2016, specifically from ZEDA in Tianjin, which is indicative of the recycling output and environmental impact from that year. Users should note that the data provided reflects the performance of the mechanical recycling of waste polypropylene at that time and must be applied cautiously if used for projecting future implications. Seasonal and operational variations should be considered, and adjustments may be needed to suit respective recycling contexts and technological progress.

## Review details
Inventory: The internal review was done by several iteration steps concerning raw data validation, raw data documentation, representativity, completeness and consistency of modelling with regard to ISO 14040 and 14044.

## Data sources
- Chen, Y. et al. Life cycle assessment of end-of-life treatments of waste plastics in China. Resources, Conservation and Recycling 146, 348–357 (2019).
