# White carbon black production ;;white carbon black powder ; vapor phase method ; methyl trichlorosilane

Dataset: ILCD process, Unit process, single operation
Geography: CN
Classification: Unit processes / Materials production / Inorganic chemicals
Generated by: Xiaohua Liu, lxh01311@163.com
Owner: Tiangong LCI Data Working Group
Review: Dependent internal review by Tiangong LCI Data Working Group
Amounts: no units in this file; such an amount is in the reference unit of its flow, which a separate flow dataset defines
licenseType: Free of charge for all users and uses

## General comment
The material represented in this dataset is white carbon black powder produced using the vapor phase method with methyl trichlorosilane as a precursor. This white carbon black is predominantly used as a reinforcing filler in rubber products, including tires, and as a thickening agent or an anti-caking agent in paints, inks, cosmetics, and food products.

## Reference product
- Silica: 1000
  白炭黑

## Inputs
- Electricity: 8510.4
- sodium hydroxide: 366.5
  烧碱
- water: 5338
  新鲜水
- compressed air: 5367.6
  压缩空气
- Methyl Silicochloroform: 2033.8
  一甲基三氯硅烷
- Hydrogen: 76.3
  氢气

## Outputs
- hydrogen chloride: 4675.3
  Hydrogen chloride
- chemical oxygen demand: 1983.2
- carbon dioxide (fossil): 5655
  The original text did not distinguish between bio and fossil，according to experts, carbon dioxide is classified as carbon dioxide（fossil） in this area

## Use advice
When utilizing this data set, take into consideration that the production process is based on the vapor phase method and may not be representative for other production methods of white carbon black. Due to potential variability in production, exact emissions and resource usage should be verified for specific installations. Methodological advice includes ensuring that downstream processing or recycling phases are accounted for if applicable. Users should model the use phase behavior according to the particular applications and lifetime of the products using white carbon black.

## Review details
Inventory: The internal review was done by several iteration steps concerning raw data validation, raw data documentation, representativity, completeness and consistency of modelling with regard to ISO 14040 and 14044.

## Data sources
- 内蒙古恒业成有机硅有限公司年产3000吨气相法白炭黑项目
