# Municipal sludge treatment and disposal;wet sludge moisture content 80%;landfill

Dataset: ILCD process, Unit process, single operation
Geography: CN
Classification: Unit processes / End-of-life treatment / Waste water treatment
Functional unit: In this paper, 1 t of 80% sludge with a moisture content is used as the functional unit for calculating environmental impact, resource consumption and economic cost.
Generated by: Jin Sitian, 2331276@tongji.edu.cn
Owner: Tiangong LCI Data Working Group
Review: Dependent internal review by Tiangong LCI Data Working Group
Amounts: no units in this file; such an amount is in the reference unit of its flow, which a separate flow dataset defines
copyright: ['opt4ROkqig']
licenseType: Free of charge for all users and uses

## General comment
Sludge landfill will produce a large amount of leachate, and various components in the leachate, especially heavy metals, will have a greater impact on the surrounding soil and water environment, because the landfill leachate data is difficult to obtain, the amount of leachate produced in this paper is estimated to be 5% of the sludge mass according to the literature, and the content of each component refers to the filtrate produced by mechanical compression of sludge in sewage treatment plant.

## Technology and included processes
Using the traditional landfill process, the sludge is simply sterilized and then directly landfilled.

## Technical purpose
Municipal sludge treatment and disposal process that handles wet sludge with a moisture content of 80%, intended for landfill operations. The process is a unit operation designed to manage and neutralize municipal sewage sludge, making it suitable for safe disposal in landfills. This includes dewatering procedures that reduce the moisture content of sludge and prepare it for subsequent handling or treatment phases.

## Reference product
- Sludge: 1000; input; estimated
  1 t moisture content 80% sludge

## Outputs
All rows: calculated
- carbon dioxide (biogenic): 49.62
  The original text does not distinguish between biogenic and fossil, and according to experts, it is biogenic here.
- methane (biogenic),methane (biogenic): 14.87
  (same comment as for carbon dioxide (biogenic))
- nitrous oxide: 0.001
- Nitrogen oxides: 0.13
- sulfur dioxide: 0.03
- carbon monoxide (biogenic): 0.02
  (same comment as for carbon dioxide (biogenic))
- hydrocarbons (unspecified): 0.002
- particles (PM10): 0.005
- hydrogen sulfide: 0.006
- ammonia: 0.004
- chemical oxygen demand: 0.13
- nitrogen, total (excluding N2): 0.009
- phosphorus, total: 0.001
- ammonium: 0.006
- mercury: 3e-7, 0.0008 (2 entries)
- lead: 2e-5, 0.04 (2 entries)
- cadmium: 8e-7, 0.002 (2 entries)
- nickel: 6e-6, 0.007 (2 entries)
- zinc: 6e-5, 0.4 (2 entries)
- copper: 7e-6, 0.04 (2 entries)
- chromium: 8e-6, 0.06 (2 entries)
- tin: 0.005, 0.005 (2 entries)
- Waste (solid): 750

## Use advice
When utilizing this data set for Life Cycle Assessment, it is important to ensure that the boundaries of the analysis accurately reflect the landfill disposal phase of municipal sludge with a corresponding moisture content of 80%. The functional unit of 1 tonne of sludge should be applied consistently across the study when assessing environmental impacts, resource consumption, and economic costs associated with the landfill process. Consideration should be given to any emissions generated, energy and materials used, and related activities up to the point of landfilling. Specific attention should be paid to regional variations in sludge composition, treatment technologies, and regulations.

## Review details
Inventory: The internal review was done by several iteration steps concerning raw data validation, raw data documentation, representativity, completeness and consistency of modelling with regard to ISO 14040 and 14044.

## Data sources
- 袁言言,肖军,黄瑛等.基于LCA和AHP的污泥处理技术的综合性能评价[J].环境科学与技术,2015,38(S1):263-268.
