# Wet steaming cotton fabric dyeing and finishing processing ; printing and dyeing cotton fabric ; stenter shaping

Dataset: ILCD process, Unit process, single operation
Geography: SZ-JS-CN
Reference year: 2012
Classification: Materials production / Other materials
Generated by: Yingfan Duan, 1300925579@qq.com
Owner: Tiangong LCI Data Working Group
Review: Dependent internal review by Tiangong LCI Data Working Group
Amounts: no units in this file; such an amount is in the reference unit of its flow, which a separate flow dataset defines
copyright: false
licenseType: Free of charge for all users and uses

## General comment
The wet steaming process for cotton fabric dyeing and finishing is used to treat textiles, specifically for printing and dyeing cotton materials. Stenter shaping, as a part of this process, involves stretching and heat-setting the fabric to achieve desired dimensional stability and finishing. Coal is utilized as an energy source in steam and thermal oil boilers to generate steam and maintain high operating temperatures critical for processes such as singeing and stenter shaping.

## Geography
本研究选取江苏省某印染企业为重点调研对象，该企业位于长三角经济圈中的常熟。

## Reference product
- Cotton Fabric: 167; measured

## Inputs
- Electricity: 967; measured
- Standard coal: 872; measured
- Crude coal: 306; calculated
- Cleaned coal: 758; calculated
- Fuel Oil: 6.53; calculated
- heavy fuel oil: 1.96; calculated
- diesel: 8.98; calculated
- Coke Oven Gas: 12; calculated
- natural gas: 0.153; calculated
- Gasoline (regular): 1400; measured
- Softener: 250; measured
- river water: 3100; measured
- Water (fresh water): 555; measured

## Outputs
- carbon dioxide: 947; calculated
- carbon monoxide: 0.739; calculated
- sulfur dioxide: 4.96; calculated
- methane: 3.2; calculated
- Nitrogen oxides: 1.436; calculated
- nitrous oxide: 0.0102; measured
- Dust (unspecified, from stack): 2.51; calculated
- ammonia: 2.49e-5; measured
- non-methane volatile organic compounds: 0.00357; measured
- waste water - untreated: 1850; measured
- chemical oxygen demand: 2.12; calculated
- Suspended solids, unspecified: 0.282; calculated
- volatile organic compound: 0.265; calculated
- lead: 2.4e-5; calculated
- mercury: 5.05e-7; calculated
- fluorine: 4.55e-6; calculated
- cadmium: 8.91e-7; calculated
- arsenic: 2.06e-5; calculated

## Use advice
When utilizing this data set for Life Cycle Assessment, consider the ratio of coal consumption between steam and thermal oil boilers as 17:1 according to the surveyed company's clean production report. The coal consumption for singeing and stenter shaping should be assumed as equal due to the heating of oil through thermal oil boilers. Gasoline, used as a heat transfer medium circulating in pipelines, shows negligible loss and does not produce pollutant emissions. Allocate the material use and pollutant emissions from gasoline production evenly between these two processes. This unit process data is based on a case study of a printing and dyeing company located in Changshu, within the Yangtze River Delta economic zone in Jiangsu Province.

## Review details
Inventory: The internal review was done by several iteration steps concerning raw data validation, raw data documentation, representativity, completeness and consistency of modelling with regard to ISO 14040 and 14044.

## Data sources
- 朱亚楠. 棉布连续轧染工艺生命周期环境影响评价. (南京大学, 2012).
