# Soil remediation ; Ex-situ remediation ; Chemical oxidation ; Construction preparation ; Material transportation ; Equipment and Materials Arriving on Site

Dataset: ILCD process, Unit process, single operation
Geography: AH-CN
Reference year: 2023
Classification: Other Services / Repair and maintenance
Generated by: Sang Chunhui, sangch@mail.bnu.edu.cn
Owner: Tiangong LCI Data Working Group
Review: Dependent internal review by Tiangong LCI Data Working Group
Amounts: no units in this file; such an amount is in the reference unit of its flow, which a separate flow dataset defines
copyright: false
licenseType: Free of charge for all users and uses

## General comment
Site 29437.9 m3 Total 1186 tons of materials and chemicals required for remediation of contaminated soil, with a total transport distance of 15 km

## Geography
Iron and steel mill site contaminated with a combination of heavy metals and organic matter in Hefei, Anhui Province, China

## Technology and included processes
Delivery to the site of all equipment, materials, chemicals, etc. used in the restoration process

## Technical purpose
The data set represents the process of ex-situ soil remediation specifically through chemical oxidation. This process is intended for use in the remediation of industrial sites contaminated with heavy metals and organic pollutants. In this case, the data relates to a steel plant site in Hefei, Anhui province, and reflects the treatment of 29,437.9 cubic meters of contaminated soil, which includes the preparation for construction and the transportation of 1,186 tons of materials and chemicals required for the remediation process over a distance of 15 km.

## Reference product
- Equipment and Materials Arriving on Site: 1.186e6; estimated
  运输土壤修复所需材料和药剂

## Inputs
- transport in t*km: 17790; estimated

## Use advice
Users of this data set should take into account that the provided information is specific to the site mentioned (steel plant in Hefei, Anhui province) and may not be directly applicable to other contexts without adjustments. Factors such as local soil composition, the specific contaminants present, and site conditions should be considered when adapting this process to other locations. Attention should be given to the material and chemical requirements, transport distances, and project scale which may vary significantly for other sites. The recycling or disposal of any residual materials after the remediation process should also be considered in the overall life cycle assessment.

## Review details
Inventory: The internal review was done by several iteration steps concerning raw data validation, raw data documentation, representativity, completeness and consistency of modelling with regard to ISO 14040 and 14044.

## Data sources
- 桑春晖,杨欣桐,李香兰等.基于SEFA方法的异位土壤修复环境足迹分析——以某钢铁厂为例[J].中国环境科学,2023,43(10):
