# clinker production;clinker;new suspension preheater kiln

Dataset: ILCD process, Unit process, single operation
Geography: CN
Classification: Materials production / Inorganic chemicals
Generated by: Siqi Yang, ysqsophia@gmail.com
Owner: Tiangong LCI Data Working Group
Review: Dependent internal review by Tiangong LCI Data Working Group
Amounts: no units in this file; such an amount is in the reference unit of its flow, which a separate flow dataset defines
copyright: false
licenseType: Free of charge for all users and uses

## General comment
The grinding of raw materials and calcinating for clinker are closely linked as one complete procedural phase in the new suspension preheater (NSP) kiln. In addition, the residual heat from the kiln in the calcinating process is used to dry or bake raw materials in the grinding phase with the addition of coal powder.The NSP kiln is a production system of high efficiency, good production continuity, high output, and low overall energy consumption. In addition, with better dust collection and noise elimination equipment, the production system of the NSP kiln can greatly reduce the consumption of resources and pollutant emissions.

## Technology and included processes
Compared with the shaft kiln, the NSP kiln is a production system of high efficiency, good production continuity, high output, and low overall energy consumption. In addition, with better dust collection and noise elimination equipment, the production system of the NSP kiln can greatly reduce the consumption of resources and pollutant emissions.

## Technical purpose
The New Suspension Preheater (NSP) kiln process is a highly efficient clinker production system. It is used in the cement industry to prepare and calcinate raw materials into clinker. The clinker produced is a key component for creating different types of cement. This system incorporates an advanced production phase that tightly integrates the grinding and calcining processes. The NSP kiln is particularly suited for continuous, high volume production environments, achieving high levels of output while maintaining lower energy consumption and minimizing environmental impact through improved dust collection and noise reduction equipment.

## Model description
The system boundaries include the raw meal preparation stage (including grinding) and the calcination stage to produce clinker.

## Reference product
- clinker: 1000
  Cement clinker

## Inputs
- limestone, crushed, for mill: 1497.2
  Limestone
- clay: 276.5
  Clay
- iron, powder: 80.8
  Iron powder
- Water (fresh water): 45.6
  Water (water content): water contained in the input materials.
- oxygen: 400
  O2
- hard coal; 26.3 MJ/kg: 150
  Coal

## Outputs
- particles (> PM10): 4
  Dust. The particle size is not specified. Here we treat it as PM>10.
- carbon dioxide: 799.8
  CO2
- sulfur dioxide: 0.6
  SO2
- Nitrogen oxides: 2.4
  NOx
- water vapour: 45.6
  Vapor
- Waste, solid, from cement production: 103.9
  Others. The original text did not specify what substance it is, so let's assume it is the soild waste.

## Use advice
When using this data set, attention should be paid to the system boundaries specified - the preparation stage of the raw meal (including grinding) and the calcination stage for producing clinker. Users should include both of these stages in their Life Cycle Assessments. It's important to note the high efficiency and low energy consumption of the NSP kiln process; therefore, comparisons with other kiln types should account for these attributes. Additionally, due to the advanced dust and noise control technologies, environmental impact factors should be adjusted accordingly in LCA models. The specific use of coal powder for drying or baking in the grinding phase should also be appropriately reflected.

## Review details
Inventory: The internal review was done by several iteration steps concerning raw data validation, raw data documentation, representativity, completeness and consistency of modelling with regard to ISO 14040 and 14044.

## Data sources
- Dan Hu, Zhen Guo, Zhen Wang, & Qiang Xiao. (2015). Metabolism analysis and eco-environmental impact assessment of two typical cement production systems in Chinese enterprises. Ecological Informatics 26, 70–77.
