# Electricity production ; Electricity mix ; Guangdong

Dataset: ILCD process, Unit process, single operation
Geography: GD-CN
Reference year: 2019
Classification: Unit processes / Energy carriers and technologies / Electricity
Generated by: Ruoxi Xiong, xiongrx0126@163.com
Owner: Tiangong LCI Data Working Group
Review: Dependent internal review by Tiangong LCI Data Working Group
Amounts: no units in this file; such an amount is in the reference unit of its flow, which a separate flow dataset defines
copyright: false
licenseType: Free of charge for all users and uses

## General comment
Electricity mix includes thermal, hydro, wind, nuclear and solar generation

## Technical purpose
The electricity mix from Guangdong is utilized for a diverse range of applications across residential, commercial, and industrial sectors. This includes daily electricity needs such as lighting, heating, and cooling systems, as well as for operating machinery, electronic devices, and for powering industrial operations that require a reliable electricity supply.

## Reference product
- Electricity: 3.6; missing unimportant
  [{'text': '能量', 'type': 'text'}]

## Inputs
All rows: missing unimportant
- electricity for thermal power: 2.44121
  [{'text': '能量', 'type': 'text'}]
- electricity from hydroelectric power plant: 0.282233
  [{'text': '能量', 'type': 'text'}]
- electricity for nuclear power: 0.786272
  [{'text': '能量', 'type': 'text'}]
- electricity from wind power: 0.0526068
  [{'text': '能量', 'type': 'text'}]
- electricity for solar power: 0.0376776
  [{'text': '能量', 'type': 'text'}]

## Use advice
When utilizing this data for Life Cycle Assessment, users should consider the specific mix of electricity sources and their respective environmental impacts. Regional differences in generation sources such as the proportion of renewable to non-renewable sources in Guangdong's mix must be accounted for. The inclusion of recycling processes should be considered where applicable, as should the assumed operational lifetime for the various generation technologies present in the mix. Users are advised to update the data regularly to reflect the changing energy mix and technology improvements.

## Review details
Inventory: The internal review was done by several iteration steps concerning raw data validation, raw data documentation, representativity, completeness and consistency of modelling with regard to ISO 14040 and 14044.

## Data sources
- 能源统计年鉴2020
