# Lithium hexafluorophosphate production ; Lithium hexafluorophosphate ; Fluorine free gas method

Dataset: ILCD process
Geography: JS-CN
Reference year: 2023
Classification: Unit processes / Materials production / Inorganic chemicals
Functional unit: 1 ton lithium hexafluorophosphate product
Generated by: Xiaohua Liu, lxh01311@163.com
Owner: Tiangong LCI Data Working Group
Review: Dependent internal review by Tiangong LCI Data Working Group
Amounts: no units in this file; such an amount is in the reference unit of its flow, which a separate flow dataset defines
copyright: false
licenseType: Free of charge for all users and uses

## General comment
Lithium hexafluorophosphate produced by the fluorine-free gas method is commonly used as an electrolyte in lithium-ion batteries, which power electronic devices such as smartphones, laptops, and electric vehicles. This high-purity compound is crucial for battery performance and longevity.

## Reference product
- Lithium hexafluorophosphate: 1000; measured
  lithium hexafluorophosphate

## Inputs
All rows: measured
- Phosphorus Pentachloride: 1373
  phosphorus pentachloride
- Anhydrous Hydrogen Fluoride: 2058
  anhydrous hydrogen fluoride
- Lithium fluoride: 171
  lithium fluoride
- sodium hydroxide: 67
- Nitrogen: 2000
  nitrogen
- water: 18780
- Electricity: 13.392
  electricity
- Steam: 500
  steam

## Outputs
All rows: measured
- Hydrochloric Acid（31%）: 1333
  Byproduct 31% hydrochloric acid
- Hydrogen Fluoride: 1097
  Byproduct 45% hydrogen fluoride
- hydrogen fluoride: 4.8
  Hydrogen fluoride (emitted into the atmosphere
- hydrogen chloride: 6
  Hydrogen chloride (emitted into the atmosphere)
- Water: 17257
  Water (discharged into water bodies)
- hydrogen fluoride: 45
  Hydrogen fluoride (discharged into water)
- hydrogen chloride: 54
  Hydrogen chloride(discharged into water)

## Use advice
When utilizing this data for Life Cycle Assessment of products containing lithium hexafluorophosphate, consider the source and purity level of the material. Ensure to account for any environmental impacts associated with the production phase, which utilizes a fluorine-free gas method. This may affect the overall environmental footprint in comparison to other production processes. Also, consider future recycling possibilities and end-of-life scenarios for products containing this substance.

## Review details
Inventory: The internal review was done by several iteration steps concerning raw data validation, raw data documentation, representativity, completeness and consistency of modelling with regard to ISO 14040 and 14044.

## Data sources
- 六氟磷酸锂全生命周期环境影响评价研究 - 中国知网.
