# greywater reuse ; greywater ; photocatalysis

Dataset: ILCD process, Unit process, black box
Geography: ES
Classification: Unit processes / End-of-life treatment / Waste water treatment
Generated by: 榕
Owner: Tiangong LCI Data Working Group
Review: Dependent internal review by Tiangong LCI Data Working Group
Amounts: no units in this file; such an amount is in the reference unit of its flow, which a separate flow dataset defines
copyright: ['opt4ROkqig']
licenseType: Free of charge for all users and uses

## General comment
The advantages of photocatalytic greywater reuse include high efficiency, no residual chemical agents, no secondary pollution, and simple operation. However, this technology also faces some challenges, such as high energy consumption, relatively high equipment costs, and issues regarding the stability and lifespan of catalysts.

## Technology and included processes
The photocatalytic reactor (APRIA Systems S.L. Photolab LED/160) is constituted of 1.00 L jacketed annular reactor, 5.00 L mixing tank and 40 LEDs LZ1-00U600 (LED Engin). LEDs emit in a wavelength between 365 nm and 370 nm, being the total electrical power between 1.00 W and 100 W. A fan (San Ace 80, Sanyo Denki) is used to keep LEDs temperature in the suitable range (20.0 °C–30.0 °C) to keep constant radiation over time and high lamp lifetime. SDBS concentration was quantified by means of an UV-1800 spectrophotometer (Shimadzu) at 223 nm. The waste TiO2 obtained after the photocatalytic treatment is sent to a municipal landfill.

## Technical purpose
The photocatalytic greywater reuse process is designed for efficient water recycling applications, emphasizing high efficiency, no chemical residue, and zero secondary pollution. These attributes make the system suitable for various sectors, including residential, commercial, and industrial facilities, where water conservation and reuse are vital, especially in water-scarce environments.

## Reference product
- greywater: 1; input; estimated

## Inputs
- freshwater,freshwater: 0.2
- titanium dioxide: 0.1; measured
- Electricity: 26.3
  Aeration
- Electricity: 135
  Light source
- Electricity: 8.17
  Pumping
- Electricity: 0.32
  Stirring

## Outputs
- Exhausted TiO2: 0.1; measured
- waste water - treated: 1; estimated

## Use advice
When utilizing the dataset for photocatalytic greywater reuse, careful consideration should be given to the specific context in which the technology is applied. Users should account for potential variations in energy consumption, equipment costs, and the stability and lifespan of the photocatalyst used. It is critical to note that the dataset does not cover the treatment or disposal of waste photocatalyst (e.g., TiO2), and separate data should be sought for the end-of-life phase, including landfill impacts.

## Review details
Inventory: The internal review was done by several iteration steps concerning raw data validation, raw data documentation, representativity, completeness and consistency of modelling with regard to ISO 14040 and 14044.

## Data sources
- Dominguez, S. et al. LCA of greywater management within a water circular economy restorative thinking framework. SCIENCE OF THE TOTAL ENVIRONMENT 621, 1047–1056 (2018).
