# Cell production ; Monocrystalline Cell ; Monocrystalline silicon wafers ; Alkali pile making + wet etching ; All sizes; NESPS2 / 电池片生产 ; 单晶电池片 ; 单晶硅片 ; 碱制绒+湿法刻蚀 ; 所有规模 ; 全国第二次污染普查数据

Dataset: ILCD process, Unit process, single operation
Geography: CN
Reference year: 2019
Classification: Reference Parameters / Materials production / Other materials
Generated by: The data was created by the Office of the Second National Pollution Source Census of the Ministry of Ecology and Environment, and the data was organized by the TianGong Plan team for ILCD format / 生态环境部第二次全国污染源普查工作办公室创建数据，天工计划团队常慧敏整理数据为ILCD格式
Owner: Tiangong LCI Data Working Group / 天工LCI数据工作小组
Review: Dependent internal review by Tiangong LCI Data Working Group / 天工LCI数据工作小组
Amounts: no units in this file; such an amount is in the reference unit of its flow, which a separate flow dataset defines
copyright: false
licenseType: Free of charge for all users and uses

## General comment
the Technical of end-of-pipe management technology for pollution Exhaust gasis/

## Technical purpose
本生产流程产出的单晶硅片主要用于单晶太阳能电池的制造。这些太阳能电池通常被应用于太阳能板，转换阳光为电能。生产过程包括适用于所有尺寸的太阳能电池的碱制绒和湿法刻蚀工艺。采用高效的末端控制技术来处理生产相关的污染物，如化学需氧量、氨氮、总磷、有机结合氮、废水、氮氧化物、氨和挥发性有机化合物。这些技术包括厌氧/好氧过程（A/O过程）、生物膜法、化学混凝、喷雾塔和活性炭吸附，实现了在污染控制上的高技术效率。

## Reference product
- Mono-Si wafer: 3600; calculated
  源文件中描述为为单晶电池片，此处对其进行了匹配工作，将其匹配到LCAflow库里面相最符合的流，污染物指标备注为化学需氧量，单位说明为原单位为兆瓦，此处归一化到kWh

## Outputs
All rows: calculated
- phosphorus, total: 0.0123
  the Technical of end-of-pipe management technology for pollution phosphorus, totalisBiofilm process，Its Technical efficiency of end-of-pipe management99
  污染物指标总磷的末端治理技术是生物膜法，其效率为99，末端治理设施实际运行率（k值）计算公式为k=污水治理设施运行时间（小时/年）/正常生产时间（小时/年）。原文件中描述污染物类别为废水，污染物指标为总磷，此处对其进行了匹配工作，将其匹配到LCAflow库里面相最符合的流，污染物指标备注为总磷
- phosphorus, total: 0.0369
  the Technical of end-of-pipe management technology for pollution phosphorus, totalisA/O process，Its Technical efficiency of end-of-pipe management97
  污染物指标总磷的末端治理技术是A/O工艺，其效率为97，末端治理设施实际运行率（k值）计算公式为k=污水治理设施运行时间（小时/年）/正常生产时间（小时/年）。原文件中描述污染物类别为废水，污染物指标为总磷，此处对其进行了匹配工作，将其匹配到LCAflow库里面相最符合的流，污染物指标备注为总磷
- phosphorus, total: 0.0861
  the Technical of end-of-pipe management technology for pollution phosphorus, totalisChemical coagulation，Its Technical efficiency of end-of-pipe management93
  污染物指标总磷的末端治理技术是化学混凝法，其效率为93，末端治理设施实际运行率（k值）计算公式为k=污水治理设施运行时间（小时/年）/正常生产时间（小时/年）。原文件中描述污染物类别为废水，污染物指标为总磷，此处对其进行了匹配工作，将其匹配到LCAflow库里面相最符合的流，污染物指标备注为总磷
- Ammonia Nitrogen: 0.2484
  the Technical of end-of-pipe management technology for pollution Ammonia NitrogenisBiofilm process，Its Technical efficiency of end-of-pipe management96
  污染物指标氨氮的末端治理技术是生物膜法，其效率为96，末端治理设施实际运行率（k值）计算公式为k=污水治理设施运行时间（小时/年）/正常生产时间（小时/年）。原文件中描述污染物类别为废水，污染物指标为氨氮，此处对其进行了匹配工作，将其匹配到LCAflow库里面相最符合的流，污染物指标备注为氨氮
- Ammonia Nitrogen: 0.5589
  the Technical of end-of-pipe management technology for pollution Ammonia NitrogenisA/O process，Its Technical efficiency of end-of-pipe management91
  污染物指标氨氮的末端治理技术是A/O工艺，其效率为91，末端治理设施实际运行率（k值）计算公式为k=污水治理设施运行时间（小时/年）/正常生产时间（小时/年）。原文件中描述污染物类别为废水，污染物指标为氨氮，此处对其进行了匹配工作，将其匹配到LCAflow库里面相最符合的流，污染物指标备注为氨氮
- Nitrogen, organic bound: 6.25
  the Technical of end-of-pipe management technology for pollution Nitrogen, organic boundisBiofilm process，Its Technical efficiency of end-of-pipe management95
  污染物指标总氮的末端治理技术是生物膜法，其效率为95，末端治理设施实际运行率（k值）计算公式为k=污水治理设施运行时间（小时/年）/正常生产时间（小时/年）。原文件中描述污染物类别为废水，污染物指标为总氮，此处对其进行了匹配工作，将其匹配到LCAflow库里面相最符合的流，污染物指标备注为总氮
- volatile organic compound: 6.75
  the Technical of end-of-pipe management technology for pollution volatile organic compoundisSpray tower，Its Technical efficiency of end-of-pipe management95
  污染物指标挥发性有机物的末端治理技术是喷淋塔，其效率为95，末端治理设施实际运行率（k值）计算公式为k=工艺废气净化装置耗电量（千瓦时/年）/[工艺废气净化装置额定功率（千瓦）×工艺废气净化装置运行时间（小时/年）]。原文件中描述污染物类别为废气，污染物指标为挥发性有机物，此处对其进行了匹配工作，将其匹配到LCAflow库里面相最符合的流，污染物指标备注为挥发性有机物
- ammonia: 7.89
  the Technical of end-of-pipe management technology for pollution ammoniaisSpray tower，Its Technical efficiency of end-of-pipe management97
  污染物指标氨的末端治理技术是喷淋塔，其效率为97，末端治理设施实际运行率（k值）计算公式为k=工艺废气净化装置耗电量（千瓦时/年）/[工艺废气净化装置额定功率（千瓦）×工艺废气净化装置运行时间（小时/年）]。原文件中描述污染物类别为废气，污染物指标为氨，此处对其进行了匹配工作，将其匹配到LCAflow库里面相最符合的流，污染物指标备注为氨
- chemical oxygen demand: 9.545
  the Technical of end-of-pipe management technology for pollution chemical oxygen demandisA/O process，Its Technical efficiency of end-of-pipe management77
  污染物指标化学需氧量的末端治理技术是A/O工艺，其效率为77，末端治理设施实际运行率（k值）计算公式为k=污水治理设施运行时间（小时/年）/正常生产时间（小时/年）。原文件中描述污染物类别为废水，污染物指标为化学需氧量，此处对其进行了匹配工作，将其匹配到LCAflow库里面相最符合的流，污染物指标备注为化学需氧量
- Nitrogen, organic bound: 12.5
  the Technical of end-of-pipe management technology for pollution Nitrogen, organic boundisA/O process，Its Technical efficiency of end-of-pipe management90
  污染物指标总氮的末端治理技术是A/O工艺，其效率为90，末端治理设施实际运行率（k值）计算公式为k=污水治理设施运行时间（小时/年）/正常生产时间（小时/年）。原文件中描述污染物类别为废水，污染物指标为总氮，此处对其进行了匹配工作，将其匹配到LCAflow库里面相最符合的流，污染物指标备注为总氮
- Nitrogen oxides: 56.9
  the Technical of end-of-pipe management technology for pollution Nitrogen oxidesisSpray tower，Its Technical efficiency of end-of-pipe management95
  污染物指标氮氧化物的末端治理技术是喷淋塔，其效率为95，末端治理设施实际运行率（k值）计算公式为k=工艺废气净化装置耗电量（千瓦时/年）/[工艺废气净化装置额定功率（千瓦）×工艺废气净化装置运行时间（小时/年）]。原文件中描述污染物类别为废气，污染物指标为氮氧化物，此处对其进行了匹配工作，将其匹配到LCAflow库里面相最符合的流，污染物指标备注为氮氧化物
- volatile organic compound: 135
  the Technical of end-of-pipe management technology for pollution volatile organic compoundisSpray tower + others (activated carbon adsorption)
  污染物指标挥发性有机物的末端治理技术是喷淋塔+其他（活性炭吸附），末端治理设施实际运行率（k值）计算公式为k=工艺废气净化装置耗电量（千瓦时/年）/[工艺废气净化装置额定功率（千瓦）×工艺废气净化装置运行时间（小时/年）]。原文件中描述污染物类别为废气，污染物指标为挥发性有机物，此处对其进行了匹配工作，将其匹配到LCAflow库里面相最符合的流，污染物指标备注为挥发性有机物
- Waste water: 308000
  the Technical of end-of-pipe management technology for pollution Waste wateris/
  污染物指标工业废水量的末端治理技术是/，末端治理设施实际运行率（k值）计算公式为/。原文件中描述污染物类别为废水，污染物指标为工业废水量，此处对其进行了匹配工作，将其匹配到LCAflow库里面相最符合的流，污染物指标备注为工业废水量
- Exhaust gas: 2.12e6
  the Technical of end-of-pipe management technology for pollution Exhaust gasis/
  污染物指标工业废气量的末端治理技术是/，末端治理设施实际运行率（k值）计算公式为/。原文件中描述污染物类别为废气，污染物指标为工业废气量，此处对其进行了匹配工作，将其匹配到LCAflow库里面相最符合的流，污染物指标备注为工业废气量

## Use advice
This dataset is derived from the Pollution Source Census Report and contains information on pollution emissions and related products. However, it does not include data on energy or chemical consumption, nor does it provide information on waste or co-product generation. When utilizing this dataset, please supplement the missing data based on actual conditions before use
该数据集来源于污染源普查报告，包含污染物排放及相关产品信息，但不包含能源或化学品消耗数据，也不提供废弃物或共生产物产生信息。在使用该数据集时，请根据实际情况补充缺失数据后再使用。

## Review details
Inventory: The internal review was done by several iteration steps concerning raw data validation, raw data documentation, representativity, completeness and consistency of modelling with regard to ISO 14040 and 14044.
清单： 内部审查通过几个迭代步骤完成，涉及原始数据验证、原始数据记录、代表性、完整性、与 ISO 14040 和 14044 有关的建模的一致性。

## Data sources
- 第二次全国污染源普查产排污核算系数手册（试用版）,四级代码3825文件，在完整版文件中第5117页
