# Milk production ; Manure treatment ; Integrated maize silage planting and dairy cow breeding system (IPBS)

Dataset: ILCD process, Unit process, single operation
Geography: QD-SD-CN
Reference year: 2016
Classification: Unit processes / End-of-life treatment / Material recycling
Functional unit: The 1t FPCM corrected for protein and fat content was selected as the evaluation unit
Generated by: Rui Yang, 1632707028@qq.com
Owner: Tiangong LCI Data Working Group
Review: Dependent internal review by Tiangong LCI Data Working Group
Amounts: no units in this file; such an amount is in the reference unit of its flow, which a separate flow dataset defines
copyright: false
licenseType: Free of charge for all users and uses

## General comment
In the process of manure treatment, the two modes of manure treatment are the same. Manure is made into organic fertilizer by compost, and urine sewage is put into the oxidation pond for harmless treatment to make liquid fertilizer. The main inputs in this process are electricity and diesel oil (Table 8). The discharge of this link includes the storage and discharge of manure and the energy consumption of organic fertilizer production. The greenhouse gas emission of urine polluted water in oxidation ponds is small [25] and can be ignored.

## Geography
A questionnaire survey was conducted on dairy farms in Qingdao, Shandong Province from July to August 2020.

## Time period
From 2016, Shandong began to implement the silage corn planting subsidy policy, is one of the earliest provinces to implement the subsidy policy, the subsidy standard is 20~50 yuan /t. In 2019, Shandong Province silage corn planting area reached 14,100 hm2, accounting for 7.3% of the country.

## Technology and included processes
In the study area, there are mainly two milk production modes :IPBS and non-IPBS. In non-IPBS, the farms only have feeding links and manure treatment links, all the feed is purchased, and the manure pile fertilizer is made into organic fertilizer and sold to fruit and vegetable farmers. In IPBS, the silage corn planting process is increased in the farm, organic fertilizer and liquid fertilizer are mainly applied to the farm field, and the remaining part is sold to fruit farmers and vegetable farmers, etc. The differences between the two models are as follows :1) the sources of silage corn in the farm are different, resulting in different feed transportation distances and feed costs; 2) The use of organic fertilizer and liquid fertilizer is different, and the transportation distance is different. A total of 109 dairy farms were investigated in this study, and 83 valid questionnaires were obtained after excluding non-conforming questionnaires, among which 38 were non-IPBS and 45 were IPBS.

## Technical purpose
The industrial process described is used for milk production and manure management as part of an Integrated Plantation and Breeding System (IPBS). Specifically, it involves the treatment of animal waste to produce organic fertilizer through composting and converting urine sewage into liquid fertilizer after harmless treatment in oxidation ponds. This system is implemented in the context of a dairy farm that also cultivates maize silage, which is integral to the feeding of the dairy cows.

## Reference product
- milk: 1000; estimated
  作为参考定量，非实际输出

## Inputs
All rows: measured
- waste water - untreated: 10753
  Urine sewage (IPBS mode)
- Electricity: 4.7088
- Diesel: 0.002493
- unspecified: 2.76
  Land occupation (IPBS model)
- manure: 1868
  Feces (IPBS mode)

## Outputs
- organic fertilizer: 728; measured
  Organic fertilizer (IPBS model)
- Fertilizer: 10215; measured
  Liquid fertilizer (IPBS mode)

## Use advice
When using the data set, it is important to consider the methodological boundary conditions such as the use of electricity and diesel oil as inputs and the associated energy consumption and emissions during the production of fertilizers. The greenhouse gas emissions from urine sewage in oxidation ponds are regarded as negligible and can be excluded from detailed reporting. The data should be applied in the context of a similar integrated dairy farming and maize silage cultivation environment, taking into account subsidies for silage corn planting, as experienced in Shandong Province, China. Where applicable, the data set should be used to model the life cycle of 1 ton of FPCM (Fat and Protein Corrected Milk) as the chosen functional unit for impact assessment.

## Review details
Inventory: The internal review was done by several iteration steps concerning raw data validation, raw data documentation, representativity, completeness and consistency of modelling with regard to ISO 14040 and 14044.

## Data sources
- 黄显雷, 师博扬, 张英楠, 龙昭宇, & 尹昌斌. 基于生命周期视角的种养一体化奶牛场环境经济效益评估. 中国环境科学 41, 3944–3955 (2021).
