# Aluminum electrolytic capacitor production ; Aluminum electrolytic capacitor (25V 4700uf)

Dataset: ILCD process, Unit process, black box
Geography: NT-JS-CN
Reference year: 2020
Classification: Unit processes / Materials production / Metals and semimetals
Generated by: Jinliang Xie, jinliang.research@gmail.com
Owner: Tiangong LCI Data Working Group
Review: Dependent internal review by Tiangong LCI Data Working Group
Amounts: no units in this file; such an amount is in the reference unit of its flow, which a separate flow dataset defines
copyright: false
licenseType: Free of charge for all users and uses

## General comment
This industrial process data pertains to the production of aluminum electrolytic capacitors, specifically a 25V 4700uf model. Aluminum electrolytic capacitors are used as passive components in electronic circuits to store electrical charge, commonly found in power supply units, consumer electronics, automotive electronics, and communication devices. They may be utilized in situations requiring large capacitance values and relatively high voltage ratings.

## Time period
Data from research conducted in 2020

## Reference product
- Aluminum Electrolytic Capacitors: 10000; measured
  aluminum electrolytic capacitors (qualified) (10000 pcs)

## Inputs
All rows: measured
- electricity, high voltage, aluminium industry: 12507.3
- Aluminum ingots(anode): 342.88
  Al ingots (anode) ; Al smelting preparation (anode)
- Aluminum ingots(cathode): 182.02
  Al ingots (cathode)
- Lead, in ground: 25.31
  Lead from assembly (including sleeving)
- case from assembly (including sleeving): 612.27
- polysulfide, sealing compound: 166.24
  Sealing cover from assembly (including sleeving)
- Sleeve: 35.8
  sleeve from assembly (including sleeving)
- Armature Winding: 25.31
  tab from winding ; 绕组接线片
- sealing tape, aluminium/PE, 50 mm wide: 2.7
  tape from winding
- Separator Paper Coil,Separator Paper Coil: 102.46
  Separator paper coil
- water, deionised: 87996.5
  deionized water
- tap water: 49376.4
  tape water
- electrolyte, KOH, LiOH additive: 312.13
  Electrolyte (soak); The complete composition of electrolyte is 69% main solvent (1,4-butyrolactone), 26% auxiliary solvent (ammonium tetramethylsuccinate), and 5% solute (water). The electrolyte here is assumed to consist of 95% the main solvent and 5% solutes to simplify the analysis of environmental impacts.
- phosphoric acid, industrial grade, without water, in 85% solution state: 92.38
- Perboric acid: 16.79
  perboric acid; HBO3; 过硼酸
- hydrochloric acid, without water, in 30% solution state: 126.39
  HCl (31%)
- Nitrogen: 0.65
  N2 gas (final annealing)
- sodium hydroxide, without water, in 50% solution state: 142.42
  NaOH (30%)
- ammonium nitrate: 1.48
  Ammonium nitrate; 硝酸氢铵
- nitric acid, without water, in 50% solution state: 37.92
  HNO3 (98%)
- Cold Rolling Oil: 12.56
  rolling oil (cold rolling)
- Ammonium Citrate: 32.33
  Ammonium citrate (formation process); 柠檬酸铵
- Ammonium Pentaborate: 8.87
  Ammonium pentaborate (formation process); 五硼酸铵
- Argon-40: 0.094
  Ar gas (Al smelting preparation)

## Outputs
All rows: measured
- Aluminium Phosphate: 11.9
  Aluminium phosphate (AlPO4) (production of anode formed foil); The environmental impacts from the production stage are all allocated to the capacitors. The by-product AlPO4 in production of anode formed foil is taken as an economical treatment method to address the production waste because of the limited amount and the simplified analysis.
- aluminium scrap, new: 42.25
  Al scraps; The environmental impacts on the specialized recycling processing of the flows are ignored.
- Scraps of Separator Paper: 0.062
  Scraps of separator paper; The environmental impacts on the specialized recycling processing of the flows are ignored.
- Sludge (Sewage Treatment): 11.198
  sludge (Sewage treatment); The environmental impacts on the specialized landfill of the sludge are ignored.
- wastewater, average: 75087
  wastewater
- Total Phosphorus (TP): 0.028
  total phosphorous (TP) (production of anode formed foil); 总磷 (污染物);
- total nitrogen: 0.126
  total nitrogen (TN); 总氮 (污染物)
- Suspended solids, unspecified: 1.057
- chemical oxygen demand: 3.215
- Biochemical Oxygen Demand: 0.403
  Biochemical Oxygen Demand (BOD) (Production of Al blank foil); 生化需氧量 (水体污染物)
- ammonia: 0.334
  Ammonia nitrogen (NH3-N)
- Dust: 0.194
  dust (Al smelting preparation)
- Hydrochloric acid: 0.621
- Sulfuric acid: 0.067
- Nitrogen oxides: 0.077
- ammonia: 0.07
- Aluminum Electrolytic Capacitors (Waste): 6281.67
  aluminum electrolytic capacitors (waste) ; The environmental impacts on the specialized recycling processing of the flows are ignored.

## Data selection and combination
The foreground data are from an AECs’ manufacturer and its supplier. The data about the product family and manufacturing processes of capacitor fabrication are from the AECs’ manufacturer in Nantong, Jiangsu, China. The reference year of capacitor fabrication is 2021. Furthermore, through the investigation of the manufacturer’s upstream supplier, the original data of manufacturing processes of blank foil fabrication (anode and cathode), formed foil fabrication, and cathode etched foil fabrication are obtained. The reference year of blank foil fabrication, formed foil fabrication, and cathode etched foil fabrication is 2020. The background data of the substance flows (i.e., aluminum ingots, separator paper, electricity, water) from the primary industries are acquired from the Gabi software (version 10.0.0.71). The LCI data about specialized treating processes of production waste, including capacitors (waste), aluminum scraps, paper scraps, and sludge, are ignored. In the electrolyte, the complete composition of the electrolyte is 69% main solvent (1,4-butyrolactone), 26% auxiliary solvent (ammonium tetramethyl succinate), and 5% solute (water). The electrolyte here is assumed to consist of 95% of the main solvent and 5% solutes to simplify the analysis of environmental impacts due to the missing LCI data. The inaccessible LCI data about 1,4-butyrolactone, ammonium citrate, ammonium pentaborate, NH4H2PO4, and HBO3 are estimated according to chemical equations of the existing substance flows (reactants) in Gabi software. This will underestimate the environmental impact of these substances in actual industrial production to a certain extent. Besides, many chemical reactions need to satisfy various reaction conditions such as pressure, temperature, and catalyst, which will lead to the extra input of energy and raw materials and increase the risk of environmental pollution. If there are side reactions for the desired chemical reaction, it will not only affect the yield of the targeted product of the reaction but also need a suitable subsequent treatment process to separate and purify the product. Due to the limited consumption of these five materials, their influence on the final assessment result is not significant.

## Use advice
When utilizing this data set, users should pay attention to the following methodological guidelines: consider the inclusion of production waste treatment not covered by the provided data, include adjustments for environmental impact underestimation due to estimated LCI data for certain chemicals, and ensure the calculation of additional energy and raw material inputs for satisfying various reaction conditions. Additionally, consider the potential environmental risk due to side reactions and subsequent treatment processes. Note that the missing LCI data may lead to a certain degree of underestimation of environmental impacts in actual industrial production, and due to the limited quantities involved, the overall effect on the LCA results is deemed not significant.

## Review details
Inventory: The internal review was done by several iteration steps concerning raw data validation, raw data documentation, representativity, completeness and consistency of modelling with regard to ISO 14040 and 14044.

## Data sources
- Zhang, C., Zheng, Y., Huang, H., Liu, Z. & Jing, J. Environmental impact assessment of aluminum electrolytic capacitors in a product family from the manufacturer’s perspective. Int. J. Life Cycle Assess. (2022)
