# SX and calcination of Rare Earth Oxides (REO) Rare Earth Oxides (REO);bastnaesite route;Rare Earth Elements (REE) containing ore

Dataset: ILCD process, Unit process, single operation
Geography: CN
Reference year: 2007
Valid until: 2020
Classification: Unit processes / Materials production / Inorganic chemicals
Functional unit: The study considered 15 different functional units corresponding to different RE metals. The assessment included three main RE production sites in China: REO production in Bayan Obo, Sichuan, and IACs. Primary data were collected for foreground production processes from Chinese and further international scientific literature, industry reports, government and industry surveys. The authors assumed a baseline for aqueous and gaseous emissions using national discharge standards for industry from the Chinese Ministry of
LCI method principle: Attributional
LCI method approaches: Allocation
Generated by: Tao Wang, twang@iue.ac.cn
Owner: Tiangong LCI Data Working Group
Review: Dependent internal review by Tiangong LCI Data Working Group
Amounts: no units in this file; such an amount is in the reference unit of its flow, which a separate flow dataset defines
copyright: false
licenseType: Free of charge for all users and uses

## General comment
The processing route involving solvent extraction (SX) and calcination of rare earth oxides (REO), particularly from bastnaesite containing REE ore, is a critical unit procedure applied primarily in the separation and purification of rare earth elements. This industrial process is essential for producing REO, which are pivotal in various high-tech applications, such as in the manufacturing of permanent magnets, catalysts, glass additives, and specialized ceramics. The Bayan Obo region in the Chinese Southern Provinces is significant for its REO production capabilities.

## Geography
Bayan Obo, Chinese Southern Provinces

## Technology and included processes
Because no primary mining data from Bayan Obo were available, LCI data in the studies (Sprecher, Arshi, Marx, Bailey (Classen et al., 2007)) are based on different data sources either from iron mining or in Althaus from phosphate rock mining. Main inputs are energy and blasting agent

## Reference product
- Rare Earth chloride solution: 1.49; input; calculated
  RE chloride

## Inputs
- hydrogen chloride: 3.46; calculated
- Kerosene: 0.62; calculated
- Extraction agent: 0.18; calculated
  Extraction agents

## Outputs
- carbon dioxide (fossil): 0.00206; calculated
  原文未区分bio和fossil，根据专家判断此处为fossil

## Deviations from the LCI method approaches
Goal of this chapter is to identify the most important differences and uncertainties of crucial parameters in the LCIs and to link those directly to the affected LCIAs. However, comparability of LCIA results shown in Fig. 4 is limited due to different LCIA methods, as already mentioned in the chapter “methods”. All LCIA results are shown in Tables S1 and S3 (Supplementary material). It should also be mentioned that we calculated Althaus' LCIA data, as he provided only the LCI in the ecoinvent database. For this, we rebuilt Althaus' original process “rare earth oxide production from bastnasite” in the GaBi software and evaluated it with two LCIA methods for comparison (Table S1).

## Use advice
When utilizing this Life Cycle Assessment (LCA) data, users must account for the lack of primary mining data from Bayan Obo by referencing alternative datasets derived from either iron or phosphate rock mining. Users are advised to be cautious of the uncertainties and differences in crucial parameters across the Life Cycle Inventories (LCIs) and should note the limitations in the comparability of Life Cycle Impact Assessment (LCIA) results due to varying methodology. Additionally, users may need to recalculate LCIA data when utilizing other LCIA methods not covered in this study. It is essential to consult supplementary material such as Tables S1 and S3 for detailed results and consider the technological applicability of the data carefully while integrating it into broader environmental assessments.

## Review details
Inventory: The internal review was done by several iteration steps concerning raw data validation, raw data documentation, representativity, completeness and consistency of modelling with regard to ISO 14040 and 14044.

## Data sources
- Schreiber, A., Marx, J. & Zapp, P. Life Cycle Assessment studies of rare earths production - Findings from a systematic review. Science of The Total Environment 791, 148257 (2021).
