# Extraction of Rare Earth Oxides (REO) Rare earth oxide;Rare earth oxide process;Bayan Obo

Dataset: ILCD process, Unit process, single operation
Geography: NMG-CN
Reference year: 2014
Classification: Unit processes / Materials production / Non-energetic raw materials
Functional unit: The scope of the LCA is cradle-to-gate and the functional unit was chosen as 1 kg of REO.
LCI method principle: Attributional
LCI method approaches: Allocation - market value; Allocation - exergetic content
Generated by: Tao Wang, twang@iue.ac.cn
Owner: Tiangong LCI Data Working Group
Review: Dependent internal review by Tiangong LCI Data Working Group
Amounts: no units in this file; such an amount is in the reference unit of its flow, which a separate flow dataset defines
copyright: false
licenseType: Free of charge for all users and uses

## General comment
The rare earth oxides (REOs) extracted through the Bayan Obo process are primarily used in various high-technology sectors, including electronics, magnets, optics, and as catalysts in automotive and petrochemical industries. These oxides are essential components in the manufacturing of advanced technology products such as smartphones, computer hard disks, wind turbines, hybrid and electric vehicles, and LED lights.

## Geography
Bayan Obo (China)

## Technology and included processes
The process chain for REO production includes mining followed by beneficiation, calcination, extraction, and roasting stages, see Figure 2. The first step in REO production is mining, wherein crude ore is blasted and transported for further refining. Crude ore abstracted from the Bayan Obo mine is composed of both monazite and bastnasite.

## Reference product
- chloride: 0.06; calculated

## Inputs
- hydrogen chloride: 1.366; calculated
  Nd2O3
- hydrogen chloride: 0.854; calculated
  Light
- hydrogen chloride: 1.604; calculated
  Medium
- hydrogen chloride: 6.418; calculated
  Heavy

## Outputs
- hydrogen chloride: 0.03; calculated

## Deviations from the LCI method approaches
Life cycle data was obtained from the Ecoinvent database, and mass-based-allocation was performed to partition the environmental impacts among crude ore and REO, as well as allocate the environmental impact among light, medium, heavy, and neodymium REOs. Two alternative allocations schemes, (I) market-based and (II) exegetic-based allocation, were considered as a means to partition the environmental impacts among REOs. The results for market- as well as exergetic-based allocation are provided in the Supporting Information. It is important to note that allocation based on market-value is the preferred method of the metals industry.23 When possible, Chinese-specificlifecycledatawas considered in the analysis; otherwise, European life cycle inventory (LCI) databases were used. The LCA results for REO production presented in this study provide a conservative benchmark for the environmental profile of REE. Furthermore, the LCI and LCA results can be extended/applied to evaluate the production of individual REE and REE-based technologies and products.

## Use advice
Users of this LCA data set should primarily apply the market-value-based allocation method recommended by the metals industry to partition environmental impacts among the different types of REOs produced. Additionally, specific attention should be given to the technological stages within the process chain, namely mining, beneficiation, calcination, extraction, and roasting. Users are advised to use Chinese-specific life cycle data when available to reflect regional environmental impact accurately. However, if not available, European life cycle inventory (LCI) data sets can be used as a substitute. When using the data set to evaluate the production of individual REEs or REE-based technologies and products, the conservative nature of the LCA results should be considered.

## Review details
Inventory: The internal review was done by several iteration steps concerning raw data validation, raw data documentation, representativity, completeness and consistency of modelling with regard to ISO 14040 and 14044.

## Data sources
- Zaimes, G. G., Hubler, B. J., Wang, S. & Khanna, V. Environmental Life Cycle Perspective on Rare Earth Oxide Production. ACS Sustainable Chem. Eng. 3, 237–244 (2015).
