# Alumina regeneration and polyaluminum chloride production ; polyaluminum chloride ; acid dissolution method ; secondary aluminum slag

Dataset: ILCD process, Unit process, single operation
Geography: CN
Reference year: 2021
Classification: Unit processes / Materials production / Inorganic chemicals
Generated by: Jinliang Xie, jinliang.research@gmail.com
Owner: Tiangong LCI Data Working Group
Review: Dependent internal review by Tiangong LCI Data Working Group
Amounts: no units in this file; such an amount is in the reference unit of its flow, which a separate flow dataset defines
copyright: false
licenseType: Free of charge for all users and uses

## General comment
The parameters such as temperature and yield of these three processes were based on experimental results. Life cycle inventory data were from the average data of aluminum industries in China and calculation based on material balance. The electricity type in this study was coal based, which is in line with the actual situation of China’s aluminum industry. The metal aluminum in secondary aluminum dross (SAD) can be recovered until 1 wt % is left through grinding and sieving. Chlorides in the solution were recovered through concentration and crystallization. Calcium chloride was used to remove fluoride. Ammonia was absorbed by hydrochloric acid and used to produce ammonium chloride. Methane produced from aluminum carbide was used as fuel gas to obtain energy. Chloride and fluoride were dissolved in water during the pretreatment. Hydrochloric acid was then used for the deactivation of active aluminum components and the dissolution of alumina. After curing at a certain temperature and duration, poly aluminum chloride can be obtained. Because of the low content and complex composition, the remaining metal chlorides were regarded as waste and landfilled. In this scenario, the active aluminum component was also completely deactivated. The recovery rate of alumina was 95%.

## Time period
September 2021

## Technical purpose
The described process is used in the recycling of secondary aluminum slag (SAD) to produce alumina and polyaluminum chloride (PAC). Alumina regenerated from this process can be used in applications such as aluminum metal production and as a precursor for various aluminum compounds. Polyaluminum chloride produced is commonly utilized as a coagulant in water treatment plants for potable and wastewater treatment.

## Reference product
- Secondary Aluminum Dross: 1000; input; measured
  secondary aluminium dross

## Inputs
- electricity, high voltage, aluminium industry: 720.72; measured
- hydrochloric acid, without water, in 30% solution state: 2710; measured
- calcium chloride: 43.82; measured
- Water, unspecified natural origin: 937.48; measured
  water

## Outputs
All rows: measured
- Residue from Filtration: 365.87
  residue from filtration
- Ammonia: 0.98
  ammonia (emissions)
- Dust from Grinding and Sieving: 0.01
  dust from grinding and sieving
- aluminium: 45.9
  aluminium (recycled resources)
- sodium chloride, powder: 81.73
- potassium chloride: 22.49
- fluorspar: 30.82
  calcium fluoride
- ammonium chloride: 260.63
- Polyaluminium Chloride: 1562.49
  polyaluminum chloride

## Use advice
When employing this life cycle assessment data, ensure to adhere to the cut-off rules defined by the included cutoff system model, focusing solely on the environmental impacts attributable to the SAD recovery within the aluminum life cycle, excluding transportation. Account for the coal-based electricity usage consistent with the aluminum industry's practice in China. The recovery process sequence - involving grinding, sieving, concentration, crystallization, and curing should be accurately reflected and the final landfilling of low-content complex metal chlorides should be considered as waste disposal. The alumina recovery rate of 95% needs to be incorporated into the material balance calculations.

## Review details
Inventory: The internal review was done by several iteration steps concerning raw data validation, raw data documentation, representativity, completeness and consistency of modelling with regard to ISO 14040 and 14044.

## Data sources
- Zhu, X. & Jin, Q. Comparison of Three Emerging Dross Recovery Processes in China’s Aluminum Industry from the Perspective of Life Cycle Assessment. ACS Sustainable Chem. Eng. 9, 6776–6787 (2021).
