# Soil Remediation;In-situ Remediation;Thermal Desorption;Case 1;Contaminated Soil Excavation;Excavated Soil

Dataset: ILCD process, Unit process, single operation
Geography: JS-CN
Reference year: 2017
Classification: Unit processes / Other Services / Repair and maintenance
Generated by: Wang Ning, wang_ning@caep.org.cn
Owner: Tiangong LCI Data Working Group
Review: Dependent internal review by Tiangong LCI Data Working Group
Amounts: no units in this file; such an amount is in the reference unit of its flow, which a separate flow dataset defines
copyright: false
licenseType: Free of charge for all users and uses

## General comment
Use of excavators to dig out contaminated soil

## Technology and included processes
The amount of contaminated soil-free cubic metres at the site is 61,135 m3, the efficiency of the excavator is 44.6 m3/h, and the fuel consumption is 22l/h.

## Technical purpose
This dataset describes the application of in-situ thermal desorption for soil remediation. It is used in the case where a site has contaminated soil that requires treatment. The process involves excavating contaminated soil and subsequently treating it to remove pollutants.

## Reference product
- Excavated soil,Excavated soil: 61135; measured

## Inputs
- Diesel,Diesel: 30.1563; measured

## Use advice
Users of this dataset should take into account the specified volume (61,135 m3) of contaminated soil and the operational parameters of the excavation process (efficiency of 44.6 m3/h and fuel consumption of 22l/h) for accurate modeling in Life Cycle Assessments. It is essential to include all major raw materials and necessary energy consumption as input-output flows for the assessment.

## Review details
Inventory: The internal review was done by several iteration steps concerning raw data validation, raw data documentation, representativity, completeness and consistency of modelling with regard to ISO 14040 and 14044.

## Data sources
- Song, Y. et al. Environmental and socio-economic sustainability appraisal of contaminated land remediation strategies: A case study at a mega-site in China. Science of The Total Environment 610–611, 391–401 (2018).
