# Aluminum Recycling ; Recycled Aluminum Ingots ; Scrap Aluminum ; 2010

Dataset: ILCD process, Unit process, single operation
Geography: CN
Reference year: 2021
Classification: Unit processes / Materials production / Metals and semimetals
Generated by: Zimeng Cai, caizm6178@163.com
Owner: Tiangong LCI Data Working Group
Review: Dependent internal review by Tiangong LCI Data Working Group
Amounts: no units in this file; such an amount is in the reference unit of its flow, which a separate flow dataset defines
copyright: false
licenseType: Free of charge for all users and uses

## General comment
The recycled aluminum ingots produced from this process are primarily utilized in the manufacture of products where secondary quality aluminum is acceptable. Such applications include but are not limited to automotive parts, construction materials, household items, and in certain cases, packaging. The ingots may also serve as a raw material for producing aluminum alloys, considering the varied properties of scrap aluminum used in the recycling process.

## Time period
Date of publication

## Reference product
- secondary aluminium ingot: 1000; missing unimportant
  ingot

## Inputs
- electricity, high voltage, aluminium industry: 925.2; missing unimportant
  electricity
- aluminium scrap, unspecified: 1350; missing unimportant
  aluminum scrap

## Data selection and combination
The data in this study refers to the LCA data of PA, SA, electricity, and other background data. The PA data were obtained from statistical data sources, and the SA data were mainly obtained from the literatures. The background data were mainly derived from the Chinese localization LCA database CAS RCEES 2018, which was established by the Research Center for Eco-Environmental Sciences, Chinese Academy of Sciences and covers LCA data for energy, materials, transportation, waste management etc.

## Use advice
When using this LCA data set, it is essential to incorporate the indicated year of the data (2010) to maintain temporal accuracy. Due to potential changes in technology and recycling practices, subsequent LCA studies might require updates with more recent data sources. Users should ensure that end-of-life recycling credits or burdens are appropriately allocated based on the specific context of the aluminum's application. The inclusion of electricity and other background data necessitates careful consideration to reflect the current energy mix and technological standards in China, especially if comparing to global or regional averages.

## Review details
Inventory: The internal review was done by several iteration steps concerning raw data validation, raw data documentation, representativity, completeness and consistency of modelling with regard to ISO 14040 and 14044.

## Data sources
- Ding, N., Liu, N., Lu, B. & Yang, J. Life cycle greenhouse gas emissions of aluminum based on regional industrial transfer in China. J. Ind. Ecol. 25, 1657–1672 (2021).
