# Amino trimethyl phosphate ; Phosphite, ammonium chloride, formaldehyde ; Condensation reaction process ; All sizes; NESPS2 / 氨基三甲叉磷酸 ; 亚磷酸、氯化铵、甲醛 ; 缩合反应工艺 ; 所有规模 ; 全国第二次污染普查数据

Dataset: ILCD process, Unit process, single operation
Geography: CN
Reference year: 2019
Classification: Reference Parameters / Materials production / Organic chemicals
Generated by: The data was created by the Office of the Second National Pollution Source Census of the Ministry of Ecology and Environment, and the data was organized by the TianGong Plan team for ILCD format / 生态环境部第二次全国污染源普查工作办公室创建数据，天工计划团队常慧敏整理数据为ILCD格式
Owner: Tiangong LCI Data Working Group / 天工LCI数据工作小组
Review: Dependent internal review by Tiangong LCI Data Working Group / 天工LCI数据工作小组
Amounts: no units in this file; such an amount is in the reference unit of its flow, which a separate flow dataset defines
copyright: false
licenseType: Free of charge for all users and uses

## General comment
the Technical of end-of-pipe management technology for pollution Exhaust gasis/

## Technical purpose
氨基三甲叉磷酸是通过磷酸亚磷酸、氯化铵和甲醛的缩合反应工艺生产的，该过程适用于各种规模的化工行业。该物质可能被用作专业化学品的中间体或前体。此工艺还包含用于污染控制的尾气管理技术。特别是包括废气、氯化氢以及如甲醛和十二烷基醚硫酸钠2-[2-[2-(十二碳烷氧基)乙氧基]乙氧基]乙酯等副产品，通过水喷雾和碱吸收技术进行管理，每种污染物的去除效率报告为80%。

## Reference product
- Aminotrimethylphosphonic acid: 1000; calculated
  源文件中描述为为氨基三甲叉磷酸，此处对其进行了匹配工作，将其匹配到LCAflow库里面相最符合的流，污染物指标备注为工业废气量

## Outputs
- formaldehyde: 0.00498; calculated
  the Technical of end-of-pipe management technology for pollution formaldehydeisWater spray + lye absorption，Its Technical efficiency of end-of-pipe management80
  污染物指标甲醛的末端治理技术是水喷淋+碱液吸收，其效率为80，末端治理设施实际运行率（k值）计算公式为k=设备年耗电量年耗电量(千瓦时)/(设备运行功率(kw)*设备年运行小时数(小时))。原文件中描述污染物类别为废气，污染物指标为甲醛，此处对其进行了匹配工作，将其匹配到LCAflow库里面相最符合的流，污染物指标备注为甲醛
- sodium 2-[2-[2-(dodecyloxy)ethoxy]ethoxy]ethyl sulphate: 0.00498; calculated
  the Technical of end-of-pipe management technology for pollution sodium 2-[2-[2-(dodecyloxy)ethoxy]ethoxy]ethyl sulphateisWater spray + lye absorption，Its Technical efficiency of end-of-pipe management80
  污染物指标甲醛的末端治理技术是水喷淋+碱液吸收，其效率为80，末端治理设施实际运行率（k值）计算公式为k=设备年耗电量年耗电量(千瓦时)/(设备运行功率(kw)*设备年运行小时数(小时))。原文件中描述污染物类别为废气，污染物指标为甲醛，此处对其进行了匹配工作，将其匹配到LCAflow库里面相最符合的流，污染物指标备注为甲醛
- hydrogen chloride: 0.00566; calculated
  the Technical of end-of-pipe management technology for pollution hydrogen chlorideisWater spray + lye absorption，Its Technical efficiency of end-of-pipe management80
  污染物指标氯化氢的末端治理技术是水喷淋+碱液吸收，其效率为80，末端治理设施实际运行率（k值）计算公式为k=设备年耗电量年耗电量(千瓦时)/(设备运行功率(kw)*设备年运行小时数(小时))。原文件中描述污染物类别为废气，污染物指标为氯化氢，此处对其进行了匹配工作，将其匹配到LCAflow库里面相最符合的流，污染物指标备注为氯化氢
- Exhaust gas: 6559; calculated
  the Technical of end-of-pipe management technology for pollution Exhaust gasis/
  污染物指标工业废气量的末端治理技术是/，末端治理设施实际运行率（k值）计算公式为/。原文件中描述污染物类别为废气，污染物指标为工业废气量，此处对其进行了匹配工作，将其匹配到LCAflow库里面相最符合的流，污染物指标备注为工业废气量

## Use advice
This dataset is derived from the Pollution Source Census Report and contains information on pollution emissions and related products. However, it does not include data on energy or chemical consumption, nor does it provide information on waste or co-product generation. When utilizing this dataset, please supplement the missing data based on actual conditions before use
该数据集来源于污染源普查报告，包含污染物排放及相关产品信息，但不包含能源或化学品消耗数据，也不提供废弃物或共生产物产生信息。在使用该数据集时，请根据实际情况补充缺失数据后再使用。

## Review details
Inventory: The internal review was done by several iteration steps concerning raw data validation, raw data documentation, representativity, completeness and consistency of modelling with regard to ISO 14040 and 14044.
清单： 内部审查通过几个迭代步骤完成，涉及原始数据验证、原始数据记录、代表性、完整性、与 ISO 14040 和 14044 有关的建模的一致性。

## Data sources
- 第二次全国污染源普查产排污核算系数手册（试用版）,二级代码26,四级代码2666文件，在完整版文件中第4111页
