# Mining and in situ leaching;bastnaesite route;IAD

Dataset: ILCD process, Unit process, single operation
Geography: CN
Reference year: 2014
Classification: Energy carriers and technologies / Energetic raw materials
Functional unit: The functional unit of this study is the production of 1 kg of the basket REO from each corresponding mineralogical and processing route.
LCI method principle: Attributional
LCI method approaches: Allocation - market value
Generated by: Tao Wang, twang@iue.ac.cn
Owner: Tiangong LCI Data Working Group
Review: Dependent internal review by Tiangong LCI Data Working Group
Amounts: no units in this file; such an amount is in the reference unit of its flow, which a separate flow dataset defines
copyright: false
licenseType: Free of charge for all users and uses

## General comment
The bastnaesite route from the Seven Southern Provinces for mining and in situ leaching is used in the production of rare earth elements (REEs). This specific process is a part of the overall REE production system being studied and is crucial for the extraction of REEs, which are vital in the manufacture of high-tech devices, magnets, alloys, and various industrial and consumer products.

## Geography
Seven Southern Provinces

## Technology and included processes
In this study, the REE production system was analyzed from mining up to and including solvent extraction which contains product finishing processes such as precipitation and calcination

## Reference product
- REO: 1; article inperiodical
  LANGUAGE

## Inputs
All rows: article inperiodical
- Digger: 1.15
  excavation, hydraulic digger [allocatable product]
- Limestone: 0.005
- Ammonium sulfate: 8.25, 0.101 (2 entries)
- sulphuric acid: 0.525
- Ammonium bicarbonate: 3.35
- heat: 0.702
- Electricity: 10.5
- Land Transformation: 1.1
- water: 1
- mineral extraction site: 0.0955
- Land Transformation: 895
  to mineral extraction site
- lanthanum: 0.5305
- cerium: 0.062
- praseodymium: 0.109
- neodymium: 0.34
- samarium: 0.0885
- europium: 0.018
- gadolinium: 0.117
  Gadolinium
- gadolinium: 0.0135
  Terbium
- Dysprosium: 0.073
- Yttrium: 0.4315
- kaolinite: 0.765

## Outputs
- sulfate: 6.5; article inperiodical
- ammonia: 0.34; article inperiodical
- carbon dioxide (fossil): 0.46; article inperiodical
- aluminium: 1.88; article inperiodical

## Deviations from the LCI method approaches
In this study, the REE production system was analyzed from mining up to and including solvent extraction which contains product finishing processes such as precipitation and calcination (Fig. 1). The other categories assessed in the literature review were mineral type, radioactivity, waste treatment, and co-mining. For mineral type, it was noted that the mineralogy accounted for in each study was different, which makes comparison difficult. For radioactivity, we marked with an X those studies which exemplified radioactivity flows in the LCI (if provided). For waste, we distinguished those LCIs which quantified waste treatment flows. For co-mining, since all REE are co-products of each other, this column is meant to highlight the co-products in addition to REE.

## Use advice
When utilizing the LCA data set for REE production via the bastnaesite route, users should account for variations in mineralogy, radioactivity levels, waste treatment practices, and co-product yields as these factors may significantly influence environmental impact assessments. It may also be important to note differences in methodological approaches for comparability. The given functional unit is the production of 1 kg of the basket REO; users must ensure that this unit aligns with their study's scope and matches the intended usage to avoid discrepancies in the assessment results. Pay special attention to the inclusion or exclusion of radioactivity flows and waste treatment flows in the Life Cycle Inventory (LCI). For co-products, assess the relevance and included quantities within the scope of your study.

## Review details
Inventory: The internal review was done by several iteration steps concerning raw data validation, raw data documentation, representativity, completeness and consistency of modelling with regard to ISO 14040 and 14044.

## Data sources
- Bailey, G. et al. Review and new life cycle assessment for rare earth production from bastnäsite, ion adsorption clays and lateritic monazite. Resources, Conservation and Recycling 155, 104675 (2020).
