# Powdered detergent ; Surfactants, caustic soda, sodium sulfate, etc. ; Powder spraying process② ; All sizes; NESPS2 / 粉状洗涤剂 ; 表面活性剂、烧碱、硫酸钠等① ; 喷粉工艺② ; 所有规模 ; 全国第二次污染普查数据

Dataset: ILCD process, Unit process, single operation
Geography: CN
Reference year: 2019
Classification: Reference Parameters / Materials production / Inorganic chemicals
Generated by: The data was created by the Office of the Second National Pollution Source Census of the Ministry of Ecology and Environment, and the data was organized by the TianGong Plan team for ILCD format / 生态环境部第二次全国污染源普查工作办公室创建数据，天工计划团队常慧敏整理数据为ILCD格式
Owner: Tiangong LCI Data Working Group / 天工LCI数据工作小组
Review: Dependent internal review by Tiangong LCI Data Working Group / 天工LCI数据工作小组
Amounts: no units in this file; such an amount is in the reference unit of its flow, which a separate flow dataset defines
copyright: false
licenseType: Free of charge for all users and uses

## General comment
the Technical of end-of-pipe management technology for pollution particles (PM2.5 - PM10)isCyclone dust removal + diffusion cyclone dust removal，Its Technical efficiency of end-of-pipe management98.8

## Technical purpose
所描述的工业过程涉及通过喷粉工艺生产涉及表面活性剂、烧碱、硫酸钠等纳米级粉状洗涤剂，适用于所有规模的生产。提及的尾端治理（EOP）技术用于处理生产过程中产生的废水和废气。指定了不同配置的物理、化学和生物处理方法来管理化学需氧量（COD）、氨氮、石油相关废物、有机结合氮、总磷、颗粒物（PM2.5 - PM10）、二氧化硫、氮氧化物和挥发性有机化合物（VOCs）等污染物。这些尾端控制技术对化工行业的环境管理至关重要，尤其是在生产洗涤剂和相关化学品时。

## Reference product
- Powder Detergent: 1000; calculated
  源文件中描述为为粉状洗涤剂，此处对其进行了匹配工作，将其匹配到LCAflow库里面相最符合的流，污染物指标备注为工业废水量

## Outputs
All rows: calculated
- phosphorus, total: 3e-5
  the Technical of end-of-pipe management technology for pollution phosphorus, totalisPhysical + chemical + aerobic biological + biofilm process，Its Technical efficiency of end-of-pipe management94
  污染物指标总磷的末端治理技术是物理+化学+好氧生物+生物膜法，其效率为94，末端治理设施实际运行率（k值）计算公式为k=污水处理设施年耗电量（kwh/年）/（污水处理设施的所有耗电设备额定功率（kw）×污水处理设施年运行时间（小时/年）），①由于粉状洗涤剂生产中使用的原料品种较多，系数表单中列举了几种常用原料，实际生产时并不局限于此。②当采用富聚成型、混合搅拌等非高塔喷粉工艺制备粉状洗涤剂核算产排污量用下一个组合系数表。。原文件中描述污染物类别为废水，污染物指标为总磷，此处对其进行了匹配工作，将其匹配到LCAflow库里面相最符合的流，污染物指标备注为总磷
- phosphorus, total: 5e-5
  the Technical of end-of-pipe management technology for pollution phosphorus, totalisPhysical + chemical + anaerobic biological + aerobic biological treatment，Its Technical efficiency of end-of-pipe management90
  污染物指标总磷的末端治理技术是物理+化学+厌氧生物+好氧生物处理法，其效率为90，末端治理设施实际运行率（k值）计算公式为k=污水处理设施年耗电量（kwh/年）/（污水处理设施的所有耗电设备额定功率（kw）×污水处理设施年运行时间（小时/年）），①由于粉状洗涤剂生产中使用的原料品种较多，系数表单中列举了几种常用原料，实际生产时并不局限于此。②当采用富聚成型、混合搅拌等非高塔喷粉工艺制备粉状洗涤剂核算产排污量用下一个组合系数表。。原文件中描述污染物类别为废水，污染物指标为总磷，此处对其进行了匹配工作，将其匹配到LCAflow库里面相最符合的流，污染物指标备注为总磷
- phosphorus, total: 6.5e-5
  the Technical of end-of-pipe management technology for pollution phosphorus, totalisPhysical + chemical + aerobic biological treatment，Its Technical efficiency of end-of-pipe management87
  污染物指标总磷的末端治理技术是物理+化学+好氧生物处理法，其效率为87，末端治理设施实际运行率（k值）计算公式为k=污水处理设施年耗电量（kwh/年）/（污水处理设施的所有耗电设备额定功率（kw）×污水处理设施年运行时间（小时/年）），①由于粉状洗涤剂生产中使用的原料品种较多，系数表单中列举了几种常用原料，实际生产时并不局限于此。②当采用富聚成型、混合搅拌等非高塔喷粉工艺制备粉状洗涤剂核算产排污量用下一个组合系数表。。原文件中描述污染物类别为废水，污染物指标为总磷，此处对其进行了匹配工作，将其匹配到LCAflow库里面相最符合的流，污染物指标备注为总磷
- particles (PM2.5 - PM10): 0.138
  the Technical of end-of-pipe management technology for pollution particles (PM2.5 - PM10)isCyclone dust removal + bag filter，Its Technical efficiency of end-of-pipe management99
  污染物指标颗粒物的末端治理技术是旋风+布袋除尘，其效率为99，末端治理设施实际运行率（k值）计算公式为k=废气处理设备的年耗电量（kwh/年）/（废气处理设备的额定功率（kw）×废气处理设施年运行时间（小时/年）），①由于粉状洗涤剂生产中使用的原料品种较多，系数表单中列举了几种常用原料，实际生产时并不局限于此。②当采用富聚成型、混合搅拌等非高塔喷粉工艺制备粉状洗涤剂核算产排污量用下一个组合系数表。。原文件中描述污染物类别为废气，污染物指标为颗粒物，此处对其进行了匹配工作，将其匹配到LCAflow库里面相最符合的流，污染物类别备注为②当采用富聚成型、混合搅拌等非高塔喷粉工艺制备粉状洗涤剂核算产排污量用下一个组合系数表。，污染物指标备注为颗粒物
- particles (PM2.5 - PM10): 0.138
  the Technical of end-of-pipe management technology for pollution particles (PM2.5 - PM10)isCyclone dust removal + diffusion cyclone dust removal + wet precipitation，Its Technical efficiency of end-of-pipe management99
  污染物指标颗粒物的末端治理技术是旋风+扩散旋风+湿法除尘，其效率为99，末端治理设施实际运行率（k值）计算公式为k=废气处理设备的年耗电量（kwh/年）/（废气处理设备的额定功率（kw）×废气处理设施年运行时间（小时/年）），①由于粉状洗涤剂生产中使用的原料品种较多，系数表单中列举了几种常用原料，实际生产时并不局限于此。②当采用富聚成型、混合搅拌等非高塔喷粉工艺制备粉状洗涤剂核算产排污量用下一个组合系数表。。原文件中描述污染物类别为废气，污染物指标为颗粒物，此处对其进行了匹配工作，将其匹配到LCAflow库里面相最符合的流，污染物类别备注为②当采用富聚成型、混合搅拌等非高塔喷粉工艺制备粉状洗涤剂核算产排污量用下一个组合系数表。，污染物指标备注为颗粒物
- particles (PM2.5 - PM10): 0.1656
  the Technical of end-of-pipe management technology for pollution particles (PM2.5 - PM10)isCyclone dust removal + wet precipitation，Its Technical efficiency of end-of-pipe management98.8，The formula for calculating the actual operation rate (k-value) of the end-of-pipe treatment facility is k = annual normal operating hours of dust removal equipment (hours) / production system annual production operating hours (hours)
  污染物指标颗粒物的末端治理技术是旋风+湿法除尘，其效率为98.8，末端治理设施实际运行率（k值）计算公式为k=废气处理设备的年耗电量（kwh/年）/（废气处理设备的额定功率（kw）×废气处理设施年运行时间（小时/年）），①由于粉状洗涤剂生产中使用的原料品种较多，系数表单中列举了几种常用原料，实际生产时并不局限于此。②当采用富聚成型、混合搅拌等非高塔喷粉工艺制备粉状洗涤剂核算产排污量用下一个组合系数表。。原文件中描述污染物类别为废气，污染物指标为颗粒物，此处对其进行了匹配工作，将其匹配到LCAflow库里面相最符合的流，污染物类别备注为②当采用富聚成型、混合搅拌等非高塔喷粉工艺制备粉状洗涤剂核算产排污量用下一个组合系数表。，污染物指标备注为颗粒物
- sulfur dioxide: 0.26
  the Technical of end-of-pipe management technology for pollution sulfur dioxideisDirect discharge，The formula for calculating the actual operation rate (k-value) of the end-of-pipe treatment facility is k = annual normal operating hours of wastewater treatment equipment (hours) / annual operating hours of production system (hours)
  污染物指标二氧化硫的末端治理技术是直排，末端治理设施实际运行率（k值）计算公式为k=废气处理设备的年耗电量（kwh/年）/（废气处理设备的额定功率（kw）×废气处理设施年运行时间（小时/年）），①由于粉状洗涤剂生产中使用的原料品种较多，系数表单中列举了几种常用原料，实际生产时并不局限于此。②当采用富聚成型、混合搅拌等非高塔喷粉工艺制备粉状洗涤剂核算产排污量用下一个组合系数表。。原文件中描述污染物类别为废气，污染物指标为二氧化硫，此处对其进行了匹配工作，将其匹配到LCAflow库里面相最符合的流，污染物类别备注为②当采用富聚成型、混合搅拌等非高塔喷粉工艺制备粉状洗涤剂核算产排污量用下一个组合系数表。，污染物指标备注为二氧化硫
- Nitrogen oxides: 0.42
  the Technical of end-of-pipe management technology for pollution Nitrogen oxidesisDirect discharge，The formula for calculating the actual operation rate (k-value) of the end-of-pipe treatment facility is k = annual normal operating hours of wastewater treatment equipment (hours) / annual operating hours of production system (hours)
  污染物指标氮氧化物的末端治理技术是直排，末端治理设施实际运行率（k值）计算公式为k=废气处理设备的年耗电量（kwh/年）/（废气处理设备的额定功率（kw）×废气处理设施年运行时间（小时/年）），①由于粉状洗涤剂生产中使用的原料品种较多，系数表单中列举了几种常用原料，实际生产时并不局限于此。②当采用富聚成型、混合搅拌等非高塔喷粉工艺制备粉状洗涤剂核算产排污量用下一个组合系数表。。原文件中描述污染物类别为废气，污染物指标为氮氧化物，此处对其进行了匹配工作，将其匹配到LCAflow库里面相最符合的流，污染物类别备注为②当采用富聚成型、混合搅拌等非高塔喷粉工艺制备粉状洗涤剂核算产排污量用下一个组合系数表。，污染物指标备注为氮氧化物
- Waste water: 600
  the Technical of end-of-pipe management technology for pollution Waste wateris/，The formula for calculating the actual operation rate (k-value) of the end-of-pipe treatment facility is k = power consumption of equipment (kWh) / (equipment rated power (kW) × equipment operating time (hours))
  污染物指标工业废水量的末端治理技术是/，末端治理设施实际运行率（k值）计算公式为/，①由于粉状洗涤剂生产中使用的原料品种较多，系数表单中列举了几种常用原料，实际生产时并不局限于此。②当采用富聚成型、混合搅拌等非高塔喷粉工艺制备粉状洗涤剂核算产排污量用下一个组合系数表。。原文件中描述污染物类别为废水，污染物指标为工业废水量，此处对其进行了匹配工作，将其匹配到LCAflow库里面相最符合的流，污染物指标备注为工业废水量
- Ammonia Nitrogen: 0.00111
  the Technical of end-of-pipe management technology for pollution Ammonia NitrogenisPhysical + chemical + aerobic biological + biofilm process，Its Technical efficiency of end-of-pipe management85
  污染物指标氨氮的末端治理技术是物理+化学+好氧生物+生物膜法，其效率为85，末端治理设施实际运行率（k值）计算公式为k=污水处理设施年耗电量（kwh/年）/（污水处理设施的所有耗电设备额定功率（kw）×污水处理设施年运行时间（小时/年）），①由于粉状洗涤剂生产中使用的原料品种较多，系数表单中列举了几种常用原料，实际生产时并不局限于此。②当采用富聚成型、混合搅拌等非高塔喷粉工艺制备粉状洗涤剂核算产排污量用下一个组合系数表。。原文件中描述污染物类别为废水，污染物指标为氨氮，此处对其进行了匹配工作，将其匹配到LCAflow库里面相最符合的流，污染物指标备注为氨氮
- Petroleum-related waste: 0.0012
  the Technical of end-of-pipe management technology for pollution Petroleum-related wasteisPhysical + chemical + aerobic biological + biofilm process，Its Technical efficiency of end-of-pipe management92
  污染物指标石油类的末端治理技术是物理+化学+好氧生物+生物膜法，其效率为92，末端治理设施实际运行率（k值）计算公式为k=污水处理设施年耗电量（kwh/年）/（污水处理设施的所有耗电设备额定功率（kw）×污水处理设施年运行时间（小时/年）），①由于粉状洗涤剂生产中使用的原料品种较多，系数表单中列举了几种常用原料，实际生产时并不局限于此。②当采用富聚成型、混合搅拌等非高塔喷粉工艺制备粉状洗涤剂核算产排污量用下一个组合系数表。。原文件中描述污染物类别为废水，污染物指标为石油类，此处对其进行了匹配工作，将其匹配到LCAflow库里面相最符合的流，污染物指标备注为石油类
- Nitrogen, organic bound: 0.001328
  the Technical of end-of-pipe management technology for pollution Nitrogen, organic boundisPhysical + chemical + aerobic biological + biofilm process，Its Technical efficiency of end-of-pipe management84，The formula for calculating the actual operation rate (k-value) of the end-of-pipe treatment facility is k = annual normal operating hours of wastewater treatment equipment (hours) / annual operating hours of production system (hours)
  污染物指标总氮的末端治理技术是物理+化学+好氧生物+生物膜法，其效率为84，末端治理设施实际运行率（k值）计算公式为k=污水处理设施年耗电量（kwh/年）/（污水处理设施的所有耗电设备额定功率（kw）×污水处理设施年运行时间（小时/年）），①由于粉状洗涤剂生产中使用的原料品种较多，系数表单中列举了几种常用原料，实际生产时并不局限于此。②当采用富聚成型、混合搅拌等非高塔喷粉工艺制备粉状洗涤剂核算产排污量用下一个组合系数表。。原文件中描述污染物类别为废水，污染物指标为总氮，此处对其进行了匹配工作，将其匹配到LCAflow库里面相最符合的流，污染物指标备注为总氮
- Ammonia Nitrogen: 0.002146
  the Technical of end-of-pipe management technology for pollution Ammonia NitrogenisPhysical + chemical + anaerobic biological + aerobic biological treatment，Its Technical efficiency of end-of-pipe management71，The formula for calculating the actual operation rate (k-value) of the end-of-pipe treatment facility is k = annual power consumption of equipment (kWh) / (equipment power (kW) × annual operating hours (hours))
  污染物指标氨氮的末端治理技术是物理+化学+厌氧生物+好氧生物处理法，其效率为71，末端治理设施实际运行率（k值）计算公式为k=污水处理设施年耗电量（kwh/年）/（污水处理设施的所有耗电设备额定功率（kw）×污水处理设施年运行时间（小时/年）），①由于粉状洗涤剂生产中使用的原料品种较多，系数表单中列举了几种常用原料，实际生产时并不局限于此。②当采用富聚成型、混合搅拌等非高塔喷粉工艺制备粉状洗涤剂核算产排污量用下一个组合系数表。。原文件中描述污染物类别为废水，污染物指标为氨氮，此处对其进行了匹配工作，将其匹配到LCAflow库里面相最符合的流，污染物指标备注为氨氮
- Nitrogen, organic bound: 0.002241
  the Technical of end-of-pipe management technology for pollution Nitrogen, organic boundisPhysical + chemical + anaerobic biological + aerobic biological treatment，Its Technical efficiency of end-of-pipe management73，The formula for calculating the actual operation rate (k-value) of the end-of-pipe treatment facility is k = annual normal operating hours of wastewater treatment equipment (hours) / annual operating hours of production system (hours)
  污染物指标总氮的末端治理技术是物理+化学+厌氧生物+好氧生物处理法，其效率为73，末端治理设施实际运行率（k值）计算公式为k=污水处理设施年耗电量（kwh/年）/（污水处理设施的所有耗电设备额定功率（kw）×污水处理设施年运行时间（小时/年）），①由于粉状洗涤剂生产中使用的原料品种较多，系数表单中列举了几种常用原料，实际生产时并不局限于此。②当采用富聚成型、混合搅拌等非高塔喷粉工艺制备粉状洗涤剂核算产排污量用下一个组合系数表。。原文件中描述污染物类别为废水，污染物指标为总氮，此处对其进行了匹配工作，将其匹配到LCAflow库里面相最符合的流，污染物指标备注为总氮
- Petroleum-related waste: 0.00225
  the Technical of end-of-pipe management technology for pollution Petroleum-related wasteisPhysical + chemical + anaerobic biological + aerobic biological treatment，Its Technical efficiency of end-of-pipe management85，The formula for calculating the actual operation rate (k-value) of the end-of-pipe treatment facility is k = annual power consumption of equipment (kWh) / (equipment power (kW) × annual operating hours (hours))
  污染物指标石油类的末端治理技术是物理+化学+厌氧生物+好氧生物处理法，其效率为85，末端治理设施实际运行率（k值）计算公式为k=污水处理设施年耗电量（kwh/年）/（污水处理设施的所有耗电设备额定功率（kw）×污水处理设施年运行时间（小时/年）），①由于粉状洗涤剂生产中使用的原料品种较多，系数表单中列举了几种常用原料，实际生产时并不局限于此。②当采用富聚成型、混合搅拌等非高塔喷粉工艺制备粉状洗涤剂核算产排污量用下一个组合系数表。。原文件中描述污染物类别为废水，污染物指标为石油类，此处对其进行了匹配工作，将其匹配到LCAflow库里面相最符合的流，污染物指标备注为石油类
- Ammonia Nitrogen: 0.002368
  the Technical of end-of-pipe management technology for pollution Ammonia NitrogenisPhysical + chemical + aerobic biological treatment，Its Technical efficiency of end-of-pipe management68，The formula for calculating the actual operation rate (k-value) of the end-of-pipe treatment facility is k = annual power consumption of equipment (kWh) / (equipment power (kW) × annual operating hours (hours))
  污染物指标氨氮的末端治理技术是物理+化学+好氧生物处理法，其效率为68，末端治理设施实际运行率（k值）计算公式为k=污水处理设施年耗电量（kwh/年）/（污水处理设施的所有耗电设备额定功率（kw）×污水处理设施年运行时间（小时/年）），①由于粉状洗涤剂生产中使用的原料品种较多，系数表单中列举了几种常用原料，实际生产时并不局限于此。②当采用富聚成型、混合搅拌等非高塔喷粉工艺制备粉状洗涤剂核算产排污量用下一个组合系数表。。原文件中描述污染物类别为废水，污染物指标为氨氮，此处对其进行了匹配工作，将其匹配到LCAflow库里面相最符合的流，污染物指标备注为氨氮
- Nitrogen, organic bound: 0.00249
  the Technical of end-of-pipe management technology for pollution Nitrogen, organic boundisPhysical + chemical + aerobic biological treatment，Its Technical efficiency of end-of-pipe management70，The formula for calculating the actual operation rate (k-value) of the end-of-pipe treatment facility is k = annual normal operating hours of wastewater treatment equipment (hours) / annual operating hours of production system (hours)
  污染物指标总氮的末端治理技术是物理+化学+好氧生物处理法，其效率为70，末端治理设施实际运行率（k值）计算公式为k=污水处理设施年耗电量（kwh/年）/（污水处理设施的所有耗电设备额定功率（kw）×污水处理设施年运行时间（小时/年）），①由于粉状洗涤剂生产中使用的原料品种较多，系数表单中列举了几种常用原料，实际生产时并不局限于此。②当采用富聚成型、混合搅拌等非高塔喷粉工艺制备粉状洗涤剂核算产排污量用下一个组合系数表。。原文件中描述污染物类别为废水，污染物指标为总氮，此处对其进行了匹配工作，将其匹配到LCAflow库里面相最符合的流，污染物指标备注为总氮
- Petroleum-related waste: 0.0045
  the Technical of end-of-pipe management technology for pollution Petroleum-related wasteisPhysical + chemical + aerobic biological treatment，Its Technical efficiency of end-of-pipe management70
  污染物指标石油类的末端治理技术是物理+化学+好氧生物处理法，其效率为70，末端治理设施实际运行率（k值）计算公式为k=污水处理设施年耗电量（kwh/年）/（污水处理设施的所有耗电设备额定功率（kw）×污水处理设施年运行时间（小时/年）），①由于粉状洗涤剂生产中使用的原料品种较多，系数表单中列举了几种常用原料，实际生产时并不局限于此。②当采用富聚成型、混合搅拌等非高塔喷粉工艺制备粉状洗涤剂核算产排污量用下一个组合系数表。。原文件中描述污染物类别为废水，污染物指标为石油类，此处对其进行了匹配工作，将其匹配到LCAflow库里面相最符合的流，污染物指标备注为石油类
- chemical oxygen demand: 0.01582
  the Technical of end-of-pipe management technology for pollution chemical oxygen demandisPhysical + chemical + aerobic biological + biofilm process，Its Technical efficiency of end-of-pipe management93
  污染物指标化学需氧量的末端治理技术是物理+化学+好氧生物+生物膜法，其效率为93，末端治理设施实际运行率（k值）计算公式为k=污水处理设施年耗电量（kwh/年）/（污水处理设施的所有耗电设备额定功率（kw）×污水处理设施年运行时间（小时/年）），①由于粉状洗涤剂生产中使用的原料品种较多，系数表单中列举了几种常用原料，实际生产时并不局限于此。②当采用富聚成型、混合搅拌等非高塔喷粉工艺制备粉状洗涤剂核算产排污量用下一个组合系数表。。原文件中描述污染物类别为废水，污染物指标为化学需氧量，此处对其进行了匹配工作，将其匹配到LCAflow库里面相最符合的流，污染物指标备注为化学需氧量
- volatile organic compound: 0.016
  the Technical of end-of-pipe management technology for pollution volatile organic compoundisDirect discharge，The formula for calculating the actual operation rate (k-value) of the end-of-pipe treatment facility is k = annual normal operating hours of wastewater treatment equipment (hours) / annual operating hours of production system (hours)
  污染物指标挥发性有机物的末端治理技术是直排，末端治理设施实际运行率（k值）计算公式为/，①由于粉状洗涤剂生产中使用的原料品种较多，系数表单中列举了几种常用原料，实际生产时并不局限于此。②当采用富聚成型、混合搅拌等非高塔喷粉工艺制备粉状洗涤剂核算产排污量用下一个组合系数表。。原文件中描述污染物类别为废气，污染物指标为挥发性有机物，此处对其进行了匹配工作，将其匹配到LCAflow库里面相最符合的流，污染物指标备注为挥发性有机物
- chemical oxygen demand: 0.0339
  the Technical of end-of-pipe management technology for pollution chemical oxygen demandisPhysical + chemical + anaerobic biological + aerobic biological treatment，Its Technical efficiency of end-of-pipe management85
  污染物指标化学需氧量的末端治理技术是物理+化学+厌氧生物+好氧生物处理法，其效率为85，末端治理设施实际运行率（k值）计算公式为k=污水处理设施年耗电量（kwh/年）/（污水处理设施的所有耗电设备额定功率（kw）×污水处理设施年运行时间（小时/年）），①由于粉状洗涤剂生产中使用的原料品种较多，系数表单中列举了几种常用原料，实际生产时并不局限于此。②当采用富聚成型、混合搅拌等非高塔喷粉工艺制备粉状洗涤剂核算产排污量用下一个组合系数表。。原文件中描述污染物类别为废水，污染物指标为化学需氧量，此处对其进行了匹配工作，将其匹配到LCAflow库里面相最符合的流，污染物指标备注为化学需氧量
- chemical oxygen demand: 0.0452
  the Technical of end-of-pipe management technology for pollution chemical oxygen demandisPhysical + chemical + aerobic biological treatment，Its Technical efficiency of end-of-pipe management80
  污染物指标化学需氧量的末端治理技术是物理+化学+好氧生物处理法，其效率为80，末端治理设施实际运行率（k值）计算公式为k=污水处理设施年耗电量（kwh/年）/（污水处理设施的所有耗电设备额定功率（kw）×污水处理设施年运行时间（小时/年）），①由于粉状洗涤剂生产中使用的原料品种较多，系数表单中列举了几种常用原料，实际生产时并不局限于此。②当采用富聚成型、混合搅拌等非高塔喷粉工艺制备粉状洗涤剂核算产排污量用下一个组合系数表。。原文件中描述污染物类别为废水，污染物指标为化学需氧量，此处对其进行了匹配工作，将其匹配到LCAflow库里面相最符合的流，污染物指标备注为化学需氧量
- Exhaust gas: 5400
  the Technical of end-of-pipe management technology for pollution Exhaust gasis/
  污染物指标工业废气量的末端治理技术是/，末端治理设施实际运行率（k值）计算公式为/，①由于粉状洗涤剂生产中使用的原料品种较多，系数表单中列举了几种常用原料，实际生产时并不局限于此。②当采用富聚成型、混合搅拌等非高塔喷粉工艺制备粉状洗涤剂核算产排污量用下一个组合系数表。。原文件中描述污染物类别为废气，污染物指标为工业废气量，此处对其进行了匹配工作，将其匹配到LCAflow库里面相最符合的流，污染物类别备注为②当采用富聚成型、混合搅拌等非高塔喷粉工艺制备粉状洗涤剂核算产排污量用下一个组合系数表。，污染物指标备注为工业废气量
- particles (PM2.5 - PM10): 0
  the Technical of end-of-pipe management technology for pollution particles (PM2.5 - PM10)isCyclone dust removal + diffusion cyclone dust removal，Its Technical efficiency of end-of-pipe management98.8.The original article describes the pollution production coefficients as 。Please revise the corresponding emissions after accounting for them according to the notes.。.The original article describes the pollution production coefficients as . Please revise the corresponding emissions after accounting for them according to the notes.
  污染物指标颗粒物的末端治理技术是旋风+扩散旋风除尘，其效率为98.8，末端治理设施实际运行率（k值）计算公式为k=废气处理设备的年耗电量（kwh/年）/（废气处理设备的额定功率（kw）×废气处理设施年运行时间（小时/年）），①由于粉状洗涤剂生产中使用的原料品种较多，系数表单中列举了几种常用原料，实际生产时并不局限于此。②当采用富聚成型、混合搅拌等非高塔喷粉工艺制备粉状洗涤剂核算产排污量用下一个组合系数表。。原文件中描述污染物类别为废气，污染物指标为颗粒物，此处对其进行了匹配工作，将其匹配到LCAflow库里面相最符合的流，污染物类别备注为②当采用富聚成型、混合搅拌等非高塔喷粉工艺制备粉状洗涤剂核算产排污量用下一个组合系数表。，污染物指标备注为颗粒物原文描述的产污系数为 。请根据备注自行核算后修改对应的排放量。

## Use advice
This dataset is derived from the Pollution Source Census Report and contains information on pollution emissions and related products. However, it does not include data on energy or chemical consumption, nor does it provide information on waste or co-product generation. When utilizing this dataset, please supplement the missing data based on actual conditions before use
该数据集来源于污染源普查报告，包含污染物排放及相关产品信息，但不包含能源或化学品消耗数据，也不提供废弃物或共生产物产生信息。在使用该数据集时，请根据实际情况补充缺失数据后再使用。

## Review details
Inventory: The internal review was done by several iteration steps concerning raw data validation, raw data documentation, representativity, completeness and consistency of modelling with regard to ISO 14040 and 14044.
清单： 内部审查通过几个迭代步骤完成，涉及原始数据验证、原始数据记录、代表性、完整性、与 ISO 14040 和 14044 有关的建模的一致性。

## Data sources
- 第二次全国污染源普查产排污核算系数手册（试用版）,二级代码26,四级代码2681文件，在完整版文件中第3001页
