# Production Stage

Dataset: ILCD process
Geography: SC-CN
Classification: Materials production / Other mineralic materials
Generated by: Pu Hong, 15695258655@163.com
Review: Dependent internal review by Tiangong LCI Data Working Group
Amounts: no units in this file; such an amount is in the reference unit of its flow, which a separate flow dataset defines

## Geography
China's shale gas extraction work is currently concentrated in the Sichuan and Chongqing areas, and the data from Sichuan and Chongqing are selected for LCA calculations.

## Inputs
- Diesel: 1189; min 1479; max 906; uniform; article inperiodical
  transport wastewater

## Outputs
- waste water - untreated: 268000; min 268000; max 205000; uniform; article inperiodical
  Wastewater generated during the production phase of the entire life cycle
- methane: 72018.8; min 89569.6; max 55073.2; article inperiodical
  The leakage rate during Sichuan shale gas production is 0.089% according to literature.

## Review details
Inventory: The internal review was done by several iteration steps concerning raw data validation, raw data documentation, representativity, completeness and consistency of modelling with regard to ISO 14040 and 14044.

## Data sources
- 李琋, 毛红敏 & 王兵. 涪陵页岩气开发生命周期温室气体排放估算. 油气田环境保护 31, 1–7 (2021).
