# Greenhouse tomato production

Dataset: ILCD process, Unit process, black box
Geography: NL
Reference year: 2014
Valid until: 2015
Classification: Unit processes / Materials production / Agricultural production means
Functional unit: One ton of tomatoes
Generated by: zhu xian, zzhu0918@163.com
Owner: Tiangong LCI Data Working Group
Review: Dependent internal review by Tiangong LCI Data Working Group
Amounts: no units in this file; such an amount is in the reference unit of its flow, which a separate flow dataset defines
copyright: false
licenseType: Free of charge for all users and uses

## General comment
irrigation, fertilization, pesticide application, and pruning during the growth stage; Harvest fruits after ripening

## Geography
Desertjoy is a Tunisian-Dutch farm located in Chenchou, about 24 km to the South-West of Gabes

## Time period
The production cycle of this tomato variety is from September 2014 to June 2015

## Technical purpose
The greenhouse tomato production process described is utilized for cultivating tomatoes in controlled environmental conditions. The tomatoes are suitable for fresh consumption and can also be further processed into products such as sauces, juices, or canned goods. The infrastructure is specifically designed for consistent production despite external climatic variations, facilitating year-round availability of tomatoes.

## Reference product
- Tomato: 39; measured

## Inputs
All rows: measured
- Nitrogenous fertilizer: 48.085
- Potassium fertilizer: 7.61399
- Pesticide: 1.654
- Electricity: 2995.2
- Pit Methane (in MJ): 220
- Plastic (unspecified): 2.2

## Outputs
- ammonia: 0.105; measured
- Plastic (unspecified): 0.4; measured
- nitrogen dioxide: 0.119; measured

## Use advice
When utilizing this LCA data, ensure to consider the specific greenhouse cultivation techniques including irrigation, fertilization, pesticide application, and pruning. Account for the regional specificity of the process located in Chenchou, near Gabes, which may influence yields and environmental impacts. The production cycle timeframe from September 2014 to June 2015 should be noted for temporal relevance. Extrapolation beyond this period requires careful consideration of changes in agricultural practices or technological advancements. The data is representative for one ton of harvested tomatoes and can be scaled accordingly for larger production volumes.

## Review details
Inventory: The internal review was done by several iteration steps concerning raw data validation, raw data documentation, representativity, completeness and consistency of modelling with regard to ISO 14040 and 14044.
