# Polyvinyl Chloride ; Calcium carbide, hydrogen chloride ; Electric stone method ; All sizes; NESPS2 / 聚氯乙烯 ; 电石、氯化氢 ; 电石法 ; 所有规模 ; 全国第二次污染普查数据

Dataset: ILCD process, Unit process, single operation
Geography: CN
Reference year: 2019
Classification: Reference Parameters / Materials production / Inorganic chemicals
Generated by: The data was created by the Office of the Second National Pollution Source Census of the Ministry of Ecology and Environment, and the data was organized by the TianGong Plan team for ILCD format / 生态环境部第二次全国污染源普查工作办公室创建数据，天工计划团队常慧敏整理数据为ILCD格式
Owner: Tiangong LCI Data Working Group / 天工LCI数据工作小组
Review: Dependent internal review by Tiangong LCI Data Working Group / 天工LCI数据工作小组
Amounts: no units in this file; such an amount is in the reference unit of its flow, which a separate flow dataset defines
copyright: false
licenseType: Free of charge for all users and uses

## General comment
the Technical of end-of-pipe management technology for pollution Exhaust gasis/，Its Technical efficiency of end-of-pipe management0

## Technical purpose
所描述的电石法生产聚氯乙烯（PVC）工艺，使用电石和氯化氢且适用于所有规模的操作。所产生的PVC可以用于建筑、包装、医疗设备和消费品中发现的各种塑料产品。该过程涉及尾水治理技术，以处理废水、化学需氧量、氨氮、总磷、有机结合氮、石油相关废物、汞、废气、颗粒物（PM2.5 - PM10）和挥发性有机化合物（VOCs），具体技术效率根据使用的具体技术而异，如A2/O过程、活性污泥法、厌氧水解、生物接触氧化过程、化学沉淀等方法，旨在减少工业活动中的环境排放。

## Reference product
- Polyvinyl chloride: 1000; calculated
  源文件中描述为为聚氯乙烯，此处对其进行了匹配工作，将其匹配到LCAflow库里面相最符合的流，污染物指标备注为废水排放量

## Outputs
All rows: calculated
- particles (PM2.5 - PM10): 0.3395
  the Technical of end-of-pipe management technology for pollution particles (PM2.5 - PM10)isBag filter，Its Technical efficiency of end-of-pipe management95
  污染物指标颗粒物的末端治理技术是袋式除尘，其效率为95，末端治理设施实际运行率（k值）计算公式为K=设施年耗电量(千瓦时/年)/设备设计耗电量(千瓦时/年)。原文件中描述污染物类别为废气，污染物指标为颗粒物，此处对其进行了匹配工作，将其匹配到LCAflow库里面相最符合的流，污染物指标备注为颗粒物
- particles (PM2.5 - PM10): 0.3395
  the Technical of end-of-pipe management technology for pollution particles (PM2.5 - PM10)isCyclone dust removal + bag filter，Its Technical efficiency of end-of-pipe management95
  污染物指标颗粒物的末端治理技术是旋风+布袋，其效率为95，末端治理设施实际运行率（k值）计算公式为K=设施年耗电量(千瓦时/年)/设备设计耗电量(千瓦时/年)。原文件中描述污染物类别为废气，污染物指标为颗粒物，此处对其进行了匹配工作，将其匹配到LCAflow库里面相最符合的流，污染物指标备注为颗粒物
- particles (PM2.5 - PM10): 0.3395
  the Technical of end-of-pipe management technology for pollution particles (PM2.5 - PM10)isElectrostatic precipitation，Its Technical efficiency of end-of-pipe management95
  污染物指标颗粒物的末端治理技术是静电除尘，其效率为95，末端治理设施实际运行率（k值）计算公式为K=设施年耗电量(千瓦时/年)/设备设计耗电量(千瓦时/年)。原文件中描述污染物类别为废气，污染物指标为颗粒物，此处对其进行了匹配工作，将其匹配到LCAflow库里面相最符合的流，污染物指标备注为颗粒物
- phosphorus, total: 0.000552
  the Technical of end-of-pipe management technology for pollution phosphorus, totalisChemical coagulation，Its Technical efficiency of end-of-pipe management70
  污染物指标总磷的末端治理技术是化学混凝法，其效率为70，末端治理设施实际运行率（k值）计算公式为K=设施年耗电量(千瓦时/年)/设备设计耗电量(千瓦时/年)。原文件中描述污染物类别为废水，污染物指标为总磷，此处对其进行了匹配工作，将其匹配到LCAflow库里面相最符合的流，污染物指标备注为总磷
- phosphorus, total: 0.000552
  the Technical of end-of-pipe management technology for pollution phosphorus, totalisChemical precipitation，Its Technical efficiency of end-of-pipe management70
  污染物指标总磷的末端治理技术是化学沉淀法，其效率为70，末端治理设施实际运行率（k值）计算公式为K=设施年耗电量(千瓦时/年)/设备设计耗电量(千瓦时/年)。原文件中描述污染物类别为废水，污染物指标为总磷，此处对其进行了匹配工作，将其匹配到LCAflow库里面相最符合的流，污染物指标备注为总磷
- Petroleum-related waste: 0.000558
  the Technical of end-of-pipe management technology for pollution Petroleum-related wasteisFloating separation，Its Technical efficiency of end-of-pipe management70
  污染物指标石油类的末端治理技术是上浮分离，其效率为70，末端治理设施实际运行率（k值）计算公式为K=设施年耗电量(千瓦时/年)/设备设计耗电量(千瓦时/年)。原文件中描述污染物类别为废水，污染物指标为石油类，此处对其进行了匹配工作，将其匹配到LCAflow库里面相最符合的流，污染物指标备注为石油类
- phosphorus, total: 0.001104
  the Technical of end-of-pipe management technology for pollution phosphorus, totalisA2/O process，Its Technical efficiency of end-of-pipe management40
  污染物指标总磷的末端治理技术是A2/O工艺，其效率为40，末端治理设施实际运行率（k值）计算公式为K=设施年耗电量(千瓦时/年)/设备设计耗电量(千瓦时/年)。原文件中描述污染物类别为废水，污染物指标为总磷，此处对其进行了匹配工作，将其匹配到LCAflow库里面相最符合的流，污染物指标备注为总磷
- phosphorus, total: 0.001196
  the Technical of end-of-pipe management technology for pollution phosphorus, totalisAnaerobic hydrolysis，Its Technical efficiency of end-of-pipe management35
  污染物指标总磷的末端治理技术是厌氧水解类，其效率为35，末端治理设施实际运行率（k值）计算公式为K=设施年耗电量(千瓦时/年)/设备设计耗电量(千瓦时/年)。原文件中描述污染物类别为废水，污染物指标为总磷，此处对其进行了匹配工作，将其匹配到LCAflow库里面相最符合的流，污染物指标备注为总磷
- phosphorus, total: 0.001196
  the Technical of end-of-pipe management technology for pollution phosphorus, totalisBio-contact oxidation process，Its Technical efficiency of end-of-pipe management35
  污染物指标总磷的末端治理技术是生物接触氧化法，其效率为35，末端治理设施实际运行率（k值）计算公式为K=设施年耗电量(千瓦时/年)/设备设计耗电量(千瓦时/年)。原文件中描述污染物类别为废水，污染物指标为总磷，此处对其进行了匹配工作，将其匹配到LCAflow库里面相最符合的流，污染物指标备注为总磷
- volatile organic compound: 1.2765
  the Technical of end-of-pipe management technology for pollution volatile organic compoundisDirect combustion，Its Technical efficiency of end-of-pipe management85
  污染物指标挥发性有机物的末端治理技术是直接燃烧法，其效率为85，末端治理设施实际运行率（k值）计算公式为K=设施年耗电量(千瓦时/年)/设备设计耗电量(千瓦时/年)。原文件中描述污染物类别为废气，污染物指标为挥发性有机物，此处对其进行了匹配工作，将其匹配到LCAflow库里面相最符合的流，污染物指标备注为挥发性有机物
- volatile organic compound: 1.2765
  the Technical of end-of-pipe management technology for pollution volatile organic compoundisRegenerative thermal combustion method，Its Technical efficiency of end-of-pipe management85
  污染物指标挥发性有机物的末端治理技术是蓄热式热力燃烧法，其效率为85，末端治理设施实际运行率（k值）计算公式为K=设施年耗电量(千瓦时/年)/设备设计耗电量(千瓦时/年)。原文件中描述污染物类别为废气，污染物指标为挥发性有机物，此处对其进行了匹配工作，将其匹配到LCAflow库里面相最符合的流，污染物指标备注为挥发性有机物
- volatile organic compound: 3.404
  the Technical of end-of-pipe management technology for pollution volatile organic compoundisAdsorption/catalytic combustion method，Its Technical efficiency of end-of-pipe management60
  污染物指标挥发性有机物的末端治理技术是吸附/催化燃烧法，其效率为60，末端治理设施实际运行率（k值）计算公式为K=设施年耗电量(千瓦时/年)/设备设计耗电量(千瓦时/年)。原文件中描述污染物类别为废气，污染物指标为挥发性有机物，此处对其进行了匹配工作，将其匹配到LCAflow库里面相最符合的流，污染物指标备注为挥发性有机物
- volatile organic compound: 3.404
  the Technical of end-of-pipe management technology for pollution volatile organic compoundisCondensation，Its Technical efficiency of end-of-pipe management60
  污染物指标挥发性有机物的末端治理技术是冷凝法，其效率为60，末端治理设施实际运行率（k值）计算公式为K=设施年耗电量(千瓦时/年)/设备设计耗电量(千瓦时/年)。原文件中描述污染物类别为废气，污染物指标为挥发性有机物，此处对其进行了匹配工作，将其匹配到LCAflow库里面相最符合的流，污染物指标备注为挥发性有机物
- volatile organic compound: 5.957
  the Technical of end-of-pipe management technology for pollution volatile organic compoundisLow temperature plasma，Its Technical efficiency of end-of-pipe management30
  污染物指标挥发性有机物的末端治理技术是低温等离子体，其效率为30，末端治理设施实际运行率（k值）计算公式为K=设施年耗电量(千瓦时/年)/设备设计耗电量(千瓦时/年)。原文件中描述污染物类别为废气，污染物指标为挥发性有机物，此处对其进行了匹配工作，将其匹配到LCAflow库里面相最符合的流，污染物指标备注为挥发性有机物
- Waste water: 19100
  the Technical of end-of-pipe management technology for pollution Waste wateris/，Its Technical efficiency of end-of-pipe management0
  污染物指标废水排放量的末端治理技术是/，其效率为0。原文件中描述污染物类别为废水，污染物指标为废水排放量，此处对其进行了匹配工作，将其匹配到LCAflow库里面相最符合的流，污染物指标备注为废水排放量
- Ammonia Nitrogen: 0.05025
  the Technical of end-of-pipe management technology for pollution Ammonia NitrogenisBio-contact oxidation process，Its Technical efficiency of end-of-pipe management75
  污染物指标氨氮的末端治理技术是生物接触氧化法，其效率为75，末端治理设施实际运行率（k值）计算公式为K=设施年耗电量(千瓦时/年)/设备设计耗电量(千瓦时/年)。原文件中描述污染物类别为废水，污染物指标为氨氮，此处对其进行了匹配工作，将其匹配到LCAflow库里面相最符合的流，污染物指标备注为氨氮
- Ammonia Nitrogen: 0.0603
  the Technical of end-of-pipe management technology for pollution Ammonia NitrogenisA2/O process，Its Technical efficiency of end-of-pipe management70
  污染物指标氨氮的末端治理技术是A2/O工艺，其效率为70，末端治理设施实际运行率（k值）计算公式为K=设施年耗电量(千瓦时/年)/设备设计耗电量(千瓦时/年)。原文件中描述污染物类别为废水，污染物指标为氨氮，此处对其进行了匹配工作，将其匹配到LCAflow库里面相最符合的流，污染物指标备注为氨氮
- Ammonia Nitrogen: 0.0603
  the Technical of end-of-pipe management technology for pollution Ammonia NitrogenisAnaerobic hydrolysis，Its Technical efficiency of end-of-pipe management70
  污染物指标氨氮的末端治理技术是厌氧水解类，其效率为70，末端治理设施实际运行率（k值）计算公式为K=设施年耗电量(千瓦时/年)/设备设计耗电量(千瓦时/年)。原文件中描述污染物类别为废水，污染物指标为氨氮，此处对其进行了匹配工作，将其匹配到LCAflow库里面相最符合的流，污染物指标备注为氨氮
- Ammonia Nitrogen: 0.0804
  the Technical of end-of-pipe management technology for pollution Ammonia NitrogenisActivated sludge process，Its Technical efficiency of end-of-pipe management60
  污染物指标氨氮的末端治理技术是活性污泥法，其效率为60，末端治理设施实际运行率（k值）计算公式为K=设施年耗电量(千瓦时/年)/设备设计耗电量(千瓦时/年)。原文件中描述污染物类别为废水，污染物指标为氨氮，此处对其进行了匹配工作，将其匹配到LCAflow库里面相最符合的流，污染物指标备注为氨氮
- Nitrogen, organic bound: 0.08875
  the Technical of end-of-pipe management technology for pollution Nitrogen, organic boundisBio-contact oxidation process，Its Technical efficiency of end-of-pipe management75
  污染物指标总氮的末端治理技术是生物接触氧化法，其效率为75，末端治理设施实际运行率（k值）计算公式为K=设施年耗电量(千瓦时/年)/设备设计耗电量(千瓦时/年)。原文件中描述污染物类别为废水，污染物指标为总氮，此处对其进行了匹配工作，将其匹配到LCAflow库里面相最符合的流，污染物指标备注为总氮
- Nitrogen, organic bound: 0.1065
  the Technical of end-of-pipe management technology for pollution Nitrogen, organic boundisA2/O process，Its Technical efficiency of end-of-pipe management70
  污染物指标总氮的末端治理技术是A2/O工艺，其效率为70，末端治理设施实际运行率（k值）计算公式为K=设施年耗电量(千瓦时/年)/设备设计耗电量(千瓦时/年)。原文件中描述污染物类别为废水，污染物指标为总氮，此处对其进行了匹配工作，将其匹配到LCAflow库里面相最符合的流，污染物指标备注为总氮
- Nitrogen, organic bound: 0.1065
  the Technical of end-of-pipe management technology for pollution Nitrogen, organic boundisAnaerobic hydrolysis，Its Technical efficiency of end-of-pipe management70
  污染物指标总氮的末端治理技术是厌氧水解类，其效率为70，末端治理设施实际运行率（k值）计算公式为K=设施年耗电量(千瓦时/年)/设备设计耗电量(千瓦时/年)。原文件中描述污染物类别为废水，污染物指标为总氮，此处对其进行了匹配工作，将其匹配到LCAflow库里面相最符合的流，污染物指标备注为总氮
- Nitrogen, organic bound: 0.142
  the Technical of end-of-pipe management technology for pollution Nitrogen, organic boundisActivated sludge process，Its Technical efficiency of end-of-pipe management60
  污染物指标总氮的末端治理技术是活性污泥法，其效率为60，末端治理设施实际运行率（k值）计算公式为K=设施年耗电量(千瓦时/年)/设备设计耗电量(千瓦时/年)。原文件中描述污染物类别为废水，污染物指标为总氮，此处对其进行了匹配工作，将其匹配到LCAflow库里面相最符合的流，污染物指标备注为总氮
- Mercury: 0.0002825
  the Technical of end-of-pipe management technology for pollution MercuryisChemical coagulation，Its Technical efficiency of end-of-pipe management75
  污染物指标汞的末端治理技术是化学混凝法，其效率为75，末端治理设施实际运行率（k值）计算公式为K=设施年耗电量(千瓦时/年)/设备设计耗电量(千瓦时/年)。原文件中描述污染物类别为废水，污染物指标为汞，此处对其进行了匹配工作，将其匹配到LCAflow库里面相最符合的流，污染物指标备注为汞
- Mercury: 0.0002825
  the Technical of end-of-pipe management technology for pollution MercuryisChemical precipitation，Its Technical efficiency of end-of-pipe management75
  污染物指标汞的末端治理技术是化学沉淀法，其效率为75，末端治理设施实际运行率（k值）计算公式为K=设施年耗电量(千瓦时/年)/设备设计耗电量(千瓦时/年)。原文件中描述污染物类别为废水，污染物指标为汞，此处对其进行了匹配工作，将其匹配到LCAflow库里面相最符合的流，污染物指标备注为汞
- Mercury: 0.000791
  the Technical of end-of-pipe management technology for pollution MercuryisRedox process，Its Technical efficiency of end-of-pipe management30
  污染物指标汞的末端治理技术是氧化还原法，其效率为30，末端治理设施实际运行率（k值）计算公式为K=设施年耗电量(千瓦时/年)/设备设计耗电量(千瓦时/年)。原文件中描述污染物类别为废水，污染物指标为汞，此处对其进行了匹配工作，将其匹配到LCAflow库里面相最符合的流，污染物指标备注为汞
- mercury: 0.00249
  the Technical of end-of-pipe management technology for pollution mercuryisAdsorption/catalytic combustion method，Its Technical efficiency of end-of-pipe management90
  污染物指标汞的末端治理技术是吸附/催化燃烧法，其效率为90，末端治理设施实际运行率（k值）计算公式为K=设施年耗电量(千瓦时/年)/设备设计耗电量(千瓦时/年)。原文件中描述污染物类别为废气，污染物指标为汞，此处对其进行了匹配工作，将其匹配到LCAflow库里面相最符合的流，污染物指标备注为汞
- chemical oxygen demand: 5.6
  the Technical of end-of-pipe management technology for pollution chemical oxygen demandisBio-contact oxidation process，Its Technical efficiency of end-of-pipe management75
  污染物指标化学需氧量的末端治理技术是生物接触氧化法，其效率为75，末端治理设施实际运行率（k值）计算公式为K=设施年耗电量(千瓦时/年)/设备设计耗电量(千瓦时/年)。原文件中描述污染物类别为废水，污染物指标为化学需氧量，此处对其进行了匹配工作，将其匹配到LCAflow库里面相最符合的流，污染物指标备注为化学需氧量
- chemical oxygen demand: 6.72
  the Technical of end-of-pipe management technology for pollution chemical oxygen demandisA2/O process，Its Technical efficiency of end-of-pipe management70
  污染物指标化学需氧量的末端治理技术是A2/O工艺，其效率为70，末端治理设施实际运行率（k值）计算公式为K=设施年耗电量(千瓦时/年)/设备设计耗电量(千瓦时/年)。原文件中描述污染物类别为废水，污染物指标为化学需氧量，此处对其进行了匹配工作，将其匹配到LCAflow库里面相最符合的流，污染物指标备注为化学需氧量
- chemical oxygen demand: 6.72
  the Technical of end-of-pipe management technology for pollution chemical oxygen demandisAnaerobic hydrolysis，Its Technical efficiency of end-of-pipe management70
  污染物指标化学需氧量的末端治理技术是厌氧水解类，其效率为70，末端治理设施实际运行率（k值）计算公式为K=设施年耗电量(千瓦时/年)/设备设计耗电量(千瓦时/年)。原文件中描述污染物类别为废水，污染物指标为化学需氧量，此处对其进行了匹配工作，将其匹配到LCAflow库里面相最符合的流，污染物指标备注为化学需氧量
- chemical oxygen demand: 8.96
  the Technical of end-of-pipe management technology for pollution chemical oxygen demandisActivated sludge process，Its Technical efficiency of end-of-pipe management60
  污染物指标化学需氧量的末端治理技术是活性污泥法，其效率为60，末端治理设施实际运行率（k值）计算公式为K=设施年耗电量(千瓦时/年)/设备设计耗电量(千瓦时/年)。原文件中描述污染物类别为废水，污染物指标为化学需氧量，此处对其进行了匹配工作，将其匹配到LCAflow库里面相最符合的流，污染物指标备注为化学需氧量
- Exhaust gas: 12500
  the Technical of end-of-pipe management technology for pollution Exhaust gasis/，Its Technical efficiency of end-of-pipe management0
  污染物指标废气总量的末端治理技术是/，其效率为0。原文件中描述污染物类别为废气，污染物指标为废气总量，此处对其进行了匹配工作，将其匹配到LCAflow库里面相最符合的流，污染物指标备注为废气总量

## Use advice
This dataset is derived from the Pollution Source Census Report and contains information on pollution emissions and related products. However, it does not include data on energy or chemical consumption, nor does it provide information on waste or co-product generation. When utilizing this dataset, please supplement the missing data based on actual conditions before use
该数据集来源于污染源普查报告，包含污染物排放及相关产品信息，但不包含能源或化学品消耗数据，也不提供废弃物或共生产物产生信息。在使用该数据集时，请根据实际情况补充缺失数据后再使用。

## Review details
Inventory: The internal review was done by several iteration steps concerning raw data validation, raw data documentation, representativity, completeness and consistency of modelling with regard to ISO 14040 and 14044.
清单： 内部审查通过几个迭代步骤完成，涉及原始数据验证、原始数据记录、代表性、完整性、与 ISO 14040 和 14044 有关的建模的一致性。

## Data sources
- 第二次全国污染源普查产排污核算系数手册（试用版）,二级代码26,四级代码2651文件，在完整版文件中第4111页
