# Municipal wastewater treatment ; Wastewater ; betwixt anaerobic and aerobic treatment

Dataset: ILCD process, Unit process, single operation
Geography: SC-CN
Classification: Unit processes / End-of-life treatment / Wastewater treatment
Generated by: HUANG Runyao, runyaoh@163.com
Owner: Tiangong LCI Data Working Group
Review: Dependent internal review by Tiangong LCI Data Working Group
Amounts: no units in this file; such an amount is in the reference unit of its flow, which a separate flow dataset defines
copyright: ['opt4ROkqig']
licenseType: Free of charge for all users and uses

## General comment
In the anaerobic treatment phase, anaerobic bioreactors such as anaerobic ponds or anaerobic fermentation tanks are employed, where organic matter is broken down into smaller organic compounds and gases in an oxygen-free environment. The aerobic treatment phase typically utilizes aerobic bioreactors such as activated sludge or biofilm processes, where organic matter and ammonia nitrogen are further oxidized by oxygen and aerobic microorganisms to meet discharge standards.

## Technology and included processes
In municipal wastewater treatment, anaerobic and aerobic treatment processes exhibit the following technical characteristics:Anaerobic Treatment:Reactor Design: Anaerobic treatment typically employs reactors such as anaerobic ponds or anaerobic fermenters, providing an oxygen-free environment to facilitate the degradation of organic matter by anaerobic microorganisms.Operating Conditions: Under anaerobic conditions, controlling parameters such as temperature, pH, and influent organic matter concentration is necessary to ensure the activity and reaction efficiency of anaerobic microorganisms.Aerobic Treatment:Reactor Design: Aerobic treatment typically utilizes reactors such as activated sludge or biofilm processes, providing sufficient oxygen and suitable conditions to promote the oxidation of organic matter and ammonia nitrogen by aerobic microorganisms.Operating Conditions: Under aerobic conditions, controlling parameters such as oxygen supply, mixing rate, and dissolved oxygen concentration is crucial to maintain the growth and activity of aerobic microorganisms.Related Upstream and Downstream Processes:Upstream Processes: Include wastewater pretreatment, such as screening, grit removal, and sedimentation, to remove large particles and settleable solids.Downstream Processes: May include sedimentation, filtration, etc., to separate and remove biomass flocs and suspended solids, ultimately producing treated water that meets discharge standards.

## Technical purpose
This process, involving both anaerobic and aerobic treatment units, is used for the treatment of wastewater to remove or reduce organic matter, nutrients, and pollutants. It is applicable in industrial wastewater treatment facilities seeking efficient biodegradation and stabilization of organic substances.

## Reference product
- Wastewater: 0.0019; input; measured

## Inputs
All rows: measured
- chemical oxygen demand: 0.151
- nitrogen trifluoride: 0.0122
- nitrogen monoxide: 0.0024
- nitrogen, total (excluding N2): 0.0186
- Phosphorus: 0.0017
- Electricity: 2.41
- acetic acid: 0.0329
- antimony: 0.0011
- polyacrylonitrile fibres (PAN): 0.0005
- Polyferric chloride: 0.0186, 0.0814 (2 entries)
- Limestone: 0.0223
- sodium hypochlorite: 0.0404

## Outputs
All rows: measured
- chemical oxygen demand: 0.0152
- nitrogen trifluoride: 0.0003
- nitrogen monoxide: 0.0075
- nitrogen, total (excluding N2): 0.0079
- Phosphorus: 0.0002
- carbon dioxide (biogenic): 0.073
- methane (biogenic): 0.00534
- nitrous oxide: 3.9e-5, 0.389 (2 entries)

## Use advice
When utilizing this data set for life cycle assessment, attention should be given to delineating the boundary conditions between anaerobic and aerobic treatment stages. Ensure that the energy consumption, biogas production, and any potential emissions from both stages are accounted for accurately. For scenarios where recycling or resource recovery is relevant, include considerations for sludge treatment and potential nutrient recovery.

## Review details
Inventory: The internal review was done by several iteration steps concerning raw data validation, raw data documentation, representativity, completeness and consistency of modelling with regard to ISO 14040 and 14044.

## Data sources
- Yang, Z. et al. Assessment of upgrading WWTP in southwest China: Towards a cleaner production. Journal of Cleaner Production 326, 129381 (2021).
