# Shale gas production;Site preparation stage;Freshwater impoundment construction

Dataset: ILCD process, Unit process, black box
Geography: SC-CN
Reference year: 2014
Valid until: 2016
Classification: Systems / Construction
Generated by: Pu Hong, 15695258655@163.com
Owner: Tiangong LCI Data Working Group
Review: Dependent internal review by Tiangong LCI Data Working Group
Amounts: no units in this file; such an amount is in the reference unit of its flow, which a separate flow dataset defines
licenseType: Free of charge for all users and uses

## General comment
The freshwater impoundment construction process is integral for preparing the site in the early stages of shale gas extraction. It serves the purpose of providing a reliable water source for hydraulic fracturing operations, which are prevalent in the Sichuan and Chongqing regions of China. The freshwater pond is necessary to store large volumes of water needed for the hydraulic fracturing process.

## Geography
China's shale gas extraction work is currently concentrated in the Sichuan and Chongqing areas, and the data from Sichuan and Chongqing are selected for LCA calculations.

## Time period
Raw data dates between 2014-2016

## Reference product
- Retention pond: 7500; min 10000; max 2800; uniform; measured
  场地准备阶段--淡水蓄水池体积

## Inputs
- waterproof fabric: 2627; min 1163; max 3366; uniform; measured
  场地准备阶段--淡水蓄水池建设所用防水布

## Use advice
When using the dataset for Life Cycle Assessment (LCA) calculations, users should consider the technological applicability and the temporal relevance of the data. Since the raw data were collected between 2014 and 2016, users must assess whether current practices have significantly changed and should adjust the data accordingly. Exclusions or considerations for water recycling and subsequent storage must be addressed to reflect the specific conditions of the process. The geographical specificity of the data to Sichuan and Chongqing should be maintained unless further regional data become available for LCA model refinement.

## Review details
Inventory: The internal review was done by several iteration steps concerning raw data validation, raw data documentation, representativity, completeness and consistency of modelling with regard to ISO 14040 and 14044.

## Data sources
- Wang, J., Liu, M., McLellan, B. C., Tang, X. & Feng, L. Environmental impacts of shale gas development in China: A hybrid life cycle analysis. Resources, Conservation and Recycling 120, 38–45 (2017).
