# Resin production ; Total of all wind farm

Dataset: ILCD process, Unit process, single operation
Geography: NMG-CN
Reference year: 2017
Classification: Materials production / Organic chemicals
Functional unit: The functional unit is 1.5 MW wind turbine
LCI method principle: Attributional
LCI method approaches: Allocation
Generated by: Yunzhi Zhao, ll10088@163.com
Owner: Tiangong LCI Data Working Group
Review: Dependent internal review by Tiangong LCI Data Working Group
Amounts: no units in this file; such an amount is in the reference unit of its flow, which a separate flow dataset defines
copyright: false
licenseType: Free of charge for all users and uses

## General comment
This dataset represents the synthetic resin production process, intended for the creation and maintenance of wind turbine components in a wind farm. Additionally, it covers the life cycle inventory of a wind farm that includes the environmental impacts of producing wind turbines, substations, and cables, specifically focusing on a case of a wind farm with 33 domestic 1.5 MW wind turbines located in Northeast Inner Mongolia. This dataset supports environmental impact assessments and assists in analyzing substitution effects relevant to the renewable energy sector, particularly for wind power installations.

## Geography
The data regarding the parameters of wind power has been collected from Wang (2012). A wind farm equipped with 33 domestic 1.5 megawatts (MW) wind turbines is regarded as a case study to analyze the environmental impact and its substitution effects. The wind farm is located in the northeast of Inner Mongolia, the province in which most of China’s wind power is installed (Xia and Song, 2017).

## Reference product
- Resin: 1; article inperiodical

## Inputs
- Energy, geothermal, converted: 32.4282; article inperiodical

## Outputs
- carbon dioxide: 690; article inperiodical
- sulfur dioxide: 4.16; article inperiodical
- nitrous oxide: 2.8; article inperiodical
- carbon monoxide: 91.07; article inperiodical

## Deviations from the LCI method approaches
The life cycle inventory for wind power is illustrated as follows. The production and manufacturing stage include the production of wind turbines, substations, and cables, which consume a large amount of energy and emit pollutants (Xue et al., 2015).

## Use advice
When utilizing this dataset for life cycle assessment (LCA) purposes, users should account for the specific scope of the synthetic resin's application in wind turbines, ensuring alignment with the functional unit defined as a 1.5 MW wind turbine. Care should be taken to apply the data consistently with the methodological framework presented in the referenced studies (Wang 2012; Xia and Song, 2017; Xue et al., 2015), including considerations of the environmental impacts from energy consumption and pollutant emissions during the production and manufacturing stages of wind power infrastructure.

## Review details
Inventory: The internal review was done by several iteration steps concerning raw data validation, raw data documentation, representativity, completeness and consistency of modelling with regard to ISO 14040 and 14044.

## Data sources
- Li, H., Jiang, H.-D., Dong, K.-Y., Wei, Y.-M. & Liao, H. A comparative analysis of the life cycle environmental emissions from wind and coal power: Evidence from China. Journal of Cleaner Production 248, 119192 (2020).
