# cement production;cement, portland cement

Dataset: ILCD process, Unit process, black box
Geography: CN
Reference year: 2008
Classification: Unit processes / Materials production / Other mineralic materials
Generated by: #REF!, ysqsophia@gmail.com
Owner: Tiangong LCI Data Working Group
Review: Dependent internal review by Tiangong LCI Data Working Group
Amounts: no units in this file; such an amount is in the reference unit of its flow, which a separate flow dataset defines
copyright: false
licenseType: Free of charge for all users and uses

## General comment
Cement production processes.

## Geography
http://documents.ieaghg.org/index.php/s/YKm6B7zikUpPgGA?path=%2F2008

## Technical purpose
The data set pertains to the industrial process of producing silicate-based Portland cement. Portland cement is commonly used as a fundamental ingredient in concrete, mortar, stucco, and non-specialty grout. It is suitable for a vast range of construction applications, including infrastructure, commercial and residential buildings, and is essential for the construction industry.

## Reference product
- cement, portland cement: 1000
  Cement products. Data taken from the technical report, IEA Greenhous Gas R&D Programme (IEA GHG). CO2 Capture in the Cement Industry. 2008. Available online: http://documents.ieaghg.org/index.php/s/YKm6B7zikUpPgGA?path=%2F2008 (accessed on 5 September 2017).

## Inputs
- hard coal; 26.3 MJ/kg: 63.3
  Coal. Data taken from the technical report, IEA Greenhous Gas R&D Programme (IEA GHG). CO2 Capture in the Cement Industry. 2008. Available online: http://documents.ieaghg.org/index.php/s/YKm6B7zikUpPgGA?path=%2F2008 (accessed on 5 September 2017).
- Petroleum Coke: 31.9
  Petroleum coke. Data taken from the technical report, IEA Greenhous Gas R&D Programme (IEA GHG). CO2 Capture in the Cement Industry. 2008. Available online: http://documents.ieaghg.org/index.php/s/YKm6B7zikUpPgGA?path=%2F2008 (accessed on 5 September 2017).
- Electricity: 290.916
  Electricity. Data taken from the technical report, IEA Greenhous Gas R&D Programme (IEA GHG). CO2 Capture in the Cement Industry. 2008. Available online: http://documents.ieaghg.org/index.php/s/YKm6B7zikUpPgGA?path=%2F2008 (accessed on 5 September 2017).
- limestone, crushed, for mill: 1245.97
  Limestone. Data taken from the technical report, IEA Greenhous Gas R&D Programme (IEA GHG). CO2 Capture in the Cement Industry. 2008. Available online: http://documents.ieaghg.org/index.php/s/YKm6B7zikUpPgGA?path=%2F2008 (accessed on 5 September 2017).
- ferric oxide: 7.47
  Iron oxide. Data taken from the technical report, IEA Greenhous Gas R&D Programme (IEA GHG). CO2 Capture in the Cement Industry. 2008. Available online: http://documents.ieaghg.org/index.php/s/YKm6B7zikUpPgGA?path=%2F2008 (accessed on 5 September 2017).
- gypsum stone (CaSO4-dihydrate): 40
  Gypsum. Data taken from the technical report, IEA Greenhous Gas R&D Programme (IEA GHG). CO2 Capture in the Cement Industry. 2008. Available online: http://documents.ieaghg.org/index.php/s/YKm6B7zikUpPgGA?path=%2F2008 (accessed on 5 September 2017).

## Outputs
- carbon dioxide (fossil): 728.4
  CO2 emitted. Data taken from the technical report, IEA Greenhous Gas R&D Programme (IEA GHG). CO2 Capture in the Cement Industry. 2008. Available online: http://documents.ieaghg.org/index.php/s/YKm6B7zikUpPgGA?path=%2F2008 (accessed on 5 September 2017).
- sulfur dioxide: 2.28
  SO2 emitted. Data were calculated according to the design of the technical report, IEA Greenhous Gas R&D Programme (IEA GHG). CO2 Capture in the Cement Industry. 2008. Available online: http://documents.ieaghg.org/index.php/s/YKm6B7zikUpPgGA?path=%2F2008 (accessed on 5 September 2017).
- nitrogen dioxide: 4.56
  NO2 emitted. Data were calculated according to the design of the technical report, IEA Greenhous Gas R&D Programme (IEA GHG). CO2 Capture in the Cement Industry. 2008. Available online: http://documents.ieaghg.org/index.php/s/YKm6B7zikUpPgGA?path=%2F2008 (accessed on 5 September 2017).
- particles (PM2.5): 0.0219
  Particulates, <2.5um. Data taken from ecoinvent database, Ecoinvent Database v3. Available online: http://www.ecoinvent.org/database/ecoinvent-33/ecoinvent-33.html (accessed on 15 April 2018).
- particles (> PM10): 0.0052
  Particulates, >10um. Data taken from ecoinvent database, Ecoinvent Database v3. Available online: http://www.ecoinvent.org/database/ecoinvent-33/ecoinvent-33.html (accessed on 15 April 2018).
- particles (PM2.5 - PM10): 0.0072
  Particulates, >2.5 um, and <10 um. Data taken from ecoinvent database, Ecoinvent Database v3. Available online: http://www.ecoinvent.org/database/ecoinvent-33/ecoinvent-33.html (accessed on 15 April 2018).

## Sampling procedure
The production capacity is set to produce 1 million tons of cement per year, with the proportion of clinker in cement products being 91%.

## Use advice
When utilizing this data set for Life Cycle Assessment, it is essential that the user accounts for the specific process and technology used in the production of Portland cement, including the incorporation of waste products or the use of alternative raw materials if applicable. The proportion of clinker should be considered in the LCA as it is intrinsic to the environmental impact of the cement production. Methodological considerations should also include geographical and temporal relevance, as practices and technology may vary by region and evolve over time.

## Review details
Inventory: The internal review was done by several iteration steps concerning raw data validation, raw data documentation, representativity, completeness and consistency of modelling with regard to ISO 14040 and 14044.

## Data sources
- Jing An, Richard S. Middleton, & Yingnan Li. (2019). Environmental Performance Analysis of Cement Production with CO2 Capture and Storage Technology in a Life-Cycle Perspective. Sustainability 11, 2626.
