# Basin simulation ; Marine carbonate rocks 6000-10000m ; Dynamic simulation technology

Dataset: ILCD process, Unit process, single operation
Geography: XJ-CN
Reference year: 2022
Classification: Unit processes / Other Services / Research and development
LCI method principle: Attributional
LCI method approaches: Consequential
Generated by: Shikang Kang, 908798159@qq.com
Owner: Tiangong LCI Data Working Group
Review: Dependent internal review by Tiangong LCI Data Working Group
Amounts: no units in this file; such an amount is in the reference unit of its flow, which a separate flow dataset defines
copyright: false
licenseType: Free of charge for all users and uses

## General comment
In view of the complex reservoir-forming characteristics of the Cambrian ultra-deep petroleum system in Tarim Basin, the evolution process of "source-circle-reservoir" of Cambrian is discussed by using dynamic simulation technology, and the evolution history of "generation-migration-accumulation-adjustment" of oil and gas in the ultra-deep petroleum system is revealed

## Geography
Tarim Basin

## Time period
Publication time of literature

## Technology and included processes
The reservoir-forming dynamics simulation of ultra-deep petroleum system in Bachu uplift and Tabei uplift in platform basin area is carried out, and the channel and direction of oil and gas filling and migration in each period are restricted by setting the time of typical profile geological conditions.

## Technical purpose
The dynamic simulation technology described is used for geoscientific analysis in the Tarim Basin's Cambrian ultra-deep petroleum system. It is specifically applied to understand the complex characteristics of oil and gas generation, migration, accumulation, and adjustment in source-circle-reservoir systems at depths of 6000-10000 meters in marine carbonate rocks. The intent is to provide a basis for future exploration and exploitation of ultra-deep oil and gas resources by simulating the thermal evolution, generation, and migratory behavior of hydrocarbons in different geological profiles.

## Reference product
- methane (fossil): 30200; max 30200; uniform; calculated
  Natural gas production of Wusonger Formation (6597~6835m)

## Inputs
- Shale gas well: 0.2; log-normal; calculated
  overall maturity
- natural gas: 0.00055; log-normal; calculated
  average of HI

## Outputs
- natural gas: 30200; max 30200; uniform; calculated
  There is no natural gas input in the literature, assuming that the input and output during natural gas extraction process are 1:1

## Data selection and combination
The thermal evolution history, hydrocarbon generation history and migration and accumulation history of Cambrian ultra-deep "source-circle-reservoir" system in Tarim Basin are analyzed by using basin simulation technique. Combined with the fluid streamline simulation results at critical moments, the hydrocarbon filling process of Cambrian ultra-deep petroleum system is discussed in order to provide relevant basis for ultra-deep oil and gas exploration in Tarim Basin

## Data treatment and extrapolations
The overall maturity of source rocks in Tabei slope belt, Shuntuoguole low uplift and Maigaiti slope belt is less than 2%, which is in a high maturity stage and still has good hydrocarbon generation potential at present

## Use advice
When utilizing this data set for life cycle assessment or related geological and industrial applications, ensure that the data is applicable to the specific geological context of interest. Considerations should be made for the depth and geological conditions of the marine carbonate rock formations. The methodology and results should appropriately capture the complex interactions and evolutionary history of hydrocarbon systems within the Cambrian ultra-deep source-circle-reservoirs. Caution must be taken when extrapolating findings to different basins or formations without adequate similarity in characteristics. Users should integrate results with fluid streamline simulation outcomes to enhance the accuracy and relevance of predictive exploration models.

## Review details
Inventory: The internal review was done by several iteration steps concerning raw data validation, raw data documentation, representativity, completeness and consistency of modelling with regard to ISO 14040 and 14044.

## Data sources
- 李斌;张欣;郭强;吕海涛;杨素举;徐勤琪;彭军; 塔里木盆地寒武系超深层含油气系统盆地模拟. 石油学报 804–815 (2022).
