# Livestock and poultry breeding ; manure treatment stage ; layer breeding area

Dataset: ILCD process, Unit process, single operation
Geography: SD-CN
Reference year: 2014
Classification: Unit processes / Materials production / Agricultural production means
Functional unit: 1kg chicken
Generated by: Rui Yang, 1632707028@qq.com
Owner: Tiangong LCI Data Working Group
Review: Dependent internal review by Tiangong LCI Data Working Group
Amounts: no units in this file; such an amount is in the reference unit of its flow, which a separate flow dataset defines
copyright: false
licenseType: Free of charge for all users and uses

## General comment
Livestock and poultry manure treatment methods include dry cleaning manure, water flushing manure, bedding material treatment. The treatment method of water flushing manure is strictly restricted by the "Water Pollution Prevention and Control Action Plan" (referred to as "Water Ten") [88] and the new "Environmental Protection Law", which shows a downward trend year by year; The bedding method has less pollutant discharge and less harm to the environment, and can be directly applied to the field after simple composting, but it is highly restricted by economic cost, and is commonly used in poultry house manure treatment. The environmental harm of dry cleaning is between the two, and the economic cost is lower [89,90].

## Geography
This study was conducted from 2014 to 2015, aiming at livestock and poultry feeding cycle, meat ratio, feed formula, feed consumption, coal and electricity consumption, etc. Has been to Shandong Gaomi Zhengda pig farm, Laixi City Zhishuang dairy farm, Jimo city Duan Bolan town Jiangjiapo village pig farm, Jimo City Liujiazhuang town livestock farm, Rizhao City Changling town Guanzhuang village, Juxian County Zhailihe town Dongxing Agriculture and animal husbandry company, Juxian Qiaoshan town east Chen dairy farm, Juxian Qiaoshan town Liu Jiayi water pig farm, Zhucheng Foreign Trade Co., LTD. Phoenix parents breeding duck farm, Xinjiang Fukang Hongfa Breeding professional cooperative, Jiuyun Street Town Xuhong laying Chicken cooperative, Jiuyun Street Town Liuyun Village self-contained breeding farm, China Australia Holding Group Co., LTD., Dezhou City Qingyun County Wayu Village, Shandong Province Qingyun County four Liu community beef cattle breeding base, Dezhou City Qingyun Qingnian chicken breeding base, Qingyun County Yongli Poultry layer breeding company, Qingyun County Xingchen youth chicken breeding Field research was carried out by professional breeding cooperatives, Qingyun Dongtai broiler breeding cooperatives, Hebei Yanshan Boyuan Feed Co., LTD., Yanshan Da Chinese Feed Co., LTD., Wudi Liuhe Feed Co., LTD., and China-Australia Oriental Hope Feed Co., LTD.

## Technology and included processes
In this paper, the life cycle of livestock and poultry farming is divided into six stages: feed crop planting, feed processing, livestock and poultry raising, manure treatment, slaughter and transportation. The specific life cycle process of livestock and poultry breeding is shown in Figure 2-1. Due to the lack of some data and the limitations of basic conditions, the production, transportation and use of pesticides, mulch and feed additives have not been analyzed, and the environmental impact caused by other related infrastructure construction, transport production and labor costs is no longer considered.

## Technical purpose
This data set pertains to a variety of manure treatment methods used in the layer breeding area of livestock and poultry farms. These methods include dry cleaning manure, water flushing manure, and bedding material treatment. Dry cleaning of manure is an intermediate approach in terms of environmental impact and has lower economic costs. Bedding material treatment results in lower pollutant emissions, offering environmental benefits and the possibility for the composted material to be used as fertilizer, though it is economically costly. Water flushing manure treatment method is declining due to strict environmental regulations. Such information is crucial for stakeholders in agricultural and environmental sectors looking to understand and optimize waste management practices, ensure compliance with environmental laws, and reduce ecological impacts associated with poultry breeding operations.

## Reference product
- manure: 0.0892857; input; calculated
  根据文献中畜禽排放系数计算

## Outputs
- methane (biogenic): 0.00107; measured
  Laying hen breeding community
- nitrous oxide: 0.00107; measured
  Laying hen breeding community
- ammonia: 0.00667; measured
  Laying hen breeding community

## Use advice
When utilizing this data set for Life Cycle Assessment or related research, users should account for the regional differences in manure handling practices as different regions may vary in adoption of treatment methods. The data should be used in context with other environmental measures and regulations, such as the 'Water Pollution Prevention and Control Action Plan'. Consideration should also be given to the economic implications of manure treatment options and technological feasibility. Proper attention has to be given to the system boundaries definition, especially considering the potential use of treated manure as a replacement for commercial fertilizers which may lead to credits in the life cycle inventory.

## Review details
Inventory: The internal review was done by several iteration steps concerning raw data validation, raw data documentation, representativity, completeness and consistency of modelling with regard to ISO 14040 and 14044.

## Data sources
- 周景月. 基于生命周期评价的畜禽养殖环境影响分析. (青岛科技大学, 2017).
