# Aluminum electrolysis ; Liquid primary aluminum ; Bayer process-thermal power ; Alumina for metallurgy

Dataset: ILCD process, Partly terminated system
Geography: CN
Reference year: 2011
Classification: Unit processes / Materials production / Metals and semimetals
Generated by: Jinliang Xie, jinliang.research@gmail.com
Owner: Tiangong LCI Data Working Group
Review: Dependent internal review by Tiangong LCI Data Working Group
Amounts: no units in this file; such an amount is in the reference unit of its flow, which a separate flow dataset defines
copyright: false
licenseType: Free of charge for all users and uses

## General comment
The liquid primary aluminum produced by this process is used as a raw material for products requiring high-quality aluminum, such as aerospace components, automotive parts, construction materials, and electrical conductors. The alumina used in the electrolysis process is produced via the Bayer process, which involves refining bauxite to alumina and is primarily powered by thermal energy.

## Time period
Dissertation Completion Date

## Reference product
- aluminium, primary, liquid: 1000; missing unimportant

## Outputs
- carbon dioxide (fossil),carbon dioxide (fossil): 10188.4; missing unimportant

## Use advice
For Life Cycle Assessment, the environmental impact focus is on the resource consumption, energy usage, and waste emissions during the manufacturing of aluminum products. As the impacts from transportation, usage, and recycling are considerably smaller, they are not considered in this assessment. The lifecycle boundary is from bauxite mining to the production of primary aluminum, which includes bauxite extraction, alumina production, anode production, and the aluminum electrolysis process. Activities such as the extraction, production, and transport of minor auxiliary materials like limestone and asphalt are excluded from the evaluation system.

## Review details
Inventory: The internal review was done by several iteration steps concerning raw data validation, raw data documentation, representativity, completeness and consistency of modelling with regard to ISO 14040 and 14044.

## Data sources
- 李贵奇. 基于生命周期思想的环境评估模型及其在铝工业中的应用. (中南大学, 2011).
