# Electricity production ; Thermal power ; China

Dataset: ILCD process, Unit process, single operation
Geography: CN
Reference year: 2019
Classification: Unit processes / Energy carriers and technologies / Electricity
Generated by: Ruoxi Xiong, xiongrx0126@163.com
Owner: Tiangong LCI Data Working Group
Review: Dependent internal review by Tiangong LCI Data Working Group
Amounts: no units in this file; such an amount is in the reference unit of its flow, which a separate flow dataset defines
copyright: false
licenseType: Free of charge for all users and uses

## General comment
Thermal power generation includes seventeen fossil fuels such as raw coal, washed coal, oil and natural gas. The process only considers the direct power generation process, not the upstream raw material extraction and processing and the downstream power consumption

## Time period
Calculated based on data from the 2019 Energy Statistics Yearbook

## Technical purpose
This dataset describes the production of electricity through thermal power generation in China, utilizing seventeen different fossil fuels such as raw coal, washed coal, oil, and natural gas. It is applicable to the assessment of direct power generation operations, excluding considerations of upstream raw material extraction, processing, and downstream power consumption. This data can be used for evaluating the environmental impact of electricity generation in China's thermal power plants.

## Reference product
- electricity for thermal power: 3.6; calculated

## Inputs
- Raw coal: 0.3937; calculated
- Other Washed Coal: 0.0089; calculated
- Gangue, in ground: 0.004726; calculated
- Coke oven gas: 0.003985; calculated
- blast furnace gas: 0.046959; calculated
- Converter gas: 0.006303; calculated
- Diesel: 4.63e-5; calculated
- natural gas: 0.0075069; calculated
- Coke: 5e-5
- fuel oil, unspecified: 3e-5
- naphtha: 2e-5
- Petroleum Coke: 0.00035
- refinery gas: 0.0001
- Natural gas, liquefied: 0.00044

## Outputs
- carbon dioxide (fossil): 0.834091; calculated
- sulfur dioxide: 0.000142247; calculated
- Nitrogen oxides: 0.000227013; calculated
- particles (> PM10): 2.89784e-5; calculated

## Data treatment and extrapolations
For the accounting method, please refer to the "Enterprise Greenhouse Gas Emissions Accounting Methods and Reporting Guidelines for Power Generation Facilities". Different forms of power generation and fuel consumption come from Chapter 3 (Energy Production) and Chapter 6 (Regional Energy Balance Sheet) in the "China Energy Statistical Yearbook 2020". The fuel parameters such as low calorific value and carbon content per unit calorific value used to calculate the carbon dioxide emission factor come from the "2019 China Regional Power Grid Carbon Dioxide Baseline Emission Factor Calculation Instructions OM" and the "Enterprise Greenhouse Gas Emission Accounting Method and Reporting Guide for Power Generation Facilities" 》

## Use advice
Users of this data should refer to the 'Enterprise Greenhouse Gas Emissions Accounting Methods and Reporting Guidelines for Power Generation Facilities' for the accounting method. Data on different forms of power generation and fuel consumption are taken from Chapter 3 (Energy Production) and Chapter 6 (Regional Energy Balance Sheet) of the 'China Energy Statistical Yearbook 2020'. Fuel parameters for calculating CO2 emission factors, like low calorific value and carbon content per unit calorific value, can be sourced from the '2019 China Regional Power Grid Carbon Dioxide Baseline Emission Factor Calculation Instructions OM' and the aforementioned guidelines. It is imperative that users only apply this data for the specified scopes of direct power generation and not for lifecycle analysis that includes upstream and downstream processes.

## Review details
Inventory: The internal review was done by several iteration steps concerning raw data validation, raw data documentation, representativity, completeness and consistency of modelling with regard to ISO 14040 and 14044.

## Data sources
- 熊若熙. 中国电力生产和消费二氧化碳与污染物排放因子核算. (清华大学, 2023).
