# Rare earth Mining;dysprosium;Bastnaesite/Monazite (B/M) Rare Earth Elements (REE) containing ore

Dataset: ILCD process, Unit process, single operation
Geography: CN
Reference year: 2010
Valid until: 2019
Classification: Unit processes / Materials production / Non-energetic raw materials
Functional unit: The goal of this investigation is to compare environmental impacts related to the production of 1 kg Dy (functional unit) from IAC (Southern China), from B/M ore (Bayan Obo), and from an eudialyte deposit (Norra Kärr) using the LCA method
LCI method principle: Attributional
LCI method approaches: Allocation - mass
Generated by: Tao Wang, twang@iue.ac.cn
Owner: Tiangong LCI Data Working Group
Review: Dependent internal review by Tiangong LCI Data Working Group
Amounts: no units in this file; such an amount is in the reference unit of its flow, which a separate flow dataset defines
copyright: false
licenseType: Free of charge for all users and uses

## General comment
Dysprosium extracted from rare earth mining operations is utilized for its unique magnetic properties in various advanced technological applications. This includes manufacturing of components for electric motors in electric vehicles, wind turbines, and hard disk drives as well as in high-performance magnets and lasers.

## Geography
Southern China and Bayan Obo

## Technology and included processes
The goal of this investigation is to compare environmental impacts related to the production of 1 kg Dy (functional unit) from IAC (Southern China), from B/M ore (Bayan Obo), and from an eudialyte deposit (Norra Kärr) using the LCA method

## Reference product
- Raw ore: 1230; software or database
  Raw ore. Input for next process: Crushing

## Inputs
- Electricity: 4.392; measured
  Value from iron mine, electricity mix 2014
- Diesel: 10.07; measured
  Diesel, burned in diesel-electric generating set. Diesel for mining truck
- Explosive: 0.233; calculated
  Explosive. Blasting, 0.095 kg/t moved rock multiplied with stripping rate.
- transport in t*km,transport in t*km: 0.45; calculated
  Diesel 150 km, oil and explosives 929 km. Transport, freight, lorry >32 metric ton, EURO3
- transport in t*km,transport in t*km: 1.11; software or database
  Transport, freight train, 1046 km
- lubricating oil, waste: 0.037; calculated
  lubricating oil. Adapted to mining rat

## Outputs
- particles (> PM10),particles (> PM10),particles (>PM10): 2.75
  Dust (PM10), (PM2.5 - PM10), (PM2.5) Particles to air. Based on Arpacioglu and Er (2003) multiplied with stripping rate, distribution of dust analog Althaus et al. (2007a)
- Radioactive dust, waste: 1.324
  Radioactive dust. Uranium (U238) [Radioactive emissions to air], based on Th232 and U238 activity in the ore.
- Water,Water: 1492; calculated
  Waste water [other emissions to fresh water, value from Mount Weld rare earth mine adapted to mining area.
- overburden (unspecified),overburden (unspecified): 1226; calculated
  Non-sulfidic overburden, off-site [Waste], calculation based on stripping rate.
- lubricating oil, waste: 0.037; estimated
  lubricating oil, waste. Waste mineral oil [Waste], incineration of hazardous waste is assumed

## Deviations from the LCI method approaches
In this study, an allocation method based on the mass of produced REEs combined with their market prices (based on an international metals market analysis and pricing index company ) are considered, as usual for metals with strongly different prices. As the ores have different compositions, the allocation factor has to be assessed individually for each site.

## Use advice
When utilizing this LCA data for the production of dysprosium, it is important to consider the allocation method based on both the mass and market prices of the rare earth elements (REEs) extracted. As the ores from different sources vary in composition, the allocation factor must be assessed on a case-by-case basis. The functional unit of comparison should be consistent (1 kg Dy in this case). Ensure that methodological assumptions like system boundaries, data quality, and recycling considerations are accounted for and applied uniformly across the different sources in the comparative analysis.

## Review details
Inventory: The internal review was done by several iteration steps concerning raw data validation, raw data documentation, representativity, completeness and consistency of modelling with regard to ISO 14040 and 14044.

## Data sources
- Zapp, P., Marx, J., Schreiber, A., Friedrich, B. & Voßenkaul, D. Comparison of dysprosium production from different resources by life cycle assessment. Resources, Conservation and Recycling 130, 248–259 (2018).
