# Remediated soil ; Pesticide contaminated soil ; Ex-situ remediation Cement kiln co-processing ; Excluding soil excavation process

Dataset: ILCD process, Unit process, single operation
Geography: JS-CN
Reference year: 2022
Classification: Unit processes / Other Services / Repair and maintenance
Functional unit: we defined the functional unit as the remediation of 1 ton of organically contaminated soil
Generated by: Yang Xintong, yangxt@caep.org.cn
Owner: Tiangong LCI Data Working Group
Review: Dependent internal review by Tiangong LCI Data Working Group
Amounts: no units in this file; such an amount is in the reference unit of its flow, which a separate flow dataset defines
copyright: false
licenseType: Free of charge for all users and uses

## General comment
Solid waste that meets the requirements for kiln entry will be put into the cement kiln to achieve harmless disposal of solid waste while producing cement clinker.

## Geography
The study site was an abandoned rubber factory in Jiangsu Province in eastern China.The total in situ volume of contaminated soil that required remediation was 29,313 m3

## Technology and included processes
For the cement kiln co-processing scenario, the cement plant selected for contaminated soil disposal is located 49 km from the study site and has two dry process rotary kiln production lines with a daily clinker output of 5000 t. The screened contaminated soil would be transported by truck to an air-tight storage warehouse at the cement plant for temporary storage, then subsequently fed into the pre-calciner via a special conveyor belt. Raw meal in the pre-calciner reaches temperatures up to 700 ◦C, at which the contaminated soil would be dried and heated before entering the rotary kiln. The flame temperature in the rotary kiln exceeds 1800 ◦C, which is highly efficient for converting PAHs to H2O and CO2. The inorganic components in the contaminated soil would be fully incorporated into the clinker at a temperature of 1450 ◦C and subsequently cooled in the clinker cooler for incorporation into the cement production process.

## Technical purpose
The process described is intended for the ex-situ remediation of pesticide-contaminated soil using cement kiln co-processing. This technique applies to soil requiring detoxification and stabilization, capable of being processed at high temperatures without prior soil excavation. It suits industrial facilities, such as cement plants with appropriate kilns that can integrate soil remediation into their clinker production line, resulting in both cement clinker and remediated soil.

## Reference product
- Remediated soil: 1000; measured

## Inputs
- Electricity: 62.136; measured
- transport in t*km: 49; measured
  For the cement kiln co-processing scenario, the cement plant selected for contaminated soil disposal is located 49 km from the study site
- Coal,Coal,Coal: 65.83; measured
- Excavated soil,Excavated soil: 1000; measured
  与大多数从污染土壤挖掘开始的污染土壤修复LCA不同，我们将系统边界设置为在污染土壤被挖掘和筛分后，但仍留在场地内后开始。

## Use advice
When using this data set for Life Cycle Assessment (LCA) of contaminated soil remediation, attention should be given to the system boundary defined as starting after the excavation and screening of the soil, while still on-site. Do not include the initial excavation process. Consider the energy consumption, transportation to the cement plant, waste gas emissions, and waste management. Ensure technological applicability by matching remediation requirements with the capabilities of the selected cement kiln, particularly the temperature profile necessary for the complete decomposition of organic contaminants and incorporation of inorganic components into the clinker.

## Review details
Inventory: The internal review was done by several iteration steps concerning raw data validation, raw data documentation, representativity, completeness and consistency of modelling with regard to ISO 14040 and 14044.

## Data sources
- Tian L ,Mingchao H ,Lu Y , et al. Life cycle assessment-based decision-making for thermal remediation of contaminated soil in a regional perspective [J]. Journal of Cleaner Production, 2023, 392
