# tunnelling ; coal mining

Dataset: ILCD process, Unit process, single operation
Geography: LF-SX-CN
Reference year: 2022
Classification: Energy carriers and technologies / Energetic raw materials
Generated by: Linlin Yin, yinlinlin0623@163.com
Owner: Tiangong LCI Data Working Group
Review: Dependent internal review by Tiangong LCI Data Working Group
Amounts: no units in this file; such an amount is in the reference unit of its flow, which a separate flow dataset defines
licenseType: Free of charge for all users and uses

## General comment
The coal mining process at M coal mine, involving roadway excavation, is essential for providing the raw material for energy production and various coal-derived products. This particular data set describes a single operational unit process within a larger coal extraction system. The coal from this mine can be employed for purposes including but not limited to electricity generation, steel production, and as a reductant in various industrial processes.

## Geography
The annual output of M coal mine is 1.2 million tons, and the actual working time is 360 days per year, so the working face needs 499 days to complete the mining. In the mining process of a working face in M coal mine, the time of installation and withdrawal of equipment is half a month respectively. In one year of production, the time of excavation is 11 months, and the time of mining is 10 months.

## Technology and included processes
Roadway excavation in coal mining

## Reference product
- carbon dioxide (fossil): 4.49773e7; uniform; article inperiodical
  Based on the time schedule of each stage in the full life cycle of coal mining in M ​​Coal Mine and the mining time of the entire working face, the CO2 emissions generated by consuming 60788.40mw·h of electricity in tunnel excavation during the full life cycle of mining in this working face were calculated. quantity.

## Inputs
- Electricity: 2.18838e8; uniform; article inperiodical
  Based on the time schedule of each stage in the full life cycle of coal mining in M ​​Coal Mine and the mining time of the entire working face, the power consumption of tunnel excavation in the full life cycle of mining in this working face was calculated.

## Use advice
When utilizing this data set, consider that the allocation of time among different mining activities within this industrial process may affect the overall environmental impact assessment. Pay close attention to the duration of excavation and mining reported—11 months for excavation and 10 months for mining within a single year—and ensure this reflects the operational reality when performing Life Cycle Assessments. Factor in the half-month periods for equipment setup and removal to accurately represent the time-based allocation of these activities.

## Review details
Inventory: The internal review was done by several iteration steps concerning raw data validation, raw data documentation, representativity, completeness and consistency of modelling with regard to ISO 14040 and 14044.
