# Electricity/electrical energy + heat energy ; Coal ; 9~19 MW; NESPS2 / 电能/电能+热能 ; 煤炭 ; 煤粉炉或循环 ; 9～19兆瓦 ; 全国第二次污染普查数据

Dataset: ILCD process, Unit process, single operation
Geography: CN
Reference year: 2019
Classification: Reference Parameters / Energy carriers and technologies / Electricity
Generated by: The data was created by the Office of the Second National Pollution Source Census of the Ministry of Ecology and Environment, and the data was organized by the TianGong Plan team for ILCD format / 生态环境部第二次全国污染源普查工作办公室创建数据，天工计划团队常慧敏整理数据为ILCD格式
Owner: Tiangong LCI Data Working Group / 天工LCI数据工作小组
Review: Dependent internal review by Tiangong LCI Data Working Group / 天工LCI数据工作小组
Amounts: no units in this file; such an amount is in the reference unit of its flow, which a separate flow dataset defines
copyright: false
licenseType: Free of charge for all users and uses

## General comment
the Technical of end-of-pipe management technology for pollution CoalisOthers (direct discharge)

## Technical purpose
该工艺描述的是通过一个煤炭燃料的发电厂同时产生电能和热能，输出功率范围为9到19兆瓦。这种工艺通常用于规模较小的工业能源生产，煤炭是主要的燃料来源。所产生的能源可能用于各种工业需求或地方能源供应系统。技术细节还提到了废水的末端处理技术，指出了两种不同的方法：直接排放和再利用。前者意味着废水经过处理后排放到环境中，而后者表示废水被回收用于其他目的，可能是在同一设施内或在不同的工艺中。

## Reference product
- Coal: 1000; input; calculated
  源文件中描述为为煤炭，此处对其进行了匹配工作，将其匹配到LCAflow库里面相最符合的流，污染物指标备注为工业废水量

## Outputs
- Waste water: 560; calculated
  the Technical of end-of-pipe management technology for pollution Waste waterisOthers (direct discharge)
  污染物指标工业废水量的末端治理技术是其他（直排）。原文件中描述污染物类别为废水，污染物指标为工业废水量，此处对其进行了匹配工作，将其匹配到LCAflow库里面相最符合的流，污染物指标备注为工业废水量
- Waste water: 560; calculated
  the Technical of end-of-pipe management technology for pollution Waste waterisOthers (reuse)
  污染物指标工业废水量的末端治理技术是其他（重复利用）。原文件中描述污染物类别为废水，污染物指标为工业废水量，此处对其进行了匹配工作，将其匹配到LCAflow库里面相最符合的流，污染物指标备注为工业废水量

## Use advice
This dataset is derived from the Pollution Source Census Report and contains information on pollution emissions and related products. However, it does not include data on energy or chemical consumption, nor does it provide information on waste or co-product generation. When utilizing this dataset, please supplement the missing data based on actual conditions before use
该数据集来源于污染源普查报告，包含污染物排放及相关产品信息，但不包含能源或化学品消耗数据，也不提供废弃物或共生产物产生信息。在使用该数据集时，请根据实际情况补充缺失数据后再使用。

## Review details
Inventory: The internal review was done by several iteration steps concerning raw data validation, raw data documentation, representativity, completeness and consistency of modelling with regard to ISO 14040 and 14044.
清单： 内部审查通过几个迭代步骤完成，涉及原始数据验证、原始数据记录、代表性、完整性、与 ISO 14040 和 14044 有关的建模的一致性。

## Data sources
- 第二次全国污染源普查产排污核算系数手册（试用版）,四级代码4411、4412文件，在完整版文件中第5332页
