# primary copper production;Copper cathode;Flash smelting;copper concentrate

Dataset: ILCD process, Unit process, single operation
Geography: CN
Reference year: 2019
Classification: Unit processes / Materials production / Metals and semimetals
Functional unit: the production of one ton of standard Cu cathode
LCI method principle: Attributional
LCI method approaches: Allocation - market value; Substitution
Generated by: Peng Wang, 2867919560@qq.com
Owner: Tiangong LCI Data Working Group
Review: Dependent internal review by Tiangong LCI Data Working Group
Amounts: no units in this file; such an amount is in the reference unit of its flow, which a separate flow dataset defines
copyright: false
licenseType: Free of charge for all users and uses

## General comment
Copper cathode produced via primary copper production processes like Flash smelting and Bath smelting is intended for various applications including electronics, construction, electrical networks, and alloy manufacturing. Flash smelting, Double-Flash, ISA smelting, and Oxygen-enriched bottom-blowing (SKS) technologies are crucial in effectively producing high quantities of copper cathode. Particularly, Smelter A, with its Flash smelting and Peirce-Smith converting, is the world's largest smelter, exemplifying the wide use of this technology. Similarly, Smelters B, C, and D apply innovative methods to improve efficiency and output, catering to large-scale industrial copper demand.

## Geography
by investigating facility-level data from four typical Chinese Cu smelters;geographically covering Anhui, Jiangxi, Henan and Yunnan Province

## Time period
referencing the China Cu production and smelting process distribution summarized by Zhou (2019)

## Technology and included processes
Among which, Smelter A is the largest smelter in the world with annual output of Cu cathode more than 1000 kt. Its smelting technology is “Flash smelting” which employs oxygenated air to promote autogenous conditions and is currently used by around half of the smelters worldwide (Hanniala et al., 1999) and plus Peirce-Smith (PS) converting. As an offshoot of “Flash smelting”, “Double-Flash” (i.e., Flash smelting and Flash converting) was also covered in the study, and is applied by Smelter B with its annual output of Cu cathode around 400 kt. It combines “Flash smelting” with flash converting process to replace conventional PS converting process (Chaubal et al., 1989 ). The smelting technology applied by Smelter C is ISA smeltingplus PS converting, with its annual output of Cu cathode around 500 kt. Unlike “Flash smelting”, it is a kind of “Bath smelting” that features the insertion of a lance into the slag to inject oxygen enriched air into the molten bath. This modification creates turbulence that increases the productivity of the reaction with feed materials (Arthur and Edwards, 2003). The Oxygen-enriched bottom-blowing (also termed as SKS) smelting technology (plus Flash converting) applied by Smelter D with its annual output of Cu cathode around 300 kt also belongs to “Bath smelting”. It is a newly developed intensified smelting technology further to ISA smelting technology. Significant advantages of this technology mainly come from its bottom blowing techniques, and its intellectua

## Model description
A virtualprocess named “Estimated emission treatment” was created and modeled to quantify the total exhausted gas emission, while the “Wastewater Treatment” process was modeled to quantify the total wastewater emission. Solid waste generated from copper smelting and refining process were modeled as general solid waste shown in Table S7 of Supplementary Materials. All collected foreground data were modeled using GaBi-Software (Sphera, 2021), followed by a plausibilitycheck for mass balance and completeness of emission inventory.

## Reference product
- Refined copper: 1000; measured
  copper

## Inputs
- Oil sand (100% bitumen) (in MJ): 2914; software or database
  Crude oil
- hard coal,hard coal,hard coal: 26424; software or database
  Hard coal
- Lignite EU-27: 583; software or database
  Lignite
- natural gas,natural gas,natural gas: 6468; software or database
  Natural gas
- Uranium natural: 535; software or database
  Uranium natural needs supplementation
- primary energy from hydro power: 5927; software or database
  Primary energy from hydro power
- primary energy from solar energy: 550; software or database
  Primary energy from solar energy
- primary energy from wind power: 631; software or database
  Primary energy from wind power
- Copper ore: 73226; measured
  Copper ore – Pyro route
- Limestone: 450; measured
  Limestone (calcium carbonate)
- quartz sand: 198; measured
  Quartz sand (silica sand; silicon dioxide)
- freshwater,freshwater: 4.07701e6; measured
  Water
- Copper-containing slag: 198.2; measured
  Secondary copper-containing materials need to be supplemented

## Outputs
- overburden (unspecified),overburden (unspecified): 4821; measured
  Overburden (deposited)
- Tailings, unspecified: 104823; measured
  Tailings (deposited)
- Slag: 0.0049; measured
  Slag (deposited)
- Waste rock: 276371; measured
  Waste rock needs to be replenished
- hazardous waste (unspecified),hazardous waste (unspecified): 3500; measured
  Hazardous waste (deposited)
- carbon dioxide (fossil): 3950; software or database
  原文未区分bio和fossil，根据专家判断此处为fossil
- methane (fossil): 7.5; software or database
  原文未区分bio和fossil，根据专家判断此处为fossil
- nitrous oxide: 0.459; software or database
  N2O
- Nitrogen oxides: 20.5; software or database
  NOx needs to be supplemented
- sulfur oxides: 10.1; software or database
  SO2
- non-methane volatile organic compounds: 1.79; software or database
  non-methane volatile organic compounds need to be supplemented
- carbon monoxide,carbon monoxide (fossil): 7.32; software or database
  原文未区分bio和fossil，根据专家判断此处为fossil
- particles (> PM10),particles (> PM10),particles (>PM10): 0.645; software or database
- particles (PM10): 3.67; software or database
- particles (PM2.5 - PM10): 1.1; software or database
- particles (PM2.5): 2.16; software or database
- arsenic: 1460, 3820 (2 entries); software or database
  Arsenic
- copper: 1830, 3490 (2 entries); software or database
  Copper
- lead: 1290, 1510 (2 entries); software or database
  Lead
- ammonium: 769; software or database
  Ammonium/ammonia
- magnesium: 0.159; software or database
  Nitrate(NO3)
- phosphate: 2660; software or database
  Phosphate (PO43 )
- biological oxygen demand: 496; software or database
  Biological oxygen demand (BOD) needs to be supplemented
- chemical oxygen demand: 5.34; software or database
  Chemical oxygen demand (COD)

## Deviations from the LCI method approaches
The Life CycleInventory Assessment (LCIA) was performed using the CML (Center for Methodological Development) 2001 method developed by University of Leiden in Netherland (Guine ́e, 2001), mainly due to its wide acceptance in the global LCA community.

## Data selection and combination
Background data on production of energy, fuels and auxiliary materials were obtained from GaBi-Database (Sphera database, 2021), covering China-specific data. Moreover, global average or European data were used as the best available proxy data for some auxiliary materials production such as barium sulfate (used as fill-forming agent in fire-refining process) due to the lack of related Chinese data.

## Use advice
LCA data users examining the impact of primary copper production should reference this dataset for four typical Chinese Cu smelters, incorporating facility-level data and geographical coverage of Anhui, Jiangxi, Henan, and Yunnan Province. It is essential to utilize GaBi software for modeling foreground data and to carry out plausibility checks for mass balance and emission inventory. Users should account for the smelting technologies employed such as Flash smelting, Double-Flash, ISA smelting, and Oxygen-enriched bottom-blowing (SKS), and consider the CML 2001 method for LCIA due to its global acceptance. Note that some auxiliary materials like barium sulfate, lacking China-specific data, are represented using global or European averages and should be treated cautiously in the assessment.

## Review details
Inventory: The internal review was done by several iteration steps concerning raw data validation, raw data documentation, representativity, completeness and consistency of modelling with regard to ISO 14040 and 14044.

## Data sources
- Lu, T., Tikana, L., Herrmann, C., Ma, Y. & Jia, J. Environmental hotspot analysis of primary copper production in China and its future improvement potentials. Journal of Cleaner Production 370, 133458 (2022).
