# Ultrapure water preparation ; Electrodeionization, spiral-wound, wastewater discharge, CN

Dataset: ILCD process, Unit process, single operation
Geography: CN
Reference year: 2022
Classification: Materials production / Water
Functional unit: 1 t ultrapure water
Generated by: Jiaqi Lu, wilsherelu@foxmail.com
Owner: Tiangong LCI Data Working Group
Review: Dependent internal review by Tiangong LCI Data Working Group
Amounts: no units in this file; such an amount is in the reference unit of its flow, which a separate flow dataset defines
copyright: false
licenseType: Free of charge for all users and uses

## General comment
This dataset corresponds to the production of 1 tonne of ultrapure water through an industrial process that involves electrodeionization with a spiral-wound configuration. This type of ultrapure water is crucial for applications that demand water with extremely low levels of impurities, such as semiconductor manufacturing, pharmaceutical processes, and critical laboratory analyses.

## Reference product
- Ultrapure water: 1000; article inperiodical
  Ultrapure water products

## Inputs
- electricity mix: 4.32; article inperiodical
- Electrodeionization components: 1.25e-5; article inperiodical
  EDI components
- Reverse Osmosis Inlet Water: 1330; article inperiodical
  RO water inlet

## Outputs
- waste water - treated: 360; article inperiodical
  Drainage can be reused to RO
- Electrodeionization components: 1.25e-5; article inperiodical
  EDI component obsolete

## Use advice
When utilizing this dataset for Life Cycle Assessment (LCA), consider the specific technological application of the ultrapure water and ensure appropriate allocation of environmental impacts for the wastewater discharge associated with the electrodeionization process. Be mindful of the system boundaries, and include the use phase behavior if the ultrapure water consumption impacts are significant in the overall LCA. This dataset is applicable to an industrial setting in China, as indicated by the CN unit process notation.

## Review details
Inventory: The internal review was done by several iteration steps concerning raw data validation, raw data documentation, representativity, completeness and consistency of modelling with regard to ISO 14040 and 14044.

## Data sources
- Yuan, Y. et al. Deduction of carbon footprint for membrane desalination processes towards carbon neutrality: A case study on electrodeionization for ultrapure water preparation. Desalination 559, 116648 (2023).
