# Rare Earth calcination;Rare Earth;In-situ leaching;neodymium iron boron (NdFeB) magnet

Dataset: ILCD process, Unit process, single operation
Geography: NMG-CN
Reference year: 2014
Classification: Unit processes / Materials production / Metals and semimetals
Functional unit: The functional unit is a 1 kg NdFeB magnet
LCI method principle: Attributional
LCI method approaches: Allocation - market value; Allocation - mass
Generated by: Tao Wang, twang@iue.ac.cn
Owner: Tiangong LCI Data Working Group
Review: Dependent internal review by Tiangong LCI Data Working Group
Amounts: no units in this file; such an amount is in the reference unit of its flow, which a separate flow dataset defines
copyright: false
licenseType: Free of charge for all users and uses

## General comment
The NdFeB magnet produced from the rare earth elements (REEs) such as Nd (Neodymium) and Pr (Praseodymium) obtained through the calcination and in-situ leaching processes at the Bayan Obo mines in China is primarily utilized in various technology applications. These applications include permanent magnets in electric motors, generators, wind turbines, hard disk drives, and as a critical component in the manufacturing of electronics and clean energy technologies.

## Geography
Bayan Obo (China)

## Technology and included processes
The basic process for Nd and Pr production is the same at all three deposits. It is identical for Nd and Pr except for the last solvent extraction step (SX5) where both are separated.

## Reference product
- Neodymium oxide: 1.13; calculated
  Neodymium oxide. Bayan Obo: input for next process, electrolysis

## Inputs
- Exhaust gas: 749; software or database
  Natural gas. Bayan Obo: modelled with ASPEN PLUS
- Neodymium oxalate: 2.5; calculated
  Neodymium oxalate. Bayan Obo: stoichiometric calculation, humidity 35 %

## Outputs
- carbon dioxide (fossil): 2767; calculated
  Bayan Obo: calculated from stoichiometric transformation and combustion of natural gas

## Deviations from the LCI method approaches
In this study, an allocation method based on the market prices of REOs28 is considered. To estimate uncertainties that refer to the allocation method, a mass-based allocation is undertaken as a sensitivity analysis

## Use advice
When utilizing this data set for Life Cycle Assessment (LCA) of NdFeB magnets, special attention should be paid to the allocation method based on market prices of rare earth oxides applied in the study. The market price allocation should be used for results communication and comparison. Additionally, for sensitivity analysis, a mass-based allocation should also be considered to estimate uncertainties related to the allocation process. It is important for users to note that the functional unit specified in the data set is 1 kg of NdFeB magnet, and the assessment should align with this reference.

## Review details
Inventory: The internal review was done by several iteration steps concerning raw data validation, raw data documentation, representativity, completeness and consistency of modelling with regard to ISO 14040 and 14044.

## Data sources
- Marx, J., Schreiber, A., Zapp, P. & Walachowicz, F. Comparative Life Cycle Assessment of NdFeB Permanent Magnet Production from Different Rare Earth Deposits. ACS Sustainable Chem. Eng. 6, 5858–5867 (2018).
