# Electricity production ; Electricity mix ; Shanghai

Dataset: ILCD process, Unit process, single operation
Geography: SH-CN
Reference year: 2019
Classification: Unit processes / Energy carriers and technologies / Electricity
Generated by: Ruoxi Xiong, xiongrx0126@163.com
Owner: Tiangong LCI Data Working Group
Review: Dependent internal review by Tiangong LCI Data Working Group
Amounts: no units in this file; such an amount is in the reference unit of its flow, which a separate flow dataset defines
copyright: false
licenseType: Free of charge for all users and uses

## General comment
Electricity mix includes thermal, hydro, wind, nuclear and solar generation

## Technical purpose
The electricity generated through this mixed process is used for various applications in residential, commercial, and industrial sectors in Shanghai. It includes power generated by thermal (coal, natural gas), hydro, wind, nuclear, and solar energy sources.

## Reference product
- Electricity: 3.6; missing unimportant
  [{'text': '能量', 'type': 'text'}]

## Inputs
All rows: missing unimportant
- electricity for thermal power: 3.49248
  [{'text': '能量', 'type': 'text'}]
- electricity from hydroelectric power plant: 0
  [{'text': '能量', 'type': 'text'}]
- electricity for nuclear power: 0
  [{'text': '能量', 'type': 'text'}]
- electricity from wind power: 0.073116
  [{'text': '能量', 'type': 'text'}]
- electricity for solar power: 0.0344088
  [{'text': '能量', 'type': 'text'}]

## Use advice
When using this data set for Life Cycle Assessment, consider the specific mix of electricity generation sources as it affects environmental impacts differently. Allocation of burdens should be based on the actual generation mix and regional electricity grid information. Note that the mix can vary over time and may require updating for future assessments.

## Review details
Inventory: The internal review was done by several iteration steps concerning raw data validation, raw data documentation, representativity, completeness and consistency of modelling with regard to ISO 14040 and 14044.

## Data sources
- 能源统计年鉴2020
