# Remediated soil ; In situ remediation ; Electrochemical remediation ; 15-day treatment

Dataset: ILCD process, Unit process, black box
Geography: ES
Reference year: 2021
Classification: Other Services / Repair and maintenance
Functional unit: Soil polluted with 150 mg of 2,4-D per kg of dry soil remediation after 15 days of treatment.
Generated by: Yang Xintong, yangxt@caep.org.cn
Owner: Tiangong LCI Data Working Group
Review: Dependent internal review by Tiangong LCI Data Working Group
Amounts: no units in this file; such an amount is in the reference unit of its flow, which a separate flow dataset defines
copyright: false
licenseType: Free of charge for all users and uses

## General comment
An electric field is applied to electrodes placed in soil producing many chemical, electrochemical, electrokinetic and thermal changes, reduce the impact of the pollutants contained in the soil, depleting them from soil or transforming them into less hazardous species.

## Time period
Publication time of literature

## Technology and included processes
The powered directly by the grid, worked at potentiostatic mode, providing a constant potential gradient of 1.0 V cm−1 .

## Technical purpose
This process is applied for in situ soil remediation to reduce contaminants such as pesticides to a lesser degree of hazard. The electrochemical treatment is designed to treat soil polluted with organic compounds, specifically targeting remediation of soils contaminated with 2,4-D pesticide. It is optimal for scenarios where pollutants need to be depleted or chemically transformed directly within the site without excavation and transport, ensuring minimal disruption to the surrounding environment.

## Reference product
- Remediated soil: 1; measured
  Soil polluted with 150 mg of 2,4-D per kg of dry soil remediation after 15 days of treatment.

## Inputs
All rows: measured
- Graphite: 0.37
  Electrodes
- polymethyl methacrylate (PMMA) beads,polymethyl methacrylate (PMMA) beads: 2.5
  Mock-up
- Electronic Control of Safety Airbag: 0.02
  Cable
- Polyethylene: 0.05
  Electronic
- Steel: 0.7
  conditioner
- Silicon Chromium Alloy: 0.25
  Hardware
- Cable: 0.05
- contaminated soil: 1
  Soil polluted with 150 mg of 2,4-D per kg of dry soil

## Use advice
When utilizing this LCA data, consider the electrical source used for the electrochemical process, and ensure it is consistent with the original study to maintain accuracy. As the evaluation omits the reuse or recycling of electrode materials and the treatment of flushing effluent, adapt your LCA model to account for this if necessary. Additionally, since the study excludes oxidation of pesticides into CO2 and air pollution due to low evaporation, users should incorporate these considerations if these aspects are relevant to their assessment objectives. The distance between electrodes and their inert nature (graphite) should be taken into account as it influences oxidation potential and treatment efficiency. Lastly, the dataset is specific to soils contaminated with 150 mg/kg of 2,4-D; for other contaminants or concentrations, assumptions and results may vary and should be adjusted accordingly.

## Review details
Inventory: The internal review was done by several iteration steps concerning raw data validation, raw data documentation, representativity, completeness and consistency of modelling with regard to ISO 14040 and 14044.

## Data sources
- Fernández-Marchante C.M. et al. Can the green energies improve the sustainability of electrochemically-assisted soil remediation processes. Science of the Total Environment 803 (2022) 149991
