# Corrugated carton production ; corrugated cardboard ; cutting, printing, packaging

Dataset: ILCD process, Unit process, single operation
Geography: CN
Reference year: 2017
Classification: Unit processes / Materials production / Paper and cardboards
Generated by: Xiaohua Liu, lxh01311@163.com
Owner: Tiangong LCI Data Working Group
Review: Dependent internal review by Tiangong LCI Data Working Group
Amounts: no units in this file; such an amount is in the reference unit of its flow, which a separate flow dataset defines
copyright: false
licenseType: Free of charge for all users and uses

## General comment
This data set pertains to the manufacturing process of corrugated cartons, which involves the production of corrugated cardboard through cutting, printing, and packaging operations. These cartons are typically used for the packaging and transportation of goods due to their light weight, durability, and customizability. They serve a wide range of applications across various industries including electronics, food, and consumer products.

## Reference product
- corrugated board boxes: 1000; missing unimportant
  Corrugated cardboard box

## Inputs
All rows: missing unimportant
- Electricity: 120.632
- water: 290.5
  Fresh water
- corrguted cardboard: 1032.6
  Corrugated cardboard
- steel: 5.3
  Iron nails
- ink: 2.5
  printing ink

## Outputs
- chemical oxygen demand: 258; missing unimportant
  Chemical oxygen demand
- Industrial Hazardous waste: 36.6; missing unimportant
  Hazardous waste
- Industrial Hazardous waste: 36.6; missing unimportant
  Hazardous waste containing ink

## Use advice
When using this data set for Life Cycle Assessment, it is important to account for the entire life cycle of the corrugated carton including raw material acquisition (such as paper), production processes (cutting, printing, and packaging), distribution, usage, and end-of-life scenarios (recycling or disposal). Specific attention should be given to the recovery rates and recycling efficiencies if the corrugated cartons are part of a recycling program. The geographical and technological scope of the data should be considered to ensure representativeness for the intended study area. Assumptions and limitations associated with the dataset should be clearly understood and documented in the study.

## Review details
Inventory: The internal review was done by several iteration steps concerning raw data validation, raw data documentation, representativity, completeness and consistency of modelling with regard to ISO 14040 and 14044.

## Data sources
- 80万平方米纸箱生产加工项目环评报告
