# clinker production|clinker, high belite sulpho-aluminate cement clinker|mixed solid wastes

Dataset: ILCD process, 碳排放因子（LCI结果）
Geography: CN
Reference year: 2022
Classification: Materials production / Other mineralic materials
LCI method principle: Other
Generated by: Jing Guo
Amounts: no units in this file; such an amount is in the reference unit of its flow, which a separate flow dataset defines
copyright: false

## General comment
Preparation of high belite sulpho-aluminate cement clinker is carried out using solid waste such as petroleum coke desulfurization ash, fly ash, calcium carbide slag, and low-grade bauxite as raw materials.

## Model description
The functional unit is unknown and is presumed to be 1t of clinker based on literature data. The whole life cycle of cement production includes the extraction of raw materials and the entire process of producing cement from raw materials. In the process of cement production, the "two grindings and one burning" of the cement production process and the consumption of various fuels (mainly coal) directly output carbon dioxide to the environment, as well as the indirect output of carbon dioxide to the environment from the electricity consumed by cement production. Petroleum coke desulfurization ash, fly ash, and calcium carbide slag are not calculated as the carbon footprint of raw material extraction in the production of high belite sulphoaluminate cement clinker, and the main consideration here is the extraction of bauxite.

## Reference product
- clinker, high belite sulpho-aluminate cement clinker: 1000
  GF-HBSAC (GF-HBSAC)

## Inputs
All rows: article inperiodical
- Petroleum coke ash residue, desulfurized: 450
  Petroleum scorch sulfur ash. It is the product of petroleum coke produced by a Qingdao oil refinery after desulfurization.
- ash: 170
  Fly ash
- Carbide slag: 380
- bauxite: 190
  Bauxite
- hard coal: 115
  Coal consumption
- electricity, medium voltage: 342
  Power consumption

## Outputs
- carbon dioxide: 550.29; estimated
  Carbon emissions. Referring to the Greenhouse Gas Emissions Assessment Specification (PAS2050:2008) for products and services in their lifecycle and the National Greenhouse Gas Inventory Guidelines provided by the Intergovernmental Panel on Climate Change (IPCC), simplified LCA method is used to calculate the carbon emissions of the above-mentioned cement materials using carbon emission factors (the carbon emissions factors involved and the quality of carbon footprint are all based on CO2 mass).

## Cut-off and completeness
Only focus on the carbon footprint of cement clinker production.

## Data treatment and extrapolations
Carbon emission value: CO2 mass, cumulative carbon footprint data for unit processes.

## Sampling procedure
Petroleum coke desulfurization ash is the product of petroleum coke produced by Qingdao Petroleum Refinery after desulfurization.

## Data sources
- 光文涛, 隋晓萌, 王鹏刚, 田砾, & 赵明海. (2022). 采用固废制备的高贝利特硫铝酸盐水泥碳足迹核算与分析. 青岛理工大学学报, 43(4), 34–40.
