# Production stage ; Oil and gas ; Horizontal well ; Drilling

Dataset: ILCD process, Unit process, single operation
Geography: LN-CN
Reference year: 2006
Classification: Energy carriers and technologies / Crude oil based fuels
LCI method principle: Attributional
LCI method approaches: Consequential
Generated by: zimeng li, 1577978537@qq.com
Owner: Tiangong LCI Data Working Group
Review: Dependent internal review by Tiangong LCI Data Working Group
Amounts: no units in this file; such an amount is in the reference unit of its flow, which a separate flow dataset defines
copyright: false
licenseType: Free of charge for all users and uses

## General comment
The horizontal well drilling technology has been proved to be an effective method to improve oil recovery through long-term practice

## Geography
The Huanxiling Oilfield in Jianghan Oilfield is located in the southern section of the western slope of the Liaohe Depression

## Time period
On June 12,2006, new wells in huanxiling oilfield of our country began to put into production

## Technology and included processes
The design and improvement of horizontal well technology in Huanxiling Oilfield have been tailored to local conditions, drilling several horizontal wells in its main wellbore, forming branches of horizontal wells, increasing the oilfield's production efficiency, and promoting the progress and improvement of China's oil recovery technology and methods.

## Technical purpose
This industrial process involves drilling horizontal wells in an oilfield to enhance oil and gas recovery rates. It is particularly implemented in oilfields like the Huanxiling Oilfield located in the Liaohe Depression region. The horizontal drilling technique used in this process allows for drilling multiple horizontal offshoots from the main wellbore, thus increasing the contact with the oil reservoir and subsequently improving the extraction efficiency. This process is a specialized application within the petroleum industry for the development of various oil and gas reservoirs.

## Reference product
- LPG - liquefied petroleum gas: 21100; uniform; article inperiodical
  Daily oil tonnage

## Outputs
- LPG - liquefied petroleum gas: 22000; uniform; article inperiodical
  Daily liquid tonnage produced per day
- LPG - liquefied petroleum gas: 3840; uniform; article inperiodical
  Nissan Gas

## Use advice
Users of this Life Cycle Assessment data should carefully consider the unique aspects of the horizontal drilling process, including enhanced oil recovery rates and the specific geographic and technological context of the Huanxiling Oilfield, when applying this data to environmental impact assessments. Due to the tailored design and improvements in drilling technology, users should factor in the specific drilling techniques and efficiency gains when comparing with conventional vertical drilling methods. It is essential to ensure that the data is appropriately applied to similar scenarios and to account for any region-specific environmental regulations or practices that may impact the assessment.

## Review details
Inventory: The internal review was done by several iteration steps concerning raw data validation, raw data documentation, representativity, completeness and consistency of modelling with regard to ISO 14040 and 14044.

## Data sources
- 陈亮.浅析水平井钻井技术在石油开发中的应用[J].石化技术,2015,22(07):105.
