# Alumina regeneration ; Alumina for metallurgy ; Secondary aluminum slag

Dataset: ILCD process, Unit process, single operation
Geography: CN
Reference year: 2020
Classification: Unit processes / Materials production / Metals and semimetals
Generated by: Ruoxi Xiong, xiongrx0126@163.com
Owner: Tiangong LCI Data Working Group
Review: Dependent internal review by Tiangong LCI Data Working Group
Amounts: no units in this file; such an amount is in the reference unit of its flow, which a separate flow dataset defines
copyright: false
licenseType: Free of charge for all users and uses

## General comment
从二次铝渣中回收氧化铝

## Time period
Date of publication

## Technical purpose
Regenerated alumina sourced from secondary aluminum slag is primarily intended for use in the metallurgical industry. It is suitable for applications in the production of aluminum through the Hall-Héroult process, where alumina is electrolyzed in molten cryolite, and other metallurgical processes requiring high-purity alumina.

## Reference product
- aluminium oxide, metallurgical: 1000; missing unimportant
  alumina

## Inputs
All rows: missing unimportant
- electricity, high voltage, aluminium industry: 770.4
- Secondary Aluminum Dross: 1420
  Secondary aluminum dross
- sulfuric acid: 301
- Sodium hydroxide: 57
- steam, in chemical industry: 2210
  Steam
- natural gas, high pressure: 23.4
  Natural gas
- Water, unspecified natural origin: 1240

## Outputs
All rows: missing unimportant
- wastewater, average: 313
  Waste water
- Residue: 289
  Filter residue 搜不出来
- Dust: 0.0158
- ammonia: 0.0893
- chromium: 0.00132
  Chromium
- Bromine: 0.00114
- carbon monoxide (fossil),carbon monoxide (fossil): 0.86
- hydrogen fluoride: 0.00147
- hydrogen sulfide: 0.00357
- sulfur dioxide: 2.77
- Propane: 0.00199
- Xylene: 0.0916
- particles (PM2.5 - PM10): 3.74e-6
  Particulate matters 10
- particles (PM2.5): 0.99
  Particulate matters 2.5
- BOD5, Biological Oxygen Demand: 0.00139
  Biochemical oxygen demand
- chemical oxygen demand: 0.26

## Use advice
When incorporating this dataset into the life cycle assessment, ensure that the boundaries are clearly defined to include the process of obtaining alumina from secondary aluminum slag and its subsequent use in the metallurgical industry. Consider any potential environmental impact differences between primary and secondary alumina production processes. Exclusions to the system boundary, such as impacts from the operational phase or end-of-life recycling, should be justified and documented.

## Review details
Inventory: The internal review was done by several iteration steps concerning raw data validation, raw data documentation, representativity, completeness and consistency of modelling with regard to ISO 14040 and 14044.

## Data sources
- Zhu, X., Jin, Q. & Ye, Z. Life cycle environmental and economic assessment of alumina recovery from secondary aluminum dross in China. J. Clean. Prod. 277, (2020).
