# Pig production ; farmers in Penzhoushan area free-range

Dataset: ILCD process, Unit process, single operation
Geography: SC-CN
Reference year: 2006
Classification: Unit processes / Materials production / Agricultural production means
Functional unit: In this study, the functional unit (FU) was defined as "1kg pig carcass", which included skin, bone and fat. Foreign studies generally only considered lean meat, but in China's consumption mode, skin and viscera were also fully utilized as edible foods. The concept of carcass was adopted in this study. Although the bone included in this study is an inedible part, it can play a certain compensative role because it does not contain internal organs. In addition, the current data can be easily converted into carcass weight, so it is more in line with the actual situation.
Generated by: Rui Yang, 1632707028@qq.com
Owner: Tiangong LCI Data Working Group
Review: Dependent internal review by Tiangong LCI Data Working Group
Amounts: no units in this file; such an amount is in the reference unit of its flow, which a separate flow dataset defines
copyright: false
licenseType: Free of charge for all users and uses

## General comment
In Sichuan, farmers provide about 79.5% of the commercial pigs, which has an important position in Sichuan pig industry. The main scenario states and parameters were set as follows: (1) the feed was mainly composed of self-planted corn, vegetables and other agricultural by-products, supplemented with a small amount of concentrated feed (soybean meal 70%, rapeseed meal 10%), and the insufficient part was collected as feed supplement. The cultivated land area is assumed to be 0.2067 square hectares per household. (2) The average number of pigs is 3 / household, most of the varieties are soil mixed pigs (local sows and foreign breeding pigs cross, a few are Chinese local breeds) the average slaughter rate is 70%; (3) Extensive feeding and management methods, long feeding period, the average pig feeding day is about 240d, the average weight of the yard is 100kg; (4) Manure treatment and utilization: The anaerobic manure tank is used for storage,80% of which is returned to the field, 48% of which is directly returned to the field in the busy season, and the long-term storage accounts for 32% (irregular return to the field). 20% of the fecal water is leaking in the manure tank or when returning to the field, and the COD of the seepage water is 50mg/L.

## Geography
The data of fecal water quantity were obtained from a survey of typical free-range farmers in the surrounding areas of the east Sichuan, north Sichuan and southwest Sichuan basins

## Technology and included processes
Including raw material production, transportation and pig production process, but does not include pig slaughtering, processing and packaging, transportation process. Pig equipment, machinery and construction are not included, and materials less than 5% of the total or of low environmental relevance are excluded. The production, use and emission of drugs are not considered. Fishmeal and amino acid production are not considered

## Technical purpose
The pig production data is relevant for assessing the environmental impacts of free-range pig farming in the Penzhoushan area, Sichuan. It applies to traditional free-range practices where pigs are mainly nourished by on-site grown crops and agricultural by-products, and less with concentrated feeds. This data suits investigations into extensive pig breeding systems that are a major part of Sichuan's pig industry, providing transparency in nutrient production, greenhouse gas emissions, and manure management practices.

## Reference product
- pig: 1; measured
  pork

## Inputs
- Electricity: 0.329143; calculated
  情景A(农户散养）

## Outputs
- ammonia: 0.01003; measured
  Scenario A
- nitrous oxide: 0.0002736
  Scenario A
- methane (biogenic): 0.031169; calculated
  Scenario A

## Deviations from the LCI method approaches
This study combined LCA methodology and scenario analysis method to conduct systematic environmental impact assessment for three typical pig production scenarios in Sichuan, explore the specific algorithms applied to the current environmental impact assessment of pig production, and reveal the environmentally friendly and unfavorable aspects of various pig production systems and their non-renewable energy utilization efficiency. The results are helpful to the understanding of environmental impact of pig industry and provide reference for the establishment of sustainable development model of pig industry.

## Data selection and combination
In the pollution emission inventory of pig production under various scenarios, the production of fecal and urine nutrients and the production of major greenhouse gases are mainly analyzed. The environmental pollution of malodorous gases, noise and pathogens is not analyzed due to the lack of quantitative data on its potential impact on health. The waste discharge of animal production process was corrected by referring to recent research literature and combining with the data collected in the investigation, so as to reflect the actual situation in Sichuan. Among them, the emission estimate of NH3 is based on the research results of multiple literatures

## Data treatment and extrapolations
1) Due to the complexity of pig breeding patterns in different regions, it is impossible to obtain completely consistent data in similar models. Therefore, according to the main differences related to environmental pollution among relevant literatures, yearbooks and set scenarios, the average data in similar scenarios are calculated on the basis of eliminating suspicious data. 2) There are two types of waste discharge data sources in animal production process, one is directly obtained from investigation and literature, and the other is derived from literature. In order to ensure the quality of data, some actual production data which deviated from the mean value were verified by experiments and consulted by experts, and corrected by cross-reference and comparison of various literatures.

## Use advice
When using the LCA data, tailor your analysis tools to track and aggregate inputs such as self-planted crops and by-products, concentrated feed composition, cultivated land area, and livestock output measures like slaughter rate and average carcass weight. Pay special attention to the parameters of manure treatment, storage and field application practices. Ensure any modeling reflects the free-range, extensive farming style and geographical specificity of the Penzhoushan area. Emissions such as NH3 should be estimated based on multiple literature sources. Exclude considerations of pig slaughtering, processing, and transportation from this dataset, as well as minor materials with less environmental significance.

## Review details
Inventory: The internal review was done by several iteration steps concerning raw data validation, raw data documentation, representativity, completeness and consistency of modelling with regard to ISO 14040 and 14044.

## Data sources
- 白林. 四川养猪业清洁生产系统LCA及猪粪资源化利用关键技术研究. (四川农业大学, 2007).
