# Livestock and poultry breeding ; feed crop planting stage ; dairy retail

Dataset: ILCD process, Unit process, single operation
Geography: CN
Reference year: 2014
Classification: Unit processes / Materials production / Agricultural production means
Functional unit: 1kg milk
Generated by: Rui Yang, 1632707028@qq.com
Owner: Tiangong LCI Data Working Group
Review: Dependent internal review by Tiangong LCI Data Working Group
Amounts: no units in this file; such an amount is in the reference unit of its flow, which a separate flow dataset defines
copyright: false
licenseType: Free of charge for all users and uses

## General comment
The feed described in this paper is mainly energy feed, including: corn, wheat, soybean, sorghum, rice. In fact, in the process of livestock breeding, livestock feed is mainly composed of corn, wheat and soybeans. Feed crop planting stage mainly includes fertilizer production stage, corn, soybean, wheat planting stage.

## Geography
This study was conducted from 2014 to 2015, aiming at livestock and poultry feeding cycle, meat ratio, feed formula, feed consumption, coal and electricity consumption, etc. Has been to Shandong Gaomi Zhengda pig farm, Laixi City Zhishuang dairy farm, Jimo city Duan Bolan town Jiangjiapo village pig farm, Jimo City Liujiazhuang town livestock farm, Rizhao City Changling town Guanzhuang village, Juxian County Zhailihe town Dongxing Agriculture and animal husbandry company, Juxian Qiaoshan town east Chen dairy farm, Juxian Qiaoshan town Liu Jiayi water pig farm, Zhucheng Foreign Trade Co., LTD. Phoenix parents breeding duck farm, Xinjiang Fukang Hongfa Breeding professional cooperative, Jiuyun Street Town Xuhong laying Chicken cooperative, Jiuyun Street Town Liuyun Village self-contained breeding farm, China Australia Holding Group Co., LTD., Dezhou City Qingyun County Wayu Village, Shandong Province Qingyun County four Liu community beef cattle breeding base, Dezhou City Qingyun Qingnian chicken breeding base, Qingyun County Yongli Poultry layer breeding company, Qingyun County Xingchen youth chicken breeding Field research was carried out by professional breeding cooperatives, Qingyun Dongtai broiler breeding cooperatives, Hebei Yanshan Boyuan Feed Co., LTD., Yanshan Da Chinese Feed Co., LTD., Wudi Liuhe Feed Co., LTD., and China-Australia Oriental Hope Feed Co., LTD.

## Technology and included processes
In this paper, the life cycle of livestock and poultry farming is divided into six stages: feed crop planting, feed processing, livestock and poultry raising, manure treatment, slaughter and transportation. The specific life cycle process of livestock and poultry breeding is shown in Figure 2-1. Due to the lack of some data and the limitations of basic conditions, the production, transportation and use of pesticides, mulch and feed additives have not been analyzed, and the environmental impact caused by other related infrastructure construction, transport production and labor costs is no longer considered.

## Technical purpose
The described industrial process is primarily involved in the production of energy feed for livestock and poultry breeding, including dairy cattle. The crops grown for the feed mainly consist of corn, wheat, soybeans, sorghum, and rice. These crops are cultivated during the feed crop planting stage, which involves fertilizer production, as well as the actual planting and cultivation of corn, soybeans, and wheat. This feed is essential for maintaining the health and productivity of livestock in various farming operations. It is used specifically for feeding pigs, dairy cattle, ducks, laying hens, beef cattle, broilers, and laying chickens at different breeding facilities.

## Reference product
- milk: 1; measured
  作为参考定量，非实际输出

## Inputs
- Fertilizer: 0.0434672; calculated
- hard coal: 0.0025102; calculated

## Outputs
All rows: measured
- nitrous oxide: 0.0014331
  Dairy retail investors
- nitrogen, total (excluding N2): 0.0033296
  Dairy retail investors
- Nitrogen trioxide: 0.001624
  Dairy retail investors
- ammonia: 0.0038917
  Dairy retail investors
- hydrocarbons (unspecified): 2.33e-5
  Dairy retail investors
- carbon monoxide (fossil): 0.0001729
  Dairy retail investors
- sulfur dioxide: 0.0002096
  Dairy retail investors
- carbon dioxide (fossil),carbon dioxide (fossil): 0.417937
  Dairy retail investors

## Use advice
When utilizing this Life Cycle Assessment data, it is imperative to consider the specifics of the feed crop planting stage, as well as the fertilizer production involved. Users should allocate the impact of feed production accurately among the different types of livestock supported, considering differences in animal diet, regional practices, and farm scales. The data is based on field research across several provinces in China, thus, it may be necessary to adjust for regional variations and technological differences. Special attention should be paid to the energy consumption data (coal and electricity) associated with feed crop production to ensure accurate representation of the environmental impacts.

## Review details
Inventory: The internal review was done by several iteration steps concerning raw data validation, raw data documentation, representativity, completeness and consistency of modelling with regard to ISO 14040 and 14044.

## Data sources
- 周景月. 基于生命周期评价的畜禽养殖环境影响分析. (青岛科技大学, 2017).
