# Lithium concentrate production ; Lithium concentrate ; Specific concentration process ; Lithium ore, sodium carbonate, sodium hydroxide, oxidized paraffin soap

Dataset: ILCD process, Unit process, single operation
Geography: SC-CN
Classification: Materials production / Non-energetic raw materials
Functional unit: Produce 1kg of lithium concentrate
Generated by: Xin Chen, xinchen@mail.nankai.edu.cn
Owner: Tiangong LCI Data Working Group
Review: Dependent internal review by Tiangong LCI Data Working Group
Amounts: no units in this file; such an amount is in the reference unit of its flow, which a separate flow dataset defines
copyright: false
licenseType: Free of charge for all users and uses

## General comment
Lithium concentrate is an intermediate product that has undergone a particular enrichment process. It can be prepared from lithium pyroxene, lithium mica, and lithium-containing brine.

## Geography
Aba Prefecture Antai Mining Co.

## Technical purpose
The lithium concentrate produced by the specific concentration process described in this dataset is an intermediate product used in the manufacture of batteries, ceramics, glass, and lubricating greases. It is refined from sources such as lithium pyroxene, lithium mica, and lithium-rich brine. This high-quality concentrate is suitable for use in high-tech applications and energy storage solutions.

## Reference product
- Lithium concentrates: 1
  This study refers to a lithium mining enterprise in Sichuan Province with an annual production capacity of 100,000 tons of lithium concentrate(Aba Prefecture Antai Mining Co., 2014).

## Inputs
- Oxidized Paraffin Soap: 0.0132
  (same comment as for Lithium concentrates)
- Spodumene: 5.6
  (same comment as for Lithium concentrates)
- Sodium carbonate: 0.0072
  (same comment as for Lithium concentrates)
- sodium hydroxide: 0.0054
  (same comment as for Lithium concentrates)
- Electricity: 0.14832
  (same comment as for Lithium concentrates)
- diesel: 0.0003
  (same comment as for Lithium concentrates)

## Data selection and combination
This study refers to a lithium mining enterprise in Sichuan Province with an annual production capacity of 100,000 tons of lithium concentrate(Aba Prefecture Antai Mining Co., 2014).

## Use advice
Users of this Life Cycle Assessment data should note the context of production detailed in the dataset represents the production capacity of Aba Prefecture Antai Mining Co., Ltd. with an annual output of 100,000 tons of lithium concentrate. It is pertinent to adapt the data according to the specific concentration technology used, and the regional context of lithium mining enterprise. Consideration of technological applicability, and other regional or technological variances, is crucial when utilizing this data in environmental impact assessments or supply chain analysis. Users should also be aware of the system boundaries, whether to include or exclude aspects like transportation, to ensure consistency in comparative studies.

## Review details
Inventory: The internal review was done by several iteration steps concerning raw data validation, raw data documentation, representativity, completeness and consistency of modelling with regard to ISO 14040 and 14044.

## Data sources
- Feng, T., Guo, W., Li, Q., Meng, Z. & Liang, W. Life cycle assessment of lithium nickel cobalt manganese oxide batteries and lithium iron phosphate batteries for electric vehicles in China. Journal of Energy Storage52, 104767 (2022).
