# Nacelle cover manufacture ; Nacelle cover of a 1.5 MW wind turbine

Dataset: ILCD process, Unit process, single operation
Geography: NMG-CN
Reference year: 2017
Classification: Systems / Other machines
Functional unit: The functional unit is 1.5 MW wind turbine
LCI method principle: Attributional
LCI method approaches: Allocation
Generated by: Yunzhi Zhao, ll10088@163.com
Owner: Tiangong LCI Data Working Group
Review: Dependent internal review by Tiangong LCI Data Working Group
Amounts: no units in this file; such an amount is in the reference unit of its flow, which a separate flow dataset defines
copyright: false
licenseType: Free of charge for all users and uses

## General comment
The nacelle cover manufacturing process described is specifically for use in the production of 1.5 MW wind turbines, which are integral components of wind farms. These wind turbines are employed in generating renewable energy by converting wind power into electrical energy. The nacelle covers are used to protect crucial mechanical and electrical components within the turbine's nacelle from environmental elements.

## Geography
The data regarding the parameters of wind power has been collected from Wang (2012). A wind farm equipped with 33 domestic 1.5 megawatts (MW) wind turbines is regarded as a case study to analyze the environmental impact and its substitution effects. The wind farm is located in the northeast of Inner Mongolia, the province in which most of China’s wind power is installed (Xia and Song, 2017).

## Reference product
- Nacelle cover: 1; article inperiodical

## Inputs
- Fiber glass: 800; article inperiodical
  fiber glass
- Resin: 1200; article inperiodical

## Deviations from the LCI method approaches
The life cycle inventory for wind power is illustrated as follows. The production and manufacturing stage include the production of wind turbines, substations, and cables, which consume a large amount of energy and emit pollutants (Xue et al., 2015).

## Use advice
When utilizing this data set, it is suggested that users integrate the energy and material consumption, as well as emissions associated with the manufacturing stage, into the broader environmental impact assessment of the entire wind farm. Moreover, attention should be given to methodological considerations related to the end-of-life treatment of the wind turbines, including recycling and disposal of the nacelle covers, and the substitution effects should be quantitatively analyzed to understand the environmental benefits of wind power versus traditional energy sources.

## Review details
Inventory: The internal review was done by several iteration steps concerning raw data validation, raw data documentation, representativity, completeness and consistency of modelling with regard to ISO 14040 and 14044.

## Data sources
- Li, H., Jiang, H.-D., Dong, K.-Y., Wei, Y.-M. & Liao, H. A comparative analysis of the life cycle environmental emissions from wind and coal power: Evidence from China. Journal of Cleaner Production 248, 119192 (2020).
