# Sintering;Sinter;Sintering

Dataset: ILCD process, Unit process, single operation
Geography: CN
Classification: Unit processes / Materials production / Other mineralic materials
Generated by: Fuxiang, 1162850692@qq.com
Owner: Tiangong LCI Data Working Group
Review: Dependent internal review by Tiangong LCI Data Working Group
Amounts: no units in this file; such an amount is in the reference unit of its flow, which a separate flow dataset defines
copyright: false
licenseType: Free of charge for all users and uses

## General comment
This dataset describes the production of sintered ore, which is commonly used as an input for blast furnaces in the steel manufacturing process, specifically in the basic oxygen furnace (BF-BOF) pathway. The sintering process agglomerates iron ore fines into a larger, cohesive mass suitable for efficient smelting in a blast furnace. This data is relevant for the production of sintered ore in large-scale integrated steel plants in China that also include coking and electric arc furnace (EAF) operations.

## Geography
The data of the BF-BOF pathway were obtained from the large-scale integrated steel plants in China with an attached coking plant and EAF plant.

## Reference product
- Sinter: 1164.4; measured

## Inputs
All rows: measured
- Coke breeze: 48.9
- Iron ore: 237
  Iron ore (Domestic)
- Iron ore: 655.3
  Iron ore (Import)
- dolomite: 8.7
- quicklime: 49.6
  Quicklime
- freshwater,freshwater: 100
- Coke oven gas: 15.4
  COG
- Linz-Donawitz gas: 3
  LDG
- anthracite: 37.4
  Anthracite
- Electricity: 329.4

## Use advice
When utilizing this dataset in a Life Cycle Assessment, it is essential to ensure that it is applied exclusively to the production of sintered ore within the context of the BF-BOF pathway as it includes specific technological and processing characteristics of large-scale integrated steel plants with attached coking and EAF plants in China. Considerations of regional production differences, technological applicability, and updating the data to reflect changes in technology or efficiency improvements over time should be made. Inclusion or exclusion of data regarding recycling of materials should be in accordance with the goal and scope of the LCA study.

## Review details
Inventory: The internal review was done by several iteration steps concerning raw data validation, raw data documentation, representativity, completeness and consistency of modelling with regard to ISO 14040 and 14044.

## Data sources
- The carbon reduction potential of hydrogen in the low carbon transition of the iron and steel industry: The case of China
