# DRI production;DRI;H2+NG-DR

Dataset: ILCD process, Unit process, single operation
Geography: CN
Classification: Energy carriers and technologies / Other non-renewable fuels
Generated by: Fuxiang, 1162850692@qq.com
Owner: Tiangong LCI Data Working Group
Review: Dependent internal review by Tiangong LCI Data Working Group
Amounts: no units in this file; such an amount is in the reference unit of its flow, which a separate flow dataset defines
copyright: false
licenseType: Free of charge for all users and uses

## General comment
The Direct Reduced Iron (DRI) production process using a combination of hydrogen and natural gas is intended for the production of iron which is later used as a feedstock in steelmaking processes. This method is particularly relevant in operations seeking a reduction in carbon emissions, as hydrogen can potentially lower the carbon footprint compared to conventional coal-based reduction methods. This process is suitable for regions with access to natural gas and hydrogen infrastructure and is designed to meet the technical specifications required for the subsequent steel manufacturing stages.

## Geography
The average operating data of Coal-DR, NG-DR (MID), and NG-DR (ENE) demonstration projects in China are used as the benchmark for the LCI of DR routes.

## Reference product
- Direct Reduced Iron: 1000; calculated
  The average operating data of Coal-DR, NG-DR (MID), and NG-DR (ENE) demonstration projects in China are used as the benchmark for the LCI of DR routes. LCI of COG-DR and H-DR routes, which is not scaled-up in China are estimated based on Coal-DR routes combined with literature data from simulations, laboratory tests, and process modeling in

## Inputs
All rows: calculated
- Pellet: 1357.3
  (same comment as for Direct Reduced Iron)
- Water (fresh water): 900
  (same comment as for Direct Reduced Iron)
- oxygen: 25
  (same comment as for Direct Reduced Iron)
- Natural gas, at consumer EU-27: 215
  (same comment as for Direct Reduced Iron)
- hydrogen: 270
  (same comment as for Direct Reduced Iron)
- Electricity: 488.16
  (same comment as for Direct Reduced Iron)

## Outputs
- Dust (unspecified, from stack): 0.1; calculated
  (same comment as for Direct Reduced Iron)
- carbon dioxide: 235; calculated
  (same comment as for Direct Reduced Iron)

## Data treatment and extrapolations
LCI of COG-DR and H-DR routes, which is not scaled-up in China are estimated based on Coal-DR routes combined with literature data from simulations, laboratory tests, and process modeling in Table 9 [49,50]. The LCI of Coal-DR is obtai

## Use advice
When utilizing the Life Cycle Inventory (LCI) data of Direct Reduced Iron (DRI) production via hydrogen and natural gas, users should consider the regional context of the data—specifically, the average operating data from Chinese demonstration projects. As the LCI of COG-DR and H-DR routes in China are estimated rather than directly measured, they should be treated with caution. Users should carefully read literature data from simulations, laboratory tests, and process modeling (referenced as Table 9 [49,50]) to understand the assumptions and conditions of the estimation. This is particularly important when extrapolating the results to different technological or geographical contexts. Additionally, any LCA model should reflect the specific behavior of these DRI routes during the use phase and potential differences in environmental performance.

## Review details
Inventory: The internal review was done by several iteration steps concerning raw data validation, raw data documentation, representativity, completeness and consistency of modelling with regard to ISO 14040 and 14044.

## Data sources
- The carbon reduction potential of hydrogen in the low carbon transition of the iron and steel industry: The case of China
