# clinker production;clinker;new dry process, 5000 t/d

Dataset: ILCD process, Unit process, black box
Geography: GD-CN
Reference year: 2009
Classification: Materials production / Other mineralic materials
Generated by: Siqi Yang, ysqsophia@gmail.com
Owner: Tiangong LCI Data Working Group
Review: Dependent internal review by Tiangong LCI Data Working Group
Amounts: no units in this file; such an amount is in the reference unit of its flow, which a separate flow dataset defines
copyright: false
licenseType: Free of charge for all users and uses

## General comment
A new type of dry production process for cement clinker. The average records of raw material consumption and energy consumption are kept.

## Geography
Guangzhou Zhujiang Cement Plant

## Technical purpose
The process data set describes the production of clinker using a new type of dry process technology. This clinker is a key intermediate product used in the manufacture of cement. The process is utilized specifically within the Guangzhou Zhujiang Cement Plant and is optimized for the production of 5000 tons of clinker per day. The clinker produced by this process is intended for use in the construction industry as a principal component in cement, which is essential for creating concrete for buildings, infrastructure, and other construction projects.

## Model description
Each 1 ton of clinker produced is defined as 1 functional unit. The entry of raw materials into the factory is set as the starting point of the life cycle, and the end point is set as the clinker burning stage.

## Reference product
- clinker: 1000
  Clinker

## Inputs
- limestone, crushed, for mill: 1300
  Limestone
- clay: 100
  Clay
- gypsum stone (CaSO4-dihydrate): 70
  Gupsum
- iron ore: 21
  Iron ore
- hard coal; 26.3 MJ/kg: 110
  Coal
- electricity, medium voltage: 378
  Electricity

## Outputs
- carbon dioxide (fossil): 277
  CO2 (fossil fuel burning)
- carbon dioxide: 647
  CO2 (limestone decomposition)
- sulfur dioxide: 0.31
  SO2
- Nitrogen oxides: 1.88
  NOx
- particles (> PM10): 0.025
  Dust, with an unspecified particle size, is treated as PM > 10 micrometers in diameter.

## Use advice
When utilizing this data set for Life Cycle Assessment (LCA), data users should note that it pertains to the production of clinker at the Guangzhou Zhujiang Cement Plant using a new type of dry process technology. The scope of the data set begins with the entry of raw materials into the plant and ends at the stage of clinker burning. The functional unit is defined as one ton of clinker. Users should ensure that comparisons are made with processes of a similar technology level and capacity. If the data set is to be used in comparative assessments, users need to take into consideration regional differences and adjust data if necessary to reflect local conditions. This data does not include environmental impacts from upstream (extraction of raw materials) or downstream processes (grinding, distribution of cement).

## Review details
Inventory: The internal review was done by several iteration steps concerning raw data validation, raw data documentation, representativity, completeness and consistency of modelling with regard to ISO 14040 and 14044.

## Data sources
- 周奇, 黄启飞, 王琪, & 李丽. (2009). 废皮革水泥窑共处置生命周期评价. 环境科学研究, 22(4), 506–510.
