# Electricity production ; Thermal power ; Hunan

Dataset: ILCD process, Unit process, single operation
Geography: HUN-CN
Reference year: 2019
Classification: Unit processes / Energy carriers and technologies / Electricity
Generated by: Ruoxi Xiong, xiongrx0126@163.com
Owner: Tiangong LCI Data Working Group
Review: Dependent internal review by Tiangong LCI Data Working Group
Amounts: no units in this file; such an amount is in the reference unit of its flow, which a separate flow dataset defines
copyright: false
licenseType: Free of charge for all users and uses

## General comment
Thermal power generation includes seventeen fossil fuels such as raw coal, washed coal, oil and natural gas. The process only considers the direct power generation process, not the upstream raw material extraction and processing and the downstream power consumption

## Time period
Calculated based on data from the 2019 Energy Statistics Yearbook

## Technical purpose
The thermal power generation process in Hunan uses a variety of seventeen fossil fuels including raw coal, washed coal, oil, and natural gas to produce electricity. This process is used to meet the regional demand for electricity supply in Hunan, ensuring a stable energy provision for industrial, commercial, and residential usage within the province. The data set pertains strictly to the direct generation of electricity and is applicable for analyses focused on power plant operations without considering the life cycle stages of fuel procurement or end-user electricity consumption.

## Reference product
- electricity for thermal power: 3.6; calculated

## Inputs
All rows: calculated
- Raw coal: 0.36305
- Gangue, in ground: 0.0130188
- Coke oven gas: 0.004002
- blast furnace gas: 0.134496
- Converter gas: 0.015428
- Diesel: 4.592e-5
- fuel oil, unspecified: 4.155e-5
- Petroleum Coke: 0.00066696
- refinery gas: 0.00010387
- natural gas: 3.28e-5

## Outputs
- carbon dioxide (fossil): 0.822186; calculated
- sulfur dioxide: 0.000137345; calculated
- Nitrogen oxides: 0.000220667; calculated
- particles (> PM10): 2.97176e-5; calculated

## Data treatment and extrapolations
For the accounting method, please refer to the "Enterprise Greenhouse Gas Emissions Accounting Methods and Reporting Guidelines for Power Generation Facilities". Different forms of power generation and fuel consumption come from Chapter 3 (Energy Production) and Chapter 6 (Regional Energy Balance Sheet) in the "China Energy Statistical Yearbook 2020". The fuel parameters such as low calorific value and carbon content per unit calorific value used to calculate the carbon dioxide emission factor come from the "2019 China Regional Power Grid Carbon Dioxide Baseline Emission Factor Calculation Instructions OM" and the "Enterprise Greenhouse Gas Emission Accounting Method and Reporting Guide for Power Generation Facilities" 》

## Use advice
When utilizing this data set for Life Cycle Assessment (LCA) or other environmental impact studies, users should note that it covers only the direct emissions from the power generation process, specifically in thermal power plants in Hunan. Upstream processes such as fuel extraction and refinement, and downstream processes including electricity consumption, are excluded from the data set. For accurate LCA modeling, users must consider additional data for these excluded stages if they aim to assess the full life cycle of electricity generation. The greenhouse gas emissions accounting method provided in established guidelines should be adhered to. Data on different forms of power generation and fuel consumption should be sourced from relevant chapters in the 'China Energy Statistical Yearbook 2020', and emissions factors should be calculated using parameters from the prescribed documents.

## Review details
Inventory: The internal review was done by several iteration steps concerning raw data validation, raw data documentation, representativity, completeness and consistency of modelling with regard to ISO 14040 and 14044.

## Data sources
- 熊若熙. 中国电力生产和消费二氧化碳与污染物排放因子核算. (清华大学, 2023).
