# Sinter production;Sinter;Sintering(Z11)

Dataset: ILCD process, Unit process, single operation
Geography: CN
Reference year: 1998
Classification: Materials production / Other mineralic materials
Generated by: Fuxiang, 1162850692@qq.com
Owner: Tiangong LCI Data Working Group
Review: Dependent internal review by Tiangong LCI Data Working Group
Amounts: no units in this file; such an amount is in the reference unit of its flow, which a separate flow dataset defines
copyright: false
licenseType: Free of charge for all users and uses

## General comment
来自表 4-15 Z11 钢厂生产吨材环境负荷编目表

## Time period
论文提到钢铁企业环境总体数据为1998年的吨钢环境基础数据。

## Technical purpose
The sinter production process is typically utilized in the iron and steel industry for the production of sinter, which is a vital raw material used in the manufacturing of steel. It involves the agglomeration of iron ore fines along with fluxes and coke fines into larger particles suitable for the blast furnace.

## Reference product
- Sinter: 1906.46; measured

## Inputs
- Energy, geothermal, converted: 4314.28; measured
- water: 12487; measured
- Refined Iron Ore: 1456.88; measured
  Selected ore

## Outputs
All rows: measured
- Dust (unspecified, from stack): 3.233
  soot
- Dust (unspecified, from stack): 1.46
- sulfur dioxide: 1.131
- Suspended solids, unspecified: 0.636758
- chemical oxygen demand: 0.100242
- Dust (unspecified, from stack): 72.236
  dust collection
- Spoil (deposited, hibernating in ground, non elementary flow): 72.445

## Use advice
When using this sinter production data set for Life Cycle Assessment, it is important to ensure that the data corresponds accurately to the specific technological specifications and operational practices of the assessed facility. Pay attention to regional variations, temporal relevance (the data here represents the year 1998), and methodological alignment with the goal and scope of your study. Consider updating the data if necessary to reflect technological advances and current environmental performance.

## Review details
Inventory: The internal review was done by several iteration steps concerning raw data validation, raw data documentation, representativity, completeness and consistency of modelling with regard to ISO 14040 and 14044.

## Data sources
- 周和敏. 钢铁材料生产过程环境协调性评价研究. (北京工业大学, 2001).
