# Remediated groundwater; Groundwater in-situ remediation ; Enhanced bioremediation ; Heating and cooling system operation

Dataset: ILCD process, Unit process, single operation
Geography: SH-CN
Reference year: 2020
Classification: Unit processes / Other Services / Repair and maintenance
Generated by: Xiao Meng, xiaomeng@mail
Owner: Tiangong LCI Data Working Group
Review: Dependent internal review by Tiangong LCI Data Working Group
Amounts: no units in this file; such an amount is in the reference unit of its flow, which a separate flow dataset defines
copyright: false
licenseType: Free of charge for all users and uses

## General comment
CHC+ISB is used for site remediation, and during the equipment operation phase, the heating and cooling process takes place.

## Geography
The aquifer in a certain area in Shanghai, China, is uniformly contaminated with chlorinated volatile organic compounds (CVOCs), with a surface area of 20,000 m2 and a depth of 50 m, with the water table located at a depth of 30 m.

## Technical purpose
The data set represents a process for the remediation of groundwater contaminated with chlorinated volatile organic compounds (CVOCs) in an aquifer. This process involves in-situ enhanced bioremediation utilizing a heating and cooling system (CHC+ISB) to treat a uniformly contaminated area. It is applicable for environmental cleanup projects where groundwater has been impacted by industrial pollutants, specifically designed for large-scale site remediation. This data set is suitable for modelling and assessing the environmental impact of groundwater remediation processes.

## Reference product
- Remediated groundwater: 600000; measured
  surface area of 20 000 m2 (200 m × 100 m) and 50 m depth, with an aquifer depth of 30 m

## Inputs
- Groundwater after biological Medium injection: 600000; measured
- Electricity: 1.5552e8; calculated
  Heat supply by CHC = 21600000 kWh； Cold supply by CHC = 21600000 kWh Electricity
- Electricity: 18617; measured
  0.39 kWh/well, 34 wells/year and 390 years

## Use advice
Users should apply this data set exclusively for the environmental impact assessment of groundwater remediation processes involving CVOCs, considering the specific conditions of the aquifer, such as size, depth, and water table location. Care must be taken to ensure that the data's application is limited to sites with comparable contamination characteristics and remediation techniques. The inclusion of this data set in Life Cycle Assessment (LCA) studies should take into account the operational phase of the remediation equipment, and the use of heating and cooling in the bioremediation process. Specific attention should be given to modeling the energy consumption and emissions related to the operation of the heating and cooling system.

## Review details
Inventory: The internal review was done by several iteration steps concerning raw data validation, raw data documentation, representativity, completeness and consistency of modelling with regard to ISO 14040 and 14044.

## Data sources
- Ni, Z. et al. Comparative Life-Cycle Assessment of Aquifer Thermal Energy Storage Integrated with in Situ Bioremediation of Chlorinated Volatile Organic Compounds. Environ. Sci. Technol. 54, 3039–3049 (2020).
