# Electricity/electrical energy + heat energy ; Coal ; Layer burning furnace ; less than or equal to8 MW; NESPS2 / 电能/电能+热能 ; 煤炭 ; 层燃炉 ; 小于等于8兆瓦 ; 全国第二次污染普查数据

Dataset: ILCD process, Unit process, single operation
Geography: CN
Reference year: 2019
Classification: Reference Parameters / Energy carriers and technologies / Heat and steam
Generated by: The data was created by the Office of the Second National Pollution Source Census of the Ministry of Ecology and Environment, and the data was organized by the TianGong Plan team for ILCD format / 生态环境部第二次全国污染源普查工作办公室创建数据，天工计划团队常慧敏整理数据为ILCD格式
Owner: Tiangong LCI Data Working Group / 天工LCI数据工作小组
Review: Dependent internal review by Tiangong LCI Data Working Group / 天工LCI数据工作小组
Amounts: no units in this file; such an amount is in the reference unit of its flow, which a separate flow dataset defines
copyright: false
licenseType: Free of charge for all users and uses

## General comment
the Technical of end-of-pipe management technology for pollution sulfur dioxideisOthers (sodium alkali method)，Its Technical efficiency of end-of-pipe management5.1429Sar+82.86

## Technical purpose
本数据集描述了小于等于8兆瓦煤炭层燃烧炉工艺中，各种末端治理技术的技术规格和效率。该数据集中所包括的技术旨在减少颗粒物(PM2.5 - PM10)、二氧化硫、氮氧化物和汞的排放。这些技术包括各种收尘器、过滤器、脱硫方法、氮氧化物还原技术和汞去除系统。这些技术主要用于工业排放控制，以满足环境标准。

## Reference product
- Coal: 1000; input; calculated
  源文件中描述为为煤炭，此处对其进行了匹配工作，将其匹配到LCAflow库里面相最符合的流，污染物指标备注为工业废气量（烟煤）
## Outputs
All rows: calculated
- volatile organic compound: 0
  the Technical of end-of-pipe management technology for pollution volatile organic compoundis/
  污染物指标挥发性有机物的末端治理技术是/。原文件中描述污染物类别为废气，污染物指标为挥发性有机物，此处对其进行了匹配工作，将其匹配到LCAflow库里面相最符合的流，污染物指标备注为挥发性有机物
- Nitrogen oxides: 0.267
  the Technical of end-of-pipe management technology for pollution Nitrogen oxidesisHigh-efficiency SCR③，Its Technical efficiency of end-of-pipe management70
  污染物指标氮氧化物（SNCR，煤炭干燥无灰基挥发分>37%）的末端治理技术是高效选择性催化还原法（SCR）③，其效率为70，末端治理设施实际运行率（k值）计算公式为脱硝设施年实际运行小时数/机组年实际运行小时数，③高效氮氧化物末端治理技术：采取高效低氮燃烧技术、增设脱硝催化剂层数等措施，满足《燃煤电厂超低排放烟气治理工程技术规范》（HJ2053-2114）相关
  要求。。原文件中描述污染物类别为废气，污染物指标为氮氧化物（SNCR，煤炭干燥无灰基挥发分>37%），此处对其进行了匹配工作，将其匹配到LCAflow库里面相最符合的流，污染物指标备注为氮氧化物（SNCR，煤炭干燥无灰基挥发分>37%）
- Nitrogen oxides: 0.3115
  the Technical of end-of-pipe management technology for pollution Nitrogen oxidesisSCR，Its Technical efficiency of end-of-pipe management65
  污染物指标氮氧化物（SNCR，煤炭干燥无灰基挥发分>37%）的末端治理技术是选择性催化还原法（SCR），其效率为65，末端治理设施实际运行率（k值）计算公式为脱硝设施年实际运行小时数/机组年实际运行小时数。原文件中描述污染物类别为废气，污染物指标为氮氧化物（SNCR，煤炭干燥无灰基挥发分>37%），此处对其进行了匹配工作，将其匹配到LCAflow库里面相最符合的流，污染物指标备注为氮氧化物（SNCR，煤炭干燥无灰基挥发分>37%）
- Nitrogen oxides: 0.35
  the Technical of end-of-pipe management technology for pollution Nitrogen oxidesisHigh-efficiency SCR③，Its Technical efficiency of end-of-pipe management80
  污染物指标氮氧化物，煤炭干燥无灰基挥发分>37%的末端治理技术是高效选择性催化还原法（SCR）③，其效率为80，末端治理设施实际运行率（k值）计算公式为脱硝设施年实际运行小时数/机组年实际运行小时数，③高效氮氧化物末端治理技术：采取高效低氮燃烧技术、增设脱硝催化剂层数等措施，满足《燃煤电厂超低排放烟气治理工程技术规范》（HJ2053-2110）相关
  要求。。原文件中描述污染物类别为废气，污染物指标为氮氧化物，煤炭干燥无灰基挥发分>37%，此处对其进行了匹配工作，将其匹配到LCAflow库里面相最符合的流，污染物指标备注为氮氧化物，煤炭干燥无灰基挥发分>37%
- Nitrogen oxides: 0.4375
  the Technical of end-of-pipe management technology for pollution Nitrogen oxidesisSCR，Its Technical efficiency of end-of-pipe management75
  污染物指标氮氧化物，煤炭干燥无灰基挥发分>37%的末端治理技术是选择性催化还原法（SCR），其效率为75，末端治理设施实际运行率（k值）计算公式为脱硝设施年实际运行小时数/机组年实际运行小时数。原文件中描述污染物类别为废气，污染物指标为氮氧化物，煤炭干燥无灰基挥发分>37%，此处对其进行了匹配工作，将其匹配到LCAflow库里面相最符合的流，污染物指标备注为氮氧化物，煤炭干燥无灰基挥发分>37%
- Nitrogen oxides: 0.456
  the Technical of end-of-pipe management technology for pollution Nitrogen oxidesisHigh-efficiency SCR③，Its Technical efficiency of end-of-pipe management70
  污染物指标氮氧化物（SNCR，20%小于煤炭干燥无灰基挥发分小于等于37%）的末端治理技术是高效选择性催化还原法（SCR）③，其效率为70，末端治理设施实际运行率（k值）计算公式为脱硝设施年实际运行小时数/机组年实际运行小时数，③高效氮氧化物末端治理技术：采取高效低氮燃烧技术、增设脱硝催化剂层数等措施，满足《燃煤电厂超低排放烟气治理工程技术规范》（HJ2053-2113）相关
  要求。。原文件中描述污染物类别为废气，污染物指标为氮氧化物（SNCR，20%小于煤炭干燥无灰基挥发分小于等于37%），此处对其进行了匹配工作，将其匹配到LCAflow库里面相最符合的流，污染物指标备注为氮氧化物（SNCR，20%小于煤炭干燥无灰基挥发分小于等于37%）
- Nitrogen oxides: 0.5124
  the Technical of end-of-pipe management technology for pollution Nitrogen oxidesisHigh-efficiency SCR③，Its Technical efficiency of end-of-pipe management72
  污染物指标氮氧化物（SNCR，煤炭干燥无灰基挥发分小于等于10%）的末端治理技术是高效选择性催化还原法（SCR）③，其效率为72，末端治理设施实际运行率（k值）计算公式为脱硝设施年实际运行小时数/机组年实际运行小时数，③高效氮氧化物末端治理技术：采取高效低氮燃烧技术、增设脱硝催化剂层数等措施，满足《燃煤电厂超低排放烟气治理工程技术规范》（HJ2053-2111）相关
  要求。。原文件中描述污染物类别为废气，污染物指标为氮氧化物（SNCR，煤炭干燥无灰基挥发分小于等于10%），此处对其进行了匹配工作，将其匹配到LCAflow库里面相最符合的流，污染物指标备注为氮氧化物（SNCR，煤炭干燥无灰基挥发分小于等于10%）
- Nitrogen oxides: 0.5124
  the Technical of end-of-pipe management technology for pollution Nitrogen oxidesisHigh-efficiency SCR③，Its Technical efficiency of end-of-pipe management72
  污染物指标氮氧化物（SNCR，10%小于煤炭干燥无灰基挥发分小于等于20%）的末端治理技术是高效选择性催化还原法（SCR）③，其效率为72，末端治理设施实际运行率（k值）计算公式为脱硝设施年实际运行小时数/机组年实际运行小时数，③高效氮氧化物末端治理技术：采取高效低氮燃烧技术、增设脱硝催化剂层数等措施，满足《燃煤电厂超低排放烟气治理工程技术规范》（HJ2053-2112）相关
  要求。。原文件中描述污染物类别为废气，污染物指标为氮氧化物（SNCR，10%小于煤炭干燥无灰基挥发分小于等于20%），此处对其进行了匹配工作，将其匹配到LCAflow库里面相最符合的流，污染物指标备注为氮氧化物（SNCR，10%小于煤炭干燥无灰基挥发分小于等于20%）
- Nitrogen oxides: 0.532
  the Technical of end-of-pipe management technology for pollution Nitrogen oxidesisSCR，Its Technical efficiency of end-of-pipe management65
  污染物指标氮氧化物（SNCR，20%小于煤炭干燥无灰基挥发分小于等于37%）的末端治理技术是选择性催化还原法（SCR），其效率为65，末端治理设施实际运行率（k值）计算公式为脱硝设施年实际运行小时数/机组年实际运行小时数。原文件中描述污染物类别为废气，污染物指标为氮氧化物（SNCR，20%小于煤炭干燥无灰基挥发分小于等于37%），此处对其进行了匹配工作，将其匹配到LCAflow库里面相最符合的流，污染物指标备注为氮氧化物（SNCR，20%小于煤炭干燥无灰基挥发分小于等于37%）
- Nitrogen oxides: 0.612
  the Technical of end-of-pipe management technology for pollution Nitrogen oxidesisHigh-efficiency SCR③，Its Technical efficiency of end-of-pipe management80
  污染物指标氮氧化物，煤炭干燥无灰基挥发分小于等于10%的末端治理技术是高效选择性催化还原法（SCR）③，其效率为80，末端治理设施实际运行率（k值）计算公式为脱硝设施年实际运行小时数/机组年实际运行小时数，③高效氮氧化物末端治理技术：采取高效低氮燃烧技术、增设脱硝催化剂层数等措施，满足《燃煤电厂超低排放烟气治理工程技术规范》（HJ2053-2107）相关
  要求。。原文件中描述污染物类别为废气，污染物指标为氮氧化物，煤炭干燥无灰基挥发分小于等于10%，此处对其进行了匹配工作，将其匹配到LCAflow库里面相最符合的流，污染物指标备注为氮氧化物，煤炭干燥无灰基挥发分小于等于10%
- Nitrogen oxides: 0.612
  the Technical of end-of-pipe management technology for pollution Nitrogen oxidesisHigh-efficiency SCR③，Its Technical efficiency of end-of-pipe management80
  污染物指标氮氧化物，10%小于煤炭干燥无灰基挥发分小于等于20%的末端治理技术是高效选择性催化还原法（SCR）③，其效率为80，末端治理设施实际运行率（k值）计算公式为脱硝设施年实际运行小时数/机组年实际运行小时数，③高效氮氧化物末端治理技术：采取高效低氮燃烧技术、增设脱硝催化剂层数等措施，满足《燃煤电厂超低排放烟气治理工程技术规范》（HJ2053-2108）相关
  要求。。原文件中描述污染物类别为废气，污染物指标为氮氧化物，10%小于煤炭干燥无灰基挥发分小于等于20%，此处对其进行了匹配工作，将其匹配到LCAflow库里面相最符合的流，污染物指标备注为氮氧化物，10%小于煤炭干燥无灰基挥发分小于等于20%
- Nitrogen oxides: 0.618
  the Technical of end-of-pipe management technology for pollution Nitrogen oxidesisHigh-efficiency SCR③，Its Technical efficiency of end-of-pipe management80
  污染物指标氮氧化物，20%小于煤炭干燥无灰基挥发分小于等于37%的末端治理技术是高效选择性催化还原法（SCR）③，其效率为80，末端治理设施实际运行率（k值）计算公式为脱硝设施年实际运行小时数/机组年实际运行小时数，③高效氮氧化物末端治理技术：采取高效低氮燃烧技术、增设脱硝催化剂层数等措施，满足《燃煤电厂超低排放烟气治理工程技术规范》（HJ2053-2109）相关
  要求。。原文件中描述污染物类别为废气，污染物指标为氮氧化物，20%小于煤炭干燥无灰基挥发分小于等于37%，此处对其进行了匹配工作，将其匹配到LCAflow库里面相最符合的流，污染物指标备注为氮氧化物，20%小于煤炭干燥无灰基挥发分小于等于37%
- Nitrogen oxides: 0.6405
  the Technical of end-of-pipe management technology for pollution Nitrogen oxidesisSCR，Its Technical efficiency of end-of-pipe management65
  污染物指标氮氧化物（SNCR，煤炭干燥无灰基挥发分小于等于10%）的末端治理技术是选择性催化还原法（SCR），其效率为65，末端治理设施实际运行率（k值）计算公式为脱硝设施年实际运行小时数/机组年实际运行小时数。原文件中描述污染物类别为废气，污染物指标为氮氧化物（SNCR，煤炭干燥无灰基挥发分小于等于10%），此处对其进行了匹配工作，将其匹配到LCAflow库里面相最符合的流，污染物指标备注为氮氧化物（SNCR，煤炭干燥无灰基挥发分小于等于10%）
- Nitrogen oxides: 0.6405
  the Technical of end-of-pipe management technology for pollution Nitrogen oxidesisSCR，Its Technical efficiency of end-of-pipe management65
  污染物指标氮氧化物（SNCR，10%小于煤炭干燥无灰基挥发分小于等于20%）的末端治理技术是选择性催化还原法（SCR），其效率为65，末端治理设施实际运行率（k值）计算公式为脱硝设施年实际运行小时数/机组年实际运行小时数。原文件中描述污染物类别为废气，污染物指标为氮氧化物（SNCR，10%小于煤炭干燥无灰基挥发分小于等于20%），此处对其进行了匹配工作，将其匹配到LCAflow库里面相最符合的流，污染物指标备注为氮氧化物（SNCR，10%小于煤炭干燥无灰基挥发分小于等于20%）
- Nitrogen oxides: 0.765
  the Technical of end-of-pipe management technology for pollution Nitrogen oxidesisSCR，Its Technical efficiency of end-of-pipe management75
  污染物指标氮氧化物，煤炭干燥无灰基挥发分小于等于10%的末端治理技术是选择性催化还原法（SCR），其效率为75，末端治理设施实际运行率（k值）计算公式为脱硝设施年实际运行小时数/机组年实际运行小时数。原文件中描述污染物类别为废气，污染物指标为氮氧化物，煤炭干燥无灰基挥发分小于等于10%，此处对其进行了匹配工作，将其匹配到LCAflow库里面相最符合的流，污染物指标备注为氮氧化物，煤炭干燥无灰基挥发分小于等于10%
- Nitrogen oxides: 0.765
  the Technical of end-of-pipe management technology for pollution Nitrogen oxidesisSCR，Its Technical efficiency of end-of-pipe management75
  污染物指标氮氧化物，10%小于煤炭干燥无灰基挥发分小于等于20%的末端治理技术是选择性催化还原法（SCR），其效率为75，末端治理设施实际运行率（k值）计算公式为脱硝设施年实际运行小时数/机组年实际运行小时数。原文件中描述污染物类别为废气，污染物指标为氮氧化物，10%小于煤炭干燥无灰基挥发分小于等于20%，此处对其进行了匹配工作，将其匹配到LCAflow库里面相最符合的流，污染物指标备注为氮氧化物，10%小于煤炭干燥无灰基挥发分小于等于20%
- Nitrogen oxides: 0.7725
  the Technical of end-of-pipe management technology for pollution Nitrogen oxidesisSCR，Its Technical efficiency of end-of-pipe management75
  污染物指标氮氧化物，20%小于煤炭干燥无灰基挥发分小于等于37%的末端治理技术是选择性催化还原法（SCR），其效率为75，末端治理设施实际运行率（k值）计算公式为脱硝设施年实际运行小时数/机组年实际运行小时数。原文件中描述污染物类别为废气，污染物指标为氮氧化物，20%小于煤炭干燥无灰基挥发分小于等于37%，此处对其进行了匹配工作，将其匹配到LCAflow库里面相最符合的流，污染物指标备注为氮氧化物，20%小于煤炭干燥无灰基挥发分小于等于37%
- Nitrogen oxides: 0.89
  the Technical of end-of-pipe management technology for pollution Nitrogen oxidesisOthers (direct discharge)
  污染物指标氮氧化物（SNCR，煤炭干燥无灰基挥发分>37%）的末端治理技术是其他（直排），末端治理设施实际运行率（k值）计算公式为脱硝设施年实际运行小时数/机组年实际运行小时数。原文件中描述污染物类别为废气，污染物指标为氮氧化物（SNCR，煤炭干燥无灰基挥发分>37%），此处对其进行了匹配工作，将其匹配到LCAflow库里面相最符合的流，污染物指标备注为氮氧化物（SNCR，煤炭干燥无灰基挥发分>37%）
- Nitrogen oxides: 1.52
  the Technical of end-of-pipe management technology for pollution Nitrogen oxidesisOthers (direct discharge)
  污染物指标氮氧化物（SNCR，20%小于煤炭干燥无灰基挥发分小于等于37%）的末端治理技术是其他（直排），末端治理设施实际运行率（k值）计算公式为脱硝设施年实际运行小时数/机组年实际运行小时数。原文件中描述污染物类别为废气，污染物指标为氮氧化物（SNCR，20%小于煤炭干燥无灰基挥发分小于等于37%），此处对其进行了匹配工作，将其匹配到LCAflow库里面相最符合的流，污染物指标备注为氮氧化物（SNCR，20%小于煤炭干燥无灰基挥发分小于等于37%）
- Nitrogen oxides: 1.75
  the Technical of end-of-pipe management technology for pollution Nitrogen oxidesisOthers (direct discharge)
  污染物指标氮氧化物，煤炭干燥无灰基挥发分>37%的末端治理技术是其他（直排），末端治理设施实际运行率（k值）计算公式为脱硝设施年实际运行小时数/机组年实际运行小时数。原文件中描述污染物类别为废气，污染物指标为氮氧化物，煤炭干燥无灰基挥发分>37%，此处对其进行了匹配工作，将其匹配到LCAflow库里面相最符合的流，污染物指标备注为氮氧化物，煤炭干燥无灰基挥发分>37%
- Nitrogen oxides: 1.83
  the Technical of end-of-pipe management technology for pollution Nitrogen oxidesisOthers (direct discharge)
  污染物指标氮氧化物（SNCR，煤炭干燥无灰基挥发分小于等于10%）的末端治理技术是其他（直排），末端治理设施实际运行率（k值）计算公式为脱硝设施年实际运行小时数/机组年实际运行小时数。原文件中描述污染物类别为废气，污染物指标为氮氧化物（SNCR，煤炭干燥无灰基挥发分小于等于10%），此处对其进行了匹配工作，将其匹配到LCAflow库里面相最符合的流，污染物指标备注为氮氧化物（SNCR，煤炭干燥无灰基挥发分小于等于10%）
- Nitrogen oxides: 1.83
  the Technical of end-of-pipe management technology for pollution Nitrogen oxidesisOthers (direct discharge)
  污染物指标氮氧化物（SNCR，10%小于煤炭干燥无灰基挥发分小于等于20%）的末端治理技术是其他（直排），末端治理设施实际运行率（k值）计算公式为脱硝设施年实际运行小时数/机组年实际运行小时数。原文件中描述污染物类别为废气，污染物指标为氮氧化物（SNCR，10%小于煤炭干燥无灰基挥发分小于等于20%），此处对其进行了匹配工作，将其匹配到LCAflow库里面相最符合的流，污染物指标备注为氮氧化物（SNCR，10%小于煤炭干燥无灰基挥发分小于等于20%）
- Nitrogen oxides: 3.06
  the Technical of end-of-pipe management technology for pollution Nitrogen oxidesisOthers (direct discharge)
  污染物指标氮氧化物，煤炭干燥无灰基挥发分小于等于10%的末端治理技术是其他（直排），末端治理设施实际运行率（k值）计算公式为脱硝设施年实际运行小时数/机组年实际运行小时数。原文件中描述污染物类别为废气，污染物指标为氮氧化物，煤炭干燥无灰基挥发分小于等于10%，此处对其进行了匹配工作，将其匹配到LCAflow库里面相最符合的流，污染物指标备注为氮氧化物，煤炭干燥无灰基挥发分小于等于10%
- Nitrogen oxides: 3.06
  the Technical of end-of-pipe management technology for pollution Nitrogen oxidesisOthers (direct discharge)
  污染物指标氮氧化物，10%小于煤炭干燥无灰基挥发分小于等于20%的末端治理技术是其他（直排），末端治理设施实际运行率（k值）计算公式为脱硝设施年实际运行小时数/机组年实际运行小时数。原文件中描述污染物类别为废气，污染物指标为氮氧化物，10%小于煤炭干燥无灰基挥发分小于等于20%，此处对其进行了匹配工作，将其匹配到LCAflow库里面相最符合的流，污染物指标备注为氮氧化物，10%小于煤炭干燥无灰基挥发分小于等于20%
- Nitrogen oxides: 3.09
  the Technical of end-of-pipe management technology for pollution Nitrogen oxidesisOthers (direct discharge)
  污染物指标氮氧化物，20%小于煤炭干燥无灰基挥发分小于等于37%的末端治理技术是其他（直排），末端治理设施实际运行率（k值）计算公式为脱硝设施年实际运行小时数/机组年实际运行小时数。原文件中描述污染物类别为废气，污染物指标为氮氧化物，20%小于煤炭干燥无灰基挥发分小于等于37%，此处对其进行了匹配工作，将其匹配到LCAflow库里面相最符合的流，污染物指标备注为氮氧化物，20%小于煤炭干燥无灰基挥发分小于等于37%
- Exhaust gas: 5915
  the Technical of end-of-pipe management technology for pollution Exhaust gasisOthers (direct discharge)
  污染物指标工业废气量（褐煤）的末端治理技术是其他（直排）。原文件中描述污染物类别为废气，污染物指标为工业废气量（褐煤），此处对其进行了匹配工作，将其匹配到LCAflow库里面相最符合的流，污染物指标备注为工业废气量（褐煤）
- Exhaust gas: 10197
  the Technical of end-of-pipe management technology for pollution Exhaust gasisOthers (direct discharge)
  污染物指标工业废气量（无烟煤）的末端治理技术是其他（直排）。原文件中描述污染物类别为废气，污染物指标为工业废气量（无烟煤），此处对其进行了匹配工作，将其匹配到LCAflow库里面相最符合的流，污染物指标备注为工业废气量（无烟煤）
- Exhaust gas: 10290
  the Technical of end-of-pipe management technology for pollution Exhaust gasisOthers (direct discharge)
  污染物指标工业废气量（烟煤）的末端治理技术是其他（直排）。原文件中描述污染物类别为废气，污染物指标为工业废气量（烟煤），此处对其进行了匹配工作，将其匹配到LCAflow库里面相最符合的流，污染物指标备注为工业废气量（烟煤）
- mercury: 0
  the Technical of end-of-pipe management technology for pollution mercuryisSynergistic mercury removal，Its Technical efficiency of end-of-pipe management25.73MHgar+84.12.The original article describes the pollution production coefficients as 0.00095MHgar。Please revise the corresponding emissions after accounting for them according to the notes.。.The original article describes the pollution production coefficients as 0.00095MHgar. Please revise the corresponding emissions after accounting for them according to the notes.
  污染物指标汞及其化合物的末端治理技术是协同脱汞，其效率为25.73MHgar+84.12，末端治理设施实际运行率（k值）计算公式为取该机组除尘、脱硝脱硫K的最小值。原文件中描述污染物类别为废气，污染物指标为汞及其化合物，此处对其进行了匹配工作，将其匹配到LCAflow库里面相最符合的流，污染物指标备注为汞及其化合物原文描述的产污系数为 0.00095MHgar。请根据备注自行核算后修改对应的排放量。
- particles (PM2.5 - PM10): 0
  the Technical of end-of-pipe management technology for pollution particles (PM2.5 - PM10)isBag filter + others (wet desulfurization synergy) + others (wet electrostatic precipitator)，Its Technical efficiency of end-of-pipe management0.00352Aar+99.848.The original article describes the pollution production coefficients as 1.25Aar。Please revise the corresponding emissions after accounting for them according to the notes.。.The original article describes the pollution production coefficients as 1.25Aar. Please revise the corresponding emissions after accounting for them according to the notes.
  污染物指标颗粒物（烟煤）的末端治理技术是袋式除尘+其他（湿法脱硫协同）+其他（湿式电除尘），其效率为0.00352Aar+99.848，末端治理设施实际运行率（k值）计算公式为除尘设施年实际运行小时数/机组年实际运行小时数。原文件中描述污染物类别为废气，污染物指标为颗粒物（烟煤），此处对其进行了匹配工作，将其匹配到LCAflow库里面相最符合的流，污染物指标备注为颗粒物（烟煤）原文描述的产污系数为 1.25Aar。请根据备注自行核算后修改对应的排放量。
- particles (PM2.5 - PM10): 0
  the Technical of end-of-pipe management technology for pollution particles (PM2.5 - PM10)isBag filter + others (wet desulfurization synergy)，Its Technical efficiency of end-of-pipe management0.0176Aar+99.24.The original article describes the pollution production coefficients as 1.25Aar。Please revise the corresponding emissions after accounting for them according to the notes.。.The original article describes the pollution production coefficients as 1.25Aar. Please revise the corresponding emissions after accounting for them according to the notes.
  污染物指标颗粒物（烟煤）的末端治理技术是袋式除尘+其他（湿法脱硫协同），其效率为0.0176Aar+99.24，末端治理设施实际运行率（k值）计算公式为除尘设施年实际运行小时数/机组年实际运行小时数。原文件中描述污染物类别为废气，污染物指标为颗粒物（烟煤），此处对其进行了匹配工作，将其匹配到LCAflow库里面相最符合的流，污染物指标备注为颗粒物（烟煤）原文描述的产污系数为 1.25Aar。请根据备注自行核算后修改对应的排放量。
- particles (PM2.5 - PM10): 0
  the Technical of end-of-pipe management technology for pollution particles (PM2.5 - PM10)isBag filter + others (wet electrostatic precipitator)，Its Technical efficiency of end-of-pipe management0.0088Aar+99.62.The original article describes the pollution production coefficients as 1.25Aar。Please revise the corresponding emissions after accounting for them according to the notes.。.The original article describes the pollution production coefficients as 1.25Aar. Please revise the corresponding emissions after accounting for them according to the notes.
  污染物指标颗粒物（烟煤）的末端治理技术是袋式除尘+其他（湿式电除尘），其效率为0.0088Aar+99.62，末端治理设施实际运行率（k值）计算公式为除尘设施年实际运行小时数/机组年实际运行小时数。原文件中描述污染物类别为废气，污染物指标为颗粒物（烟煤），此处对其进行了匹配工作，将其匹配到LCAflow库里面相最符合的流，污染物指标备注为颗粒物（烟煤）原文描述的产污系数为 1.25Aar。请根据备注自行核算后修改对应的排放量。
- particles (PM2.5 - PM10): 0
  the Technical of end-of-pipe management technology for pollution particles (PM2.5 - PM10)isBag filter，Its Technical efficiency of end-of-pipe management0.044Aar+98.1.The original article describes the pollution production coefficients as 1.25Aar。Please revise the corresponding emissions after accounting for them according to the notes.。.The original article describes the pollution production coefficients as 1.25Aar. Please revise the corresponding emissions after accounting for them according to the notes.
  污染物指标颗粒物（烟煤）的末端治理技术是袋式除尘，其效率为0.044Aar+98.1，末端治理设施实际运行率（k值）计算公式为除尘设施年实际运行小时数/机组年实际运行小时数。原文件中描述污染物类别为废气，污染物指标为颗粒物（烟煤），此处对其进行了匹配工作，将其匹配到LCAflow库里面相最符合的流，污染物指标备注为颗粒物（烟煤）原文描述的产污系数为 1.25Aar。请根据备注自行核算后修改对应的排放量。
- particles (PM2.5 - PM10): 0
  the Technical of end-of-pipe management technology for pollution particles (PM2.5 - PM10)isBag filter，Its Technical efficiency of end-of-pipe management0.044Aar+98.1.The original article describes the pollution production coefficients as 1.84Aar。Please revise the corresponding emissions after accounting for them according to the notes.。.The original article describes the pollution production coefficients as 1.84Aar. Please revise the corresponding emissions after accounting for them according to the notes.
  污染物指标颗粒物（无烟煤）的末端治理技术是袋式除尘，其效率为0.044Aar+98.1，末端治理设施实际运行率（k值）计算公式为除尘设施年实际运行小时数/机组年实际运行小时数。原文件中描述污染物类别为废气，污染物指标为颗粒物（无烟煤），此处对其进行了匹配工作，将其匹配到LCAflow库里面相最符合的流，污染物指标备注为颗粒物（无烟煤）原文描述的产污系数为 1.84Aar。请根据备注自行核算后修改对应的排放量。
- particles (PM2.5 - PM10): 0
  the Technical of end-of-pipe management technology for pollution particles (PM2.5 - PM10)isBag filter，Its Technical efficiency of end-of-pipe management0.044Aar+98.1.The original article describes the pollution production coefficients as 1.25Aar。Please revise the corresponding emissions after accounting for them according to the notes.。.The original article describes the pollution production coefficients as 1.25Aar. Please revise the corresponding emissions after accounting for them according to the notes.
  污染物指标颗粒物（褐煤）的末端治理技术是袋式除尘，其效率为0.044Aar+98.1，末端治理设施实际运行率（k值）计算公式为除尘设施年实际运行小时数/机组年实际运行小时数。原文件中描述污染物类别为废气，污染物指标为颗粒物（褐煤），此处对其进行了匹配工作，将其匹配到LCAflow库里面相最符合的流，污染物指标备注为颗粒物（褐煤）原文描述的产污系数为 1.25Aar。请根据备注自行核算后修改对应的排放量。
- particles (PM2.5 - PM10): 0
  the Technical of end-of-pipe management technology for pollution particles (PM2.5 - PM10)isElectric-bag composite precipitator + others (wet desulfurization synergy) + others (wet electrostatic precipitator)，Its Technical efficiency of end-of-pipe management0.00372Aar+99.84.The original article describes the pollution production coefficients as 1.25Aar。Please revise the corresponding emissions after accounting for them according to the notes.。.The original article describes the pollution production coefficients as 1.25Aar. Please revise the corresponding emissions after accounting for them according to the notes.
  污染物指标颗粒物（烟煤）的末端治理技术是电袋组合+其他（湿法脱硫协同）+其他（湿式电除尘），其效率为0.00372Aar+99.84，末端治理设施实际运行率（k值）计算公式为除尘设施年实际运行小时数/机组年实际运行小时数。原文件中描述污染物类别为废气，污染物指标为颗粒物（烟煤），此处对其进行了匹配工作，将其匹配到LCAflow库里面相最符合的流，污染物指标备注为颗粒物（烟煤）原文描述的产污系数为 1.25Aar。请根据备注自行核算后修改对应的排放量。
- particles (PM2.5 - PM10): 0
  the Technical of end-of-pipe management technology for pollution particles (PM2.5 - PM10)isElectric-bag composite precipitator + others (wet desulfurization synergy)，Its Technical efficiency of end-of-pipe management0.0186Aar+99.20.The original article describes the pollution production coefficients as 1.25Aar。Please revise the corresponding emissions after accounting for them according to the notes.。.The original article describes the pollution production coefficients as 1.25Aar. Please revise the corresponding emissions after accounting for them according to the notes.
  污染物指标颗粒物（烟煤）的末端治理技术是电袋组合+其他（湿法脱硫协同），其效率为0.0186Aar+99.20，末端治理设施实际运行率（k值）计算公式为除尘设施年实际运行小时数/机组年实际运行小时数。原文件中描述污染物类别为废气，污染物指标为颗粒物（烟煤），此处对其进行了匹配工作，将其匹配到LCAflow库里面相最符合的流，污染物指标备注为颗粒物（烟煤）原文描述的产污系数为 1.25Aar。请根据备注自行核算后修改对应的排放量。
- particles (PM2.5 - PM10): 0
  the Technical of end-of-pipe management technology for pollution particles (PM2.5 - PM10)isElectric-bag composite precipitator + others (wet electrostatic precipitator)，Its Technical efficiency of end-of-pipe management0.0093Aar+99.60.The original article describes the pollution production coefficients as 1.25Aar。Please revise the corresponding emissions after accounting for them according to the notes.。.The original article describes the pollution production coefficients as 1.25Aar. Please revise the corresponding emissions after accounting for them according to the notes.
  污染物指标颗粒物（烟煤）的末端治理技术是电袋组合+其他（湿式电除尘），其效率为0.0093Aar+99.60，末端治理设施实际运行率（k值）计算公式为除尘设施年实际运行小时数/机组年实际运行小时数。原文件中描述污染物类别为废气，污染物指标为颗粒物（烟煤），此处对其进行了匹配工作，将其匹配到LCAflow库里面相最符合的流，污染物指标备注为颗粒物（烟煤）原文描述的产污系数为 1.25Aar。请根据备注自行核算后修改对应的排放量。
- particles (PM2.5 - PM10): 0
  the Technical of end-of-pipe management technology for pollution particles (PM2.5 - PM10)isElectric-bag composite precipitator，Its Technical efficiency of end-of-pipe management0.0465Aar+98.0.The original article describes the pollution production coefficients as 1.25Aar。Please revise the corresponding emissions after accounting for them according to the notes.。.The original article describes the pollution production coefficients as 1.25Aar. Please revise the corresponding emissions after accounting for them according to the notes.
  污染物指标颗粒物（烟煤）的末端治理技术是电袋组合，其效率为0.0465Aar+98.0，末端治理设施实际运行率（k值）计算公式为除尘设施年实际运行小时数/机组年实际运行小时数。原文件中描述污染物类别为废气，污染物指标为颗粒物（烟煤），此处对其进行了匹配工作，将其匹配到LCAflow库里面相最符合的流，污染物指标备注为颗粒物（烟煤）原文描述的产污系数为 1.25Aar。请根据备注自行核算后修改对应的排放量。
- particles (PM2.5 - PM10): 0
  the Technical of end-of-pipe management technology for pollution particles (PM2.5 - PM10)isElectric-bag composite precipitator，Its Technical efficiency of end-of-pipe management0.0465Aar+98.0.The original article describes the pollution production coefficients as 1.84Aar。Please revise the corresponding emissions after accounting for them according to the notes.。.The original article describes the pollution production coefficients as 1.84Aar. Please revise the corresponding emissions after accounting for them according to the notes.
  污染物指标颗粒物（无烟煤）的末端治理技术是电袋组合，其效率为0.0465Aar+98.0，末端治理设施实际运行率（k值）计算公式为除尘设施年实际运行小时数/机组年实际运行小时数。原文件中描述污染物类别为废气，污染物指标为颗粒物（无烟煤），此处对其进行了匹配工作，将其匹配到LCAflow库里面相最符合的流，污染物指标备注为颗粒物（无烟煤）原文描述的产污系数为 1.84Aar。请根据备注自行核算后修改对应的排放量。
- particles (PM2.5 - PM10): 0
  the Technical of end-of-pipe management technology for pollution particles (PM2.5 - PM10)isElectric-bag composite precipitator，Its Technical efficiency of end-of-pipe management0.0465Aar+98.0.The original article describes the pollution production coefficients as 1.25Aar。Please revise the corresponding emissions after accounting for them according to the notes.。.The original article describes the pollution production coefficients as 1.25Aar. Please revise the corresponding emissions after accounting for them according to the notes.
  污染物指标颗粒物（褐煤）的末端治理技术是电袋组合，其效率为0.0465Aar+98.0，末端治理设施实际运行率（k值）计算公式为除尘设施年实际运行小时数/机组年实际运行小时数。原文件中描述污染物类别为废气，污染物指标为颗粒物（褐煤），此处对其进行了匹配工作，将其匹配到LCAflow库里面相最符合的流，污染物指标备注为颗粒物（褐煤）原文描述的产污系数为 1.25Aar。请根据备注自行核算后修改对应的排放量。
- particles (PM2.5 - PM10): 0
  the Technical of end-of-pipe management technology for pollution particles (PM2.5 - PM10)isElectrostatic precipitation + others (wet desulfurization synergy) + others (wet electrostatic precipitator)，Its Technical efficiency of end-of-pipe management0.00392Aar+99.82.The original article describes the pollution production coefficients as 1.25Aar。Please revise the corresponding emissions after accounting for them according to the notes.。.The original article describes the pollution production coefficients as 1.25Aar. Please revise the corresponding emissions after accounting for them according to the notes.
  污染物指标颗粒物（烟煤）的末端治理技术是静电除尘+其他（湿法脱硫协同）+其他（湿式电除尘），其效率为0.00392Aar+99.82，末端治理设施实际运行率（k值）计算公式为除尘设施年实际运行小时数/机组年实际运行小时数。原文件中描述污染物类别为废气，污染物指标为颗粒物（烟煤），此处对其进行了匹配工作，将其匹配到LCAflow库里面相最符合的流，污染物指标备注为颗粒物（烟煤）原文描述的产污系数为 1.25Aar。请根据备注自行核算后修改对应的排放量。
- particles (PM2.5 - PM10): 0
  the Technical of end-of-pipe management technology for pollution particles (PM2.5 - PM10)isElectrostatic precipitation + others (wet desulfurization synergy)，Its Technical efficiency of end-of-pipe management0.0196Aar+99.10.The original article describes the pollution production coefficients as 1.25Aar。Please revise the corresponding emissions after accounting for them according to the notes.。.The original article describes the pollution production coefficients as 1.25Aar. Please revise the corresponding emissions after accounting for them according to the notes.
  污染物指标颗粒物（烟煤）的末端治理技术是静电除尘+其他（湿法脱硫协同），其效率为0.0196Aar+99.10，末端治理设施实际运行率（k值）计算公式为除尘设施年实际运行小时数/机组年实际运行小时数。原文件中描述污染物类别为废气，污染物指标为颗粒物（烟煤），此处对其进行了匹配工作，将其匹配到LCAflow库里面相最符合的流，污染物指标备注为颗粒物（烟煤）原文描述的产污系数为 1.25Aar。请根据备注自行核算后修改对应的排放量。
- particles (PM2.5 - PM10): 0
  the Technical of end-of-pipe management technology for pollution particles (PM2.5 - PM10)isElectrostatic precipitation + others (wet electrostatic precipitator)，Its Technical efficiency of end-of-pipe management0.0098Aar+99.55.The original article describes the pollution production coefficients as 1.25Aar。Please revise the corresponding emissions after accounting for them according to the notes.。.The original article describes the pollution production coefficients as 1.25Aar. Please revise the corresponding emissions after accounting for them according to the notes.
  污染物指标颗粒物（烟煤）的末端治理技术是静电除尘+其他（湿式电除尘），其效率为0.0098Aar+99.55，末端治理设施实际运行率（k值）计算公式为除尘设施年实际运行小时数/机组年实际运行小时数。原文件中描述污染物类别为废气，污染物指标为颗粒物（烟煤），此处对其进行了匹配工作，将其匹配到LCAflow库里面相最符合的流，污染物指标备注为颗粒物（烟煤）原文描述的产污系数为 1.25Aar。请根据备注自行核算后修改对应的排放量。
- particles (PM2.5 - PM10): 0
  the Technical of end-of-pipe management technology for pollution particles (PM2.5 - PM10)isElectrostatic precipitation，Its Technical efficiency of end-of-pipe management0.049Aar+97.75.The original article describes the pollution production coefficients as 1.25Aar。Please revise the corresponding emissions after accounting for them according to the notes.。.The original article describes the pollution production coefficients as 1.25Aar. Please revise the corresponding emissions after accounting for them according to the notes.
  污染物指标颗粒物（烟煤）的末端治理技术是静电除尘，其效率为0.049Aar+97.75，末端治理设施实际运行率（k值）计算公式为除尘设施年实际运行小时数/机组年实际运行小时数。原文件中描述污染物类别为废气，污染物指标为颗粒物（烟煤），此处对其进行了匹配工作，将其匹配到LCAflow库里面相最符合的流，污染物指标备注为颗粒物（烟煤）原文描述的产污系数为 1.25Aar。请根据备注自行核算后修改对应的排放量。
- particles (PM2.5 - PM10): 0
  the Technical of end-of-pipe management technology for pollution particles (PM2.5 - PM10)isElectrostatic precipitation，Its Technical efficiency of end-of-pipe management0.049Aar+97.75.The original article describes the pollution production coefficients as 1.84Aar。Please revise the corresponding emissions after accounting for them according to the notes.。.The original article describes the pollution production coefficients as 1.84Aar. Please revise the corresponding emissions after accounting for them according to the notes.
  污染物指标颗粒物（无烟煤）的末端治理技术是静电除尘，其效率为0.049Aar+97.75，末端治理设施实际运行率（k值）计算公式为除尘设施年实际运行小时数/机组年实际运行小时数。原文件中描述污染物类别为废气，污染物指标为颗粒物（无烟煤），此处对其进行了匹配工作，将其匹配到LCAflow库里面相最符合的流，污染物指标备注为颗粒物（无烟煤）原文描述的产污系数为 1.84Aar。请根据备注自行核算后修改对应的排放量。
- particles (PM2.5 - PM10): 0
  the Technical of end-of-pipe management technology for pollution particles (PM2.5 - PM10)isElectrostatic precipitation，Its Technical efficiency of end-of-pipe management0.049Aar+97.75.The original article describes the pollution production coefficients as 1.25Aar。Please revise the corresponding emissions after accounting for them according to the notes.。.The original article describes the pollution production coefficients as 1.25Aar. Please revise the corresponding emissions after accounting for them according to the notes.
  污染物指标颗粒物（褐煤）的末端治理技术是静电除尘，其效率为0.049Aar+97.75，末端治理设施实际运行率（k值）计算公式为除尘设施年实际运行小时数/机组年实际运行小时数。原文件中描述污染物类别为废气，污染物指标为颗粒物（褐煤），此处对其进行了匹配工作，将其匹配到LCAflow库里面相最符合的流，污染物指标备注为颗粒物（褐煤）原文描述的产污系数为 1.25Aar。请根据备注自行核算后修改对应的排放量。
- particles (PM2.5 - PM10): 0
  the Technical of end-of-pipe management technology for pollution particles (PM2.5 - PM10)isHigh-efficiency bag filter + others (wet desulfurization synergy) + others (wet electrostatic precipitator)①，Its Technical efficiency of end-of-pipe management0.000704Aar+99.9696.The original article describes the pollution production coefficients as 1.25Aar。Please revise the corresponding emissions after accounting for them according to the notes.。.The original article describes the pollution production coefficients as 1.25Aar. Please revise the corresponding emissions after accounting for them according to the notes.
  污染物指标颗粒物（烟煤）的末端治理技术是高效袋式除尘+其他（湿法脱硫协同）+其他（湿式电除尘）①，其效率为0.000704Aar+99.9696，末端治理设施实际运行率（k值）计算公式为除尘设施年实际运行小时数/机组年实际运行小时数，①高效颗粒物末端治理技术：采取高效电源供电、低低温电除尘、超净电袋、高效袋式除尘、湿法脱硫协同、湿式电除尘等技术，满足《燃煤电厂超低排放烟气
  治理工程技术规范》（HJ2053-2231）相关要求。
  。原文件中描述污染物类别为废气，污染物指标为颗粒物（烟煤），此处对其进行了匹配工作，将其匹配到LCAflow库里面相最符合的流，污染物指标备注为颗粒物（烟煤）原文描述的产污系数为 1.25Aar。请根据备注自行核算后修改对应的排放量。
- particles (PM2.5 - PM10): 0
  the Technical of end-of-pipe management technology for pollution particles (PM2.5 - PM10)isHigh-efficiency bag filter + others (wet desulfurization synergy)①，Its Technical efficiency of end-of-pipe management0.00352Aar+99.848.The original article describes the pollution production coefficients as 1.25Aar。Please revise the corresponding emissions after accounting for them according to the notes.。.The original article describes the pollution production coefficients as 1.25Aar. Please revise the corresponding emissions after accounting for them according to the notes.
  污染物指标颗粒物（烟煤）的末端治理技术是高效袋式除尘+其他（湿法脱硫协同）①，其效率为0.00352Aar+99.848，末端治理设施实际运行率（k值）计算公式为除尘设施年实际运行小时数/机组年实际运行小时数，①高效颗粒物末端治理技术：采取高效电源供电、低低温电除尘、超净电袋、高效袋式除尘、湿法脱硫协同、湿式电除尘等技术，满足《燃煤电厂超低排放烟气
  治理工程技术规范》（HJ2053-2225）相关要求。
  。原文件中描述污染物类别为废气，污染物指标为颗粒物（烟煤），此处对其进行了匹配工作，将其匹配到LCAflow库里面相最符合的流，污染物指标备注为颗粒物（烟煤）原文描述的产污系数为 1.25Aar。请根据备注自行核算后修改对应的排放量。
- particles (PM2.5 - PM10): 0
  the Technical of end-of-pipe management technology for pollution particles (PM2.5 - PM10)isHigh-efficiency bag filter + others (wet electrostatic precipitator)①，Its Technical efficiency of end-of-pipe management0.00176Aar+99.924.The original article describes the pollution production coefficients as 1.25Aar。Please revise the corresponding emissions after accounting for them according to the notes.。.The original article describes the pollution production coefficients as 1.25Aar. Please revise the corresponding emissions after accounting for them according to the notes.
  污染物指标颗粒物（烟煤）的末端治理技术是高效袋式除尘+其他（湿式电除尘）①，其效率为0.00176Aar+99.924，末端治理设施实际运行率（k值）计算公式为除尘设施年实际运行小时数/机组年实际运行小时数，①高效颗粒物末端治理技术：采取高效电源供电、低低温电除尘、超净电袋、高效袋式除尘、湿法脱硫协同、湿式电除尘等技术，满足《燃煤电厂超低排放烟气
  治理工程技术规范》（HJ2053-2228）相关要求。
  。原文件中描述污染物类别为废气，污染物指标为颗粒物（烟煤），此处对其进行了匹配工作，将其匹配到LCAflow库里面相最符合的流，污染物指标备注为颗粒物（烟煤）原文描述的产污系数为 1.25Aar。请根据备注自行核算后修改对应的排放量。
- particles (PM2.5 - PM10): 0
  the Technical of end-of-pipe management technology for pollution particles (PM2.5 - PM10)isHigh-efficiency bag filter①，Its Technical efficiency of end-of-pipe management0.0088Aar+99.62.The original article describes the pollution production coefficients as 1.25Aar。Please revise the corresponding emissions after accounting for them according to the notes.。.The original article describes the pollution production coefficients as 1.25Aar. Please revise the corresponding emissions after accounting for them according to the notes.
  污染物指标颗粒物（烟煤）的末端治理技术是高效袋式除尘①，其效率为0.0088Aar+99.62，末端治理设施实际运行率（k值）计算公式为除尘设施年实际运行小时数/机组年实际运行小时数，①高效颗粒物末端治理技术：采取高效电源供电、低低温电除尘、超净电袋、高效袋式除尘、湿法脱硫协同、湿式电除尘等技术，满足《燃煤电厂超低排放烟气
  治理工程技术规范》（HJ2053-2222）相关要求。
  。原文件中描述污染物类别为废气，污染物指标为颗粒物（烟煤），此处对其进行了匹配工作，将其匹配到LCAflow库里面相最符合的流，污染物指标备注为颗粒物（烟煤）原文描述的产污系数为 1.25Aar。请根据备注自行核算后修改对应的排放量。
- particles (PM2.5 - PM10): 0
  the Technical of end-of-pipe management technology for pollution particles (PM2.5 - PM10)isHigh-efficiency bag filter①，Its Technical efficiency of end-of-pipe management0.0088Aar+99.62.The original article describes the pollution production coefficients as 1.84Aar。Please revise the corresponding emissions after accounting for them according to the notes.。.The original article describes the pollution production coefficients as 1.84Aar. Please revise the corresponding emissions after accounting for them according to the notes.
  污染物指标颗粒物（无烟煤）的末端治理技术是高效袋式除尘①，其效率为0.0088Aar+99.62，末端治理设施实际运行率（k值）计算公式为除尘设施年实际运行小时数/机组年实际运行小时数，①高效颗粒物末端治理技术：采取高效电源供电、低低温电除尘、超净电袋、高效袋式除尘、湿法脱硫协同、湿式电除尘等技术，满足《燃煤电厂超低排放烟气
  治理工程技术规范》（HJ2053-2234）相关要求。
  。原文件中描述污染物类别为废气，污染物指标为颗粒物（无烟煤），此处对其进行了匹配工作，将其匹配到LCAflow库里面相最符合的流，污染物指标备注为颗粒物（无烟煤）原文描述的产污系数为 1.84Aar。请根据备注自行核算后修改对应的排放量。
- particles (PM2.5 - PM10): 0
  the Technical of end-of-pipe management technology for pollution particles (PM2.5 - PM10)isHigh-efficiency bag filter①，Its Technical efficiency of end-of-pipe management0.0088Aar+99.62.The original article describes the pollution production coefficients as 1.25Aar。Please revise the corresponding emissions after accounting for them according to the notes.。.The original article describes the pollution production coefficients as 1.25Aar. Please revise the corresponding emissions after accounting for them according to the notes.
  污染物指标颗粒物（褐煤）的末端治理技术是高效袋式除尘①，其效率为0.0088Aar+99.62，末端治理设施实际运行率（k值）计算公式为除尘设施年实际运行小时数/机组年实际运行小时数，①高效颗粒物末端治理技术：采取高效电源供电、低低温电除尘、超净电袋、高效袋式除尘、湿法脱硫协同、湿式电除尘等技术，满足《燃煤电厂超低排放烟气
  治理工程技术规范》（HJ2053-2237）相关要求。
  。原文件中描述污染物类别为废气，污染物指标为颗粒物（褐煤），此处对其进行了匹配工作，将其匹配到LCAflow库里面相最符合的流，污染物指标备注为颗粒物（褐煤）原文描述的产污系数为 1.25Aar。请根据备注自行核算后修改对应的排放量。
- particles (PM2.5 - PM10): 0
  the Technical of end-of-pipe management technology for pollution particles (PM2.5 - PM10)isHigh-efficiency electric-bag composite precipitator + others (wet desulfurization synergy) + others (wet electrostatic precipitator)①，Its Technical efficiency of end-of-pipe management0.000744Aar+99.968.The original article describes the pollution production coefficients as 1.25Aar。Please revise the corresponding emissions after accounting for them according to the notes.。.The original article describes the pollution production coefficients as 1.25Aar. Please revise the corresponding emissions after accounting for them according to the notes.
  污染物指标颗粒物（烟煤）的末端治理技术是高效电袋组合+其他（湿法脱硫协同）+其他（湿式电除尘）①，其效率为0.000744Aar+99.968，末端治理设施实际运行率（k值）计算公式为除尘设施年实际运行小时数/机组年实际运行小时数，①高效颗粒物末端治理技术：采取高效电源供电、低低温电除尘、超净电袋、高效袋式除尘、湿法脱硫协同、湿式电除尘等技术，满足《燃煤电厂超低排放烟气
  治理工程技术规范》（HJ2053-2230）相关要求。
  。原文件中描述污染物类别为废气，污染物指标为颗粒物（烟煤），此处对其进行了匹配工作，将其匹配到LCAflow库里面相最符合的流，污染物指标备注为颗粒物（烟煤）原文描述的产污系数为 1.25Aar。请根据备注自行核算后修改对应的排放量。
- particles (PM2.5 - PM10): 0
  the Technical of end-of-pipe management technology for pollution particles (PM2.5 - PM10)isHigh-efficiency electric-bag composite precipitator + others (wet desulfurization synergy)①，Its Technical efficiency of end-of-pipe management0.00372Aar+99.84.The original article describes the pollution production coefficients as 1.25Aar。Please revise the corresponding emissions after accounting for them according to the notes.。.The original article describes the pollution production coefficients as 1.25Aar. Please revise the corresponding emissions after accounting for them according to the notes.
  污染物指标颗粒物（烟煤）的末端治理技术是高效电袋组合+其他（湿法脱硫协同）①，其效率为0.00372Aar+99.84，末端治理设施实际运行率（k值）计算公式为除尘设施年实际运行小时数/机组年实际运行小时数，①高效颗粒物末端治理技术：采取高效电源供电、低低温电除尘、超净电袋、高效袋式除尘、湿法脱硫协同、湿式电除尘等技术，满足《燃煤电厂超低排放烟气
  治理工程技术规范》（HJ2053-2224）相关要求。
  。原文件中描述污染物类别为废气，污染物指标为颗粒物（烟煤），此处对其进行了匹配工作，将其匹配到LCAflow库里面相最符合的流，污染物指标备注为颗粒物（烟煤）原文描述的产污系数为 1.25Aar。请根据备注自行核算后修改对应的排放量。
- particles (PM2.5 - PM10): 0
  the Technical of end-of-pipe management technology for pollution particles (PM2.5 - PM10)isHigh-efficiency electric-bag composite precipitator + others (wet electrostatic precipitator)①，Its Technical efficiency of end-of-pipe management0.00186Aar+99.92.The original article describes the pollution production coefficients as 1.25Aar。Please revise the corresponding emissions after accounting for them according to the notes.。.The original article describes the pollution production coefficients as 1.25Aar. Please revise the corresponding emissions after accounting for them according to the notes.
  污染物指标颗粒物（烟煤）的末端治理技术是高效电袋组合+其他（湿式电除尘）①，其效率为0.00186Aar+99.92，末端治理设施实际运行率（k值）计算公式为除尘设施年实际运行小时数/机组年实际运行小时数，①高效颗粒物末端治理技术：采取高效电源供电、低低温电除尘、超净电袋、高效袋式除尘、湿法脱硫协同、湿式电除尘等技术，满足《燃煤电厂超低排放烟气
  治理工程技术规范》（HJ2053-2227）相关要求。
  。原文件中描述污染物类别为废气，污染物指标为颗粒物（烟煤），此处对其进行了匹配工作，将其匹配到LCAflow库里面相最符合的流，污染物指标备注为颗粒物（烟煤）原文描述的产污系数为 1.25Aar。请根据备注自行核算后修改对应的排放量。
- particles (PM2.5 - PM10): 0
  the Technical of end-of-pipe management technology for pollution particles (PM2.5 - PM10)isHigh-efficiency electric-bag composite precipitator①，Its Technical efficiency of end-of-pipe management0.0093Aar+99.6.The original article describes the pollution production coefficients as 1.25Aar。Please revise the corresponding emissions after accounting for them according to the notes.。.The original article describes the pollution production coefficients as 1.25Aar. Please revise the corresponding emissions after accounting for them according to the notes.
  污染物指标颗粒物（烟煤）的末端治理技术是高效电袋组合①，其效率为0.0093Aar+99.6，末端治理设施实际运行率（k值）计算公式为除尘设施年实际运行小时数/机组年实际运行小时数，①高效颗粒物末端治理技术：采取高效电源供电、低低温电除尘、超净电袋、高效袋式除尘、湿法脱硫协同、湿式电除尘等技术，满足《燃煤电厂超低排放烟气
  治理工程技术规范》（HJ2053-2221）相关要求。
  。原文件中描述污染物类别为废气，污染物指标为颗粒物（烟煤），此处对其进行了匹配工作，将其匹配到LCAflow库里面相最符合的流，污染物指标备注为颗粒物（烟煤）原文描述的产污系数为 1.25Aar。请根据备注自行核算后修改对应的排放量。
- particles (PM2.5 - PM10): 0
  the Technical of end-of-pipe management technology for pollution particles (PM2.5 - PM10)isHigh-efficiency electric-bag composite precipitator①，Its Technical efficiency of end-of-pipe management0.0093Aar+99.6.The original article describes the pollution production coefficients as 1.84Aar。Please revise the corresponding emissions after accounting for them according to the notes.。.The original article describes the pollution production coefficients as 1.84Aar. Please revise the corresponding emissions after accounting for them according to the notes.
  污染物指标颗粒物（无烟煤）的末端治理技术是高效电袋组合①，其效率为0.0093Aar+99.6，末端治理设施实际运行率（k值）计算公式为除尘设施年实际运行小时数/机组年实际运行小时数，①高效颗粒物末端治理技术：采取高效电源供电、低低温电除尘、超净电袋、高效袋式除尘、湿法脱硫协同、湿式电除尘等技术，满足《燃煤电厂超低排放烟气
  治理工程技术规范》（HJ2053-2233）相关要求。
  。原文件中描述污染物类别为废气，污染物指标为颗粒物（无烟煤），此处对其进行了匹配工作，将其匹配到LCAflow库里面相最符合的流，污染物指标备注为颗粒物（无烟煤）原文描述的产污系数为 1.84Aar。请根据备注自行核算后修改对应的排放量。
- particles (PM2.5 - PM10): 0
  the Technical of end-of-pipe management technology for pollution particles (PM2.5 - PM10)isHigh-efficiency electric-bag composite precipitator①，Its Technical efficiency of end-of-pipe management0.0093Aar+99.6.The original article describes the pollution production coefficients as 1.25Aar。Please revise the corresponding emissions after accounting for them according to the notes.。.The original article describes the pollution production coefficients as 1.25Aar. Please revise the corresponding emissions after accounting for them according to the notes.
  污染物指标颗粒物（褐煤）的末端治理技术是高效电袋组合①，其效率为0.0093Aar+99.6，末端治理设施实际运行率（k值）计算公式为除尘设施年实际运行小时数/机组年实际运行小时数，①高效颗粒物末端治理技术：采取高效电源供电、低低温电除尘、超净电袋、高效袋式除尘、湿法脱硫协同、湿式电除尘等技术，满足《燃煤电厂超低排放烟气
  治理工程技术规范》（HJ2053-2236）相关要求。
  。原文件中描述污染物类别为废气，污染物指标为颗粒物（褐煤），此处对其进行了匹配工作，将其匹配到LCAflow库里面相最符合的流，污染物指标备注为颗粒物（褐煤）原文描述的产污系数为 1.25Aar。请根据备注自行核算后修改对应的排放量。
- particles (PM2.5 - PM10): 0
  the Technical of end-of-pipe management technology for pollution particles (PM2.5 - PM10)isHigh-efficiency electrostatic precipitation + others (wet desulfurization synergy) + others (wet electrostatic precipitator)①，Its Technical efficiency of end-of-pipe management0.000784Aar+99.964.The original article describes the pollution production coefficients as 1.25Aar。Please revise the corresponding emissions after accounting for them according to the notes.。.The original article describes the pollution production coefficients as 1.25Aar. Please revise the corresponding emissions after accounting for them according to the notes.
  污染物指标颗粒物（烟煤）的末端治理技术是高效静电除尘+其他（湿法脱硫协同）+其他（湿式电除尘）①，其效率为0.000784Aar+99.964，末端治理设施实际运行率（k值）计算公式为除尘设施年实际运行小时数/机组年实际运行小时数，①高效颗粒物末端治理技术：采取高效电源供电、低低温电除尘、超净电袋、高效袋式除尘、湿法脱硫协同、湿式电除尘等技术，满足《燃煤电厂超低排放烟气
  治理工程技术规范》（HJ2053-2229）相关要求。
  。原文件中描述污染物类别为废气，污染物指标为颗粒物（烟煤），此处对其进行了匹配工作，将其匹配到LCAflow库里面相最符合的流，污染物指标备注为颗粒物（烟煤）原文描述的产污系数为 1.25Aar。请根据备注自行核算后修改对应的排放量。
- particles (PM2.5 - PM10): 0
  the Technical of end-of-pipe management technology for pollution particles (PM2.5 - PM10)isHigh-efficiency electrostatic precipitation + others (wet desulfurization synergy)①，Its Technical efficiency of end-of-pipe management0.00392Aar+99.82.The original article describes the pollution production coefficients as 1.25Aar。Please revise the corresponding emissions after accounting for them according to the notes.。.The original article describes the pollution production coefficients as 1.25Aar. Please revise the corresponding emissions after accounting for them according to the notes.
  污染物指标颗粒物（烟煤）的末端治理技术是高效静电除尘+其他（湿法脱硫协同）①，其效率为0.00392Aar+99.82，末端治理设施实际运行率（k值）计算公式为除尘设施年实际运行小时数/机组年实际运行小时数，①高效颗粒物末端治理技术：采取高效电源供电、低低温电除尘、超净电袋、高效袋式除尘、湿法脱硫协同、湿式电除尘等技术，满足《燃煤电厂超低排放烟气
  治理工程技术规范》（HJ2053-2223）相关要求。
  。原文件中描述污染物类别为废气，污染物指标为颗粒物（烟煤），此处对其进行了匹配工作，将其匹配到LCAflow库里面相最符合的流，污染物指标备注为颗粒物（烟煤）原文描述的产污系数为 1.25Aar。请根据备注自行核算后修改对应的排放量。
- particles (PM2.5 - PM10): 0
  the Technical of end-of-pipe management technology for pollution particles (PM2.5 - PM10)isHigh-efficiency electrostatic precipitation + others (wet electrostatic precipitator)①，Its Technical efficiency of end-of-pipe management0.00196Aar+99.91.The original article describes the pollution production coefficients as 1.25Aar。Please revise the corresponding emissions after accounting for them according to the notes.。.The original article describes the pollution production coefficients as 1.25Aar. Please revise the corresponding emissions after accounting for them according to the notes.
  污染物指标颗粒物（烟煤）的末端治理技术是高效静电除尘+其他（湿式电除尘）①，其效率为0.00196Aar+99.91，末端治理设施实际运行率（k值）计算公式为除尘设施年实际运行小时数/机组年实际运行小时数，①高效颗粒物末端治理技术：采取高效电源供电、低低温电除尘、超净电袋、高效袋式除尘、湿法脱硫协同、湿式电除尘等技术，满足《燃煤电厂超低排放烟气
  治理工程技术规范》（HJ2053-2226）相关要求。
  。原文件中描述污染物类别为废气，污染物指标为颗粒物（烟煤），此处对其进行了匹配工作，将其匹配到LCAflow库里面相最符合的流，污染物指标备注为颗粒物（烟煤）原文描述的产污系数为 1.25Aar。请根据备注自行核算后修改对应的排放量。
- particles (PM2.5 - PM10): 0
  the Technical of end-of-pipe management technology for pollution particles (PM2.5 - PM10)isHigh-efficiency electrostatic precipitation①，Its Technical efficiency of end-of-pipe management0.0098Aar+99.55.The original article describes the pollution production coefficients as 1.25Aar。Please revise the corresponding emissions after accounting for them according to the notes.。.The original article describes the pollution production coefficients as 1.25Aar. Please revise the corresponding emissions after accounting for them according to the notes.
  污染物指标颗粒物（烟煤）的末端治理技术是高效静电除尘①，其效率为0.0098Aar+99.55，末端治理设施实际运行率（k值）计算公式为除尘设施年实际运行小时数/机组年实际运行小时数，①高效颗粒物末端治理技术：采取高效电源供电、低低温电除尘、超净电袋、高效袋式除尘、湿法脱硫协同、湿式电除尘等技术，满足《燃煤电厂超低排放烟气
  治理工程技术规范》（HJ2053-2220）相关要求。
  。原文件中描述污染物类别为废气，污染物指标为颗粒物（烟煤），此处对其进行了匹配工作，将其匹配到LCAflow库里面相最符合的流，污染物指标备注为颗粒物（烟煤）原文描述的产污系数为 1.25Aar。请根据备注自行核算后修改对应的排放量。
- particles (PM2.5 - PM10): 0
  the Technical of end-of-pipe management technology for pollution particles (PM2.5 - PM10)isHigh-efficiency electrostatic precipitation①，Its Technical efficiency of end-of-pipe management0.0098Aar+99.55.The original article describes the pollution production coefficients as 1.84Aar。Please revise the corresponding emissions after accounting for them according to the notes.。.The original article describes the pollution production coefficients as 1.84Aar. Please revise the corresponding emissions after accounting for them according to the notes.
  污染物指标颗粒物（无烟煤）的末端治理技术是高效静电除尘①，其效率为0.0098Aar+99.55，末端治理设施实际运行率（k值）计算公式为除尘设施年实际运行小时数/机组年实际运行小时数，①高效颗粒物末端治理技术：采取高效电源供电、低低温电除尘、超净电袋、高效袋式除尘、湿法脱硫协同、湿式电除尘等技术，满足《燃煤电厂超低排放烟气
  治理工程技术规范》（HJ2053-2232）相关要求。
  。原文件中描述污染物类别为废气，污染物指标为颗粒物（无烟煤），此处对其进行了匹配工作，将其匹配到LCAflow库里面相最符合的流，污染物指标备注为颗粒物（无烟煤）原文描述的产污系数为 1.84Aar。请根据备注自行核算后修改对应的排放量。
- particles (PM2.5 - PM10): 0
  the Technical of end-of-pipe management technology for pollution particles (PM2.5 - PM10)isHigh-efficiency electrostatic precipitation①，Its Technical efficiency of end-of-pipe management0.0098Aar+99.55.The original article describes the pollution production coefficients as 1.25Aar。Please revise the corresponding emissions after accounting for them according to the notes.。.The original article describes the pollution production coefficients as 1.25Aar. Please revise the corresponding emissions after accounting for them according to the notes.
  污染物指标颗粒物（褐煤）的末端治理技术是高效静电除尘①，其效率为0.0098Aar+99.55，末端治理设施实际运行率（k值）计算公式为除尘设施年实际运行小时数/机组年实际运行小时数，①高效颗粒物末端治理技术：采取高效电源供电、低低温电除尘、超净电袋、高效袋式除尘、湿法脱硫协同、湿式电除尘等技术，满足《燃煤电厂超低排放烟气
  治理工程技术规范》（HJ2053-2235）相关要求。
  。原文件中描述污染物类别为废气，污染物指标为颗粒物（褐煤），此处对其进行了匹配工作，将其匹配到LCAflow库里面相最符合的流，污染物指标备注为颗粒物（褐煤）原文描述的产污系数为 1.25Aar。请根据备注自行核算后修改对应的排放量。
- sulfur dioxide: 0
  the Technical of end-of-pipe management technology for pollution sulfur dioxideisAmmonia method，Its Technical efficiency of end-of-pipe management4.2857Sar+81.14.The original article describes the pollution production coefficients as 11.2Sar。Please revise the corresponding emissions after accounting for them according to the notes.。.The original article describes the pollution production coefficients as 11.2Sar. Please revise the corresponding emissions after accounting for them according to the notes.
  污染物指标二氧化硫（烟煤，炉内脱硫）的末端治理技术是氨法，其效率为4.2857Sar+81.14，末端治理设施实际运行率（k值）计算公式为脱硫设施年实际运行小时数/机组年实际运行小时数。原文件中描述污染物类别为废气，污染物指标为二氧化硫（烟煤，炉内脱硫），此处对其进行了匹配工作，将其匹配到LCAflow库里面相最符合的流，污染物指标备注为二氧化硫（烟煤，炉内脱硫）原文描述的产污系数为 11.2Sar。请根据备注自行核算后修改对应的排放量。
- sulfur dioxide: 0
  the Technical of end-of-pipe management technology for pollution sulfur dioxideisAmmonia method，Its Technical efficiency of end-of-pipe management4.2857Sar+81.14.The original article describes the pollution production coefficients as 11.2Sar。Please revise the corresponding emissions after accounting for them according to the notes.。.The original article describes the pollution production coefficients as 11.2Sar. Please revise the corresponding emissions after accounting for them according to the notes.
  污染物指标二氧化硫（无烟煤，炉内脱硫）的末端治理技术是氨法，其效率为4.2857Sar+81.14，末端治理设施实际运行率（k值）计算公式为脱硫设施年实际运行小时数/机组年实际运行小时数。原文件中描述污染物类别为废气，污染物指标为二氧化硫（无烟煤，炉内脱硫），此处对其进行了匹配工作，将其匹配到LCAflow库里面相最符合的流，污染物指标备注为二氧化硫（无烟煤，炉内脱硫）原文描述的产污系数为 11.2Sar。请根据备注自行核算后修改对应的排放量。
- sulfur dioxide: 0
  the Technical of end-of-pipe management technology for pollution sulfur dioxideisAmmonia method，Its Technical efficiency of end-of-pipe management4.2857Sar+81.14.The original article describes the pollution production coefficients as 10.5Sar。Please revise the corresponding emissions after accounting for them according to the notes.。.The original article describes the pollution production coefficients as 10.5Sar. Please revise the corresponding emissions after accounting for them according to the notes.
  污染物指标二氧化硫（褐煤，炉内脱硫）的末端治理技术是氨法，其效率为4.2857Sar+81.14，末端治理设施实际运行率（k值）计算公式为脱硫设施年实际运行小时数/机组年实际运行小时数。原文件中描述污染物类别为废气，污染物指标为二氧化硫（褐煤，炉内脱硫），此处对其进行了匹配工作，将其匹配到LCAflow库里面相最符合的流，污染物指标备注为二氧化硫（褐煤，炉内脱硫）原文描述的产污系数为 10.5Sar。请根据备注自行核算后修改对应的排放量。
- sulfur dioxide: 0
  the Technical of end-of-pipe management technology for pollution sulfur dioxideisAmmonia method，Its Technical efficiency of end-of-pipe management4.2857Sar+84.57.The original article describes the pollution production coefficients as 16Sar。Please revise the corresponding emissions after accounting for them according to the notes.。.The original article describes the pollution production coefficients as 16Sar. Please revise the corresponding emissions after accounting for them according to the notes.
  污染物指标二氧化硫（烟煤，无炉内脱硫）的末端治理技术是氨法，其效率为4.2857Sar+84.57，末端治理设施实际运行率（k值）计算公式为脱硫设施年实际运行小时数/机组年实际运行小时数。原文件中描述污染物类别为废气，污染物指标为二氧化硫（烟煤，无炉内脱硫），此处对其进行了匹配工作，将其匹配到LCAflow库里面相最符合的流，污染物指标备注为二氧化硫（烟煤，无炉内脱硫）原文描述的产污系数为 16Sar。请根据备注自行核算后修改对应的排放量。
- sulfur dioxide: 0
  the Technical of end-of-pipe management technology for pollution sulfur dioxideisAmmonia method，Its Technical efficiency of end-of-pipe management4.2857Sar+84.57.The original article describes the pollution production coefficients as 16Sar。Please revise the corresponding emissions after accounting for them according to the notes.。.The original article describes the pollution production coefficients as 16Sar. Please revise the corresponding emissions after accounting for them according to the notes.
  污染物指标二氧化硫（无烟煤，无炉内脱硫）的末端治理技术是氨法，其效率为4.2857Sar+84.57，末端治理设施实际运行率（k值）计算公式为脱硫设施年实际运行小时数/机组年实际运行小时数。原文件中描述污染物类别为废气，污染物指标为二氧化硫（无烟煤，无炉内脱硫），此处对其进行了匹配工作，将其匹配到LCAflow库里面相最符合的流，污染物指标备注为二氧化硫（无烟煤，无炉内脱硫）原文描述的产污系数为 16Sar。请根据备注自行核算后修改对应的排放量。
- sulfur dioxide: 0
  the Technical of end-of-pipe management technology for pollution sulfur dioxideisAmmonia method，Its Technical efficiency of end-of-pipe management4.2857Sar+84.57.The original article describes the pollution production coefficients as 15Sar。Please revise the corresponding emissions after accounting for them according to the notes.。.The original article describes the pollution production coefficients as 15Sar. Please revise the corresponding emissions after accounting for them according to the notes.
  污染物指标二氧化硫（褐煤，无炉内脱硫）的末端治理技术是氨法，其效率为4.2857Sar+84.57，末端治理设施实际运行率（k值）计算公式为脱硫设施年实际运行小时数/机组年实际运行小时数。原文件中描述污染物类别为废气，污染物指标为二氧化硫（褐煤，无炉内脱硫），此处对其进行了匹配工作，将其匹配到LCAflow库里面相最符合的流，污染物指标备注为二氧化硫（褐煤，无炉内脱硫）原文描述的产污系数为 15Sar。请根据备注自行核算后修改对应的排放量。
- sulfur dioxide: 0
  the Technical of end-of-pipe management technology for pollution sulfur dioxideisDouble alkali process，Its Technical efficiency of end-of-pipe management5.1429Sar+79.43.The original article describes the pollution production coefficients as 11.2Sar。Please revise the corresponding emissions after accounting for them according to the notes.。.The original article describes the pollution production coefficients as 11.2Sar. Please revise the corresponding emissions after accounting for them according to the notes.
  污染物指标二氧化硫（烟煤，炉内脱硫）的末端治理技术是双碱法，其效率为5.1429Sar+79.43，末端治理设施实际运行率（k值）计算公式为脱硫设施年实际运行小时数/机组年实际运行小时数。原文件中描述污染物类别为废气，污染物指标为二氧化硫（烟煤，炉内脱硫），此处对其进行了匹配工作，将其匹配到LCAflow库里面相最符合的流，污染物指标备注为二氧化硫（烟煤，炉内脱硫）原文描述的产污系数为 11.2Sar。请根据备注自行核算后修改对应的排放量。
- sulfur dioxide: 0
  the Technical of end-of-pipe management technology for pollution sulfur dioxideisDouble alkali process，Its Technical efficiency of end-of-pipe management5.1429Sar+79.43.The original article describes the pollution production coefficients as 11.2Sar。Please revise the corresponding emissions after accounting for them according to the notes.。.The original article describes the pollution production coefficients as 11.2Sar. Please revise the corresponding emissions after accounting for them according to the notes.
  污染物指标二氧化硫（无烟煤，炉内脱硫）的末端治理技术是双碱法，其效率为5.1429Sar+79.43，末端治理设施实际运行率（k值）计算公式为脱硫设施年实际运行小时数/机组年实际运行小时数。原文件中描述污染物类别为废气，污染物指标为二氧化硫（无烟煤，炉内脱硫），此处对其进行了匹配工作，将其匹配到LCAflow库里面相最符合的流，污染物指标备注为二氧化硫（无烟煤，炉内脱硫）原文描述的产污系数为 11.2Sar。请根据备注自行核算后修改对应的排放量。
- sulfur dioxide: 0
  the Technical of end-of-pipe management technology for pollution sulfur dioxideisDouble alkali process，Its Technical efficiency of end-of-pipe management5.1429Sar+79.43.The original article describes the pollution production coefficients as 10.5Sar。Please revise the corresponding emissions after accounting for them according to the notes.。.The original article describes the pollution production coefficients as 10.5Sar. Please revise the corresponding emissions after accounting for them according to the notes.
  污染物指标二氧化硫（褐煤，炉内脱硫）的末端治理技术是双碱法，其效率为5.1429Sar+79.43，末端治理设施实际运行率（k值）计算公式为脱硫设施年实际运行小时数/机组年实际运行小时数。原文件中描述污染物类别为废气，污染物指标为二氧化硫（褐煤，炉内脱硫），此处对其进行了匹配工作，将其匹配到LCAflow库里面相最符合的流，污染物指标备注为二氧化硫（褐煤，炉内脱硫）原文描述的产污系数为 10.5Sar。请根据备注自行核算后修改对应的排放量。
- sulfur dioxide: 0
  the Technical of end-of-pipe management technology for pollution sulfur dioxideisDouble alkali process，Its Technical efficiency of end-of-pipe management5.1429Sar+82.86.The original article describes the pollution production coefficients as 16Sar。Please revise the corresponding emissions after accounting for them according to the notes.。.The original article describes the pollution production coefficients as 16Sar. Please revise the corresponding emissions after accounting for them according to the notes.
  污染物指标二氧化硫（烟煤，无炉内脱硫）的末端治理技术是双碱法，其效率为5.1429Sar+82.86，末端治理设施实际运行率（k值）计算公式为脱硫设施年实际运行小时数/机组年实际运行小时数。原文件中描述污染物类别为废气，污染物指标为二氧化硫（烟煤，无炉内脱硫），此处对其进行了匹配工作，将其匹配到LCAflow库里面相最符合的流，污染物指标备注为二氧化硫（烟煤，无炉内脱硫）原文描述的产污系数为 16Sar。请根据备注自行核算后修改对应的排放量。
- sulfur dioxide: 0
  the Technical of end-of-pipe management technology for pollution sulfur dioxideisDouble alkali process，Its Technical efficiency of end-of-pipe management5.1429Sar+82.86.The original article describes the pollution production coefficients as 16Sar。Please revise the corresponding emissions after accounting for them according to the notes.。.The original article describes the pollution production coefficients as 16Sar. Please revise the corresponding emissions after accounting for them according to the notes.
  污染物指标二氧化硫（无烟煤，无炉内脱硫）的末端治理技术是双碱法，其效率为5.1429Sar+82.86，末端治理设施实际运行率（k值）计算公式为脱硫设施年实际运行小时数/机组年实际运行小时数。原文件中描述污染物类别为废气，污染物指标为二氧化硫（无烟煤，无炉内脱硫），此处对其进行了匹配工作，将其匹配到LCAflow库里面相最符合的流，污染物指标备注为二氧化硫（无烟煤，无炉内脱硫）原文描述的产污系数为 16Sar。请根据备注自行核算后修改对应的排放量。
- sulfur dioxide: 0
  the Technical of end-of-pipe management technology for pollution sulfur dioxideisDouble alkali process，Its Technical efficiency of end-of-pipe management5.1429Sar+82.86.The original article describes the pollution production coefficients as 15Sar。Please revise the corresponding emissions after accounting for them according to the notes.。.The original article describes the pollution production coefficients as 15Sar. Please revise the corresponding emissions after accounting for them according to the notes.
  污染物指标二氧化硫（褐煤，无炉内脱硫）的末端治理技术是双碱法，其效率为5.1429Sar+82.86，末端治理设施实际运行率（k值）计算公式为脱硫设施年实际运行小时数/机组年实际运行小时数。原文件中描述污染物类别为废气，污染物指标为二氧化硫（褐煤，无炉内脱硫），此处对其进行了匹配工作，将其匹配到LCAflow库里面相最符合的流，污染物指标备注为二氧化硫（褐煤，无炉内脱硫）原文描述的产污系数为 15Sar。请根据备注自行核算后修改对应的排放量。
- sulfur dioxide: 0
  the Technical of end-of-pipe management technology for pollution sulfur dioxideisFlue gas circulating fluidized bed method，Its Technical efficiency of end-of-pipe management8.1429Sar+74.29.The original article describes the pollution production coefficients as 11.2Sar。Please revise the corresponding emissions after accounting for them according to the notes.。.The original article describes the pollution production coefficients as 11.2Sar. Please revise the corresponding emissions after accounting for them according to the notes.
  污染物指标二氧化硫（烟煤，炉内脱硫）的末端治理技术是烟气循环流化床法，其效率为8.1429Sar+74.29，末端治理设施实际运行率（k值）计算公式为脱硫设施年实际运行小时数/机组年实际运行小时数。原文件中描述污染物类别为废气，污染物指标为二氧化硫（烟煤，炉内脱硫），此处对其进行了匹配工作，将其匹配到LCAflow库里面相最符合的流，污染物指标备注为二氧化硫（烟煤，炉内脱硫）原文描述的产污系数为 11.2Sar。请根据备注自行核算后修改对应的排放量。
- sulfur dioxide: 0
  the Technical of end-of-pipe management technology for pollution sulfur dioxideisFlue gas circulating fluidized bed method，Its Technical efficiency of end-of-pipe management8.1429Sar+74.29.The original article describes the pollution production coefficients as 11.2Sar。Please revise the corresponding emissions after accounting for them according to the notes.。.The original article describes the pollution production coefficients as 11.2Sar. Please revise the corresponding emissions after accounting for them according to the notes.
  污染物指标二氧化硫（无烟煤，炉内脱硫）的末端治理技术是烟气循环流化床法，其效率为8.1429Sar+74.29，末端治理设施实际运行率（k值）计算公式为脱硫设施年实际运行小时数/机组年实际运行小时数。原文件中描述污染物类别为废气，污染物指标为二氧化硫（无烟煤，炉内脱硫），此处对其进行了匹配工作，将其匹配到LCAflow库里面相最符合的流，污染物指标备注为二氧化硫（无烟煤，炉内脱硫）原文描述的产污系数为 11.2Sar。请根据备注自行核算后修改对应的排放量。
- sulfur dioxide: 0
  the Technical of end-of-pipe management technology for pollution sulfur dioxideisFlue gas circulating fluidized bed method，Its Technical efficiency of end-of-pipe management8.1429Sar+74.29.The original article describes the pollution production coefficients as 10.5Sar。Please revise the corresponding emissions after accounting for them according to the notes.。.The original article describes the pollution production coefficients as 10.5Sar. Please revise the corresponding emissions after accounting for them according to the notes.
  污染物指标二氧化硫（褐煤，炉内脱硫）的末端治理技术是烟气循环流化床法，其效率为8.1429Sar+74.29，末端治理设施实际运行率（k值）计算公式为脱硫设施年实际运行小时数/机组年实际运行小时数。原文件中描述污染物类别为废气，污染物指标为二氧化硫（褐煤，炉内脱硫），此处对其进行了匹配工作，将其匹配到LCAflow库里面相最符合的流，污染物指标备注为二氧化硫（褐煤，炉内脱硫）原文描述的产污系数为 10.5Sar。请根据备注自行核算后修改对应的排放量。
- sulfur dioxide: 0
  the Technical of end-of-pipe management technology for pollution sulfur dioxideisFlue gas circulating fluidized bed method，Its Technical efficiency of end-of-pipe management8.1429Sar+78.57.The original article describes the pollution production coefficients as 16Sar。Please revise the corresponding emissions after accounting for them according to the notes.。.The original article describes the pollution production coefficients as 16Sar. Please revise the corresponding emissions after accounting for them according to the notes.
  污染物指标二氧化硫（烟煤，无炉内脱硫）的末端治理技术是烟气循环流化床法，其效率为8.1429Sar+78.57，末端治理设施实际运行率（k值）计算公式为脱硫设施年实际运行小时数/机组年实际运行小时数。原文件中描述污染物类别为废气，污染物指标为二氧化硫（烟煤，无炉内脱硫），此处对其进行了匹配工作，将其匹配到LCAflow库里面相最符合的流，污染物指标备注为二氧化硫（烟煤，无炉内脱硫）原文描述的产污系数为 16Sar。请根据备注自行核算后修改对应的排放量。
- sulfur dioxide: 0
  the Technical of end-of-pipe management technology for pollution sulfur dioxideisFlue gas circulating fluidized bed method，Its Technical efficiency of end-of-pipe management8.1429Sar+78.57.The original article describes the pollution production coefficients as 16Sar。Please revise the corresponding emissions after accounting for them according to the notes.。.The original article describes the pollution production coefficients as 16Sar. Please revise the corresponding emissions after accounting for them according to the notes.
  污染物指标二氧化硫（无烟煤，无炉内脱硫）的末端治理技术是烟气循环流化床法，其效率为8.1429Sar+78.57，末端治理设施实际运行率（k值）计算公式为脱硫设施年实际运行小时数/机组年实际运行小时数。原文件中描述污染物类别为废气，污染物指标为二氧化硫（无烟煤，无炉内脱硫），此处对其进行了匹配工作，将其匹配到LCAflow库里面相最符合的流，污染物指标备注为二氧化硫（无烟煤，无炉内脱硫）原文描述的产污系数为 16Sar。请根据备注自行核算后修改对应的排放量。
- sulfur dioxide: 0
  the Technical of end-of-pipe management technology for pollution sulfur dioxideisFlue gas circulating fluidized bed method，Its Technical efficiency of end-of-pipe management8.1429Sar+78.57.The original article describes the pollution production coefficients as 15Sar。Please revise the corresponding emissions after accounting for them according to the notes.。.The original article describes the pollution production coefficients as 15Sar. Please revise the corresponding emissions after accounting for them according to the notes.
  污染物指标二氧化硫（褐煤，无炉内脱硫）的末端治理技术是烟气循环流化床法，其效率为8.1429Sar+78.57，末端治理设施实际运行率（k值）计算公式为脱硫设施年实际运行小时数/机组年实际运行小时数。原文件中描述污染物类别为废气，污染物指标为二氧化硫（褐煤，无炉内脱硫），此处对其进行了匹配工作，将其匹配到LCAflow库里面相最符合的流，污染物指标备注为二氧化硫（褐煤，无炉内脱硫）原文描述的产污系数为 15Sar。请根据备注自行核算后修改对应的排放量。
- sulfur dioxide: 0
  the Technical of end-of-pipe management technology for pollution sulfur dioxideisHigh-efficiency ammonia method②，Its Technical efficiency of end-of-pipe management0.5Sar+97.8.The original article describes the pollution production coefficients as 11.2Sar。Please revise the corresponding emissions after accounting for them according to the notes.。.The original article describes the pollution production coefficients as 11.2Sar. Please revise the corresponding emissions after accounting for them according to the notes.
  污染物指标二氧化硫（烟煤，炉内脱硫）的末端治理技术是高效氨法②，其效率为0.5Sar+97.8，末端治理设施实际运行率（k值）计算公式为脱硫设施年实际运行小时数/机组年实际运行小时数，②高效二氧化硫末端治理技术：采取空塔提效、强化气液传质、改善pH值分区等措施，满足《燃煤电厂超低排放烟气治理工程技术规范》（HJ2053-2185）相
  关要求。
  。原文件中描述污染物类别为废气，污染物指标为二氧化硫（烟煤，炉内脱硫），此处对其进行了匹配工作，将其匹配到LCAflow库里面相最符合的流，污染物指标备注为二氧化硫（烟煤，炉内脱硫）原文描述的产污系数为 11.2Sar。请根据备注自行核算后修改对应的排放量。
- sulfur dioxide: 0
  the Technical of end-of-pipe management technology for pollution sulfur dioxideisHigh-efficiency ammonia method②，Its Technical efficiency of end-of-pipe management0.5Sar+97.8.The original article describes the pollution production coefficients as 11.2Sar。Please revise the corresponding emissions after accounting for them according to the notes.。.The original article describes the pollution production coefficients as 11.2Sar. Please revise the corresponding emissions after accounting for them according to the notes.
  污染物指标二氧化硫（无烟煤，炉内脱硫）的末端治理技术是高效氨法②，其效率为0.5Sar+97.8，末端治理设施实际运行率（k值）计算公式为脱硫设施年实际运行小时数/机组年实际运行小时数，②高效二氧化硫末端治理技术：采取空塔提效、强化气液传质、改善pH值分区等措施，满足《燃煤电厂超低排放烟气治理工程技术规范》（HJ2053-2203）相
  关要求。
  。原文件中描述污染物类别为废气，污染物指标为二氧化硫（无烟煤，炉内脱硫），此处对其进行了匹配工作，将其匹配到LCAflow库里面相最符合的流，污染物指标备注为二氧化硫（无烟煤，炉内脱硫）原文描述的产污系数为 11.2Sar。请根据备注自行核算后修改对应的排放量。
- sulfur dioxide: 0
  the Technical of end-of-pipe management technology for pollution sulfur dioxideisHigh-efficiency ammonia method②，Its Technical efficiency of end-of-pipe management0.5Sar+97.8.The original article describes the pollution production coefficients as 10.5Sar。Please revise the corresponding emissions after accounting for them according to the notes.。.The original article describes the pollution production coefficients as 10.5Sar. Please revise the corresponding emissions after accounting for them according to the notes.
  污染物指标二氧化硫（褐煤，炉内脱硫）的末端治理技术是高效氨法②，其效率为0.5Sar+97.8，末端治理设施实际运行率（k值）计算公式为脱硫设施年实际运行小时数/机组年实际运行小时数，②高效二氧化硫末端治理技术：采取空塔提效、强化气液传质、改善pH值分区等措施，满足《燃煤电厂超低排放烟气治理工程技术规范》（HJ2053-2221）相
  关要求。
  。原文件中描述污染物类别为废气，污染物指标为二氧化硫（褐煤，炉内脱硫），此处对其进行了匹配工作，将其匹配到LCAflow库里面相最符合的流，污染物指标备注为二氧化硫（褐煤，炉内脱硫）原文描述的产污系数为 10.5Sar。请根据备注自行核算后修改对应的排放量。
- sulfur dioxide: 0
  the Technical of end-of-pipe management technology for pollution sulfur dioxideisHigh-efficiency ammonia method②，Its Technical efficiency of end-of-pipe management0.5Sar+98.2.The original article describes the pollution production coefficients as 16Sar。Please revise the corresponding emissions after accounting for them according to the notes.。.The original article describes the pollution production coefficients as 16Sar. Please revise the corresponding emissions after accounting for them according to the notes.
  污染物指标二氧化硫（烟煤，无炉内脱硫）的末端治理技术是高效氨法②，其效率为0.5Sar+98.2，末端治理设施实际运行率（k值）计算公式为脱硫设施年实际运行小时数/机组年实际运行小时数，②高效二氧化硫末端治理技术：采取空塔提效、强化气液传质、改善pH值分区等措施，满足《燃煤电厂超低排放烟气治理工程技术规范》（HJ2053-2176）相
  关要求。
  。原文件中描述污染物类别为废气，污染物指标为二氧化硫（烟煤，无炉内脱硫），此处对其进行了匹配工作，将其匹配到LCAflow库里面相最符合的流，污染物指标备注为二氧化硫（烟煤，无炉内脱硫）原文描述的产污系数为 16Sar。请根据备注自行核算后修改对应的排放量。
- sulfur dioxide: 0
  the Technical of end-of-pipe management technology for pollution sulfur dioxideisHigh-efficiency ammonia method②，Its Technical efficiency of end-of-pipe management0.5Sar+98.2.The original article describes the pollution production coefficients as 16Sar。Please revise the corresponding emissions after accounting for them according to the notes.。.The original article describes the pollution production coefficients as 16Sar. Please revise the corresponding emissions after accounting for them according to the notes.
  污染物指标二氧化硫（无烟煤，无炉内脱硫）的末端治理技术是高效氨法②，其效率为0.5Sar+98.2，末端治理设施实际运行率（k值）计算公式为脱硫设施年实际运行小时数/机组年实际运行小时数，②高效二氧化硫末端治理技术：采取空塔提效、强化气液传质、改善pH值分区等措施，满足《燃煤电厂超低排放烟气治理工程技术规范》（HJ2053-2194）相
  关要求。
  。原文件中描述污染物类别为废气，污染物指标为二氧化硫（无烟煤，无炉内脱硫），此处对其进行了匹配工作，将其匹配到LCAflow库里面相最符合的流，污染物指标备注为二氧化硫（无烟煤，无炉内脱硫）原文描述的产污系数为 16Sar。请根据备注自行核算后修改对应的排放量。
- sulfur dioxide: 0
  the Technical of end-of-pipe management technology for pollution sulfur dioxideisHigh-efficiency ammonia method②，Its Technical efficiency of end-of-pipe management0.5Sar+98.2.The original article describes the pollution production coefficients as 15Sar。Please revise the corresponding emissions after accounting for them according to the notes.。.The original article describes the pollution production coefficients as 15Sar. Please revise the corresponding emissions after accounting for them according to the notes.
  污染物指标二氧化硫（褐煤，无炉内脱硫）的末端治理技术是高效氨法②，其效率为0.5Sar+98.2，末端治理设施实际运行率（k值）计算公式为脱硫设施年实际运行小时数/机组年实际运行小时数，②高效二氧化硫末端治理技术：采取空塔提效、强化气液传质、改善pH值分区等措施，满足《燃煤电厂超低排放烟气治理工程技术规范》（HJ2053-2212）相
  关要求。
  。原文件中描述污染物类别为废气，污染物指标为二氧化硫（褐煤，无炉内脱硫），此处对其进行了匹配工作，将其匹配到LCAflow库里面相最符合的流，污染物指标备注为二氧化硫（褐煤，无炉内脱硫）原文描述的产污系数为 15Sar。请根据备注自行核算后修改对应的排放量。
- sulfur dioxide: 0
  the Technical of end-of-pipe management technology for pollution sulfur dioxideisHigh-efficiency double alkali process②，Its Technical efficiency of end-of-pipe management0.6Sar+97.6.The original article describes the pollution production coefficients as 11.2Sar。Please revise the corresponding emissions after accounting for them according to the notes.。.The original article describes the pollution production coefficients as 11.2Sar. Please revise the corresponding emissions after accounting for them according to the notes.
  污染物指标二氧化硫（烟煤，炉内脱硫）的末端治理技术是高效双碱法②，其效率为0.6Sar+97.6，末端治理设施实际运行率（k值）计算公式为脱硫设施年实际运行小时数/机组年实际运行小时数，②高效二氧化硫末端治理技术：采取空塔提效、强化气液传质、改善pH值分区等措施，满足《燃煤电厂超低排放烟气治理工程技术规范》（HJ2053-2188）相
  关要求。
  。原文件中描述污染物类别为废气，污染物指标为二氧化硫（烟煤，炉内脱硫），此处对其进行了匹配工作，将其匹配到LCAflow库里面相最符合的流，污染物指标备注为二氧化硫（烟煤，炉内脱硫）原文描述的产污系数为 11.2Sar。请根据备注自行核算后修改对应的排放量。
- sulfur dioxide: 0
  the Technical of end-of-pipe management technology for pollution sulfur dioxideisHigh-efficiency double alkali process②，Its Technical efficiency of end-of-pipe management0.6Sar+97.6.The original article describes the pollution production coefficients as 11.2Sar。Please revise the corresponding emissions after accounting for them according to the notes.。.The original article describes the pollution production coefficients as 11.2Sar. Please revise the corresponding emissions after accounting for them according to the notes.
  污染物指标二氧化硫（无烟煤，炉内脱硫）的末端治理技术是高效双碱法②，其效率为0.6Sar+97.6，末端治理设施实际运行率（k值）计算公式为脱硫设施年实际运行小时数/机组年实际运行小时数，②高效二氧化硫末端治理技术：采取空塔提效、强化气液传质、改善pH值分区等措施，满足《燃煤电厂超低排放烟气治理工程技术规范》（HJ2053-2206）相
  关要求。
  。原文件中描述污染物类别为废气，污染物指标为二氧化硫（无烟煤，炉内脱硫），此处对其进行了匹配工作，将其匹配到LCAflow库里面相最符合的流，污染物指标备注为二氧化硫（无烟煤，炉内脱硫）原文描述的产污系数为 11.2Sar。请根据备注自行核算后修改对应的排放量。
- sulfur dioxide: 0
  the Technical of end-of-pipe management technology for pollution sulfur dioxideisHigh-efficiency double alkali process②，Its Technical efficiency of end-of-pipe management0.6Sar+97.6.The original article describes the pollution production coefficients as 10.5Sar。Please revise the corresponding emissions after accounting for them according to the notes.。.The original article describes the pollution production coefficients as 10.5Sar. Please revise the corresponding emissions after accounting for them according to the notes.
  污染物指标二氧化硫（褐煤，炉内脱硫）的末端治理技术是高效双碱法②，其效率为0.6Sar+97.6，末端治理设施实际运行率（k值）计算公式为脱硫设施年实际运行小时数/机组年实际运行小时数，②高效二氧化硫末端治理技术：采取空塔提效、强化气液传质、改善pH值分区等措施，满足《燃煤电厂超低排放烟气治理工程技术规范》（HJ2053-2224）相
  关要求。
  。原文件中描述污染物类别为废气，污染物指标为二氧化硫（褐煤，炉内脱硫），此处对其进行了匹配工作，将其匹配到LCAflow库里面相最符合的流，污染物指标备注为二氧化硫（褐煤，炉内脱硫）原文描述的产污系数为 10.5Sar。请根据备注自行核算后修改对应的排放量。
- sulfur dioxide: 0
  the Technical of end-of-pipe management technology for pollution sulfur dioxideisHigh-efficiency double alkali process②，Its Technical efficiency of end-of-pipe management0.6Sar+98.The original article describes the pollution production coefficients as 16Sar。Please revise the corresponding emissions after accounting for them according to the notes.。.The original article describes the pollution production coefficients as 16Sar. Please revise the corresponding emissions after accounting for them according to the notes.
  污染物指标二氧化硫（烟煤，无炉内脱硫）的末端治理技术是高效双碱法②，其效率为0.6Sar+98，末端治理设施实际运行率（k值）计算公式为脱硫设施年实际运行小时数/机组年实际运行小时数，②高效二氧化硫末端治理技术：采取空塔提效、强化气液传质、改善pH值分区等措施，满足《燃煤电厂超低排放烟气治理工程技术规范》（HJ2053-2179）相
  关要求。
  。原文件中描述污染物类别为废气，污染物指标为二氧化硫（烟煤，无炉内脱硫），此处对其进行了匹配工作，将其匹配到LCAflow库里面相最符合的流，污染物指标备注为二氧化硫（烟煤，无炉内脱硫）原文描述的产污系数为 16Sar。请根据备注自行核算后修改对应的排放量。
- sulfur dioxide: 0
  the Technical of end-of-pipe management technology for pollution sulfur dioxideisHigh-efficiency double alkali process②，Its Technical efficiency of end-of-pipe management0.6Sar+98.The original article describes the pollution production coefficients as 16Sar。Please revise the corresponding emissions after accounting for them according to the notes.。.The original article describes the pollution production coefficients as 16Sar. Please revise the corresponding emissions after accounting for them according to the notes.
  污染物指标二氧化硫（无烟煤，无炉内脱硫）的末端治理技术是高效双碱法②，其效率为0.6Sar+98，末端治理设施实际运行率（k值）计算公式为脱硫设施年实际运行小时数/机组年实际运行小时数，②高效二氧化硫末端治理技术：采取空塔提效、强化气液传质、改善pH值分区等措施，满足《燃煤电厂超低排放烟气治理工程技术规范》（HJ2053-2197）相
  关要求。
  。原文件中描述污染物类别为废气，污染物指标为二氧化硫（无烟煤，无炉内脱硫），此处对其进行了匹配工作，将其匹配到LCAflow库里面相最符合的流，污染物指标备注为二氧化硫（无烟煤，无炉内脱硫）原文描述的产污系数为 16Sar。请根据备注自行核算后修改对应的排放量。
- sulfur dioxide: 0
  the Technical of end-of-pipe management technology for pollution sulfur dioxideisHigh-efficiency double alkali process②，Its Technical efficiency of end-of-pipe management0.6Sar+98.The original article describes the pollution production coefficients as 15Sar。Please revise the corresponding emissions after accounting for them according to the notes.。.The original article describes the pollution production coefficients as 15Sar. Please revise the corresponding emissions after accounting for them according to the notes.
  污染物指标二氧化硫（褐煤，无炉内脱硫）的末端治理技术是高效双碱法②，其效率为0.6Sar+98，末端治理设施实际运行率（k值）计算公式为脱硫设施年实际运行小时数/机组年实际运行小时数，②高效二氧化硫末端治理技术：采取空塔提效、强化气液传质、改善pH值分区等措施，满足《燃煤电厂超低排放烟气治理工程技术规范》（HJ2053-2215）相
  关要求。
  。原文件中描述污染物类别为废气，污染物指标为二氧化硫（褐煤，无炉内脱硫），此处对其进行了匹配工作，将其匹配到LCAflow库里面相最符合的流，污染物指标备注为二氧化硫（褐煤，无炉内脱硫）原文描述的产污系数为 15Sar。请根据备注自行核算后修改对应的排放量。
- sulfur dioxide: 0
  the Technical of end-of-pipe management technology for pollution sulfur dioxideisHigh-efficiency flue gas circulating fluidized bed method②，Its Technical efficiency of end-of-pipe management0.95Sar+97.The original article describes the pollution production coefficients as 11.2Sar。Please revise the corresponding emissions after accounting for them according to the notes.。.The original article describes the pollution production coefficients as 11.2Sar. Please revise the corresponding emissions after accounting for them according to the notes.
  污染物指标二氧化硫（烟煤，炉内脱硫）的末端治理技术是高效烟气循环流化床法②，其效率为0.95Sar+97，末端治理设施实际运行率（k值）计算公式为脱硫设施年实际运行小时数/机组年实际运行小时数，②高效二氧化硫末端治理技术：采取空塔提效、强化气液传质、改善pH值分区等措施，满足《燃煤电厂超低排放烟气治理工程技术规范》（HJ2053-2190）相
  关要求。
  。原文件中描述污染物类别为废气，污染物指标为二氧化硫（烟煤，炉内脱硫），此处对其进行了匹配工作，将其匹配到LCAflow库里面相最符合的流，污染物指标备注为二氧化硫（烟煤，炉内脱硫）原文描述的产污系数为 11.2Sar。请根据备注自行核算后修改对应的排放量。
- sulfur dioxide: 0
  the Technical of end-of-pipe management technology for pollution sulfur dioxideisHigh-efficiency flue gas circulating fluidized bed method②，Its Technical efficiency of end-of-pipe management0.95Sar+97.The original article describes the pollution production coefficients as 11.2Sar。Please revise the corresponding emissions after accounting for them according to the notes.。.The original article describes the pollution production coefficients as 11.2Sar. Please revise the corresponding emissions after accounting for them according to the notes.
  污染物指标二氧化硫（无烟煤，炉内脱硫）的末端治理技术是高效烟气循环流化床法②，其效率为0.95Sar+97，末端治理设施实际运行率（k值）计算公式为脱硫设施年实际运行小时数/机组年实际运行小时数，②高效二氧化硫末端治理技术：采取空塔提效、强化气液传质、改善pH值分区等措施，满足《燃煤电厂超低排放烟气治理工程技术规范》（HJ2053-2208）相
  关要求。
  。原文件中描述污染物类别为废气，污染物指标为二氧化硫（无烟煤，炉内脱硫），此处对其进行了匹配工作，将其匹配到LCAflow库里面相最符合的流，污染物指标备注为二氧化硫（无烟煤，炉内脱硫）原文描述的产污系数为 11.2Sar。请根据备注自行核算后修改对应的排放量。
- sulfur dioxide: 0
  the Technical of end-of-pipe management technology for pollution sulfur dioxideisHigh-efficiency flue gas circulating fluidized bed method②，Its Technical efficiency of end-of-pipe management0.95Sar+97.The original article describes the pollution production coefficients as 10.5Sar。Please revise the corresponding emissions after accounting for them according to the notes.。.The original article describes the pollution production coefficients as 10.5Sar. Please revise the corresponding emissions after accounting for them according to the notes.
  污染物指标二氧化硫（褐煤，炉内脱硫）的末端治理技术是高效烟气循环流化床法②，其效率为0.95Sar+97，末端治理设施实际运行率（k值）计算公式为脱硫设施年实际运行小时数/机组年实际运行小时数，②高效二氧化硫末端治理技术：采取空塔提效、强化气液传质、改善pH值分区等措施，满足《燃煤电厂超低排放烟气治理工程技术规范》（HJ2053-2226）相
  关要求。
  。原文件中描述污染物类别为废气，污染物指标为二氧化硫（褐煤，炉内脱硫），此处对其进行了匹配工作，将其匹配到LCAflow库里面相最符合的流，污染物指标备注为二氧化硫（褐煤，炉内脱硫）原文描述的产污系数为 10.5Sar。请根据备注自行核算后修改对应的排放量。
- sulfur dioxide: 0
  the Technical of end-of-pipe management technology for pollution sulfur dioxideisHigh-efficiency flue gas circulating fluidized bed method②，Its Technical efficiency of end-of-pipe management0.95Sar+97.5.The original article describes the pollution production coefficients as 16Sar。Please revise the corresponding emissions after accounting for them according to the notes.。.The original article describes the pollution production coefficients as 16Sar. Please revise the corresponding emissions after accounting for them according to the notes.
  污染物指标二氧化硫（烟煤，无炉内脱硫）的末端治理技术是高效烟气循环流化床法②，其效率为0.95Sar+97.5，末端治理设施实际运行率（k值）计算公式为脱硫设施年实际运行小时数/机组年实际运行小时数，②高效二氧化硫末端治理技术：采取空塔提效、强化气液传质、改善pH值分区等措施，满足《燃煤电厂超低排放烟气治理工程技术规范》（HJ2053-2181）相
  关要求。
  。原文件中描述污染物类别为废气，污染物指标为二氧化硫（烟煤，无炉内脱硫），此处对其进行了匹配工作，将其匹配到LCAflow库里面相最符合的流，污染物指标备注为二氧化硫（烟煤，无炉内脱硫）原文描述的产污系数为 16Sar。请根据备注自行核算后修改对应的排放量。
- sulfur dioxide: 0
  the Technical of end-of-pipe management technology for pollution sulfur dioxideisHigh-efficiency flue gas circulating fluidized bed method②，Its Technical efficiency of end-of-pipe management0.95Sar+97.5.The original article describes the pollution production coefficients as 16Sar。Please revise the corresponding emissions after accounting for them according to the notes.。.The original article describes the pollution production coefficients as 16Sar. Please revise the corresponding emissions after accounting for them according to the notes.
  污染物指标二氧化硫（无烟煤，无炉内脱硫）的末端治理技术是高效烟气循环流化床法②，其效率为0.95Sar+97.5，末端治理设施实际运行率（k值）计算公式为脱硫设施年实际运行小时数/机组年实际运行小时数，②高效二氧化硫末端治理技术：采取空塔提效、强化气液传质、改善pH值分区等措施，满足《燃煤电厂超低排放烟气治理工程技术规范》（HJ2053-2199）相
  关要求。
  。原文件中描述污染物类别为废气，污染物指标为二氧化硫（无烟煤，无炉内脱硫），此处对其进行了匹配工作，将其匹配到LCAflow库里面相最符合的流，污染物指标备注为二氧化硫（无烟煤，无炉内脱硫）原文描述的产污系数为 16Sar。请根据备注自行核算后修改对应的排放量。
- sulfur dioxide: 0
  the Technical of end-of-pipe management technology for pollution sulfur dioxideisHigh-efficiency flue gas circulating fluidized bed method②，Its Technical efficiency of end-of-pipe management0.95Sar+97.5.The original article describes the pollution production coefficients as 15Sar。Please revise the corresponding emissions after accounting for them according to the notes.。.The original article describes the pollution production coefficients as 15Sar. Please revise the corresponding emissions after accounting for them according to the notes.
  污染物指标二氧化硫（褐煤，无炉内脱硫）的末端治理技术是高效烟气循环流化床法②，其效率为0.95Sar+97.5，末端治理设施实际运行率（k值）计算公式为脱硫设施年实际运行小时数/机组年实际运行小时数，②高效二氧化硫末端治理技术：采取空塔提效、强化气液传质、改善pH值分区等措施，满足《燃煤电厂超低排放烟气治理工程技术规范》（HJ2053-2217）相
  关要求。
  。原文件中描述污染物类别为废气，污染物指标为二氧化硫（褐煤，无炉内脱硫），此处对其进行了匹配工作，将其匹配到LCAflow库里面相最符合的流，污染物指标备注为二氧化硫（褐煤，无炉内脱硫）原文描述的产污系数为 15Sar。请根据备注自行核算后修改对应的排放量。
- sulfur dioxide: 0
  the Technical of end-of-pipe management technology for pollution sulfur dioxideisHigh-efficiency lime/gypsum method②，Its Technical efficiency of end-of-pipe management0.5Sar+97.8.The original article describes the pollution production coefficients as 11.2Sar。Please revise the corresponding emissions after accounting for them according to the notes.。.The original article describes the pollution production coefficients as 11.2Sar. Please revise the corresponding emissions after accounting for them according to the notes.
  污染物指标二氧化硫（烟煤，炉内脱硫）的末端治理技术是高效石灰石/石膏法②，其效率为0.5Sar+97.8，末端治理设施实际运行率（k值）计算公式为脱硫设施年实际运行小时数/机组年实际运行小时数，②高效二氧化硫末端治理技术：采取空塔提效、强化气液传质、改善pH值分区等措施，满足《燃煤电厂超低排放烟气治理工程技术规范》（HJ2053-2183）相
  关要求。
  。原文件中描述污染物类别为废气，污染物指标为二氧化硫（烟煤，炉内脱硫），此处对其进行了匹配工作，将其匹配到LCAflow库里面相最符合的流，污染物指标备注为二氧化硫（烟煤，炉内脱硫）原文描述的产污系数为 11.2Sar。请根据备注自行核算后修改对应的排放量。
- sulfur dioxide: 0
  the Technical of end-of-pipe management technology for pollution sulfur dioxideisHigh-efficiency lime/gypsum method②，Its Technical efficiency of end-of-pipe management0.5Sar+97.8.The original article describes the pollution production coefficients as 11.2Sar。Please revise the corresponding emissions after accounting for them according to the notes.。.The original article describes the pollution production coefficients as 11.2Sar. Please revise the corresponding emissions after accounting for them according to the notes.
  污染物指标二氧化硫（烟煤，炉内脱硫）的末端治理技术是高效石灰/石膏法②，其效率为0.5Sar+97.8，末端治理设施实际运行率（k值）计算公式为脱硫设施年实际运行小时数/机组年实际运行小时数，②高效二氧化硫末端治理技术：采取空塔提效、强化气液传质、改善pH值分区等措施，满足《燃煤电厂超低排放烟气治理工程技术规范》（HJ2053-2184）相
  关要求。
  。原文件中描述污染物类别为废气，污染物指标为二氧化硫（烟煤，炉内脱硫），此处对其进行了匹配工作，将其匹配到LCAflow库里面相最符合的流，污染物指标备注为二氧化硫（烟煤，炉内脱硫）原文描述的产污系数为 11.2Sar。请根据备注自行核算后修改对应的排放量。
- sulfur dioxide: 0
  the Technical of end-of-pipe management technology for pollution sulfur dioxideisHigh-efficiency lime/gypsum method②，Its Technical efficiency of end-of-pipe management0.5Sar+97.8.The original article describes the pollution production coefficients as 11.2Sar。Please revise the corresponding emissions after accounting for them according to the notes.。.The original article describes the pollution production coefficients as 11.2Sar. Please revise the corresponding emissions after accounting for them according to the notes.
  污染物指标二氧化硫（无烟煤，炉内脱硫）的末端治理技术是高效石灰石/石膏法②，其效率为0.5Sar+97.8，末端治理设施实际运行率（k值）计算公式为脱硫设施年实际运行小时数/机组年实际运行小时数，②高效二氧化硫末端治理技术：采取空塔提效、强化气液传质、改善pH值分区等措施，满足《燃煤电厂超低排放烟气治理工程技术规范》（HJ2053-2201）相
  关要求。
  。原文件中描述污染物类别为废气，污染物指标为二氧化硫（无烟煤，炉内脱硫），此处对其进行了匹配工作，将其匹配到LCAflow库里面相最符合的流，污染物指标备注为二氧化硫（无烟煤，炉内脱硫）原文描述的产污系数为 11.2Sar。请根据备注自行核算后修改对应的排放量。
- sulfur dioxide: 0
  the Technical of end-of-pipe management technology for pollution sulfur dioxideisHigh-efficiency lime/gypsum method②，Its Technical efficiency of end-of-pipe management0.5Sar+97.8.The original article describes the pollution production coefficients as 11.2Sar。Please revise the corresponding emissions after accounting for them according to the notes.。.The original article describes the pollution production coefficients as 11.2Sar. Please revise the corresponding emissions after accounting for them according to the notes.
  污染物指标二氧化硫（无烟煤，炉内脱硫）的末端治理技术是高效石灰/石膏法②，其效率为0.5Sar+97.8，末端治理设施实际运行率（k值）计算公式为脱硫设施年实际运行小时数/机组年实际运行小时数，②高效二氧化硫末端治理技术：采取空塔提效、强化气液传质、改善pH值分区等措施，满足《燃煤电厂超低排放烟气治理工程技术规范》（HJ2053-2202）相
  关要求。
  。原文件中描述污染物类别为废气，污染物指标为二氧化硫（无烟煤，炉内脱硫），此处对其进行了匹配工作，将其匹配到LCAflow库里面相最符合的流，污染物指标备注为二氧化硫（无烟煤，炉内脱硫）原文描述的产污系数为 11.2Sar。请根据备注自行核算后修改对应的排放量。
- sulfur dioxide: 0
  the Technical of end-of-pipe management technology for pollution sulfur dioxideisHigh-efficiency lime/gypsum method②，Its Technical efficiency of end-of-pipe management0.5Sar+97.8.The original article describes the pollution production coefficients as 10.5Sar。Please revise the corresponding emissions after accounting for them according to the notes.。.The original article describes the pollution production coefficients as 10.5Sar. Please revise the corresponding emissions after accounting for them according to the notes.
  污染物指标二氧化硫（褐煤，炉内脱硫）的末端治理技术是高效石灰石/石膏法②，其效率为0.5Sar+97.8，末端治理设施实际运行率（k值）计算公式为脱硫设施年实际运行小时数/机组年实际运行小时数，②高效二氧化硫末端治理技术：采取空塔提效、强化气液传质、改善pH值分区等措施，满足《燃煤电厂超低排放烟气治理工程技术规范》（HJ2053-2219）相
  关要求。
  。原文件中描述污染物类别为废气，污染物指标为二氧化硫（褐煤，炉内脱硫），此处对其进行了匹配工作，将其匹配到LCAflow库里面相最符合的流，污染物指标备注为二氧化硫（褐煤，炉内脱硫）原文描述的产污系数为 10.5Sar。请根据备注自行核算后修改对应的排放量。
- sulfur dioxide: 0
  the Technical of end-of-pipe management technology for pollution sulfur dioxideisHigh-efficiency lime/gypsum method②，Its Technical efficiency of end-of-pipe management0.5Sar+97.8.The original article describes the pollution production coefficients as 10.5Sar。Please revise the corresponding emissions after accounting for them according to the notes.。.The original article describes the pollution production coefficients as 10.5Sar. Please revise the corresponding emissions after accounting for them according to the notes.
  污染物指标二氧化硫（褐煤，炉内脱硫）的末端治理技术是高效石灰/石膏法②，其效率为0.5Sar+97.8，末端治理设施实际运行率（k值）计算公式为脱硫设施年实际运行小时数/机组年实际运行小时数，②高效二氧化硫末端治理技术：采取空塔提效、强化气液传质、改善pH值分区等措施，满足《燃煤电厂超低排放烟气治理工程技术规范》（HJ2053-2220）相
  关要求。
  。原文件中描述污染物类别为废气，污染物指标为二氧化硫（褐煤，炉内脱硫），此处对其进行了匹配工作，将其匹配到LCAflow库里面相最符合的流，污染物指标备注为二氧化硫（褐煤，炉内脱硫）原文描述的产污系数为 10.5Sar。请根据备注自行核算后修改对应的排放量。
- sulfur dioxide: 0
  the Technical of end-of-pipe management technology for pollution sulfur dioxideisHigh-efficiency lime/gypsum method②，Its Technical efficiency of end-of-pipe management0.5Sar+98.2.The original article describes the pollution production coefficients as 16Sar。Please revise the corresponding emissions after accounting for them according to the notes.。.The original article describes the pollution production coefficients as 16Sar. Please revise the corresponding emissions after accounting for them according to the notes.
  污染物指标二氧化硫（烟煤，无炉内脱硫）的末端治理技术是高效石灰石/石膏法②，其效率为0.5Sar+98.2，末端治理设施实际运行率（k值）计算公式为脱硫设施年实际运行小时数/机组年实际运行小时数，②高效二氧化硫末端治理技术：采取空塔提效、强化气液传质、改善pH值分区等措施，满足《燃煤电厂超低排放烟气治理工程技术规范》（HJ2053-2174）相
  关要求。
  。原文件中描述污染物类别为废气，污染物指标为二氧化硫（烟煤，无炉内脱硫），此处对其进行了匹配工作，将其匹配到LCAflow库里面相最符合的流，污染物指标备注为二氧化硫（烟煤，无炉内脱硫）原文描述的产污系数为 16Sar。请根据备注自行核算后修改对应的排放量。
- sulfur dioxide: 0
  the Technical of end-of-pipe management technology for pollution sulfur dioxideisHigh-efficiency lime/gypsum method②，Its Technical efficiency of end-of-pipe management0.5Sar+98.2.The original article describes the pollution production coefficients as 16Sar。Please revise the corresponding emissions after accounting for them according to the notes.。.The original article describes the pollution production coefficients as 16Sar. Please revise the corresponding emissions after accounting for them according to the notes.
  污染物指标二氧化硫（烟煤，无炉内脱硫）的末端治理技术是高效石灰/石膏法②，其效率为0.5Sar+98.2，末端治理设施实际运行率（k值）计算公式为脱硫设施年实际运行小时数/机组年实际运行小时数，②高效二氧化硫末端治理技术：采取空塔提效、强化气液传质、改善pH值分区等措施，满足《燃煤电厂超低排放烟气治理工程技术规范》（HJ2053-2175）相
  关要求。
  。原文件中描述污染物类别为废气，污染物指标为二氧化硫（烟煤，无炉内脱硫），此处对其进行了匹配工作，将其匹配到LCAflow库里面相最符合的流，污染物指标备注为二氧化硫（烟煤，无炉内脱硫）原文描述的产污系数为 16Sar。请根据备注自行核算后修改对应的排放量。
- sulfur dioxide: 0
  the Technical of end-of-pipe management technology for pollution sulfur dioxideisHigh-efficiency lime/gypsum method②，Its Technical efficiency of end-of-pipe management0.5Sar+98.2.The original article describes the pollution production coefficients as 16Sar。Please revise the corresponding emissions after accounting for them according to the notes.。.The original article describes the pollution production coefficients as 16Sar. Please revise the corresponding emissions after accounting for them according to the notes.
  污染物指标二氧化硫（无烟煤，无炉内脱硫）的末端治理技术是高效石灰石/石膏法②，其效率为0.5Sar+98.2，末端治理设施实际运行率（k值）计算公式为脱硫设施年实际运行小时数/机组年实际运行小时数，②高效二氧化硫末端治理技术：采取空塔提效、强化气液传质、改善pH值分区等措施，满足《燃煤电厂超低排放烟气治理工程技术规范》（HJ2053-2192）相
  关要求。
  。原文件中描述污染物类别为废气，污染物指标为二氧化硫（无烟煤，无炉内脱硫），此处对其进行了匹配工作，将其匹配到LCAflow库里面相最符合的流，污染物指标备注为二氧化硫（无烟煤，无炉内脱硫）原文描述的产污系数为 16Sar。请根据备注自行核算后修改对应的排放量。
- sulfur dioxide: 0
  the Technical of end-of-pipe management technology for pollution sulfur dioxideisHigh-efficiency lime/gypsum method②，Its Technical efficiency of end-of-pipe management0.5Sar+98.2.The original article describes the pollution production coefficients as 16Sar。Please revise the corresponding emissions after accounting for them according to the notes.。.The original article describes the pollution production coefficients as 16Sar. Please revise the corresponding emissions after accounting for them according to the notes.
  污染物指标二氧化硫（无烟煤，无炉内脱硫）的末端治理技术是高效石灰/石膏法②，其效率为0.5Sar+98.2，末端治理设施实际运行率（k值）计算公式为脱硫设施年实际运行小时数/机组年实际运行小时数，②高效二氧化硫末端治理技术：采取空塔提效、强化气液传质、改善pH值分区等措施，满足《燃煤电厂超低排放烟气治理工程技术规范》（HJ2053-2193）相
  关要求。
  。原文件中描述污染物类别为废气，污染物指标为二氧化硫（无烟煤，无炉内脱硫），此处对其进行了匹配工作，将其匹配到LCAflow库里面相最符合的流，污染物指标备注为二氧化硫（无烟煤，无炉内脱硫）原文描述的产污系数为 16Sar。请根据备注自行核算后修改对应的排放量。
- sulfur dioxide: 0
  the Technical of end-of-pipe management technology for pollution sulfur dioxideisHigh-efficiency lime/gypsum method②，Its Technical efficiency of end-of-pipe management0.5Sar+98.2.The original article describes the pollution production coefficients as 15Sar。Please revise the corresponding emissions after accounting for them according to the notes.。.The original article describes the pollution production coefficients as 15Sar. Please revise the corresponding emissions after accounting for them according to the notes.
  污染物指标二氧化硫（褐煤，无炉内脱硫）的末端治理技术是高效石灰石/石膏法②，其效率为0.5Sar+98.2，末端治理设施实际运行率（k值）计算公式为脱硫设施年实际运行小时数/机组年实际运行小时数，②高效二氧化硫末端治理技术：采取空塔提效、强化气液传质、改善pH值分区等措施，满足《燃煤电厂超低排放烟气治理工程技术规范》（HJ2053-2210）相
  关要求。
  。原文件中描述污染物类别为废气，污染物指标为二氧化硫（褐煤，无炉内脱硫），此处对其进行了匹配工作，将其匹配到LCAflow库里面相最符合的流，污染物指标备注为二氧化硫（褐煤，无炉内脱硫）原文描述的产污系数为 15Sar。请根据备注自行核算后修改对应的排放量。
- sulfur dioxide: 0
  the Technical of end-of-pipe management technology for pollution sulfur dioxideisHigh-efficiency lime/gypsum method②，Its Technical efficiency of end-of-pipe management0.5Sar+98.2.The original article describes the pollution production coefficients as 15Sar。Please revise the corresponding emissions after accounting for them according to the notes.。.The original article describes the pollution production coefficients as 15Sar. Please revise the corresponding emissions after accounting for them according to the notes.
  污染物指标二氧化硫（褐煤，无炉内脱硫）的末端治理技术是高效石灰/石膏法②，其效率为0.5Sar+98.2，末端治理设施实际运行率（k值）计算公式为脱硫设施年实际运行小时数/机组年实际运行小时数，②高效二氧化硫末端治理技术：采取空塔提效、强化气液传质、改善pH值分区等措施，满足《燃煤电厂超低排放烟气治理工程技术规范》（HJ2053-2211）相
  关要求。
  。原文件中描述污染物类别为废气，污染物指标为二氧化硫（褐煤，无炉内脱硫），此处对其进行了匹配工作，将其匹配到LCAflow库里面相最符合的流，污染物指标备注为二氧化硫（褐煤，无炉内脱硫）原文描述的产污系数为 15Sar。请根据备注自行核算后修改对应的排放量。
- sulfur dioxide: 0
  the Technical of end-of-pipe management technology for pollution sulfur dioxideisHigh-efficiency magnesium oxide method②，Its Technical efficiency of end-of-pipe management0.5Sar+97.8.The original article describes the pollution production coefficients as 11.2Sar。Please revise the corresponding emissions after accounting for them according to the notes.。.The original article describes the pollution production coefficients as 11.2Sar. Please revise the corresponding emissions after accounting for them according to the notes.
  污染物指标二氧化硫（烟煤，炉内脱硫）的末端治理技术是高效氧化镁法②，其效率为0.5Sar+97.8，末端治理设施实际运行率（k值）计算公式为脱硫设施年实际运行小时数/机组年实际运行小时数，②高效二氧化硫末端治理技术：采取空塔提效、强化气液传质、改善pH值分区等措施，满足《燃煤电厂超低排放烟气治理工程技术规范》（HJ2053-2189）相
  关要求。
  。原文件中描述污染物类别为废气，污染物指标为二氧化硫（烟煤，炉内脱硫），此处对其进行了匹配工作，将其匹配到LCAflow库里面相最符合的流，污染物指标备注为二氧化硫（烟煤，炉内脱硫）原文描述的产污系数为 11.2Sar。请根据备注自行核算后修改对应的排放量。
- sulfur dioxide: 0
  the Technical of end-of-pipe management technology for pollution sulfur dioxideisHigh-efficiency magnesium oxide method②，Its Technical efficiency of end-of-pipe management0.5Sar+97.8.The original article describes the pollution production coefficients as 11.2Sar。Please revise the corresponding emissions after accounting for them according to the notes.。.The original article describes the pollution production coefficients as 11.2Sar. Please revise the corresponding emissions after accounting for them according to the notes.
  污染物指标二氧化硫（无烟煤，炉内脱硫）的末端治理技术是高效氧化镁法②，其效率为0.5Sar+97.8，末端治理设施实际运行率（k值）计算公式为脱硫设施年实际运行小时数/机组年实际运行小时数，②高效二氧化硫末端治理技术：采取空塔提效、强化气液传质、改善pH值分区等措施，满足《燃煤电厂超低排放烟气治理工程技术规范》（HJ2053-2207）相
  关要求。
  。原文件中描述污染物类别为废气，污染物指标为二氧化硫（无烟煤，炉内脱硫），此处对其进行了匹配工作，将其匹配到LCAflow库里面相最符合的流，污染物指标备注为二氧化硫（无烟煤，炉内脱硫）原文描述的产污系数为 11.2Sar。请根据备注自行核算后修改对应的排放量。
- sulfur dioxide: 0
  the Technical of end-of-pipe management technology for pollution sulfur dioxideisHigh-efficiency magnesium oxide method②，Its Technical efficiency of end-of-pipe management0.5Sar+97.8.The original article describes the pollution production coefficients as 10.5Sar。Please revise the corresponding emissions after accounting for them according to the notes.。.The original article describes the pollution production coefficients as 10.5Sar. Please revise the corresponding emissions after accounting for them according to the notes.
  污染物指标二氧化硫（褐煤，炉内脱硫）的末端治理技术是高效氧化镁法②，其效率为0.5Sar+97.8，末端治理设施实际运行率（k值）计算公式为脱硫设施年实际运行小时数/机组年实际运行小时数，②高效二氧化硫末端治理技术：采取空塔提效、强化气液传质、改善pH值分区等措施，满足《燃煤电厂超低排放烟气治理工程技术规范》（HJ2053-2225）相
  关要求。
  。原文件中描述污染物类别为废气，污染物指标为二氧化硫（褐煤，炉内脱硫），此处对其进行了匹配工作，将其匹配到LCAflow库里面相最符合的流，污染物指标备注为二氧化硫（褐煤，炉内脱硫）原文描述的产污系数为 10.5Sar。请根据备注自行核算后修改对应的排放量。
- sulfur dioxide: 0
  the Technical of end-of-pipe management technology for pollution sulfur dioxideisHigh-efficiency magnesium oxide method②，Its Technical efficiency of end-of-pipe management0.5Sar+98.2.The original article describes the pollution production coefficients as 16Sar。Please revise the corresponding emissions after accounting for them according to the notes.。.The original article describes the pollution production coefficients as 16Sar. Please revise the corresponding emissions after accounting for them according to the notes.
  污染物指标二氧化硫（烟煤，无炉内脱硫）的末端治理技术是高效氧化镁法②，其效率为0.5Sar+98.2，末端治理设施实际运行率（k值）计算公式为脱硫设施年实际运行小时数/机组年实际运行小时数，②高效二氧化硫末端治理技术：采取空塔提效、强化气液传质、改善pH值分区等措施，满足《燃煤电厂超低排放烟气治理工程技术规范》（HJ2053-2180）相
  关要求。
  。原文件中描述污染物类别为废气，污染物指标为二氧化硫（烟煤，无炉内脱硫），此处对其进行了匹配工作，将其匹配到LCAflow库里面相最符合的流，污染物指标备注为二氧化硫（烟煤，无炉内脱硫）原文描述的产污系数为 16Sar。请根据备注自行核算后修改对应的排放量。
- sulfur dioxide: 0
  the Technical of end-of-pipe management technology for pollution sulfur dioxideisHigh-efficiency magnesium oxide method②，Its Technical efficiency of end-of-pipe management0.5Sar+98.2.The original article describes the pollution production coefficients as 16Sar。Please revise the corresponding emissions after accounting for them according to the notes.。.The original article describes the pollution production coefficients as 16Sar. Please revise the corresponding emissions after accounting for them according to the notes.
  污染物指标二氧化硫（无烟煤，无炉内脱硫）的末端治理技术是高效氧化镁法②，其效率为0.5Sar+98.2，末端治理设施实际运行率（k值）计算公式为脱硫设施年实际运行小时数/机组年实际运行小时数，②高效二氧化硫末端治理技术：采取空塔提效、强化气液传质、改善pH值分区等措施，满足《燃煤电厂超低排放烟气治理工程技术规范》（HJ2053-2198）相
  关要求。
  。原文件中描述污染物类别为废气，污染物指标为二氧化硫（无烟煤，无炉内脱硫），此处对其进行了匹配工作，将其匹配到LCAflow库里面相最符合的流，污染物指标备注为二氧化硫（无烟煤，无炉内脱硫）原文描述的产污系数为 16Sar。请根据备注自行核算后修改对应的排放量。
- sulfur dioxide: 0
  the Technical of end-of-pipe management technology for pollution sulfur dioxideisHigh-efficiency magnesium oxide method②，Its Technical efficiency of end-of-pipe management0.5Sar+98.2.The original article describes the pollution production coefficients as 15Sar。Please revise the corresponding emissions after accounting for them according to the notes.。.The original article describes the pollution production coefficients as 15Sar. Please revise the corresponding emissions after accounting for them according to the notes.
  污染物指标二氧化硫（褐煤，无炉内脱硫）的末端治理技术是高效氧化镁法②，其效率为0.5Sar+98.2，末端治理设施实际运行率（k值）计算公式为脱硫设施年实际运行小时数/机组年实际运行小时数，②高效二氧化硫末端治理技术：采取空塔提效、强化气液传质、改善pH值分区等措施，满足《燃煤电厂超低排放烟气治理工程技术规范》（HJ2053-2216）相
  关要求。
  。原文件中描述污染物类别为废气，污染物指标为二氧化硫（褐煤，无炉内脱硫），此处对其进行了匹配工作，将其匹配到LCAflow库里面相最符合的流，污染物指标备注为二氧化硫（褐煤，无炉内脱硫）原文描述的产污系数为 15Sar。请根据备注自行核算后修改对应的排放量。
- sulfur dioxide: 0
  the Technical of end-of-pipe management technology for pollution sulfur dioxideisLime/gypsum method，Its Technical efficiency of end-of-pipe management4.2857Sar+81.14.The original article describes the pollution production coefficients as 11.2Sar。Please revise the corresponding emissions after accounting for them according to the notes.。.The original article describes the pollution production coefficients as 11.2Sar. Please revise the corresponding emissions after accounting for them according to the notes.
  污染物指标二氧化硫（烟煤，炉内脱硫）的末端治理技术是石灰/石膏法，其效率为4.2857Sar+81.14，末端治理设施实际运行率（k值）计算公式为脱硫设施年实际运行小时数/机组年实际运行小时数。原文件中描述污染物类别为废气，污染物指标为二氧化硫（烟煤，炉内脱硫），此处对其进行了匹配工作，将其匹配到LCAflow库里面相最符合的流，污染物指标备注为二氧化硫（烟煤，炉内脱硫）原文描述的产污系数为 11.2Sar。请根据备注自行核算后修改对应的排放量。
- sulfur dioxide: 0
  the Technical of end-of-pipe management technology for pollution sulfur dioxideisLime/gypsum method，Its Technical efficiency of end-of-pipe management4.2857Sar+81.14.The original article describes the pollution production coefficients as 11.2Sar。Please revise the corresponding emissions after accounting for them according to the notes.。.The original article describes the pollution production coefficients as 11.2Sar. Please revise the corresponding emissions after accounting for them according to the notes.
  污染物指标二氧化硫（无烟煤，炉内脱硫）的末端治理技术是石灰/石膏法，其效率为4.2857Sar+81.14，末端治理设施实际运行率（k值）计算公式为脱硫设施年实际运行小时数/机组年实际运行小时数。原文件中描述污染物类别为废气，污染物指标为二氧化硫（无烟煤，炉内脱硫），此处对其进行了匹配工作，将其匹配到LCAflow库里面相最符合的流，污染物指标备注为二氧化硫（无烟煤，炉内脱硫）原文描述的产污系数为 11.2Sar。请根据备注自行核算后修改对应的排放量。
- sulfur dioxide: 0
  the Technical of end-of-pipe management technology for pollution sulfur dioxideisLime/gypsum method，Its Technical efficiency of end-of-pipe management4.2857Sar+81.14.The original article describes the pollution production coefficients as 10.5Sar。Please revise the corresponding emissions after accounting for them according to the notes.。.The original article describes the pollution production coefficients as 10.5Sar. Please revise the corresponding emissions after accounting for them according to the notes.
  污染物指标二氧化硫（褐煤，炉内脱硫）的末端治理技术是石灰/石膏法，其效率为4.2857Sar+81.14，末端治理设施实际运行率（k值）计算公式为脱硫设施年实际运行小时数/机组年实际运行小时数。原文件中描述污染物类别为废气，污染物指标为二氧化硫（褐煤，炉内脱硫），此处对其进行了匹配工作，将其匹配到LCAflow库里面相最符合的流，污染物指标备注为二氧化硫（褐煤，炉内脱硫）原文描述的产污系数为 10.5Sar。请根据备注自行核算后修改对应的排放量。
- sulfur dioxide: 0
  the Technical of end-of-pipe management technology for pollution sulfur dioxideisLime/gypsum method，Its Technical efficiency of end-of-pipe management4.2857Sar+84.57.The original article describes the pollution production coefficients as 16Sar。Please revise the corresponding emissions after accounting for them according to the notes.。.The original article describes the pollution production coefficients as 16Sar. Please revise the corresponding emissions after accounting for them according to the notes.
  污染物指标二氧化硫（烟煤，无炉内脱硫）的末端治理技术是石灰/石膏法，其效率为4.2857Sar+84.57，末端治理设施实际运行率（k值）计算公式为脱硫设施年实际运行小时数/机组年实际运行小时数。原文件中描述污染物类别为废气，污染物指标为二氧化硫（烟煤，无炉内脱硫），此处对其进行了匹配工作，将其匹配到LCAflow库里面相最符合的流，污染物指标备注为二氧化硫（烟煤，无炉内脱硫）原文描述的产污系数为 16Sar。请根据备注自行核算后修改对应的排放量。
- sulfur dioxide: 0
  the Technical of end-of-pipe management technology for pollution sulfur dioxideisLime/gypsum method，Its Technical efficiency of end-of-pipe management4.2857Sar+84.57.The original article describes the pollution production coefficients as 16Sar。Please revise the corresponding emissions after accounting for them according to the notes.。.The original article describes the pollution production coefficients as 16Sar. Please revise the corresponding emissions after accounting for them according to the notes.
  污染物指标二氧化硫（无烟煤，无炉内脱硫）的末端治理技术是石灰/石膏法，其效率为4.2857Sar+84.57，末端治理设施实际运行率（k值）计算公式为脱硫设施年实际运行小时数/机组年实际运行小时数。原文件中描述污染物类别为废气，污染物指标为二氧化硫（无烟煤，无炉内脱硫），此处对其进行了匹配工作，将其匹配到LCAflow库里面相最符合的流，污染物指标备注为二氧化硫（无烟煤，无炉内脱硫）原文描述的产污系数为 16Sar。请根据备注自行核算后修改对应的排放量。
- sulfur dioxide: 0
  the Technical of end-of-pipe management technology for pollution sulfur dioxideisLime/gypsum method，Its Technical efficiency of end-of-pipe management4.2857Sar+84.57.The original article describes the pollution production coefficients as 15Sar。Please revise the corresponding emissions after accounting for them according to the notes.。.The original article describes the pollution production coefficients as 15Sar. Please revise the corresponding emissions after accounting for them according to the notes.
  污染物指标二氧化硫（褐煤，无炉内脱硫）的末端治理技术是石灰/石膏法，其效率为4.2857Sar+84.57，末端治理设施实际运行率（k值）计算公式为脱硫设施年实际运行小时数/机组年实际运行小时数。原文件中描述污染物类别为废气，污染物指标为二氧化硫（褐煤，无炉内脱硫），此处对其进行了匹配工作，将其匹配到LCAflow库里面相最符合的流，污染物指标备注为二氧化硫（褐煤，无炉内脱硫）原文描述的产污系数为 15Sar。请根据备注自行核算后修改对应的排放量。
- sulfur dioxide: 0
  the Technical of end-of-pipe management technology for pollution sulfur dioxideisLimestone/gypsum method，Its Technical efficiency of end-of-pipe management4.2857Sar+81.14.The original article describes the pollution production coefficients as 11.2Sar。Please revise the corresponding emissions after accounting for them according to the notes.。.The original article describes the pollution production coefficients as 11.2Sar. Please revise the corresponding emissions after accounting for them according to the notes.
  污染物指标二氧化硫（烟煤，炉内脱硫）的末端治理技术是石灰石/石膏法，其效率为4.2857Sar+81.14，末端治理设施实际运行率（k值）计算公式为脱硫设施年实际运行小时数/机组年实际运行小时数。原文件中描述污染物类别为废气，污染物指标为二氧化硫（烟煤，炉内脱硫），此处对其进行了匹配工作，将其匹配到LCAflow库里面相最符合的流，污染物指标备注为二氧化硫（烟煤，炉内脱硫）原文描述的产污系数为 11.2Sar。请根据备注自行核算后修改对应的排放量。
- sulfur dioxide: 0
  the Technical of end-of-pipe management technology for pollution sulfur dioxideisLimestone/gypsum method，Its Technical efficiency of end-of-pipe management4.2857Sar+81.14.The original article describes the pollution production coefficients as 11.2Sar。Please revise the corresponding emissions after accounting for them according to the notes.。.The original article describes the pollution production coefficients as 11.2Sar. Please revise the corresponding emissions after accounting for them according to the notes.
  污染物指标二氧化硫（无烟煤，炉内脱硫）的末端治理技术是石灰石/石膏法，其效率为4.2857Sar+81.14，末端治理设施实际运行率（k值）计算公式为脱硫设施年实际运行小时数/机组年实际运行小时数。原文件中描述污染物类别为废气，污染物指标为二氧化硫（无烟煤，炉内脱硫），此处对其进行了匹配工作，将其匹配到LCAflow库里面相最符合的流，污染物指标备注为二氧化硫（无烟煤，炉内脱硫）原文描述的产污系数为 11.2Sar。请根据备注自行核算后修改对应的排放量。
- sulfur dioxide: 0
  the Technical of end-of-pipe management technology for pollution sulfur dioxideisLimestone/gypsum method，Its Technical efficiency of end-of-pipe management4.2857Sar+81.14.The original article describes the pollution production coefficients as 10.5Sar。Please revise the corresponding emissions after accounting for them according to the notes.。.The original article describes the pollution production coefficients as 10.5Sar. Please revise the corresponding emissions after accounting for them according to the notes.
  污染物指标二氧化硫（褐煤，炉内脱硫）的末端治理技术是石灰石/石膏法，其效率为4.2857Sar+81.14，末端治理设施实际运行率（k值）计算公式为脱硫设施年实际运行小时数/机组年实际运行小时数。原文件中描述污染物类别为废气，污染物指标为二氧化硫（褐煤，炉内脱硫），此处对其进行了匹配工作，将其匹配到LCAflow库里面相最符合的流，污染物指标备注为二氧化硫（褐煤，炉内脱硫）原文描述的产污系数为 10.5Sar。请根据备注自行核算后修改对应的排放量。
- sulfur dioxide: 0
  the Technical of end-of-pipe management technology for pollution sulfur dioxideisLimestone/gypsum method，Its Technical efficiency of end-of-pipe management4.2857Sar+84.57.The original article describes the pollution production coefficients as 16Sar。Please revise the corresponding emissions after accounting for them according to the notes.。.The original article describes the pollution production coefficients as 16Sar. Please revise the corresponding emissions after accounting for them according to the notes.
  污染物指标二氧化硫（烟煤，无炉内脱硫）的末端治理技术是石灰石/石膏法，其效率为4.2857Sar+84.57，末端治理设施实际运行率（k值）计算公式为脱硫设施年实际运行小时数/机组年实际运行小时数。原文件中描述污染物类别为废气，污染物指标为二氧化硫（烟煤，无炉内脱硫），此处对其进行了匹配工作，将其匹配到LCAflow库里面相最符合的流，污染物指标备注为二氧化硫（烟煤，无炉内脱硫）原文描述的产污系数为 16Sar。请根据备注自行核算后修改对应的排放量。
- sulfur dioxide: 0
  the Technical of end-of-pipe management technology for pollution sulfur dioxideisLimestone/gypsum method，Its Technical efficiency of end-of-pipe management4.2857Sar+84.57.The original article describes the pollution production coefficients as 16Sar。Please revise the corresponding emissions after accounting for them according to the notes.。.The original article describes the pollution production coefficients as 16Sar. Please revise the corresponding emissions after accounting for them according to the notes.
  污染物指标二氧化硫（无烟煤，无炉内脱硫）的末端治理技术是石灰石/石膏法，其效率为4.2857Sar+84.57，末端治理设施实际运行率（k值）计算公式为脱硫设施年实际运行小时数/机组年实际运行小时数。原文件中描述污染物类别为废气，污染物指标为二氧化硫（无烟煤，无炉内脱硫），此处对其进行了匹配工作，将其匹配到LCAflow库里面相最符合的流，污染物指标备注为二氧化硫（无烟煤，无炉内脱硫）原文描述的产污系数为 16Sar。请根据备注自行核算后修改对应的排放量。
- sulfur dioxide: 0
  the Technical of end-of-pipe management technology for pollution sulfur dioxideisLimestone/gypsum method，Its Technical efficiency of end-of-pipe management4.2857Sar+84.57.The original article describes the pollution production coefficients as 15Sar。Please revise the corresponding emissions after accounting for them according to the notes.。.The original article describes the pollution production coefficients as 15Sar. Please revise the corresponding emissions after accounting for them according to the notes.
  污染物指标二氧化硫（褐煤，无炉内脱硫）的末端治理技术是石灰石/石膏法，其效率为4.2857Sar+84.57，末端治理设施实际运行率（k值）计算公式为脱硫设施年实际运行小时数/机组年实际运行小时数。原文件中描述污染物类别为废气，污染物指标为二氧化硫（褐煤，无炉内脱硫），此处对其进行了匹配工作，将其匹配到LCAflow库里面相最符合的流，污染物指标备注为二氧化硫（褐煤，无炉内脱硫）原文描述的产污系数为 15Sar。请根据备注自行核算后修改对应的排放量。
- sulfur dioxide: 0
  the Technical of end-of-pipe management technology for pollution sulfur dioxideisMagnesium oxide method，Its Technical efficiency of end-of-pipe management4.2857Sar+81.14.The original article describes the pollution production coefficients as 11.2Sar。Please revise the corresponding emissions after accounting for them according to the notes.。.The original article describes the pollution production coefficients as 11.2Sar. Please revise the corresponding emissions after accounting for them according to the notes.
  污染物指标二氧化硫（烟煤，炉内脱硫）的末端治理技术是氧化镁法，其效率为4.2857Sar+81.14，末端治理设施实际运行率（k值）计算公式为脱硫设施年实际运行小时数/机组年实际运行小时数。原文件中描述污染物类别为废气，污染物指标为二氧化硫（烟煤，炉内脱硫），此处对其进行了匹配工作，将其匹配到LCAflow库里面相最符合的流，污染物指标备注为二氧化硫（烟煤，炉内脱硫）原文描述的产污系数为 11.2Sar。请根据备注自行核算后修改对应的排放量。
- sulfur dioxide: 0
  the Technical of end-of-pipe management technology for pollution sulfur dioxideisMagnesium oxide method，Its Technical efficiency of end-of-pipe management4.2857Sar+81.14.The original article describes the pollution production coefficients as 11.2Sar。Please revise the corresponding emissions after accounting for them according to the notes.。.The original article describes the pollution production coefficients as 11.2Sar. Please revise the corresponding emissions after accounting for them according to the notes.
  污染物指标二氧化硫（无烟煤，炉内脱硫）的末端治理技术是氧化镁法，其效率为4.2857Sar+81.14，末端治理设施实际运行率（k值）计算公式为脱硫设施年实际运行小时数/机组年实际运行小时数。原文件中描述污染物类别为废气，污染物指标为二氧化硫（无烟煤，炉内脱硫），此处对其进行了匹配工作，将其匹配到LCAflow库里面相最符合的流，污染物指标备注为二氧化硫（无烟煤，炉内脱硫）原文描述的产污系数为 11.2Sar。请根据备注自行核算后修改对应的排放量。
- sulfur dioxide: 0
  the Technical of end-of-pipe management technology for pollution sulfur dioxideisMagnesium oxide method，Its Technical efficiency of end-of-pipe management4.2857Sar+81.14.The original article describes the pollution production coefficients as 10.5Sar。Please revise the corresponding emissions after accounting for them according to the notes.。.The original article describes the pollution production coefficients as 10.5Sar. Please revise the corresponding emissions after accounting for them according to the notes.
  污染物指标二氧化硫（褐煤，炉内脱硫）的末端治理技术是氧化镁法，其效率为4.2857Sar+81.14，末端治理设施实际运行率（k值）计算公式为脱硫设施年实际运行小时数/机组年实际运行小时数。原文件中描述污染物类别为废气，污染物指标为二氧化硫（褐煤，炉内脱硫），此处对其进行了匹配工作，将其匹配到LCAflow库里面相最符合的流，污染物指标备注为二氧化硫（褐煤，炉内脱硫）原文描述的产污系数为 10.5Sar。请根据备注自行核算后修改对应的排放量。
- sulfur dioxide: 0
  the Technical of end-of-pipe management technology for pollution sulfur dioxideisMagnesium oxide method，Its Technical efficiency of end-of-pipe management4.2857Sar+84.57.The original article describes the pollution production coefficients as 16Sar。Please revise the corresponding emissions after accounting for them according to the notes.。.The original article describes the pollution production coefficients as 16Sar. Please revise the corresponding emissions after accounting for them according to the notes.
  污染物指标二氧化硫（烟煤，无炉内脱硫）的末端治理技术是氧化镁法，其效率为4.2857Sar+84.57，末端治理设施实际运行率（k值）计算公式为脱硫设施年实际运行小时数/机组年实际运行小时数。原文件中描述污染物类别为废气，污染物指标为二氧化硫（烟煤，无炉内脱硫），此处对其进行了匹配工作，将其匹配到LCAflow库里面相最符合的流，污染物指标备注为二氧化硫（烟煤，无炉内脱硫）原文描述的产污系数为 16Sar。请根据备注自行核算后修改对应的排放量。

- sulfur dioxide: 0
  the Technical of end-of-pipe management technology for pollution sulfur dioxideisMagnesium oxide method，Its Technical efficiency of end-of-pipe management4.2857Sar+84.57.The original article describes the pollution production coefficients as 16Sar。Please revise the corresponding emissions after accounting for them according to the notes.。.The original article describes the pollution production coefficients as 16Sar. Please revise the corresponding emissions after accounting for them according to the notes.
  污染物指标二氧化硫（无烟煤，无炉内脱硫）的末端治理技术是氧化镁法，其效率为4.2857Sar+84.57，末端治理设施实际运行率（k值）计算公式为脱硫设施年实际运行小时数/机组年实际运行小时数。原文件中描述污染物类别为废气，污染物指标为二氧化硫（无烟煤，无炉内脱硫），此处对其进行了匹配工作，将其匹配到LCAflow库里面相最符合的流，污染物指标备注为二氧化硫（无烟煤，无炉内脱硫）原文描述的产污系数为 16Sar。请根据备注自行核算后修改对应的排放量。
- sulfur dioxide: 0
  the Technical of end-of-pipe management technology for pollution sulfur dioxideisMagnesium oxide method，Its Technical efficiency of end-of-pipe management4.2857Sar+84.57.The original article describes the pollution production coefficients as 15Sar。Please revise the corresponding emissions after accounting for them according to the notes.。.The original article describes the pollution production coefficients as 15Sar. Please revise the corresponding emissions after accounting for them according to the notes.
  污染物指标二氧化硫（褐煤，无炉内脱硫）的末端治理技术是氧化镁法，其效率为4.2857Sar+84.57，末端治理设施实际运行率（k值）计算公式为脱硫设施年实际运行小时数/机组年实际运行小时数。原文件中描述污染物类别为废气，污染物指标为二氧化硫（褐煤，无炉内脱硫），此处对其进行了匹配工作，将其匹配到LCAflow库里面相最符合的流，污染物指标备注为二氧化硫（褐煤，无炉内脱硫）原文描述的产污系数为 15Sar。请根据备注自行核算后修改对应的排放量。
- sulfur dioxide: 0
  the Technical of end-of-pipe management technology for pollution sulfur dioxideisOthers (carbide slag method)，Its Technical efficiency of end-of-pipe management5.1429Sar+79.43.The original article describes the pollution production coefficients as 11.2Sar。Please revise the corresponding emissions after accounting for them according to the notes.。.The original article describes the pollution production coefficients as 11.2Sar. Please revise the corresponding emissions after accounting for them according to the notes.
  污染物指标二氧化硫（烟煤，炉内脱硫）的末端治理技术是其他（电石渣法），其效率为5.1429Sar+79.43，末端治理设施实际运行率（k值）计算公式为脱硫设施年实际运行小时数/机组年实际运行小时数。原文件中描述污染物类别为废气，污染物指标为二氧化硫（烟煤，炉内脱硫），此处对其进行了匹配工作，将其匹配到LCAflow库里面相最符合的流，污染物指标备注为二氧化硫（烟煤，炉内脱硫）原文描述的产污系数为 11.2Sar。请根据备注自行核算后修改对应的排放量。
- sulfur dioxide: 0
  the Technical of end-of-pipe management technology for pollution sulfur dioxideisOthers (carbide slag method)，Its Technical efficiency of end-of-pipe management5.1429Sar+79.43.The original article describes the pollution production coefficients as 11.2Sar。Please revise the corresponding emissions after accounting for them according to the notes.。.The original article describes the pollution production coefficients as 11.2Sar. Please revise the corresponding emissions after accounting for them according to the notes.
  污染物指标二氧化硫（无烟煤，炉内脱硫）的末端治理技术是其他（电石渣法），其效率为5.1429Sar+79.43，末端治理设施实际运行率（k值）计算公式为脱硫设施年实际运行小时数/机组年实际运行小时数。原文件中描述污染物类别为废气，污染物指标为二氧化硫（无烟煤，炉内脱硫），此处对其进行了匹配工作，将其匹配到LCAflow库里面相最符合的流，污染物指标备注为二氧化硫（无烟煤，炉内脱硫）原文描述的产污系数为 11.2Sar。请根据备注自行核算后修改对应的排放量。
- sulfur dioxide: 0
  the Technical of end-of-pipe management technology for pollution sulfur dioxideisOthers (carbide slag method)，Its Technical efficiency of end-of-pipe management5.1429Sar+79.43.The original article describes the pollution production coefficients as 10.5Sar。Please revise the corresponding emissions after accounting for them according to the notes.。.The original article describes the pollution production coefficients as 10.5Sar. Please revise the corresponding emissions after accounting for them according to the notes.
  污染物指标二氧化硫（褐煤，炉内脱硫）的末端治理技术是其他（电石渣法），其效率为5.1429Sar+79.43，末端治理设施实际运行率（k值）计算公式为脱硫设施年实际运行小时数/机组年实际运行小时数。原文件中描述污染物类别为废气，污染物指标为二氧化硫（褐煤，炉内脱硫），此处对其进行了匹配工作，将其匹配到LCAflow库里面相最符合的流，污染物指标备注为二氧化硫（褐煤，炉内脱硫）原文描述的产污系数为 10.5Sar。请根据备注自行核算后修改对应的排放量。
- sulfur dioxide: 0
  the Technical of end-of-pipe management technology for pollution sulfur dioxideisOthers (carbide slag method)，Its Technical efficiency of end-of-pipe management5.1429Sar+82.86.The original article describes the pollution production coefficients as 16Sar。Please revise the corresponding emissions after accounting for them according to the notes.。.The original article describes the pollution production coefficients as 16Sar. Please revise the corresponding emissions after accounting for them according to the notes.
  污染物指标二氧化硫（烟煤，无炉内脱硫）的末端治理技术是其他（电石渣法），其效率为5.1429Sar+82.86，末端治理设施实际运行率（k值）计算公式为脱硫设施年实际运行小时数/机组年实际运行小时数。原文件中描述污染物类别为废气，污染物指标为二氧化硫（烟煤，无炉内脱硫），此处对其进行了匹配工作，将其匹配到LCAflow库里面相最符合的流，污染物指标备注为二氧化硫（烟煤，无炉内脱硫）原文描述的产污系数为 16Sar。请根据备注自行核算后修改对应的排放量。
- sulfur dioxide: 0
  the Technical of end-of-pipe management technology for pollution sulfur dioxideisOthers (carbide slag method)，Its Technical efficiency of end-of-pipe management5.1429Sar+82.86.The original article describes the pollution production coefficients as 16Sar。Please revise the corresponding emissions after accounting for them according to the notes.。.The original article describes the pollution production coefficients as 16Sar. Please revise the corresponding emissions after accounting for them according to the notes.
  污染物指标二氧化硫（无烟煤，无炉内脱硫）的末端治理技术是其他（电石渣法），其效率为5.1429Sar+82.86，末端治理设施实际运行率（k值）计算公式为脱硫设施年实际运行小时数/机组年实际运行小时数。原文件中描述污染物类别为废气，污染物指标为二氧化硫（无烟煤，无炉内脱硫），此处对其进行了匹配工作，将其匹配到LCAflow库里面相最符合的流，污染物指标备注为二氧化硫（无烟煤，无炉内脱硫）原文描述的产污系数为 16Sar。请根据备注自行核算后修改对应的排放量。
- sulfur dioxide: 0
  the Technical of end-of-pipe management technology for pollution sulfur dioxideisOthers (carbide slag method)，Its Technical efficiency of end-of-pipe management5.1429Sar+82.86.The original article describes the pollution production coefficients as 15Sar。Please revise the corresponding emissions after accounting for them according to the notes.。.The original article describes the pollution production coefficients as 15Sar. Please revise the corresponding emissions after accounting for them according to the notes.
  污染物指标二氧化硫（褐煤，无炉内脱硫）的末端治理技术是其他（电石渣法），其效率为5.1429Sar+82.86，末端治理设施实际运行率（k值）计算公式为脱硫设施年实际运行小时数/机组年实际运行小时数。原文件中描述污染物类别为废气，污染物指标为二氧化硫（褐煤，无炉内脱硫），此处对其进行了匹配工作，将其匹配到LCAflow库里面相最符合的流，污染物指标备注为二氧化硫（褐煤，无炉内脱硫）原文描述的产污系数为 15Sar。请根据备注自行核算后修改对应的排放量。
- sulfur dioxide: 0
  the Technical of end-of-pipe management technology for pollution sulfur dioxideisOthers (high-efficiency carbide slag method) ②，Its Technical efficiency of end-of-pipe management0.6Sar+97.6.The original article describes the pollution production coefficients as 11.2Sar。Please revise the corresponding emissions after accounting for them according to the notes.。.The original article describes the pollution production coefficients as 11.2Sar. Please revise the corresponding emissions after accounting for them according to the notes.
  污染物指标二氧化硫（烟煤，炉内脱硫）的末端治理技术是其他（高效电石渣法）②，其效率为0.6Sar+97.6，末端治理设施实际运行率（k值）计算公式为脱硫设施年实际运行小时数/机组年实际运行小时数，②高效二氧化硫末端治理技术：采取空塔提效、强化气液传质、改善pH值分区等措施，满足《燃煤电厂超低排放烟气治理工程技术规范》（HJ2053-2186）相
  关要求。
  。原文件中描述污染物类别为废气，污染物指标为二氧化硫（烟煤，炉内脱硫），此处对其进行了匹配工作，将其匹配到LCAflow库里面相最符合的流，污染物指标备注为二氧化硫（烟煤，炉内脱硫）原文描述的产污系数为 11.2Sar。请根据备注自行核算后修改对应的排放量。
- sulfur dioxide: 0
  the Technical of end-of-pipe management technology for pollution sulfur dioxideisOthers (high-efficiency carbide slag method) ②，Its Technical efficiency of end-of-pipe management0.6Sar+97.6.The original article describes the pollution production coefficients as 11.2Sar。Please revise the corresponding emissions after accounting for them according to the notes.。.The original article describes the pollution production coefficients as 11.2Sar. Please revise the corresponding emissions after accounting for them according to the notes.
  污染物指标二氧化硫（无烟煤，炉内脱硫）的末端治理技术是其他（高效电石渣法）②，其效率为0.6Sar+97.6，末端治理设施实际运行率（k值）计算公式为脱硫设施年实际运行小时数/机组年实际运行小时数，②高效二氧化硫末端治理技术：采取空塔提效、强化气液传质、改善pH值分区等措施，满足《燃煤电厂超低排放烟气治理工程技术规范》（HJ2053-2204）相
  关要求。
  。原文件中描述污染物类别为废气，污染物指标为二氧化硫（无烟煤，炉内脱硫），此处对其进行了匹配工作，将其匹配到LCAflow库里面相最符合的流，污染物指标备注为二氧化硫（无烟煤，炉内脱硫）原文描述的产污系数为 11.2Sar。请根据备注自行核算后修改对应的排放量。
- sulfur dioxide: 0
  the Technical of end-of-pipe management technology for pollution sulfur dioxideisOthers (high-efficiency carbide slag method) ②，Its Technical efficiency of end-of-pipe management0.6Sar+97.6.The original article describes the pollution production coefficients as 10.5Sar。Please revise the corresponding emissions after accounting for them according to the notes.。.The original article describes the pollution production coefficients as 10.5Sar. Please revise the corresponding emissions after accounting for them according to the notes.
  污染物指标二氧化硫（褐煤，炉内脱硫）的末端治理技术是其他（高效电石渣法）②，其效率为0.6Sar+97.6，末端治理设施实际运行率（k值）计算公式为脱硫设施年实际运行小时数/机组年实际运行小时数，②高效二氧化硫末端治理技术：采取空塔提效、强化气液传质、改善pH值分区等措施，满足《燃煤电厂超低排放烟气治理工程技术规范》（HJ2053-2222）相
  关要求。
  。原文件中描述污染物类别为废气，污染物指标为二氧化硫（褐煤，炉内脱硫），此处对其进行了匹配工作，将其匹配到LCAflow库里面相最符合的流，污染物指标备注为二氧化硫（褐煤，炉内脱硫）原文描述的产污系数为 10.5Sar。请根据备注自行核算后修改对应的排放量。
- sulfur dioxide: 0
  the Technical of end-of-pipe management technology for pollution sulfur dioxideisOthers (high-efficiency carbide slag method) ②，Its Technical efficiency of end-of-pipe management0.6Sar+98.The original article describes the pollution production coefficients as 16Sar。Please revise the corresponding emissions after accounting for them according to the notes.。.The original article describes the pollution production coefficients as 16Sar. Please revise the corresponding emissions after accounting for them according to the notes.
  污染物指标二氧化硫（烟煤，无炉内脱硫）的末端治理技术是其他（高效电石渣法）②，其效率为0.6Sar+98，末端治理设施实际运行率（k值）计算公式为脱硫设施年实际运行小时数/机组年实际运行小时数，②高效二氧化硫末端治理技术：采取空塔提效、强化气液传质、改善pH值分区等措施，满足《燃煤电厂超低排放烟气治理工程技术规范》（HJ2053-2177）相
  关要求。
  。原文件中描述污染物类别为废气，污染物指标为二氧化硫（烟煤，无炉内脱硫），此处对其进行了匹配工作，将其匹配到LCAflow库里面相最符合的流，污染物指标备注为二氧化硫（烟煤，无炉内脱硫）原文描述的产污系数为 16Sar。请根据备注自行核算后修改对应的排放量。
- sulfur dioxide: 0
  the Technical of end-of-pipe management technology for pollution sulfur dioxideisOthers (high-efficiency carbide slag method) ②，Its Technical efficiency of end-of-pipe management0.6Sar+98.The original article describes the pollution production coefficients as 16Sar。Please revise the corresponding emissions after accounting for them according to the notes.。.The original article describes the pollution production coefficients as 16Sar. Please revise the corresponding emissions after accounting for them according to the notes.
  污染物指标二氧化硫（无烟煤，无炉内脱硫）的末端治理技术是其他（高效电石渣法）②，其效率为0.6Sar+98，末端治理设施实际运行率（k值）计算公式为脱硫设施年实际运行小时数/机组年实际运行小时数，②高效二氧化硫末端治理技术：采取空塔提效、强化气液传质、改善pH值分区等措施，满足《燃煤电厂超低排放烟气治理工程技术规范》（HJ2053-2195）相
  关要求。
  。原文件中描述污染物类别为废气，污染物指标为二氧化硫（无烟煤，无炉内脱硫），此处对其进行了匹配工作，将其匹配到LCAflow库里面相最符合的流，污染物指标备注为二氧化硫（无烟煤，无炉内脱硫）原文描述的产污系数为 16Sar。请根据备注自行核算后修改对应的排放量。
- sulfur dioxide: 0
  the Technical of end-of-pipe management technology for pollution sulfur dioxideisOthers (high-efficiency carbide slag method) ②，Its Technical efficiency of end-of-pipe management0.6Sar+98.The original article describes the pollution production coefficients as 15Sar。Please revise the corresponding emissions after accounting for them according to the notes.。.The original article describes the pollution production coefficients as 15Sar. Please revise the corresponding emissions after accounting for them according to the notes.
  污染物指标二氧化硫（褐煤，无炉内脱硫）的末端治理技术是其他（高效电石渣法）②，其效率为0.6Sar+98，末端治理设施实际运行率（k值）计算公式为脱硫设施年实际运行小时数/机组年实际运行小时数，②高效二氧化硫末端治理技术：采取空塔提效、强化气液传质、改善pH值分区等措施，满足《燃煤电厂超低排放烟气治理工程技术规范》（HJ2053-2213）相
  关要求。
  。原文件中描述污染物类别为废气，污染物指标为二氧化硫（褐煤，无炉内脱硫），此处对其进行了匹配工作，将其匹配到LCAflow库里面相最符合的流，污染物指标备注为二氧化硫（褐煤，无炉内脱硫）原文描述的产污系数为 15Sar。请根据备注自行核算后修改对应的排放量。
- sulfur dioxide: 0
  the Technical of end-of-pipe management technology for pollution sulfur dioxideisOthers (high-efficiency sodium alkali method) ②，Its Technical efficiency of end-of-pipe management0.6Sar+97.6.The original article describes the pollution production coefficients as 11.2Sar。Please revise the corresponding emissions after accounting for them according to the notes.。.The original article describes the pollution production coefficients as 11.2Sar. Please revise the corresponding emissions after accounting for them according to the notes.
  污染物指标二氧化硫（烟煤，炉内脱硫）的末端治理技术是其他（高效钠碱法）②，其效率为0.6Sar+97.6，末端治理设施实际运行率（k值）计算公式为脱硫设施年实际运行小时数/机组年实际运行小时数，②高效二氧化硫末端治理技术：采取空塔提效、强化气液传质、改善pH值分区等措施，满足《燃煤电厂超低排放烟气治理工程技术规范》（HJ2053-2187）相
  关要求。
  。原文件中描述污染物类别为废气，污染物指标为二氧化硫（烟煤，炉内脱硫），此处对其进行了匹配工作，将其匹配到LCAflow库里面相最符合的流，污染物指标备注为二氧化硫（烟煤，炉内脱硫）原文描述的产污系数为 11.2Sar。请根据备注自行核算后修改对应的排放量。
- sulfur dioxide: 0
  the Technical of end-of-pipe management technology for pollution sulfur dioxideisOthers (high-efficiency sodium alkali method) ②，Its Technical efficiency of end-of-pipe management0.6Sar+97.6.The original article describes the pollution production coefficients as 11.2Sar。Please revise the corresponding emissions after accounting for them according to the notes.。.The original article describes the pollution production coefficients as 11.2Sar. Please revise the corresponding emissions after accounting for them according to the notes.
  污染物指标二氧化硫（无烟煤，炉内脱硫）的末端治理技术是其他（高效钠碱法）②，其效率为0.6Sar+97.6，末端治理设施实际运行率（k值）计算公式为脱硫设施年实际运行小时数/机组年实际运行小时数，②高效二氧化硫末端治理技术：采取空塔提效、强化气液传质、改善pH值分区等措施，满足《燃煤电厂超低排放烟气治理工程技术规范》（HJ2053-2205）相
  关要求。
  。原文件中描述污染物类别为废气，污染物指标为二氧化硫（无烟煤，炉内脱硫），此处对其进行了匹配工作，将其匹配到LCAflow库里面相最符合的流，污染物指标备注为二氧化硫（无烟煤，炉内脱硫）原文描述的产污系数为 11.2Sar。请根据备注自行核算后修改对应的排放量。
- sulfur dioxide: 0
  the Technical of end-of-pipe management technology for pollution sulfur dioxideisOthers (high-efficiency sodium alkali method) ②，Its Technical efficiency of end-of-pipe management0.6Sar+97.6.The original article describes the pollution production coefficients as 10.5Sar。Please revise the corresponding emissions after accounting for them according to the notes.。.The original article describes the pollution production coefficients as 10.5Sar. Please revise the corresponding emissions after accounting for them according to the notes.
  污染物指标二氧化硫（褐煤，炉内脱硫）的末端治理技术是其他（高效钠碱法）②，其效率为0.6Sar+97.6，末端治理设施实际运行率（k值）计算公式为脱硫设施年实际运行小时数/机组年实际运行小时数，②高效二氧化硫末端治理技术：采取空塔提效、强化气液传质、改善pH值分区等措施，满足《燃煤电厂超低排放烟气治理工程技术规范》（HJ2053-2223）相
  关要求。
  。原文件中描述污染物类别为废气，污染物指标为二氧化硫（褐煤，炉内脱硫），此处对其进行了匹配工作，将其匹配到LCAflow库里面相最符合的流，污染物指标备注为二氧化硫（褐煤，炉内脱硫）原文描述的产污系数为 10.5Sar。请根据备注自行核算后修改对应的排放量。
- sulfur dioxide: 0
  the Technical of end-of-pipe management technology for pollution sulfur dioxideisOthers (high-efficiency sodium alkali method) ②，Its Technical efficiency of end-of-pipe management0.6Sar+98.The original article describes the pollution production coefficients as 16Sar。Please revise the corresponding emissions after accounting for them according to the notes.。.The original article describes the pollution production coefficients as 16Sar. Please revise the corresponding emissions after accounting for them according to the notes.
  污染物指标二氧化硫（烟煤，无炉内脱硫）的末端治理技术是其他（高效钠碱法）②，其效率为0.6Sar+98，末端治理设施实际运行率（k值）计算公式为脱硫设施年实际运行小时数/机组年实际运行小时数，②高效二氧化硫末端治理技术：采取空塔提效、强化气液传质、改善pH值分区等措施，满足《燃煤电厂超低排放烟气治理工程技术规范》（HJ2053-2178）相
  关要求。
  。原文件中描述污染物类别为废气，污染物指标为二氧化硫（烟煤，无炉内脱硫），此处对其进行了匹配工作，将其匹配到LCAflow库里面相最符合的流，污染物指标备注为二氧化硫（烟煤，无炉内脱硫）原文描述的产污系数为 16Sar。请根据备注自行核算后修改对应的排放量。
- sulfur dioxide: 0
  the Technical of end-of-pipe management technology for pollution sulfur dioxideisOthers (high-efficiency sodium alkali method) ②，Its Technical efficiency of end-of-pipe management0.6Sar+98.The original article describes the pollution production coefficients as 16Sar。Please revise the corresponding emissions after accounting for them according to the notes.。.The original article describes the pollution production coefficients as 16Sar. Please revise the corresponding emissions after accounting for them according to the notes.
  污染物指标二氧化硫（无烟煤，无炉内脱硫）的末端治理技术是其他（高效钠碱法）②，其效率为0.6Sar+98，末端治理设施实际运行率（k值）计算公式为脱硫设施年实际运行小时数/机组年实际运行小时数，②高效二氧化硫末端治理技术：采取空塔提效、强化气液传质、改善pH值分区等措施，满足《燃煤电厂超低排放烟气治理工程技术规范》（HJ2053-2196）相
  关要求。
  。原文件中描述污染物类别为废气，污染物指标为二氧化硫（无烟煤，无炉内脱硫），此处对其进行了匹配工作，将其匹配到LCAflow库里面相最符合的流，污染物指标备注为二氧化硫（无烟煤，无炉内脱硫）原文描述的产污系数为 16Sar。请根据备注自行核算后修改对应的排放量。
- sulfur dioxide: 0
  the Technical of end-of-pipe management technology for pollution sulfur dioxideisOthers (high-efficiency sodium alkali method) ②，Its Technical efficiency of end-of-pipe management0.6Sar+98.The original article describes the pollution production coefficients as 15Sar。Please revise the corresponding emissions after accounting for them according to the notes.。.The original article describes the pollution production coefficients as 15Sar. Please revise the corresponding emissions after accounting for them according to the notes.
  污染物指标二氧化硫（褐煤，无炉内脱硫）的末端治理技术是其他（高效钠碱法）②，其效率为0.6Sar+98，末端治理设施实际运行率（k值）计算公式为脱硫设施年实际运行小时数/机组年实际运行小时数，②高效二氧化硫末端治理技术：采取空塔提效、强化气液传质、改善pH值分区等措施，满足《燃煤电厂超低排放烟气治理工程技术规范》（HJ2053-2214）相
  关要求。
  。原文件中描述污染物类别为废气，污染物指标为二氧化硫（褐煤，无炉内脱硫），此处对其进行了匹配工作，将其匹配到LCAflow库里面相最符合的流，污染物指标备注为二氧化硫（褐煤，无炉内脱硫）原文描述的产污系数为 15Sar。请根据备注自行核算后修改对应的排放量。
- sulfur dioxide: 0
  the Technical of end-of-pipe management technology for pollution sulfur dioxideisOthers (integration of high-efficiency wet desulfurization and precipitation) ②，Its Technical efficiency of end-of-pipe management0.5Sar+97.8.The original article describes the pollution production coefficients as 11.2Sar。Please revise the corresponding emissions after accounting for them according to the notes.。.The original article describes the pollution production coefficients as 11.2Sar. Please revise the corresponding emissions after accounting for them according to the notes.
  污染物指标二氧化硫（烟煤，炉内脱硫）的末端治理技术是其他（高效湿法脱硫除尘一体化）②，其效率为0.5Sar+97.8，末端治理设施实际运行率（k值）计算公式为脱硫设施年实际运行小时数/机组年实际运行小时数，②高效二氧化硫末端治理技术：采取空塔提效、强化气液传质、改善pH值分区等措施，满足《燃煤电厂超低排放烟气治理工程技术规范》（HJ2053-2191）相
  关要求。
  。原文件中描述污染物类别为废气，污染物指标为二氧化硫（烟煤，炉内脱硫），此处对其进行了匹配工作，将其匹配到LCAflow库里面相最符合的流，污染物指标备注为二氧化硫（烟煤，炉内脱硫）原文描述的产污系数为 11.2Sar。请根据备注自行核算后修改对应的排放量。
- sulfur dioxide: 0
  the Technical of end-of-pipe management technology for pollution sulfur dioxideisOthers (integration of high-efficiency wet desulfurization and precipitation) ②，Its Technical efficiency of end-of-pipe management0.5Sar+97.8.The original article describes the pollution production coefficients as 11.2Sar。Please revise the corresponding emissions after accounting for them according to the notes.。.The original article describes the pollution production coefficients as 11.2Sar. Please revise the corresponding emissions after accounting for them according to the notes.
  污染物指标二氧化硫（无烟煤，炉内脱硫）的末端治理技术是其他（高效湿法脱硫除尘一体化）②，其效率为0.5Sar+97.8，末端治理设施实际运行率（k值）计算公式为脱硫设施年实际运行小时数/机组年实际运行小时数，②高效二氧化硫末端治理技术：采取空塔提效、强化气液传质、改善pH值分区等措施，满足《燃煤电厂超低排放烟气治理工程技术规范》（HJ2053-2209）相
  关要求。
  。原文件中描述污染物类别为废气，污染物指标为二氧化硫（无烟煤，炉内脱硫），此处对其进行了匹配工作，将其匹配到LCAflow库里面相最符合的流，污染物指标备注为二氧化硫（无烟煤，炉内脱硫）原文描述的产污系数为 11.2Sar。请根据备注自行核算后修改对应的排放量。
- sulfur dioxide: 0
  the Technical of end-of-pipe management technology for pollution sulfur dioxideisOthers (integration of high-efficiency wet desulfurization and precipitation) ②，Its Technical efficiency of end-of-pipe management0.5Sar+97.8.The original article describes the pollution production coefficients as 10.5Sar。Please revise the corresponding emissions after accounting for them according to the notes.。.The original article describes the pollution production coefficients as 10.5Sar. Please revise the corresponding emissions after accounting for them according to the notes.
  污染物指标二氧化硫（褐煤，炉内脱硫）的末端治理技术是其他（高效湿法脱硫除尘一体化）②，其效率为0.5Sar+97.8，末端治理设施实际运行率（k值）计算公式为脱硫设施年实际运行小时数/机组年实际运行小时数，②高效二氧化硫末端治理技术：采取空塔提效、强化气液传质、改善pH值分区等措施，满足《燃煤电厂超低排放烟气治理工程技术规范》（HJ2053-2227）相
  关要求。
  。原文件中描述污染物类别为废气，污染物指标为二氧化硫（褐煤，炉内脱硫），此处对其进行了匹配工作，将其匹配到LCAflow库里面相最符合的流，污染物指标备注为二氧化硫（褐煤，炉内脱硫）原文描述的产污系数为 10.5Sar。请根据备注自行核算后修改对应的排放量。
- sulfur dioxide: 0
  the Technical of end-of-pipe management technology for pollution sulfur dioxideisOthers (integration of high-efficiency wet desulfurization and precipitation) ②，Its Technical efficiency of end-of-pipe management0.5Sar+98.2.The original article describes the pollution production coefficients as 16Sar。Please revise the corresponding emissions after accounting for them according to the notes.。.The original article describes the pollution production coefficients as 16Sar. Please revise the corresponding emissions after accounting for them according to the notes.
  污染物指标二氧化硫（烟煤，无炉内脱硫）的末端治理技术是其他（高效湿法脱硫除尘一体化）②，其效率为0.5Sar+98.2，末端治理设施实际运行率（k值）计算公式为脱硫设施年实际运行小时数/机组年实际运行小时数，②高效二氧化硫末端治理技术：采取空塔提效、强化气液传质、改善pH值分区等措施，满足《燃煤电厂超低排放烟气治理工程技术规范》（HJ2053-2182）相
  关要求。
  。原文件中描述污染物类别为废气，污染物指标为二氧化硫（烟煤，无炉内脱硫），此处对其进行了匹配工作，将其匹配到LCAflow库里面相最符合的流，污染物指标备注为二氧化硫（烟煤，无炉内脱硫）原文描述的产污系数为 16Sar。请根据备注自行核算后修改对应的排放量。
- sulfur dioxide: 0
  the Technical of end-of-pipe management technology for pollution sulfur dioxideisOthers (integration of high-efficiency wet desulfurization and precipitation) ②，Its Technical efficiency of end-of-pipe management0.5Sar+98.2.The original article describes the pollution production coefficients as 16Sar。Please revise the corresponding emissions after accounting for them according to the notes.。.The original article describes the pollution production coefficients as 16Sar. Please revise the corresponding emissions after accounting for them according to the notes.
  污染物指标二氧化硫（无烟煤，无炉内脱硫）的末端治理技术是其他（高效湿法脱硫除尘一体化）②，其效率为0.5Sar+98.2，末端治理设施实际运行率（k值）计算公式为脱硫设施年实际运行小时数/机组年实际运行小时数，②高效二氧化硫末端治理技术：采取空塔提效、强化气液传质、改善pH值分区等措施，满足《燃煤电厂超低排放烟气治理工程技术规范》（HJ2053-2200）相
  关要求。
  。原文件中描述污染物类别为废气，污染物指标为二氧化硫（无烟煤，无炉内脱硫），此处对其进行了匹配工作，将其匹配到LCAflow库里面相最符合的流，污染物指标备注为二氧化硫（无烟煤，无炉内脱硫）原文描述的产污系数为 16Sar。请根据备注自行核算后修改对应的排放量。
- sulfur dioxide: 0
  the Technical of end-of-pipe management technology for pollution sulfur dioxideisOthers (integration of high-efficiency wet desulfurization and precipitation) ②，Its Technical efficiency of end-of-pipe management0.5Sar+98.2.The original article describes the pollution production coefficients as 15Sar。Please revise the corresponding emissions after accounting for them according to the notes.。.The original article describes the pollution production coefficients as 15Sar. Please revise the corresponding emissions after accounting for them according to the notes.
  污染物指标二氧化硫（褐煤，无炉内脱硫）的末端治理技术是其他（高效湿法脱硫除尘一体化）②，其效率为0.5Sar+98.2，末端治理设施实际运行率（k值）计算公式为脱硫设施年实际运行小时数/机组年实际运行小时数，②高效二氧化硫末端治理技术：采取空塔提效、强化气液传质、改善pH值分区等措施，满足《燃煤电厂超低排放烟气治理工程技术规范》（HJ2053-2218）相
  关要求。
  。原文件中描述污染物类别为废气，污染物指标为二氧化硫（褐煤，无炉内脱硫），此处对其进行了匹配工作，将其匹配到LCAflow库里面相最符合的流，污染物指标备注为二氧化硫（褐煤，无炉内脱硫）原文描述的产污系数为 15Sar。请根据备注自行核算后修改对应的排放量。
- sulfur dioxide: 0
  the Technical of end-of-pipe management technology for pollution sulfur dioxideisOthers (integration of wet desulfurization and precipitation)，Its Technical efficiency of end-of-pipe management4.2857Sar+81.14.The original article describes the pollution production coefficients as 11.2Sar。Please revise the corresponding emissions after accounting for them according to the notes.。.The original article describes the pollution production coefficients as 11.2Sar. Please revise the corresponding emissions after accounting for them according to the notes.
  污染物指标二氧化硫（烟煤，炉内脱硫）的末端治理技术是其他（湿法脱硫除尘一体化），其效率为4.2857Sar+81.14，末端治理设施实际运行率（k值）计算公式为脱硫设施年实际运行小时数/机组年实际运行小时数。原文件中描述污染物类别为废气，污染物指标为二氧化硫（烟煤，炉内脱硫），此处对其进行了匹配工作，将其匹配到LCAflow库里面相最符合的流，污染物指标备注为二氧化硫（烟煤，炉内脱硫）原文描述的产污系数为 11.2Sar。请根据备注自行核算后修改对应的排放量。
- sulfur dioxide: 0
  the Technical of end-of-pipe management technology for pollution sulfur dioxideisOthers (integration of wet desulfurization and precipitation)，Its Technical efficiency of end-of-pipe management4.2857Sar+81.14.The original article describes the pollution production coefficients as 11.2Sar。Please revise the corresponding emissions after accounting for them according to the notes.。.The original article describes the pollution production coefficients as 11.2Sar. Please revise the corresponding emissions after accounting for them according to the notes.
  污染物指标二氧化硫（无烟煤，炉内脱硫）的末端治理技术是其他（湿法脱硫除尘一体化），其效率为4.2857Sar+81.14，末端治理设施实际运行率（k值）计算公式为脱硫设施年实际运行小时数/机组年实际运行小时数。原文件中描述污染物类别为废气，污染物指标为二氧化硫（无烟煤，炉内脱硫），此处对其进行了匹配工作，将其匹配到LCAflow库里面相最符合的流，污染物指标备注为二氧化硫（无烟煤，炉内脱硫）原文描述的产污系数为 11.2Sar。请根据备注自行核算后修改对应的排放量。
- sulfur dioxide: 0
  the Technical of end-of-pipe management technology for pollution sulfur dioxideisOthers (integration of wet desulfurization and precipitation)，Its Technical efficiency of end-of-pipe management4.2857Sar+81.14.The original article describes the pollution production coefficients as 10.5Sar。Please revise the corresponding emissions after accounting for them according to the notes.。.The original article describes the pollution production coefficients as 10.5Sar. Please revise the corresponding emissions after accounting for them according to the notes.
  污染物指标二氧化硫（褐煤，炉内脱硫）的末端治理技术是其他（湿法脱硫除尘一体化），其效率为4.2857Sar+81.14，末端治理设施实际运行率（k值）计算公式为脱硫设施年实际运行小时数/机组年实际运行小时数。原文件中描述污染物类别为废气，污染物指标为二氧化硫（褐煤，炉内脱硫），此处对其进行了匹配工作，将其匹配到LCAflow库里面相最符合的流，污染物指标备注为二氧化硫（褐煤，炉内脱硫）原文描述的产污系数为 10.5Sar。请根据备注自行核算后修改对应的排放量。
- sulfur dioxide: 0
  the Technical of end-of-pipe management technology for pollution sulfur dioxideisOthers (integration of wet desulfurization and precipitation)，Its Technical efficiency of end-of-pipe management4.2857Sar+84.57.The original article describes the pollution production coefficients as 16Sar。Please revise the corresponding emissions after accounting for them according to the notes.。.The original article describes the pollution production coefficients as 16Sar. Please revise the corresponding emissions after accounting for them according to the notes.
  污染物指标二氧化硫（烟煤，无炉内脱硫）的末端治理技术是其他（湿法脱硫除尘一体化），其效率为4.2857Sar+84.57，末端治理设施实际运行率（k值）计算公式为脱硫设施年实际运行小时数/机组年实际运行小时数。原文件中描述污染物类别为废气，污染物指标为二氧化硫（烟煤，无炉内脱硫），此处对其进行了匹配工作，将其匹配到LCAflow库里面相最符合的流，污染物指标备注为二氧化硫（烟煤，无炉内脱硫）原文描述的产污系数为 16Sar。请根据备注自行核算后修改对应的排放量。
- sulfur dioxide: 0
  the Technical of end-of-pipe management technology for pollution sulfur dioxideisOthers (integration of wet desulfurization and precipitation)，Its Technical efficiency of end-of-pipe management4.2857Sar+84.57.The original article describes the pollution production coefficients as 16Sar。Please revise the corresponding emissions after accounting for them according to the notes.。.The original article describes the pollution production coefficients as 16Sar. Please revise the corresponding emissions after accounting for them according to the notes.
  污染物指标二氧化硫（无烟煤，无炉内脱硫）的末端治理技术是其他（湿法脱硫除尘一体化），其效率为4.2857Sar+84.57，末端治理设施实际运行率（k值）计算公式为脱硫设施年实际运行小时数/机组年实际运行小时数。原文件中描述污染物类别为废气，污染物指标为二氧化硫（无烟煤，无炉内脱硫），此处对其进行了匹配工作，将其匹配到LCAflow库里面相最符合的流，污染物指标备注为二氧化硫（无烟煤，无炉内脱硫）原文描述的产污系数为 16Sar。请根据备注自行核算后修改对应的排放量。
- sulfur dioxide: 0
  the Technical of end-of-pipe management technology for pollution sulfur dioxideisOthers (integration of wet desulfurization and precipitation)，Its Technical efficiency of end-of-pipe management4.2857Sar+84.57.The original article describes the pollution production coefficients as 15Sar。Please revise the corresponding emissions after accounting for them according to the notes.。.The original article describes the pollution production coefficients as 15Sar. Please revise the corresponding emissions after accounting for them according to the notes.
  污染物指标二氧化硫（褐煤，无炉内脱硫）的末端治理技术是其他（湿法脱硫除尘一体化），其效率为4.2857Sar+84.57，末端治理设施实际运行率（k值）计算公式为脱硫设施年实际运行小时数/机组年实际运行小时数。原文件中描述污染物类别为废气，污染物指标为二氧化硫（褐煤，无炉内脱硫），此处对其进行了匹配工作，将其匹配到LCAflow库里面相最符合的流，污染物指标备注为二氧化硫（褐煤，无炉内脱硫）原文描述的产污系数为 15Sar。请根据备注自行核算后修改对应的排放量。
- sulfur dioxide: 0
  the Technical of end-of-pipe management technology for pollution sulfur dioxideisOthers (sodium alkali method)，Its Technical efficiency of end-of-pipe management5.1429Sar+79.43.The original article describes the pollution production coefficients as 11.2Sar。Please revise the corresponding emissions after accounting for them according to the notes.。.The original article describes the pollution production coefficients as 11.2Sar. Please revise the corresponding emissions after accounting for them according to the notes.
  污染物指标二氧化硫（烟煤，炉内脱硫）的末端治理技术是其他（钠碱法），其效率为5.1429Sar+79.43，末端治理设施实际运行率（k值）计算公式为脱硫设施年实际运行小时数/机组年实际运行小时数。原文件中描述污染物类别为废气，污染物指标为二氧化硫（烟煤，炉内脱硫），此处对其进行了匹配工作，将其匹配到LCAflow库里面相最符合的流，污染物指标备注为二氧化硫（烟煤，炉内脱硫）原文描述的产污系数为 11.2Sar。请根据备注自行核算后修改对应的排放量。
- sulfur dioxide: 0
  the Technical of end-of-pipe management technology for pollution sulfur dioxideisOthers (sodium alkali method)，Its Technical efficiency of end-of-pipe management5.1429Sar+79.43.The original article describes the pollution production coefficients as 11.2Sar。Please revise the corresponding emissions after accounting for them according to the notes.。.The original article describes the pollution production coefficients as 11.2Sar. Please revise the corresponding emissions after accounting for them according to the notes.
  污染物指标二氧化硫（无烟煤，炉内脱硫）的末端治理技术是其他（钠碱法），其效率为5.1429Sar+79.43，末端治理设施实际运行率（k值）计算公式为脱硫设施年实际运行小时数/机组年实际运行小时数。原文件中描述污染物类别为废气，污染物指标为二氧化硫（无烟煤，炉内脱硫），此处对其进行了匹配工作，将其匹配到LCAflow库里面相最符合的流，污染物指标备注为二氧化硫（无烟煤，炉内脱硫）原文描述的产污系数为 11.2Sar。请根据备注自行核算后修改对应的排放量。
- sulfur dioxide: 0
  the Technical of end-of-pipe management technology for pollution sulfur dioxideisOthers (sodium alkali method)，Its Technical efficiency of end-of-pipe management5.1429Sar+79.43.The original article describes the pollution production coefficients as 10.5Sar。Please revise the corresponding emissions after accounting for them according to the notes.。.The original article describes the pollution production coefficients as 10.5Sar. Please revise the corresponding emissions after accounting for them according to the notes.
  污染物指标二氧化硫（褐煤，炉内脱硫）的末端治理技术是其他（钠碱法），其效率为5.1429Sar+79.43，末端治理设施实际运行率（k值）计算公式为脱硫设施年实际运行小时数/机组年实际运行小时数。原文件中描述污染物类别为废气，污染物指标为二氧化硫（褐煤，炉内脱硫），此处对其进行了匹配工作，将其匹配到LCAflow库里面相最符合的流，污染物指标备注为二氧化硫（褐煤，炉内脱硫）原文描述的产污系数为 10.5Sar。请根据备注自行核算后修改对应的排放量。
- sulfur dioxide: 0
  the Technical of end-of-pipe management technology for pollution sulfur dioxideisOthers (sodium alkali method)，Its Technical efficiency of end-of-pipe management5.1429Sar+82.86.The original article describes the pollution production coefficients as 16Sar。Please revise the corresponding emissions after accounting for them according to the notes.。.The original article describes the pollution production coefficients as 16Sar. Please revise the corresponding emissions after accounting for them according to the notes.
  污染物指标二氧化硫（烟煤，无炉内脱硫）的末端治理技术是其他（钠碱法），其效率为5.1429Sar+82.86，末端治理设施实际运行率（k值）计算公式为脱硫设施年实际运行小时数/机组年实际运行小时数。原文件中描述污染物类别为废气，污染物指标为二氧化硫（烟煤，无炉内脱硫），此处对其进行了匹配工作，将其匹配到LCAflow库里面相最符合的流，污染物指标备注为二氧化硫（烟煤，无炉内脱硫）原文描述的产污系数为 16Sar。请根据备注自行核算后修改对应的排放量。
- sulfur dioxide: 0
  the Technical of end-of-pipe management technology for pollution sulfur dioxideisOthers (sodium alkali method)，Its Technical efficiency of end-of-pipe management5.1429Sar+82.86.The original article describes the pollution production coefficients as 16Sar。Please revise the corresponding emissions after accounting for them according to the notes.。.The original article describes the pollution production coefficients as 16Sar. Please revise the corresponding emissions after accounting for them according to the notes.
  污染物指标二氧化硫（无烟煤，无炉内脱硫）的末端治理技术是其他（钠碱法），其效率为5.1429Sar+82.86，末端治理设施实际运行率（k值）计算公式为脱硫设施年实际运行小时数/机组年实际运行小时数。原文件中描述污染物类别为废气，污染物指标为二氧化硫（无烟煤，无炉内脱硫），此处对其进行了匹配工作，将其匹配到LCAflow库里面相最符合的流，污染物指标备注为二氧化硫（无烟煤，无炉内脱硫）原文描述的产污系数为 16Sar。请根据备注自行核算后修改对应的排放量。
- sulfur dioxide: 0
  the Technical of end-of-pipe management technology for pollution sulfur dioxideisOthers (sodium alkali method)，Its Technical efficiency of end-of-pipe management5.1429Sar+82.86.The original article describes the pollution production coefficients as 15Sar。Please revise the corresponding emissions after accounting for them according to the notes.。.The original article describes the pollution production coefficients as 15Sar. Please revise the corresponding emissions after accounting for them according to the notes.
  污染物指标二氧化硫（褐煤，无炉内脱硫）的末端治理技术是其他（钠碱法），其效率为5.1429Sar+82.86，末端治理设施实际运行率（k值）计算公式为脱硫设施年实际运行小时数/机组年实际运行小时数。原文件中描述污染物类别为废气，污染物指标为二氧化硫（褐煤，无炉内脱硫），此处对其进行了匹配工作，将其匹配到LCAflow库里面相最符合的流，污染物指标备注为二氧化硫（褐煤，无炉内脱硫）原文描述的产污系数为 15Sar。请根据备注自行核算后修改对应的排放量。

## Use advice
This dataset is derived from the Pollution Source Census Report and contains information on pollution emissions and related products. However, it does not include data on energy or chemical consumption, nor does it provide information on waste or co-product generation. When utilizing this dataset, please supplement the missing data based on actual conditions before use
该数据集来源于污染源普查报告，包含污染物排放及相关产品信息，但不包含能源或化学品消耗数据，也不提供废弃物或共生产物产生信息。在使用该数据集时，请根据实际情况补充缺失数据后再使用。

## Review details
Inventory: The internal review was done by several iteration steps concerning raw data validation, raw data documentation, representativity, completeness and consistency of modelling with regard to ISO 14040 and 14044.
清单： 内部审查通过几个迭代步骤完成，涉及原始数据验证、原始数据记录、代表性、完整性、与 ISO 14040 和 14044 有关的建模的一致性。

## Data sources
- 第二次全国污染源普查产排污核算系数手册（试用版）,四级代码4411、4412文件，在完整版文件中第5333页
