# Soil and groundwater remediation;Ex-situ;groundwater pump and treat;construction;Construction of Extraction well

Dataset: ILCD process, Unit process, single operation
Geography: JS-CN
Reference year: 2022
Classification: Other Services / Repair and maintenance
Generated by: Wang Ning, wang_ning@caep.org.cn
Owner: Tiangong LCI Data Working Group
Review: Dependent internal review by Tiangong LCI Data Working Group
Amounts: no units in this file; such an amount is in the reference unit of its flow, which a separate flow dataset defines
licenseType: Free of charge for all users and uses

## General comment
Construction of extraction wells using polyvinyl chloride、cement、sillica sand、steel、electricity

## Geography
a closed pesticide manufacturing plant located in Jiangsu Province, China.

## Technical purpose
The data set describes the construction process of extraction wells for soil and groundwater remediation. This process specifically pertains to an ex-situ groundwater pump and treat system applied to a site formerly used as a pesticide manufacturing plant. The construction process involves the utilization of materials such as polyvinyl chloride, cement, silica sand, steel, and electricity to build the necessary infrastructure for decontaminating polluted environmental media.

## Reference product
- Extraction wel: 1; article inperiodical

## Inputs
All rows: article inperiodical
- Polyvinyl chloride: 38.1
- cement: 1074.88
- quartz sand: 2836.86
- Steel sections: 50
- Electricity: 760.32

## Use advice
The data set is specific to the construction of an extraction well for an ex-situ groundwater remediation process in Jiangsu Province, China. When applying this data set, users should ensure that the context of the environmental impact assessment reflects an equivalent technological and geographical applicability. Consideration should be given to the fact that this data is relevant for closed pesticide manufacturing plants undergoing remediation and may not be directly applicable to other sites without modification. Additionally, users should account for any differences in local construction practices and environmental regulations when utilizing this data set.

## Review details
Inventory: The internal review was done by several iteration steps concerning raw data validation, raw data documentation, representativity, completeness and consistency of modelling with regard to ISO 14040 and 14044.

## Data sources
- Ding, D. et al. Assessing the environmental impacts and costs of biochar and monitored natural attenuation for groundwater heavily contaminated with volatile organic compounds. Science of The Total Environment 846, 157316 (2022).
