# Remediated soil ; Excavation and landfill ; Railway transportation ; Abandoned salt mines

Dataset: ILCD process, Unit process, black box
Geography: SI
Reference year: 2018
Classification: Unit processes / Other Services / Repair and maintenance
Functional unit: The functional unit was the management of 1.0 m3 of contaminated soil at the Old Zinc-Works site. A time horizon of 100 years was assumed.
Generated by: Yang Xintong, yangxt@caep.org.cn
Owner: Tiangong LCI Data Working Group
Review: Dependent internal review by Tiangong LCI Data Working Group
Amounts: no units in this file; such an amount is in the reference unit of its flow, which a separate flow dataset defines
copyright: false
licenseType: Free of charge for all users and uses

## General comment
Excavation and landfill are the process of excavating contaminated soil and transporting it to a suitable site for landfill to isolate harmful substances.

## Geography
This study refers to the reclamation activities that were per formed at the Old Zinc-Works site in the town of Celje (in eastern Slovenia).

## Technology and included processes
Excavated contaminated soil was removed from the site. Excavated pit was refilled by waste rock. The contaminated soil, which was excavated from the site, was assumed to be delivered by rail to an underground waste disposal location (the assumed location was inside some abandoned salt mines).

## Technical purpose
The described industrial process involves the remediation of contaminated soil through excavation and landfill methods, specifically aimed at the management of polluted sites such as the Old Zinc-Works in Celje, Slovenia. The process is used for the isolation of harmful substances from the environment by removing the contaminated soil, transporting it via railway, and securely landfilling it in abandoned salt mines. This serves as a solution for long-term management of hazardous materials in industrial site restoration projects.

## Reference product
- Remediated soil: 1; estimated

## Inputs
All rows: estimated
- Diesel,Diesel: 0.00169
  Soil excavation
- Electricity: 90.864
  Transport of contaminated soil to the underground waste disposal location, by rail (1000 km)
- Waste rock: 1
  Reclamation of the degraded site
- Diesel,Diesel: 0.00072
  Delivery of the ﬁll material (waste rock) (35 km)
- Diesel,Diesel: 0.00058
  Spreading and compaction of the waste rock
- Polyethylene,Polyethylene: 6.76
  Contaminated soil landﬁlling at the underground waste disposal location
- Wooden pallet (EURO): 9.41
  Contaminated soil landﬁlling at the underground waste disposal location
- Brick: 8.95
  Contaminated soil landﬁlling at the underground waste disposal location
- Mortar: 0.7
  Contaminated soil landﬁlling at the underground waste disposal location
- Electricity: 2.376
  Operation of the underground waste disposal location (illumination, ventilation)
- contaminated soil: 1

## Use advice
The data set users must consider the specific context of the soil remediation process, which has been modeled for a 100-year time horizon. Ensure that the process is applicable for the local geography and regulations regarding the transportation and landfill of hazardous materials. If applied in a different context, users should adjust the data set according to the new site's characteristics and the actual transportation methods if different from rail. Attention should also be paid to the maintenance and monitoring of the landfill site, as well as any potential for recycling or reuse of excavated materials.

## Review details
Inventory: The internal review was done by several iteration steps concerning raw data validation, raw data documentation, representativity, completeness and consistency of modelling with regard to ISO 14040 and 14044.

## Data sources
- Pranjić M A ,Oprčkal P ,Mladenovič A , et al. Comparative Life Cycle Assessment of possible methods for the treatment of contaminated soil at an environmentally degraded site. Journal of Environmental Management, 2018, 218 497-508.
