# Synthetic graphite production ; Synthetic graphite ; Carbon black, petroleum coke

Dataset: ILCD process, Unit process, single operation
Geography: YA-SC-CN
Classification: Materials production / Non-energetic raw materials
Functional unit: Produce 1kg of synthetic graphite
LCI method principle: Attributional
Generated by: Xin Chen, xinchen@mail.nankai.edu.cn
Owner: Tiangong LCI Data Working Group
Review: Dependent internal review by Tiangong LCI Data Working Group
Amounts: no units in this file; such an amount is in the reference unit of its flow, which a separate flow dataset defines
copyright: false
licenseType: Free of charge for all users and uses

## General comment
Using carbon black and petroleum coke to synthesize artificial graphite through a series of crushing, screening, roasting and other processes

## Geography
Shimian Jineng New Materials Co., Ltd

## Technology and included processes
Graphite is synthesized by mixing petroleum coke and carbon black through medium crushing, grinding, screening, roasting, and secondary roasting.

## Technical purpose
The synthetic graphite produced through this industrial process is used for various applications, including but not limited to: electrodes for electric arc furnaces, brushes for electric motors, anodes for lithium-ion batteries, heat sinks in electronics, and as a lubricant in certain mechanical systems. The high conductivity and thermal resistance properties make synthetic graphite suitable for advanced technological applications, particularly in the renewable energy and electronics sectors.

## Reference product
- Graphite (anode and melting pot): 1
  Data comes from the environmental performance assessment report of Shimian County Jineng New Materials Co., Ltd.

## Inputs
- Carbon Black: 1.01
  (same comment as for Graphite (anode and melting pot))
- Petroleum Coke: 0.118
  (same comment as for Graphite (anode and melting pot))
- Electricity: 15.516
  (same comment as for Graphite (anode and melting pot))

## Data selection and combination
All data comes from the environmental performance assessment report of Shimian County Jineng New Materials Co., Ltd.

## Data treatment and extrapolations
The data may have been simply multiplied or divided

## Use advice
Data users should consider the specific phases of the synthetic graphite production when utilizing this data set for Life Cycle Assessment (LCA) purposes. Ensure that all system boundaries are clearly defined, especially when it comes to the inclusion or exclusion of pre-processing steps, such as the acquisition of raw materials like carbon black and petroleum coke. The purification and possible environmental treatment stages before and after the central process should also be factored in. For comparative LCA studies, ensure consistency in functional units (e.g., mass of graphite produced) and the scope of the analyzed processes. This data set has undergone basic arithmetic operations; users should verify calculations against updated production metrics or assumptions pertinent to their LCA scenario.

## Review details
Inventory: The internal review was done by several iteration steps concerning raw data validation, raw data documentation, representativity, completeness and consistency of modelling with regard to ISO 14040 and 14044.

## Data sources
- Yin, R., Hu, S. & Yang, Y. Life cycle inventories of the commonly used materials for lithium-ion batteries in China. Journal of Cleaner Production227, 960–971 (2019).
