# Treatment of waste electrodialysis module ; mix of incineration and landfilling, CN

Dataset: ILCD process, Unit process, single operation
Geography: CN
Reference year: 2023
Classification: End-of-life treatment / Other end-of-life services
Functional unit: 1 item of electrodialysis module
Generated by: Jiaqi Lu, wilsherelu@foxmail.com
Owner: Tiangong LCI Data Working Group
Review: Dependent internal review by Tiangong LCI Data Working Group
Amounts: no units in this file; such an amount is in the reference unit of its flow, which a separate flow dataset defines
copyright: false
licenseType: Free of charge for all users and uses

## General comment
The waste electrodialysis module treatment data set represents the environmental impact of the disposal of used electrodialysis components, which are typically applied in water purification, desalination, and wastewater treatment processes. Electrodialysis modules are technical components that use electric potential to separate charged particles from a solution through ion-permeable membranes.

## Reference product
- waste incineration of plastics (unspecified) fraction in municipal solid waste (MSW): 1; input; article inperiodical
  Discarded ED components

## Outputs
All rows: article inperiodical
- waste incineration of plastics (unspecified) fraction in municipal solid waste (MSW): 0.65
  Waste anion exchange membrane
- waste incineration of plastics (unspecified) fraction in municipal solid waste (MSW): 0.73
  Waste cation exchange membrane
- waste incineration of plastics (unspecified) fraction in municipal solid waste (MSW): 1.8
  Waste titanium-coated ruthenium anode
- waste incineration of plastics (unspecified) fraction in municipal solid waste (MSW): 1.1
  Waste titanium coated ruthenium cathode
- waste incineration of plastics (unspecified) fraction in municipal solid waste (MSW): 8.5
  Waste cathode casing (UPVC)
- waste incineration of plastics (unspecified) fraction in municipal solid waste (MSW): 49.8
  Waste shell UPVC

## Use advice
When using this data set for LCA, ensure that the disposal method specified (a combination of incineration and landfilling) aligns with the end-of-life treatment for the electrodialysis modules being assessed. Adjust the proportion of incineration and landfilling in the data set if it differs from actual practice. Consider the geographical specificity of these processes, and take into account any emissions and potential energy recovery from the incineration process in the overall environmental impact calculation.

## Review details
Inventory: The internal review was done by several iteration steps concerning raw data validation, raw data documentation, representativity, completeness and consistency of modelling with regard to ISO 14040 and 14044.

## Data sources
- Xue, N. et al. Carbon footprint analysis and carbon neutrality potential of desalination by electrodialysis for different applications. Water Res. 232, 119716 (2023).
