# Livestock and poultry breeding ; feed processing stage ; broiler scale

Dataset: ILCD process, Unit process, single operation
Geography: CN
Reference year: 2014
Classification: Unit processes / Materials production / Agricultural production means
Functional unit: 1kg chicken
Generated by: Rui Yang, 1632707028@qq.com
Owner: Tiangong LCI Data Working Group
Review: Dependent internal review by Tiangong LCI Data Working Group
Amounts: no units in this file; such an amount is in the reference unit of its flow, which a separate flow dataset defines
copyright: false
licenseType: Free of charge for all users and uses

## General comment
Livestock and poultry feed processing mainly consumes electricity and coal.

## Geography
This study was conducted from 2014 to 2015, aiming at livestock and poultry feeding cycle, meat ratio, feed formula, feed consumption, coal and electricity consumption, etc. Has been to Shandong Gaomi Zhengda pig farm, Laixi City Zhishuang dairy farm, Jimo city Duan Bolan town Jiangjiapo village pig farm, Jimo City Liujiazhuang town livestock farm, Rizhao City Changling town Guanzhuang village, Juxian County Zhailihe town Dongxing Agriculture and animal husbandry company, Juxian Qiaoshan town east Chen dairy farm, Juxian Qiaoshan town Liu Jiayi water pig farm, Zhucheng Foreign Trade Co., LTD. Phoenix parents breeding duck farm, Xinjiang Fukang Hongfa Breeding professional cooperative, Jiuyun Street Town Xuhong laying Chicken cooperative, Jiuyun Street Town Liuyun Village self-contained breeding farm, China Australia Holding Group Co., LTD., Dezhou City Qingyun County Wayu Village, Shandong Province Qingyun County four Liu community beef cattle breeding base, Dezhou City Qingyun Qingnian chicken breeding base, Qingyun County Yongli Poultry layer breeding company, Qingyun County Xingchen youth chicken breeding Field research was carried out by professional breeding cooperatives, Qingyun Dongtai broiler breeding cooperatives, Hebei Yanshan Boyuan Feed Co., LTD., Yanshan Da Chinese Feed Co., LTD., Wudi Liuhe Feed Co., LTD., and China-Australia Oriental Hope Feed Co., LTD.

## Technology and included processes
In this paper, the life cycle of livestock and poultry farming is divided into six stages: feed crop planting, feed processing, livestock and poultry raising, manure treatment, slaughter and transportation. The specific life cycle process of livestock and poultry breeding is shown in Figure 2-1. Due to the lack of some data and the limitations of basic conditions, the production, transportation and use of pesticides, mulch and feed additives have not been analyzed, and the environmental impact caused by other related infrastructure construction, transport production and labor costs is no longer considered.

## Technical purpose
The described industrial process applies to the feed processing stage of livestock and poultry breeding, with a focus on broiler (chicken) production. The feed processing requires significant energy inputs, predominantly consumed as electricity and coal. The process is critical for supporting the growth and health of broilers at a large scale and is suited for integration into extensive poultry farming operations where feed efficiency and production capacity are optimized.

## Reference product
- feed: 2.27505; calculated

## Inputs
- Electricity: 0.204755; calculated
- hard coal: 0.0273006; calculated
- maize grain: 1.57; measured
- soybean: 0.71; measured
- wheat: 0.95; measured

## Outputs
- carbon dioxide (fossil),carbon dioxide (fossil): 0.11387; measured
  Broiler chicken scale
- sulfur dioxide: 0.00199; measured
  Broiler chicken scale
- nitrogen, total (excluding N2): 0.00032; measured
  Broiler chicken scale
- carbon monoxide (fossil): 5.1e-5; measured
  Broiler chicken scale

## Use advice
Data users should carefully consider the life cycle stage of feed processing when conducting a Life Cycle Assessment (LCA) on broiler production. The energy consumption data for electricity and coal should be accurately accounted for to reflect the environmental impact. Pay attention to potential updates in energy consumption figures, as technology and energy sources may evolve. Consider geographical and technological variability, and if necessary, adjust the data to match the specific conditions of the assessed region. Consult local emission factors for electricity and coal to ensure regional accuracy.

## Review details
Inventory: The internal review was done by several iteration steps concerning raw data validation, raw data documentation, representativity, completeness and consistency of modelling with regard to ISO 14040 and 14044.

## Data sources
- 周景月. 基于生命周期评价的畜禽养殖环境影响分析. (青岛科技大学, 2017).
