# Trap pre-exploration ;Source rocks and terrigenous marine source rocks ; Natural gas exploration

Dataset: ILCD process, Unit process, single operation
Geography: GD-CN
Reference year: 1999
Classification: Unit processes / Energy carriers and technologies / Natural gas based fuels
LCI method principle: Attributional
LCI method approaches: Consequential
Generated by: Shikang Kang, 908798159@qq.com
Owner: Tiangong LCI Data Working Group
Review: Dependent internal review by Tiangong LCI Data Working Group
Amounts: no units in this file; such an amount is in the reference unit of its flow, which a separate flow dataset defines
copyright: false
licenseType: Free of charge for all users and uses

## General comment
Delta coal measures source rocks and terrigenous marine source rocks are developed in Enping Formation of Baiyun Sag, and their potential lithologic stratigraphic traps have self-generating, self-storing and self-capping reservoir-forming conditions, which have great exploration potential. Prediction is the main reservoir-forming combination of Baiyun Sag and the main direction of natural gas exploration in deep water area.

## Geography
Baiyun Sag in Pearl River Mouth Basin

## Time period
Literature review mentioned that

## Technology and included processes
Lithologic stratigraphic traps of Enping Formation have reservoir-forming conditions: authigenic conditions, self-storage conditions and self-sealing conditions.

## Technical purpose
The data set describes the utilization of the Enping Formation within the Baiyun Sag, located in the Pearl River Mouth Basin, for the purpose of natural gas exploration. The geological formation exhibits favorable sedimentary conditions, including delta coal measures source rocks and terrigenous marine source rocks that contribute to the development of lithologic stratigraphic traps. These traps have self-generating, self-storing, and self-capping conditions essential for reservoir formation. This area is predicted to be the primary reservoir-forming zone in Baiyun Sag and represents a significant direction for deep water natural gas exploration initiatives, with potential for discovering large and medium-sized lithologic and stratigraphic traps.

## Reference product
- Shale gas well: 4500; input; min 4000; max 5000; uniform; missing unimportant
  collective burial depth

## Inputs
- Shale gas well: 0.85; log-normal; missing unimportant
  Pore ​​space, the data is distribution, the data filled in the quantity is the result of average (median value)

## Outputs
- natural gas: 0.8; log-normal; missing unimportant
  Reservoir porosity, the data is distribution, the data filled in the quantity is the result of average (median value)
- natural gas: 1.6; min 1.55; max 1.65; uniform; missing unimportant
  pressure coefficient

## Data selection and combination
The sedimentary conditions of Enping Formation in Baiyun Sag form moderate sand-land ratio, which is beneficial to the development of lithologic stratigraphic traps. At present, more than 20 potential large and medium-sized lithologic stratigraphic traps have been searched, including six types, such as stratigraphic overlap, nearshore subaqueous fan, beach bar, low-level fan, delta front foregroove wedge sandstone body and updip pinchout sandstone body.

## Data treatment and extrapolations
Delta coal measures source rocks and terrigenous marine source rocks are developed in Enping Formation of Baiyun Sag, and their potential lithologic and stratigraphic traps have reservoir-forming conditions of self-generation, self-storage and self-capping, which have great exploration potential. Prediction is the main reservoir-forming combination of Baiyun Sag and the main direction of natural gas exploration in deep water area

## Use advice
Users of this data set should consider the geological uniqueness of the area, relying on the sedimentary characteristics informed by the Enping Formation for accurate prediction and exploration activities. Special attention should be given to the identification of authigenic conditions, self-storage, and self-sealing qualities of the potential traps. It is crucial to apply this data primarily for the assessment of exploration potential and to guide the strategic planning for natural gas extraction in the specified deep water area. Methodological approach in utilizing this data should be consistent with current geological exploratory practices and industry standards.

## Review details
Inventory: The internal review was done by several iteration steps concerning raw data validation, raw data documentation, representativity, completeness and consistency of modelling with regard to ISO 14040 and 14044.

## Data sources
- 张功成;陈莹;杨海长;韩银学;赵钊;杨东升;王龙颖;黄萱; 恩平组岩性地层圈闭——白云凹陷深水区天然气勘探新领域. 中国海上油气 1–9 (2015).
