# Bio-based methanol production ; Methanol ; PV/CCU-CH3OH route ; CO2, H2

Dataset: ILCD process, Unit process, black box
Geography: CN
Classification: Energy carriers and technologies / Renewable fuels
Functional unit: In this study, the functional unit is defined as 1 kg and 1 MJ of H2 carrier produced from coal, natural gas, and renewables.
LCI method principle: Attributional
Generated by: Zirui Tang, tangzirui123@gmail.com
Owner: Tiangong LCI Data Working Group
Review: Dependent internal review by Tiangong LCI Data Working Group
Amounts: no units in this file; such an amount is in the reference unit of its flow, which a separate flow dataset defines
copyright: false
licenseType: Free of charge for all users and uses

## General comment
The CO2-to-methanol technical route contains three key steps, namely capture of CO2, production of H2 by water electrolysis, and hydrogeneration of CO2 to synthesize methanol.

## Geography
The study assumes that both methanol and ammonia production plants are located in northwest China, where coal, natural gas and solar energy resources are abundant.

## Technology and included processes
We assume that the CO2 source is exhaust gas from power plant which supplies electricity and steam for system. As shown in Figure 1C, in the carbon capture stage, the flue gas enters the absorber under the drive of the fan. When sufficient CO2 has been absorbed, the solvent is pumped into the regeneration column where CO2 is separated from the absorber under the action of steam. In the H2 generation stage, water electrolysis is used to produce H2, which is powered by photovoltaic. At last, H2 and captured CO2 are sent into the methanol synthesis system where methanol is produced by the catalytic hydrogenation of captured CO2.

## Technical purpose
The process detailed refers to the production of bio-based methanol, specifically through a PV/CCU-CH3OH route. This route is a sustainable method of producing methanol by capturing carbon dioxide (CO2) and producing hydrogen (H2) through water electrolysis powered by photovoltaic (solar) energy. Bio-based methanol produced this way can serve as a green chemical for various industrial applications, such as a fuel additive, a solvent, or as an intermediate in the production of other chemicals. The process is particularly suitable for regions with abundant coal, natural gas, and solar resources, like northwest China.

## Reference product
- Methanol: 1000; article inperiodical

## Inputs
All rows: article inperiodical
- electricity: 153.9
- Hydrogen: 190
- carbon dioxide: 1455
- Aluminium oxide: 0.012
- Copper oxide: 0.062
- zinc oxide: 0.029

## Outputs
- waste water - untreated: 630; article inperiodical

## Data selection and combination
The relevant data are collected from the Ravikumar's research work (Ravikumar et al., 2020).

## Data treatment and extrapolations
Take the average value from the reference, which summarizes common 14 scenarios based on literature reviews.

## Use advice
When using data from Ravikumar et al. (2020) for life cycle assessment (LCA) of bio-based methanol production, take the average values provided in the reference that summarizes 14 common scenarios from literature reviews. Ensure to model the specific carbon capture and H2 generation stages as detailed in the process description, including the carbon capture from power plant flue gas and the use of photovoltaic power for water electrolysis. When calculating impacts, account for the regional context of production facilities, particularly the availability of coal, natural gas, and solar resources in northwest China. The functional unit for this assessment is defined as 1 kg and 1 MJ of H2 carrier produced from these energy sources.

## Review details
Inventory: The internal review was done by several iteration steps concerning raw data validation, raw data documentation, representativity, completeness and consistency of modelling with regard to ISO 14040 and 14044.

## Data sources
- Zhu, R., Wang, Z., He, Y., Zhu, Y. & Cen, K. LCA comparison analysis for two types of H2 carriers: Methanol and ammonia. Int. J. Energy Res. 46, 11818–11833 (2022).
