# Municipal sludge treatment and disposal;dry sludge;dewatering

Dataset: ILCD process, Unit process, single operation
Geography: QD-SD-CN
Classification: Unit processes / End-of-life treatment / Waste water treatment
Functional unit: The functional unit is the base for the treatment comparison in the life-cycle inventory. The management of one tone of dry sludge (DS) is selected.
Generated by: Jin Sitian, 2331276@tongji.edu.cn
Owner: Tiangong LCI Data Working Group
Review: Dependent internal review by Tiangong LCI Data Working Group
Amounts: no units in this file; such an amount is in the reference unit of its flow, which a separate flow dataset defines
copyright: ['opt4ROkqig']
licenseType: Free of charge for all users and uses

## General comment
These data include those directly collected from 140 wastewater treatment plants in China.The annual average monitoring data of anaerobic digestion and dewatering processes in Maidao wastewater treatment plant of Qingdao in Shandong Province of China, which is the most typical wastewater treatment plant that uses anaerobic digestion technology to treat sewage sludge in the country, were used in this study

## Geography
Maidao sewage treatment plant

## Technology and included processes
The sludge treatment and disposal steps are gravity thicking, anaerobic digestion, dewatering, and agricultural use.

## Technical purpose
This dataset describes the process of municipal sludge treatment and disposal through dehydration at the Maidao sewage treatment plant. It is intended for use in life-cycle assessments that require data on the environmental impact of managing dry sludge (DS). This information can be applied for comparative studies and environmental evaluation of wastewater treatment processes, specifically focusing on dewatering one tonne of dry sludge.

## Reference product
- Sludge: 1000; input; estimated
  one tone of dry sludge (DS)

## Inputs
- Electricity: 221.544; measured
- Polyacrylamide: 4.31; measured

## Outputs
- waste water - untreated: 3; measured

## Use advice
When using this dataset in life-cycle assessments (LCA), it is crucial to ensure that the scope of the LCA appropriately reflects the management of one tonne of dry sludge as the functional unit. Consider factors such as geographical relevance to the Maidao sewage treatment plant and the technological applicability of dewatering processes. Users should also account for possible variations in emissions and resource usage based on local operating conditions. The dataset is specialized and may not be applicable to dissimilar wastewater treatment contexts or different sludge treatment technologies.

## Review details
Inventory: The internal review was done by several iteration steps concerning raw data validation, raw data documentation, representativity, completeness and consistency of modelling with regard to ISO 14040 and 14044.

## Data sources
- Xu, C., Chen, W. & Hong, J. Life-cycle environmental and economic assessment of sewage sludge treatment in China. Journal of Cleaner Production 67, 79–87 (2014).
