# Northeast Rice Production ; Rice Cultivation

Dataset: ILCD process, Unit process, single operation
Geography: SY-LN-CN
Reference year: 2016
Valid until: 2017
Classification: Unit processes / Materials production / Food and renewable raw materials
Functional unit: 1t
LCI method principle: Attributional
LCI method approaches: Consequential
Generated by: Haoran Zhang, hrzhang@whu.edu.cn
Owner: Tiangong LCI Data Working Group
Review: Dependent internal review by Tiangong LCI Data Working Group
Amounts: no units in this file; such an amount is in the reference unit of its flow, which a separate flow dataset defines
copyright: false
licenseType: Free of charge for all users and uses

## General comment
Resource consumption and pollution emission of fertilizers, pesticides and agricultural machinery

## Technology and included processes
With the production of 1 t of rice as the functional unit, the starting boundary is defined as the mining of ore and fossil energy for the production of chemical fertilizers and pesticides, and the ending boundary is the emission of pollutants in the rice planting stage

## Technical purpose
The data set represents the life cycle of rice production in Northeast China. It indicates the agricultural process of rice cultivation which involves the use of chemical fertilizers and pesticides, machinery fuel consumption, electricity consumption for production, and irrigation water usage. This data is relevant for studies on environmental impact assessments of agricultural practices, particularly in the context of rice farming in the specified region.

## Reference product
- rice: 1000; measured

## Inputs
- Diesel: 10.7; measured
- Electricity: 615.6; measured
- arable, non-irrigated: 1000.24; measured
- water: 1546.78; measured

## Outputs
All rows: measured
- carbon monoxide (fossil): 0.61
- carbon dioxide (fossil),carbon dioxide (fossil): -245.91
- nitrous oxide: 260.16, 0.03 (2 entries)
- sulfur dioxide: 0.16
- ammonium: 2.14
- methane (biogenic),methane (biogenic): 16.08
- phosphorus, total: 0.18
- ammonia: 1.36
- nitrate: 0.87
- copper: 0.0008
- zinc: 0.025
- mercury: 0.0001
- clopyralid: 0.01154
- pretilachlor: 0.012
- 1,2,3-Triazole: 0.00512
- dimethoate: 0.01231

## Deviations from the LCI method approaches
The stipulated starting boundary is the mining of ores and fossil energy for the production of fertilizers and pesticides. The termination boundary is the emission of pollutants during the rice planting phase.

## Data selection and combination
A total of 62 households were surveyed, with the investigation covering various aspects such as the types and quantities of fertilizers used, types and amounts of pesticides used, machinery fuel consumption, production electricity consumption, and irrigation water volume, among other related information

## Data treatment and extrapolations
The equivalent coefficient method is used to convert similar pollutants into the environmental impact potential of reference objects [22], to assess the environmental impact of rice production."

## Use advice
When using this data for life cycle assessment, ensure that the system boundaries are correctly applied. The data covers from the mining of raw materials for fertilizers and pesticides production up to the emission of pollutants during the rice cultivation phase. Users should integrate this data with information about downstream processes if the full life cycle of rice is to be considered. Pay attention to the technological applicability, especially concerning the equivalent coefficient method when converting the environmental impacts, as methodology may differ according to the goal and scope of the study.

## Review details
Inventory: The internal review was done by several iteration steps concerning raw data validation, raw data documentation, representativity, completeness and consistency of modelling with regard to ISO 14040 and 14044.

## Data sources
- 常俊彦,宋明阳,于晓曼等.沈阳地区水稻生产的生态环境影响研究[J].农业环境科学学报,2018,37(08):1793-1801.
