# Iron production

Dataset: ILCD process, Unit process, single operation
Geography: YL-GX-CN
Reference year: 2012
Classification: Unit processes / Materials production / Metals and semimetals
Functional unit: For example, the generation of 1 kW h (kW h) of electricity is adapted as the functional unit in this study, and the corresponding amounts of CO2 emissions and air pollutants (SO2,NOX and PM10)perkWh of electricity are chosen as the indicators for environmental performances, and the monetary value (US$) of per kW h of electricity is chosen as the indicator for cost-effectiveness evaluation.
LCI method principle: Attributional
LCI method approaches: Allocation
Generated by: Yunzhi Zhao, ll10088@163.com
Owner: Tiangong LCI Data Working Group
Review: Dependent internal review by Tiangong LCI Data Working Group
Amounts: no units in this file; such an amount is in the reference unit of its flow, which a separate flow dataset defines
copyright: false
licenseType: Free of charge for all users and uses

## General comment
文献里只提供了部分污染物排放数据，未提供原材料和能源消耗清单

## Geography
In this study, the typical wind farm system in Yulin City of Guangxi of Zhuang Autonomous Region China was selected as a case study site. The developer, namely, China Huadian Corporation, is a state-owned enterprise and devotes to develop wind power by providing wind power equipment and related service in China [37].

## Technical purpose
The wind farm system described in the data set is intended for the generation of electricity utilizing wind power. It is comprised of 24 wind turbines, each with a production capacity of 1.25 MW, located in Yulin City, Guangxi Zhuang Autonomous Region, China. The system serves to provide a renewable energy source, reduce reliance on fossil fuels, and contribute to cleaner power production over its estimated 20-year operational lifespan. Wind power systems like this one are specifically used in regions with adequate wind resources and can be part of larger efforts to increase the share of renewable energy in the energy mix.

## Reference product
- iron: 1000; calculated
  文献里只提供了部分污染物排放数据，未提供原材料和能源消耗清单

## Outputs
- carbon dioxide (fossil): 788; calculated
- sulfur dioxide: 0.0441; calculated
- nitrous oxide: 0.0562; calculated
- particles (PM10): 0.354; calculated

## Deviations from the LCI method approaches
According to Introduced by the life cycle assessment approach [34,35], firstly the system boundaries boundary of wind energy as well as and thermal power are first identified. Then, methodology on evaluating both environmental and economic benefits is presented so that co-benefits can be quantified followed by the introduction of the methodologies on environmental as well as economic impacts evaluation from the co-benefits perspective.

## Data selection and combination
This wind farm is equipped with 24 wind turbines, with a production capacity of 1.25 MW for each turbine, and t the operation life for each turbine is expected to be 20 years. The life cycle of one wind power system can be divided into five stages, including (1) production, (2) transportation and installation, (3) power generation, (4) maintenance, and (5) end-of-life recycling and disposal. The input of non-renewable energy has been shown in each stage. In this study, raw material, fossil fuel consumption and corresponding emissions have been taken into account of a life cycle process. Meanwhile, cost-effectiveness of a wind farm is considered because the cost plays a very important role in operating a wind farm [38]. Considering the data reliability and availability, the cost data of this wind farm was mainly extracted from a feasibility report of one wind farm (with a designed capacity of the 49.5 MW) in Kang ping County of Liaoning province [39].

## Use advice
When utilizing this data set for life cycle assessment of wind power systems, users should ensure they align the system boundaries accordingly to include production, transportation and installation, power generation, maintenance, and end-of-life recycling and disposal. Attention should be paid to the accurate accounting of non-renewable energy input at each stage. The assessment should consider raw material, fossil fuel consumption, and emissions throughout the entire life cycle. Additionally, the data use requires an understanding of the cost-effectiveness of wind farms, incorporating economic evaluations alongside environmental impacts. Users must handle the data with the preface that it was derived primarily from a feasibility report of a different wind farm in Kangping County, Liaoning province, to inform their methodology.

## Review details
Inventory: The internal review was done by several iteration steps concerning raw data validation, raw data documentation, representativity, completeness and consistency of modelling with regard to ISO 14040 and 14044.
