# Ironmaking | hot metal | blast-furnace ironmaking | sinter/pellets/lump ore/scrap

Dataset: ILCD process, Unit process, single operation
Geography: CN
Reference year: 2006
Classification: Materials production / Other mineralic materials
Generated by: Wanghuanyu, wanghuanyu00@126.com
Review: Dependent internal review by Tiangong LCI Data Working Group
Amounts: no units in this file; such an amount is in the reference unit of its flow, which a separate flow dataset defines

## Reference product
All rows: measured
- iron: 1.8682
  z01
- iron: 1.7388
  z02
- iron: 1.503
  z03
- iron: 0.7394
  z04
- iron: 0.631
  z05
- iron: 0.4408
  z06
- iron: 1.2256
  z07
- iron: 0.533, 0.7162, 0.2856, 0.272, 0.7664, 0.2284, 0.1752, 0.2564, 0.357, 0.1838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 (11 entries)

## Inputs
All rows: measured
- hard coal; 26.3 MJ/kg: 171.5
  喷煤
- Energy, geothermal, converted: 12221.3
  z01
- Coal injection: 118, 103.5, 81.5, 58.3, 89, 97.3, 96.3, 74.9, 0, 42.9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 (17 entries)
  喷煤
- Energy, geothermal, converted: 14653.8
  z02
- Energy, geothermal, converted: 13745.3
  z03
- Energy, geothermal, converted: 14653.8
  z04
- Energy, geothermal, converted: 15181.3
  z05
- Energy, geothermal, converted: 13276.3
  z06
- Energy, geothermal, converted: 13510.8
  z07
- Energy, geothermal, converted: 14038.3
  z08
- Energy, geothermal, converted: 13716, 14653.8, 15240, 13481.5, 18229.3, 16412.3, 14419.3, 14302.1, 13774.6, 13862.5 (10 entries)

## Outputs
All rows: measured
- Flue dust: 0.162
  z01
- waste incineration of municipal solid waste (MSW): 304
  z01
- Flue dust: 7.419
  z02
- waste incineration of municipal solid waste (MSW): 529
  z02
- Flue dust: 0.299
  z03
- waste incineration of municipal solid waste (MSW): 394
  z03
- Flue dust: 8.897
  z04
- waste incineration of municipal solid waste (MSW): 544
  z04
- Flue dust: 1.93
  z05
- waste incineration of municipal solid waste (MSW): 474
  z05
- Flue dust: 2.197
  z06
- waste incineration of municipal solid waste (MSW): 537
  z06
- Flue dust: 0.197
  z07
- waste incineration of municipal solid waste (MSW): 355
  z07
- Flue dust: 1.767, 0.079, 0.205, 7.581, 0.427, 0.447, 0, 0.159, 0.028, 0.05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 (11 entries)
- waste incineration of municipal solid waste (MSW): 583, 859, 743, 851, 456, 563, 521, 506, 534, 461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 (11 entries)

## Review details
Inventory: The internal review was done by several iteration steps concerning raw data validation, raw data documentation, representativity, completeness and consistency of modelling with regard to ISO 14040 and 14044.; Documentation: The review of the documentation was performed by Ecobilan and is in compliance with ISO 14040 and 14044. The data set documentation is correct in view of the appropriateness of the information provided. It includes all relevant information in view of data quality and scope of application of the respective LCI result.

## Data sources
- 1.
