# Solar cell processing ; Multi-Si solar cell ; Mixed acids are used to wash wafer ; add p-n knot and cover with deposition film

Dataset: ILCD process, Unit process, single operation
Geography: CN
Reference year: 2017
Classification: Unit processes / Energy carriers and technologies / Renewable fuels
Functional unit: In this paper, a 1 kWp solar PV system consisting of five 200 Wmodules made of 54 multi-Si cells, each with a size of 156*156 mm2 and 16% efficiency, was used as the primary study object
LCI method principle: Attributional
LCI method approaches: Allocation
Generated by: Jinfeng Yang, yjfzfshn@163.com
Owner: Tiangong LCI Data Working Group
Review: Dependent internal review by Tiangong LCI Data Working Group
Amounts: no units in this file; such an amount is in the reference unit of its flow, which a separate flow dataset defines
copyright: false
licenseType: Free of charge for all users and uses

## General comment
Multi-Si

## Geography
Environmental effects of China's solar photovoltaic industry during2011e2016: A life cycle assessment approach

## Time period
Available online

## Technology and included processes
Mixed acids such as nitric and hydrochloric acid are used towash wafer, and then add p-n knot and cover with deposition film

## Technical purpose
The multi-Si solar cells produced through this process are primarily utilized in the construction of solar photovoltaic (PV) systems. Specifically, the process details the production of solar cells for a 1 kWp solar PV system composed of five 200 W modules, each module being made up of 54 multi-Si cells measuring 156*156 mm2 with an efficiency of 16%. Such PV systems are employed for converting sunlight into electrical energy and are used in a variety of applications ranging from residential and commercial to utility-scale solar power stations.

## Reference product
- Multi-Si solar cell,Multi-Si solar cell,Multi-Si solar cell: 1055; measured
  Multi-Si solar cell (KWp) (Multi-Si cell)

## Inputs
- Multi-Si wafer,Multi-Si wafer,Multi-Si wafer: 3.4203; measured
  Multi-Si wafer (Multi-Si cell)
- Electricity: 617.17; measured
  Electricity (Multi-Si cell)
- silver: 0.0936; software or database
  Silver (Multi-Si cell)
- aluminium: 0.427; software or database
  Aluminum (Multi-Si cell)
- hydrogen chloride gas: 0.5283; software or database
  Hydrogen chloride (Multi-Si cell)
- fluorine: 0.8608; software or database
  Hydrogen fluoride (Multi-Si cell)
- Nitric acid: 1.1426; software or database
  Nitric acid (Multi-Si cell)
- nitrogen: 7.3745; software or database
  Nitrogen (Multi-Si cell)
- sodium hydroxide: 0.2347; measured
  Sodium hydroxide(Multi-Si cell)
- Ammonia: 0.211; software or database
  Ammonia (Multi-Si cell)
- Phosphorus Oxychloride: 0.0189; measured
  Phosphorus oxychloride (Multi-Si cell)

## Outputs
- ammonia: 0.0202; measured
  Ammonia
- hydrogen chloride: 0.0061; measured
  Hydrogen chloride
- hydrogen fluoride: 0.0019; measured
  Hydrogen fluoride
- Nitrogen oxides: 0.0425; measured
  Oxynitride

## Deviations from the LCI method approaches
Building on the existing literature on LCA of China's solar PVsystem (Fu et al., 2015; He, 2013; Hong et al., 2016; Li and Yu, 2014; Li and Chang, 2012; Liang, 2012; Yang et al., 2015; Yu et al., 2017; Xie et al., 2015), the LCI is obtained for this study.

## Use advice
LCA practitioners considering this data set for analyzing the environmental impact of solar PV systems should take into account the specific conditions relevant to multi-Si solar cell production, including the use of mixed acids for wafer washing and the subsequent addition of p-n junctions and deposition films. Users are advised to validate the scope and recency of the LCI against the current production technologies and practices. Moreover, due care should be given to technological changes and advancements post-2016 as this LCI is based on literature from 2011 to 2016, and the solar PV industry is known for rapid innovation and improvement.

## Review details
Inventory: The internal review was done by several iteration steps concerning raw data validation, raw data documentation, representativity, completeness and consistency of modelling with regard to ISO 14040 and 14044.

## Data sources
- Xu, L., Zhang, S., Yang, M., Li, W. & Xu, J. Environmental effects of China’s solar photovoltaic industry during 2011–2016: A life cycle assessment approach. Journal of Cleaner Production 170, 310–329 (2018).
