# Caisson-based gate ; 2.4 m diameter caisson ; 1.2 m × 1.2 m column of ZVI ; In-situ groundwater remediation ; PRB ; Funnel-and-gate configuration PRB

Dataset: ILCD process, Unit process, single operation
Geography: UM
Reference year: 2009
Classification: Unit processes / Other Services / Repair and maintenance
Generated by: Yang Xintong, yangxt@caep.org.cn
Owner: Tiangong LCI Data Working Group
Review: Dependent internal review by Tiangong LCI Data Working Group
Amounts: no units in this file; such an amount is in the reference unit of its flow, which a separate flow dataset defines
copyright: false
licenseType: Free of charge for all users and uses

## General comment
PRBs are installed in situ, allowing groundwater to flow under the natural gradient through a reactive cell where a reactive medium degrades or captures contaminants.

## Geography
The case study was conducted using publicly available design documents for two remediation strategies designed by Battelle for Dover Air Force Base (AFB) in Dover, DE

## Technology and included processes
The gates were to be constructed by excavating within a 2.4 m diameter steel caisson, installing a 1.2 m by 1.2 m column of ZVI, and backfilling the outer pretreatment and exit zones with sand.

## Technical purpose
The described industrial process involves the use of a caisson-based gate configured as part of a Permeable Reactive Barrier (PRB) system. This system, incorporating a 2.4 m diameter caisson and a 1.2 m × 1.2 m column of Zero Valent Iron (ZVI), is specifically designed for in-situ groundwater remediation. The funnel-and-gate configuration of the PRB allows for the natural gradient flow of groundwater through the reactive cell, facilitating the degradation or capture of pollutants. This technology is implemented for environmental management and remediation at sites like Dover Air Force Base, where containment and treatment of contaminated groundwater are necessary.

## Reference product
- Caisson-based gate: 1; measured
  ZVI construction energy

## Inputs
All rows: measured
- Steel: 9300
- sand: 37900
- soil: 21400
- Energy, unspecified: 140000
  gate construction energy
- Cast Iron: 24500
- Energy, unspecified: 42700

## Use advice
Users of this dataset should be aware that the specific details of the construction and implementation of the caisson-based PRB system are based on design documents for Dover AFB and may not be universally applicable. When utilizing this data for other sites, ensure that local conditions are equivalent or adjustments are made to the design to accommodate different hydrological or geological situations. It is also essential to note that some unit processes, inputs, or emissions might be estimated or omitted based on available literature and calculations rooted in fundamental principles; therefore, further verification is recommended when applying the data in a new context.

## Review details
Inventory: The internal review was done by several iteration steps concerning raw data validation, raw data documentation, representativity, completeness and consistency of modelling with regard to ISO 14040 and 14044.

## Data sources
- Life-Cycle Case Study Comparison of Permeable Reactive Barrier versus Pump-and-Treat Remediation
