# Soil remediation ; In-situ remediation ; Phytoextraction remediation ; Engineering implementation ; Asphalt burial

Dataset: ILCD process, Unit process, single operation
Geography: IT
Classification: Other Services / Repair and maintenance
Generated by: Xiao Meng, xiaomeng@mail
Owner: Tiangong LCI Data Working Group
Review: Dependent internal review by Tiangong LCI Data Working Group
Amounts: no units in this file; such an amount is in the reference unit of its flow, which a separate flow dataset defines
licenseType: Free of charge for all users and uses

## General comment
Bury the transported asphalt at the treatment site.

## Geography
The site taken as a reference for the remediation is an area of 712 m2 located in a disused industrial district of Tuscany (Italy), in the past subjected to various productive activities that led to contamination with various metals, some of which potentially toxic such as lead (Pb), arsenic (As) and thallium (Tl). As it is a “site of national interest”, its exact location is considered confidential and cannot be disclosed.

## Technical purpose
The described industrial process is used specifically for soil remediation of contaminated sites via in-situ phytoextraction and subsequent burial of contaminants with asphalt. It is intended for applications requiring the clean-up of areas with varying degrees of metal contamination, particularly those involving heavy metals like lead (Pb), arsenic (As), and thallium (Tl).

## Reference product
- Treated asphalt: 142.4; measured
  填埋处理完成的沥青

## Inputs
- Transported asphalt: 142.4; measured
  运输到处理场地的沥青
- Diesel: 19.366; measured
- Water: 213.6; measured

## Use advice
When using the data set from this soil remediation process, users should ensure the applicability to sites with similar contamination profiles. Consideration should be given to the geographic and environmental contexts due to the reference to a specific location in Tuscany. Furthermore, the confidentiality of the exact location as a site of national interest must be respected. For modeling purposes, factors such as local regulations, the scale of the remediation, and potential environmental impacts of the asphalt burial must be taken into account.

## Review details
Inventory: The internal review was done by several iteration steps concerning raw data validation, raw data documentation, representativity, completeness and consistency of modelling with regard to ISO 14040 and 14044.

## Data sources
- Vocciante, M., De Folly D’Auris, A., Franchi, E., Petruzzelli, G. & Ferro, S. CO2 footprint analysis of consolidated and innovative technologies in remediation activities. J Clean Prod 297, 126723 (2021).
