# copper production;cathode copper; primary production by bath smelting approach;sulfide ore

Dataset: ILCD process, Unit process, single operation
Geography: CN
Reference year: 2014
Classification: Unit processes / Materials production / Metals and semimetals
Functional unit: functional unit was defined as the production of 1 t of refined copper (i.e., cathode copper).
LCI method principle: Attributional
LCI method approaches: Allocation - market value
Generated by: Peng Wang, 2867919560@qq.com
Owner: Tiangong LCI Data Working Group
Review: Dependent internal review by Tiangong LCI Data Working Group
Amounts: no units in this file; such an amount is in the reference unit of its flow, which a separate flow dataset defines
copyright: false
licenseType: Free of charge for all users and uses

## General comment
The cathode copper produced by the primary production processes applying bath smelting of sulfide ore is used broadly in electrical wiring, roofing, plumbing, and industrial machinery. This particular dataset represents copper produced in a western Chinese plant specializing in pyrometallurgical processes, covering the entire cycle from mining to electrolytic refining. In China, such copper smelting often utilizes either flash or bath smelting technologies.

## Geography
production data from a copper plant in western China

## Technology and included processes
Pyrometallurgical processes consist of mining, beneficiation, smelting, converting, fire refining (including anode casting) and electrolytic refining, of which smelting is the key phase. There are two main types of smelters in China, namely flash and bath smelters

## Reference product
- Refined copper: 1000; software or database

## Inputs
- copper ore/(0.81%): 0; measured
  copper ore/(0.81%) needs to be supplemented
- copper ore/(1.02%): 106064; measured
  copper ore/(1.02%) needs to be supplemented
- waste wire: 0; software or database
  waste wire needs to be replenished
- Limestone: 109.44; software or database
  imestone
- quartz sand: 1092.09; software or database
- oxygen: 1469.39; software or database
- Sulfuric acid(98%): 6.8; software or database
  Sulfuric acid needs to be supplemented with resourse
- Alternating Current Electricity: 18398.3; software or database
  AC electricity needs to be replenished
- Direct Current Electricity: 932.4; software or database
  DC electricity needs to be replenished
- hard coal,hard coal,hard coal: 10454.9; software or database
  coal
- coke: 0; software or database
  Coke needs to be replenished
- Diesel oil,diesel oil: 9657; software or database
  Diesel oil needs to be replenished
- Heavy fuel oil (1.0 wt.% S): 1869.1; software or database
  heavy fuel oil

## Outputs
All rows: software or database
- carbon dioxide (fossil): 2203.63
  原文未区分bio和fossil，根据专家判断此处为fossil
- sulfur oxides: 63.84
  SO2
- chemical oxygen demand: 52.59
  COD needs to be supplemented
- particles (PM2.5 - PM10): 27.5
  dust needs to be replenished
- Slag: 2998
  slag

## Deviations from the LCI method approaches
The Eco-Indicator 99 (EI99), a damage-oriented method widely used as an impact assessment method in LCA [22], was applied for the life cycle impact assessment. The impact assessment was performed with the EI99 methodology (hierarchist perspective).

## Data selection and combination
Inventory data of copper production originated mainly from two plants that adopted different equipment and processes, supplemented by other published literature.Inventory data of some auxiliary materials were obtained from the PE-GaBi database.

## Data treatment and extrapolations
GaBi 4 software was used to model the copper production processes and determine the environmental burdens in this study.

## Use advice
Users of this data should take into account the specific context of copper production in a western Chinese facility when applying the dataset in life cycle assessment. The inventory data are based on information from two different plants with distinct equipment and processes, and thus may not universally represent all copper production. Users must pay attention to this regional and technological specificity, especially when conducting comparative assessments. The use of PE-GaBi database for auxiliary materials and the modeling through GaBi 4 software for environmental burdens should be appropriately referenced. Impact assessments with the EI99 methodology should also consider the hierarchist perspective offered by this system.

## Review details
Inventory: The internal review was done by several iteration steps concerning raw data validation, raw data documentation, representativity, completeness and consistency of modelling with regard to ISO 14040 and 14044.

## Data sources
- Song, X., Yang, J., Lu, B., Li, B. & Zeng, G. Identification and assessment of environmental burdens of Chinese copper production from a life cycle perspective. Front. Environ. Sci. Eng. 8, 580–588 (2014).
