# Aluminum electrolysis carbon anode production ; carbon anode ; prebaked ; petroleum coke

Dataset: ILCD process, Unit process, single operation
Geography: JNA-SD-CN
Reference year: 2018
Classification: Unit processes / Materials production / Inorganic chemicals
Generated by: Jinliang Xie, jinliang.research@gmail.com
Owner: Tiangong LCI Data Working Group
Review: Dependent internal review by Tiangong LCI Data Working Group
Amounts: no units in this file; such an amount is in the reference unit of its flow, which a separate flow dataset defines
copyright: false
licenseType: Free of charge for all users and uses

## General comment
prebake

## Time period
Literature published on September 20, 2018

## Technology and included processes
The anode production system consists of coarse crushing workshop, calcining workshop, molding workshop, baking workshop and auxiliary workshop. The “cradle to gate” system boundary included raw material transportation, coarse crushing process, calcination process, calcining pollutant treatment process, vibration transport process, sieving and grinding process, mixing molding process, roasting process, roasting pollutant treatment process, defective products broken process.

## Technical purpose
The commercial prebaked carbon anodes produced through this industrial process are mainly used in the aluminum smelting industry. Prebaked anodes are essential in the process of electrolytic aluminum production, acting as the key component in the electrolysis cell that facilitates the chemical reaction necessary to reduce aluminum oxide to pure aluminum.

## Reference product
- anode, prebake, for aluminium electrolysis: 1000; measured

## Inputs
- electricity, high voltage, aluminium industry: 574.452; measured
- Petroleum Coke: 20; measured
  Metallurgical coke
- ammonia, anhydrous, liquid: 76.67; measured
- Coal Pitch: 235.3; measured
  Coal pitch
- sodium hydroxide, without water, in 50% solution state: 0.44; measured
- lime: 2.22; measured
- Water, unspecified natural origin: 0.3; measured
  water input in calcination process
- natural gas, high pressure: 60; measured
  natural gas input in roasting process
- Petroleum Coke: 1330; measured
- Diesel oil: 0.00478; missing unimportant

## Outputs
All rows: measured
- anhydrite: 5.4
  Calcium sulphate (by-product in Roasting pollutant treatment process)
- ammonium sulfate: 22.22
  by-product
- Nitrogen oxides: 0.0001311
- particles, unspecified: 2.915e-5
  Particulate matter
- sulfur dioxide: 0.00011648

## Data selection and combination
The background data of petroleum coke and coal pitch were LCI data in the Ecoinvent 3 database. The petroleum coke and coal pitch were supplied by several suppliers, and the production data cannot be provided by prebaked anode companies. As a result, the petroleum coke and coal pitch data in the database were adopted in this study instead of specific production data. At the same time, the background data of ammonia, tap water and lime were drawn from the Ecoinvent 3 database. The data of caustic soda came from the literature, the data of petroleum coke, and the LCI data of electric power were drawn from the literature. In the prebaked anode production process, the supply of natural gas in the baking link came from the local natural gas pipeline in Jinan. In the Ecoinvent 3 database, the LCI data of ordinary natural gas were selected in this study. According to the field investigation, the transportation distance of petroleum coke, pitch and metallurgical coke used in this study was 150 km, 120 km, and 200 km respectively. It is assumed in this study that the load capacity of each transport truck was 20 ton, the average power was 220 kWh, the main energy consumption in the transportation stage was fuel consumption, and the energy consumption per unit of road transportation was 1836 KJ/(t. km). The total consumption of diesel oil in the transport phase was 74.22 L. In this study, the average emission coefficient of unit fuel consumption was used as the standard for the exhaust emission of vehicles to transport the raw materials.

## Sampling procedure
A company in Jinan was selected as the research subject in this study. Currently, half of the world's prebaked anode products are produced in China. The production of the commercial prebaked anode in Shandong Province was 5.21 million tons in 2016, which accounts for 59% of the total production in China. As one of the large company in Shandong Province, the company chosen for case study can produce 400 thousand tons of prebaked anode annually. The production process is also typical for prebaked anode production in China.

## Use advice
When using this dataset, it is important to note that it only includes the 'cradle to gate' aspects of the prebaked anode production including raw material transportation, various processing stages, and pollutant treatment, without consideration for the downstream use or end-of-life stages. The LCI data from Ecoinvent 3 serves as background data and the transport distances for key materials are specific to the case study. For broader LCA studies, users should adjust the transport distances according to their geographical context. The environmental impacts of infrastructure and facility construction are negligible for the purpose of assessing impacts per ton of prebaked anode produced and thus not included in the dataset. Users should not consider the transport of water, natural gas, ammonia, sodium hydroxide, and lime due to their much shorter transport distances and minimal environmental impact in this specific case study.

## Review details
Inventory: The internal review was done by several iteration steps concerning raw data validation, raw data documentation, representativity, completeness and consistency of modelling with regard to ISO 14040 and 14044.

## Data sources
- Tang, Y. et al. Environmental and economic impacts assessment of prebaked anode production process: A case study in Shandong Province, China. Journal of Cleaner Production 196, 1657–1668 (2018).
