# Installation ; Installation a total of 67.2 km submarine cable.

Dataset: ILCD process, Unit process, single operation
Geography: SH-CN
Reference year: 2009
Classification: Unit processes / Other Services / Engineering and consulting
Functional unit: The functional unit is 1 kWh on-grid electricity provision.
LCI method principle: Consequential
LCI method approaches: Allocation
Generated by: Yunzhi Zhao, ll10088@163.com
Owner: Tiangong LCI Data Working Group
Review: Dependent internal review by Tiangong LCI Data Working Group
Amounts: no units in this file; such an amount is in the reference unit of its flow, which a separate flow dataset defines
copyright: false
licenseType: Free of charge for all users and uses

## General comment
The industrial process described pertains to the installation of a submarine cable for an offshore wind farm. This process is a part of the larger framework of offshore wind energy generation, specifically the Donghai Bridge Offshore Wind Farm (DBOWF). The data are suitable for assessing the environmental impact and energy requirements of installing submarine cables, which is crucial for the transmission of wind-generated electricity to land-based power grids. The information may be applicable for energy sector stakeholders, offshore engineering firms, and environmental analysts seeking to understand or optimize the life cycle impact of offshore wind farm infrastructure.

## Geography
The studied wind farm, the Donghai Bridge Offshore Wind Farm (DBOWF), is China's first offshore wind farm within the jurisdiction of Shanghai, as well as the first offshore wind farm outside Europe. The project has two-phases of construction, located on each side of the Donghai bridge (Fig. 1).

## Reference product
- Steel Wire,Cable: 67200; measured

## Inputs
- Diesel: 216000; calculated
- Energy, geothermal, converted: 1.44e7; calculated

## Outputs
- carbon dioxide: 974100; calculated
- particles (PM2.5): 1000; calculated
- sulfur dioxide: 1500; calculated
- nitrous oxide: 10800; calculated

## Deviations from the LCI method approaches
The present study employed the PLCA modeling approach to calculate the energy and environmental emissions of a typical offshore wind farm in China. The cradle-to-grave process includes four stages, materials and equipment manufacturing, transportation and installation, operation and maintenance, and dismantling and recycling (Fig. 2).

## Data selection and combination
The technical parameters of wind turbines, foundations and cables are obtained from the design documents of the DBOWF (Table 2). The energy and emissions factors (i.e., the energy consumption and environmental emissions of per unit material and component production) are derived from the Ecoinvent 2.2 dataset (Ecoinvent Centre, 2009), and the coefficients of China's practices were preferentially referred. For key materials and equipment, their sea transportation energy is calculated from the transportation load and shipping energy intensity. The facility installation energy and emissions were estimated based on the construction plan. The wind farm's operation and maintenance data, such as the frequency and working time of maintenance, were obtained from site investigations with engineers and technicians. The uncertainties associated with model parameters and input data are illustrated in the sensitivity analysis section of this paper.

## Use advice
When using this LCA data set, users should adhere to the methodological guidelines provided by the PLCA modeling approach. Attention should be given to inclusion and exclusion criteria of energy consumption and environmental emissions specifically for the installation phase of the submarine cable. Users should refer to the coefficients of Chinese practices as a preference and treat the sensitivities mentioned in the sensitivity analysis section with due consideration. This data should be integrated into a comprehensive cradle-to-grave assessment that encompasses manufacturing, transportation, installation, operation, maintenance, dismantling, and recycling of the wind farm infrastructure.

## Review details
Inventory: The internal review was done by several iteration steps concerning raw data validation, raw data documentation, representativity, completeness and consistency of modelling with regard to ISO 14040 and 14044.

## Data sources
- Yang, J. et al. The life-cycle energy and environmental emissions of a typical offshore wind farm in China. Journal of Cleaner Production 180, 316–324 (2018).
