# Polypropylene (PP) Production ; Coal to Polypropylene ; HDDMTO

Dataset: ILCD process, Unit process, black box
Geography: CN
Reference year: 2005
Classification: Unit processes / Materials production / Plastics
Functional unit: １t 煤制聚丙烯产品
Generated by: Huijuan Guo, GHJ@email.ncu.edu.cn
Owner: Tiangong LCI Data Working Group
Review: Dependent internal review by Tiangong LCI Data Working Group
Amounts: no units in this file; such an amount is in the reference unit of its flow, which a separate flow dataset defines
copyright: false
licenseType: Free of charge for all users and uses

## General comment
There are many technical combinations of coal to polypropylene: according to the feeding method, it can be divided into two categories: wet feed gasification and dry feed gasification. The typical representatives of wet feed gasification are GE and multi nozzle coal water slurry gasification processes, while the typical representatives of dry feed gasification are She11, GSP, HT-L (aerospace powder coal pressurized gasification) processes, etc; The methanol synthesis process can be divided into high-pressure method, medium pressure method, and low-pressure method according to the different synthesis pressures; The methanol to polypropylene process can be divided into MTO process and MTP process based on the different main products. Different process combinations can bring different environmental impacts. The HDDMTO process mainly produces polyethylene and polypropylene, with by-products such as C4+and methyl tert butyl ether (MTBE)

## Geography
根据中国煤制烯烃产业现 状

## Time period
数据有效期始根据文献数据来源的项目可行性研究报告时间

## Technical purpose
Polypropylene produced from coal, through the HDDMTO process, is typically used in the manufacture of a wide range of plastic products due to its versatility, durability, and recyclability. It can be applied in automotive parts, packaging materials, household goods, textiles, and medical devices.

## Reference product
- polypropylene granulate (PP): 1000; missing unimportant

## Inputs
All rows: missing unimportant
- hard coal; 26.3 MJ/kg: 7040
  Raw coal（0.66kgce/kg）
- sodium hydroxide: 4.76
  Caustic soda
- Limestone: 131
- Water: 19300
- hard coal: 1840
  Thermal coal(0.52kgce/kg)
- Electricity: 11052
  Purchased electricity
- Catalyst: 3.25

## Outputs
All rows: missing unimportant
- polyethylene low linear density granulate (PE-LLD): 626
- sulfur: 41.3
- tert-butyl methyl ether: 11
  Methyl tert-butyl ether (MTBE)
- butene: 40.4
- carbon dioxide (fossil): 15207.4
  原文未区分bio和fossil，根据专家判断此处为fossil
- methane (fossil): 0.13322
  原文未区分bio和fossil，根据专家判断此处为fossil
- nitrous oxide: 0.1128
- sulfur dioxide: 16.2412
- Nitrogen oxides: 11.6433
- ammonia: 0.0972
- particles (PM2.5): 2.69833
- Volatile Organic Compounds (VOCs): 2.434
  VOC
- C4,C4: 34.2
  C4+
- C5: 202
- C6: 22
  C6+

## Data selection and combination
聚丙烯产品生命周期清单数据包括前景数据与背景数据。产品生产活动水平数据即为前景数据，通过查阅煤制烯烃企业生产数据。背景数 据为输入原料、材料或 能源的消耗以及污染物 排放数据 。本研究中的煤炭开采阶段生命周 期清单数据从北京工业大学数据库中提取，洗选 质量损失以全国平均值计算，质量损失为15%，原料煤需要经过洗选过程，燃料煤不需要经过洗选过程。

## Data treatment and extrapolations
本研究分配方式采用碳分 配，产品含碳量越高，分 配系数越大。

## Use advice
When utilizing this LCA data set for coal-to-polypropylene production, it is crucial to consider the different environmental impacts associated with the various technical combinations (wet feed gasification, dry feed gasification, methanol synthesis pressures, and routes to polypropylene). The foreground data should be directly obtained from the coal-to-olefin enterprises' production data, while the background data includes the consumption of inputs, materials, or energy, plus pollutant emissions. Losses from coal mining and washing should be accounted for with an average loss of 15%, and the carbon partitioning approach should be applied based on the carbon content in the products. The functional unit defined for this study is 1 ton of coal-based polypropylene product, and the LCA scope should cover nine stages from 'cradle to gate', excluding construction, packaging, transportation, use, and disposal of the product.

## Review details
Inventory: The internal review was done by several iteration steps concerning raw data validation, raw data documentation, representativity, completeness and consistency of modelling with regard to ISO 14040 and 14044.

## Data sources
- 李泉鑫, 李俊杰, 龚先政 & 田亚峻. 两条不同技术路线的煤制聚丙烯生命周期评价. 煤炭转化 1–9 (2022) doi:
