# Integrated gravitational-flow wastewater treatment system

Dataset: ILCD process
Classification: Materials production / Other mineralic materials
Generated by: HUANG Runyao, runyaoh@163.com
Review: Dependent internal review by Tiangong LCI Data Working Group
Amounts: no units in this file; such an amount is in the reference unit of its flow, which a separate flow dataset defines

## Reference product
- Geomembrane,Pensile carrier,Plastic,挖弃土方,biochemical oxygen demand: 4.2042, 48.5078, 2.42539 (3 entries); input
- Electricity: 0.09702; input

## Review details
Inventory: The internal review was done by several iteration steps concerning raw data validation, raw data documentation, representativity, completeness and consistency of modelling with regard to ISO 14040 and 14044.; Documentation: The review of the documentation was performed by Ecobilan and is in compliance with ISO 14040 and 14044. The data set documentation is correct in view of the appropriateness of the information provided. It includes all relevant information in view of data quality and scope of application of the respective LCI result.

## Data sources
- PPCPs in wastewater – Update and calculation of characterization factors for their inclusion in LCA studies
