# Electricity production ; Electricity mix ; Shandong

Dataset: ILCD process, Unit process, single operation
Geography: SD-CN
Reference year: 2019
Classification: Unit processes / Energy carriers and technologies / Electricity
Generated by: Ruoxi Xiong, xiongrx0126@163.com
Owner: Tiangong LCI Data Working Group
Review: Dependent internal review by Tiangong LCI Data Working Group
Amounts: no units in this file; such an amount is in the reference unit of its flow, which a separate flow dataset defines
copyright: false
licenseType: Free of charge for all users and uses

## General comment
Electricity mix includes thermal, hydro, wind, nuclear and solar generation

## Technical purpose
The electricity generated in Shandong as described by this dataset is intended for a mixed utility application. It includes generation from thermal (likely coal, natural gas, or oil-fired plants), hydroelectric, wind, nuclear, and solar sources. This diverse energy mix is suitable for general consumption and can be used to power residential, commercial, and industrial facilities across the Shandong region.

## Reference product
- Electricity: 3.6; missing unimportant
  [{'text': '能量', 'type': 'text'}]

## Inputs
All rows: missing unimportant
- electricity for thermal power: 3.23126
  [{'text': '能量', 'type': 'text'}]
- electricity from hydroelectric power plant: 0.0030528
  [{'text': '能量', 'type': 'text'}]
- electricity for nuclear power: 0.126371
  [{'text': '能量', 'type': 'text'}]
- electricity from wind power: 0.137362
  [{'text': '能量', 'type': 'text'}]
- electricity for solar power: 0.101952
  [{'text': '能量', 'type': 'text'}]

## Use advice
When using this dataset for Life Cycle Assessment purposes, it is important to properly allocate the electricity mix according to your specific application needs. Consider the proportion of each generation type in the mix when modeling the environmental impact of electricity consumption. Be mindful of the regional differences and specific technology efficiencies. For example, the inclusion of solar and wind energy may require seasonal and weather-related variability to be taken into account. Additionally, when considering future scenarios, the evolving energy mix due to technological or policy changes should be taken into account.

## Review details
Inventory: The internal review was done by several iteration steps concerning raw data validation, raw data documentation, representativity, completeness and consistency of modelling with regard to ISO 14040 and 14044.

## Data sources
- 能源统计年鉴2020
