# Soil remediation ; In-situ remediation ; Phytoextraction remediation ; Engineering implementation ; Asphalt transportation

Dataset: ILCD process, Unit process, single operation
Geography: IT
Classification: Other Services / Repair and maintenance
Generated by: Xiao Meng, xiaomeng@mail
Owner: Tiangong LCI Data Working Group
Review: Dependent internal review by Tiangong LCI Data Working Group
Amounts: no units in this file; such an amount is in the reference unit of its flow, which a separate flow dataset defines
licenseType: Free of charge for all users and uses

## General comment
Transport the excavated asphalt

## Geography
The site taken as a reference for the remediation is an area of 712 m2 located in a disused industrial district of Tuscany (Italy), in the past subjected to various productive activities that led to contamination with various metals, some of which potentially toxic such as lead (Pb), arsenic (As) and thallium (Tl). As it is a “site of national interest”, its exact location is considered confidential and cannot be disclosed.

## Technical purpose
The process data set describes the application of phytoextraction techniques for in-situ soil remediation in an industrial context. Specifically, this process is to be applied to areas contaminated with heavy metals, including lead (Pb), arsenic (As), and thallium (Tl), within the scope of engineering implementation projects. Additionally, it involves the transportation of excavated asphalt, underscoring its use in addressing contamination in disused industrial areas.

## Reference product
- Transported asphalt: 142.4; measured
  运输到处理场地的沥青

## Inputs
- Excavated asphalt: 142.4; measured
  场地处理过程开挖的沥青
- transport in t*km: 21360; measured

## Use advice
When using this data set, users should note that the reference site's location is confidential and should not attempt to disclose or infer its exact position. This LCA data is specific to the defined square footage and the particular contaminants mentioned, so extrapolation to other sites or contaminants requires careful consideration of the local context and contaminant profile. Ensure that any application of this data is appropriate for the scale and nature of the contamination being addressed. Special attention should be paid to the methodological consistency of the remediation process, including the appropriateness of phytoextraction for the specific contaminants and the logistic implications of asphalt transportation in this context.

## Review details
Inventory: The internal review was done by several iteration steps concerning raw data validation, raw data documentation, representativity, completeness and consistency of modelling with regard to ISO 14040 and 14044.

## Data sources
- Vocciante, M., De Folly D’Auris, A., Franchi, E., Petruzzelli, G. & Ferro, S. CO2 footprint analysis of consolidated and innovative technologies in remediation activities. J Clean Prod 297, 126723 (2021).
