# Mono-Si solar PV cell production ; Mono-Si PV cell, efficiency of cells 15.7% ; High temperature diffusion of doped elements

Dataset: ILCD process, Unit process, single operation
Geography: ZJ-CN
Reference year: 2015
Classification: Unit processes / Systems / Electrics and electronics
Functional unit: In this study, the production of 1 kWp mono-Si PV cell is selected as the functional unit
LCI method principle: Attributional
LCI method approaches: Allocation
Generated by: Jinfeng Yang, yjfzfshn@163.com
Owner: Tiangong LCI Data Working Group
Review: Dependent internal review by Tiangong LCI Data Working Group
Amounts: no units in this file; such an amount is in the reference unit of its flow, which a separate flow dataset defines
copyright: false
licenseType: Free of charge for all users and uses

## General comment
Mono-Si

## Geography
The annual statistical data of a mono-Si PV cell production site in Zhejiang province (China) are used in this study

## Time period
Available online

## Technical purpose
This data set pertains to the production of mono-Si (monocrystalline silicon) solar PV (photovoltaic) cells, which have an efficiency of 15.7%. The industrial process includes high-temperature diffusion of doped elements within the mono-Si cells. These cells are primarily used in the assembly of solar panels for converting sunlight into electricity and are suitable for application in residential, commercial, and utility-scale solar power systems.

## Reference product
- mono-Si PV cell: 1000; measured

## Inputs
All rows: measured
- Electricity: 653.22
- Glass: 60.17
- Mono-Si wafer: 0.093
- Silver Paste: 0.14
  Silver paste
- Aluminum Paste: 0.59
  Aluminum paste
- Ammonia: 0.00237
- Phosphorus Oxychloride: 0.0206
  Phosphoryl chloride
- Ethanol: 3.31
- Organic Solvents: 0.00619
  Organic solvents
- Hydrochloric acid: 0.93
  Hydrochloric acid (38%)
- Hydrofluoric acid: 0.85
  Hydrogen ﬂuoride (40%)
- Sodium hydroxide: 0.99
- dinitrogen: 14.96
  Nitrogen
- Ethylene-vinyl acetate copolymer,Ethylene-vinyl acetate copolymer,Ethylene-vinyl acetate copolymer: 0.18
  Ethylene vinyl acetate (EVA) ﬁlm
- aluminium: 0.53
  Aluminum
- Silane: 0.00055
  Silicon tetrahydride
- Polyvinyl fluoride (PVF): 6.9e-6
  Polyvinylﬂuoride (PVF) ﬁlm
- freshwater: 1670
  Water

## Outputs
All rows: measured
- waste water - untreated: 0.67
  Wastewater
- industrial waste (unspecified): 0.53
  Solid waste
- hydrogen chloride: 0.00042
  Hydrogen chloride
- non-methane volatile organic compounds: 0.0274
  Non-methane volatile organic compounds
- hydrogen fluoride: 0.00102
  Hydrogen ﬂuoride
- ammonia: 9.11e-5
  Ammonia
- chloride: 7.29e-5
  Chloride
- methane (fossil): 2e-5
  Methane
- Silicon: 0.00277

## Deviations from the LCI method approaches
The LCI analysis is an investigation in which raw materials andenergy consumption, waste disposal, and direct emissions to theenvironment are calculated according to the studied scenario.

## Use advice
When utilizing this data, ensure you account for the technologically specific origins of the production data, which is taken from an annual statistical report of a mono-Si PV cell production site in Zhejiang province, China. The data encompasses raw material and energy consumption, waste disposal, and direct environmental emissions based on the analyzed scenario. The functional unit defined in this Life Cycle Inventory (LCI) analysis is the production of 1 kWp of mono-Si PV cells. Users must factor in these details and strictly adhere to the functional unit when conducting a life cycle assessment or environmental impact study.

## Review details
Inventory: The internal review was done by several iteration steps concerning raw data validation, raw data documentation, representativity, completeness and consistency of modelling with regard to ISO 14040 and 14044.

## Data sources
- Chen, W., Hong, J., Yuan, X. & Liu, J. Environmental impact assessment of monocrystalline silicon solar photovoltaic cell production: a case study in China. Journal of Cleaner Production 112, 1025–1032 (2016).
