# Wet blue leather - Blank leather / Finished leather ; Sheep blank leather/finished leather ; Sheep blue wet hide ; Chromium retanning ; All sizes; NESPS2 / 蓝湿皮-坯革/成品革 ; 绵羊坯革/成品革 ; 绵羊蓝湿皮 ; 铬复鞣 ; 所有规模 ; 全国第二次污染普查数据

Dataset: ILCD process, Unit process, single operation
Geography: CN
Reference year: 2019
Classification: Reference Parameters / Materials production / Other materials
Generated by: The data was created by the Office of the Second National Pollution Source Census of the Ministry of Ecology and Environment, and the data was organized by the TianGong Plan team for ILCD format / 生态环境部第二次全国污染源普查工作办公室创建数据，天工计划团队常慧敏整理数据为ILCD格式
Owner: Tiangong LCI Data Working Group / 天工LCI数据工作小组
Review: Dependent internal review by Tiangong LCI Data Working Group / 天工LCI数据工作小组
Amounts: no units in this file; such an amount is in the reference unit of its flow, which a separate flow dataset defines
copyright: false
licenseType: Free of charge for all users and uses

## General comment
the Technical of end-of-pipe management technology for pollution chemical oxygen demandisPrecipitation separation，Its Technical efficiency of end-of-pipe management30，The formula for calculating the actual operation rate (k-value) of the end-of-pipe treatment facility is k = power consumption of wastewater treatment facilities (kWh/year) / (total rated power (kW) × annual operating time (hours))

## Technical purpose
所描述的工艺涉及湿蓝和成品绵羊皮革的生产，包括适用于皮革制品行业多种应用的铬复鞣操作。这适用于需要高质量皮革材料的服装、配饰和家具装饰品的制造商。此外，该过程包括多种污水处理技术，如A2/O、A/O、SBR、MBR、氧化沟、生物接触氧化工艺和化学沉淀，旨在通过降低化学需氧量（COD）、总磷、氨氮、有机结合氮和铬等污染物来达到环境合规标准。

## Reference product
- Sheep: 1000; input; calculated
  源文件中描述为为绵羊蓝湿皮，此处对其进行了匹配工作，将其匹配到LCAflow库里面相最符合的流

## Outputs
All rows: calculated
- Chromium: 0.003136
  the Technical of end-of-pipe management technology for pollution ChromiumisChemical precipitation，Its Technical efficiency of end-of-pipe management99.3，The formula for calculating the actual operation rate (k-value) of the end-of-pipe treatment facility is k = annual power consumption of wastewater treatment facilities (kWh) / (total rated power (kW) × annual operating time (hours))
  污染物指标铬的末端治理技术是化学沉淀法，其效率为99.3，末端治理设施实际运行率（k值）计算公式为k=设备运行时间（小时）/总生产时间（小时）。原文件中描述污染物类别为废水，污染物指标为铬，此处对其进行了匹配工作，将其匹配到LCAflow库里面相最符合的流
- phosphorus, total: 0.024684
  the Technical of end-of-pipe management technology for pollution phosphorus, totalisA2/O，Its Technical efficiency of end-of-pipe management67，The formula for calculating the actual operation rate (k-value) of the end-of-pipe treatment facility is k = power consumption of wastewater treatment facilities (kWh/year) / (total rated power (kW) × annual operating time (hours))
  污染物指标总磷的末端治理技术是A2/O，其效率为67，末端治理设施实际运行率（k值）计算公式为k=设备运行时间（小时）/总生产时间（小时）。原文件中描述污染物类别为废水，污染物指标为总磷，此处对其进行了匹配工作，将其匹配到LCAflow库里面相最符合的流
- Ammonia Nitrogen: 0.0297
  the Technical of end-of-pipe management technology for pollution Ammonia NitrogenisA2/O，Its Technical efficiency of end-of-pipe management99，The formula for calculating the actual operation rate (k-value) of the end-of-pipe treatment facility is k = power consumption of wastewater treatment facilities (kWh/year) / (total rated power (kW) × annual operating time (hours))
  污染物指标氨氮的末端治理技术是A2/O，其效率为99，末端治理设施实际运行率（k值）计算公式为k=设备运行时间（小时）/总生产时间（小时）。原文件中描述污染物类别为废水，污染物指标为氨氮，此处对其进行了匹配工作，将其匹配到LCAflow库里面相最符合的流
- phosphorus, total: 0.03366
  the Technical of end-of-pipe management technology for pollution phosphorus, totalisA/O，Its Technical efficiency of end-of-pipe management55，The formula for calculating the actual operation rate (k-value) of the end-of-pipe treatment facility is k = power consumption of wastewater treatment facilities (kWh/year) / (total rated power (kW) × annual operating time (hours))
  污染物指标总磷的末端治理技术是A/O，其效率为55，末端治理设施实际运行率（k值）计算公式为k=设备运行时间（小时）/总生产时间（小时）。原文件中描述污染物类别为废水，污染物指标为总磷，此处对其进行了匹配工作，将其匹配到LCAflow库里面相最符合的流
- phosphorus, total: 0.03366
  the Technical of end-of-pipe management technology for pollution phosphorus, totalisBio-contact oxidation process，Its Technical efficiency of end-of-pipe management55
  污染物指标总磷的末端治理技术是生物接触氧化，其效率为55，末端治理设施实际运行率（k值）计算公式为k=设备运行时间（小时）/总生产时间（小时）。原文件中描述污染物类别为废水，污染物指标为总磷，此处对其进行了匹配工作，将其匹配到LCAflow库里面相最符合的流
- phosphorus, total: 0.03366
  the Technical of end-of-pipe management technology for pollution phosphorus, totalisMBR，Its Technical efficiency of end-of-pipe management55，The formula for calculating the actual operation rate (k-value) of the end-of-pipe treatment facility is k = power consumption of wastewater treatment facilities (kWh/year) / (total rated power (kW) × annual operating time (hours))
  污染物指标总磷的末端治理技术是MBR类，其效率为55，末端治理设施实际运行率（k值）计算公式为k=设备运行时间（小时）/总生产时间（小时）。原文件中描述污染物类别为废水，污染物指标为总磷，此处对其进行了匹配工作，将其匹配到LCAflow库里面相最符合的流
- phosphorus, total: 0.03366
  the Technical of end-of-pipe management technology for pollution phosphorus, totalisOxidation trenches，Its Technical efficiency of end-of-pipe management55
  污染物指标总磷的末端治理技术是氧化沟类，其效率为55，末端治理设施实际运行率（k值）计算公式为k=设备运行时间（小时）/总生产时间（小时）。原文件中描述污染物类别为废水，污染物指标为总磷，此处对其进行了匹配工作，将其匹配到LCAflow库里面相最符合的流
- phosphorus, total: 0.03366
  the Technical of end-of-pipe management technology for pollution phosphorus, totalisSBR，Its Technical efficiency of end-of-pipe management55，The formula for calculating the actual operation rate (k-value) of the end-of-pipe treatment facility is k = power consumption of wastewater treatment facilities (kWh/year) / (total rated power (kW) × annual operating time (hours))
  污染物指标总磷的末端治理技术是SBR类，其效率为55，末端治理设施实际运行率（k值）计算公式为k=设备运行时间（小时）/总生产时间（小时）。原文件中描述污染物类别为废水，污染物指标为总磷，此处对其进行了匹配工作，将其匹配到LCAflow库里面相最符合的流
- Ammonia Nitrogen: 0.0594
  the Technical of end-of-pipe management technology for pollution Ammonia NitrogenisOthers (aerobic biological treatment method + redox method)，Its Technical efficiency of end-of-pipe management98，The formula for calculating the actual operation rate (k-value) of the end-of-pipe treatment facility is k = power consumption of wastewater treatment facilities (kWh/year) / (total rated power (kW) × annual operating time (hours))
  污染物指标氨氮的末端治理技术是其他（好氧生物处理法+氧化还原法），其效率为98，末端治理设施实际运行率（k值）计算公式为k=设备运行时间（小时）/总生产时间（小时）。原文件中描述污染物类别为废水，污染物指标为氨氮，此处对其进行了匹配工作，将其匹配到LCAflow库里面相最符合的流
- Waste water: 62100
  the treatment technology for the pollution of Waste waterdidn't offered
  污染物指标工业废水量的末端治理技术未说明。原文件中描述污染物类别为废水，污染物指标为工业废水量，此处对其进行了匹配工作，将其匹配到LCAflow库里面相最符合的流
- phosphorus, total: 0.0748
  the Technical of end-of-pipe management technology for pollution phosphorus, totalisPrecipitation separation，The formula for calculating the actual operation rate (k-value) of the end-of-pipe treatment facility is k = power consumption of wastewater treatment facilities (kWh/year) / (total rated power (kW) × annual operating time (hours))
  污染物指标总磷的末端治理技术是沉淀分离，末端治理设施实际运行率（k值）计算公式为k=设备运行时间（小时）/总生产时间（小时）。原文件中描述污染物类别为废水，污染物指标为总磷，此处对其进行了匹配工作，将其匹配到LCAflow库里面相最符合的流
- Ammonia Nitrogen: 0.1782
  the Technical of end-of-pipe management technology for pollution Ammonia NitrogenisA/O，Its Technical efficiency of end-of-pipe management94，The formula for calculating the actual operation rate (k-value) of the end-of-pipe treatment facility is k = power consumption of wastewater treatment facilities (kWh/year) / (total rated power (kW) × annual operating time (hours))
  污染物指标氨氮的末端治理技术是A/O，其效率为94，末端治理设施实际运行率（k值）计算公式为k=设备运行时间（小时）/总生产时间（小时）。原文件中描述污染物类别为废水，污染物指标为氨氮，此处对其进行了匹配工作，将其匹配到LCAflow库里面相最符合的流
- Ammonia Nitrogen: 0.1782
  the Technical of end-of-pipe management technology for pollution Ammonia NitrogenisMBR，Its Technical efficiency of end-of-pipe management94
  污染物指标氨氮的末端治理技术是MBR类，其效率为94，末端治理设施实际运行率（k值）计算公式为k=设备运行时间（小时）/总生产时间（小时）。原文件中描述污染物类别为废水，污染物指标为氨氮，此处对其进行了匹配工作，将其匹配到LCAflow库里面相最符合的流
- Ammonia Nitrogen: 0.297
  the Technical of end-of-pipe management technology for pollution Ammonia NitrogenisOxidation trenches，Its Technical efficiency of end-of-pipe management90
  污染物指标氨氮的末端治理技术是氧化沟类，其效率为90，末端治理设施实际运行率（k值）计算公式为k=设备运行时间（小时）/总生产时间（小时）。原文件中描述污染物类别为废水，污染物指标为氨氮，此处对其进行了匹配工作，将其匹配到LCAflow库里面相最符合的流
- Ammonia Nitrogen: 0.297
  the Technical of end-of-pipe management technology for pollution Ammonia NitrogenisSBR，Its Technical efficiency of end-of-pipe management90，The formula for calculating the actual operation rate (k-value) of the end-of-pipe treatment facility is k = power consumption of wastewater treatment facilities (kWh/year) / (total rated power (kW) × annual operating time (hours))
  污染物指标氨氮的末端治理技术是SBR类，其效率为90，末端治理设施实际运行率（k值）计算公式为k=设备运行时间（小时）/总生产时间（小时）。原文件中描述污染物类别为废水，污染物指标为氨氮，此处对其进行了匹配工作，将其匹配到LCAflow库里面相最符合的流
- Ammonia Nitrogen: 0.4455
  the Technical of end-of-pipe management technology for pollution Ammonia NitrogenisBio-contact oxidation process，Its Technical efficiency of end-of-pipe management85
  污染物指标氨氮的末端治理技术是生物接触氧化，其效率为85，末端治理设施实际运行率（k值）计算公式为k=设备运行时间（小时）/总生产时间（小时）。原文件中描述污染物类别为废水，污染物指标为氨氮，此处对其进行了匹配工作，将其匹配到LCAflow库里面相最符合的流
- Nitrogen, organic bound: 0.5685
  the Technical of end-of-pipe management technology for pollution Nitrogen, organic boundisMBR，Its Technical efficiency of end-of-pipe management85
  污染物指标总氮的末端治理技术是MBR类，其效率为85，末端治理设施实际运行率（k值）计算公式为k=设备运行时间（小时）/总生产时间（小时）。原文件中描述污染物类别为废水，污染物指标为总氮，此处对其进行了匹配工作，将其匹配到LCAflow库里面相最符合的流
- chemical oxygen demand: 0.815
  the Technical of end-of-pipe management technology for pollution chemical oxygen demandisAerobic oxidation pond，Its Technical efficiency of end-of-pipe management99，The formula for calculating the actual operation rate (k-value) of the end-of-pipe treatment facility is k = power consumption of wastewater treatment facilities (kWh/year) / (total rated power (kW) × annual operating time (hours))
  污染物指标化学需氧量的末端治理技术是好氧化塘，其效率为99，末端治理设施实际运行率（k值）计算公式为k=设备运行时间（小时）/总生产时间（小时）。原文件中描述污染物类别为废水，污染物指标为化学需氧量，此处对其进行了匹配工作，将其匹配到LCAflow库里面相最符合的流
- chemical oxygen demand: 0.815
  the Technical of end-of-pipe management technology for pollution chemical oxygen demandisBiological filter，Its Technical efficiency of end-of-pipe management99，The formula for calculating the actual operation rate (k-value) of the end-of-pipe treatment facility is k = power consumption of wastewater treatment facilities (kWh/year) / (total rated power (kW) × annual operating time (hours))
  污染物指标化学需氧量的末端治理技术是生物滤池，其效率为99，末端治理设施实际运行率（k值）计算公式为k=设备运行时间（小时）/总生产时间（小时）。原文件中描述污染物类别为废水，污染物指标为化学需氧量，此处对其进行了匹配工作，将其匹配到LCAflow库里面相最符合的流
- phosphorus, total: 1.0612
  the Technical of end-of-pipe management technology for pollution phosphorus, totalisA/O，Its Technical efficiency of end-of-pipe management72，The formula for calculating the actual operation rate (k-value) of the end-of-pipe treatment facility is k = annual power consumption of wastewater treatment facilities (kWh) / (total rated power (kW) × annual operating time (hours))
  污染物指标总磷的末端治理技术是A/O，其效率为72，末端治理设施实际运行率（k值）计算公式为k=设备运行时间（小时）/总生产时间（小时）。原文件中描述污染物类别为废水，污染物指标为总磷，此处对其进行了匹配工作，将其匹配到LCAflow库里面相最符合的流
- phosphorus, total: 1.0612
  the Technical of end-of-pipe management technology for pollution phosphorus, totalisA2/O，Its Technical efficiency of end-of-pipe management72
  污染物指标总磷的末端治理技术是A2/O，其效率为72，末端治理设施实际运行率（k值）计算公式为k=设备运行时间（小时）/总生产时间（小时）。原文件中描述污染物类别为废水，污染物指标为总磷，此处对其进行了匹配工作，将其匹配到LCAflow库里面相最符合的流
- phosphorus, total: 1.0612
  the Technical of end-of-pipe management technology for pollution phosphorus, totalisSBR，Its Technical efficiency of end-of-pipe management72
  污染物指标总磷的末端治理技术是SBR类，其效率为72，末端治理设施实际运行率（k值）计算公式为k=设备运行时间（小时）/总生产时间（小时）。原文件中描述污染物类别为废水，污染物指标为总磷，此处对其进行了匹配工作，将其匹配到LCAflow库里面相最符合的流
- phosphorus, total: 1.3265
  the Technical of end-of-pipe management technology for pollution phosphorus, totalisBio-contact oxidation process，Its Technical efficiency of end-of-pipe management65，The formula for calculating the actual operation rate (k-value) of the end-of-pipe treatment facility is k = annual power consumption of wastewater treatment facilities (kWh) / (total rated power (kW) × annual operating time (hours))
  污染物指标总磷的末端治理技术是生物接触氧化，其效率为65，末端治理设施实际运行率（k值）计算公式为k=设备运行时间（小时）/总生产时间（小时）。原文件中描述污染物类别为废水，污染物指标为总磷，此处对其进行了匹配工作，将其匹配到LCAflow库里面相最符合的流
- phosphorus, total: 1.3265
  the Technical of end-of-pipe management technology for pollution phosphorus, totalisOxidation trenches，Its Technical efficiency of end-of-pipe management65，The formula for calculating the actual operation rate (k-value) of the end-of-pipe treatment facility is k = annual power consumption of wastewater treatment facilities (kWh) / (total rated power (kW) × annual operating time (hours))
  污染物指标总磷的末端治理技术是氧化沟类，其效率为65，末端治理设施实际运行率（k值）计算公式为k=设备运行时间（小时）/总生产时间（小时）。原文件中描述污染物类别为废水，污染物指标为总磷，此处对其进行了匹配工作，将其匹配到LCAflow库里面相最符合的流
- chemical oxygen demand: 1.63
  the Technical of end-of-pipe management technology for pollution chemical oxygen demandisOthers (aerobic biological treatment method + redox method)，Its Technical efficiency of end-of-pipe management98
  污染物指标化学需氧量的末端治理技术是其他（好氧生物处理法+氧化还原法），其效率为98，末端治理设施实际运行率（k值）计算公式为k=设备运行时间（小时）/总生产时间（小时）。原文件中描述污染物类别为废水，污染物指标为化学需氧量，此处对其进行了匹配工作，将其匹配到LCAflow库里面相最符合的流
- Ammonia Nitrogen: 2.97
  the Technical of end-of-pipe management technology for pollution Ammonia NitrogenisPrecipitation separation，The formula for calculating the actual operation rate (k-value) of the end-of-pipe treatment facility is k = power consumption of wastewater treatment facilities (kWh/year) / (total rated power (kW) × annual operating time (hours))
  污染物指标氨氮的末端治理技术是沉淀分离，末端治理设施实际运行率（k值）计算公式为k=设备运行时间（小时）/总生产时间（小时）。原文件中描述污染物类别为废水，污染物指标为氨氮，此处对其进行了匹配工作，将其匹配到LCAflow库里面相最符合的流
- chemical oxygen demand: 3.26
  the Technical of end-of-pipe management technology for pollution chemical oxygen demandisA2/O，Its Technical efficiency of end-of-pipe management96，The formula for calculating the actual operation rate (k-value) of the end-of-pipe treatment facility is k = power consumption of wastewater treatment facilities (kWh/year) / (total rated power (kW) × annual operating time (hours))
  污染物指标化学需氧量的末端治理技术是A2/O，其效率为96，末端治理设施实际运行率（k值）计算公式为k=设备运行时间（小时）/总生产时间（小时）。原文件中描述污染物类别为废水，污染物指标为化学需氧量，此处对其进行了匹配工作，将其匹配到LCAflow库里面相最符合的流
- Nitrogen, organic bound: 3.4868
  the Technical of end-of-pipe management technology for pollution Nitrogen, organic boundisPrecipitation separation，Its Technical efficiency of end-of-pipe management8
  污染物指标总氮的末端治理技术是沉淀分离，其效率为8，末端治理设施实际运行率（k值）计算公式为k=设备运行时间（小时）/总生产时间（小时）。原文件中描述污染物类别为废水，污染物指标为总氮，此处对其进行了匹配工作，将其匹配到LCAflow库里面相最符合的流
- chemical oxygen demand: 4.89
  the Technical of end-of-pipe management technology for pollution chemical oxygen demandisA/O，Its Technical efficiency of end-of-pipe management94，The formula for calculating the actual operation rate (k-value) of the end-of-pipe treatment facility is k = power consumption of wastewater treatment facilities (kWh/year) / (total rated power (kW) × annual operating time (hours))
  污染物指标化学需氧量的末端治理技术是A/O，其效率为94，末端治理设施实际运行率（k值）计算公式为k=设备运行时间（小时）/总生产时间（小时）。原文件中描述污染物类别为废水，污染物指标为化学需氧量，此处对其进行了匹配工作，将其匹配到LCAflow库里面相最符合的流
- chemical oxygen demand: 4.89
  the Technical of end-of-pipe management technology for pollution chemical oxygen demandisMBR，Its Technical efficiency of end-of-pipe management94，The formula for calculating the actual operation rate (k-value) of the end-of-pipe treatment facility is k = power consumption of wastewater treatment facilities (kWh/year) / (total rated power (kW) × annual operating time (hours))
  污染物指标化学需氧量的末端治理技术是MBR类，其效率为94，末端治理设施实际运行率（k值）计算公式为k=设备运行时间（小时）/总生产时间（小时）。原文件中描述污染物类别为废水，污染物指标为化学需氧量，此处对其进行了匹配工作，将其匹配到LCAflow库里面相最符合的流
- chemical oxygen demand: 12.225
  the Technical of end-of-pipe management technology for pollution chemical oxygen demandisOxidation trenches，Its Technical efficiency of end-of-pipe management85
  污染物指标化学需氧量的末端治理技术是氧化沟类，其效率为85，末端治理设施实际运行率（k值）计算公式为k=设备运行时间（小时）/总生产时间（小时）。原文件中描述污染物类别为废水，污染物指标为化学需氧量，此处对其进行了匹配工作，将其匹配到LCAflow库里面相最符合的流
- chemical oxygen demand: 12.225
  the Technical of end-of-pipe management technology for pollution chemical oxygen demandisSBR，Its Technical efficiency of end-of-pipe management85，The formula for calculating the actual operation rate (k-value) of the end-of-pipe treatment facility is k = power consumption of wastewater treatment facilities (kWh/year) / (total rated power (kW) × annual operating time (hours))
  污染物指标化学需氧量的末端治理技术是SBR类，其效率为85，末端治理设施实际运行率（k值）计算公式为k=设备运行时间（小时）/总生产时间（小时）。原文件中描述污染物类别为废水，污染物指标为化学需氧量，此处对其进行了匹配工作，将其匹配到LCAflow库里面相最符合的流
- chemical oxygen demand: 16.3
  the Technical of end-of-pipe management technology for pollution chemical oxygen demandisBio-contact oxidation process，Its Technical efficiency of end-of-pipe management80
  污染物指标化学需氧量的末端治理技术是生物接触氧化，其效率为80，末端治理设施实际运行率（k值）计算公式为k=设备运行时间（小时）/总生产时间（小时）。原文件中描述污染物类别为废水，污染物指标为化学需氧量，此处对其进行了匹配工作，将其匹配到LCAflow库里面相最符合的流
- chemical oxygen demand: 57.05
  the Technical of end-of-pipe management technology for pollution chemical oxygen demandisPrecipitation separation，Its Technical efficiency of end-of-pipe management30，The formula for calculating the actual operation rate (k-value) of the end-of-pipe treatment facility is k = power consumption of wastewater treatment facilities (kWh/year) / (total rated power (kW) × annual operating time (hours))
  污染物指标化学需氧量的末端治理技术是沉淀分离，其效率为30，末端治理设施实际运行率（k值）计算公式为k=设备运行时间（小时）/总生产时间（小时）。原文件中描述污染物类别为废水，污染物指标为化学需氧量，此处对其进行了匹配工作，将其匹配到LCAflow库里面相最符合的流

## Use advice
This dataset is derived from the Pollution Source Census Report and contains information on pollution emissions and related products. However, it does not include data on energy or chemical consumption, nor does it provide information on waste or co-product generation. When utilizing this dataset, please supplement the missing data based on actual conditions before use
该数据集来源于污染源普查报告，包含污染物排放及相关产品信息，但不包含能源或化学品消耗数据，也不提供废弃物或共生产物产生信息。在使用该数据集时，请根据实际情况补充缺失数据后再使用。

## Review details
Inventory: The internal review was done by several iteration steps concerning raw data validation, raw data documentation, representativity, completeness and consistency of modelling with regard to ISO 14040 and 14044.
清单： 内部审查通过几个迭代步骤完成，涉及原始数据验证、原始数据记录、代表性、完整性、与 ISO 14040 和 14044 有关的建模的一致性。

## Data sources
- 第二次全国污染源普查产排污核算系数手册（试用版）,三级代码191.0文件，在完整版文件中第2725页
