# Mining of Rare Earth Elements (REE)s;Rare Earth Elements (REE);bastnaesite route;Rare Earth Elements (REE) containing ore

Dataset: ILCD process, Unit process, single operation
Geography: NMG-CN
Reference year: 2014
Classification: Unit processes / Materials production / Non-energetic raw materials
Functional unit: The functional unit of this study is the production of 1 kg of the basket REO from each corresponding mineralogical and processing route.
LCI method principle: Attributional
LCI method approaches: Allocation - market value
Generated by: Tao Wang, twang@iue.ac.cn
Owner: Tiangong LCI Data Working Group
Review: Dependent internal review by Tiangong LCI Data Working Group
Amounts: no units in this file; such an amount is in the reference unit of its flow, which a separate flow dataset defines
copyright: false
licenseType: Free of charge for all users and uses

## General comment
The REE (Rare Earth Element) production process analyzed in this study, including mining and solvent extraction with finishing processes such as precipitation and calcination, is intended for the production of REE-containing compounds applicable in various high-tech industries like electronics, clean energy, and aerospace engineering.

## Technology and included processes
In this study, the REE production system was analyzed from mining up to and including solvent extraction which contains product finishing processes such as precipitation and calcination

## Reference product
- Raw ore: 1; calculated

## Inputs
All rows: calculated
- Diesel: 1.25
- to unspecified: 2.13e-6
- water: 0.0034
- mineral extraction site: 0.00012
- to unspecified: 2.13e-6
  To mineral extraction site
- Iron ore: 0.3
- cerium: 0.0164
- lanthanum: 0.00984
- neodymium: 0.00541
- praseodymium: 0.00172
- europium: 8.14e-5
- samarium: 0.00041
- gadolinium: 0.000206

## Outputs
All rows: calculated
- waste heat: 0.00513
- particles (PM2.5): 0.000144
- particles (PM10): 0.00144
- particles (PM2.5 - PM10): 0.0013
- uranium-238: 0.000134
- radium-226: 0.01
- thorium-232: 0.0506

## Deviations from the LCI method approaches
In this study, the REE production system was analyzed from mining up to and including solvent extraction which contains product finishing processes such as precipitation and calcination (Fig. 1). The other categories assessed in the literature review were mineral type, radioactivity, waste treatment, and co-mining. For mineral type, it was noted that the mineralogy accounted for in each study was different, which makes comparison difficult. For radioactivity, we marked with an X those studies which exemplified radioactivity flows in the LCI (if provided). For waste, we distinguished those LCIs which quantified waste treatment flows. For co-mining, since all REE are co-products of each other, this column is meant to highlight the co-products in addition to REE.

## Use advice
When utilizing this LCA data set, it is important to consider the differences in mineralogy and processing routes as they may affect comparability. Attention should also be given to radioactivity flows, waste treatment, and the presence of co-products in addition to REE which are inherent in co-mining activities. The functional unit for comparison is the production of 1 kg of REO (Rare Earth Oxides) basket from each specific mineralogical and processing route. Methodological consistency must be maintained across assessments for accurate comparisons and decision making.

## Review details
Inventory: The internal review was done by several iteration steps concerning raw data validation, raw data documentation, representativity, completeness and consistency of modelling with regard to ISO 14040 and 14044.

## Data sources
- Bailey, G. et al. Review and new life cycle assessment for rare earth production from bastnäsite, ion adsorption clays and lateritic monazite. Resources, Conservation and Recycling 155, 104675 (2020).
