# Municipal wastewater treatment ; Wastewater ;Oxidation ditch (OD)

Dataset: ILCD process, Unit process, single operation
Geography: CN
Classification: Unit processes / End-of-life treatment / Waste water treatment
Generated by: YU Chenyang, yuchenyang0506@foxmail.com
Owner: Tiangong LCI Data Working Group
Review: Dependent internal review by Tiangong LCI Data Working Group
Amounts: no units in this file; such an amount is in the reference unit of its flow, which a separate flow dataset defines
copyright: ['opt4ROkqig']
licenseType: Free of charge for all users and uses

## General comment
An oxidation ditch (OD) is a common biological treatment system used to treat organic matter and nitrogen in wastewater. An oxidation ditch is often a long, narrow channel filled with oxygen and covered with bottom sediment. Wastewater is injected into the oxidation ditch where microorganisms break down the organic material in the presence of oxygen. Nitrification and denitrification processes also occur in oxidation ditches, which help remove nitrogen from wastewater. Oxidation ditch is commonly used to treat wastewater from small to medium sized wastewater treatment plants and is an effective and low cost method of wastewater treatment.

## Geography
17 WWTPs in China

## Technology and included processes
In the oxidation ditch (OD) process, wastewater flows in long, narrow channels that are in full contact with oxygen, promoting degradation and oxidation of organic matter. Microorganisms decompose organic matter in the oxidation ditch, producing carbon dioxide and water. Nitrification and denitrification processes of nitrogen are also carried out in the oxidation ditch, which ultimately leads to the effective removal of organic matter and nitrogen from the wastewater and the purification and treatment of wastewater.

## Technical purpose
The dataset represents the process of municipal wastewater treatment using an Oxidation Ditch (OD) system. This process is applicable for the treatment of wastewater in urban settings. It is utilized in 17 different wastewater treatment plants (WWTPs) within China, indicating its scale and scope of use in handling waste water and contributing to municipal sanitation and environmental protection initiatives.

## Reference product
- Wastewater: 1; input; measured

## Inputs
- Electricity: 1.116; measured
- acetic acid: 0.0751; measured
- Polyacrylamide: 0.00032; measured
- Polyferric chloride: 0.0294; measured

## Outputs
All rows: measured
- chemical oxygen demand: 0.03126
- biological oxygen demand: 0.00267
- ammonia: 0.00202
- nitrogen, total (excluding N2): 0.00803
- phosphorus, total: 0.00027
- Suspended solids, unspecified,Suspended solids, unspecified,Suspended solids, unspecified: 0.00796
- methane (biogenic),methane (biogenic): 0.00205
  The original text does not provide information on biogenic and fossil sources. According to experts, it is classified as fossil.
- nitrous oxide: 0.00013

## Use advice
When utilizing this dataset for Life Cycle Assessment, take into account the technological specificity and regional applicability of the data. Consider the local operating conditions, regulations, and efficiency parameters that are specific to the 17 WWTPs operating in China. Exclude any upstream or downstream processes that are not part of the Oxidation Ditch's processing, such as collection and distribution of wastewater or sludge handling which may be required to complete the LCA. The data should be adjusted to local context if applied outside of China, and users should ensure accurate matching for inputs and outputs relevant to the specific application of interest. Pay attention to temporal synchronization, ensuring that the data is consistent with the period during which an assessment is intended.

## Review details
Inventory: The internal review was done by several iteration steps concerning raw data validation, raw data documentation, representativity, completeness and consistency of modelling with regard to ISO 14040 and 14044.

## Data sources
- Chen, W., Zhang, Q., Hu, L., Geng, Y. & Liu, C. Understanding the greenhouse gas emissions from China’s wastewater treatment plants: Based on life cycle assessment coupled with statistical data. Ecotoxicology and environmental safety 259, 115007 (2023).
