# Brick production ; sintered bricks ; pressing process

Dataset: ILCD process, Unit process, single operation
Geography: ZG-SC-CN
Reference year: 2020
Classification: Unit processes / Materials production / Other mineralic materials
Functional unit: 1t WDC were chosen as the functional unit
Generated by: Wang xiangjin, r99rt4@163.com
Owner: Tiangong LCI Data Working Group
Review: Dependent internal review by Tiangong LCI Data Working Group
Amounts: no units in this file; such an amount is in the reference unit of its flow, which a separate flow dataset defines
copyright: false
licenseType: Free of charge for all users and uses

## General comment
Using shale ore, coal, and water-based drilling chips as raw materials

## Technology and included processes
WDC（water-based drilling cuttings） were used as a replacement for natural clay to prepare sintered bricks. The water content of the WDC can be reduced from 80% to 20% through press filter pretreatment, which can meet the requirements of external delivery for recycling. The remaining water in the WDC can be used directly to make bricks (240 mm × 115 mm × 53 mm) to reduce the consumption of water resources. The entire production process includes raw material preparation, mixing, pressing, drying and sintering (temperature of 800–1000 °C; time for 1-4 h)

## Technical purpose
This industrial process is applied in the brick production sector, specifically for the manufacturing of sintered bricks utilizing water-based drilling cuttings (WDC) as an alternative raw material to natural clay. The process involves the preparation, mixing, pressing, drying, and sintering of bricks, integrating waste material recycling and water resource conservation strategies.

## Reference product
- brickbat aggregate: 5175; input; measured

## Inputs
- freshwater: 500; measured
- Electricity: 288; measured

## Outputs
- Clay Body: 5425; measured
  Rough blank

## Deviations from the LCI method approaches
The eFootprint online analysis platform developed by IKE Environmental Technology Co. was used to perform quantitative analysis of the full life cycle process, as part of the LCA

## Data selection and combination
The foreground data of raw materials, energy input, and exhaust emissions were obtained from a case study enterprise in Zigong (Sichuan, China), Chuangqi Environmental Protection Building Materials Co., Ltd., which has undertaken the utilization project of WDC used as a raw material for sintered bricks, with an annual output of 30 million bricks.

## Sampling procedure
Besides, 1t WDC were chosen as the functional unit and all the input parameters of raw materials, auxiliary materials, energy consumption, transportation, and direct emissions were calculated in accordance with the functional unit.

## Use advice
When leveraging this dataset for Life Cycle Assessment (LCA), it is critical to consider the substitution of water-based drilling cuttings for natural clay, as well as the efficiency in water usage. The dataset is specific to Chuangqi Environmental Protection Building Materials Co., Ltd., and should be adapted accordingly if applied elsewhere. The cut-off rule applies, permitting the exclusion of inputs such as fly ash that represent less than 1% of the end-product's weight. All inventory parameters should center around the functional unit of 1 ton WDC.

## Review details
Inventory: The internal review was done by several iteration steps concerning raw data validation, raw data documentation, representativity, completeness and consistency of modelling with regard to ISO 14040 and 14044.

## Data sources
- Liu, W. et al. Comparative life cycle assessment of cement, sintered bricks and non-sintered bricks manufacturing using water-based drilling cuttings from shale gas production in the Sichuan Basin, China. J. Environ. Manage. 314, 115135 (2022).
