# Soil sample ; Soil sample transportation ; Farmland remediation ; In-situ solidification/stabilization

Dataset: ILCD process, Unit process, single operation
Geography: NJ-YN-CN
Reference year: 2023
Classification: Unit processes / Other Services / Repair and maintenance
Generated by: Xiao Meng, xiaomeng@mail
Owner: Tiangong LCI Data Working Group
Review: Dependent internal review by Tiangong LCI Data Working Group
Amounts: no units in this file; such an amount is in the reference unit of its flow, which a separate flow dataset defines
copyright: false
licenseType: Free of charge for all users and uses

## General comment
In the backend disposal stage of stabilization restoration, 1000kg of repaired soil samples were tested and transported from Lanping, Yunnan Province to Nanjing, Jiangsu Province for testing.

## Geography
云南省怒江州受铅锌矿污染某耕地土壤 污染修复工程

## Technical purpose
This dataset represents the industrial process of soil stabilization and remediation in contaminated farmland due to lead and zinc mining in Nujiang Prefecture, Yunnan Province. The process achieves a remediation of 16 hectares of heavy metal-contaminated farmland, ensuring 100% crop compliance with cadmium (Cd) and lead (Pb) concentration standards, and reducing the bioavailable concentration of Cd and Pb in the soil by over 70%. This process is essential for restoring farmland productivity and environmental health.

## Reference product
- Soil Sample: 1000; measured
  运输到检测场地的样土

## Inputs
- transport in t*km: 12975; measured

## Use advice
When applying the dataset for Life Cycle Assessment (LCA), users should consider the specific context of the heavy metal soil remediation in Nujiang Prefecture, and the representative geographic location. It is important to note that the data is specific to the site and technology used (in-situ stabilization technologies) and may not be directly applicable to different contexts without adjustments. The transportation of soil samples over a long distance, from Lanping, Yunnan to Nanjing, Jiangsu, should also be taken into consideration in the LCA, especially in the assessment of transportation impacts. Users must account for regional variations in heavy metal contamination levels, remediation efficiency, and local agricultural practices when using this dataset.

## Review details
Inventory: The internal review was done by several iteration steps concerning raw data validation, raw data documentation, representativity, completeness and consistency of modelling with regard to ISO 14040 and 14044.

## Data sources
- 肖萌 et al. 农田污染钝化修复环境影响定量评估方法与案例分析. 中国环境科学 43, 3571–3581 (2023).
