# Remediated soil ; Soil ex situ remediation ; Soil contaminated with tar, PAH, and cyanide compounds ; Excavation+chemical oxidation+heat treatment+foundation pit dewatering disposal+backfilling with external clean soil

Dataset: ILCD process, Unit process, black box
Geography: BE
Reference year: 2017
Classification: Unit processes / Other Services / Repair and maintenance
Functional unit: The functional unit in this case study is the remediation of a site contaminated with tar, PAHs and cyanide, with a total pollution load of 2555 m3.
Generated by: Yang Xintong, yangxt@caep.org.cn
Owner: Tiangong LCI Data Working Group
Review: Dependent internal review by Tiangong LCI Data Working Group
Amounts: no units in this file; such an amount is in the reference unit of its flow, which a separate flow dataset defines
copyright: false
licenseType: Free of charge for all users and uses

## General comment
This remediation plan includes excavation of contaminated soil and off-site disposal. Polluted groundwater is disposed of in the form of foundation pit dewatering. The remediation techniques for contaminated soil include heat treatment and chemical treatment.

## Geography
The case study assessed in this paper is the remediation of a former gaswork site located in Flanders (Belgium).

## Technology and included processes
The remediation technique chosen for this case study is excavation and off-site cleaning of the contaminated soil. This is accomplished by excavating the pure tar and the tar contaminated soil and lowering the groundwater table to 5.5 m below surface. Afterwards the excavated parts of the site will be refilled with externally supplied clean soil. The source of the PAHs and cyanide contamination is removed, stabilizing the contaminated plume in the groundwater, by excavating and removing the first 70 cm of soil. From a depth of 70 cm to 2.5 m, the soil will be excavated and contaminant concentrations will be tested for each excavated batch of soil. Only the contaminated soil batches will be removed from the site and brought to an off-site soil treatment facility. Soil batches contaminated with tar are cleaned physiochemically while batches contaminated with cyanide are treated in an off site thermal cleaning facility. The uncontaminated soil will be temporary stored onsite and will be used to refill a part of the excavated site. Additional clean soil will be imported to refill the site fully. During the excavation of the soil the groundwater will be lowered to a depth of three meters below surface. All the groundwater extracted during the excavation works will be purified with the use of an activated carbon filter, an ion exchanger with cationic resin and an oil-water skimmer before being discharged in the local river. Afterwards the groundwater quality will be monitored during five years to verify whether the residual contamination remains stationary and will not affect the local river and its ecosystem.

## Technical purpose
This data set describes a remediation process for a former gasworks site in Flanders (Belgium) that is heavily contaminated with tar, PAH (Polycyclic Aromatic Hydrocarbons), and cyanide compounds. The intended application is environmental remediation of contaminated sites where soil and groundwater pollution poses a risk to ecosystems and human health. The remediation involves excavation, chemical and thermal treatment of contaminated soil, and management of polluted ground water through foundation pit dewatering.

## Reference product
- Remediated soil: 3155; measured

## Inputs
All rows: measured
- Digger: 100
  Breaking up underground massifs
- Digger: 3155
  Excavation
- Electricity: 205.2
  Excavation
- Diesel,Diesel: 1.2672e6
  Excavation
- Electricity: 75.6
  Groundwater puriﬁcation—Electricity for activated carbon production
- Activated Carbon: 2000
  Groundwater puriﬁcation
- Hydrochloric Acid,Hydrochloric Acid: 40
  Groundwater puriﬁcation
- steam: 3000
  Groundwater puriﬁcation
- natural gas,natural gas: 196000
  Groundwater puriﬁcation—Combustion of natural gas for heat
- Electricity: 12312
  Groundwater puriﬁcation—Electricity oil skimmer
- Electricity: 16416
  Groundwater puriﬁcation—Electricity ion exchanger
- Cation Exchange Resin: 1000
  Groundwater puriﬁcation
- Electricity: 328320
  Groundwater puriﬁcation—Electricity air stripper
- Electricity: 410.4
  Groundwater puriﬁcation—Electricity activated carbon ﬁlter
- transport in t*km: 146231, 107537 (2 entries)
  Transport of contaminated soil; Transport with freight lorry EURO 5
- Light fuel oil: 55331
  Cleaning of contaminated soil
- Electricity: 221220
  Cleaning of contaminated soil
- transport in t*km: 160961
  Transport of soil for reﬁlling; Transport with freight lorry EURO 5
- Digger: 3155
  Reﬁlling with new soil
- Road Transport,Road Transport: 1.584e6
  Transport (by car) of safety coordinator
- Road Transport,Road Transport: 9.2e6
  Transport (by car) of supervisor
- Road Transport,Road Transport: 1.4e6
  Transport (by car) of management
- Road Transport,Road Transport: 6.5e6
  Transport (by car) of environmental supervisor
- Road Transport,Road Transport: 1.4e6
  Transport (by bus) of service engineer
- Road Transport,Road Transport: 500000
  Transport (by bus) of ﬁeldemployee for aftercare
- contaminated soil: 3155

## Use advice
Users of this data set should ensure that the data is applied to scenarios with conditions similar to those of the case study in Flanders (Belgium). The environmental impact data must be adjusted for local conditions, and users should account for the life cycle impacts of the remediation activities such as the emissions associated with excavation machinery, transportation of contaminated material, and operation of groundwater treatment systems including the environmental burden of using activated carbon and electricity for water pumping. Monitoring of the residual contamination's impact on local ecosystems should continue for a significant period beyond the active treatment phase.

## Review details
Inventory: The internal review was done by several iteration steps concerning raw data validation, raw data documentation, representativity, completeness and consistency of modelling with regard to ISO 14040 and 14044.

## Data sources
- Huysegoms L ,Rousseau S ,Cappuyns V . Friends or foes? Monetized Life Cycle Assessment and Cost-Benefit Analysis of the site remediation of a former gas plant [J]. Science of the Total Environment, 2018, 619-620 258-271.
