# East China Rice ; Shanghai Rice Production ; Weed Control

Dataset: ILCD process, Unit process, single operation
Geography: SH-CN
Reference year: 2012
Valid until: 2014
Classification: Unit processes / Materials production / Food and renewable raw materials
Functional unit: 1 t
LCI method principle: Attributional
LCI method approaches: Consequential
Generated by: Haoran Zhang, hrzhang@whu.edu.cn
Owner: Tiangong LCI Data Working Group
Review: Dependent internal review by Tiangong LCI Data Working Group
Amounts: no units in this file; such an amount is in the reference unit of its flow, which a separate flow dataset defines
copyright: false
licenseType: Free of charge for all users and uses

## General comment
Referring to the PAS2050 standard and using life cycle assessment methods, the carbon footprint of rice production in Shanghai was assessed.

## Geography
Chongming

## Technology and included processes
The carbon footprint of rice production was calculated with reference to PAS2050 specification and LCA method. PAS2050 stands for "Publicly Available Specification" (PAS), compiled by the British Standard Institution (BSI). It aims to make clear requirements for the evaluation of greenhouse gas emissions during the life cycle of products and services

## Technical purpose
This dataset is specific to the carbon footprint analysis of rice production in the Shanghai region. It is intended for use in environmental impact assessments of agricultural operations, particularly those focused on greenhouse gas emissions associated with rice cultivation. The primary activities considered are those related to rice field operations, processing, storage, value-added processing, packaging, and assessment of field-based greenhouse gas emissions for the Chongming area within Shanghai. This dataset could be utilized by agricultural producers, sustainability consultants, policy makers, and environmental researchers examining the carbon footprint, resource use, and environmental impacts of rice production practices in East China.

## Reference product
- rice: 1000; measured

## Inputs
- Bactericide: 1.06361; calculated

## Outputs
- carbon dioxide (fossil),carbon dioxide (fossil): 0.005; calculated

## Deviations from the LCI method approaches
The carbon footprint calculation of rice production mainly refers to the PAS2050 specification and combines LCA methods. PAS2050, the full name Publicly Available Specification (PAS), the system boundary starts from the production of fertilizers and electricity, and the terminal boundary is the output of agricultural products and pollutants in the crop planting process, that is, there are two production systems, namely, agricultural production system and crop production system.

## Data selection and combination
Regarding the carbon footprint of rice, primary activity-level data were collected, which encompassed various field operations, processing and storage activities, further processing and product packaging, as well as greenhouse gas emissions in the field.

## Data treatment and extrapolations
Including field operations, rice processing, and greenhouse gas emission detection.

## Use advice
Users of this LCA dataset should adhere to the PAS2050 specification when applying the data to carbon footprint calculations. The system boundaries are defined from the production of fertilizers and electricity to the output of agricultural products and pollutants during the crop planting process. The dataset includes considerations for agricultural production systems and crop production systems, with primary raw materials such as seeds, chemical fertilizers, and pesticides, as well as greenhouse gas emissions from the planting process, agricultural machinery use, and rice processing and storage. It is important to note that the dataset does not cover the sale of goods, end-consumer use, disposal, or recycling phases. Users must take this into account when integrating the dataset with other life cycle stages or external datasets.

## Review details
Inventory: The internal review was done by several iteration steps concerning raw data validation, raw data documentation, representativity, completeness and consistency of modelling with regard to ISO 14040 and 14044.

## Data sources
- 曹黎明,李茂柏,王新其,赵志鹏,潘晓华.基于生命周期评价的上海市水稻生产的碳足迹[J].生态学报,2014,34(02):491-499.
