# Aluminum electrolysis ; Liquid primary aluminum ; Prebaking ; Alumina for metallurgy ; 2016

Dataset: ILCD process, Unit process, single operation
Geography: CN
Reference year: 2021
Classification: Unit processes / Materials production / Metals and semimetals
Generated by: Zimeng Cai, caizm6178@163.com
Owner: Tiangong LCI Data Working Group
Review: Dependent internal review by Tiangong LCI Data Working Group
Amounts: no units in this file; such an amount is in the reference unit of its flow, which a separate flow dataset defines
copyright: false
licenseType: Free of charge for all users and uses

## General comment
The industrial process described pertains to the production of liquid primary aluminum through the prebaking electrolytic method, using alumina specifically produced for metallurgical purposes. This high purity liquid aluminum is primarily utilized in the manufacturing of various aluminum products and components across different industries, including construction, transportation, packaging, and electrical sectors, mainly for those that require materials with excellent strength-to-weight ratios and corrosion resistance. The data is associated with operations from 2016.

## Time period
Date of publication

## Reference product
- aluminium, primary, liquid: 1000; software or database

## Inputs
All rows: software or database
- Integrated AC power consumption: 47761.5
- aluminium oxide, metallurgical: 1912.82
- fluoride salt: 17.73
- anode, prebake, for aluminium electrolysis: 404.86
- Water, unspecified natural origin: 1.28

## Data selection and combination
The data in this study refers to the LCA data of PA, SA, electricity, and other background data. The PA data were obtained from statistical data sources, and the SA data were mainly obtained from the literatures. The background data were mainly derived from the Chinese localization LCA database CAS RCEES 2018, which was established by the Research Center for Eco-Environmental Sciences, Chinese Academy of Sciences and covers LCA data for energy, materials, transportation, waste management etc.

## Use advice
The provided LCA data should be utilized with consideration for the specific methodological intricacies associated with aluminum production. Users should take into account the inclusion or exclusion of aluminum recycling when employing this data in modeling and analyses. The data sets should be updated if applying to periods beyond 2016 to reflect technological and efficiency improvements. Background data from the localized Chinese LCA database should also be used with knowledge of its scope and limitations to ensure accurate and contextually relevant assessments.

## Review details
Inventory: The internal review was done by several iteration steps concerning raw data validation, raw data documentation, representativity, completeness and consistency of modelling with regard to ISO 14040 and 14044.

## Data sources
- Ding, N., Liu, N., Lu, B. & Yang, J. Life cycle greenhouse gas emissions of aluminum based on regional industrial transfer in China. J. Ind. Ecol. 25, 1657–1672 (2021).
