# clinker production;clinker;new dry process, 5000 t/d;leather waste

Dataset: ILCD process, Unit process, black box
Geography: GD-CN
Reference year: 2009
Classification: Materials production / Other mineralic materials
Generated by: Siqi Yang, ysqsophia@gmail.com
Owner: Tiangong LCI Data Working Group
Review: Dependent internal review by Tiangong LCI Data Working Group
Amounts: no units in this file; such an amount is in the reference unit of its flow, which a separate flow dataset defines
copyright: false
licenseType: Free of charge for all users and uses

## General comment
The trial firing test uses leather waste as a replacement fuel.Its calorific value is about 3768.12kJ/kg, choose a new dry cement production line with about 5000t/d cement of the Guangzhou Zhujiang Cement for trial firing. The leather waste is first crushed after entering Guangzhou, packed into bags (200kg bags) and transported to the end of kiln in Guangzhou, and then put into the decomposing furnace from the connection of the three air ducts and the decomposing furnace through the strand feeder. About 5t of leather waste is put in every hour for 6 hours. Record the cement output, raw material consumption and energy consumption during the trial firing. And measure the pollutant composition and concentration of exhaust gas.

## Geography
Guangzhou Zhujiang Cement Plant

## Technology and included processes
Its calorific value is about 3 768.12 k]/kg. The new dry process cement production line of Guangzhou Zhujiang Cement with a daily cement output of about 5 000 t/d was selected for trial burning. After the waste leather enters Guangzhou, it is first crushed and packaged into bags (200 kg Bags) are transported to the end of the kiln through Guangnei, and are put into the calciner for trial burning from the connection between the tertiary air duct and the calciner through a winch feeder. About 5 t of waste leather was added every hour for 6 hours. The cement output, raw material consumption and energy consumption during the trial burning were recorded. And measure the pollutant composition and concentration of exhaust gas.

## Technical purpose
The clinker production process utilizing leather waste as an alternative fuel is intended specifically for use in the cement industry. This innovative method leverages the calorific value of leather waste to be used in a new dry cement production line, thereby providing an alternative to conventional fossil fuels.

## Model description
The production of 1 ton of clinker is defined as 1 functional unit. The entry of raw materials into the factory is set as the starting point of the life cycle, and the end point is set as the clinker burning stage.

## Reference product
- clinker: 1000
  Clinker

## Inputs
- limestone, crushed, for mill: 1300
  Limestone
- clay: 100
  Clay
- gypsum stone (CaSO4-dihydrate): 70
  Gupsum
- iron ore: 21
  Iron ore
- Leather waste: 30
  Waste leather
- hard coal; 26.3 MJ/kg: 95
  Coal
- electricity, medium voltage: 360
  Electricity

## Outputs
- carbon dioxide (fossil): 239
  CO2 (fossil fuel burning)
- carbon dioxide: 647
  CO2 (limestone decomposition)
- sulfur dioxide: 0.44
  SO2
- Nitrogen oxides: 1.54
  NOx
- particles (> PM10): 0.021
  Dust, with an unspecified particle size, is treated as PM > 10 micrometers in diameter.

## Use advice
When utilizing this dataset for life cycle assessment (LCA), consider the entry of raw materials as the starting point of the life cycle. The terminal point of the assessment should be the final clinker burning stage. Ensure accurate records of cement production, raw material consumption, and energy use during the trial firing. Additionally, it is crucial to measure the concentration and composition of pollutants in the exhaust gas to assess the environmental impact of using leather waste as a fuel.

## Review details
Inventory: The internal review was done by several iteration steps concerning raw data validation, raw data documentation, representativity, completeness and consistency of modelling with regard to ISO 14040 and 14044.

## Data sources
- 周奇, 黄启飞, 王琪, & 李丽. (2009). 废皮革水泥窑共处置生命周期评价. 环境科学研究, 22(4), 506–510.
