# Transport｜straw｜trucks（no capacity）

Dataset: ILCD process, Unit process, single operation
Geography: CN
Reference year: 2020
Classification: Unit processes / Transport services / Road
Functional unit: Taking the production of 10,000KWh of electric energy as the functional unit (consumption of straw is 1.4kg/kwh)
LCI method principle: Consequential
Generated by: Chaoshuo Liu, liucs22@mails.jlu.edu.cn
Owner: Tiangong LCI Data Working Group
Review: Dependent internal review by Tiangong LCI Data Working Group
Amounts: no units in this file; such an amount is in the reference unit of its flow, which a separate flow dataset defines
copyright: false
licenseType: Free of charge for all users and uses

## General comment
The described industrial process uses trucks to transport straw that serves as a biofuel for electricity generation. The straw is consumed in a power plant to produce electricity, with a specific consumption rate of 1.4kg of straw per kWh of electricity generated. This process is typically used in bioenergy facilities where straw is a preferred feedstock for renewable energy production.

## Reference product
- Crop straw: 14000; measured

## Outputs
All rows: measured
- carbon dioxide (fossil): 193.759
  The expert notes that the original text does not differentiate between biogenic and fossil sources of emissions, and in their opinion, the emissions in question are fossil.
- carbon monoxide,carbon monoxide (fossil): 1.24017
  (same comment as for carbon dioxide (fossil))
- nitrous oxide: 3.22877, 0.00538 (2 entries)
- hydrocarbons (unspecified): 0.32288
- sulfur dioxide: 0.04189
- particles (> PM10),particles (> PM10): 0.10806
- methane (fossil): 0.01098
  (same comment as for carbon dioxide (fossil))

## Use advice
When utilizing this data set for Life Cycle Assessment (LCA), users should consider the transportation phase of straw without payload data, which may require estimations based on similar transport processes or external data sources. As the functional unit is the production of 10,000 kWh of electric energy with straw consumption, the data should be applied accordingly to ensure the accuracy of the LCA. Users must account for the regional variability in straw yields and characteristics that affect the efficiency of the conversion process from straw to electricity. Additionally, any emissions or energy use related to the transportation of the straw should be included in the LCA.

## Review details
Inventory: The internal review was done by several iteration steps concerning raw data validation, raw data documentation, representativity, completeness and consistency of modelling with regard to ISO 14040 and 14044.

## Data sources
- Wang, Z. et al. Sustainability assessment of straw direct combustion power generation in China: From the environmental and economic perspectives of straw substitute to coal. Journal of Cleaner Production 273, 122890 (2020).
