# Grain ; Biomass fuel ; Drying ; All sizes; NESPS2 / 粮食 ; 生物质燃料 ; 烘干 ; 所有规模 ; 全国第二次污染普查数据

Dataset: ILCD process, Unit process, single operation
Geography: CN
Reference year: 2019
Classification: Reference Parameters / Energy carriers and technologies / Renewable fuels
Generated by: The data was created by the Office of the Second National Pollution Source Census of the Ministry of Ecology and Environment, and the data was organized by the TianGong Plan team for ILCD format / 生态环境部第二次全国污染源普查工作办公室创建数据，天工计划团队常慧敏整理数据为ILCD格式
Owner: Tiangong LCI Data Working Group / 天工LCI数据工作小组
Review: Dependent internal review by Tiangong LCI Data Working Group / 天工LCI数据工作小组
Amounts: no units in this file; such an amount is in the reference unit of its flow, which a separate flow dataset defines
copyright: false
licenseType: Free of charge for all users and uses

## General comment
the Technical of end-of-pipe management technology for pollution sulfur dioxideis/，Its Technical efficiency of end-of-pipe management0

## Technical purpose
本生命周期评估数据集涉及的是烘干粮食或生物质燃料的工艺，适用于所有规模的生产。该过程采用了多种末端控制技术来减少烟尘和废气排放的污染。这些技术包括单筒和多管旋风除尘、文丘里洗涤器、静电沉积、离心式水膜、喷雾塔、电袋复合除尘器、袋式过滤器和湿式喷雾。这些末端控制系统对于需要高效控制颗粒物排放的生物质处理和物料处理行业至关重要。

## Reference product
- Biofuel: 1000; input; calculated
  源文件中描述为为生物质燃料，此处对其进行了匹配工作，将其匹配到LCAflow库里面相最符合的流，污染物指标备注为工业废气量

## Outputs
All rows: calculated
- Flue dust: 0.001
  the Technical of end-of-pipe management technology for pollution Flue dustisElectric-bag composite precipitator，Its Technical efficiency of end-of-pipe management99.8
  污染物指标烟尘的末端治理技术是电袋组合，其效率为99.8，末端治理设施实际运行率（k值）计算公式为k=除尘设施年运行小时数/热风炉年运行小时数。原文件中描述污染物类别为废气，污染物指标为烟尘，此处对其进行了匹配工作，将其匹配到LCAflow库里面相最符合的流，污染物指标备注为烟尘
- Flue dust: 0.002
  the Technical of end-of-pipe management technology for pollution Flue dustisBag filter，Its Technical efficiency of end-of-pipe management99.6
  污染物指标烟尘的末端治理技术是袋式除尘，其效率为99.6，末端治理设施实际运行率（k值）计算公式为k=除尘设施年运行小时数/热风炉年运行小时数。原文件中描述污染物类别为废气，污染物指标为烟尘，此处对其进行了匹配工作，将其匹配到LCAflow库里面相最符合的流，污染物指标备注为烟尘
- Flue dust: 0.015
  the Technical of end-of-pipe management technology for pollution Flue dustisElectrostatic precipitation，Its Technical efficiency of end-of-pipe management97
  污染物指标烟尘的末端治理技术是静电除尘，其效率为97，末端治理设施实际运行率（k值）计算公式为k=除尘设施年运行小时数/热风炉年运行小时数。原文件中描述污染物类别为废气，污染物指标为烟尘，此处对其进行了匹配工作，将其匹配到LCAflow库里面相最符合的流，污染物指标备注为烟尘
- Flue dust: 0.065
  the Technical of end-of-pipe management technology for pollution Flue dustisCentrifugal water film，Its Technical efficiency of end-of-pipe management87
  污染物指标烟尘的末端治理技术是离心水膜，其效率为87，末端治理设施实际运行率（k值）计算公式为k=除尘设施年运行小时数/热风炉年运行小时数。原文件中描述污染物类别为废气，污染物指标为烟尘，此处对其进行了匹配工作，将其匹配到LCAflow库里面相最符合的流，污染物指标备注为烟尘
- Flue dust: 0.065
  the Technical of end-of-pipe management technology for pollution Flue dustisSpray tower/water shock bath，Its Technical efficiency of end-of-pipe management87
  污染物指标烟尘的末端治理技术是喷淋塔/冲击水浴，其效率为87，末端治理设施实际运行率（k值）计算公式为k=除尘设施年运行小时数/热风炉年运行小时数。原文件中描述污染物类别为废气，污染物指标为烟尘，此处对其进行了匹配工作，将其匹配到LCAflow库里面相最符合的流，污染物指标备注为烟尘
- Flue dust: 0.065
  the Technical of end-of-pipe management technology for pollution Flue dustisVenturi，Its Technical efficiency of end-of-pipe management87
  污染物指标烟尘的末端治理技术是文丘里，其效率为87，末端治理设施实际运行率（k值）计算公式为k=除尘设施年运行小时数/热风炉年运行小时数。原文件中描述污染物类别为废气，污染物指标为烟尘，此处对其进行了匹配工作，将其匹配到LCAflow库里面相最符合的流，污染物指标备注为烟尘
- Flue dust: 0.065
  the Technical of end-of-pipe management technology for pollution Flue dustisWet spraying，Its Technical efficiency of end-of-pipe management87
  污染物指标烟尘的末端治理技术是湿式喷雾，其效率为87，末端治理设施实际运行率（k值）计算公式为k=除尘设施年运行小时数/热风炉年运行小时数。原文件中描述污染物类别为废气，污染物指标为烟尘，此处对其进行了匹配工作，将其匹配到LCAflow库里面相最符合的流，污染物指标备注为烟尘
- Flue dust: 0.15
  the Technical of end-of-pipe management technology for pollution Flue dustisMulti-tube cyclone dust removal，Its Technical efficiency of end-of-pipe management70
  污染物指标烟尘的末端治理技术是多管旋风，其效率为70，末端治理设施实际运行率（k值）计算公式为k=除尘设施年运行小时数/热风炉年运行小时数。原文件中描述污染物类别为废气，污染物指标为烟尘，此处对其进行了匹配工作，将其匹配到LCAflow库里面相最符合的流，污染物指标备注为烟尘
- Flue dust: 0.15
  the Technical of end-of-pipe management technology for pollution Flue dustisSingle cylinder (multiple cylinders in parallel) cyclone，Its Technical efficiency of end-of-pipe management70
  污染物指标烟尘的末端治理技术是单筒（多筒并联）旋风，其效率为70，末端治理设施实际运行率（k值）计算公式为k=除尘设施年运行小时数/热风炉年运行小时数。原文件中描述污染物类别为废气，污染物指标为烟尘，此处对其进行了匹配工作，将其匹配到LCAflow库里面相最符合的流，污染物指标备注为烟尘
- Flue dust: 0.5
  the Technical of end-of-pipe management technology for pollution Flue dustis/，Its Technical efficiency of end-of-pipe management0
  污染物指标烟尘的末端治理技术是/，其效率为0。原文件中描述污染物类别为废气，污染物指标为烟尘，此处对其进行了匹配工作，将其匹配到LCAflow库里面相最符合的流，污染物指标备注为烟尘
- Nitrogen oxides: 1.02
  the Technical of end-of-pipe management technology for pollution Nitrogen oxidesis/，Its Technical efficiency of end-of-pipe management0
  污染物指标氮氧化物的末端治理技术是/，其效率为0。原文件中描述污染物类别为废气，污染物指标为氮氧化物，此处对其进行了匹配工作，将其匹配到LCAflow库里面相最符合的流，污染物指标备注为氮氧化物
- Exhaust gas: 6240
  the Technical of end-of-pipe management technology for pollution Exhaust gasis/，Its Technical efficiency of end-of-pipe management0
  污染物指标工业废气量的末端治理技术是/，其效率为0。原文件中描述污染物类别为废气，污染物指标为工业废气量，此处对其进行了匹配工作，将其匹配到LCAflow库里面相最符合的流，污染物指标备注为工业废气量
- sulfur dioxide: 0
  Pollutant indicator sulfur dioxide end-of-pipe treatment technology is /, its efficiency is 0. The original document describes the pollutant category as exhaust gas, the pollutant indicator is sulfur dioxide, here to match it to the LCAflow library in the most compatible flow, the pollutant indicator note for sulfur dioxide original description of the production coefficient of 17 S. Please according to the notes of their own accounting and then modify the corresponding emissions.
  污染物指标二氧化硫的末端治理技术是/，其效率为0。原文件中描述污染物类别为废气，污染物指标为二氧化硫，此处对其进行了匹配工作，将其匹配到LCAflow库里面相最符合的流，污染物指标备注为二氧化硫原文描述的产污系数为 17S。请根据备注自行核算后修改对应的排放量。

## Use advice
This dataset is derived from the Pollution Source Census Report and contains information on pollution emissions and related products. However, it does not include data on energy or chemical consumption, nor does it provide information on waste or co-product generation. When utilizing this dataset, please supplement the missing data based on actual conditions before use
该数据集来源于污染源普查报告，包含污染物排放及相关产品信息，但不包含能源或化学品消耗数据，也不提供废弃物或共生产物产生信息。在使用该数据集时，请根据实际情况补充缺失数据后再使用。

## Review details
Inventory: The internal review was done by several iteration steps concerning raw data validation, raw data documentation, representativity, completeness and consistency of modelling with regard to ISO 14040 and 14044.
清单： 内部审查通过几个迭代步骤完成，涉及原始数据验证、原始数据记录、代表性、完整性、与 ISO 14040 和 14044 有关的建模的一致性。

## Data sources
- 第二次全国污染源普查产排污核算系数手册（试用版）,二级代码05,四级代码0514文件，在完整版文件中第3413页
