# Contaminated Cd agricultural soil remediation;Phytoremediation;Sedum plumbizincicola;Harvest and safety disposal;Solid Waste

Dataset: ILCD process, Unit process, black box
Geography: CN
Reference year: 2021
Classification: Unit processes / Other Services / Repair and maintenance
Generated by: Sang Chunhui, sangch@mail.bnu.edu.cn
Owner: Tiangong LCI Data Working Group
Review: Dependent internal review by Tiangong LCI Data Working Group
Amounts: no units in this file; such an amount is in the reference unit of its flow, which a separate flow dataset defines
copyright: false
licenseType: Free of charge for all users and uses

## General comment
After harvesting, the Sedum plumbizincicola plants are transported as hazardous waste to landfills for landfilling

## Geography
Instead of clarifying specific locations, the paper indicated that contaminated agricultural field was located in Southern China.

## Time period
There is no clear start time for data collection in the literature, and the start time of the validity period is based on the publication time of the literature

## Technology and included processes
The dry Sedum matter is transported using a 1 t load vehicle, on an about 60 km round trip. About 5% fly ash and bottom ash needs landfill, which are produced by dry sedum burning.

## Technical purpose
This industrial process is intended for the remediation of cadmium-contaminated agricultural soil using the phytoremediation capabilities of Sedum plumbizincicola. Once harvested, the plants are treated and disposed of as hazardous waste due to their cadmium content. The process aims to reduce soil contamination in situ, making the land suitable for agriculture or other purposes without the need for soil excavation or transportation.

## Reference product
- Hazardous Solid Waste: 1687.5; measured

## Inputs
- Road Transport,Road Transport: 13500, 117.19 (2 entries); measured
- Coal,Coal,Coal: 71.87; measured
- Electricity: 4945.32; measured
- Fly ash,Fly ash: 3.45; measured

## Data selection and combination
Process inventory data were obtained in accordance with ISO 14040 on LCA.35 Primary data were obtained from site-specific pot experiments, pilot studies, and vendors, which were representative of situations in Southern China. Secondary data were obtained from the Ecoinvent database v2.3, from which processes of the most similar geographic origin and technological factors are selected.

## Use advice
Users of this dataset need to account for the regional specificity of the primary data, which is representative of situations in Southern China. When generalizing results for other regions, adjustments may be necessary. Care should be taken when modeling the use phase behavior due to the hazardous nature of the biomass. Additionally, the timeframe for the data's relevance is tied to the publication date of the literature, implying changes in practices or regulations beyond this date may necessitate updated data or modeling approaches. Users should also integrate secondary data from similar geographic and technological contexts for more comprehensive assessments.

## Review details
Inventory: The internal review was done by several iteration steps concerning raw data validation, raw data documentation, representativity, completeness and consistency of modelling with regard to ISO 14040 and 14044.

## Data sources
- Jin, Y. et al. Integrated Life Cycle Assessment for Sustainable Remediation of Contaminated Agricultural Soil in China. Environ. Sci. Technol. 55, 12032–12042 (2021).
