# Alumina production ; Alumina for metallurgy ; Bauxite

Dataset: ILCD process, Unit process, single operation
Geography: CN
Reference year: 2015
Classification: Unit processes / Materials production / Non-energetic raw materials
Generated by: Huimin Chang, huiminchang@tsinghua.edu.cn
Owner: Tiangong LCI Data Working Group
Review: Dependent internal review by Tiangong LCI Data Working Group
Amounts: no units in this file; such an amount is in the reference unit of its flow, which a separate flow dataset defines
copyright: false
licenseType: Free of charge for all users and uses

## General comment
The alumina produced in this industrial process is intended for use in metallurgical applications, specifically in the production of primary aluminium. This high purity alumina is sourced from bauxite and is an essential raw material for the aluminium industry. Its usage includes serving as a precursor for the electrolytic process of aluminium extraction in smelters.

## Time period
IAI 2015 (Gabi dataset）

## Reference product
- aluminium oxide, metallurgical: 1000; software or database
  Alumina [kg]

## Inputs
All rows: software or database
- electricity, high voltage, aluminium industry: 1173.6
  Electricity [kWh]
- bauxite: 2846.95
  Bauxite [kg] ; CN: 2/3 Chinese bauxite, 1/3 Guinean bauxite (see Chapter 3.1.2.2)
- Sodium hydroxide: 72.9652
  Caustic soda [kg]
- lime: 31.5461
  Calcined lime [kg]
- heavy fuel oil: 547.075
  Heavy oil [MJ]
- Diesel oil: 1.93245
  Diesel oil [MJ]
- heat, district or industrial, natural gas: 24.2325
  Natural gas [MJ]
- hard coal: 10939
  hard coal [MJ]
- steam, in chemical industry: 125
  Process steam from natural gas 85% [MJ]
- freshwater: 2.03306
  Fresh water [m3]

## Outputs
All rows: software or database
- Dust: 0.4718
  Dust (PM10) [kg] emission to air
- mercury: 0.00012
  Mercury (to air) [kg]
- water vapour: 636.34
  Water vapour [kg] emission to air
- sulfur dioxide: 1.13828
  Sulfur dioxide [kg] emission to air
- Nitrogen oxides: 0.61248
  Nitrous oxide [kg] (laughing gas) [Inorganic emissions to air]
- Suspended solids, unspecified: 0.04132
  Suspended solids [kg] to fresh water
- Oils, unspecified: 1.68476
  Oil [kg] (unspecified) [Hydrocarbons to fresh water]
- mercury: 4.67e-7
  Mercury (to fresh water) [kg]
- Process Water: 1872.59
  Processed water to river [kg]

## Data selection and combination
For reliable findings, the most recent and representative data were considered. Regional or country-specific data were used when provided in the GaBi© “professional and extension” database (SP 39) or in the literature. If location-specific data were not found, either comparable data for the country or global data were used. For consistency, data from the same source and year were used if available. Due to data availability, the study did not consider some inputs and background processes if they contributed less than 1% to the total input mass. For primary aluminium production, this study used the most recent LCI data from 2015 provided by the International Aluminium Institute (IAI) (International Aluminium Institute, 2017b). IAI data were used because the IAI is an established institute that considers primary aluminium production worldwide and the data were used in studies e.g. from the Aluminium Association and from the European Aluminium Association (Aluminum Association, 2013; European Aluminium Association, 2018). In terms of the LCA data of standardized primary aluminium production, only few uncertainties occurred. Generally, the composition of these data could be fully explained and reconstructed.

## Use advice
Users of this LCA data should note that the dataset is representative of alumina production for the metallurgy of primary aluminium as of 2015, following data from the International Aluminium Institute (IAI). It covers the unit process (singular operation) and accounts for inputs and background processes contributing to at least 1% of the total input mass. When applying this data, acknowledge that some inputs and processes may have been excluded due to their minimal contribution. Take care to use the data within its intended context, specifically in modeling the environmental impacts of primary aluminium production. Reconciliation with newer data is advised when available to account for technological and methodological advances.

## Review details
Inventory: The internal review was done by several iteration steps concerning raw data validation, raw data documentation, representativity, completeness and consistency of modelling with regard to ISO 14040 and 14044.

## Data sources
- Luthin, A., Backes, J. G. & Traverso, M. A framework to identify environmental-economic trade-offs by combining life cycle assessment and life cycle costing – A case study of aluminium production. Journal of Cleaner Production 321, 128902 (2021).
