# Acid gas recovery unit exhaust gas ; Sulfur, sulfuric acid ; Acid gas ; Acid gas recovery ; >50000 t/a; NESPS2 / 酸性气回收装置废气 ; 硫磺、硫酸 ; 酸性气 ; 酸性气回收 ; 大于5万吨/年 ; 全国第二次污染普查数据

Dataset: ILCD process, Unit process, single operation
Geography: CN
Reference year: 2019
Classification: Reference Parameters / Energy carriers and technologies / Other non-renewable fuels
Generated by: The data was created by the Office of the Second National Pollution Source Census of the Ministry of Ecology and Environment, and the data was organized by the TianGong Plan team for ILCD format / 生态环境部第二次全国污染源普查工作办公室创建数据，天工计划团队常慧敏整理数据为ILCD格式
Owner: Tiangong LCI Data Working Group / 天工LCI数据工作小组
Review: Dependent internal review by Tiangong LCI Data Working Group / 天工LCI数据工作小组
Amounts: no units in this file; such an amount is in the reference unit of its flow, which a separate flow dataset defines
copyright: false
licenseType: Free of charge for all users and uses

## General comment
the Technical of end-of-pipe management technology for pollution Exhaust gasis/，Its Technical efficiency of end-of-pipe management0

## Technical purpose
此工业过程用于从排放气体中回收酸性气体，特别是硫磺和硫酸（处理量超过50000吨/年）。此数据集代表了用于处理排气中污染物，主要是二氧化硫的末端处理技术，使用了不同技术如氢氧化钠方法、氧化镁方法和吸收法。该数据集特别适用于参与酸性气体污染物管理的行业，以及那些寻求具有高技术效率的排气处理技术的行业。

## Reference product
- Production residues in life cycle: 1000; calculated
  源文件中描述为为硫磺、硫酸，此处对其进行了匹配工作，将其匹配到LCAflow库里面相最符合的流，污染物指标备注为工业废气量

## Outputs
- sulfur dioxide: 0.0435; calculated
  the Technical of end-of-pipe management technology for pollution sulfur dioxideisMagnesium oxide method，Its Technical efficiency of end-of-pipe management95
  污染物指标二氧化硫的末端治理技术是氧化镁法，其效率为95，末端治理设施实际运行率（k值）计算公式为k=工艺废气净化装置运行时间/正常生产时间。原文件中描述污染物类别为废气，污染物指标为二氧化硫，此处对其进行了匹配工作，将其匹配到LCAflow库里面相最符合的流，污染物指标备注为二氧化硫
- sulfur dioxide: 0.0435; calculated
  the Technical of end-of-pipe management technology for pollution sulfur dioxideisOthers (absorption)，Its Technical efficiency of end-of-pipe management95
  污染物指标二氧化硫的末端治理技术是其他（吸收），其效率为95，末端治理设施实际运行率（k值）计算公式为k=工艺废气净化装置运行时间/正常生产时间。原文件中描述污染物类别为废气，污染物指标为二氧化硫，此处对其进行了匹配工作，将其匹配到LCAflow库里面相最符合的流，污染物指标备注为二氧化硫
- sulfur dioxide: 0.0435; calculated
  the Technical of end-of-pipe management technology for pollution sulfur dioxideisOthers (sodium hydroxide method)，Its Technical efficiency of end-of-pipe management95
  污染物指标二氧化硫的末端治理技术是其他（氢氧化钠法），其效率为95，末端治理设施实际运行率（k值）计算公式为k=工艺废气净化装置运行时间/正常生产时间。原文件中描述污染物类别为废气，污染物指标为二氧化硫，此处对其进行了匹配工作，将其匹配到LCAflow库里面相最符合的流，污染物指标备注为二氧化硫
- Exhaust gas: 7010; calculated
  the Technical of end-of-pipe management technology for pollution Exhaust gasis/，Its Technical efficiency of end-of-pipe management0
  污染物指标工业废气量的末端治理技术是/，其效率为0，末端治理设施实际运行率（k值）计算公式为k=工艺废气净化装置运行时间/正常生产时间。原文件中描述污染物类别为废气，污染物指标为工业废气量，此处对其进行了匹配工作，将其匹配到LCAflow库里面相最符合的流，污染物指标备注为工业废气量

## Use advice
This dataset is derived from the Pollution Source Census Report and contains information on pollution emissions and related products. However, it does not include data on energy or chemical consumption, nor does it provide information on waste or co-product generation. When utilizing this dataset, please supplement the missing data based on actual conditions before use
该数据集来源于污染源普查报告，包含污染物排放及相关产品信息，但不包含能源或化学品消耗数据，也不提供废弃物或共生产物产生信息。在使用该数据集时，请根据实际情况补充缺失数据后再使用。

## Review details
Inventory: The internal review was done by several iteration steps concerning raw data validation, raw data documentation, representativity, completeness and consistency of modelling with regard to ISO 14040 and 14044.
清单： 内部审查通过几个迭代步骤完成，涉及原始数据验证、原始数据记录、代表性、完整性、与 ISO 14040 和 14044 有关的建模的一致性。

## Data sources
- 第二次全国污染源普查产排污核算系数手册（试用版）,二级代码25,四级代码2511文件，在完整版文件中第4090页
