# Bauxite Mining ; Bauxite ; Cradle ; 2015

Dataset: ILCD process, Unit process, single operation
Geography: CN
Reference year: 2021
Classification: Unit processes / Materials production / Non-energetic raw materials
Generated by: Zimeng Cai, caizm6178@163.com
Owner: Tiangong LCI Data Working Group
Review: Dependent internal review by Tiangong LCI Data Working Group
Amounts: no units in this file; such an amount is in the reference unit of its flow, which a separate flow dataset defines
copyright: false
licenseType: Free of charge for all users and uses

## General comment
氧化铝生产2017

## Time period
Date of publication

## Technical purpose
The bauxite mining process described in this dataset is utilized to extract bauxite, an aluminium ore, which is the primary raw material used for the production of alumina (Aluminium oxide) in 2015. Afterwards, alumina is further processed to produce aluminium via smelting. The data set has applications in the evaluation of environmental impacts associated with the extraction and processing of bauxite within the scope of industrial practices.

## Reference product
- bauxite: 6.19577e10; software or database

## Inputs
All rows: software or database
- electricity, high voltage, aluminium industry: 2.70115e8
  electricity
- Coal, brown, in ground: 5.36138e8
  coal
- natural gas, high pressure: 1.0515e7
  coal
- Gasoline: 1.479e6
  gasoline
- Diesel oil: 1.8901e7
  diesel

## Data selection and combination
The data in this study refers to the LCA data of PA, SA, electricity, and other background data. The PA data were obtained from statistical data sources, and the SA data were mainly obtained from the literatures. The background data were mainly derived from the Chinese localization LCA database CAS RCEES 2018, which was established by the Research Center for Eco-Environmental Sciences, Chinese Academy of Sciences and covers LCA data for energy, materials, transportation, waste management etc.

## Use advice
When using this data set for Life Cycle Assessments, carefully consider the scope and context of the LCA study. Ensure that the methodological assumptions, such as system boundaries and data quality requirements, align with the LCA's goal and scope. Pay special attention to the years specified (2015 for bauxite mining and 2017 for alumina production), as the environmental impact may change over time due to technological advancements or shifts in energy sources. Use the data in conjunction with the CAS RCEES 2018 LCA database for localized Chinese assessments, but be aware of the relevance and representativeness of the background data for other regions or conditions.

## Review details
Inventory: The internal review was done by several iteration steps concerning raw data validation, raw data documentation, representativity, completeness and consistency of modelling with regard to ISO 14040 and 14044.

## Data sources
- Ding, N., Liu, N., Lu, B. & Yang, J. Life cycle greenhouse gas emissions of aluminum based on regional industrial transfer in China. J. Ind. Ecol. 25, 1657–1672 (2021).
