# Remediated soil ; Soil ex-situ remediation ; Soil washing

Dataset: ILCD process, Unit process, black box
Geography: IT
Reference year: 2021
Classification: Unit processes / Other Services / Repair and maintenance
Generated by: Yang Xintong, yangxt@caep.org.cn
Owner: Tiangong LCI Data Working Group
Review: Dependent internal review by Tiangong LCI Data Working Group
Amounts: no units in this file; such an amount is in the reference unit of its flow, which a separate flow dataset defines
copyright: false
licenseType: Free of charge for all users and uses

## General comment
Solubilization and extraction of pollutants and/or in the isolation of the fine fraction of the soil using mechanical processes and a washing solution.

## Geography
The site taken as a reference for the remediation is an area of 712 m2 located in a disused industrial district of Tuscany (Italy), in the past subjected to various productive activities that led to contamination with various metals, some of which potentially toxic such as lead (Pb), arsenic (As) and thallium (Tl). As it is a “site of national interest”, its exact location is considered confidential and cannot be disclosed.

## Technical purpose
Soil ex-situ remediation through soil washing is a technical process used for cleaning contaminated soils. This process is implemented in cases where the soil has been contaminated with various metal pollutants, particularly in industrial areas where metals such as lead (Pb), arsenic (As), and thallium (Tl) have been found. The process is suitable for large-scale decontamination projects, especially within designated national interest sites where the emission levels of contaminants need to be controlled and reduced to acceptable levels.

## Reference product
- Remediated soil: 1.92202e6; measured
  Soil density is 1500 kg m-3 with volume of 1281.6 m3. Total mass of contaminated soil is about 1922.4 t.is about 100 km.

## Inputs
- Excavated soil,Excavated soil: 1281.6; measured
- Hydrochloric Acid,Hydrochloric Acid: 1.335; measured
- freshwater: 14642; measured
- Electricity: 30300; measured

## Outputs
- waste water - untreated: 14592; measured

## Use advice
When utilizing the dataset for soil remediation assessment, users should carefully consider the specific context of the soil's contamination and the local regulations. The referenced site's confidential status requires adherence to data protection protocols. Consider this dataset as a case study for ex-situ soil washing remediation projects, and extrapolate findings with caution when applying them to soils with different contamination profiles or geographic locations. It's critical to include all process inputs and outputs in the assessment to ensure a comprehensive environmental impact evaluation.

## Review details
Inventory: The internal review was done by several iteration steps concerning raw data validation, raw data documentation, representativity, completeness and consistency of modelling with regard to ISO 14040 and 14044.

## Data sources
- Vocciante, M., De Folly D’Auris, A., Franchi, E., Petruzzelli, G. & Ferro, S. CO2 footprint analysis of consolidated and innovative technologies in remediation activities. J Clean Prod 297, 126723 (2021).
