# NCA material production ; Nickel cobalt aluminum lithium oxide (NCA) ; Nickel cobalt aluminum lithium oxide (NCA) precursor

Dataset: ILCD process, Unit process, single operation
Geography: HUN-CN
Reference year: 2019
Classification: Unit processes / Materials production / Non-energetic raw materials
Generated by: Jinliang Xie, jinliang.research@gmail.com
Owner: Tiangong LCI Data Working Group
Review: Dependent internal review by Tiangong LCI Data Working Group
Amounts: no units in this file; such an amount is in the reference unit of its flow, which a separate flow dataset defines
copyright: false
licenseType: Free of charge for all users and uses

## General comment
The Nickel Cobalt Aluminum Lithium Oxide (NCA) precursor material produced through this process is utilized within the battery manufacturing industry. Specifically, it is an integral component for the production of cathode materials in lithium-ion batteries, which are employed in a wide range of electronic devices, electric vehicles, and energy storage systems.

## Time period
Year of publication

## Reference product
- Lithium Nickel Cobalt Aluminum Oxide (NCA): 1; measured
  Lithium nickel cobalt aluminum oxide (NCA)

## Inputs
- transport, freight, lorry 16-32 metric ton, unregulated: 0.004; measured
  Lorry, 30t
- NCA precursor: 0.955; measured
  NCA precursor 原文没写单位，我猜是kg
- lithium carbonate: 0.378; measured
  也没写单位

## Use advice
When using this data set for Life Cycle Assessment (LCA) purposes, ensure that the scope of your study correctly includes the specific phase of the NCA production process. Consideration should be given to the upstream impacts of raw material extraction and consumables used in the precursor synthesis. Furthermore, the system boundary must appropriately reflect whether end-of-life recycling processes are considered or excluded according to your LCA goal and scope definition. Also, account for technological advancements since the year of publication that may influence environmental impacts.

## Review details
Inventory: The internal review was done by several iteration steps concerning raw data validation, raw data documentation, representativity, completeness and consistency of modelling with regard to ISO 14040 and 14044.

## Data sources
- Yin, R., Hu, S. & Yang, Y. Life cycle inventories of the commonly used materials for lithium-ion batteries in China. J. Clean. Prod. 227, 960–971 (2019).
