# Municipal sludge treatment and disposal;wet sludge moisture content 70%-75%;landfill

Dataset: ILCD process, Unit process, single operation
Geography: CN
Classification: Unit processes / End-of-life treatment / Waste water treatment
Functional unit: The life cycle study boundary starts from the wet sludge (moisture content is about 70% ~ 75%) after mechanical compression and dewatering in the sewage treatment plant to the final disposal functional unit adopts 1t wet sludge after mechanical compression.
Generated by: Jin Sitian, 2331276@tongji.edu.cn
Owner: Tiangong LCI Data Working Group
Review: Dependent internal review by Tiangong LCI Data Working Group
Amounts: no units in this file; such an amount is in the reference unit of its flow, which a separate flow dataset defines
copyright: ['opt4ROkqig']
licenseType: Free of charge for all users and uses

## General comment
Since it is difficult to obtain the data of simple sludge landfill, this paper calculates based on solid waste landfill data.

## Technology and included processes
The organic content of the dry sludge reaches 22.6%.

## Technical purpose
This municipal sludge treatment and disposal process is intended for the management of wet sludge with a moisture content of 70%-75%. The processed sludge is primarily destined for landfilling. The process encompasses the compression and dewatering of sewage sludge, making it suitable for landfill operations. It is applicable mainly in waste management facilities that prepare wet sludge for final disposal.

## Reference product
- Sludge: 1000; input; estimated
  1t wet sludge (moisture content around 70% to 75%)

## Inputs
- hard coal; 26.3 MJ/kg: 1.31; calculated
  Standard coal

## Outputs
All rows: calculated
- carbon dioxide (biogenic): 33.05
  The original text does not distinguish between biogenic and fossil, and according to experts, it is biogenic here.
- methane (biogenic),methane (biogenic): 13.4
  (same comment as for carbon dioxide (biogenic))
- Nitrogen oxides: 0.0894
- sulfur oxides: 0.0281
- hydrogen sulfide: 0.00682
- ammonia: 0.00656
- chemical oxygen demand: 2.5

## Use advice
Users of this dataset should consider the dataset applicable only to the specific moisture content range of 70%-75%. Data applicability is confined to the mechanical compression and dewatering stages prior to landfilling. Users must not substitute this data for sludge with different moisture content or treatment not involving mechanical drying. Special attention should be given to regional landfill regulations and compatibility with the described process before application.

## Review details
Inventory: The internal review was done by several iteration steps concerning raw data validation, raw data documentation, representativity, completeness and consistency of modelling with regard to ISO 14040 and 14044.

## Data sources
- 廖艳芬,漆雅庆,马晓茜.城市污水污泥焚烧处理环境影响分析[J].环境科学学报,2009,29(11):2359-2365.DOI:10.13671/j.hjkxxb.2009.11.015.
