# Aluminum electrolysis ; Liquid primary aluminum ; Prebaking ; Alumina for metallurgy ; 2008

Dataset: ILCD process, Unit process, single operation
Geography: CN
Reference year: 2021
Classification: Unit processes / Materials production / Metals and semimetals
Generated by: Zimeng Cai, caizm6178@163.com
Owner: Tiangong LCI Data Working Group
Review: Dependent internal review by Tiangong LCI Data Working Group
Amounts: no units in this file; such an amount is in the reference unit of its flow, which a separate flow dataset defines
copyright: false
licenseType: Free of charge for all users and uses

## General comment
The industrial process described is the production of liquid primary aluminum through the prebaking electrolysis method using metallurgical grade alumina. This primary aluminum is commonly utilized in a variety of industries such as automotive, construction, electronics, and packaging due to its lightweight, conductivity, and corrosion-resistant properties. The specific reference year for this data set is 2008, indicating the technological practices and efficiencies of that time.

## Time period
Date of publication

## Reference product
- aluminium, primary, liquid: 1000; software or database

## Inputs
All rows: software or database
- Integrated AC power consumption: 49845.8
- aluminium oxide, metallurgical: 1922.76
- fluoride salt: 23.22
- anode, prebake, for aluminium electrolysis: 426.32
- Water, unspecified natural origin: 4.38
  water consumption

## Data selection and combination
The data in this study refers to the LCA data of PA, SA, electricity, and other background data. The PA data were obtained from statistical data sources, and the SA data were mainly obtained from the literatures. The background data were mainly derived from the Chinese localization LCA database CAS RCEES 2018, which was established by the Research Center for Eco-Environmental Sciences, Chinese Academy of Sciences and covers LCA data for energy, materials, transportation, waste management etc.

## Use advice
When using this LCA data set, it is important to align the system boundaries accordingly and use the data consistently with the technological era it represents. Special attention should be paid to whether the data applies to the geographic and technological scope of the assessed process. Users should also be aware that LCA results may vary based on advances in technology since 2008 and differences in regional practices. Background data should be appropriately sourced from the CAS RCEES 2018 database or other relevant databases to maintain accuracy.

## Review details
Inventory: The internal review was done by several iteration steps concerning raw data validation, raw data documentation, representativity, completeness and consistency of modelling with regard to ISO 14040 and 14044.

## Data sources
- Ding, N., Liu, N., Lu, B. & Yang, J. Life cycle greenhouse gas emissions of aluminum based on regional industrial transfer in China. J. Ind. Ecol. 25, 1657–1672 (2021).
