# Coking;Coke;Coking

Dataset: ILCD process, Unit process, single operation
Geography: LN-CN
Classification: Unit processes / Energy carriers and technologies / Energetic raw materials
Generated by: Fuxiang, 1162850692@qq.com
Owner: Tiangong LCI Data Working Group
Review: Dependent internal review by Tiangong LCI Data Working Group
Amounts: no units in this file; such an amount is in the reference unit of its flow, which a separate flow dataset defines
copyright: false
licenseType: Free of charge for all users and uses

## General comment
The coking process described refers to a single operation unit process within an iron and steel production enterprise. Coke, produced during the process, is primarily used as a fuel and a reducing agent in blast furnaces during the extraction of iron from iron ore. It is also utilized in foundries and for other industrial metallurgical processes requiring high-temperature carbon sources.

## Geography
To analyze life cycle water use and discharge, an iron and steel enterprise located in Liaoning Province, China, was selected as the case study.

## Reference product
- coke,Coke: 1000; measured
  Coke

## Inputs
All rows: measured
- freshwater,freshwater: 397
- Softened Water: 380.41
  Softened water
- Cleaned coal: 1343.49
  Cleand coal
- Coke oven gas: 33.13
- Blast furnace gas: 935.35
- Linz-Donawitz gas: 3.02
- Electricity: 114.732
- process steam: 37.61
- used air: 5.54
- nitrogen: 15.72

## Outputs
- process steam from waste incineration: 385.13; measured
  Waste heat steam
- waste heat: 122.28; measured
  Waste heat water
- Coke oven gas: 457.21; measured
- waste water - untreated: 79.51; measured

## Use advice
When utilizing this LCA data set, consider the regional specificity of water use and discharge due to this process taking place in Liaoning Province, China. Take into account the technological applicability such as the age of the coking equipment, the efficiency of the process, and any end-of-life treatment of the materials involved. Ensure that the scope of the LCA includes necessary background processes like energy provision and emissions treatment. Any allocation procedures for joint processes should be reported and justified within the context of your study.

## Review details
Inventory: The internal review was done by several iteration steps concerning raw data validation, raw data documentation, representativity, completeness and consistency of modelling with regard to ISO 14040 and 14044.

## Data sources
- Life cycle water use and wastewater discharge of steel production based on material-energy-water flows: A case study in China
