# DRI production;DRI;NG based (ENE)

Dataset: ILCD process, Unit process, single operation
Geography: CN
Classification: Energy carriers and technologies / Natural gas based fuels
Generated by: Fuxiang, 1162850692@qq.com
Owner: Tiangong LCI Data Working Group
Review: Dependent internal review by Tiangong LCI Data Working Group
Amounts: no units in this file; such an amount is in the reference unit of its flow, which a separate flow dataset defines
copyright: false
licenseType: Free of charge for all users and uses

## General comment
Direct Reduced Iron (DRI) production based on natural gas, specified as the Energy Efficient (ENE) process, is utilized in the manufacturing of steel as an alternative to the traditional blast furnace method. This process is used for producing iron that is often later converted into steel, which can be employed across various industries including construction, automotive, and appliance manufacturing.

## Geography
The average operating data of Coal-DR, NG-DR (MID), and NG-DR (ENE) demonstration projects in China are used as the benchmark for the LCI of DR routes.

## Reference product
- Direct Reduced Iron: 1000; calculated
  The average operating data of Coal-DR, NG-DR (MID), and NG-DR (ENE) demonstration projects in China are used as the benchmark for the LCI of DR routes. LCI of COG-DR and H-DR routes, which is not scaled-up in China are estimated based on Coal-DR routes combined with literature data from simulations, laboratory tests, and process modeling in

## Inputs
All rows: calculated
- Pellet: 1357.3
  (same comment as for Direct Reduced Iron)
- Water (fresh water): 200
  (same comment as for Direct Reduced Iron)
- process steam: 359.2
  (same comment as for Direct Reduced Iron)
- oxygen: 100
  (same comment as for Direct Reduced Iron)
- Natural gas, at consumer EU-27: 235.3
  (same comment as for Direct Reduced Iron)
- Electricity: 524.16
  (same comment as for Direct Reduced Iron)

## Outputs
- Dust (unspecified, from stack): 0.1; calculated
  (same comment as for Direct Reduced Iron)
- carbon dioxide: 241; calculated
  (same comment as for Direct Reduced Iron)

## Data treatment and extrapolations
LCI of COG-DR and H-DR routes, which is not scaled-up in China are estimated based on Coal-DR routes combined with literature data from simulations, laboratory tests, and process modeling in Table 9 [49,50]. The LCI of Coal-DR is obtai

## Use advice
When utilizing the life cycle inventory (LCI) data of the DRI production processes, namely Coal-Based DR (Coal-DR), Natural Gas-Based DR (NG-DR) with mid-range efficiency (MID), and the energy-efficient (ENE) variation, users should refer to the operating data from Chinese demonstration projects as a benchmark. For the routes not extensively scaled in China, such as COG-DR and H-DR, the LCI should be extrapolated using the Coal-DR data in conjunction with simulation, laboratory test, and process modeling literature. Note that methodological considerations like system boundaries, data quality, and technological applicability need to be taken into account.

## Review details
Inventory: The internal review was done by several iteration steps concerning raw data validation, raw data documentation, representativity, completeness and consistency of modelling with regard to ISO 14040 and 14044.

## Data sources
- The carbon reduction potential of hydrogen in the low carbon transition of the iron and steel industry: The case of China
