# Livestock and poultry breeding ; feed processing stage ; beef cattle breeding area

Dataset: ILCD process, Unit process, single operation
Geography: CN
Reference year: 2014
Classification: Unit processes / Materials production / Agricultural production means
Functional unit: 1kg beef
Generated by: Rui Yang, 1632707028@qq.com
Owner: Tiangong LCI Data Working Group
Review: Dependent internal review by Tiangong LCI Data Working Group
Amounts: no units in this file; such an amount is in the reference unit of its flow, which a separate flow dataset defines
copyright: false
licenseType: Free of charge for all users and uses

## General comment
Livestock and poultry feed processing mainly consumes electricity and coal.

## Geography
This study was conducted from 2014 to 2015, aiming at livestock and poultry feeding cycle, meat ratio, feed formula, feed consumption, coal and electricity consumption, etc. Has been to Shandong Gaomi Zhengda pig farm, Laixi City Zhishuang dairy farm, Jimo city Duan Bolan town Jiangjiapo village pig farm, Jimo City Liujiazhuang town livestock farm, Rizhao City Changling town Guanzhuang village, Juxian County Zhailihe town Dongxing Agriculture and animal husbandry company, Juxian Qiaoshan town east Chen dairy farm, Juxian Qiaoshan town Liu Jiayi water pig farm, Zhucheng Foreign Trade Co., LTD. Phoenix parents breeding duck farm, Xinjiang Fukang Hongfa Breeding professional cooperative, Jiuyun Street Town Xuhong laying Chicken cooperative, Jiuyun Street Town Liuyun Village self-contained breeding farm, China Australia Holding Group Co., LTD., Dezhou City Qingyun County Wayu Village, Shandong Province Qingyun County four Liu community beef cattle breeding base, Dezhou City Qingyun Qingnian chicken breeding base, Qingyun County Yongli Poultry layer breeding company, Qingyun County Xingchen youth chicken breeding Field research was carried out by professional breeding cooperatives, Qingyun Dongtai broiler breeding cooperatives, Hebei Yanshan Boyuan Feed Co., LTD., Yanshan Da Chinese Feed Co., LTD., Wudi Liuhe Feed Co., LTD., and China-Australia Oriental Hope Feed Co., LTD.

## Technology and included processes
In this paper, the life cycle of livestock and poultry farming is divided into six stages: feed crop planting, feed processing, livestock and poultry raising, manure treatment, slaughter and transportation. The specific life cycle process of livestock and poultry breeding is shown in Figure 2-1. Due to the lack of some data and the limitations of basic conditions, the production, transportation and use of pesticides, mulch and feed additives have not been analyzed, and the environmental impact caused by other related infrastructure construction, transport production and labor costs is no longer considered.

## Technical purpose
The livestock feed processing technique described is utilized in the agricultural sector, specifically for the breeding and husbandry of beef cattle. The process involves the production of animal feed that is consumed by livestock during their feeding cycles. This feed processing is crucial for maintaining a balanced diet for the animals, which directly impacts the quality of the beef produced. The targeted industry for this process includes farms and cooperatives specializing in the raising of livestock such as cattle, pigs, and chickens.

## Reference product
- feed: 4.91053; calculated

## Inputs
- Electricity: 0.441948; calculated
- hard coal: 0.0589263; calculated
- maize grain: 4.59; measured
- soybean: 0.32; measured
- wheat: 0.56; measured

## Outputs
- carbon dioxide (fossil),carbon dioxide (fossil): 0.24578; measured
  Beef cattle breeding community
- sulfur dioxide: 0.0043; measured
  Beef cattle breeding community
- nitrogen, total (excluding N2): 0.00068; measured
  Beef cattle breeding community
- carbon monoxide (fossil): 0.000111; measured
  Beef cattle breeding community

## Use advice
When employing this dataset for Life Cycle Assessment (LCA), it is important to accurately model the hay, grain, and other dietary components of the feed. Users should ensure they account for the regional variability of feed composition and the energy sources indicated (electricity and coal). The temporal scope of the data from 2014 to 2015 must be considered when comparing to current practices, as advancements in technology or changes in feed formulation may have occurred. Special attention should be paid to methodological choices related to the allocation of environmental burdens among co-products in mixed farming systems.

## Review details
Inventory: The internal review was done by several iteration steps concerning raw data validation, raw data documentation, representativity, completeness and consistency of modelling with regard to ISO 14040 and 14044.

## Data sources
- 周景月. 基于生命周期评价的畜禽养殖环境影响分析. (青岛科技大学, 2017).
