# Coke production;Coke;Coking(D01)

Dataset: ILCD process, Unit process, single operation
Geography: CN
Reference year: 1998
Classification: Energy carriers and technologies / Energetic raw materials
Generated by: Fuxiang, 1162850692@qq.com
Owner: Tiangong LCI Data Working Group
Review: Dependent internal review by Tiangong LCI Data Working Group
Amounts: no units in this file; such an amount is in the reference unit of its flow, which a separate flow dataset defines
copyright: false
licenseType: Free of charge for all users and uses

## General comment
来自表 4-17 D01 钢厂生产吨材环境负荷编目表

## Time period
论文提到钢铁企业环境总体数据为1998年的吨钢环境基础数据。

## Technical purpose
The process described is used for the production of coke, a carbon-rich material derived from coal, specifically for steel manufacturing operations. It involves heating coal in the absence of air to produce coke, which is an essential raw material used in blast furnaces during the steel production process.

## Reference product
- coke,Coke: 489; measured
  Coke

## Inputs
- Energy, geothermal, converted: 2438.3; measured
- water: 13737; measured

## Outputs
All rows: measured
- Dust (unspecified, from stack): 2.425
  soot
- Dust (unspecified, from stack): 2.202
- sulfur dioxide: 1.878
- cyanide: 0.000121
- phenol: 5.6e-5
  Volatile phenol
- Hydrocarbons, aliphatic, alkanes, unspecified: 0.007804
  Petro
- Suspended solids, unspecified: 0.09819
- chemical oxygen demand: 0.698947
- Dust (unspecified, from stack): 22.022
  dust collection
- Spoil (deposited, hibernating in ground, non elementary flow): 24.428

## Use advice
The data set users should consider this environmental load data from table 4-17, D01 for steel mill production as representative of the technological state of the steel industry for the year 1998. When applying this data, it is important to note this time-specific reference and to ensure that calculations or models are adjusted to reflect any technological advancements or changes in the industry since 1998. Additionally, users should be aware of the methodological boundaries such as the inclusion or exclusion of downstream recycling processes.

## Review details
Inventory: The internal review was done by several iteration steps concerning raw data validation, raw data documentation, representativity, completeness and consistency of modelling with regard to ISO 14040 and 14044.

## Data sources
- 周和敏. 钢铁材料生产过程环境协调性评价研究. (北京工业大学, 2001).
