# LFP hydrometallurgical recycling technology（HRT）

Dataset: ILCD process, Unit process, single operation
Geography: JX-CN
Reference year: 2021
Classification: End-of-life treatment / Material recycling
Functional unit: Based on market data, the prismatic LFP and NMC are used as a reference, with energy densities of 120 Wh/kg and 150 Wh/kg, respectively. Values are scaled into 1 kg of battery cell.
Generated by: maqingyuan, m1120498928@163.com
Owner: Tiangong LCI Data Working Group
Review: Dependent internal review by Tiangong LCI Data Working Group
Amounts: no units in this file; such an amount is in the reference unit of its flow, which a separate flow dataset defines
copyright: false
licenseType: Free of charge for all users and uses

## General comment
The treatment process of NCM is similar to that of LFP in the early stage of hydrometallurgical recycling. First, the battery pack is discharged and disassembled, and the cell is crushed in a ball mill. Then, the powder is heated at a temperature of 400–600 ◦C. Copper, aluminum, and electrode materials are separated by physical methods such as flotation and magnetic separation, followed by grinding and acid leaching of the electrode materials. For LFP, the electrode material reacts with H2O2 and H2SO4 to remove iron and phosphorus in the form of FePO4. Then Ca (OH)2 is added to remove iron ions in the form of Fe(OH)3. Na2CO3 is added to the remaining extraction liquid to obtain Li2CO3 crystals.

## Technical purpose
The hydrometallurgical recycling technology (HRT) for LFP (lithium iron phosphate) is designed for recovering valuable materials from spent lithium-ion batteries. The process is applicable to the recycling industry, especially for the treatment of prismatic LFP and nickel-manganese-cobalt (NMC) batteries with energy densities of 120 Wh/kg and 150 Wh/kg. This technology aids in sustainable materials management by enabling the extraction and reuse of lithium, iron, phosphate, and other metallic elements.

## Reference product
- EoL LFP battery: 1; input

## Inputs
All rows: normal; measured
- sodium chloride: 0.00769
- Sulfuric acid(98%): 0.225
- Sodium carbonate（95%）: 0.171
- Sodium chlorate（96%）: 0.00443
- sodium hydroxide: 0.00703
- hydrated lime dry slaked: 0.00472
- Hydrogen peroxide（25%）: 0.0492
- electricity mix: 0.774, 1.3356 (2 entries)
- natural gas: 0.822, 0.0231 (2 entries)
- water,water: 2.09
- Infrastructure: 4.6e-10, 4.6e-10 (2 entries)
- Freight rail: 1.3
- Freight Truck: 0.13

## Outputs
All rows: normal; measured
- Lithium carbonate: 0.126
- Copper Scrap: 0.0987
- Aluminum scrap: 0.0881
- sodium sulfate: 0.222
- Dust (unspecified, from stack),Dust (unspecified, from stack): 0.000769, 0.000125 (2 entries)
- sulphuric acid: 1.91e-5, 0.000191 (2 entries)
- non-methane volatile organic compounds: 7.69e-5
- Water (river water from technosphere, waste water): 0.0648
- chemical oxygen demand: 1.3e-5
- Suspended solids, unspecified: 2.89e-6
- ammonia: 1.31e-6
- Residue to landfill: 0.0308, 0.797 (2 entries)

## Data selection and combination
Using a top-down approach, the one-year period material, energy, waste, and emission fluxes are collected from the four companies at the company level and then scaled into the functional unit by dividing with throughput.

## Data treatment and extrapolations
The steam and natural gas collected are in the unit of weight and volume, which are converted to MJ by a factor of 2.8 MJ/kg and 35.6 MJ/kg to match their unit in the Ecoinvent database. GHG emissions from natural gas are not listed in LCIs as they are modeled using the burning process in Ecoinvent.

## Sampling procedure
The amounts of sulfuric acid and hydrochloric acid entering the wastewater are not monitored by the companies investigated, which would emit to water bodies after treatment. Here, we provide an aggressive estimate of them that is 10-fold of the corresponding amounts emitted to the atmosphere.

## Use advice
When using this LCA data set, the user should pay attention to the scope of the technology applicability which is specified for LFP and NMC battery recycling. Data should be scaled according to the functional unit of 1 kg of battery cell. The conversion of steam and natural gas to MJ should be consistent with Ecoinvent database units using the given conversion factors. It is vital to consider the aggressive estimates for sulfuric acid and hydrochloric acid emissions to water bodies, which are ten times the amounts emitted to the atmosphere. GHG emissions from natural gas should be modeled based on the combustion process outlined in the Ecoinvent database. Users should verify that the LCA methodology and data quality align with the goal and scope of their study.

## Review details
Inventory: The internal review was done by several iteration steps concerning raw data validation, raw data documentation, representativity, completeness and consistency of modelling with regard to ISO 14040 and 14044.

## Data sources
- Jiang, S. et al. Environmental impacts of hydrometallurgical recycling and reusing for manufacturing of lithium-ion traction batteries in China. Science of The Total Environment 811, 152224 (2022).
