# recycling NCM battery by pyrometallurgy

Dataset: ILCD process, Unit process, single operation
Geography: CN
Reference year: 2022
Classification: Unit processes / End-of-life treatment / Material recycling
Functional unit: retired NCM battery of 48V,12Ah
Generated by: Chen, Lipeng, lpchen07@163.com
Owner: Tiangong LCI Data Working Group
Review: Dependent internal review by Tiangong LCI Data Working Group
Amounts: no units in this file; such an amount is in the reference unit of its flow, which a separate flow dataset defines
copyright: false
licenseType: Free of charge for all users and uses

## General comment
Spent lithium nickel cobalt manganese oxide (NCM) batteries were managed through pyrometallurgy to recover the precursor materials.

## Technical purpose
This pyrometallurgical recycling process is designed to recover precursor materials from retired NCM lithium batteries. Typically, this applies to batteries used in various applications such as electric vehicles, portable electronics, and energy storage systems.

## Reference product
- EoL NCM battery: 1; input; measured
  NCM battery, 4×12V, 12Ah

## Inputs
All rows: measured
- Sulfuric acid(98%): 3.882
- Sodium Hydroxide solution（1mol/L）: 0.3798
- sodium carbonate: 0.0882
- water,water: 0.0384
- Lithium carbonate: 0.5076
- silicon: 0.0126
- Sodium chlorate（96%）: 0.003
- magnesium chloride: 0.0054
- potassium chloride: 0.0024
- carbon: 0.0012
- hard coal: 4.122
- Electricity: 39.528
- Natural gas, at consumer EU-27: 0.5874
- Light gas oil: 0.0078
- Heavy oil: 0.00972

## Outputs
All rows: measured
- aluminium: 0.21
- copper: 0.1944
- Graphite: 0.726
- polypropylene granulate (PP): 0.1188
- carbon dioxide (fossil): 0.5718
  The original text does not distinguish between bio and fossil, and according to experts, it is fossil here
- Total particulate matter: 1.32e-5
- sulfur dioxide: 1.2
- nitrous oxide: 9e-6
- nickel: 4.2e-5
- Hazardous waste (unspec.): 0.03138
- Cathode Material: 0.3624
  Lithium nickel cobalt manganese

## Use advice
The data set associated with this industrial process should be utilized with considerations of the specific recovery efficiency and purity of the recovered materials. Users are advised to ensure that the recycling data align with the technological capabilities of the pyrometallurgical facility. Factors such as the age of the NCM battery, the state of discharge, and pre-treatment processes may affect the quality and quantitativeness of the recovered materials. It is recommended that users integrate this data with their own inventory to reflect actual practices accurately.

## Review details
Inventory: The internal review was done by several iteration steps concerning raw data validation, raw data documentation, representativity, completeness and consistency of modelling with regard to ISO 14040 and 14044.

## Data sources
- Liu, M. et al. Life cycle environmental and economic assessment of electric bicycles with different batteries in China. Journal of Cleaner Production 385, 135715 (2023).
