# Aluminum sulfate powder production ; Aluminum sulfate powder ; Aluminum hydroxide

Dataset: ILCD process, Unit process, single operation
Geography: CN
Reference year: 2019
Classification: Unit processes / Materials production / Inorganic chemicals
Generated by: Jinliang Xie, jinliang.research@gmail.com
Owner: Tiangong LCI Data Working Group
Review: Dependent internal review by Tiangong LCI Data Working Group
Amounts: no units in this file; such an amount is in the reference unit of its flow, which a separate flow dataset defines
copyright: false
licenseType: Free of charge for all users and uses

## General comment
Aluminum sulfate powder produced from this process is commonly used for water purification, in the paper industry for sizing and as a mordant in dyeing and printing textiles. It may also be applied in gardening to adjust soil pH levels.

## Time period
Year of publication

## Reference product
- aluminium sulfate, powder: 1; missing unimportant

## Inputs
- transport, freight, lorry 16-32 metric ton, unregulated: 0.0846; missing unimportant
- aluminium hydroxide: 0.46; missing unimportant
- sulfuric acid: 0.06; missing unimportant

## Use advice
Users of this data set should consider the specific grade and purity of the aluminum sulfate powder when applying it to intended applications. Attention should be given to changes in regulations regarding the use of chemicals in water treatment and textile processing. Data set users should ensure that they model the use phase behavior accurately, including proper waste management and treatment systems, based on the technological applicability mentioned in the publication year of the data.

## Review details
Inventory: The internal review was done by several iteration steps concerning raw data validation, raw data documentation, representativity, completeness and consistency of modelling with regard to ISO 14040 and 14044.

## Data sources
- Yin, R., Hu, S. & Yang, Y. Life cycle inventories of the commonly used materials for lithium-ion batteries in China. J. Clean. Prod. 227, 960–971 (2019).
