# Wet-steamed cotton dyeing and finishing ; printing and dyeing cotton ; turning

Dataset: ILCD process, Unit process, single operation
Geography: SZ-JS-CN
Reference year: 2012
Classification: Unit processes / Systems / Textiles, furnitures and other interiors
Generated by: Yingfan Duan, 1300925579@qq.com
Owner: Tiangong LCI Data Working Group
Review: Dependent internal review by Tiangong LCI Data Working Group
Amounts: no units in this file; such an amount is in the reference unit of its flow, which a separate flow dataset defines
copyright: false
licenseType: Free of charge for all users and uses

## General comment
"Turning" is a common sewing technique in the textile industry, primarily aimed at enhancing the appearance and strength of fabric edges. This process involves folding the fabric edges inward, securing them with specialized sewing techniques to make the stitches inconspicuous, and undergoing pressing to ensure smoothness. Flat-fell seams are frequently employed in the production of high-end garments, home textiles, and other products that demand superior aesthetics and texture. Applicable to various fabrics such as cotton, wool, and silk, this technique serves to elevate the overall quality and durability of the end product.

## Geography
The study focuses on a printing and dyeing enterprise in Jiangsu Province, located in Changshu within the Yangtze River Delta Economic Zone.

## Technical purpose
The industrial process described refers to the wet-steamed dyeing and finishing of cotton fabric, which is specifically used in the textile industry. This fabric treatment is primarily utilized in the printing and dyeing of cotton materials and involves the turning of the fabric as a single unit operation.

## Reference product
- Cotton Fabric: 167; measured

## Inputs
- Cotton Yarn: 0.118; measured

## Outputs
- carbon dioxide (fossil): 11.4; calculated
- carbon monoxide (fossil): 0.0263; calculated
- sulfur dioxide: 0.000358; calculated
- methane (fossil): 0.000232; calculated
- Nitrogen oxides: 0.116; calculated
- nitrous oxide: 0.000217; measured
- particles (> PM10): 0.00483; calculated
- ammonia: 8.35e-5; measured
- non-methane volatile organic compounds: 0.00942; measured

## Use advice
For Life Cycle Assessment data users, it is crucial to consider the regional context of the process, as this data set pertains to a dyeing enterprise located in Changshu within the Yangtze River Delta economic zone. When employing this data, users should account for the specific energy consumption and resource utilization typical for this region's textile industry standards. Additionally, the inclusion or exclusion of downstream recycling processes should be clearly stated. Care should be taken to model the use phase behavior of the cotton fabric and to adhere strictly to the technological applicability conditions referenced within the Jiangsu Province environmental regulations.

## Review details
Inventory: The internal review was done by several iteration steps concerning raw data validation, raw data documentation, representativity, completeness and consistency of modelling with regard to ISO 14040 and 14044.

## Data sources
- 朱亚楠. 棉布连续轧染工艺生命周期环境影响评价. (南京大学, 2012).
