# Reducing gas production;Reducing gas;Gas Process

Dataset: ILCD process, Unit process, single operation
Geography: CN
Classification: Unit processes / Energy carriers and technologies / Other non-renewable fuels
Generated by: Fuxiang, 1162850692@qq.com
Owner: Tiangong LCI Data Working Group
Review: Dependent internal review by Tiangong LCI Data Working Group
Amounts: no units in this file; such an amount is in the reference unit of its flow, which a separate flow dataset defines
copyright: false
licenseType: Free of charge for all users and uses

## General comment
The described industrial process involves the production of reducing gas, which is employed in various reduction reactions within the chemical industry and metalworking, particularly in the processes such as Direct Reduction (DR) of iron ores. The data may refer to applications involving coal-based direct reduction (Coal-DR), Coke Oven Gas based direct reduction (COG-DR), or Hydrogen based direct reduction (H-DR) routes within the metallurgical sector for producing iron or steel without requiring a blast furnace.

## Geography
The LCI of Coal-DR is obtained, as shown in Table 9, based on the statistics of the demonstration project in China.

## Reference product
- Reducing gas: 1361.9; calculated

## Inputs
All rows: calculated
- freshwater,freshwater: 100
- process steam: 172.4
- Raw gas: 1310.1
- Top gas: 1063.4
- natural gas: 193.7
- Electricity: 244.44

## Outputs
- sulfur: 3.6; calculated
- Crude Benzene,clumsy: 1.1; calculated
  Crude benzene
- particles (> PM10): 0.1; calculated
- carbon dioxide (fossil): 182.4; calculated
  原文未区分bio和fossil，根据专家判断此处为fossil

## Data treatment and extrapolations
LCI of COG-DR and H-DR routes, which is not scaled-up in China are estimated based on Coal-DR routes combined with literature data from simulations, laboratory tests, and process modeling in Table 9 [49,50]. The LCI of Coal-DR is obtai

## Use advice
When utilizing this dataset in Life Cycle Assessment, carefully consider the geographical and technological scope. The data provided is primarily based on statistics from a demonstration project in China, therefore it may not be representative of other regions or scales. It should be noted that the estimates for the COG-DR and H-DR routes are not scaled-up in China and were extrapolated from Coal-DR routes combined with various sources such as literature data from simulations, laboratory tests, and process modeling. Ensure thorough cross-referencing with reliable secondary data to improve accuracy in scenarios not directly covered by the provided Life Cycle Inventory (LCI) data.

## Review details
Inventory: The internal review was done by several iteration steps concerning raw data validation, raw data documentation, representativity, completeness and consistency of modelling with regard to ISO 14040 and 14044.

## Data sources
- The carbon reduction potential of hydrogen in the low carbon transition of the iron and steel industry: The case of China
