# cement production|cement, alternative constituents 6-20%, 32.5MPa|new suspension preheater|mixed solid wastes

Dataset: ILCD process, LCI结果
Geography: CN
Classification: Materials production / Other mineralic materials
Generated by: Siqi Yang
Amounts: no units in this file; such an amount is in the reference unit of its flow, which a separate flow dataset defines
copyright: false

## General comment
Common cement where the 3rd day compressive strength is greater than 10 MPa and the 28th day compressive strength is 32.5 MPa. Industrial solid waste that contains silica and flue gas desulfurized (FGD) gypsum is used in cement manufacture instead of clay and gypsum.
The main stream of cement production – new suspension preheater (NSP) – is applied in the Chinese cement industry. There are three primary production processes: The pulverized coal and raw material preparation process, including the transfer, grinding, homogenization, and storage of raw materials, and the grinding and storage of coal. In the incineration process, the ground and mixed raw materials are inputted into the preheater and then the calciner and decomposed with 60% coal at 950 ◦C. The limestone decomposes to about 95% in the calciner and 5% in the kiln. The decomposed materials fall into the kiln and are incinerated to clinker with 40% coal at a temperature of over 1400◦C. In the finishing process, the cement is produced when the clinker, mineral additions, and gypsum are granulated finely by a grinding mill. The raw materials are suspended and heated by recycled hot air in the preheater.

## Geography
The China United Cement Corporation

## Model description
1 t of cement with 32.5MPa strength grade was used as the functional unit (FU).
The system boundary involves raw materials and energy production, road transport, raw material crushing, clinker generation, cement grinding and packing, energy recovery from waste heat, direct emissions, flue gas treatment on-site, and solid waste reuse in cement plants.

## Reference product
- cement, alternative constituents 6-20%, 32.5MPa: 1000
  32.5 MPa cement

## Inputs
- limestone, crushed, for mill: 811.32; measured
  Limestone
- ash: 272.51; measured
  Fly ash
- gypsum (desulphurized): 44.35; measured
  Gypsum
- Iron tailings: 36.06; measured
  lron powder mineral mud
- clay: 26.63; measured
  Quartz sand mineral mud
- blast furnace slag: 58.01; measured
  Slag
- shale: 7.78; measured
  Shale
- Construction waste: 3.26; measured
- Mineral waste: 2.7; measured
  Coal gangue
- Carbide slag: 4.24; measured
  Acetylene sludge
- ammonia, anhydrous, liquid: 0.57; measured
  Ammonia
- water: 290; measured
  Water
- electricity, medium voltage: 200.916; article inperiodical
  Electricity. The LCI data for electricity and coal were collected from the literature.
- hard coal, run-of-mine: 72.74; article inperiodical
  Coal. The LCI data for electricity and coal were collected from the literature.
- transport, freight, lorry, unspecified: 268.03; measured
  Road transport. According to the survey, the transport distance of raw materials in the cement production is about 200 km. The environmental impacts of road transportation were taken from the literature.

## Outputs
All rows: measured
- carbon dioxide: 440.61
  CO2
- sulfur dioxide: 0.075
  SO2
- Nitrogen oxides: 0.15
  NOX
- particles (> PM10): 0.094
  Particulates. The particle size is not specified. Here we treat it as PM>10.
- fluoride: 0.00186
  Fluoride
- ammonia: 0.00586
  Ammonia
- mercury: 7.801e-5
  Hg
- wastewater, unpolluted: 0.023
  Waste water

## Cut-off and completeness
The manufacturing of raw materials except limestone is ignored because almost all of these materials are industrial solid waste.

## Data selection and combination
The annual average data for the operation processes (i.e., raw materials and energy consumption, transport distance, energy recovery, direct emission, waste disposal, capital cost) were acquired from a survey of the China United Cement Corporation.

## Sampling procedure
The China United Cement Corporation, which accounts for 9.45% of the Chinese cement market.
According to the data from the Chinese cement almanac 2014, the number of 5000t/d and 2500t/d cement product lines using new suspension preheater (NSP) technology accounts for 56.1% and 28.3%, respectively, of all cement product lines in China. The product lines of the 5000t/d and 2500t/d scales may have relative accuracy, reflecting the main features of cement manufacturing in China.
Parameter: value;
the scale of the cement product line: 5000t/d × 1 2500t/d × 2;
cement production technology: new suspension preheater;
electricity recovery efficiency: 30%;
dedusting technology: dry bag dust removal ;
dedusting efficiency 99.95%;
denitration technology: selective non-catalytic reduction;
denitration efficiency: 50.00%.

## Data sources
- Dong Yang, Lin Fan, Feng Shi, Qian Liu, & Yajing Wang. (2017). Comparative study of cement manufacturing with different strength grades using the coupled LCA and partial LCC methods-A case study in China. RESOURCES CONSERVATION AND RECYCLING, 119, 60–68.
