# Production of hydroxyacetonitrile (Raw material of indigo production)

Dataset: ILCD process, Unit process, black box
Geography: CQ-CN
Reference year: 2015
Classification: Unit processes / Materials production / Organic chemicals
Functional unit: the production of 1 ton glycolonitrile
Generated by: Kailingli Liao, calinly@163.com
Owner: Tiangong LCI Data Working Group
Review: Dependent internal review by Tiangong LCI Data Working Group
Amounts: no units in this file; such an amount is in the reference unit of its flow, which a separate flow dataset defines
copyright: false
licenseType: Free of charge for all users and uses

## General comment
Hydroxyacetonitrile is a precursor in the synthesis of indigo dye, essential in the textile industry. This chemical's production is a significant step in the clean manufacturing process developed by Taifeng Taixing Chemical Company. The company has optimized the technology to produce hydroxyacetonitrile, integral to the indigo production capacity of 6,000 tons/year. The compound is generated through a reaction between formaldehyde and crude hydrocyanic acid, subsequently contributing to a cleaner production pathway for indigo through further chemical synthesis steps.

## Geography
This research relies on the existing production capacity of 6,000 tons/year of indigo in Taifeng Taixing Chemical Company, a leading enterprise in Chongqing chemical industry, to carry out technological innovation and process optimization of the cleaner production process of the project, and achieve the self-production of hydroxy-acetonitrile, an important raw material

## Time period
Publication date

## Technology and included processes
The study was based on the existing 6,000 tons/year indigo production plant of Chongqing Taifeng Taixing Chemical Company, and deeply explored the clean production technology of glycolonitrile, the raw meterial of indigo production. Glycolonitrile was generated by adding formaldehyde to raw material crude hydrocyanic acid gas, and then synthesized with aniline into n-phenylglycinenitrile. Furthermore, reacting with alkali to produce N-phenylglycine potassium, and finally synthesizing indigo products.

## Model description
Unit operating time is calculated on a yearly basis of 300 days (i.e. 7200 hours)

## Reference product
- Glycolonitrile: 1000; measured
  Hydroxyacetonitrile

## Inputs
All rows: measured
- Aqueous ammonia: 418
  Liquid ammonia, concentration ≥99%
- natural gas: 628.5
  Natural gas, CH4≥97%
- Sulfuric acid(98%): 314.4
  Sulfuric acid, concentration 98%
- methanal: 1436
  Formaldehyde, concentration ≥37%
- platinum: 0.0001
  platinum network
- activated carbon: 0.71
- Water for industrial use: 25000
  water
- Process water: 98000
  Recycled water
- Electricity: 2253.6
  Electricity, 380/220V
- heat: 42630
  Cooling capacity, 5℃

## Outputs
- process steam: -2550; measured
  Steam, 0.4MPa

## Sampling procedure
This paper is based on the project of the existing products of the 6,000 tons/year indigo production project of Taifeng Taixing Chemical Company, a leading enterprise in Chongqing chemical industry. With comprehensive consideration on the resource conditions, technical solutions, material balance, process optimization, energy saving and environmental protection of glycolonitrile production, the production process of glycolonitrile is designed and deyermined, and then the production of indigo is improved.

## Use advice
When utilizing this dataset for Life Cycle Assessment (LCA), consider the specific context of hydroxyacetonitrile application in indigo dye production. Account for the process durations (7200 hours annually), the advances in clean production technology, and the material balance concerning the incorporation of recycling and environmental impact mitigation. Users should model the use phase in commercial indigo synthesis and assess energy consumption and emissions based on the technological upgrades and optimizations. This data should not be used for LCA without considering the limitations of the boundary of this research. Note that partial production data is available for extraction and use.

## Review details
Inventory: The internal review was done by several iteration steps concerning raw data validation, raw data documentation, representativity, completeness and consistency of modelling with regard to ISO 14040 and 14044.

## Data sources
- 李征奇. 靛蓝原料羟基乙腈的清洁生产工艺实践应用与研究. (吉林大学, 2015).
