# Directional cycle process of waste power batteries to produce lithium nickel-cobalt-manganese oxide (LNCMO)

Dataset: ILCD process, Unit process, single operation
Geography: GD-CN
Reference year: 2015
Classification: Unit processes / End-of-life treatment / Material recycling
Functional unit: 1 000 kg of lithium nickel cobalt manganese oxide (ternary material) as a functional unit.
Generated by: huzhikang, hzk2503593129@163.com
Owner: Tiangong LCI Data Working Group
Review: Dependent internal review by Tiangong LCI Data Working Group
Amounts: no units in this file; such an amount is in the reference unit of its flow, which a separate flow dataset defines
copyright: false
licenseType: Free of charge for all users and uses

## General comment
The method includes pretreatment, leaching, impurity removal, precipitation and sintering processes, in which the waste lithium battery is broken by crusher in the pre-treatment process, and then sent to the pyrolysis furnace for pyrolysis, eliminating a small amount of organic electrolyte and binder, so that the positive and negative electrode materials are separated from the fluid collector, and then through the physical separation means of oscillation screening, wind separation, magnetic separation, etc. Separated from the positive powder, stone ink, aluminum, copper, steel and other materials. Aluminum, copper, steel, etc., are recycled directly as metals.

## Technical purpose
Directional cycle process of waste power batteries to produce lithium nickel-cobalt-manganese oxide (LNCMO) is a process used to recover valuable metals from spent battery cells. The LNCMO produced is typically used as a cathode material in the manufacturing of new lithium-ion batteries for various applications such as electric vehicles, portable electronics, and energy storage systems.

## Reference product
- Ternary cathode material: 1000; measured
  Lithium nickel cobalt manganese oxide (ternary material)

## Inputs
All rows: measured
- Battery: 3330
  Waste Power Battery
- Sulfuric acid(98%): 3660
  H2SO4（98%）
- Hydrochloric acid (30%): 133.08
  HCl（30%）
- sodium hydroxide: 6230
  NaOH（30%）
- Sodium carbonate: 69.86
  Na2CO3
- Ammonia (28%): 373.35
- P204（95%）P507（95%）: 6.66
  P507
- Kerosene: 16.27
- Hydrogen peroxide: 1220
  H2O2
- water,water: 46580
  Industrial water
- Lithium carbonate: 402.51
- Electricity: 27924
  electricity
- natural gas,natural gas: 931.57
  Natural Gas

## Outputs
All rows: measured
- Water,Water: 33270
  Waste water
- Ammonia Nitrogen: 0.19962
- nickel: 0.013308
  Ni
- carbon dioxide (fossil): 224
  Carbon dioxide (The original article did not distinguish between bio and fossil, but according to experts, this is fossil.)
- Other Solid Waste: 1.17
  Residue and ash
- Plastic (unspecified),Plastic (unspecified): 133.08
  Plastic PP
- copper: 332.7
  Copper
- iron: 598.86
  Steel
- Secondary Aluminum: 199.62
  Aluminum

## Data selection and combination
The data are derived from field research and calculation by the authors.

## Use advice
When using this dataset, you need to ensure that the process flow is roughly the same as this method.

## Review details
Inventory: The internal review was done by several iteration steps concerning raw data validation, raw data documentation, representativity, completeness and consistency of modelling with regard to ISO 14040 and 14044.

## Data sources
- 谢英豪, 余海军, 欧彦楠, & 李长东. 废旧动力电池回收的环境影响评价研究. 无机盐工业 47, 43-46+61 (2015).
