# Direct combustion｜Electricity｜biomass boiler（30MW）

Dataset: ILCD process, Unit process, single operation
Geography: CN
Reference year: 2020
Classification: Unit processes / Energy carriers and technologies / Heat and steam
Functional unit: taking 1 ton of wheat straw as the functional unit
LCI method principle: Consequential
Generated by: Chaoshuo Liu, liucs22@mails.jlu.edu.cn
Owner: Tiangong LCI Data Working Group
Review: Dependent internal review by Tiangong LCI Data Working Group
Amounts: no units in this file; such an amount is in the reference unit of its flow, which a separate flow dataset defines
copyright: false
licenseType: Free of charge for all users and uses

## General comment
The biomass boiler with a capacity of 30 MW represents a unit process that generates electricity via direct combustion. It is designed to convert biomass, specifically 1 ton of wheat straw, into thermal energy which is then used for electric power generation. Such a process can be integrated into renewable energy systems and supports electricity supply in regions with available biomass resources.

## Reference product
- electricity from waste incineration: 3564; measured

## Inputs
- Electricity: 285.12; measured
- process water: 3.96; measured
- Wheat straw: 1000; measured

## Outputs
All rows: measured
- nitrogen dioxide: 1.467
- carbon dioxide (biogenic),carbon dioxide (biogenic): 878
  The expert notes that the original text does not differentiate between biogenic and fossil sources of emissions, and in their opinion, the emissions in question are biogenic.
- sulfur dioxide: 1.467
- Slags: 82.14
- waste water - untreated: 198

## Use advice
When utilizing this dataset for life cycle assessments, users should consider the geographic relevance of the data as biomass availability can vary significantly by region. The indicated capacity of the biomass boiler (30MW) should be understood as the maximum output under optimal conditions. If applying this data set to scenarios with different scales or types of biomass, appropriate adjustments must be made. Special attention should be given to the treatment of emissions and by-products during the combustion process and to the allocation of environmental impacts between co-products, if any.

## Review details
Inventory: The internal review was done by several iteration steps concerning raw data validation, raw data documentation, representativity, completeness and consistency of modelling with regard to ISO 14040 and 14044.

## Data sources
- Cheng, G., Zhao, Y., Pan, S., Wang, X. & Dong, C. A comparative life cycle analysis of wheat straw utilization modes in China. Energy 194, 116914 (2020).
