# Lithium iron phosphate battery cathode material production ; lithium iron phosphate ; high temperature solid phase method ; lithium carbonate, iron phosphate, glucose (carbon source), water

Dataset: ILCD process, Unit process, single operation
Geography: SD-CN
Classification: Materials production / Inorganic chemicals
Functional unit: Produce 1kg of lithium iron phosphate
LCI method principle: Attributional
Generated by: Xin Chen, xinchen@mail.nankai.edu.cn
Owner: Tiangong LCI Data Working Group
Review: Dependent internal review by Tiangong LCI Data Working Group
Amounts: no units in this file; such an amount is in the reference unit of its flow, which a separate flow dataset defines
copyright: false
licenseType: Free of charge for all users and uses

## General comment
The production process is: lithium carbonate (lithium source), iron phosphate, glucose (carbon source) and water are put into the mixing tank in a specific ratio and stirred and dispersed, and lithium iron phosphate cathode material is made after wet grinding, spray drying, pre-crushing, nitrogen roller sintering, and crushing, etc.

## Geography
Shandong fengyuan lithium energy technology Co.

## Technical purpose
The lithium iron phosphate produced through this high temperature solid phase method is utilized as a cathode material in lithium iron phosphate batteries. These batteries are mostly applied in energy storage systems and electric vehicles due to their long cycle life, safety, and thermal stability.

## Reference product
- Lithium Iron Phosphate: 1
  The data refers to the process of Shandong Fengyuan Lithium Energy Technology Co., Ltd. (annual output: 10,000 tons)

## Inputs
- Iron phosphate: 0.97
  (same comment as for Lithium Iron Phosphate)
- Lithium carbonate: 0.238
  (same comment as for Lithium Iron Phosphate)
- Glucose: 0.0968
  (same comment as for Lithium Iron Phosphate)
- Deionized Water: 0.00305
  (same comment as for Lithium Iron Phosphate)
- Electricity: 1.7856
  (same comment as for Lithium Iron Phosphate)
- Natural gas, at consumer EU-27: 0.52
  (same comment as for Lithium Iron Phosphate)
- nitrogen: 0.217
  (same comment as for Lithium Iron Phosphate)

## Outputs
- Dust: 0.000292
  (same comment as for Lithium Iron Phosphate)
- water vapour: 3.18
  (same comment as for Lithium Iron Phosphate)
- nitrogen: 0.217
  (same comment as for Lithium Iron Phosphate)
- carbon dioxide: 0.17
  (same comment as for Lithium Iron Phosphate)

## Data selection and combination
The data comes from the 2018 production data of Shandong fengyuan lithium energy technology Co..

## Use advice
This lifecycle assessment data should be utilized for understanding and evaluating the environmental impacts of producing lithium iron phosphate using the high temperature solid phase method. Users are advised that recycling processes of the batteries are not included in this data set. When modeling the use phase, consideration should be given to the specific applications and expected service life of the batteries. Users must keep in mind that the data is rooted in the 2018 production parameters from Shandong fengyuan lithium energy technology Co. and may not reflect current or future production advancements.

## Review details
Inventory: The internal review was done by several iteration steps concerning raw data validation, raw data documentation, representativity, completeness and consistency of modelling with regard to ISO 14040 and 14044.

## Data sources
- Feng, T., Guo, W., Li, Q., Meng, Z. & Liang, W. Life cycle assessment of lithium nickel cobalt manganese oxide batteries and lithium iron phosphate batteries for electric vehicles in China. Journal of Energy Storage52, 104767 (2022).
