# Firecrackers ; Potassium perchlorate, sulfur, aluminum powder (or potassium nitrate, sulfur, charcoal powder) ; Charge (mechanical mixed charge and seal) ; All sizes; NESPS2 / 爆竹 ; 高氯酸钾、硫磺、铝粉（或硝酸钾、硫磺、炭粉） ; 装药（机械混药装药封口） ; 所有规模 ; 全国第二次污染普查数据

Dataset: ILCD process, Unit process, single operation
Geography: CN
Reference year: 2019
Classification: Reference Parameters / Materials production / Inorganic chemicals
Generated by: The data was created by the Office of the Second National Pollution Source Census of the Ministry of Ecology and Environment, and the data was organized by the TianGong Plan team for ILCD format / 生态环境部第二次全国污染源普查工作办公室创建数据，天工计划团队常慧敏整理数据为ILCD格式
Owner: Tiangong LCI Data Working Group / 天工LCI数据工作小组
Review: Dependent internal review by Tiangong LCI Data Working Group / 天工LCI数据工作小组
Amounts: no units in this file; such an amount is in the reference unit of its flow, which a separate flow dataset defines
copyright: false
licenseType: Free of charge for all users and uses

## General comment
the Technical of end-of-pipe management technology for pollution chemical oxygen demandisPhysical treatment，Its Technical efficiency of end-of-pipe management60

## Technical purpose
该工业过程用于生产各种规模的爆竹，使用的混合氧化剂和燃料包括高氯酸钾、硫磺、铝粉或硝酸钾、硫磺和木炭粉。配制的药剂经机械混合并封装，用于烟火应用。

## Reference product
- Firecracker: 1e8; calculated
  源文件中描述为为爆竹，此处对其进行了匹配工作，将其匹配到LCAflow库里面相最符合的流，污染物指标备注为工业废水量

## Outputs
- sulfide: 0.00056; calculated
  the Technical of end-of-pipe management technology for pollution sulfideisPhysical treatment，Its Technical efficiency of end-of-pipe management60
  污染物指标硫化物的末端治理技术是物理法，其效率为60，末端治理设施实际运行率（k值）计算公式为k=环保设施实际处理时间（小时）/环保设施应该处理时间（小时）。原文件中描述污染物类别为废水，污染物指标为硫化物，此处对其进行了匹配工作，将其匹配到LCAflow库里面相最符合的流，污染物指标备注为硫化物
- Waste water: 11100; calculated
  the Technical of end-of-pipe management technology for pollution Waste wateris/，Its Technical efficiency of end-of-pipe management0
  污染物指标工业废水量的末端治理技术是/，其效率为0。原文件中描述污染物类别为废水，污染物指标为工业废水量，此处对其进行了匹配工作，将其匹配到LCAflow库里面相最符合的流，污染物指标备注为工业废水量
- sulfur dioxide: 16.7; calculated
  the Technical of end-of-pipe management technology for pollution sulfur dioxideis/，Its Technical efficiency of end-of-pipe management0
  污染物指标二氧化硫的末端治理技术是/，其效率为0。原文件中描述污染物类别为废气，污染物指标为二氧化硫，此处对其进行了匹配工作，将其匹配到LCAflow库里面相最符合的流，污染物指标备注为二氧化硫
- chemical oxygen demand: 0.1092; calculated
  the Technical of end-of-pipe management technology for pollution chemical oxygen demandisPhysical treatment，Its Technical efficiency of end-of-pipe management60
  污染物指标化学需氧量的末端治理技术是物理法，其效率为60，末端治理设施实际运行率（k值）计算公式为k=环保设施实际处理时间（小时）/环保设施应该处理时间（小时）。原文件中描述污染物类别为废水，污染物指标为化学需氧量，此处对其进行了匹配工作，将其匹配到LCAflow库里面相最符合的流，污染物指标备注为化学需氧量

## Use advice
This dataset is derived from the Pollution Source Census Report and contains information on pollution emissions and related products. However, it does not include data on energy or chemical consumption, nor does it provide information on waste or co-product generation. When utilizing this dataset, please supplement the missing data based on actual conditions before use
该数据集来源于污染源普查报告，包含污染物排放及相关产品信息，但不包含能源或化学品消耗数据，也不提供废弃物或共生产物产生信息。在使用该数据集时，请根据实际情况补充缺失数据后再使用。

## Review details
Inventory: The internal review was done by several iteration steps concerning raw data validation, raw data documentation, representativity, completeness and consistency of modelling with regard to ISO 14040 and 14044.
清单： 内部审查通过几个迭代步骤完成，涉及原始数据验证、原始数据记录、代表性、完整性、与 ISO 14040 和 14044 有关的建模的一致性。

## Data sources
- 第二次全国污染源普查产排污核算系数手册（试用版）,四级代码2672文件，在完整版文件中第4111页
