# Bioethanol ; Alkline

Dataset: ILCD process
Geography: GLO
Classification: Energy carriers and technologies / Renewable fuels
Generated by: Jiayi Yuan, jiayi_y@mail.bnu.edu.cn
Owner: Tiangong LCI Data Working Group
Review: Dependent internal review by Tiangong LCI Data Working Group
Amounts: no units in this file; such an amount is in the reference unit of its flow, which a separate flow dataset defines
licenseType: Free of charge for all users and uses

## General comment
This bioethanol, produced through an alkaline-based process, is primarily intended for use as a renewable fuel source, potentially suitable for blending with gasoline in transportation applications to reduce carbon emissions. It can also serve as a precursor in the production of biodegradable plastics, pharmaceuticals, and personal care products.

## Inputs
All rows: uniform; missing unimportant
- sodium hydroxide: 132; min 46; max 400
- Electricity: 0.12132; max 2.2428
- heat: 3510; max 6100
- Electricity: 163.08; min 41.04; max 691.2
- heat: 2950; min 591; max 5220
- Electricity: 590.4; min 43.56; max 1965.6

## Outputs
- heat: 1620; max 3000; uniform; missing unimportant

## Use advice
When using this data set, users should consider the specific stages of the lifecycle associated with bioethanol production, including resource extraction, transportation, and processing. Attention should be given to the potential environmental impacts associated with the use of alkali chemicals during production. Additionally, if this bioethanol is being considered for fuel blend ratios, users must ensure compliance with relevant fuel standards and regulations for the intended market.

## Review details
Inventory: The internal review was done by several iteration steps concerning raw data validation, raw data documentation, representativity, completeness and consistency of modelling with regard to ISO 14040 and 14044.
