# Brick production ; shale hollow brick production ; screening process

Dataset: ILCD process, Unit process, single operation
Geography: GZ-JX-CN
Reference year: 2020
Classification: Unit processes / Materials production / Other mineralic materials
Generated by: Wang xiangjin, r99rt4@163.com
Owner: Tiangong LCI Data Working Group
Review: Dependent internal review by Tiangong LCI Data Working Group
Amounts: no units in this file; such an amount is in the reference unit of its flow, which a separate flow dataset defines
copyright: false
licenseType: Free of charge for all users and uses

## General comment
Traditional shale hollow brick production process

## Technical purpose
The shale hollow bricks produced from this process are utilized for construction purposes, including building walls, facades, and other structural elements where low weight, insulation properties, or cost-effectiveness are required.

## Reference product
- brickbat aggregate: 1375; measured
  Screened coarse aggregate

## Inputs
- brickbat aggregate: 1431; measured
- Electricity: 2.25; measured

## Outputs
- particles (> PM10),particles (> PM10): 0.03; measured
- Particles (PM0.2 - PM2.5): 0.035; measured
- Waste (solid): 36; measured

## Deviations from the LCI method approaches
The EIA report is based on the annual production of bricks (80 million bricks) as a whole, and for statistical purposes, the data has been converted according to the size specifications described therein, in terms of bricks produced per tonne of production

## Data selection and combination
Adopting the relevant data from the table of coefficients of production and discharge for sintered bricks and building blocks in 3131 of the Manual of Coefficients of Production and Discharge for Industrial Pollution Sources of the First National Pollution Sources Census (Seventh Subbook).

## Sampling procedure
The data for this EIA report is derived from real-time data from the plant

## Use advice
Users of this data set should note that the emissions and resource usage figures are based on the production of 80 million bricks. When utilizing this data for LCA, it is important to convert the data to match the specific quantity and size specifications of bricks relevant to the user's project. Additionally, if the user's project involves recycling or end-of-life scenarios, the data must be adjusted accordingly to reflect these processes accurately.

## Review details
Inventory: The internal review was done by several iteration steps concerning raw data validation, raw data documentation, representativity, completeness and consistency of modelling with regard to ISO 14040 and 14044.

## Data sources
- 年产 8000 万块页岩标砖项目环评报告公示
