# Bread ; Wheat flour ; Powder blending + dough making + fermentation + forming + baking ; greater than or equal to3000 t/a; NESPS2 / 面包 ; 小麦粉 ; 配粉+和面+发酵+成型+烘焙 ; 大于等于0.3万吨/年 ; 全国第二次污染普查数据

Dataset: ILCD process, Unit process, single operation
Geography: CN
Reference year: 2019
Classification: Reference Parameters / Materials production / Food and renewable raw materials
Generated by: The data was created by the Office of the Second National Pollution Source Census of the Ministry of Ecology and Environment, and the data was organized by the TianGong Plan team for ILCD format / 生态环境部第二次全国污染源普查工作办公室创建数据，天工计划团队常慧敏整理数据为ILCD格式
Owner: Tiangong LCI Data Working Group / 天工LCI数据工作小组
Review: Dependent internal review by Tiangong LCI Data Working Group / 天工LCI数据工作小组
Amounts: no units in this file; such an amount is in the reference unit of its flow, which a separate flow dataset defines
copyright: false
licenseType: Free of charge for all users and uses

## General comment
the Technical of end-of-pipe management technology for pollution chemical oxygen demandisPhysical treatment + anaerobic biological treatment + aerobic biological treatment，Its Technical efficiency of end-of-pipe management97.86

## Technical purpose
该工业流程涉及面包的大规模生产，特别是每年超过3000吨的准备。它包括粉末混合、和面、发酵、成型和烘焙的顺序阶段。生产的面包用于满足从零售销售到提供食品服务的各种消费需求。

## Reference product
- Bread: 1000; calculated
  源文件中描述为为面包，此处对其进行了匹配工作，将其匹配到LCAflow库里面相最符合的流，污染物指标备注为化学需氧量

## Outputs
All rows: calculated
- Ammonia Nitrogen: 5.24923e-5
  the Technical of end-of-pipe management technology for pollution Ammonia NitrogenisPhysical treatment + membrane separation，Its Technical efficiency of end-of-pipe management99.59
  污染物指标氨氮的末端治理技术是物理处理法+膜分离，其效率为99.59，末端治理设施实际运行率（k值）计算公式为k=污水处理设施年耗电量（千瓦时）(总额定功率(千瓦)×年运行时间(小时)。原文件中描述污染物类别为废水，污染物指标为氨氮，此处对其进行了匹配工作，将其匹配到LCAflow库里面相最符合的流，污染物指标备注为氨氮
- Nitrogen, organic bound: 0.00025285
  the Technical of end-of-pipe management technology for pollution Nitrogen, organic boundisPhysical treatment + membrane separation，Its Technical efficiency of end-of-pipe management98.75
  污染物指标总氮的末端治理技术是物理处理法+膜分离，其效率为98.75，末端治理设施实际运行率（k值）计算公式为k=污水处理设施年耗电量（千瓦时）(总额定功率(千瓦)×年运行时间(小时)。原文件中描述污染物类别为废水，污染物指标为总氮，此处对其进行了匹配工作，将其匹配到LCAflow库里面相最符合的流，污染物指标备注为总氮
- Petroleum-related waste: 0.00050361
  the Technical of end-of-pipe management technology for pollution Petroleum-related wasteisAerobic biological treatment，Its Technical efficiency of end-of-pipe management98.13
  污染物指标石油类的末端治理技术是好氧生物处理法，其效率为98.13，末端治理设施实际运行率（k值）计算公式为k=污水处理设施年耗电量（千瓦时）(总额定功率(千瓦)×年运行时间(小时)。原文件中描述污染物类别为废水，污染物指标为石油类，此处对其进行了匹配工作，将其匹配到LCAflow库里面相最符合的流，污染物指标备注为石油类
- Waste water: 682
  the Technical of end-of-pipe management technology for pollution Waste wateris/，Its Technical efficiency of end-of-pipe management0
  污染物指标工业废水量的末端治理技术是/，其效率为0。原文件中描述污染物类别为废水，污染物指标为工业废水量，此处对其进行了匹配工作，将其匹配到LCAflow库里面相最符合的流，污染物指标备注为工业废水量
- Ammonia Nitrogen: 0.000763059
  the Technical of end-of-pipe management technology for pollution Ammonia NitrogenisPhysical treatment + anaerobic biological treatment + aerobic biological treatment，Its Technical efficiency of end-of-pipe management94.04
  污染物指标氨氮的末端治理技术是物理处理法+厌氧生物处理法+好氧生物处理法，其效率为94.04，末端治理设施实际运行率（k值）计算公式为k=污水处理设施年耗电量（千瓦时）(总额定功率(千瓦)×年运行时间(小时)。原文件中描述污染物类别为废水，污染物指标为氨氮，此处对其进行了匹配工作，将其匹配到LCAflow库里面相最符合的流，污染物指标备注为氨氮
- Petroleum-related waste: 0.000875258
  the Technical of end-of-pipe management technology for pollution Petroleum-related wasteisPhysical treatment + membrane separation，Its Technical efficiency of end-of-pipe management96.75
  污染物指标石油类的末端治理技术是物理处理法+膜分离，其效率为96.75，末端治理设施实际运行率（k值）计算公式为k=污水处理设施年耗电量（千瓦时）(总额定功率(千瓦)×年运行时间(小时)。原文件中描述污染物类别为废水，污染物指标为石油类，此处对其进行了匹配工作，将其匹配到LCAflow库里面相最符合的流，污染物指标备注为石油类
- Petroleum-related waste: 0.000974902
  the Technical of end-of-pipe management technology for pollution Petroleum-related wasteisPhysical treatment + anaerobic biological treatment + aerobic biological treatment，Its Technical efficiency of end-of-pipe management96.38
  污染物指标石油类的末端治理技术是物理处理法+厌氧生物处理法+好氧生物处理法，其效率为96.38，末端治理设施实际运行率（k值）计算公式为k=污水处理设施年耗电量（千瓦时）(总额定功率(千瓦)×年运行时间(小时)。原文件中描述污染物类别为废水，污染物指标为石油类，此处对其进行了匹配工作，将其匹配到LCAflow库里面相最符合的流，污染物指标备注为石油类
- Nitrogen, organic bound: 0.00118738
  the Technical of end-of-pipe management technology for pollution Nitrogen, organic boundisAerobic biological treatment，Its Technical efficiency of end-of-pipe management94.13
  污染物指标总氮的末端治理技术是好氧生物处理法，其效率为94.13，末端治理设施实际运行率（k值）计算公式为k=污水处理设施年耗电量（千瓦时）(总额定功率(千瓦)×年运行时间(小时)。原文件中描述污染物类别为废水，污染物指标为总氮，此处对其进行了匹配工作，将其匹配到LCAflow库里面相最符合的流，污染物指标备注为总氮
- Ammonia Nitrogen: 0.00160038
  the Technical of end-of-pipe management technology for pollution Ammonia NitrogenisAerobic biological treatment，Its Technical efficiency of end-of-pipe management87.5
  污染物指标氨氮的末端治理技术是好氧生物处理法，其效率为87.5，末端治理设施实际运行率（k值）计算公式为k=污水处理设施年耗电量（千瓦时）(总额定功率(千瓦)×年运行时间(小时)。原文件中描述污染物类别为废水，污染物指标为氨氮，此处对其进行了匹配工作，将其匹配到LCAflow库里面相最符合的流，污染物指标备注为氨氮
- Nitrogen, organic bound: 0.00192368
  the Technical of end-of-pipe management technology for pollution Nitrogen, organic boundisPhysical treatment + anaerobic biological treatment + aerobic biological treatment，Its Technical efficiency of end-of-pipe management90.49
  污染物指标总氮的末端治理技术是物理处理法+厌氧生物处理法+好氧生物处理法，其效率为90.49，末端治理设施实际运行率（k值）计算公式为k=污水处理设施年耗电量（千瓦时）(总额定功率(千瓦)×年运行时间(小时)。原文件中描述污染物类别为废水，污染物指标为总氮，此处对其进行了匹配工作，将其匹配到LCAflow库里面相最符合的流，污染物指标备注为总氮
- phosphorus, total: 0.00249366
  the Technical of end-of-pipe management technology for pollution phosphorus, totalisPhysical treatment + membrane separation，Its Technical efficiency of end-of-pipe management91.85
  污染物指标总磷的末端治理技术是物理处理法+膜分离，其效率为91.85，末端治理设施实际运行率（k值）计算公式为k=污水处理设施年耗电量（千瓦时）(总额定功率(千瓦)×年运行时间(小时)。原文件中描述污染物类别为废水，污染物指标为总磷，此处对其进行了匹配工作，将其匹配到LCAflow库里面相最符合的流，污染物指标备注为总磷
- phosphorus, total: 0.00337485
  the Technical of end-of-pipe management technology for pollution phosphorus, totalisAerobic biological treatment，Its Technical efficiency of end-of-pipe management88.97
  污染物指标总磷的末端治理技术是好氧生物处理法，其效率为88.97，末端治理设施实际运行率（k值）计算公式为k=污水处理设施年耗电量（千瓦时）(总额定功率(千瓦)×年运行时间(小时)。原文件中描述污染物类别为废水，污染物指标为总磷，此处对其进行了匹配工作，将其匹配到LCAflow库里面相最符合的流，污染物指标备注为总磷
- phosphorus, total: 0.00381239
  the Technical of end-of-pipe management technology for pollution phosphorus, totalisPhysical treatment + anaerobic biological treatment + aerobic biological treatment，Its Technical efficiency of end-of-pipe management87.54
  污染物指标总磷的末端治理技术是物理处理法+厌氧生物处理法+好氧生物处理法，其效率为87.54，末端治理设施实际运行率（k值）计算公式为k=污水处理设施年耗电量（千瓦时）(总额定功率(千瓦)×年运行时间(小时)。原文件中描述污染物类别为废水，污染物指标为总磷，此处对其进行了匹配工作，将其匹配到LCAflow库里面相最符合的流，污染物指标备注为总磷
- chemical oxygen demand: 0.0128674
  the Technical of end-of-pipe management technology for pollution chemical oxygen demandisAerobic biological treatment，Its Technical efficiency of end-of-pipe management99.25
  污染物指标化学需氧量的末端治理技术是好氧生物处理法，其效率为99.25，末端治理设施实际运行率（k值）计算公式为k=污水处理设施年耗电量（千瓦时）(总额定功率(千瓦)×年运行时间(小时)。原文件中描述污染物类别为废水，污染物指标为化学需氧量，此处对其进行了匹配工作，将其匹配到LCAflow库里面相最符合的流，污染物指标备注为化学需氧量
- chemical oxygen demand: 0.0190438
  the Technical of end-of-pipe management technology for pollution chemical oxygen demandisPhysical treatment + membrane separation，Its Technical efficiency of end-of-pipe management98.89
  污染物指标化学需氧量的末端治理技术是物理处理法+膜分离，其效率为98.89，末端治理设施实际运行率（k值）计算公式为k=污水处理设施年耗电量（千瓦时）(总额定功率(千瓦)×年运行时间(小时)。原文件中描述污染物类别为废水，污染物指标为化学需氧量，此处对其进行了匹配工作，将其匹配到LCAflow库里面相最符合的流，污染物指标备注为化学需氧量
- chemical oxygen demand: 0.0367151
  the Technical of end-of-pipe management technology for pollution chemical oxygen demandisPhysical treatment + anaerobic biological treatment + aerobic biological treatment，Its Technical efficiency of end-of-pipe management97.86
  污染物指标化学需氧量的末端治理技术是物理处理法+厌氧生物处理法+好氧生物处理法，其效率为97.86，末端治理设施实际运行率（k值）计算公式为k=污水处理设施年耗电量（千瓦时）/(总额定功率(千瓦)×年运行时间(小时)。原文件中描述污染物类别为废水，污染物指标为化学需氧量，此处对其进行了匹配工作，将其匹配到LCAflow库里面相最符合的流，污染物指标备注为化学需氧量

## Use advice
This dataset is derived from the Pollution Source Census Report and contains information on pollution emissions and related products. However, it does not include data on energy or chemical consumption, nor does it provide information on waste or co-product generation. When utilizing this dataset, please supplement the missing data based on actual conditions before use
该数据集来源于污染源普查报告，包含污染物排放及相关产品信息，但不包含能源或化学品消耗数据，也不提供废弃物或共生产物产生信息。在使用该数据集时，请根据实际情况补充缺失数据后再使用。

## Review details
Inventory: The internal review was done by several iteration steps concerning raw data validation, raw data documentation, representativity, completeness and consistency of modelling with regard to ISO 14040 and 14044.
清单： 内部审查通过几个迭代步骤完成，涉及原始数据验证、原始数据记录、代表性、完整性、与 ISO 14040 和 14044 有关的建模的一致性。

## Data sources
- 第二次全国污染源普查产排污核算系数手册（试用版）,二级代码14,四级代码1411文件，在完整版文件中第3413页
