# Raw material firing ; Other calcined refractory materials ; Refractory raw materials, gas fuel ; Furnaces for refractory materials (calcining kilns, including tunnel kilns, rotary kilns and shaft kilns) ; All sizes; NESPS2 / 原料烧制 ; 其他煅烧耐火材料 ; 耐火原料、气体燃料 ; 耐火材料用炉（煅烧窑，包括隧道窑、回转窑和竖窑） ; 所有规模 ; 全国第二次污染普查数据

Dataset: ILCD process, Unit process, single operation
Geography: CN
Reference year: 2019
Classification: Reference Parameters / Energy carriers and technologies / Heat and steam
Generated by: The data was created by the Office of the Second National Pollution Source Census of the Ministry of Ecology and Environment, and the data was organized by the TianGong Plan team for ILCD format / 生态环境部第二次全国污染源普查工作办公室创建数据，天工计划团队常慧敏整理数据为ILCD格式
Owner: Tiangong LCI Data Working Group / 天工LCI数据工作小组
Review: Dependent internal review by Tiangong LCI Data Working Group / 天工LCI数据工作小组
Amounts: no units in this file; such an amount is in the reference unit of its flow, which a separate flow dataset defines
copyright: false
licenseType: Free of charge for all users and uses

## General comment
the treatment technology for the pollution of Exhaust gasdidn't offered，The formula for calculating the actual operation rate (k-value) of the end-of-pipe treatment facility is k = power consumption of wastewater treatment facilities (kWh/year) / operating time of wastewater treatment facilities (hours/year) / total power of wastewater treatment facilities (kW)

## Technical purpose
所描述的工业过程用于耐火原料的煅烧，以生产各种煅烧耐火材料。这些材料通常用于高温应用，如用于炉子、窑、焚烧炉和反应堆的内衬。该过程利用不同类型的煅烧窑，包括适合各种生产规模的隧道窑、回转窑和竖窑。该数据集可能代表这些材料生产的环境影响，考虑了控制颗粒物（PM2.5 - PM10）、二氧化硫和氮氧化物排放的污染控制技术，如布袋过滤器、石膏/石灰法和选择性非催化还原（SNCR）。

## Reference product
- Other Calcined Refractory Materials: 1000; calculated
  源文件中描述为为其他煅烧耐火材料，此处对其进行了匹配工作，将其匹配到LCAflow库里面相最符合的流

## Outputs
All rows: calculated
- particles (PM2.5 - PM10): 0.0036
  the Technical of end-of-pipe management technology for pollution particles (PM2.5 - PM10)isBag filter，Its Technical efficiency of end-of-pipe management99，The formula for calculating the actual operation rate (k-value) of the end-of-pipe treatment facility is k = power consumption of wastewater treatment facilities (kWh/year) / operating time of wastewater treatment facilities (hours/year) / total power of wastewater treatment facilities (kW)
  污染物指标颗粒物的末端治理技术是袋式除尘，其效率为99，末端治理设施实际运行率（k值）计算公式为k=治理设施正常运行小时数（小时/年）/企业正常运转小时数（小时/年）。原文件中描述污染物类别为废气，污染物指标为颗粒物，此处对其进行了匹配工作，将其匹配到LCAflow库里面相最符合的流
- particles (PM2.5 - PM10): 0.36
  the Technical of end-of-pipe management technology for pollution particles (PM2.5 - PM10)isDirect discharge，The formula for calculating the actual operation rate (k-value) of the end-of-pipe treatment facility is /
  污染物指标颗粒物的末端治理技术是直排。原文件中描述污染物类别为废气，污染物指标为颗粒物，此处对其进行了匹配工作，将其匹配到LCAflow库里面相最符合的流
- sulfur dioxide: 0.884
  the Technical of end-of-pipe management technology for pollution sulfur dioxideisLimestone/gypsum method，Its Technical efficiency of end-of-pipe management60，The formula for calculating the actual operation rate (k-value) of the end-of-pipe treatment facility is /
  污染物指标二氧化硫的末端治理技术是石灰石/石膏法，其效率为60，末端治理设施实际运行率（k值）计算公式为k=治理设施正常运行小时数（小时/年）/企业正常运转小时数（小时/年）。原文件中描述污染物类别为废气，污染物指标为二氧化硫，此处对其进行了匹配工作，将其匹配到LCAflow库里面相最符合的流
- Nitrogen oxides: 0.94
  the Technical of end-of-pipe management technology for pollution Nitrogen oxidesisSNCR，Its Technical efficiency of end-of-pipe management50，The formula for calculating the actual operation rate (k-value) of the end-of-pipe treatment facility is /
  污染物指标氮氧化物的末端治理技术是选择性非催化还原法（SNCR），其效率为50，末端治理设施实际运行率（k值）计算公式为k=治理设施正常运行小时数（小时/年）/企业正常运转小时数（小时/年）。原文件中描述污染物类别为废气，污染物指标为氮氧化物，此处对其进行了匹配工作，将其匹配到LCAflow库里面相最符合的流
- Nitrogen oxides: 1.88
  the Technical of end-of-pipe management technology for pollution Nitrogen oxidesisDirect discharge，The formula for calculating the actual operation rate (k-value) of the end-of-pipe treatment facility is /
  污染物指标氮氧化物的末端治理技术是直排。原文件中描述污染物类别为废气，污染物指标为氮氧化物，此处对其进行了匹配工作，将其匹配到LCAflow库里面相最符合的流
- sulfur dioxide: 2.21
  the Technical of end-of-pipe management technology for pollution sulfur dioxideisDirect discharge
  污染物指标二氧化硫的末端治理技术是直排。原文件中描述污染物类别为废气，污染物指标为二氧化硫，此处对其进行了匹配工作，将其匹配到LCAflow库里面相最符合的流
- Exhaust gas: 5134
  the treatment technology for the pollution of Exhaust gasdidn't offered，The formula for calculating the actual operation rate (k-value) of the end-of-pipe treatment facility is k = power consumption of wastewater treatment facilities (kWh/year) / operating time of wastewater treatment facilities (hours/year) / total power of wastewater treatment facilities (kW)
  污染物指标废气量的末端治理技术未说明。原文件中描述污染物类别为废气，污染物指标为废气量，此处对其进行了匹配工作，将其匹配到LCAflow库里面相最符合的流

## Use advice
This dataset is derived from the Pollution Source Census Report and contains information on pollution emissions and related products. However, it does not include data on energy or chemical consumption, nor does it provide information on waste or co-product generation. When utilizing this dataset, please supplement the missing data based on actual conditions before use
该数据集来源于污染源普查报告，包含污染物排放及相关产品信息，但不包含能源或化学品消耗数据，也不提供废弃物或共生产物产生信息。在使用该数据集时，请根据实际情况补充缺失数据后再使用。

## Review details
Inventory: The internal review was done by several iteration steps concerning raw data validation, raw data documentation, representativity, completeness and consistency of modelling with regard to ISO 14040 and 14044.
清单： 内部审查通过几个迭代步骤完成，涉及原始数据验证、原始数据记录、代表性、完整性、与 ISO 14040 和 14044 有关的建模的一致性。

## Data sources
- 第二次全国污染源普查产排污核算系数手册（试用版）,二级代码30,三级代码308.0,四级代码3089文件，在完整版文件中第886页
