# Electricity production ; Electricity mix ; Anhui

Dataset: ILCD process, Unit process, single operation
Geography: AH-CN
Reference year: 2019
Classification: Unit processes / Energy carriers and technologies / Electricity
Generated by: Ruoxi Xiong, xiongrx0126@163.com
Owner: Tiangong LCI Data Working Group
Review: Dependent internal review by Tiangong LCI Data Working Group
Amounts: no units in this file; such an amount is in the reference unit of its flow, which a separate flow dataset defines
copyright: false
licenseType: Free of charge for all users and uses

## General comment
Electricity mix includes thermal, hydro, wind, nuclear and solar generation

## Technical purpose
The electricity produced from the Anhui mix is intended for general consumption within the Anhui region. It is used to power homes, offices, industrial facilities, and for public services. The energy mix, which includes thermal, hydro, wind, nuclear, and solar power generation, provides a diversified electricity supply that can be used in various applications where electric power is required.

## Reference product
- Electricity: 3.6; missing unimportant
  [{'text': '能量', 'type': 'text'}]

## Inputs
All rows: missing unimportant
- electricity for thermal power: 3.32192
  [{'text': '能量', 'type': 'text'}]
- electricity from hydroelectric power plant: 0.0635976
  [{'text': '能量', 'type': 'text'}]
- electricity for nuclear power: 0
  [{'text': '能量', 'type': 'text'}]
- electricity from wind power: 0.058608
  [{'text': '能量', 'type': 'text'}]
- electricity for solar power: 0.155873
  [{'text': '能量', 'type': 'text'}]

## Use advice
When using this LCA dataset for the Anhui electricity mix, ensure that the scope of your assessment matches the energy sources included, namely thermal, hydro, wind, nuclear, and solar power generation. Exclude any use of electricity not representative of the Anhui mix (such as geothermal or biomass energies, unless explicitly included in this mix). Model the use phase behavior considering the seasonal and diurnal variations in the mix's output. Incorporate any updates about the proportions of each energy source as the mix evolves over time.

## Review details
Inventory: The internal review was done by several iteration steps concerning raw data validation, raw data documentation, representativity, completeness and consistency of modelling with regard to ISO 14040 and 14044.

## Data sources
- 能源统计年鉴2020
