# Wastepaper pulp to make paper;Super Calendered Paper

Dataset: ILCD process, Unit process, black box
Geography: SD-CN
Classification: Unit processes / Materials production / Paper and cardboards
Functional unit: In this study, one tonne of waste paper feedstock was collected as a functional unit.
LCI method principle: Attributional
LCI method approaches: Allocation
Generated by: Yixiang Gao, 22210740040@m.fudan.edu.cn
Owner: Tiangong LCI Data Working Group
Review: Dependent internal review by Tiangong LCI Data Working Group
Amounts: no units in this file; such an amount is in the reference unit of its flow, which a separate flow dataset defines
copyright: false
licenseType: Free of charge for all users and uses

## General comment
In a production scenario, processes such as pulping, papermaking, transport of raw materials, transport of auxiliary chemicals, wastewater treatment, and solid waste disposal are all included within the system boundary.

## Technology and included processes
在制浆工段，废纸经过链板输送机送到水力碎浆机，碎解后的浆料进入粗筛选系统(高浓除渣器和粗筛系统):粗筛后的浆料再通过分级筛系统，筛分为短纤维和长纤维，其中短纤维通过低浓除砂器除渣和浓缩机浓缩处理后进入抄前池;而长纤维通过低浓除砂器和精饰系统处理后再通过浓缩机、热分散系统和磨浆机后进入抄前池，抄前池的浆料再送往抄纸车间。此外，浆料浓缩过程中产生的白水部分回用于制浆工段。在再生超级压光纸中，生产过程所需的脱墨废纸浆在经过上述制浆过程之外，还需经过脱墨浮选和漂白处理。经过精筛系统后的纸浆，进入浮选脱墨系统，再经过多圆盘的浓缩后进入热分散系统、过氧化氢漂白系统，最后送浆塔贮存送造纸车间。在造纸工段中，四种再生纸生产方案的流程基本相同分成打浆、抄纸、烘干三个工段。浆料经过调浆箱、浓白水塔及冲浆泵进入网前压力筛,后进入面层流浆箱上网。在再生超级压光纸方案中，原生木浆与废纸浆按一定配浆比例混合后分别送至配浆池中，经多段除砂器低浓净化后，再进入机外白水槽的另一侧冲浆;各层浆经压力筛筛选，后进入流浆箱上网。上网的浆料经三长网成型部脱水成型，再经过由直通式靴压组成的压榨部进步脱水，通过于燥部烘缸干燥、硬压光、表面施胶、后干燥部干燥、涂布、再经水平复卷机复卷，后包装入库送至成品库储存。在废弃物处置环节，对再生纸生产制造中产生的一般固体废弃物、城市生活垃圾处理进行了安全填埋处置;而对浮选脱墨系统产生的工业危险废弃物脱墨渣收集后统一进行焚烧处置。再生超级压光纸方案中，对碎浆系统和除渣系统产生的废渣使用重力脱水机和污泥压榨机进行收集，后送至焚烧厂进行焚烧处理。

## Technical purpose
The super calendered recycled paper production process is designed for the manufacture of high-quality paper products, such as printing paper with a glossy finish, often used in magazines and catalogs. This process involves the recycling of waste paper through pulping, screening, and deinking, combined with virgin wood pulp to create a blend that yields the desired paper quality.

## Reference product
- Recycled Super Calendered Paper: 865; measured
  Recycled super calendered paper

## Inputs
All rows: measured
- sodium hydroxide: 72.46
- Sodium silicate: 47.83
  sodium silicate
- Hydrogen peroxide: 65.94
  hydrogen peroxide
- Diethylenetriaminepentaacetic acid: 1.81
- Fluorosurfactant: 4.35
- Polyaluminum chloride: 5.07
- Deinking Agent: 3.62
  Deinking agent
- Modified Starch: 43.23
  Cationic starch
- Calcium carbonate (> 63 microns): 181.58
  calcium carbonate
- Inorganic Chemical Reagents: 20.89
  Inorganic chemical reagents
- Wood Pulp: 6.05
  Purchased wood pulp
- Polyester Mesh Fabric: 0.03
  polyester mesh
- Blanket: 0.03459
  blanket
- water: 16.97
- process steam: 1050
  steam
- Electricity: 1324.8
  electricity

## Outputs
All rows: measured
- chemical oxygen demand: 0.43
  CODcr
- Ammonia Nitrogen: 0.00554
  NH3-N
- waste water - untreated: 14.45
  waste water disposal
- Plastic Waste: 4.33
  Plastic and metal waste
- Waste Residue: 3.29
  Waste residue
- sludge (paper production): 59.73
  sludge
- Waste solid: 2.86
  General solid waste
- hazardous waste (unspecified): 69.17
  industrial hazardous waste

## Data selection and combination
The inventory data for the recycled sper calendered paper programme were obtained from a field study at a paper company in Shandong Province. Secondly, the vast majority of the background data involved in this study was obtained from the China Localised Process-based Life Cycle Inventory Database (CPLCID).

## Use advice
When using the inventory data from the super calendered recycled paper process, take into account the system boundaries which include pulping, papermaking, raw material transportation, auxiliary chemicals transportation, wastewater treatment, and solid waste disposal. Ensure the methodological applicability aligns with ISO 14040 standards for life cycle assessment. The data should not account for the economic and environmental impacts of potentially recyclable solid waste (e.g., coal slag, polyester resin, and cotton fibers) as the study employs a cut-off method. The functional unit in this study is the collection of one ton of waste paper material.

## Review details
Inventory: The internal review was done by several iteration steps concerning raw data validation, raw data documentation, representativity, completeness and consistency of modelling with regard to ISO 14040 and 14044.

## Data sources
- 杨冬璐. 典型再生纸产品的生命周期环境与经济影响评价. (山东大学, 2019).
