# Pesticide Manufacturing ; Glycine Method - Dimethyl Phosphite Synthesis + Glyphosate Synthesis

Dataset: ILCD process, Unit process, black box
Geography: CN
Reference year: 2021
Classification: Materials production / Organic chemicals
Functional unit: producing 1 ton glyphosate
Generated by: Kailingli Liao, calinly@163.com
Owner: Tiangong LCI Data Working Group
Review: Dependent internal review by Tiangong LCI Data Working Group
Amounts: no units in this file; such an amount is in the reference unit of its flow, which a separate flow dataset defines
copyright: false
licenseType: Free of charge for all users and uses

## General comment
No flowchart

## Technical purpose
The data set refers to the production of 1 ton of glyphosate using the Glycine Method, which involves the synthesis of Dimethyl Phosphite followed by Glyphosate Synthesis. This data set is suitable for professionals analyzing the environmental impact of the pesticide manufacture process, specifically for producing glyphosate. Glyphosate is a commonly used herbicide in agriculture for weed control.

## Reference product
- glyphosate: 1000; software or database
  Glyphosate

## Outputs
All rows: software or database
- Exhaust gas: 207
  exhaust gas
- waste water - untreated: 15000
  Industrial wastewater volume
- chemical oxygen demand: 18.4
  Cod
- Ammonia Nitrogen: 0.69
  Ammonia nitrogen
- hazardous waste (unspecified): 23
  Hazardous Waste
- phosphorus, total: 5.77
  total phosphorus
- volatile organic compound: 125
  volatile organic compounds

## Use advice
When utilizing this data set, users should be aware that it only contains information on pollutant emissions for the production of 1 ton of glyphosate. It lacks data on raw material inputs, energy consumption, water usage, and transportation, which are essential elements for a complete life cycle assessment. Users need to supplement this data from other sources to perform a comprehensive environmental impact analysis. This data set should be used with caution for drawing conclusions about the overall sustainability of the glyphosate production process.

## Review details
Inventory: The internal review was done by several iteration steps concerning raw data validation, raw data documentation, representativity, completeness and consistency of modelling with regard to ISO 14040 and 14044.

## Data sources
- 生态环境部. 263农药制造行业系数手册.pdf. (2021).
