# Veterinarygeneticallyengineereddrugsandvaccines|Microorganismsandmicrobialmetabolitesoranimalserum|Bioengineering process|200less than or equal toyieldless than1000 kg/a / /|兽用基因工程药物和疫苗|微生物及微生物代谢产物或动物血清|生物工程工艺|200小于等于产量小于1000千克/年

Dataset: ILCD process, Partly terminated system
Geography: CN
Reference year: 2019
Classification: Materials production / Other mineralic materials
Generated by: The data was created by the Office of the Second National Pollution Source Census of the Ministry of Ecology and Environment, and the data was organized by the TianGong Plan team for ILCD format / 生态环境部第二次全国污染源普查工作办公室创建数据，天工计划团队常慧敏整理数据为ILCD格式
Amounts: no units in this file; such an amount is in the reference unit of its flow, which a separate flow dataset defines
copyright: false

## Technology and included processes
the Technical of end-of-pipe management technology for pollution Gene Engineered Subunit VaccineisPhysicochemical treatment + anoxic/aerobic biological treatment，Its Technical efficiency of end-of-pipe management93.4，The formula for calculating the actual operation rate (k-value) of the end-of-pipe treatment facility is k = operating time of waste gas treatment facilities (hours) / annual normal production time of enterprise (hours)
污染物指标化学需氧量的末端治理技术是物化处理+缺氧/好氧生物处理，其效率为93.4，末端治理设施实际运行率（k值）计算公式为k=治理设施运行时间（天）/正常生产时间（天）

## Reference product
- Gene Engineered Subunit Vaccine: 1; calculated
  原文件中描述污染物类别为Product，污染物指标为兽用基因工程药物和疫苗，此处对其进行了匹配工作，将其匹配到LCAflow库里面相最符合的流，污染物指标备注为化学需氧量

## Outputs
All rows: calculated
- chemical oxygen demand: 0.7326, 0.5439, 0.1332, 1.11 (4 entries)
  原文件中描述污染物类别为废水，污染物指标为化学需氧量，此处对其进行了匹配工作，将其匹配到LCAflow库里面相最符合的流，污染物指标备注为化学需氧量
- Ammonia Nitrogen: 1.04, 0.2028, 0.052, 0.19656, 0.13208, 0.104 (6 entries)
  原文件中描述污染物类别为废水，污染物指标为氨氮，此处对其进行了匹配工作，将其匹配到LCAflow库里面相最符合的流，污染物指标备注为氨氮
- Nitrogen, organic bound: 1.57, 0.56049, 0.26219, 0.7379, 0.2355, 0.471 (6 entries)
  原文件中描述污染物类别为废水，污染物指标为总氮，此处对其进行了匹配工作，将其匹配到LCAflow库里面相最符合的流，污染物指标备注为总氮
- phosphorus, total: 0.087, 0.003045, 0.001305, 0.002001, 0.00087, 0.0087 (6 entries)
  原文件中描述污染物类别为废水，污染物指标为总磷，此处对其进行了匹配工作，将其匹配到LCAflow库里面相最符合的流，污染物指标备注为总磷
- volatile organic compound: 2.22, 0.555, 0.02664, 0.0222, 1.554, 0.222 (6 entries)
  原文件中描述污染物类别为废气，污染物指标为挥发性有机物，此处对其进行了匹配工作，将其匹配到LCAflow库里面相最符合的流，污染物指标备注为挥发性有机物

## Data sources
- 第二次全国污染源普查产排污核算系数手册（试用版）,二级代码27,三级代码275.0文件，在完整版文件中第3158页
