# Fiberglass production ; Total of all wind farm

Dataset: ILCD process, Unit process, single operation
Geography: NMG-CN
Reference year: 2017
Classification: Materials production / Glass and ceramics
Functional unit: The functional unit is 1.5 MW wind turbine
LCI method principle: Attributional
LCI method approaches: Allocation
Generated by: Yunzhi Zhao, ll10088@163.com
Owner: Tiangong LCI Data Working Group
Review: Dependent internal review by Tiangong LCI Data Working Group
Amounts: no units in this file; such an amount is in the reference unit of its flow, which a separate flow dataset defines
copyright: false
licenseType: Free of charge for all users and uses

## General comment
The data set represents the production of fiberglass for use in the construction of wind turbines. Specifically, it is applicable to the production of components for a wind farm equipped with 33 domestic 1.5 megawatts (MW) wind turbines. This process is integral to the supply chain for wind power generation facilities, particularly for those located in regions with high wind power capacity like northeast Inner Mongolia.

## Geography
The data regarding the parameters of wind power has been collected from Wang (2012). A wind farm equipped with 33 domestic 1.5 megawatts (MW) wind turbines is regarded as a case study to analyze the environmental impact and its substitution effects. The wind farm is located in the northeast of Inner Mongolia, the province in which most of China’s wind power is installed (Xia and Song, 2017).

## Reference product
- Fiber glass: 1; article inperiodical

## Inputs
- Energy, geothermal, converted: 169.873; article inperiodical

## Outputs
- carbon dioxide: 1128.9; article inperiodical
- sulfur dioxide: 3.5; article inperiodical
- nitrous oxide: 4.25; article inperiodical

## Deviations from the LCI method approaches
The life cycle inventory for wind power is illustrated as follows. The production and manufacturing stage include the production of wind turbines, substations, and cables, which consume a large amount of energy and emit pollutants (Xue et al., 2015).

## Use advice
When utilizing this data set for Life Cycle Assessment (LCA), users should pay attention to the specific context of the wind power sector in Inner Mongolia. The environmental impacts should be considered in relation to the production and manufacturing stage of wind turbines, substations, and cables. Special attention should be given to the energy consumption and pollutant emissions during these stages, and how they compare to other energy sources. This data should be contextualized with the functional unit of a 1.5 MW wind turbine for accurate LCA modeling.

## Review details
Inventory: The internal review was done by several iteration steps concerning raw data validation, raw data documentation, representativity, completeness and consistency of modelling with regard to ISO 14040 and 14044.

## Data sources
- Li, H., Jiang, H.-D., Dong, K.-Y., Wei, Y.-M. & Liao, H. A comparative analysis of the life cycle environmental emissions from wind and coal power: Evidence from China. Journal of Cleaner Production 248, 119192 (2020).
