# Abalone seedling ; Abalone small larva ; Cage culture

Dataset: ILCD process, Unit process, black box
Geography: ND-FJ-CN
Reference year: 2017
Valid until: 2018
Classification: Unit processes / Materials production / Food and renewable raw materials
Functional unit: 1 live-weight ton of abalone
LCI method principle: Attributional
LCI method approaches: Allocation - mass
Generated by: Kangni Wu, wukangni@xmu.stu.edu.cn
Owner: Tiangong LCI Data Working Group
Review: Dependent internal review by Tiangong LCI Data Working Group
Amounts: no units in this file; such an amount is in the reference unit of its flow, which a separate flow dataset defines
copyright: false
licenseType: Free of charge for all users and uses

## General comment
The system includes energy production (red), feed production (green), the main chain of aquaculture production (blue), and the production of other inputs (purple).

## Geography
The prefecture-level city of Ningde comprises a group of districts and counties, of which Fuding city (A), Xiapu County (B), Fu’an city (C), and Jiaocheng district (D) are next to the sea and were included in our assessment. A total of 321 households were randomly sampled in the area in August 2017 and January 2018, and we analyzed the data from 292 households that had mariculture production during 2016.

## Time period
The literature did not specify the sampling time. The researchers conducted household interviews in August 2017 and January 2018 in the coastal areas of Ningde City

## Technology and included processes
Breeding and culture technology of abalone. The sea area of abalone cultivation must be more convenient for water and land transportation, there is no serious industrial pollution in the sea area, the water flow condition is good, the water depth should not be too shallow, it is best to reach 8 to 15 meters, the water quality is clear, and the transparency is greater than 4 meters; The optimum growth water temperature of abalone is 14~24C, so the water temperature in the sea area should not be less than 10C; The purchase of seedlings should be carried out at the time of optimum temperature for abalone growth. Abalone seedlings should be disinfected with disinfectant before going into the sea. Cage selection

## Technical purpose
The data set corresponds to mariculture processes specific to abalone farming, involving the following stages: seedling (juveniles), small larva nurturing, and cage culture within marine environments. This process applies to the aquaculture industry, focusing on the sustainable production of abalones. The data set is relevant for stakeholders in the aquaculture sector, particularly those dealing with mollusk farming and operation of marine aquaculture systems.

## Model description
The literature refers to the ecoinvent database (v.3.5). In order to account for the variability of the studied system, Monte Carlo simulations were performed in R software (v.3.3.2) to model the correlation between unit process variables in LCA using copula function, which solved the correlation between process variables.Monte Carlo simulations were used in R software, with each cell process represented by a set of input parameters, a correlation matrix of geographical location and growth stages, 2000 iterations were used in the simulation, and the variability of the cell process due to inherent uncertainty, dispersion and unrepresentativeness was considered. Inherent uncertainty is included by assuming a coefficient of variation of 5%, spreads are calculated from primary and secondary data, and a pedigree approach is used to address unrepresentativeness. Dependencies between process chains are included by using dependency sampling in each iteration, as well as dependencies between processes

## Reference product
- small juveniles of Large Yellow Croake: 48.4; measured
  The data comes from the average of 49 households in the actual survey

## Inputs
All rows: measured
- heat: 681.5
  The data comes from the average of 49 households in the actual survey
- Electricity: 4990.32
  The data comes from the average of 49 households in the actual survey
- oxygen: 10.8
  The data comes from the average of 49 households in the actual survey
- calcium carbonate: 199.5
  The data comes from the average of 49 households in the actual survey
- chlorine: 0.14
  The data comes from the average of 49 households in the actual survey
- transport in t*km: 9.4
  The data comes from the average of 49 households in the actual survey

## Deviations from the LCI method approaches
The allocation method used throughout the data analysis process is quality allocation, following the guidelines recommended by the British Standards Institution

## Data selection and combination
The data comes from the average of actual survey data

## Data treatment and extrapolations
Literature researchers constructed a life cycle inventory of mariculture production from both survey data and scientific literature. Primary and auxiliary data are collected for the growth stage to simulate other processes such as seed and juvenile production.

## Sampling procedure
Fifty-two abalone farming households were surveyed in Ningde City, Fujian Province, China, and 49 of them were used in the model calculation of this data

## Use advice
Users employing this data set should take into account the regional specificity of the data, representing the environmental impact associated with mariculture production chains in the Ningde prefecture-level city, including energy and feed production as well as other inputs. It is essential to consider the geographical context when extrapolating this data for use in other locations or for comparative assessments with similar processes. Careful selection is required to ensure temporal relevance, as the data reflects the operations during the year 2016.

## Review details
Inventory: The internal review was done by several iteration steps concerning raw data validation, raw data documentation, representativity, completeness and consistency of modelling with regard to ISO 14040 and 14044.

## Data sources
- Marín, T. et al. Resource Use in Mariculture: A Case Study in Southeastern China. Sustainability 11, (2019).
