# Battery hydrometallurgy technology of Grimme Co

Dataset: ILCD process, Unit process, single operation
Geography: CN
Reference year: 2022
Classification: Energy carriers and technologies / Other non-renewable fuels
Functional unit: Functional unit is a 12.717g used lithium battery
Generated by: Pengfei, pengfei24@email.ncu.edu.cn
Owner: Tiangong LCI Data Working Group
Review: Dependent internal review by Tiangong LCI Data Working Group
Amounts: no units in this file; such an amount is in the reference unit of its flow, which a separate flow dataset defines
copyright: false
licenseType: Free of charge for all users and uses

## General comment
The waste battery undergoes pretreatment, acid leaching, extraction, purification, precursor synthesis, battery material synthesis, and other processes to obtain battery cathode materials. This method can effectively recover lithium.

## Technology and included processes
In this process, the waste battery undergoes pretreatment, acid leaching, extraction, purification, precursor synthesis, battery material synthesis, and other processes to obtain battery cathode materials. This method can effectively recover lithium.

## Technical purpose
The hydrometallurgy technology outlined is designed for the recycling of used lithium batteries. Its specific application includes the recovery of valuable materials such as lithium to produce battery cathode materials. Hence, this process is primarily meant for battery recycling facilities that aim to extract and synthesize high-value elements from waste lithium-based batteries.

## Reference product
- spent LIBs: 0.012717; input; measured
  Spent LIBs

## Inputs
All rows: measured
- sodium chloride: 0.000675
- process water: 83.1
- Sulfuric acid(98%): 1.27
  Sulfuric acid
- Disooctyl Phosphate (P204): 0.00394
  P2O4
- P204（95%）P507（95%）: 0.00145
  P507 Extractant
- Sulfonated kerosene: 0.0137
- Sodium sulfide: 0.0133
- Alkali: 0.884
  Liquid alkali
- Ammonia (25%): 0.0417
- process steam: 12
- Electricity: 0.06696

## Outputs
All rows: measured
- Dust (unspecified, from stack),Dust (unspecified, from stack): 0.000238
- hydrogen fluoride: 4.38e-5
- sulphuric acid: 3.75e-5
- hydrogen sulfide: 2.29e-5
- ammonia: 8.59e-5
- chemical oxygen demand: 0.0103
- Suspended solids, unspecified: 0.124
- biological oxygen demand: 0.00364
- nickel: 4.75e-5
- cobalt: 4.38e-5
- lithium: 0.00398
- manganese: 4.75e-5
- Ammonia Nitrogen: 0.000596
  Ammonia nitrogen
- Ternary cathode material: 1.25

## Use advice
Users employing this data for life cycle assessment should ensure that the functional unit of 12.717g used lithium battery is consistently applied across all comparisons. It is essential to consider the system boundaries of this process, including the pre-treatment and post-treatment stages. When evaluating technological applicability, the efficiency and recovery rate of lithium during acid leaching, extraction, and purification must be accounted for, as well as any potential environmental impacts from emissions or waste generated.

## Review details
Inventory: The internal review was done by several iteration steps concerning raw data validation, raw data documentation, representativity, completeness and consistency of modelling with regard to ISO 14040 and 14044.

## Data sources
- Lai, X. et al. Critical review of life cycle assessment of lithium-ion batteries for electric vehicles: A lifespan perspective. eTransportation 12, 100169 (2022).
