# Saltedvegetables,pickles,sweetandsourpickles,shrimpoilpickles,branpickles|Mustard,leafyvegetables,beans,onionsandgarlic,rootsandtubers,squashheads|Washing + pickling/salting + desalting + dehydration + soaking|All sizes / 盐渍菜、泡菜、糖醋渍菜、虾油渍菜、糟糠渍菜|芥菜类、叶菜类、豆类、葱蒜类、根茎类、榨菜头|水洗+腌制/盐渍+脱盐+脱水+渍制|所有规模

Dataset: ILCD process, Unit process, single operation
Geography: CN
Reference year: 2019
Classification: Materials production / Food and renewable raw materials
Generated by: The data was created by the Office of the Second National Pollution Source Census of the Ministry of Ecology and Environment, and the data was organized by the TianGong Plan team for ILCD format / 生态环境部第二次全国污染源普查工作办公室创建数据，天工计划团队常慧敏整理数据为ILCD格式
Owner: Tiangong LCI Data Working Group / 天工LCI数据工作小组
Amounts: no units in this file; such an amount is in the reference unit of its flow, which a separate flow dataset defines
copyright: false
licenseType: Free of charge for all users and uses

## Technology and included processes
the treatment technology for the pollution of Western Pickled Vegetablesdidn't offered，The formula for calculating the actual operation rate (k-value) of the end-of-pipe treatment facility is k = operating time of waste gas treatment facilities (hours/year) / normal production time of waste gas pollution production section (hours/year)

## Reference product
- Western Pickled Vegetables: 1000; calculated
  源文件中描述为为盐渍菜、泡菜、糖醋渍菜、虾油渍菜、糟糠渍菜，此处对其进行了匹配工作，将其匹配到LCAflow库里面相最符合的流

## Outputs
- Waste water: 630; calculated
  污染物指标工业废水量的末端治理技术未说明。原文件中描述污染物类别为废水，污染物指标为工业废水量，此处对其进行了匹配工作，将其匹配到LCAflow库里面相最符合的流

## Data sources
- 第二次全国污染源普查产排污核算系数手册（试用版）,四级代码1371文件，在完整版文件中第2634页
