# cement production;cement, portland-composite cement, 32.5RMPa;modern dry process, five-stage kiln external decomposition, 4000 t/d

Dataset: ILCD process, Unit process, black box
Geography: DL-LN-CN
Classification: Materials production / Other mineralic materials
Generated by: Siqi Yang, ysqsophia@gmail.com
Owner: Tiangong LCI Data Working Group
Review: Dependent internal review by Tiangong LCI Data Working Group
Amounts: no units in this file; such an amount is in the reference unit of its flow, which a separate flow dataset defines
copyright: false
licenseType: Free of charge for all users and uses

## General comment
The company's production process uses RSP five-stage kiln external decomposition technology, and mainly adopts advanced production equipment from Germany, France, Japan, and some domestic companies. The cement production line consists of a vertical raw mill, a 5-stage RSP (kiln external pre-decomposition tower), a rotary kiln, and a large ball mill equipped with a roller press, as well as gypsum crushing, limestone grinding, and conveying and adding equipment.

## Geography
Dalian Cement Company

## Technology and included processes
The company now has a 4000t/d modern dry process production line (RSP kiln external decomposition equipment) as shown in Figure 6.2, its own independently mined open-pit limestone mine (annual limestone production capacity of 2 million tons) and a dedicated railway line in the factory. The special line for bulk cement outputs the terminal, with an annual cement production of 1.9 million tons.The company's production process adopts RSP five-stage kiln external decomposition technology, mainly using advanced production equipment from Germany, France, Japan and some domestic countries. The cement production line consists of main equipment such as a vertical raw material mill (as shown in Figure 6.1), a 5-stage RSP (pre-calcining tower outside the kiln), a rotary kiln and a large ball mill equipped with a roller press. It is also equipped with gypsum crushing and limestone crushing and conveying and adding equipment.

## Technical purpose
The described process is utilized for the production of portland-composite cement of 32.5R MPa grade. This type of cement is commonly used for general construction purposes, such as in the making of precast concrete elements, residential buildings, pavements, and other infrastructures requiring moderate strength. The process implements modern dry production with RSP technology to enhance efficiency and produce cement at a large scale of 4000 tonnes per day.

## Model description
LCA method was not used for modeling.

## Reference product
- cement, portland-composite cement, 32.5RMPa: 1000
  Cement, PC32.5R

## Inputs
- limestone, crushed, for mill: 985.3
  limestone
- clay: 184.1
- iron, powder: 38.4
  Iron powder
- gypsum stone (CaSO4-dihydrate): 30
  gupsum
- electricity, medium voltage: 230.173
  Electricity
- hard coal: 95.6324
  Coal

## Outputs
- sulfur dioxide: 0.41
  SO2. The main source of SO2 emissions in the production of building materials is from sulfides contained in fuels and raw materials.
- Nitrogen oxides: 0.6815
  NOX. The emissions of NOx in the production of building materials come from two main sources. The first is the combination of N and O2 in the air at high temperatures, which is directly related to the temperature. The second is the low-temperature combination of N and O2 in the fuel, which is related to the concentration of O2.
- carbon dioxide: 586.399
  CO2. The main sources of CO2 emissions in the building materials industry are from fuel combustion and raw material decomposition. Due to the lack of statistical data on industrial pollutant emissions, it is very difficult to collect data, and some data cannot be obtained directly. Therefore, an energy and raw material conversion method is used to obtain the data.
- particles (> PM10): 0.3002
  Dust, with an unspecified particle size, is treated as PM > 10 micrometers in diameter. The production of dust in the production of building materials is related to the content of powdered materials in the raw materials.
- chemical oxygen demand: 3.9838e-5
  COD (chemical oxygen demand) (mg/l). Chemical oxygen demand (COD) refers to the amount of oxidant consumed when treating wastewater with a strong oxidant. It is used to measure the degree of organic pollution in wastewater. The larger the COD value, the more severe the wastewater pollution.
- Suspended solids, unspecified: 4.5116e-5
  SS (suspended solids) (mg/l). The suspended solids in the wastewater discharged from the building materials industry mainly refer to inorganic substances, organic substances, sediment, clay, microorganisms, and other substances that are insoluble in water.
- Oils, unspecified: 1.702e-7
  Petroleum (mg/l). Oil pollution in wastewater mainly comes from production enterprises such as steel, coking, and petrochemicals. According to the size of the oil droplet diameter, there are three forms of oil substances in wastewater: floating oil, dispersed oil, and emulsified oil, and the difficulty of separation from wastewater increases in that order.
- particles (> PM10): 41.8922
  Solid waste refers to the solid waste generated during the production process, such as dust (with an unspecified particle size, is treated as PM > 10 micrometers in diameter).

## Data selection and combination
Cement product evaluation index data is obtained through on-site surveys at cement production enterprises, and the index data comes from enterprise production process data.Due to the lack of specific industrial pollutant emission statistics, the data collection process is very difficult, and some data cannot be obtained directly, so it is obtained by converting related energy and raw materials.

## Sampling procedure
DOCC is a large-scale cement production enterprise jointly constructed and operated by Pacific Cement Co., Ltd. and China Huaneng Integrated Industries Corporation. The company was founded in 1989, covering an area of ​​500,000 square meters with a total investment of US$188 million. The company currently has 376 employees. The company now has a 4,000t/d modern dry process production line (reinforced suspension preheater (RSP) outside the kiln decomposition equipment), its own independently mined open-pit limestone mine (annual limestone production capacity of 2 million tons) and The factory has a dedicated railway line and a dedicated line for bulk cement output to the terminal, with an annual production of 1.9 million tons of cement. The company has now passed the ISO14001:2004 environmental management system certification.

## Use advice
When using this LCA dataset, the user should consider the technological applicability of the RSP five-stage kiln external decomposition technology and the specific context of production in Dalian, China. Due to the difficulties in data collection, the users should exercise caution regarding the emission factors and may need to adjust them based on locale-specific environmental regulations and emission data. Users should also take into account that the data may need to be converted to reflect energy and raw material relationships, and that the LCA method was not used for modeling in this dataset.

## Review details
Inventory: The internal review was done by several iteration steps concerning raw data validation, raw data documentation, representativity, completeness and consistency of modelling with regard to ISO 14040 and 14044.

## Data sources
- 李礼. (2012). 建筑材料绿色性的6E综合评价体系研究 [博士, 大连理工大学].
