# The production of M.OSB ; Miscanthus lutarioriparius-based oriented strand particleboards ; A particular modified starch-based adhesive (paraffin-free) was added in

Dataset: ILCD process, Unit process, single operation
Geography: HUN-CN
Reference year: 2021
Classification: Materials production / Other materials
LCI method principle: Attributional
LCI method approaches: Allocation
Generated by: Wanyue Tan, wytan9@student.ubc.ca
Owner: Tiangong LCI Data Working Group
Review: Dependent internal review by Tiangong LCI Data Working Group
Amounts: no units in this file; such an amount is in the reference unit of its flow, which a separate flow dataset defines
copyright: false
licenseType: Free of charge for all users and uses

## General comment
The content of cellulose, hemicellulose, and lignin reached 39.07%, 8.90%, and 12.48% at the late growth stage of M. lutarioriparius, which was higher than the other three kinds of agricultural residues (rice-straw, cornstalk, and wheat-straw). It, therefore, has better physical properties as a base material for particleboards. The findings of this paper are a supplement to previous studies on non-wood particleboard. In conventional processes, two types of chemicals are usually utilized: thermosetting resin, such as urea-formaldehyde resin, acting as a binder; and paraffin emulsion, which improves the hygroscopic properties of the panel. A particular modified starch-based adhesive was added in M.OSB, which was free of paraffin. The main components of the modified starch-based adhesive are corn starch, polyvinyl alcohol, and water. As the formulation is a non-patented technology, this is not an exhaustive list, and components of less than 1% mass are not listed.

## Geography
This is an LCA Case Study of Lake Dongting District in China.

## Technology and included processes
The main steps of the industrial system include preparation of the primary material, drying, adhesive production, sizing, forming, and finishing the board. The material preparation phase involves stockpiling the raw materials and screening them to remove impurities such as leaves, joints, and dust. In the drying phase, M. lutarioriparius are chipped and then dried to meet the required water content, after which particles are produced and screening is repeated. The production process of the adhesive involves a non-patented technology, and as such will not be elaborated on here. During the sizing phase, bio-adhesives are prepared in advance, with particles and glue being processed automatically until the binder is kept evenly on the surface by mutual friction in the glue mixer. The forming phase involves forming the sized particles into slabs, which are preloaded to reduce the thickness and increase the tensile strength. The qualified slabs go on to be shaped and repaired, with unqualified slabs being recycled by repeating this process. The final step is board finishing, in which the formed boards are stacked for two days after unloading, drying, and cutting. These steps are further divided into four stages: material preparation (I), adhesive production (II), particleboard production (III), and heat generation (IV). In addition, there are a few more auxiliary processes (V), including field cleaning and internal transportation.

## Technical purpose
The M.OSB process produces Miscanthus lutarioriparius-based oriented strand particleboards with a particular modified starch-based adhesive that is paraffin-free. These particleboards have superior physical properties due to the high content of cellulose, hemicellulose, and lignin, making them suitable for use in various construction applications where high-strength, moisture-resistant materials are needed. The adhesive's formulation includes components such as corn starch, polyvinyl alcohol, and water, and is a non-patented technology.

## Reference product
- particle board: 1; measured
  The particle board is selected here, which substitutes for the "M.MDP (M.OSB)" in the paper.

## Inputs
- Miscanthus lutarioriparius: 1010; measured
  This is the input flow called M.lutarioriparius in the paper.
- starch-based adhesive: 52; measured
  This is the input flow called starch-based adhesive in the paper.
- Lubricant: 0.0003; measured
  This is the input flow called lubricants in the paper.
- Water for industrial use: 17.85; software or database
  The "Water for industrial use" is selected here, which substitutes for the "Water" in the paper.
- secondary fuel renewable: 41.9; software or database
  The secondary fuel renewable is selected here, which substitutes for the renewable fuel in the paper.
- Electricity: 236.705; software or database
- Diesel: 1.34
- transport in t*km: 170.5; article inperiodical

## Outputs
- Nitrogen oxides: 0.0426; software or database
- sulfur dioxide: 0.00712; software or database
- carbon dioxide: 68.47; calculated
- soft wood (dry matter): 0.017; software or database
  The inorganic dissolved matter is selected here, which substitutes for the particulate matter in the paper.
- chemical oxygen demand: 0.0038; software or database
  The chemical oxygen demand is selected here, which substitutes for the CODcr in the paper.
- biological oxygen demand: 0.00094; software or database
  The biological oxygen demand is selected here, which substitutes for the BOD_5 in the paper.
- Suspended solids, unspecified: 0.0028; software or database
- Ammonia (NH4+, NH3, as N): 0.00032; software or database
  The Ammonia (NH4+, NH3, as N) is selected here, which substitutes for the "NH3-N" in the paper.
- Oils, unspecified: 0.01364; software or database
  The "Oils" is selected here, which substitutes for the "Waste oil" in the paper.
- Waste (solid): 303.36; software or database
  The Waste (solid) is selected here, which substitutes for the recyclable solid in the paper.

## Data selection and combination
The inventory data of M.OSB (agricultural and industrial production) were obtained from the Hanchuang Particleboard Manufacturing Co. Ltd. in Anxiang County, Changde, China. The average value of M.OSB production was retrieved from the field measurement data and internal documents of a third-party institution (Jinke Testing Institution, Changsha, China). Data regarding the production of polyvinyl alcohol (PVA) was collected from a chemical plant (Ningdong Energy Chemical Investment Co. Ltd.) in Ningxia Hui Autonomous Region of China. The inventory of biomass fuel follows the production profile of a biomass solid fuel plant, which is only 2 km away from the M.OSB production field. The CO2 emission during biomass fuel combustion was calculated according to IPCC 2006. The inventory data of transportation were derived from the literature. The remaining background data were obtained from various databases in SimaPro 9.0, such as ELCD and Ecoinvent.

## Data treatment and extrapolations
Several data sources have been averaged. Average values are the ones used in the inventory.

## Use advice
For proper application of this LCA data, users should consider the intended use of M.OSB in construction settings that require materials with characteristics such as high moisture resistance and tensile strength. It is important to account for the paraffin-free nature of the adhesive when comparing to conventional particleboards in environmental impact assessments. The data should be used with the understanding that certain components comprising less than 1% of the mass are not listed due to non-patent related confidentiality. For accurate results in impact assessment, users should employ the cradle-to-gate system boundary approach, considering the agricultural and industrial subsystems without including the carbon sequestration during plant growth or the human activities beyond the production phase. Biomass fuel's CO2 emissions should be considered as neutral if used in the system, and the use of the cleaner production process flow designed in the study must be taken into account to claim environmental efficiency.

## Review details
Inventory: The internal review was done by several iteration steps concerning raw data validation, raw data documentation, representativity, completeness and consistency of modelling with regard to ISO 14040 and 14044.

## Data sources
- Liao, Q., Zhang, J., Yi, Z. & Li, Y. Do Miscanthus lutarioriparius-Based Oriented Strand Boards Provide Environmentally Benign Alternatives? An LCA Case Study of Lake Dongting District in China. Sustainability 13, 12976 (2021).
