# Funnel and caisson-based gate ; In-situ groundwater remediation ; Funnel-and-gate PRB

Dataset: ILCD process, Unit process, single operation
Geography: UM
Reference year: 2009
Classification: Unit processes / Other Services / Repair and maintenance
Generated by: Yang Xintong, yangxt@caep.org.cn
Owner: Tiangong LCI Data Working Group
Review: Dependent internal review by Tiangong LCI Data Working Group
Amounts: no units in this file; such an amount is in the reference unit of its flow, which a separate flow dataset defines
copyright: false
licenseType: Free of charge for all users and uses

## General comment
PRBs are installed in situ, allowing groundwater to flow under the natural gradient through a reactive cell where a reactive medium degrades or captures contaminants.

## Geography
The case study was conducted using publicly available design documents for two remediation strategies designed by Battelle for Dover Air Force Base (AFB) in Dover, DE

## Technology and included processes
PRB consisting funnel-and-gate configuration with a 36.6 m length of funnel and four - 2.4 m diameter cylindrical gates

## Technical purpose
The in-situ permeable reactive barrier (PRB) with a funnel-and-gate configuration is implemented for groundwater remediation. This system is designed to treat contaminated groundwater by allowing it to pass naturally through reactive cells within the gates, where the reactive medium degrades or captures pollutants. This technology is suitable for application at sites like Dover AFB where contamination needs to be managed without extensive excavation or surface intervention.

## Reference product
- Funnel and caisson-based gate: 1; measured
  渗透性反应墙采用漏斗和闸门配置，具有36.6米长的漏斗和四个直径2.4米的圆柱形闸门.

## Inputs
- Caisson-based gate: 4; measured
- Impermeable funnel: 36.6; measured

## Use advice
Users of this dataset are advised to consider the completeness of the dataset with respect to inputs and emissions. Some unit processes might have estimated data from literature or calculated using fundamental principles where empirical data was not available. Omissions should be noted, and considerations should be taken when applying the data to other contexts or scaling the processes. Methodological consistency with other parts of the LCA must be ensured, and potential environmental impacts of omitted processes need to be accounted for separately if they are significant.

## Review details
Inventory: The internal review was done by several iteration steps concerning raw data validation, raw data documentation, representativity, completeness and consistency of modelling with regard to ISO 14040 and 14044.

## Data sources
- Life-Cycle Case Study Comparison of Permeable Reactive Barrier versus Pump-and-Treat Remediation
