# Remediated soil ; Monitoring natural attenuation ; Soil risk control ; 50 years ; Only considering personnel transportation

Dataset: ILCD process, Unit process, single operation
Geography: UM
Reference year: 2009
Classification: Unit processes / Other Services / Repair and maintenance
Functional unit: The functional unit is defined as remediation of 5000 yd 3 of soil. The design of the treatment options is generic, and lacks parameters such as site characteristics, hydrology and efficiency of technology.
Generated by: Yang Xintong, yangxt@caep.org.cn
Owner: Tiangong LCI Data Working Group
Review: Dependent internal review by Tiangong LCI Data Working Group
Amounts: no units in this file; such an amount is in the reference unit of its flow, which a separate flow dataset defines
copyright: false
licenseType: Free of charge for all users and uses

## General comment
MNA is assumed that the contaminants will degrade in a period of 50 years, hence the monitoring time. Natural attenuation is a process of risk reduction at the site due to the natural course of biodegradation or chemical degradation, dilution, dispersion, volatilization and sorption. Application of natural attenuation as a remedial alternative needs careful evaluation of a number of site parameters such as hydrology, contaminant distribution, fate, geochemistry and receptor location. Long-term monitoring is an integral part of a natural attenuation approach where the collected data is used for evaluation of contaminant behavior with time, efficiency of natural attenuation, and verification of the risk to down gradient receptors. The degradation rate is slow and can sometimes take a few hundred years to reach a regulatory standard. Therefore, the 50-year timeframe used in this study should be seen as only a working estimate of time.

## Geography
This study used a hypothetical site and did not specify the location of the site, therefore the author's area was used as the site location: Newark, the United States

## Technology and included processes
Only incuding Long-term monitoring, 2 workers/month for monitoring.For personal transportation of workers, the distance from home to work-site was assumed to be 30 km.

## Technical purpose
This dataset is used for understanding and modeling the process of monitoring natural attenuation of contaminants in remediated soil over a period of 50 years. It simulates a scenario where long-term monitoring is conducted to assess the risk control and degradation of soil pollutants, taking into account only the personal transportation of workers for the site located in Newark, USA. The designed usage includes evaluation of the site parameters such as hydrology, contaminant distribution, and geochemistry, and it is applicable to environmental engineers and professionals involved in soil remediation projects.

## Reference product
- Remediated soil: 3822.77; estimated
  功能单元定义为5000 yd 3土壤的修复（1yd3等于0.764554857984立方米,即修复方量约为3822.77 m3）。

## Inputs
- Road Transport,Road Transport: 7.2e7; estimated
- contaminated soil: 3822.77; estimated

## Use advice
When using this dataset, data users must note that the treatment of soil remediation reflected in the data is based on a hypothetical site and a generic treatment design. Care must be taken to adapt the dataset to real-world conditions, including actual site characteristics and treatment efficiencies. The transportation element is solely for the purpose of monitoring and does not include any other aspects of the soil remediation process. The 50-year timeframe is a rough estimate, and in practice, monitoring may be required for a shorter or longer period depending on actual contaminant degradation rates.

## Review details
Inventory: The internal review was done by several iteration steps concerning raw data validation, raw data documentation, representativity, completeness and consistency of modelling with regard to ISO 14040 and 14044.

## Data sources
- Dhaliwal, Harnoor, "Sustainable site remediation : a life cycle assessment approach" (2009). Theses. 296.
