# Coke production ; coke ; coking ; coking coal

Dataset: ILCD process, Unit process, single operation
Geography: CN
Reference year: 2006
Classification: Unit processes / Energy carriers and technologies / Hard coal based fuels
Generated by: Wanghuanyu, wanghuanyu00@126.com
Owner: Tiangong LCI Data Working Group
Review: Dependent internal review by Tiangong LCI Data Working Group
Amounts: no units in this file; such an amount is in the reference unit of its flow, which a separate flow dataset defines
copyright: false
licenseType: Free of charge for all users and uses

## General comment
This dataset describes the coke production process, which is a fundamental step in the steel-making industry. Coke, derived from coking coal through the coking process, is primarily used as a fuel and a reducing agent in a blast furnace. It is utilized to produce iron which is subsequently turned into steel. This specific dataset refers to the operations at a Z15 Plant where the naming convention of the process is standardized across the facility.

## Geography
Z15工厂同一名称的工艺过程

## Reference product
- coke,Coke: 0.1842; measured
  Coke z15

## Inputs
- hard coal,hard coal: 1406; measured
  Clean coal z15
- Cleaned coal: 4952.98; measured
  z15

## Outputs
- Flue dust: 2.01; measured
  z15
- phenol,Sulphur oxides (as SO2): 5.098, 0.000337 (2 entries); measured
  z15
- cyanide: 0.000174; measured
  z15

## Use advice
Users of this dataset should ensure that the context of coke production at the Z15 Plant is relevant to their LCA scope. Care should be taken when comparing this data with other coke production processes as technological variations can result in different environmental impacts. It is recommended to consider the geographical location, the age of the technology used, and any upgrades made to the facility which may affect emissions and energy efficiency. Further consideration should be towards the inclusion or exclusion of secondary processes such as energy recovery and downstream effects like transportation.

## Review details
Inventory: The internal review was done by several iteration steps concerning raw data validation, raw data documentation, representativity, completeness and consistency of modelling with regard to ISO 14040 and 14044.

## Data sources
- 刘微. LCI数据质量体系中的分析方法研究. (北京工业大学, 2006).
