# Equipment and Materials Arriving on Site ; Farmland remediation ; In-situ solidification/stabilization ; Materials transportation

Dataset: ILCD process, Unit process, single operation
Geography: NJ-YN-CN
Reference year: 2023
Classification: Unit processes / Other Services / Repair and maintenance
Generated by: Xiao Meng, xiaomeng@mail
Owner: Tiangong LCI Data Working Group
Review: Dependent internal review by Tiangong LCI Data Working Group
Amounts: no units in this file; such an amount is in the reference unit of its flow, which a separate flow dataset defines
copyright: false
licenseType: Free of charge for all users and uses

## General comment
Stable repair construction preparation stage, pharmaceutical transportation process.

## Geography
云南省怒江州受铅锌矿污染某耕地土壤 污染修复工程

## Technical purpose
This industrial process is involved in the remediation of heavy metal contaminated farmland located in Nujiang, Yunnan Province. Covering an area of 16 hectares, the process aims to reduce the effective concentrations of cadmium (Cd) and lead (Pb) in the soil by over 70% while ensuring 100% compliance of Cd and Pb concentrations in crops with regulatory standards. The process utilizes in-situ solidification/stabilization technology, commonly applied to stabilize and reduce the bioavailability of contaminants in the soil. The data set represents the stable repair construction preparation stage, including transportation of required remediation agents.

## Reference product
- Equipment and Materials Arriving on Site: 240000; measured
  运输到场的药剂

## Inputs
- transport in t*km: 875458; measured

## Use advice
When using this data set, LCA practitioners should ensure the inclusion of all relevant processes pertaining to the transportation of materials, in-situ chemical treatment, and application of stabilization agents. It is also important to consider site-specific conditions such as soil composition and contaminant characteristics that may affect the efficiency of the remediation process. Care should be taken to apply the data set only to scenarios with comparable contamination levels and remediation goals. Further, if applying the data set in comparative studies, ensure representativeness across the different scenarios being compared.

## Review details
Inventory: The internal review was done by several iteration steps concerning raw data validation, raw data documentation, representativity, completeness and consistency of modelling with regard to ISO 14040 and 14044.

## Data sources
- 肖萌 et al. 农田污染钝化修复环境影响定量评估方法与案例分析. 中国环境科学 43, 3571–3581 (2023).
