# Steel production ; blast furnace iron making, steelmaking, steel rolling

Dataset: ILCD process, Unit process, single operation
Geography: YL-GX-CN
Reference year: 2012
Classification: Unit processes / Materials production / Metals and semimetals
Functional unit: For example, the generation of 1 kW h (kW h) of electricity is adapted as the functional unit in this study, and the corresponding amounts of CO2 emissions and air pollutants (SO2,NOX and PM10)perkWh of electricity are chosen as the indicators for environmental performances, and the monetary value (US$) of per kW h of electricity is chosen as the indicator for cost-effectiveness evaluation.
LCI method principle: Attributional
LCI method approaches: Allocation
Generated by: Yunzhi Zhao, ll10088@163.com
Owner: Tiangong LCI Data Working Group
Review: Dependent internal review by Tiangong LCI Data Working Group
Amounts: no units in this file; such an amount is in the reference unit of its flow, which a separate flow dataset defines
copyright: false
licenseType: Free of charge for all users and uses

## General comment
文献里只提供了部分污染物排放数据，未提供原材料和能源消耗清单

## Geography
In this study, the typical wind farm system in Yulin City of Guangxi of Zhuang Autonomous Region China was selected as a case study site. The developer, namely, China Huadian Corporation, is a state-owned enterprise and devotes to develop wind power by providing wind power equipment and related service in China [37].

## Technical purpose
This dataset describes the life cycle of wind power systems used for electricity generation, including key stages such as production, transportation and installation, operation, maintenance, and end-of-life recycling and disposal. The wind farm, operated by China Huadian Corporation, features turbines with a capacity of 1.25 MW each and is designed to support the energy grid with renewable power for a duration of 20 years. The process inputs non-renewable energy at various phases and takes into account raw material and fossil fuel consumption, emissions, and cost-effectiveness which are critical for the operation.

## Reference product
- Steel,Steel: 1; calculated
  文献里只提供了部分污染物排放数据，未提供原材料和能源消耗清单

## Outputs
- carbon dioxide (fossil): 7.57; calculated
- sulfur dioxide: 0.0504; calculated
- nitrous oxide: 0.0154; calculated
- particles (PM10): 0.024; calculated

## Deviations from the LCI method approaches
According to Introduced by the life cycle assessment approach [34,35], firstly the system boundaries boundary of wind energy as well as and thermal power are first identified. Then, methodology on evaluating both environmental and economic benefits is presented so that co-benefits can be quantified followed by the introduction of the methodologies on environmental as well as economic impacts evaluation from the co-benefits perspective.

## Data selection and combination
This wind farm is equipped with 24 wind turbines, with a production capacity of 1.25 MW for each turbine, and t the operation life for each turbine is expected to be 20 years. The life cycle of one wind power system can be divided into five stages, including (1) production, (2) transportation and installation, (3) power generation, (4) maintenance, and (5) end-of-life recycling and disposal. The input of non-renewable energy has been shown in each stage. In this study, raw material, fossil fuel consumption and corresponding emissions have been taken into account of a life cycle process. Meanwhile, cost-effectiveness of a wind farm is considered because the cost plays a very important role in operating a wind farm [38]. Considering the data reliability and availability, the cost data of this wind farm was mainly extracted from a feasibility report of one wind farm (with a designed capacity of the 49.5 MW) in Kang ping County of Liaoning province [39].

## Use advice
When utilizing this dataset for life cycle assessment, consider the detailed segmentation of the wind power system's life cycle into its various stages to accurately model the energy and material flows. For environmental impact assessments, use the provided indicators for CO2, SO2, NOX, and PM10 emissions along with the economic evaluation based on the monetary value per kilowatt-hour of electricity generated. Ensure adherence to the methodological approaches outlined for assessing co-benefits. Cross-reference with feasibility reports for data reliability and take note of the system boundaries defined for wind energy and thermal power comparison. Adjust the data as necessary based on geographical and temporal changes.

## Review details
Inventory: The internal review was done by several iteration steps concerning raw data validation, raw data documentation, representativity, completeness and consistency of modelling with regard to ISO 14040 and 14044.
