# Groundwater risk control;Monitored natural attenuation;In-situ repair;Charred soil

Dataset: ILCD process, Unit process, single operation
Geography: JS-CN
Reference year: 2022
Classification: Other Services / Repair and maintenance
Generated by: Jia Yingluo, 202321051222@mail.bnu.edu.cn
Owner: Tiangong LCI Data Working Group
Review: Dependent internal review by Tiangong LCI Data Working Group
Amounts: no units in this file; such an amount is in the reference unit of its flow, which a separate flow dataset defines
copyright: false
licenseType: Free of charge for all users and uses

## General comment
Monitored natural attenuation (MNA) is a passive remedial option that relies on the natural processes, such as biodegradation, dispersion, and dilution, to reduce the concentration of the contaminant in the soil and groundwater

## Technical purpose
The described industrial process applies to environmental remediation and management of contaminated sites. The passive remedial strategy is utilized for reducing contaminant concentration in soil and groundwater. It is appropriate for sites where natural processes can adequately decrease pollution levels, thereby preventing further environmental damage.

## Reference product
- carbon dioxide (biogenic): 273.03; missing unimportant

## Inputs
All rows: missing unimportant
- Electricity: 202.176
- Water Cooling fresh: 978540
- Steel sections: 795
- Polyethylene: 611.27
- Very fine milled silica sand d50 = 20 micrometer: 52640
- bentonite: 10530
- Polyvinyl chloride: 934.2

## Use advice
When utilizing the data set for life cycle assessment or environmental modeling, consider the efficacy of monitored natural attenuation in reducing pollutants specific to the site in question. Users should note the limitations of MNA, such as the time required for remediation and the potential necessity for supplementary methods if MNA is insufficient. Assess the applicability of MNA carefully against the background of regulatory requirements and environmental targets.

## Review details
Inventory: The internal review was done by several iteration steps concerning raw data validation, raw data documentation, representativity, completeness and consistency of modelling with regard to ISO 14040 and 14044.

## Data sources
- Assessing the environmental impacts and costs of biochar and monitored
