# Remediated soil ; Soil in-situ remediation ; 10~16 m ; Chemical Oxidation ; Cyanide pollution

Dataset: ILCD process, Unit process, black box
Geography: ZB-SD-CN
Reference year: 2024
Classification: Unit processes / Other Services / Repair and maintenance
Functional unit: 15026m3 polluted soil (10-16m), with an average cyanide content of 8.88 mg/kg
Generated by: Yang Xintong, yangxt@caep.org.cn
Owner: Tiangong LCI Data Working Group
Review: Dependent internal review by Tiangong LCI Data Working Group
Amounts: no units in this file; such an amount is in the reference unit of its flow, which a separate flow dataset defines
copyright: false
licenseType: Free of charge for all users and uses

## General comment
Polluted soil within a depth range of 10-16 meters within the site is remediated using in-situ chemical oxidation technology and high-pressure rotary jet mixing process with 4 ‰ sodium persulfate.

## Geography
The polluted site is located in Zibo City, Shandong Province, covering a total area of approximately 87800 m2.

## Technology and included processes
After in-situ chemical oxidation remediation, the average cyanide content in 10-16 m polluted soil decreased from 8.88 mg/kg to 0.02 mg/kg, and the pollutant removal rate was 99.77%

## Technical purpose
This remediated soil data represents the in-situ remediation process for pollution within a depth range of 10-16 meters, using chemical oxidation to specifically address cyanide contamination. The data is applicable for environmental impact assessments and pollution management in areas with similar contamination levels and soil remediation requirements. It underlines the effectiveness of using sodium persulfate in high-pressure rotary jet mixing processes for soil treatment in industrial or urban sites where cyanide pollution is prevalent.

## Reference product
- Remediated soil: 15026; measured

## Inputs
All rows: measured
- Electricity: 4212
- Diesel,Diesel: 5.54901
  修复设备运行柴油消耗量
- Diesel,Diesel: 0.80775
  修复药剂及设备场外运输柴油消耗量
- Tap Water: 200
- Sodium persulfate: 30000
- Soil Sample: 12
  修复后土壤样品取样自检
- contaminated soil: 15026

## Use advice
When utilizing this dataset, it is important to consider the context of the remediated site's geographic location and the specific contaminants addressed. The dataset applies to the high-pressure rotary jet mixing remediation technique and should be used in scenarios where this method is appropriate. It is essential to include considerations for the production and transportation of oxidants, as well as the on-site machinery's energy consumption in the form of diesel usage. Methodological attention should be given to ensuring that the cyanide levels reported in the dataset (reduction from 8.88 mg/kg to 0.02 mg/kg) should match the contamination levels of the application site for accurate impact assessment.

## Review details
Inventory: The internal review was done by several iteration steps concerning raw data validation, raw data documentation, representativity, completeness and consistency of modelling with regard to ISO 14040 and 14044.

## Data sources
- 桑春晖,杨欣桐,张红振等. 氰化物污染土壤修复工程环境足迹评估方法和案例研究 [J/OL]. 中国环境科学, 1-11[2024-02-11].
