# Air stripping unit ; Groundwater ex-situ remediation ; Pump and treatment ; Infrastructure construction

Dataset: ILCD process, Unit process, single operation
Geography: JS-CN
Reference year: 2022
Classification: Unit processes / Other Services / Repair and maintenance
Generated by: Wang Ning, wang_ning@caep.org.cn
Owner: Tiangong LCI Data Working Group
Review: Dependent internal review by Tiangong LCI Data Working Group
Amounts: no units in this file; such an amount is in the reference unit of its flow, which a separate flow dataset defines
copyright: false
licenseType: Free of charge for all users and uses

## General comment
Use of aluminium、HDPE and steel for Air stripping unit

## Geography
a closed pesticide manufacturing plant located in Jiangsu Province, China.

## Technical purpose
The air stripping unit described by this dataset is utilized in the ex-situ remediation process of contaminated groundwater within the framework of pump and treatment systems. Specifically, it is for the treatment of groundwater polluted by pesticides at a closed manufacturing plant in Jiangsu Province, China. This equipment, which is constructed using aluminum, high-density polyethylene (HDPE), and steel, is engineered to remove volatile compounds from groundwater by transferring them to the air phase through the process of air stripping.

## Reference product
- Air stripping unit: 1; measured

## Inputs
- Steel sections: 250; measured
- Aluminium and aluminium alloy products: 550; measured
- Polyethylene,Polyethylene: 1650; measured
- transport in t*km: 245; calculated

## Use advice
Users of this dataset should consider the specific regional context and contaminant profile of the groundwater at the Jiangsu site when applying the data for similar remediation activities. The representativeness of the material allocation, energy consumption, and emission factors may vary depending on the geographic location and technological practices implemented elsewhere. It is essential to ensure methodological consistency when integrating this data with other LCA datasets, particularly with respect to the inclusion or exclusion of recycling processes for the materials used (aluminum, HDPE, and steel) and the modeling of the use phase behavior.

## Review details
Inventory: The internal review was done by several iteration steps concerning raw data validation, raw data documentation, representativity, completeness and consistency of modelling with regard to ISO 14040 and 14044.

## Data sources
- Ding, D. et al. Assessing the environmental impacts and costs of biochar and monitored natural attenuation for groundwater heavily contaminated with volatile organic compounds. Science of The Total Environment 846, 157316 (2022).
