# LFP Direct physical recycling

Dataset: ILCD process, Unit process, single operation
Geography: CN
Reference year: 2018
Classification: Unit processes / End-of-life treatment / Material recycling
Functional unit: Functional unit is recycling 1 kwh LFP battery
Generated by: huzhikang, hzk2503593129@163.com
Owner: Tiangong LCI Data Working Group
Review: Dependent internal review by Tiangong LCI Data Working Group
Amounts: no units in this file; such an amount is in the reference unit of its flow, which a separate flow dataset defines
copyright: false
licenseType: Free of charge for all users and uses

## General comment
Waste lithium iron phosphate batteries are discharged and then dismantled automatically in a refined way to recover the metal components and plastic parts, etc.; the positive and negative electrodes of the battery core are separated, crushed and sorted to get copper powder, aluminum powder and positive and negative electrode material powders; then the positive electrode powder is adjusted for the composition through the method of material repair, and synthesized into a new positive electrode material at a high temperature; the negative electrode powder is repaired into a new negative electrode material and the diaphragm and electrolyte are recovered and reused, so as to achieve the recycling of the whole component of the waste lithium iron phosphate batteries.

## Technical purpose
The recycling process described is intended for use in the recovery and repurposing of components from waste lithium iron phosphate (LFP) batteries. It specifically applies to the reclamation of metal parts, plastics, and electrode materials, which includes the separation, crushing, and sorting of electrode materials, followed by the material repair and high-temperature synthesis of new electrode materials. This process ensures that nearly all components of LFP batteries are recycled, thus supporting sustainable battery manufacturing and contributing to the circular economy.

## Reference product
- EoL LFP battery: 3.6; input; missing unimportant
  Waste lithium iron phosphate battery

## Inputs
All rows: missing unimportant
- Electricity: 131.4
- Liquid Nitrogen: 38
  Liquid nitrogen
- Dimethyl Carbonate,Dimethyl Carbonate: 1.93
  DMC solvent (dimethyl carbonate)
- Lithium carbonate: 0.153
- nitrogen: 1.09
  Nitrogen
- Glucose: 0.492

## Outputs
All rows: missing unimportant
- hydrogen fluoride: 0.00021
  Hydrogen fluoride
- particles (> PM10): 0.00651
  Dust
- non-methane volatile organic compounds: 0.00244
  Volatile organic compounds
- Graphite: 1.05
- aluminium sheet: 0.526
  Aluminum foil
- Copper sheet: 0.842
  Copper Foil
- Battery Separator: 0.452
- Plastic (unspecified),Plastic (unspecified): 0.111
  Plastic parts
- Aluminum Shell: 0.0175
  Aluminum shell (unit: pcs)
- Electrolyte: 1.04
- Cathode Material: 2.32
  Anode material

## Data selection and combination
The data comes from a variety of literature and is not clear.

## Use advice
Users of this dataset should apply it when assessing the environmental impact of recycling LFP batteries. It's critical to ensure that the methodology used for Life Cycle Assessment (LCA) accurately reflects the direct physical recycling process, including the appropriate allocation of impacts for the reclamation of materials and subsequent usage. Users must account for energy expenses and emissions related to the recycling process and consider the functional unit equivalent to recycling 1 kWh LFP battery, weighing 0.81kg, per 0.0157 of a waste lithium polymer battery.

## Review details
Inventory: The internal review was done by several iteration steps concerning raw data validation, raw data documentation, representativity, completeness and consistency of modelling with regard to ISO 14040 and 14044.

## Data sources
- 王琢璞. 新能源汽车动力电池回收利用潜力及生命周期评价. (清华大学, 2018)
