# Rare earth oxides extraction;Rare earth oxides;ion-adsorption process;ion-adsorption clays

Dataset: ILCD process, Unit process, single operation
Geography: CN
Reference year: 2014
Valid until: 2016
Classification: Unit processes / Materials production / Non-energetic raw materials
Functional unit: The functional unit is defined as the production of 1 kg of 90–92% purity mixed REOs by the in-situ leaching method from ion-adsorption clays in southern China.
LCI method principle: Attributional
LCI method approaches: Allocation - market value
Generated by: Tao Wang, twang@iue.ac.cn
Owner: Tiangong LCI Data Working Group
Review: Dependent internal review by Tiangong LCI Data Working Group
Amounts: no units in this file; such an amount is in the reference unit of its flow, which a separate flow dataset defines
copyright: false
licenseType: Free of charge for all users and uses

## General comment
The extracted rare earth oxides (REOs) using the ion-adsorption process from ion-adsorption clays in Southern China are typically used in the manufacturing of high-performance magnets, catalysts, alloys, glasses, and electronics due to their unique magnetic, chemical, and luminescent properties. These applications are crucial in various high-tech industries, including renewable energy technology, aerospace, electronics, and automotive fields.

## Geography
Southern China

## Technology and included processes
The process ends at mixed rare earth oxides and downstream processes such as solvent extraction and metal production are not included in the system boundary. At certain sites further processing may occur (e.g., separating REEs into light and groups).

## Reference product
- Water: 1; input; software or database

## Inputs
All rows: uniform; software or database
- Ammonium sulfate: 8.25; min 6.1; max 10.4
- Ammonium bicarbonate: 3.35; min 2.2; max 4.5
- sulphuric acid: 0.525; min 0.3; max 0.75
- oxalic acid: 1.35; min 1.2; max 1.5
- Electricity: 10.494; min 1.908; max 19.08
- heat: 0.8424; min 0.624; max 0.78
  Calcination. Heat, district or industrial, other than natural gas {

## Deviations from the LCI method approaches
In this study, the material and energy flow data is gathered from Chinese literature and verified through personal communications with Chinese experts working in this industry. These datasets are derived based on attributional modeling (instead of consequential) and for most multi-products processes economic allocation is used. Since the data was collected from different sources

## Use advice
Users of this dataset should note that the system boundary is limited to the production of mixed REOs with a purity of 90-92% and does not include downstream processes such as solvent extraction and metal production. Allocation of impacts in multi-product systems is based on economic factors. For accurate LCA results, ensure that the boundaries of the analysis match those of the intended application. Should the LCA study require further divisions of REEs, this dataset may require modification or complementing with additional data. Due to differences in site-specific practices, the represented data should be used cautiously and possibly adjusted for regional and technological differences when applied to specific scenarios.

## Review details
Inventory: The internal review was done by several iteration steps concerning raw data validation, raw data documentation, representativity, completeness and consistency of modelling with regard to ISO 14040 and 14044.

## Data sources
- Vahidi, E., Navarro, J. & Zhao, F. An initial life cycle assessment of rare earth oxides production from ion-adsorption clays. Resources, Conservation and Recycling 113, 1–11 (2016).
