# Electricity production ; Thermal power ; Anhui

Dataset: ILCD process, Unit process, single operation
Geography: AH-CN
Reference year: 2019
Classification: Unit processes / Energy carriers and technologies / Electricity
Generated by: Ruoxi Xiong, xiongrx0126@163.com
Owner: Tiangong LCI Data Working Group
Review: Dependent internal review by Tiangong LCI Data Working Group
Amounts: no units in this file; such an amount is in the reference unit of its flow, which a separate flow dataset defines
copyright: false
licenseType: Free of charge for all users and uses

## General comment
Thermal power generation includes seventeen fossil fuels such as raw coal, washed coal, oil and natural gas. The process only considers the direct power generation process, not the upstream raw material extraction and processing and the downstream power consumption

## Time period
Calculated based on data from the 2019 Energy Statistics Yearbook

## Technical purpose
The thermal power generation process described is designed for the production of electricity utilizing a variety of fossil fuels, including raw coal, washed coal, oil, and natural gas. Intended applications include provision of power to regional grids, servicing both industrial and non-industrial users in Anhui province. It is limited to direct electricity generation operations.

## Reference product
- electricity for thermal power: 3.6; calculated

## Inputs
All rows: calculated
- Raw coal: 0.385602
- Coke oven gas: 0.000903
- blast furnace gas: 0.043616
- Converter gas: 0.008278
- Diesel: 0.0001017
- fuel oil, unspecified: 1.92e-5
- Petroleum Coke: 0.001566
- refinery gas: 0.00242225
- natural gas: 0.009089

## Outputs
- carbon dioxide (fossil): 0.765514; calculated
- sulfur dioxide: 0.000131465; calculated
- Nitrogen oxides: 0.000209233; calculated
- particles (> PM10): 2.59677e-5; calculated

## Data treatment and extrapolations
For the accounting method, please refer to the "Enterprise Greenhouse Gas Emissions Accounting Methods and Reporting Guidelines for Power Generation Facilities". Different forms of power generation and fuel consumption come from Chapter 3 (Energy Production) and Chapter 6 (Regional Energy Balance Sheet) in the "China Energy Statistical Yearbook 2020". The fuel parameters such as low calorific value and carbon content per unit calorific value used to calculate the carbon dioxide emission factor come from the "2019 China Regional Power Grid Carbon Dioxide Baseline Emission Factor Calculation Instructions OM" and the "Enterprise Greenhouse Gas Emission Accounting Method and Reporting Guide for Power Generation Facilities" 》

## Use advice
When utilizing this data set for Life Cycle Assessment, users must consider only the direct power generation phase. Upstream raw material extraction and processing, as well as downstream consumption, should be excluded. Calculations for the carbon dioxide emission factor are based on the specific fuel parameters, including lower heating value and carbon content per unit calorific value, as provided in the referenced documentation. Users should adhere to the methodological guidelines outlined in the 'Enterprise Greenhouse Gas Emissions Accounting Methods and Reporting Guidelines for Power Generation Facilities' for accurate and consistent data reporting.

## Review details
Inventory: The internal review was done by several iteration steps concerning raw data validation, raw data documentation, representativity, completeness and consistency of modelling with regard to ISO 14040 and 14044.

## Data sources
- 熊若熙. 中国电力生产和消费二氧化碳与污染物排放因子核算. (清华大学, 2023).
