# Hot rolled steel production;Hot rolled steel;Hot rolling(BF-BOF)

Dataset: ILCD process, Unit process, single operation
Geography: CN
Classification: Unit processes / Materials production / Metals and semimetals
Generated by: Fuxiang, 1162850692@qq.com
Owner: Tiangong LCI Data Working Group
Review: Dependent internal review by Tiangong LCI Data Working Group
Amounts: no units in this file; such an amount is in the reference unit of its flow, which a separate flow dataset defines
copyright: false
licenseType: Free of charge for all users and uses

## General comment
This dataset describes the hot rolled steel production process using the BF-BOF pathway, which is utilized in large-scale integrated steel plants. Hot rolled steel is a versatile material commonly used for construction, automotive, heavy machinery, and other industrial applications where malleable yet strong materials are needed. The steel produced through this process is used for manufacturing various steel products such as I-beams, rails, automotive frames, and pipes.

## Geography
The data of the BF-BOF pathway were obtained from the large-scale integrated steel plants in China with an attached coking plant and EAF plant.

## Reference product
- Hot rolled steel: 986.5; measured

## Inputs
All rows: measured
- Crude Steel: 1000
  Crude steel
- freshwater,freshwater: 600
- Circulating water: 1000
- Baling wire: 2.1
- Coke oven gas: 42.4
  COG
- Blast furnace gas: 72.8
  BFG
- Linz-Donawitz gas: 25.8
  LDG
- Electricity: 316.8

## Use advice
When using this dataset for Life Cycle Assessment, users should account for the specific pathways and facility configurations described, such as the attached coking and EAF plants. It is also important to consider region-specific factors that may influence the environmental impacts, such as local energy sources, emission standards, and waste treatment practices. Users may need to adjust the data if applying it to differing technological setups or geographic locations, and they should ensure that recycling and end-of-life stages are appropriately modeled if pertinent to the LCA scope.

## Review details
Inventory: The internal review was done by several iteration steps concerning raw data validation, raw data documentation, representativity, completeness and consistency of modelling with regard to ISO 14040 and 14044.

## Data sources
- The carbon reduction potential of hydrogen in the low carbon transition of the iron and steel industry: The case of China
