# Banana production

Dataset: ILCD process, Unit process, single operation
Geography: TR
Reference year: 2020
Valid until: 2021
Classification: Unit processes / Materials production / Agricultural production means
Functional unit: 2 t banana
Generated by: zhu xian, zzhu0918@163.com
Owner: Tiangong LCI Data Working Group
Review: Dependent internal review by Tiangong LCI Data Working Group
Amounts: no units in this file; such an amount is in the reference unit of its flow, which a separate flow dataset defines
copyright: false
licenseType: Free of charge for all users and uses

## General comment
Prepare seeds, fertilizers, pesticides, water and other substances required for banana production, and complete sowing, irrigation, fertilization and fruit harvesting by manual or mechanical means.

## Geography
Coastal Mediterranean region, where the northern areas are protected by the high altitude Taurus Mountains, Alanya and Gazipas¸ a, a district of Antalya province, and Anamur and Bozyazı, districts of Mersin province, are the most important banana growing locations in Turkey。

## Technical purpose
The described banana production process is applicable for agricultural operations focused on cultivating bananas as a commercial crop. It is used to produce bananas that are typically sold for direct consumption, or for use in food processing, such as in the production of desserts, baked goods, and beverages. This agricultural process is particularly relevant for farms situated in climates similar to the Mediterranean coastal regions of Turkey, which are suitable for banana cultivation.

## Reference product
- Banana: 2000; measured

## Inputs
All rows: measured
- water: 30.048
- Lubricant oil: 2.73
- gypsum: 31.78
- Limestone: 68.54
- Electricity: 7.066e6
- Pesticide: 0.9428
- Nitrogenous fertilizer: 11.14
- phosphorus: 5.76
- potassium chloride: 24.98

## Outputs
All rows: software or database
- cadmium: 0.00011
- arsenic: 4.1e-5
- lead: 7.6e-5
- ammonia: 0.163
- nitrate: 1
- nitrous oxide: 0.052

## Use advice
When utilizing this LCA data set for banana production, users should ensure to model the process according to the specific cultivation methods, inputs, and geographic conditions similar to those described for the Mediterranean coastal regions of Turkey. It's essential to consider factors such as local climate, soil type, water availability, and the use of manual or mechanical agricultural practices. Additionally, users should account for the impact of transportation if the production location differs from the site of final consumption. Attention should be given to any methodological assumptions regarding the type of fertilizers and pesticides used, and the manner in which water is sourced and utilized in the irrigation processes.

## Review details
Inventory: The internal review was done by several iteration steps concerning raw data validation, raw data documentation, representativity, completeness and consistency of modelling with regard to ISO 14040 and 14044.

## Data sources
- Adsal, K.A., Üçtuğ, F.G., Arikan, O.A., 2020. Environmental life cycle assessment of utilizing stem waste for banana production in greenhouses in Turkey. Sustain. Prod. Consum. 22, 110–125.
