# Organic reagents (refined or synthetic) ; Industrial products ; Refined purification or synthesis ; The annual output tonnage is more than 500 t or the annual production (refining and purification or synthesis process) of more than 51 kinds of chemical reagents; NESPS2 / 有机试剂（精制或合成） ; 工业品 ; 精制提纯或合成 ; 全年产量吨位在500吨以上或年生产（精制提纯或合成工艺）化学试剂品种数51种以上 ; 全国第二次污染普查数据

Dataset: ILCD process, Unit process, single operation
Geography: CN
Reference year: 2019
Classification: Reference Parameters / Materials production / Organic chemicals
Generated by: The data was created by the Office of the Second National Pollution Source Census of the Ministry of Ecology and Environment, and the data was organized by the TianGong Plan team for ILCD format / 生态环境部第二次全国污染源普查工作办公室创建数据，天工计划团队常慧敏整理数据为ILCD格式
Owner: Tiangong LCI Data Working Group / 天工LCI数据工作小组
Review: Dependent internal review by Tiangong LCI Data Working Group / 天工LCI数据工作小组
Amounts: no units in this file; such an amount is in the reference unit of its flow, which a separate flow dataset defines
copyright: false
licenseType: Free of charge for all users and uses

## General comment
the Technical of end-of-pipe management technology for pollution Exhaust gasis/，Its Technical efficiency of end-of-pipe management0

## Technical purpose
本描述的纳米有机试剂（精制或合成）是用于各种化学过程和应用的工业产品。年产量超过500吨，或提供51种以上不同类型的化学试剂，这些试剂通常用于化工行业的大规模化学合成。因此，它们可能用于制造、制药、材料科学或任何需要高质量化学化合物进行复杂反应的行业。

## Reference product
- Organic Reagents (Refined or Synthetic): 1000; calculated
  源文件中描述为为有机试剂（精制或合成），此处对其进行了匹配工作，将其匹配到LCAflow库里面相最符合的流，污染物指标备注为工业废水量

## Outputs
All rows: calculated
- phosphorus, total: 5.5e-6
  the Technical of end-of-pipe management technology for pollution phosphorus, totalisPhysicochemical treatment + biological treatment，Its Technical efficiency of end-of-pipe management50
  污染物指标总磷的末端治理技术是物理化学处理法+生物法，其效率为50，末端治理设施实际运行率（k值）计算公式为k=污染处理设备年耗电量（千瓦时）/(污染处理设备功率(千瓦)×年运行小时数(时))。原文件中描述污染物类别为废水，污染物指标为总磷，此处对其进行了匹配工作，将其匹配到LCAflow库里面相最符合的流，污染物指标备注为总磷
- Nitrogen oxides: 0.58175
  the Technical of end-of-pipe management technology for pollution Nitrogen oxidesisIn-furnace low nitrogen technology，Its Technical efficiency of end-of-pipe management35
  污染物指标氮氧化物的末端治理技术是炉内低氮技术，其效率为35，末端治理设施实际运行率（k值）计算公式为k=污染处理设备年耗电量（千瓦时）/(污染处理设备功率(千瓦)×年运行小时数(时))。原文件中描述污染物类别为废气，污染物指标为氮氧化物，此处对其进行了匹配工作，将其匹配到LCAflow库里面相最符合的流，污染物指标备注为氮氧化物
- particles (PM2.5 - PM10): 0.656
  the Technical of end-of-pipe management technology for pollution particles (PM2.5 - PM10)isCyclone dust removal, wet precipitation，Its Technical efficiency of end-of-pipe management90
  污染物指标颗粒物的末端治理技术是旋风除尘、湿法除尘，其效率为90，末端治理设施实际运行率（k值）计算公式为k=污染处理设备年耗电量（千瓦时）/(污染处理设备功率(千瓦)×年运行小时数(时))。原文件中描述污染物类别为废气，污染物指标为颗粒物，此处对其进行了匹配工作，将其匹配到LCAflow库里面相最符合的流，污染物指标备注为颗粒物
- Ammonia Nitrogen: 0.000758
  the Technical of end-of-pipe management technology for pollution Ammonia NitrogenisPhysicochemical treatment + biological treatment，Its Technical efficiency of end-of-pipe management99
  污染物指标氨氮的末端治理技术是物理化学处理法+生物法，其效率为99，末端治理设施实际运行率（k值）计算公式为k=污染处理设备年耗电量（千瓦时）/(污染处理设备功率(千瓦)×年运行小时数(时))。原文件中描述污染物类别为废水，污染物指标为氨氮，此处对其进行了匹配工作，将其匹配到LCAflow库里面相最符合的流，污染物指标备注为氨氮
- sulfur dioxide: 1.2375
  the Technical of end-of-pipe management technology for pollution sulfur dioxideisDesulfurization in furnace，Its Technical efficiency of end-of-pipe management75
  污染物指标二氧化硫的末端治理技术是炉内脱硫，其效率为75，末端治理设施实际运行率（k值）计算公式为k=污染处理设备年耗电量（千瓦时）/(污染处理设备功率(千瓦)×年运行小时数(时))。原文件中描述污染物类别为废气，污染物指标为二氧化硫，此处对其进行了匹配工作，将其匹配到LCAflow库里面相最符合的流，污染物指标备注为二氧化硫
- Waste water: 1600
  the Technical of end-of-pipe management technology for pollution Waste wateris/，Its Technical efficiency of end-of-pipe management0
  污染物指标工业废水量的末端治理技术是/，其效率为0。原文件中描述污染物类别为废水，污染物指标为工业废水量，此处对其进行了匹配工作，将其匹配到LCAflow库里面相最符合的流，污染物指标备注为工业废水量
- Nitrogen, organic bound: 0.003855
  the Technical of end-of-pipe management technology for pollution Nitrogen, organic boundisPhysicochemical treatment + biological treatment，Its Technical efficiency of end-of-pipe management95
  污染物指标总氮的末端治理技术是物理化学处理法+生物法，其效率为95，末端治理设施实际运行率（k值）计算公式为k=污染处理设备年耗电量（千瓦时）/(污染处理设备功率(千瓦)×年运行小时数(时))。原文件中描述污染物类别为废水，污染物指标为总氮，此处对其进行了匹配工作，将其匹配到LCAflow库里面相最符合的流，污染物指标备注为总氮
- Petroleum-related waste: 0.01395
  the Technical of end-of-pipe management technology for pollution Petroleum-related wasteisPhysical treatment，Its Technical efficiency of end-of-pipe management69
  污染物指标石油类的末端治理技术是物理处理法，其效率为69，末端治理设施实际运行率（k值）计算公式为k=污染处理设备年耗电量（千瓦时）/(污染处理设备功率(千瓦)×年运行小时数(时))。原文件中描述污染物类别为废水，污染物指标为石油类，此处对其进行了匹配工作，将其匹配到LCAflow库里面相最符合的流，污染物指标备注为石油类
- chemical oxygen demand: 0.063
  the Technical of end-of-pipe management technology for pollution chemical oxygen demandisPhysicochemical treatment + biological treatment，Its Technical efficiency of end-of-pipe management95
  污染物指标化学需氧量的末端治理技术是物理化学处理法+生物法，其效率为95，末端治理设施实际运行率（k值）计算公式为k=污染处理设备年耗电量（千瓦时）/(污染处理设备功率(千瓦)×年运行小时数(时))。原文件中描述污染物类别为废水，污染物指标为化学需氧量，此处对其进行了匹配工作，将其匹配到LCAflow库里面相最符合的流，污染物指标备注为化学需氧量
- Exhaust gas: 1990
  the Technical of end-of-pipe management technology for pollution Exhaust gasis/，Its Technical efficiency of end-of-pipe management0
  污染物指标工业废气量的末端治理技术是/，其效率为0。原文件中描述污染物类别为废气，污染物指标为工业废气量，此处对其进行了匹配工作，将其匹配到LCAflow库里面相最符合的流，污染物指标备注为工业废气量

## Use advice
This dataset is derived from the Pollution Source Census Report and contains information on pollution emissions and related products. However, it does not include data on energy or chemical consumption, nor does it provide information on waste or co-product generation. When utilizing this dataset, please supplement the missing data based on actual conditions before use
该数据集来源于污染源普查报告，包含污染物排放及相关产品信息，但不包含能源或化学品消耗数据，也不提供废弃物或共生产物产生信息。在使用该数据集时，请根据实际情况补充缺失数据后再使用。

## Review details
Inventory: The internal review was done by several iteration steps concerning raw data validation, raw data documentation, representativity, completeness and consistency of modelling with regard to ISO 14040 and 14044.
清单： 内部审查通过几个迭代步骤完成，涉及原始数据验证、原始数据记录、代表性、完整性、与 ISO 14040 和 14044 有关的建模的一致性。

## Data sources
- 第二次全国污染源普查产排污核算系数手册（试用版）,二级代码26,四级代码2661文件，在完整版文件中第4111页
