# Molten iron production;Molten iron;BF

Dataset: ILCD process, Unit process, single operation
Geography: CN
Classification: Unit processes / Materials production / Metals and semimetals
Generated by: Fuxiang, 1162850692@qq.com
Owner: Tiangong LCI Data Working Group
Review: Dependent internal review by Tiangong LCI Data Working Group
Amounts: no units in this file; such an amount is in the reference unit of its flow, which a separate flow dataset defines
copyright: false
licenseType: Free of charge for all users and uses

## General comment
This dataset describes the molten iron production process in a Blast Furnace (BF) unit operation, specifically for large-scale integrated steel plants in China. The molten iron (also known as hot metal or pig iron) is primarily used for steelmaking in Basic Oxygen Furnaces (BOF) or can be cast into ingots for further processing. The presence of an attached coking plant suggests the production of coke, which is necessary for the BF process, and the existence of an Electric Arc Furnace (EAF) indicates the potential for recycling steel scrap.

## Geography
The data of the BF-BOF pathway were obtained from the large-scale integrated steel plants in China with an attached coking plant and EAF plant.

## Reference product
- Molten Iron: 924; measured
  Molten iron

## Inputs
All rows: measured
- coke,Coke: 342.6
  Coke
- Iron ore: 147
  Iron ore (Import)
- Sinter: 1164.4
- Pellet: 165.8
- dolomite: 14.7
- quicklime: 18
  Quicklime
- fluorspar: 1.2
- freshwater,freshwater: 300
- Circulating water: 15300
- compressed air: 55
- oxygen: 31.9
- Blast furnace gas: 646.6
  BFG
- anthracite: 67.9
  Anthracite
- hard coal,hard coal: 63.7
  Bituminous coal
- Electricity: 508.68

## Outputs
- Blast furnace gas: 1154; measured
  BFG
- Electricity: 125.28; measured
- BF Slag: 286.4; measured
- BF Shop Dust: 31; measured
  Dust and mud

## Use advice
Users of this dataset should ensure that the BF-BOF pathway data is applied to scenarios appropriate for large-scale steel production with coke-based ironmaking. Attention should be paid to the specific process parameters from the region's integrated steel plants, as they may affect the environmental impact assessment. Recycling scenarios, if to be included, should consider the use of the EAF plant for steel scrap melting, which can alter the energy profile and emissions of the overall steel production process. The timeframe and geographical scope of data collection should be considered when applying this dataset to ensure relevance and accuracy in Life Cycle Assessments (LCA).

## Review details
Inventory: The internal review was done by several iteration steps concerning raw data validation, raw data documentation, representativity, completeness and consistency of modelling with regard to ISO 14040 and 14044.

## Data sources
- The carbon reduction potential of hydrogen in the low carbon transition of the iron and steel industry: The case of China
