# Wet steaming cotton dyeing and finishing processing ; printing and dyeing cotton ; baking

Dataset: ILCD process, Unit process, single operation
Geography: SZ-JS-CN
Reference year: 2012
Classification: Unit processes / Materials production / Organic chemicals
Generated by: Yingfan Duan, 1300925579@qq.com
Owner: Tiangong LCI Data Working Group
Review: Dependent internal review by Tiangong LCI Data Working Group
Amounts: no units in this file; such an amount is in the reference unit of its flow, which a separate flow dataset defines
copyright: false
licenseType: Free of charge for all users and uses

## General comment
"Baking" is a common post-treatment step in the printing and dyeing process, aimed at enhancing the durability of dyes or pigments by applying heat to the fabric, typically through drying or other heating methods. This process also contributes to improving the fabric's texture and appearance, ensuring the stability of the printing and dyeing effects.

## Geography
The study focuses on a printing and dyeing enterprise in Jiangsu Province, located in Changshu within the Yangtze River Delta Economic Zone.

## Technical purpose
The described industrial process is the wet steaming cotton dyeing and finishing processing. It is used in the textile industry for processing cotton fabrics through various stages, such as scouring, bleaching, calendaring, brushing, width-washing, baking, and pad-dyeing. Coal is utilized in steam and thermal oil boilers to generate steam and maintain high operating temperatures needed throughout these stages in the described facility.

## Reference product
- Cotton Fabric: 167; measured

## Inputs
- Electricity: 99.4; measured
- Standard coal: 981; measured
- Crude coal: 72.2; calculated
- Cleaned coal: 179; calculated
- Fuel Oil: 1.54; calculated
- heavy fuel oil: 0.464; calculated
- Diesel oil: 2.12; calculated
- Coke Oven Gas: 2.83; calculated
- natural gas: 0.0361; calculated
- process steam: 3.15e7; measured
- freshwater: 2300; measured

## Outputs
- carbon dioxide (fossil): 2790; calculated
- carbon monoxide (fossil): 0.214; calculated
- sulfur dioxide: 2.1; calculated
- methane (fossil): 13.6; calculated
- Nitrogen oxides: 0.434; calculated
- nitrous oxide: 0.0431; measured
- particles (> PM10): 0.689; calculated
- ammonia: 8.6e-6; measured
- non-methane volatile organic compounds: 0.00423; measured
- chemical oxygen demand: 0.0172; calculated
- Suspended solids, unspecified,Suspended solids, unspecified: 0.034; calculated
- lead: 5.67e-6; calculated
- mercury: 1.19e-7; calculated
- fluorine: 1.07e-6; calculated
- cadmium: 2.1e-7; calculated
- arsenic: 4.86e-6; calculated

## Use advice
When utilizing the data set for Life Cycle Assessment of the wet steaming cotton dyeing and finishing process, attention should be given to the allocation of coal consumption between the two types of boilers, with the use ratio of 17:1 as specified in the clean production report of the researched company. The proportion of steam used in the process steps follows the ratio of 2:1:1:1:1:2. This ratio must be considered when modeling the energy consumption for each drying cylinder within the separate processes. The methodology should also reflect the number of drying cylinders employed in each step – two for both scouring and bleaching, and typically one for the other processes. It is essential to correctly account for two-step drying in the pad-dyeing process.

## Review details
Inventory: The internal review was done by several iteration steps concerning raw data validation, raw data documentation, representativity, completeness and consistency of modelling with regard to ISO 14040 and 14044.

## Data sources
- 朱亚楠. 棉布连续轧染工艺生命周期环境影响评价. (南京大学, 2012).
