# Municial sludge treatment and disposal;dry sludge;mono-incineration

Dataset: ILCD process, Unit process, single operation
Geography: CN
Classification: Unit processes / End-of-life treatment / Waste water treatment
Functional unit: The functional unit used for GHGs in this LCA is one dry ton (DT) of sludge.
Generated by: Jin Sitian, 2331276@tongji.edu.cn
Owner: Tiangong LCI Data Working Group
Review: Dependent internal review by Tiangong LCI Data Working Group
Amounts: no units in this file; such an amount is in the reference unit of its flow, which a separate flow dataset defines
copyright: ['opt4ROkqig']
licenseType: Free of charge for all users and uses

## General comment
The main data sources used in our study are as follows: 1) Energy consumption and material inputs are obtained from investigations in Tai Lake Watershed; 2) The energy use emission factor is obtained from our own calculation, IPCC, and the literature.3) The fugitive emissions during landfilling, incineration, and composting are mainly determined by the model given in the other study as well as by the IPCC factors (2006), except for the CH4 emission in landfilling, which is obtained from study.4) Data from theoretical calculations (see Incineration section).

## Geography
Tai Lake Watershed

## Technology and included processes
The kiln temperature is assumed to be 1000 °C during combustion in S2, S3, and S4 and is 1400 °C in S5. Kiln efficiency is assumed to be 75%.

## Technical purpose
This municipal sludge treatment and disposal data set is applicable to the mono-incineration process of dry sludge within the Tai Lake Watershed area. It is intended for use in scenarios where environmental impacts, specifically greenhouse gas emissions, of sludge treatment processes are evaluated. This data can be particularly relevant for infrastructure planning, waste management policy development, and assessment of carbon footprint in waste treatment facilities.

## Reference product
- Sludge: 1000; input; estimated
  one dry ton (DT) of sludge

## Inputs
- Electricity: 720; measured

## Use advice
When using this data set for Life Cycle Assessment, carefully consider the scope and geographical relevance of your assessment. Include this data as part of the inventory analysis phase when evaluating the environmental impact of sludge treatment processes in the Tai Lake watershed area. Ensure that the functional unit of the study is consistent with the data set - one dry ton of sludge. Adaptations may be necessary if the waste characteristics or regulatory conditions differ from those in the Tai Lake area.

## Review details
Inventory: The internal review was done by several iteration steps concerning raw data validation, raw data documentation, representativity, completeness and consistency of modelling with regard to ISO 14040 and 14044.

## Data sources
- Liu, B., Wei, Q., Zhang, B. & Bi, J. Life cycle GHG emissions of sewage sludge treatment and disposal options in Tai Lake Watershed, China. Science of The Total Environment 447, 361–369 (2013).
