# DRI production;DRI;Coal-DRI

Dataset: ILCD process, Unit process, single operation
Geography: CN
Classification: Energy carriers and technologies / Hard coal based fuels
Generated by: Fuxiang, 1162850692@qq.com
Owner: Tiangong LCI Data Working Group
Review: Dependent internal review by Tiangong LCI Data Working Group
Amounts: no units in this file; such an amount is in the reference unit of its flow, which a separate flow dataset defines
copyright: false
licenseType: Free of charge for all users and uses

## General comment
Direct Reduced Iron (DRI) production using the Coal-based Direct Reduction (Coal-DRI) process is typically employed in the steelmaking industry to obtain metallic iron from iron ore without melting the ore. This process uses non-coking coal as a reductant in a solid-state reduction of iron oxides. The DRI produced is often used as a feedstock for electric arc furnaces in steel mills, wherein it is melted to produce steel.

## Geography
The average operating data of Coal-DR, NG-DR (MID), and NG-DR (ENE) demonstration projects in China are used as the benchmark for the LCI of DR routes.

## Reference product
- Direct Reduced Iron: 1000; calculated
  The average operating data of Coal-DR, NG-DR (MID), and NG-DR (ENE) demonstration projects in China are used as the benchmark for the LCI of DR routes. LCI of COG-DR and H-DR routes, which is not scaled-up in China are estimated based on Coal-DR routes combined with literature data from simulations, laboratory tests, and process modeling in

## Inputs
All rows: calculated
- Pellet: 1357.3
  (same comment as for Direct Reduced Iron)
- Water (fresh water): 400
  (same comment as for Direct Reduced Iron)
- process steam: 167.9
  (same comment as for Direct Reduced Iron)
- oxygen: 299.5
  (same comment as for Direct Reduced Iron)
- lignite: 608.6
  (same comment as for Direct Reduced Iron)
- Natural gas, at consumer EU-27: 230
  (same comment as for Direct Reduced Iron)
- Electricity: 478.44
  (same comment as for Direct Reduced Iron)

## Outputs
All rows: calculated
- sulfur: 3.5
  (same comment as for Direct Reduced Iron)
- Crude Benzene,clumsy: 1.1
  (same comment as for Direct Reduced Iron)
- Slag: 14.4
  (same comment as for Direct Reduced Iron)
- Dust (unspecified, from stack): 0.5
  (same comment as for Direct Reduced Iron)
- carbon dioxide: 177.6
  (same comment as for Direct Reduced Iron)

## Data treatment and extrapolations
LCI of COG-DR and H-DR routes, which is not scaled-up in China are estimated based on Coal-DR routes combined with literature data from simulations, laboratory tests, and process modeling in Table 9 [49,50]. The LCI of Coal-DR is obtai

## Use advice
When using life cycle inventory (LCI) data of the Coal-based Direct Reduction (Coal-DRI) routes, ensure that the data is applicable to the specific geographic location and technological context of your assessment. The LCI data should be consistent with the average operating data of demonstration projects in China. When considering COG-DR and H-DR routes, be aware that the data for these processes is estimated based on Coal-DR combined with literature data and therefore may require additional validation. The projection of these routes for large-scale industrial application should be made with caution due to technological and scale extrapolation risks.

## Review details
Inventory: The internal review was done by several iteration steps concerning raw data validation, raw data documentation, representativity, completeness and consistency of modelling with regard to ISO 14040 and 14044.

## Data sources
- The carbon reduction potential of hydrogen in the low carbon transition of the iron and steel industry: The case of China
