# Continuous casting billet ; molten steel ; billet

Dataset: ILCD process, Unit process, single operation
Geography: CN
Reference year: 2020
Classification: Unit processes / Materials production / Metals and semimetals
Generated by: Jiwei, 1299801467@qq.com
Owner: Tiangong LCI Data Working Group
Review: Dependent internal review by Tiangong LCI Data Working Group
Amounts: no units in this file; such an amount is in the reference unit of its flow, which a separate flow dataset defines
copyright: false
licenseType: Free of charge for all users and uses

## General comment
The continuous casting billet described by this data set is used in the production of various types of steel structures and components through downstream manufacturing processes. It involves transforming molten steel into billets which are intermediate products and can be further processed into bars, rods, and sections for construction, automotive, and machinery industries.

## Time period
论文提到钢铁企业环境总体数据为1998年的吨钢环境基础数据。

## Reference product
- billet: 1030; calculated

## Inputs
All rows: calculated
- Molten Iron: 1056
- freshwater,freshwater: 800
- Refractory: 4.4
- oxygen: 2.7
- Electricity: 42.48
- Converter gas: 5.15

## Use advice
When utilizing this data set, ensure the consideration of technological applicability with regards to the year of the data (1998) as technological advancements may have led to updated environmental impact data. Additionally, consider specific regional production practices as they may differ from the general data provided. For LCA studies, factor in any relevant end-of-life recycling processes that may apply to the steel products derived from the continuous casting billets.

## Review details
Inventory: The internal review was done by several iteration steps concerning raw data validation, raw data documentation, representativity, completeness and consistency of modelling with regard to ISO 14040 and 14044.

## Data sources
- 梁田. 基于生命周期评价的典型钢铁企业环境影响评估及绿色发展研究. (郑州大学, 2020).
