# Rare Earth Oxides (REO) Extraction;Rare Earth Oxides (REO) General process;ion-adsorption clays

Dataset: ILCD process, Unit process, single operation
Geography: CN
Reference year: 2016
Classification: Unit processes / Materials production / Non-energetic raw materials
Functional unit: The functional unit chosen for this study is 1 kg of heavy REOs at 90% purity
LCI method principle: Attributional
LCI method approaches: Allocation - market value
Generated by: Tao Wang, twang@iue.ac.cn
Owner: Tiangong LCI Data Working Group
Review: Dependent internal review by Tiangong LCI Data Working Group
Amounts: no units in this file; such an amount is in the reference unit of its flow, which a separate flow dataset defines
copyright: false
licenseType: Free of charge for all users and uses

## General comment
The mixed REOs produced through the process described are utilized in various industries requiring high-purity rare earth elements, such as electronics manufacturing, production of magnets, phosphors, alloys, and catalysts. Given their 90% purity, these REOs are suitable for high-specification requirements and specialized applications where the composition and consistency of rare earth elements are critical.

## Geography
Ganzhou city, Jiangxi Province

## Technology and included processes
This study characterizes the production of mixed REOs from ion-adsorption clays in southern China, with 90% purity. Compositions of individual rare earth minerals in REO differ from ore to ore. Ores from two ion-adsorption clays in Jiangxi Providence, the same region from where data were collected for this LCA, are shown in Table 1, and though they might not exactly characterize the particular REOs mined at the sites from which data were collected in this study, they are likely to be similar.1 The system boundary for the LCA study includes mining using in situ leaching methods, extraction, and calcination. These processes are all conducted on site, and the final product is mixed REOs. Further processes such as solvent extraction and individual metal separation are not included, as they often occur off-site.

## Reference product
- coke: 1.15; input; calculated
  Coke, production average (CN), aggregate ; CLCD-China-Public 0.8.1 2012

## Inputs
- sulphuric acid: 2.14, 0.6 (2 entries); calculated
- sodium hydroxide: 2.07; calculated
- Ammonium bicarbonate: 4.65; calculated
  Ammonia bicarbonate

## Deviations from the LCI method approaches
The LCI was developed using primary data for the foreground system collected from four sites in southern China, as described in Sections 2.1.2.Background data are from the Chinese life cycle database (CLCD). CLCD is a Chinese national reference LCI database developed by Sichuan University, China, and IKE Environmental Technology CO. Ltd., and it sources original data from industry statistics, government publications, academic research, and other LCA databases (Liu et al. 2010). The one exception is electricity data provided by Ecoinvent that is used in the scenario analysis conducted in this study (Ecoinvent Center 2016). These datasets from Ecoinvent are used to model the effects of changing electricity grid composition via scenario analysis.

## Use advice
When utilizing this dataset, attention should be given to the fact that the LCA data reflects the status of the production processes in Ganzhou city, Jiangxi Province, and might not be directly applicable to similar processes in different regions. Users should consider the technological applicability and consider adjustments when applying this data to different geographical contexts or technological setups. Methodological considerations, including in situ leaching method, extraction, and calcination, should be encapsulated in modeling. Upstream and downstream processes such as solvent extraction and metal separation, which are not included in the system boundary of this LCA, should be separately accounted for if included in the scope of the user’s analysis.

## Review details
Inventory: The internal review was done by several iteration steps concerning raw data validation, raw data documentation, representativity, completeness and consistency of modelling with regard to ISO 14040 and 14044.

## Data sources
- Deng, H. & Kendall, A. Life cycle assessment with primary data on heavy rare earth oxides from ion-adsorption clays. Int J Life Cycle Assess 24, 1643–1652 (2019).
