# Lead-zinc mixed ore ; Lead-zinc ore ; Grinding-flotation ; All sizes; NESPS2 / 铅锌混合矿 ; 铅锌矿石 ; 磨浮工艺 ; 所有规模 ; 全国第二次污染普查数据

Dataset: ILCD process, Unit process, single operation
Geography: CN
Reference year: 2019
Classification: Reference Parameters / Materials production / Non-energetic raw materials
Generated by: The data was created by the Office of the Second National Pollution Source Census of the Ministry of Ecology and Environment, and the data was organized by the TianGong Plan team for ILCD format / 生态环境部第二次全国污染源普查工作办公室创建数据，天工计划团队常慧敏整理数据为ILCD格式
Owner: Tiangong LCI Data Working Group / 天工LCI数据工作小组
Review: Dependent internal review by Tiangong LCI Data Working Group / 天工LCI数据工作小组
Amounts: no units in this file; such an amount is in the reference unit of its flow, which a separate flow dataset defines
copyright: false
licenseType: Free of charge for all users and uses

## General comment
the Technical of end-of-pipe management technology for pollution Exhaust gasis/

## Technical purpose
该工业过程涉及处理和管理在铅锌混合矿石的磨浮过程中产生的污染物。这个过程适用于所有规模的铅锌矿石加工设施，其中需要采用末端处理技术。这些技术用于管理废气和颗粒物质(PM2.5 - PM10)排放，采用各种湿式沉降方法和除尘滤器，效率在65％到99.5％之间不等。此外，还应用了旋风除尘、静电沉降和中和与化学沉降等特定技术来处理废水，并减少化学需氧量、氨氮、总磷、有机结合氮和重金属如铅、镉、砷和汞的含量，效率水平各不相同。

## Reference product
- Lead-zinc ore: 1000; input; calculated
  源文件中描述为为铅锌矿石，此处对其进行了匹配工作，将其匹配到LCAflow库里面相最符合的流，污染物指标备注为工业废气量

## Outputs
All rows: calculated
- particles (PM2.5 - PM10): 0.021
  the Technical of end-of-pipe management technology for pollution particles (PM2.5 - PM10)isDust filter (bag filter - film coating)，Its Technical efficiency of end-of-pipe management99.5
  污染物指标颗粒物的末端治理技术是过滤除尘法（布袋除尘器-覆膜），其效率为99.5，末端治理设施实际运行率（k值）计算公式为k=治理设施运行时间（小时/年）/正常生产时间（小时/年）。原文件中描述污染物类别为废气，污染物指标为颗粒物，此处对其进行了匹配工作，将其匹配到LCAflow库里面相最符合的流，污染物指标备注为颗粒物
- arsenic: 3.06e-5
  the Technical of end-of-pipe management technology for pollution arsenicisNeutralization + chemical precipitation，Its Technical efficiency of end-of-pipe management98
  污染物指标砷的末端治理技术是中和法+化学沉淀法，其效率为98，末端治理设施实际运行率（k值）计算公式为K=废水处理设施正常运行时间（小时/年）/企业正常生产时间（小时/年）。原文件中描述污染物类别为废水，污染物指标为砷，此处对其进行了匹配工作，将其匹配到LCAflow库里面相最符合的流，污染物指标备注为砷
- Mercury: 3.494e-5
  the Technical of end-of-pipe management technology for pollution MercuryisNeutralization + chemical precipitation，Its Technical efficiency of end-of-pipe management98
  污染物指标汞的末端治理技术是中和法+化学沉淀法，其效率为98，末端治理设施实际运行率（k值）计算公式为K=废水处理设施正常运行时间（小时/年）/企业正常生产时间（小时/年）。原文件中描述污染物类别为废水，污染物指标为汞，此处对其进行了匹配工作，将其匹配到LCAflow库里面相最符合的流，污染物指标备注为汞
- particles (PM2.5 - PM10): 0.042
  the Technical of end-of-pipe management technology for pollution particles (PM2.5 - PM10)isDust filter (bag filter - without film coating)，Its Technical efficiency of end-of-pipe management99
  污染物指标颗粒物的末端治理技术是过滤除尘法（布袋除尘器-无覆膜），其效率为99，末端治理设施实际运行率（k值）计算公式为k=治理设施运行时间（小时/年）/正常生产时间（小时/年）。原文件中描述污染物类别为废气，污染物指标为颗粒物，此处对其进行了匹配工作，将其匹配到LCAflow库里面相最符合的流，污染物指标备注为颗粒物
- particles (PM2.5 - PM10): 0.042
  the Technical of end-of-pipe management technology for pollution particles (PM2.5 - PM10)isElectrostatic precipitation technology，Its Technical efficiency of end-of-pipe management99
  污染物指标颗粒物的末端治理技术是电除尘技术，其效率为99，末端治理设施实际运行率（k值）计算公式为k=治理设施运行时间（小时/年）/正常生产时间（小时/年）。原文件中描述污染物类别为废气，污染物指标为颗粒物，此处对其进行了匹配工作，将其匹配到LCAflow库里面相最符合的流，污染物指标备注为颗粒物
- particles (PM2.5 - PM10): 0.042
  the Technical of end-of-pipe management technology for pollution particles (PM2.5 - PM10)isWet precipitation (dynamic wave)，Its Technical efficiency of end-of-pipe management99
  污染物指标颗粒物的末端治理技术是湿式除尘法（动力波），其效率为99，末端治理设施实际运行率（k值）计算公式为k=治理设施运行时间（小时/年）/正常生产时间（小时/年）。原文件中描述污染物类别为废气，污染物指标为颗粒物，此处对其进行了匹配工作，将其匹配到LCAflow库里面相最符合的流，污染物指标备注为颗粒物
- particles (PM2.5 - PM10): 0.21
  the Technical of end-of-pipe management technology for pollution particles (PM2.5 - PM10)isWet precipitation (foam tower)，Its Technical efficiency of end-of-pipe management95
  污染物指标颗粒物的末端治理技术是湿式除尘法（泡沫塔），其效率为95，末端治理设施实际运行率（k值）计算公式为k=治理设施运行时间（小时/年）/正常生产时间（小时/年）。原文件中描述污染物类别为废气，污染物指标为颗粒物，此处对其进行了匹配工作，将其匹配到LCAflow库里面相最符合的流，污染物指标备注为颗粒物
- cadmium: 0.0002409
  the Technical of end-of-pipe management technology for pollution cadmiumisNeutralization + chemical precipitation，Its Technical efficiency of end-of-pipe management97
  污染物指标镉的末端治理技术是中和法+化学沉淀法，其效率为97，末端治理设施实际运行率（k值）计算公式为K=废水处理设施正常运行时间（小时/年）/企业正常生产时间（小时/年）。原文件中描述污染物类别为废水，污染物指标为镉，此处对其进行了匹配工作，将其匹配到LCAflow库里面相最符合的流，污染物指标备注为镉
- particles (PM2.5 - PM10): 0.42
  the Technical of end-of-pipe management technology for pollution particles (PM2.5 - PM10)isWet precipitation (venturi)，Its Technical efficiency of end-of-pipe management90
  污染物指标颗粒物的末端治理技术是湿式除尘法（文丘里），其效率为90，末端治理设施实际运行率（k值）计算公式为k=治理设施运行时间（小时/年）/正常生产时间（小时/年）。原文件中描述污染物类别为废气，污染物指标为颗粒物，此处对其进行了匹配工作，将其匹配到LCAflow库里面相最符合的流，污染物指标备注为颗粒物
- phosphorus, total: 0.0006024
  the Technical of end-of-pipe management technology for pollution phosphorus, totalisNeutralization + chemical precipitation，Its Technical efficiency of end-of-pipe management52
  污染物指标总磷的末端治理技术是中和法+化学沉淀法，其效率为52，末端治理设施实际运行率（k值）计算公式为K=废水处理设施正常运行时间（小时/年）/企业正常生产时间（小时/年）。原文件中描述污染物类别为废水，污染物指标为总磷，此处对其进行了匹配工作，将其匹配到LCAflow库里面相最符合的流，污染物指标备注为总磷
- particles (PM2.5 - PM10): 0.84
  the Technical of end-of-pipe management technology for pollution particles (PM2.5 - PM10)isWet precipitation (spray tower)，Its Technical efficiency of end-of-pipe management80
  污染物指标颗粒物的末端治理技术是湿式除尘法（喷淋塔），其效率为80，末端治理设施实际运行率（k值）计算公式为k=治理设施运行时间（小时/年）/正常生产时间（小时/年）。原文件中描述污染物类别为废气，污染物指标为颗粒物，此处对其进行了匹配工作，将其匹配到LCAflow库里面相最符合的流，污染物指标备注为颗粒物
- lead: 0.0014644
  the Technical of end-of-pipe management technology for pollution leadisNeutralization + chemical precipitation，Its Technical efficiency of end-of-pipe management98
  污染物指标铅的末端治理技术是中和法+化学沉淀法，其效率为98，末端治理设施实际运行率（k值）计算公式为K=废水处理设施正常运行时间（小时/年）/企业正常生产时间（小时/年）。原文件中描述污染物类别为废水，污染物指标为铅，此处对其进行了匹配工作，将其匹配到LCAflow库里面相最符合的流，污染物指标备注为铅
- particles (PM2.5 - PM10): 1.47
  the Technical of end-of-pipe management technology for pollution particles (PM2.5 - PM10)isCyclone dust collection，Its Technical efficiency of end-of-pipe management65
  污染物指标颗粒物的末端治理技术是旋风收尘，其效率为65，末端治理设施实际运行率（k值）计算公式为k=治理设施运行时间（小时/年）/正常生产时间（小时/年）。原文件中描述污染物类别为废气，污染物指标为颗粒物，此处对其进行了匹配工作，将其匹配到LCAflow库里面相最符合的流，污染物指标备注为颗粒物
- mercury: 0.00213
  the Technical of end-of-pipe management technology for pollution mercuryisSame as PM
  污染物指标汞的末端治理技术是同颗粒物。原文件中描述污染物类别为废气，污染物指标为汞，此处对其进行了匹配工作，将其匹配到LCAflow库里面相最符合的流，污染物指标备注为汞
- Waste water: 3342
  the Technical of end-of-pipe management technology for pollution Waste wateris/
  污染物指标工业废水量的末端治理技术是/。原文件中描述污染物类别为废水，污染物指标为工业废水量，此处对其进行了匹配工作，将其匹配到LCAflow库里面相最符合的流，污染物指标备注为工业废水量
- Ammonia Nitrogen: 0.00716016
  the Technical of end-of-pipe management technology for pollution Ammonia NitrogenisNeutralization + chemical precipitation，Its Technical efficiency of end-of-pipe management52
  污染物指标氨氮的末端治理技术是中和法+化学沉淀法，其效率为52，末端治理设施实际运行率（k值）计算公式为K=废水处理设施正常运行时间（小时/年）/企业正常生产时间（小时/年）。原文件中描述污染物类别为废水，污染物指标为氨氮，此处对其进行了匹配工作，将其匹配到LCAflow库里面相最符合的流，污染物指标备注为氨氮
- cadmium: 0.00795
  the Technical of end-of-pipe management technology for pollution cadmiumisSame as PM
  污染物指标镉的末端治理技术是同颗粒物。原文件中描述污染物类别为废气，污染物指标为镉，此处对其进行了匹配工作，将其匹配到LCAflow库里面相最符合的流，污染物指标备注为镉
- arsenic: 0.01854
  the Technical of end-of-pipe management technology for pollution arsenicisSame as PM
  污染物指标砷的末端治理技术是同颗粒物。原文件中描述污染物类别为废气，污染物指标为砷，此处对其进行了匹配工作，将其匹配到LCAflow库里面相最符合的流，污染物指标备注为砷
- Nitrogen, organic bound: 0.026016
  the Technical of end-of-pipe management technology for pollution Nitrogen, organic boundisNeutralization + chemical precipitation，Its Technical efficiency of end-of-pipe management52
  污染物指标总氮的末端治理技术是中和法+化学沉淀法，其效率为52，末端治理设施实际运行率（k值）计算公式为K=废水处理设施正常运行时间（小时/年）/企业正常生产时间（小时/年）。原文件中描述污染物类别为废水，污染物指标为总氮，此处对其进行了匹配工作，将其匹配到LCAflow库里面相最符合的流，污染物指标备注为总氮
- lead: 0.06993
  the Technical of end-of-pipe management technology for pollution leadisSame as PM
  污染物指标铅的末端治理技术是同颗粒物。原文件中描述污染物类别为废气，污染物指标为铅，此处对其进行了匹配工作，将其匹配到LCAflow库里面相最符合的流，污染物指标备注为铅
- chemical oxygen demand: 0.103524
  the Technical of end-of-pipe management technology for pollution chemical oxygen demandisNeutralization + chemical precipitation，Its Technical efficiency of end-of-pipe management52
  污染物指标化学需氧量的末端治理技术是中和法+化学沉淀法，其效率为52，末端治理设施实际运行率（k值）计算公式为K=废水处理设施正常运行时间（小时/年）/企业正常生产时间（小时/年）。原文件中描述污染物类别为废水，污染物指标为化学需氧量，此处对其进行了匹配工作，将其匹配到LCAflow库里面相最符合的流，污染物指标备注为化学需氧量
- Exhaust gas: 942
  the Technical of end-of-pipe management technology for pollution Exhaust gasis/
  污染物指标工业废气量的末端治理技术是/。原文件中描述污染物类别为废气，污染物指标为工业废气量，此处对其进行了匹配工作，将其匹配到LCAflow库里面相最符合的流，污染物指标备注为工业废气量

## Use advice
This dataset is derived from the Pollution Source Census Report and contains information on pollution emissions and related products. However, it does not include data on energy or chemical consumption, nor does it provide information on waste or co-product generation. When utilizing this dataset, please supplement the missing data based on actual conditions before use
该数据集来源于污染源普查报告，包含污染物排放及相关产品信息，但不包含能源或化学品消耗数据，也不提供废弃物或共生产物产生信息。在使用该数据集时，请根据实际情况补充缺失数据后再使用。

## Review details
Inventory: The internal review was done by several iteration steps concerning raw data validation, raw data documentation, representativity, completeness and consistency of modelling with regard to ISO 14040 and 14044.
清单： 内部审查通过几个迭代步骤完成，涉及原始数据验证、原始数据记录、代表性、完整性、与 ISO 14040 和 14044 有关的建模的一致性。

## Data sources
- 第二次全国污染源普查产排污核算系数手册（试用版）,二级代码09,四级代码0912文件，在完整版文件中第3413页
