# Equipment and Materials Arriving on Site ; Soil in situ remediation ; Soil Bioventilation

Dataset: ILCD process, Unit process, single operation
Geography: CN
Reference year: 2022
Classification: Unit processes / Other Services / Repair and maintenance
Generated by: Wang Ning, wang_ning@caep.org.cn
Owner: Tiangong LCI Data Working Group
Review: Dependent internal review by Tiangong LCI Data Working Group
Amounts: no units in this file; such an amount is in the reference unit of its flow, which a separate flow dataset defines
copyright: false
licenseType: Free of charge for all users and uses

## General comment
Transportation of equipment and materials to the site

## Geography
案例焦化厂位于我国北方中纬度地带

## Technology and included processes
Transportation of equipment and materials to site using gasoline

## Technical purpose
The described process involves the transportation of equipment and materials for the purpose of 'Soil in situ remediation' specifically 'Soil Bioventilation' which is a technique used to biologically degrade or transform contaminants in the soil using controlled airflow to stimulate microbial activity. This transportation logistic is tailored for industrial applications such as coking plants located in the mid-latitudes of northern China, where the remediation of contaminated soils is essential for environmental management and industrial hygiene.

## Reference product
- Equipment and Materials Arriving on Site: 1; measured

## Inputs
- Gasoline (regular): 1.547; measured

## Use advice
When utilizing the dataset for Life Cycle Assessment purposes, care should be taken to accurately reflect the transport of equipment and materials using gasoline for soil bioventilation procedures in northern mid-latitude regions in China. Account for the specific environmental impacts associated with the use of gasoline for transportation and ensure that any assumptions made (distance traveled, type of vehicles, fuel consumption rates) are consistent with the geographical and technological context of the coking plant operations. Consider including the end-of-life phase for the equipment and impacts from temporary worksite operations in the LCA. Exclusions of other process inputs or outputs not directly related to the transportation activity should be clearly documented.

## Review details
Inventory: The internal review was done by several iteration steps concerning raw data validation, raw data documentation, representativity, completeness and consistency of modelling with regard to ISO 14040 and 14044.

## Data sources
- 刘文晓等.基于修复效果的污染土壤修复工程环境足迹分析[J].环境科学研究 35,2367-2377（2022）.
