# Soil and groundwater remediation;Ex-situ;Soil washing;Physical seperation

Dataset: ILCD process, Unit process, single operation
Geography: KR
Reference year: 2023
Classification: Unit processes / Other Services / Repair and maintenance
Generated by: Huang Yue, huangyue@caep.org.cn
Owner: Tiangong LCI Data Working Group
Review: Dependent internal review by Tiangong LCI Data Working Group
Amounts: no units in this file; such an amount is in the reference unit of its flow, which a separate flow dataset defines
copyright: false
licenseType: Free of charge for all users and uses

## General comment
Include Hopper/conveyor、Wet vibration separation/conveyor、Hydro cyclone、Dehydration equipment/pump、Gravity separation/pump、Dehydration equipment/conveyor

## Geography
Incheon City, approximately 50 km east of Seoul, South Korea

## Technical purpose
The described industrial process for soil and groundwater remediation is intended for ex-situ soil washing applications. It is particularly used for the physical separation and pre-treatment of contaminated soil in environmental engineering projects. This technology is critical for restoring contaminated sites to safe conditions, which can be used for construction, agriculture, or other environmentally sensitive applications.

## Reference product
- Pre-treatment Soil: 1; measured

## Inputs
All rows: measured
- Electricity: 15390
- Tap Water: 8550
- contaminated soil: 1
- Steel: 2
- Rubber: 4275

## Outputs
- carbon dioxide (fossil): 25200; measured
- particles (PM10): 0.614; measured
- sulfur oxides: 91.5; measured
- nitrous oxide: 71.3; measured

## Data treatment and extrapolations
The total footprint was analyzed by calculating the footprints of each stage separately using SiteWiseTM ver.2

## Use advice
When using this dataset for Life Cycle Assessment, it is crucial to ensure that all stages of the soil and groundwater remediation process, including transport, treatment, and disposal, are accounted for in the environmental footprint analysis. Users should calculate the footprints for each stage separately with the provided SiteWiseTM ver.2 tool, considering all major raw materials and essential energy consumption to obtain comprehensive results. Methodological choices, including system boundaries and assumptions for treatment efficiency, should be clearly defined and consistent with LCA standards.

## Review details
Inventory: The internal review was done by several iteration steps concerning raw data validation, raw data documentation, representativity, completeness and consistency of modelling with regard to ISO 14040 and 14044.

## Data sources
- Kim, D.-H., Hwang, B.-R., Moon, D.-H., Kim, Y.-S. & Baek, K. Environmental assessment on a soil washing process of a Pb-contaminated shooting range site: a case study. Environ Sci Pollut Res 20, 8417–8424 (2013).
