# underground coal mining ;coal mining

Dataset: ILCD process, Unit process, black box
Geography: LF-SX-CN
Reference year: 2022
Classification: Energy carriers and technologies / Energetic raw materials
Generated by: Linlin Yin, yinlinlin0623@163.com
Owner: Tiangong LCI Data Working Group
Review: Dependent internal review by Tiangong LCI Data Working Group
Amounts: no units in this file; such an amount is in the reference unit of its flow, which a separate flow dataset defines
licenseType: Free of charge for all users and uses

## General comment
The low gas underground coal mine data represents the full life cycle of coal excavation, including processes such as roadway excavation, equipment installation, coal mining, and equipment withdrawal. This data is applicable to the analysis of coal production used in energy generation, industrial heating, and raw material for various carbon-based products.

## Geography
Low gas underground coal mine

## Technology and included processes
Roadway excavation ; equipment installation ; coal mining ; equipment withdrawal

## Reference product
- Hard coal, at consumer EU-27: 1.66212e9; uniform; calculated
  M Coal Mine is located in Linfen City, Shanxi Province. It is a low-gas underground coal mine. The working face as the research object is 2400m long and 180m wide. The average thickness of the coal seam is 2.85m. The average density of coal is 1.35t/m3. According to the above Basic information can be calculated to calculate that the total amount of coal in this working face is 1662120t.

## Inputs
- Electricity: 739.9; uniform; software or database
  Emission factor: 1MW·h of electricity consumed produces 0.7399t of CO2 (data provided by Shanxi Energy Bureau)
- Electricity: 1.48485e9; uniform; measured
  M coal mine power activity level data
- water: 3.18566e8; uniform; measured
  M Coal Mine Fresh Water Activity Level Data

## Outputs
All rows: uniform
- methane (fossil): 10; software or database
  Emission factor: Mining 1 ton of coal releases 10m3 of methane gas. According to the actual situation of M coal mine, this coal mine is a low gas concentration coal mine, so the methane content in the coal is selected according to the low methane emission coefficient in the 2006 IPCC inventory.
- carbon dioxide (fossil): 3.05179e8; calculated
  Amount of CO2 generated by electricity consumption during coal mining in M ​​coal mine
- carbon dioxide (fossil): 67540; calculated
  M Coal Mine—Amount of CO2 generated by fresh water consumption during coal mining
- methane (fossil): 1.08851e7; measured
  Activity level data of fugitive methane emissions during coal mining at M Coal Mine
- carbon dioxide (fossil): 2.28588e8; calculated
  Amount of CO2 produced by methane fugitive emissions during coal mining in M ​​coal mine
- carbon dioxide (fossil): 321; calculated
  Emission factor, the carbon emission intensity of coal mining in M ​​coal mine is 0.321tCO2e/t, that is, the coal mine will emit 0.321t carbon dioxide when producing 1t of raw coal.

## Use advice
When using this data set, ensure that the system boundaries include all the four stages of the underground coal mining process. Consider the low gas nature of the mine, as it influences safety measures and productivity. This data should be used by excluding any potential recycling process since recycling is not applicable to the coal mining phase. For energy calculations, the calorific value of the mined coal and any fugitive emissions should be included.

## Review details
Inventory: The internal review was done by several iteration steps concerning raw data validation, raw data documentation, representativity, completeness and consistency of modelling with regard to ISO 14040 and 14044.
