# Ferro Vanadium ; Vanadium pentoxide, ferrosilicon, aluminum granules ; Roasting + electro-silicon thermal method ; All sizes; NESPS2 / 钒铁 ; 五氧化二钒、硅铁、铝粒 ; 焙烧+电硅热法 ; 所有规模 ; 全国第二次污染普查数据

Dataset: ILCD process, Unit process, single operation
Geography: CN
Reference year: 2019
Classification: Reference Parameters / Materials production / Metals and semimetals
Generated by: The data was created by the Office of the Second National Pollution Source Census of the Ministry of Ecology and Environment, and the data was organized by the TianGong Plan team for ILCD format / 生态环境部第二次全国污染源普查工作办公室创建数据，天工计划团队常慧敏整理数据为ILCD格式
Owner: Tiangong LCI Data Working Group / 天工LCI数据工作小组
Review: Dependent internal review by Tiangong LCI Data Working Group / 天工LCI数据工作小组
Amounts: no units in this file; such an amount is in the reference unit of its flow, which a separate flow dataset defines
copyright: false
licenseType: Free of charge for all users and uses

## General comment
the Technical of end-of-pipe management technology for pollution Exhaust gasis/，Its Technical efficiency of end-of-pipe management0

## Technical purpose
所述工业过程用于通过焙烧和电硅热法生产钒铁和五氧化二钒。钒铁通常用作添加剂以提高钢的质量，增强其抗蚀性和提高其抗拉强度。五氧化二钒用于制造各种催化应用，以及生产陶瓷和玻璃。在该过程中产生的硅铁可以用作各种钢和铸铁产品生产中的脱氧剂和合金元素，而铝粒可能用于炼钢过程、脱氧和各种化工应用。

## Reference product
- Ferrovanadium: 1000; calculated
  源文件中描述为为钒铁，此处对其进行了匹配工作，将其匹配到LCAflow库里面相最符合的流，污染物指标备注为工业废水量

## Outputs
All rows: calculated
- Waste water: 400
  the Technical of end-of-pipe management technology for pollution Waste wateris/，Its Technical efficiency of end-of-pipe management0
  污染物指标工业废水量的末端治理技术是/，其效率为0。原文件中描述污染物类别为废水，污染物指标为工业废水量，此处对其进行了匹配工作，将其匹配到LCAflow库里面相最符合的流，污染物指标备注为工业废水量
- particles (PM2.5 - PM10): 1.53
  the Technical of end-of-pipe management technology for pollution particles (PM2.5 - PM10)isBag filter，Its Technical efficiency of end-of-pipe management97
  污染物指标颗粒物的末端治理技术是袋式除尘，其效率为97，末端治理设施实际运行率（k值）计算公式为k=除尘设备年正常运行时间（小时）/生产系统年生产运行时间（小时）。原文件中描述污染物类别为废气，污染物指标为颗粒物，此处对其进行了匹配工作，将其匹配到LCAflow库里面相最符合的流，污染物指标备注为颗粒物，产污系数备注为为焙烧窑污染物指标
- particles (PM2.5 - PM10): 1.68
  the Technical of end-of-pipe management technology for pollution particles (PM2.5 - PM10)isBag filter，Its Technical efficiency of end-of-pipe management96
  污染物指标颗粒物的末端治理技术是袋式除尘，其效率为96，末端治理设施实际运行率（k值）计算公式为k=除尘设备年正常运行时间（小时）/生产系统年生产运行时间（小时）。原文件中描述污染物类别为废气，污染物指标为颗粒物，此处对其进行了匹配工作，将其匹配到LCAflow库里面相最符合的流，污染物指标备注为颗粒物，产污系数备注为为精炼炉污染物指标
- Nitrogen oxides: 4.5
  the Technical of end-of-pipe management technology for pollution Nitrogen oxidesisDirect discharge，Its Technical efficiency of end-of-pipe management0
  污染物指标氮氧化物的末端治理技术是直排，其效率为0，末端治理设施实际运行率（k值）计算公式为/。原文件中描述污染物类别为废气，污染物指标为氮氧化物，此处对其进行了匹配工作，将其匹配到LCAflow库里面相最符合的流，污染物指标备注为氮氧化物，产污系数备注为为焙烧窑污染物指标
- chemical oxygen demand: 0.00986
  the Technical of end-of-pipe management technology for pollution chemical oxygen demandisPrecipitation separation + aerobic biological treatment，Its Technical efficiency of end-of-pipe management71
  污染物指标化学需氧量的末端治理技术是沉淀分离+好氧生物处理法，其效率为71，末端治理设施实际运行率（k值）计算公式为k=废水治理设备年正常运行时间（小时）/生产系统年运行时间（小时）。原文件中描述污染物类别为废水，污染物指标为化学需氧量，此处对其进行了匹配工作，将其匹配到LCAflow库里面相最符合的流，污染物指标备注为化学需氧量
- sulfur dioxide: 25
  the Technical of end-of-pipe management technology for pollution sulfur dioxideisDirect discharge，Its Technical efficiency of end-of-pipe management0
  污染物指标二氧化硫的末端治理技术是直排，其效率为0，末端治理设施实际运行率（k值）计算公式为/。原文件中描述污染物类别为废气，污染物指标为二氧化硫，此处对其进行了匹配工作，将其匹配到LCAflow库里面相最符合的流，污染物指标备注为二氧化硫，产污系数备注为为焙烧窑污染物指标
- Exhaust gas: 30000
  the Technical of end-of-pipe management technology for pollution Exhaust gasis/，Its Technical efficiency of end-of-pipe management0
  污染物指标工业废气量的末端治理技术是/，其效率为0。原文件中描述污染物类别为废气，污染物指标为工业废气量，此处对其进行了匹配工作，将其匹配到LCAflow库里面相最符合的流，污染物指标备注为工业废气量，产污系数备注为为焙烧窑污染物指标
- Exhaust gas: 33200
  the Technical of end-of-pipe management technology for pollution Exhaust gasis/，Its Technical efficiency of end-of-pipe management0
  污染物指标工业废气量的末端治理技术是/，其效率为0。原文件中描述污染物类别为废气，污染物指标为工业废气量，此处对其进行了匹配工作，将其匹配到LCAflow库里面相最符合的流，污染物指标备注为工业废气量，产污系数备注为为精炼炉污染物指标

## Use advice
This dataset is derived from the Pollution Source Census Report and contains information on pollution emissions and related products. However, it does not include data on energy or chemical consumption, nor does it provide information on waste or co-product generation. When utilizing this dataset, please supplement the missing data based on actual conditions before use
该数据集来源于污染源普查报告，包含污染物排放及相关产品信息，但不包含能源或化学品消耗数据，也不提供废弃物或共生产物产生信息。在使用该数据集时，请根据实际情况补充缺失数据后再使用。

## Review details
Inventory: The internal review was done by several iteration steps concerning raw data validation, raw data documentation, representativity, completeness and consistency of modelling with regard to ISO 14040 and 14044.
清单： 内部审查通过几个迭代步骤完成，涉及原始数据验证、原始数据记录、代表性、完整性、与 ISO 14040 和 14044 有关的建模的一致性。

## Data sources
- 第二次全国污染源普查产排污核算系数手册（试用版）,四级代码3140文件，在完整版文件中第4822页
