# Municipal sludge treatment and disposal;wet sludge moisture coontent 70%-75%;drying-incineration

Dataset: ILCD process, Unit process, single operation
Geography: GZ-GD-CN
Classification: Unit processes / End-of-life treatment / Waste water treatment
Functional unit: The life cycle study boundary starts from the wet sludge (moisture content is about 70% ~ 75%) after mechanical compression and dewatering in the sewage treatment plant to the final disposal functional unit adopts 1t wet sludge after mechanical compression.
Generated by: Jin Sitian, 2331276@tongji.edu.cn
Owner: Tiangong LCI Data Working Group
Review: Dependent internal review by Tiangong LCI Data Working Group
Amounts: no units in this file; such an amount is in the reference unit of its flow, which a separate flow dataset defines
copyright: ['opt4ROkqig']
licenseType: Free of charge for all users and uses

## General comment
Taking a wastewater treatment plant in Guangzhou as an example, the daily sewage treatment capacity of the plant is 250,000 t/d, and the daily output of wet sludge after mechanical compression is 90 t/d. It is assumed that the plant is equipped with a low-pressure small bubbling fluidized bed boiler for sludge reduction and harmless incineration.

## Technology and included processes
The system uses hollow paddle technology for sludge drying, and the saturated steam (0.4MPa, 150°C) produced by the incinerator is used as the dry heat source of the sludge, reducing the moisture content of the wet sludge from 70.5% to about 40%, and then blending with coal for incineration. The combined process can achieve self-equilibrium of energy, drying 90t/day wet sludge requires a boiler steam volume of 3.6t/h, a boiler exhaust gas temperature of 160°C, and a boiler efficiency of 72.82%. In order to meet the heat balance, 7.65t/day of anthracite needs to be blended.

## Technical purpose
The described industrial process is intended for the treatment and final disposal of municipal sludge with a moisture content of 70%-75%. This entails mechanical compression for dewatering followed by drying and incineration. The process is used within facilities that manage waste from sewage treatment plants, converting high-moisture sludge into a reduced volume of ash suitable for final disposal. Applicable in scenarios where waste management protocols demand the reduction of sludge volume and the mitigation of potential environmental impacts.

## Reference product
- Sludge: 1000; input; estimated
  1t wet sludge (moisture content around 70% to 75%)

## Inputs
- hard coal; 26.3 MJ/kg: 85; calculated
- Electricity: 398.304; measured

## Outputs
- carbon monoxide (biogenic): 0.38; calculated
  The original text does not distinguish between biogenic and fossil, and according to experts, it is biogenic here.
- carbon dioxide (biogenic): 506.18; calculated
  (same comment as for carbon monoxide (biogenic))
- Nitrogen oxides: 1.29699; calculated
- sulfur oxides: 0.99222; calculated
- hydrogen chloride: 0.00018; calculated
- Flue dust: 0.28; measured
  soot

## Use advice
When using this data set for Life Cycle Assessment, ensure that the system boundaries include the mechanical compression and dewatering of sludge as well as the drying and incineration phases. Modeling the transport and handling within the plant is also essential. The functional unit should be consistently applied as 1 ton of wet sludge post-mechanical compression. Users should give special consideration to the emissions produced during the incineration phase and contemplate potential energy recovery aspects, which could influence the overall environmental impact assessment.

## Review details
Inventory: The internal review was done by several iteration steps concerning raw data validation, raw data documentation, representativity, completeness and consistency of modelling with regard to ISO 14040 and 14044.

## Data sources
- 廖艳芬,漆雅庆,马晓茜.城市污水污泥焚烧处理环境影响分析[J].环境科学学报,2009,29(11):2359-2365.DOI:10.13671/j.hjkxxb.2009.11.015.
