# Carbon disulfide ; Natural gas, sulfur ; Natural gas method ; All sizes; NESPS2 / 二硫化碳 ; 天然气、硫磺 ; 天然气法 ; 所有规模 ; 全国第二次污染普查数据

Dataset: ILCD process, Unit process, single operation
Geography: CN
Reference year: 2019
Classification: Reference Parameters / Energy carriers and technologies / Natural gas based fuels
Generated by: The data was created by the Office of the Second National Pollution Source Census of the Ministry of Ecology and Environment, and the data was organized by the TianGong Plan team for ILCD format / 生态环境部第二次全国污染源普查工作办公室创建数据，天工计划团队常慧敏整理数据为ILCD格式
Owner: Tiangong LCI Data Working Group / 天工LCI数据工作小组
Review: Dependent internal review by Tiangong LCI Data Working Group / 天工LCI数据工作小组
Amounts: no units in this file; such an amount is in the reference unit of its flow, which a separate flow dataset defines
copyright: false
licenseType: Free of charge for all users and uses

## General comment
the Technical of end-of-pipe management technology for pollution Carbon disulfideis/，Its Technical efficiency of end-of-pipe management0

## Technical purpose
本过程产生的二硫化碳，通过使用天然气和硫磺的天然气法，适用于需要使用二硫化碳的各种规模设施。通常用于制造玻璃纸、人造丝和生产橡胶化学品。该过程数据也可能与涉及农用化学品如除草剂、杀虫剂的行业相关。所述的末端处理技术包括生化处理和膜生物反应器（MBR），设计用于处理这些工业应用产生的废水，以及如化学需氧量（COD）和氨氮等污染物。

## Reference product
- Carbon disulfide: 1000; calculated
  源文件中描述为为二硫化碳，此处对其进行了匹配工作，将其匹配到LCAflow库里面相最符合的流，污染物指标备注为工业废水量

## Outputs
- Ammonia Nitrogen: 0.00017; calculated
  the Technical of end-of-pipe management technology for pollution Ammonia NitrogenisBiochemical treatment + MBR，Its Technical efficiency of end-of-pipe management99
  污染物指标氨氮的末端治理技术是生化+MBR膜，其效率为99，末端治理设施实际运行率（k值）计算公式为k=治理设施运行时间（小时/年）/正常生产时间（小时/年）。原文件中描述污染物类别为废水，污染物指标为氨氮，此处对其进行了匹配工作，将其匹配到LCAflow库里面相最符合的流，污染物指标备注为氨氮
- chemical oxygen demand: 0.0042; calculated
  the Technical of end-of-pipe management technology for pollution chemical oxygen demandisBiochemical treatment + MBR，Its Technical efficiency of end-of-pipe management97
  污染物指标化学需氧量的末端治理技术是生化+MBR膜，其效率为97，末端治理设施实际运行率（k值）计算公式为k=治理设施运行时间（小时/年）/正常生产时间（小时/年）。原文件中描述污染物类别为废水，污染物指标为化学需氧量，此处对其进行了匹配工作，将其匹配到LCAflow库里面相最符合的流，污染物指标备注为化学需氧量
- Waste water: 0.66; calculated
  the Technical of end-of-pipe management technology for pollution Waste wateris/，Its Technical efficiency of end-of-pipe management0
  污染物指标工业废水量的末端治理技术是/，其效率为0。原文件中描述污染物类别为废水，污染物指标为工业废水量，此处对其进行了匹配工作，将其匹配到LCAflow库里面相最符合的流，污染物指标备注为工业废水量

## Use advice
This dataset is derived from the Pollution Source Census Report and contains information on pollution emissions and related products. However, it does not include data on energy or chemical consumption, nor does it provide information on waste or co-product generation. When utilizing this dataset, please supplement the missing data based on actual conditions before use
该数据集来源于污染源普查报告，包含污染物排放及相关产品信息，但不包含能源或化学品消耗数据，也不提供废弃物或共生产物产生信息。在使用该数据集时，请根据实际情况补充缺失数据后再使用。

## Review details
Inventory: The internal review was done by several iteration steps concerning raw data validation, raw data documentation, representativity, completeness and consistency of modelling with regard to ISO 14040 and 14044.
清单： 内部审查通过几个迭代步骤完成，涉及原始数据验证、原始数据记录、代表性、完整性、与 ISO 14040 和 14044 有关的建模的一致性。

## Data sources
- 第二次全国污染源普查产排污核算系数手册（试用版）,二级代码26,四级代码2613文件，在完整版文件中第4111页
