# Contaminated Cd agricultural soil remediation;Phytoremediation;Sedum plumbizincicola;Monitoring during and after remediation;Soil Sample

Dataset: ILCD process, Unit process, black box
Geography: CN
Reference year: 2021
Classification: Other Services / Repair and maintenance
Generated by: Sang Chunhui, sangch@mail.bnu.edu.cn
Owner: Tiangong LCI Data Working Group
Review: Dependent internal review by Tiangong LCI Data Working Group
Amounts: no units in this file; such an amount is in the reference unit of its flow, which a separate flow dataset defines
copyright: false
licenseType: Free of charge for all users and uses

## General comment
Collect soil samples for testing to verify the remediation effect.

## Geography
Instead of clarifying specific locations, the paper indicated that contaminated agricultural field was located in Southern China.

## Time period
There is no clear start time for data collection in the literature, and the start time of the validity period is based on the publication time of the literature

## Technology and included processes
7 sample per hectare, according to HJ/T 166 ＆GB 15618. In total, 7 times of monitoring is conducted, including 5 times during remediation and 2 times after remediation.

## Technical purpose
The described industrial process is intended for the application of remediating cadmium (Cd) contaminated agricultural soils using the phytoremediation capabilities of Sedum plumbizincicola. This bioremediation technique is used to reduce the concentration of Cd in the soil, thus making it safer for agricultural use again and protecting the environment. The process includes monitoring both during and after the remediation to ensure the effectiveness of the treatment. It is applicable specifically to contaminated sites in Southern China where the peculiar conditions make Sedum plumbizincicola an appropriate choice for Cd uptake and accumulation.

## Reference product
- Soil Sample: 49; measured
  这里是采集的土壤样品数量，一共采集土壤样品49个，用于实验室检测

## Inputs
All rows: measured
- Road Transport: 41.16
- Nitric acid: 1.04784
- Hydrochloric Acid: 0.00314352
- Tap Water: 13.273
- Electricity: 162.396
- argon: 41.44

## Data selection and combination
Process inventory data were obtained in accordance with ISO 14040 on LCA.35 Primary data were obtained from site-specific pot experiments, pilot studies, and vendors, which were representative of situations in Southern China. Secondary data were obtained from the Ecoinvent database v2.3, from which processes of the most similar geographic origin and technological factors are selected.

## Use advice
When utilizing this data set for Life Cycle Assessment (LCA), ensure that the specific methodological framework set out in ISO 14040 is followed. Given that the data acquisition did not have a precise starting point, use the publication date of the source literature as the reference for the temporal boundary of the data. Special attention should be paid to the geographic specificity of the data, as the primary data are representative of Southern China conditions. When comparing with other remediation processes, consider the technological applicability, ensuring that similar geographic and technological factors are accounted for. The secondary data should only be used when matching processes of similar geographic origin and technological factors can be ensured from databases such as Ecoinvent. Always consider the methodological advice of including or excluding certain phases depending on the context of the LCA study, particularly monitoring frequency and sampling strategies as indicated in HJ/T 166 and GB 15618.

## Review details
Inventory: The internal review was done by several iteration steps concerning raw data validation, raw data documentation, representativity, completeness and consistency of modelling with regard to ISO 14040 and 14044.

## Data sources
- Jin et al. Integrated Life Cycle Assessment for Sustainable Remediation of Contaminated Agricultural Soil in China. Environ. Sci. Technol. 2021, 55, 17, 12032–12042.
