# cement production;cement, ordinary portland cement, 42.5MPa;new five-stage suspension preheater dry process, 1800 t-cl/d;mixed solid wastes

Dataset: ILCD process, Unit process, black box
Geography: SC-CN
Reference year: 2007
Classification: Unit processes / Materials production / Other mineralic materials
Generated by: #REF!, ysqsophia@gmail.com
Owner: Tiangong LCI Data Working Group
Review: Dependent internal review by Tiangong LCI Data Working Group
Amounts: no units in this file; such an amount is in the reference unit of its flow, which a separate flow dataset defines
copyright: false
licenseType: Free of charge for all users and uses

## General comment
Use the existing land, some equipment, technology, management and other resources to make technological transformation, and adopt advanced new five-stage suspension preheater dry process to newly build a F3.3x50 m, with limestone and electric slag as the main raw materials, the daily output of 1,800 tons of cement clinker of the new dry process rotary kiln cement production line. It can use 123,426 tons of industrial waste slag annually, of which 8222 tons of calcium carbide slag and 4,1204 tons of ferroalloy slag, which turns waste into treasure, reduced environmental pollution. Environmental load (pollutant emissions) data includes more specific data of the unit process, which is not recorded. Only the cement production unit process is considered.Calcium carbide slag cement is the use of calcium carbide slag and limestone, silica raw materials, iron raw materials into the vertical mill after the ingredients into the raw material powder, and then the use of more stable operation of the new five-stage suspension preheater dry process to produce cement.

## Geography
A cement manufacturer in Sichuan Province

## Technology and included processes
The carbide slag cement studied in this paper is made by batching carbide slag with limestone, siliceous raw materials, and iron raw materials into a vertical mill to make raw meal powder, and then using a new five-stage suspension preheater dry process with relatively stable operation to produce cement. Contains process flow diagram and detailed introduction.

## Technical purpose
The cement produced by this industrial process is ordinary Portland cement with a strength grade of 42.5MPa. It is suitable for construction purposes such as general building works, reinforced concrete, precast structural elements, and road construction. The unique feature of this process is the utilization of industrial waste slag, including carbide slag and ferroalloy slag, thus providing an eco-friendlier alternative to traditional cement manufacturing.

## Model description
One functional unit is 42.5 kilograms of ordinary Portland cement, that is, 1Fu=1kgP·O42.5 ordinary Portland cement. The research scope ranges from raw meal preparation, clinker calcining and grinding to cement storage, mainly considering the environmental impact of the cement production process.

## Reference product
- cement, ordinary portland cement, 42.5MPa: 1000
  Carbide slag cement. P.042.5 Ordinary silicate cement.

## Inputs
- limestone, crushed, for mill: 741.7
  Limestone. Transported by truck, 15km.
- shale: 70.4
  Shale. Transported by truck, 15km.
- sandstone: 78.56
  Sandstone. Transported by truck, 15km.
- Carbide slag: 137.04
  Calcium carbide slag. Transported by truck, 40km.
- iron, powder: 18.96
  Iron powder. Transported by truck, 190km.
- gypsum stone (CaSO4-dihydrate): 24.07
  Gypsum. Transported by truck, 45km.
- Ferroalloy slag: 68.67
  Ferroalloy slag. Transported by truck, 20km.
- hard coal; 26.3 MJ/kg: 99.58
  Coal. Transported by truck, 34km.
- Electricity: 360
  Electricity.

## Outputs
- carbon dioxide (fossil): 645.3
  CO2. It only involves the production stage (calculation).
- sulfur dioxide: 0.049
  SO2. It only involves the production stage (measured).
- Nitrogen oxides: 1.95
  NOx. It only involves the production stage (measured).
- particles (> PM10): 2.585
  Dust, with an unspecified particle size, is treated as PM > 10 micrometers in diameter. It only involves the production phase (calculation: the data after dust removal treatment divided by the dust removal efficiency).

## Sampling procedure
Adopting advanced new five-stage suspended preheater dry process technology, a new dry process rotary kiln cement production line with a F3.3x50m, using limestone and carbide slag as the main raw materials, with a daily output of 1,800 tons of cement clinker, can utilize industrial waste slag annually. 123,426 tons, including 8,222 tons of carbide slag and 41,204 tons of ferroalloy slag.

## Use advice
Users of this Life Cycle Assessment data should account for the methodological aspects specific to this cement production process, such as the inclusion of industrial waste slag in the raw materials. The environmental impact of using these waste materials should be considered, ensuring accurate representation of the entire production process. The scope of analysis should span from raw meal preparation to cement storage, encompassing all environmental outputs related to the process. When comparing to other cement production data sets, attention should be given to the technological specificities, namely, the advanced new five-stage suspension preheater dry process used and the use of waste slag as a raw material.

## Review details
Inventory: The internal review was done by several iteration steps concerning raw data validation, raw data documentation, representativity, completeness and consistency of modelling with regard to ISO 14040 and 14044.

## Data sources
- 王超. (2007). 电石渣水泥和石灰石水泥生命周期评价的比较研究 [硕士, 西南交通大学].
