# Soil remediation ; Ex-situ remediation ; Chemical oxidation ; Project implementation ; Soil conditioning ; Remediated soil

Dataset: ILCD process, Unit process, single operation
Geography: AH-CN
Reference year: 2023
Classification: Unit processes / Other Services / Repair and maintenance
Generated by: Sang Chunhui, sangch@mail.bnu.edu.cn
Owner: Tiangong LCI Data Working Group
Review: Dependent internal review by Tiangong LCI Data Working Group
Amounts: no units in this file; such an amount is in the reference unit of its flow, which a separate flow dataset defines
copyright: false
licenseType: Free of charge for all users and uses

## General comment
Add appropriate amount of water, oxidizer, etc. to the contaminated soil for oxidation

## Geography
Iron and steel mill site contaminated with a combination of heavy metals and organic matter in Hefei, Anhui Province, China

## Technology and included processes
Oxidative restoration using chemical oxidation technology

## Technical purpose
This dataset provides details for the ex-situ soil remediation process by chemical oxidation to treat contaminated soil from an iron and steel mill site with a combination of heavy metals and organic matter pollution. It is applicable for environmental engineering projects aiming to restore heavy metal and organically polluted sites to safe and usable conditions.

## Reference product
- Remediated soil: 29437.9; estimated
  处理后土壤

## Inputs
- Tap Water: 1.2582e7; estimated
- hydrogen peroxide: 1.179e6; estimated
- Diesel: 4.569; estimated
- Excavated soil,Excavated soil: 29437.9; estimated

## Use advice
To correctly utilize this dataset in Life Cycle Assessment, users must take into account that it represents the specific case of a soil remediation project in Hefei, Anhui Province, China. When applying this data, users should adjust the volume of materials to reflect the particular contamination level and soil characteristics of their project site. The methodological focus should be on the complete inclusion of inputs (water, oxidants, and any other chemicals) for the soil conditioning phase and accurate quantification of the output (remediated soil). Assumptions about technology applicability and environmental conditions similar to those at the Hefei site must be verified for the data to be relevant.

## Review details
Inventory: The internal review was done by several iteration steps concerning raw data validation, raw data documentation, representativity, completeness and consistency of modelling with regard to ISO 14040 and 14044.

## Data sources
- 桑春晖,杨欣桐,李香兰等.基于SEFA方法的异位土壤修复环境足迹分析——以某钢铁厂为例[J].中国环境科学,2023,43(10):
