# Clean site Electrokinetic approach ; Soil in-situ remediation

Dataset: ILCD process, Unit process, black box
Geography: IT
Reference year: 2021
Classification: Unit processes / Other Services / Repair and maintenance
Generated by: Yang Xintong, yangxt@caep.org.cn
Owner: Tiangong LCI Data Working Group
Review: Dependent internal review by Tiangong LCI Data Working Group
Amounts: no units in this file; such an amount is in the reference unit of its flow, which a separate flow dataset defines
copyright: false
licenseType: Free of charge for all users and uses

## General comment
This in-situ intervention aims at the extraction of species from the contaminated soil, through their electrokinetic migration towards the extraction wells. In more detail, energy is supplied by applying an electric field of adequate intensity to push the ions and electrically charged particles towards the electrodes of opposite polarity, which are inserted into the soil and encapsulated in special extraction wells that allow the removal of the process water. A suitable electrolytic solution is poured into the soil to assist in the mobilization of the polluting species through complexation phenomena.

## Geography
The site taken as a reference for the remediation is an area of 712 m2 located in a disused industrial district of Tuscany (Italy), in the past subjected to various productive activities that led to contamination with various metals, some of which potentially toxic such as lead (Pb), arsenic (As) and thallium (Tl). As it is a “site of national interest”, its exact location is considered confidential and cannot be disclosed.

## Technical purpose
This soil in-situ remediation process using the electrokinetic approach is intended for the extraction of contaminants such as heavy metals from polluted soil in industrial areas, particularly sites that are classified as being of national interest where confidentiality is important. It is suitable for sites with a history of industrial activity, where metals like lead (Pb), arsenic (As), and thallium (Tl) have contaminated the soil.

## Reference product
- Remedied site: 712

## Inputs
- Electrode,Electrodes: 101.8
- Polyvinyl chloride: 4009.7
- polypropylene fibres (PP): 131.3
- Potassium iodide: 1872
- Nitric acid,Nitric acid: 31.6
- Tap Water: 586
- Electricity: 2.13551e6

## Outputs
- waste water - untreated: 575.4

## Use advice
When using this data set for Life Cycle Assessment (LCA), ensure it is applicable to the remediation site's context in terms of soil type, contaminant profile, and scale; 712 m2 as a referenced area. Apply the data cautiously if your site conditions differ significantly. This dataset does not make provision for subsequent land use post-remediation, and hence, users should account for such uses separately in the LCA. Additionally, it does not cover the recycling of materials or energy use beyond the electrokinetic remediation scope. The confidential nature of the location should be respected in the reporting and dissemination of results.

## Review details
Inventory: The internal review was done by several iteration steps concerning raw data validation, raw data documentation, representativity, completeness and consistency of modelling with regard to ISO 14040 and 14044.

## Data sources
- Vocciante, M., De Folly D’Auris, A., Franchi, E., Petruzzelli, G. & Ferro, S. CO2 footprint analysis of consolidated and innovative technologies in remediation activities. J Clean Prod 297, 126723 (2021).
