# Municipal sludge treatment and disposal;sludge;Cement kiln co-disposal

Dataset: ILCD process, Unit process, single operation
Geography: CN
Classification: Unit processes / End-of-life treatment / Waste water treatment
Functional unit: In this study, the disposal of 1t municipal sludge was selected as the functional unit.
Generated by: Jin Sitian, 2331276@tongji.edu.cn
Owner: Tiangong LCI Data Working Group
Review: Dependent internal review by Tiangong LCI Data Working Group
Amounts: no units in this file; such an amount is in the reference unit of its flow, which a separate flow dataset defines
copyright: ['opt4ROkqig']
licenseType: Free of charge for all users and uses

## General comment
In terms of prospect data, the resource and energy consumption of cement kiln co-disposal are derived from the statistics of the year before and after the implementation of the co-disposal technology of typical cement production lines in the Beijing-Tianjin-Hebei region.

## Geography
Beijing-Tianjin-Hebei region

## Technology and included processes
The sludge contains urea and other components, which can react with the NOx generated in the cement clinker production process to reduce the NOx into nitrogen and water to play a role in denitrification.

## Technical purpose
The described industrial process is intended for the treatment and co-disposal of municipal sludge within the cement kiln. This process is specific to the Beijing-Tianjin-Hebei region in China and denotes the handling of sludge as a part of cement production, wherein 1 ton of municipal sludge is the basic unit of measurement indicating the process's capacity and effectiveness.

## Reference product
- Sludge: 1000; input; estimated

## Inputs
- Energy, gross calorific value, in biomass, primary forest: 334; measured
- unspecified: 0.544; measured

## Outputs
- carbon dioxide (fossil): 45.6; calculated
  The original text does not distinguish between biogenic and fossil, and according to experts, it is fossil here.
- Nitrogen oxides: -9.36; calculated

## Use advice
When utilizing this data set, it is crucial to account for regional characteristics and the technological specificity of cement kiln co-disposal in the Beijing-Tianjin-Hebei region. The data should be applied only to scenarios with analogous industrial settings. Attention should be given to the methodological framework of the Life Cycle Assessment, focusing on the defined functional unit of 1 ton of municipal sludge to ensure consistent and relevant application.

## Review details
Inventory: The internal review was done by several iteration steps concerning raw data validation, raw data documentation, representativity, completeness and consistency of modelling with regard to ISO 14040 and 14044.

## Data sources
- 丁冠元,刘宇,王亚丽等.水泥窑协同处置污泥的环境负荷分析[J].中国水泥,2021(03):81-84.
