# Milk production ; packaging

Dataset: ILCD process, Unit process, single operation
Geography: CC-JL-CN
Reference year: 2006
Classification: Unit processes / Materials production / Food and renewable raw materials
Functional unit: 1t milk
Generated by: Rui Yang, 1632707028@qq.com
Owner: Tiangong LCI Data Working Group
Review: Dependent internal review by Tiangong LCI Data Working Group
Amounts: no units in this file; such an amount is in the reference unit of its flow, which a separate flow dataset defines
copyright: false
licenseType: Free of charge for all users and uses

## General comment
According to the research scope of this paper, the milk production life cycle is divided into the following two subsystems: production and packaging. Due to the relatively concentrated production workshop inside the enterprise, the environmental impact caused by material transportation is negligible.

## Geography
The research object of this paper is the ordinary bagged milk sold in a city in Changchun area

## Technology and included processes
This paper considers only the processes directly related to the purpose of the study and the functional units, and does not consider the various stages outside the plant that generate environmental loads

## Technical purpose
The technical use described here is the production and packaging of ordinary bagged milk intended for consumption, which is part of the life cycle assessment of milk produced and marketed in the Changchun area. The milk is used as a consumable in the food industry and is particularly formatted for everyday retail and consumption.

## Reference product
- milk: 1000
  finished milk

## Inputs
All rows: measured
- Plastic (unspecified): 13.6
  plastic bag
- Plastic (unspecified): 1.5
  sealing film
- Plastic (unspecified): 4854
  straw straw
- Plastic (unspecified): 4854
  plastic label
- cartonboard boxes; mixed technology; production mix, a plant, 46% primary fibre, 54% recovered fibre: 135
  carton
- Electricity: 83.88
- water: 4122
- process steam: 151.4

## Outputs
All rows: measured
- carbon dioxide (fossil),carbon dioxide (fossil): 285
- carbon monoxide (fossil): 0.4
- sulfur dioxide: 2.1
- nitrogen, total (excluding N2): 0.9
  Nitrogen oxides
- ammonia: 0.15
- particles (> PM10): 2.65
- municipal solid waste deposition: 21.9

## Deviations from the LCI method approaches
In this paper, according to the relevant ISO standards, LCA method was used to analyze the consumption and environmental emissions at each stage of milk production, establish the basic database of milk production life cycle, identify the relative size of the environmental impact of each stage of milk, and find out the main factors of environmental impact. Therefore, it provides opportunities and ways for milk enterprises to implement clean production and improve the environmental performance of milk production.

## Use advice
When utilizing the life cycle assessment data of the milk production process, consider the scope strictly confined to production and packaging within the enterprise. The environmental impacts of material transportation within the production site are deemed insignificant. Exclusions include processes outside the facility that contribute to the environmental load. For accurate LCA results, comply with the relevant ISO standards for consumption analysis and environmental emissions associated with each stage of milk production. Use the identified environmental impact factors for the improvement of clean production practices and enhancement of the environmental performance in the milk industry.

## Review details
Inventory: The internal review was done by several iteration steps concerning raw data validation, raw data documentation, representativity, completeness and consistency of modelling with regard to ISO 14040 and 14044.

## Data sources
- 秦凤贤. 生命周期评价在牛奶生产中的应用研究. 乳业科学与技术 224–226 (2006).
