# copper production;Secondary copper;pyrometallurgical production;mixed waste copper

Dataset: ILCD process, Unit process, single operation
Geography: CN
Reference year: 2010
Classification: Unit processes / Materials production / Metals and semimetals
Functional unit: Functional unit: 1 kg copper
LCI method principle: Attributional
LCI method approaches: Allocation - market value
Generated by: Peng Wang, 2867919560@qq.com
Owner: Tiangong LCI Data Working Group
Review: Dependent internal review by Tiangong LCI Data Working Group
Amounts: no units in this file; such an amount is in the reference unit of its flow, which a separate flow dataset defines
copyright: false
licenseType: Free of charge for all users and uses

## General comment
This dataset represents the life cycle assessment (LCA) data for pyrometallurgical production of secondary copper from mixed waste copper which is used for various applications such as electrical wires, roofing and plumbing, industrial machinery, and in alloy compositions. The data illustrates the average production processes and energy considerations from China’s copper industry and can inform both small-scale and industrial-scale copper recovery operations.

## Geography
the present study included the data of imported copper and statistical data that represents China’s average situation instead of a typical enterprise for each constituent process of the three copper production routes, especially with respect to energy and resource use in foreground processes and electricity production in background processes.

## Time period
Chinese copper demand projections from 2010 to 2050.

## Reference product
- Refined copper: 1; software or database

## Inputs
All rows: software or database
- Electricity: 1.4796
- Diesel: 0.0088
- Limestone: 0.0739
- sulphuric acid: 0.0068
  Sulfuric acid
- hard coal,hard coal,hard coal: 0.186
  Hard coal
- natural gas,natural gas,natural gas: 0.492
  Natural gas
- oxygen: 0.0914
  Oxygen
- Domestic-copper scrap: 1.31
  Domestic copper scrap needs to be supplemented
- Imported-copper scrap: 0.573
  Imported-copper scrap needs to be supplemented
- water: 1.17

## Outputs
All rows: software or database
- sulfur dioxide: 0.003
  Sulfur dioxide
- waste water - untreated: 0.001
  Waste water
- carbon dioxide (fossil): 1.59
  原文未区分bio和fossil，根据专家判断此处为fossil
- carbon monoxide,carbon monoxide (fossil): 0.002
  原文未区分bio和fossil，根据专家判断此处为fossil
- particles (PM2.5 - PM10): 0.000282
  Particulates
- water: 0.000176
- zinc: 0.000375

## Deviations from the LCI method approaches
The life cycle environmental impacts were conducted using the CMLCA 6.0 software and the CML2001 impact categories

## Data selection and combination
Data sources were summarized in Tables 2 and 3 The data on electricity production and other processes related to copper production in the background system were derived from the ecoinvent v3.4 database,

## Data treatment and extrapolations
Ecoinvent v3.4 database-cradle to gate

## Use advice
When using this dataset, users should consider that the data reflects average conditions within the Chinese copper industry rather than performance of specific enterprises. The projections should not be assumed to hold under all circumstances and may require adjustment for localized conditions or updates over time. It's intended for life cycle inventory analysis within a cradle-to-gate scope using the CMLCA 6.0 software and CML2001 impact categories. The data is particularly relevant for energy and resource use in the foreground processes and is based on ecoinvent v3.4. Users should ensure to reference the appropriate tables (2 and 3) for respective data sources and methodological context before application.

## Review details
Inventory: The internal review was done by several iteration steps concerning raw data validation, raw data documentation, representativity, completeness and consistency of modelling with regard to ISO 14040 and 14044.

## Data sources
- Dong, D., Van Oers, L., Tukker, A. & Van Der Voet, E. Assessing the future environmental impacts of copper production in China: Implications of the energy transition. Journal of Cleaner Production 274, 122825 (2020).
