# Benzene Production ; Benzene ; Naphtha Route ; Naphtha

Dataset: ILCD process, Unit process, black box
Geography: CN
Reference year: 2006
Classification: Unit processes / Materials production / Organic chemicals
Functional unit: A functional unit is defined as 1 ton of benzene product
LCI method principle: Attributional
LCI method approaches: Allocation - mass
Generated by: Yanan Ren, renyn15@tsinghua.org.cn
Owner: Tiangong LCI Data Working Group
Review: Dependent internal review by Tiangong LCI Data Working Group
Amounts: no units in this file; such an amount is in the reference unit of its flow, which a separate flow dataset defines
copyright: false
licenseType: Free of charge for all users and uses

## General comment
Aromatics Complex, Arosa Grammar Process

## Geography
On-site research and data collection were carried out on the operation status and environmental load of the p-xylene production process

## Time period
Not mentioned, replaced by the publication time of the document

## Technical purpose
Benzene produced through the naphtha route in the Aromatics Complex, leveraging the Arosa Grammar Process, is primarily intended for applications in the synthesis of various chemicals, including the production of p-xylene, which is a precursor for large-scale industrial production of polyethylene terephthalate (PET) and other polymers. It might also be used in the production of several types of resins, nylon, rubbers, lubricants, dyes, detergents, drugs, and pesticides. This specific data set refers to the benzene produced for such chemical synthesis applications.

## Reference product
- benzene: 1; measured

## Inputs
- naphtha: 0.68; measured
- light fuel oil: 0.27; measured
  fuel oil
- Electricity: 0.072; measured
  electricity

## Outputs
All rows: measured
- waste water - untreated: 0.11
  Total wastewater
- Oils, unspecified: 1e-5
  Petro
- chemical oxygen demand: 0.00124
  COD
- sulfur dioxide: 0.0018
  SO2
- nitrous oxide: 0.00413
  NOx
- carbon monoxide (fossil): 0.00363
  CO
- carbon dioxide (fossil): 0.74
  CO2
- particles (> PM10): 0.00189
  soot

## Deviations from the LCI method approaches
Study adopting product quality as allocation principle for inventory data

## Data treatment and extrapolations
Quantification of environmental load between products and by-products using mass allocation method

## Use advice
When utilizing this data set for Life Cycle Assessment (LCA) purposes, users should apply the mass allocation method to allocate the environmental burden between benzene and its by-products accordingly. It is important to note that the functional unit defined for this data is 1 ton of benzene product. Hence, all results obtained should be interpreted based on this functional unit. The operation status and environmental load are based on on-site research and data collection, and if not explicitly mentioned, the reference time for the data is the publication time of the supporting document. Users should ensure their study considers product quality as the inventory data allocation principle when applicable.

## Review details
Inventory: The internal review was done by several iteration steps concerning raw data validation, raw data documentation, representativity, completeness and consistency of modelling with regard to ISO 14040 and 14044.

## Data sources
- 马骕. 涤纶纺织品的生命周期评价. (东华大学, 2007).
