# Groundwater ex-situ remediation ; Groundwater pump and treat ; construction ; Extraction well

Dataset: ILCD process, Unit process, single operation
Geography: DK
Reference year: 2021
Classification: Unit processes / Other Services / Repair and maintenance
Generated by: Wang Ning, wang_ning@caep.org.cn
Owner: Tiangong LCI Data Working Group
Review: Dependent internal review by Tiangong LCI Data Working Group
Amounts: no units in this file; such an amount is in the reference unit of its flow, which a separate flow dataset defines
copyright: false
licenseType: Free of charge for all users and uses

## General comment
Construction of pumping wells using HDPE, concrete, gravel, pumps, etc.

## Technology and included processes
Construction of extraction wells using electricity, concrete, gravel, HDPE

## Technical purpose
The process described is used for constructing extraction wells as part of a groundwater ex-situ remediation system. These wells are typically used to pump and treat contaminated groundwater, isolating and removing pollutants from affected aquifers. The construction involves the utilization of high-density polyethylene (HDPE), concrete, gravel, and pumps.

## Reference product
- Extraction wel: 1; input; estimated

## Inputs
- polyethylene high density granulate (PE-HD): 40; estimated
- Electricity: 2300; estimated
- cement, unspecified: 200; estimated
- gravel: 330; estimated

## Use advice
When using this data set for Life Cycle Assessment (LCA), ensure to account for the extraction and production of materials (HDPE, concrete, gravel) as well as the energy consumption required for the construction of the extraction wells. This data should be integrated with the operational phase of the remediation system and eventual decommissioning. Consider geographic specificity and the technological applicability of the well construction methodology used, as it can vary significantly.

## Review details
Inventory: The internal review was done by several iteration steps concerning raw data validation, raw data documentation, representativity, completeness and consistency of modelling with regard to ISO 14040 and 14044.

## Data sources
- Sustainable remediation assessment of a chlorinated ethene plume: method evelopment, application, and assessment
