# Carbon anode manufacturing-aluminum electrolysis carbon anode production ; carbon anode ; green pressed coke

Dataset: ILCD process, Unit process, single operation
Geography: CN
Reference year: 2019
Classification: Unit processes / Materials production / Non-energetic raw materials
Generated by: Chenling Fu, fu-chenling@tsinghua.edu.cn
Owner: Tiangong LCI Data Working Group
Review: Dependent internal review by Tiangong LCI Data Working Group
Amounts: no units in this file; such an amount is in the reference unit of its flow, which a separate flow dataset defines
copyright: false
licenseType: Free of charge for all users and uses

## General comment
The carbon anodes manufactured through this process are specifically designed for use in aluminum electrolysis. They are produced using green pressed coke, which indicates that they are intended for the aluminum smelting industry, wherein they function as a key component in the extraction of aluminum metal from its oxide ore during the electrolytic reduction process.

## Time period
Date of publication

## Reference product
- anode, for metal electrolysis: 1000; software or database
  anode

## Inputs
All rows: software or database
- electricity, high voltage, aluminium industry: 378
- Metallurgical Coke: 70
  metallurgical coke
- Natural Gas: 79.3
  natural gas
- Water, unspecified natural origin: 5150
- green-pressing: 1140

## Outputs
All rows: software or database
- carbon dioxide (fossil),carbon dioxide (fossil): 130
- municipal solid waste: 70
- particles, unspecified: 4.83
- chemical oxygen demand: 1.9
- sulfur dioxide: 0.00073
- carbon monoxide (fossil),carbon monoxide (fossil): 0.00238
- Nitrogen oxides: 0.00055
- methane (fossil): 0.0047

## Use advice
When utilizing this data set for Life Cycle Assessment (LCA), it is critical to ensure that the specific operating conditions of the aluminum electrolysis process are compatible with the properties of the carbon anodes described. Users should consider the environmental impact of anode production, including potential emissions and resource consumption. Special attention should be paid to the end-of-life phase of carbon anodes, where the inclusion or exclusion of recycling processes can significantly affect the results of the LCA. Additionally, the data should be used within the context of technological advancements and published date to ensure relevance.

## Review details
Inventory: The internal review was done by several iteration steps concerning raw data validation, raw data documentation, representativity, completeness and consistency of modelling with regard to ISO 14040 and 14044.

## Data sources
- YANG, Y., GUO, Y.-Q., ZHU, W.-S. & HUANG, J.-B. Environmental impact assessment of China’s primary aluminum based on life cycle assessment. Trans Nonferrous Met Soc China 29, 1784–1792 (2019).
