# Aluminum electrolysis carbon anode production ; Carbon anode ; Petroleum coke ; 2008

Dataset: ILCD process, Unit process, single operation
Geography: CN
Reference year: 2021
Classification: Unit processes / Materials production / Inorganic chemicals
Generated by: Zimeng Cai, caizm6178@163.com
Owner: Tiangong LCI Data Working Group
Review: Dependent internal review by Tiangong LCI Data Working Group
Amounts: no units in this file; such an amount is in the reference unit of its flow, which a separate flow dataset defines
copyright: false
licenseType: Free of charge for all users and uses

## General comment
The technical usage of the carbon anode produced from the aluminum electrolysis process using petroleum coke as described in the data set is primarily for electrolytic aluminum production. Carbon anodes are consumed in the Hall-Héroult process, which is the industry standard method for producing aluminum from alumina. These carbon anodes are designed to operate at high temperatures and are integral to the aluminum smelting operation.

## Time period
Date of publication

## Reference product
- anode, for metal electrolysis: 1000; software or database
  anode

## Inputs
All rows: software or database
- electricity, high voltage, aluminium industry: 759.6
  electricty
- heavy fuel oil: 69
  fuel oil
- coal tar: 220
  coal tar pitch
- Petroleum Coke: 1140
  petroleum coak
- coal gas: 1290

## Data selection and combination
The data in this study refers to the LCA data of PA, SA, electricity, and other background data. The PA data were obtained from statistical data sources, and the SA data were mainly obtained from the literatures. The background data were mainly derived from the Chinese localization LCA database CAS RCEES 2018, which was established by the Research Center for Eco-Environmental Sciences, Chinese Academy of Sciences and covers LCA data for energy, materials, transportation, waste management etc.

## Use advice
Users applying the LCA data need to account for technological changes in carbon anode production processes since 2008. The data should be utilized for the specific application of aluminum production and should not be generalized to other processes without proper validation. Furthermore, the user should consider the regional context as the background data is localized to the Chinese market. Where applicable, adjust for differences in technology and production practices when extrapolating to other regions or more recent time frames.

## Review details
Inventory: The internal review was done by several iteration steps concerning raw data validation, raw data documentation, representativity, completeness and consistency of modelling with regard to ISO 14040 and 14044.

## Data sources
- Ding, N., Liu, N., Lu, B. & Yang, J. Life cycle greenhouse gas emissions of aluminum based on regional industrial transfer in China. J. Ind. Ecol. 25, 1657–1672 (2021).
