# Crude steel production; steel ; Steel production

Dataset: ILCD process, Unit process, single operation
Geography: SD-CN
Reference year: 2018
Classification: Unit processes / Materials production / Metals and semimetals
Generated by: Wanghuanyu, wanghuanyu00@126.com
Owner: Tiangong LCI Data Working Group
Review: Dependent internal review by Tiangong LCI Data Working Group
Amounts: no units in this file; such an amount is in the reference unit of its flow, which a separate flow dataset defines
copyright: false
licenseType: Free of charge for all users and uses

## General comment
This data set represents the process of producing crude steel, which is an intermediate material used in the steel industry. Crude steel is the raw material for various downstream processing steps that result in finished steel products used in construction, automotive manufacturing, shipbuilding, machinery, and appliances.

## Reference product
- iron: 1000; measured

## Inputs
All rows: measured
- mineral extraction site: 20
- dolomite: 170
- Limestone: 270
- Refined lime: 4.05
- pebble: 4.05
  Pebble Cobble
- Ferrosilicon: 0.7
- Ferromanganese: 2.82
- manganese: 6.9
  Silicomanganese
- Silicomanganese: 0.02
  Aluminum wire
- magnesium: 4.1
  Light burning magnesium bal
- electrode: 0.23
  Electrode
- Deoxidizer: 0.54
- Iron powder: 360
- Rich ore powde: 1320
  Rich ore powder
- hard coal,hard coal: 990
- freshwater,freshwater: 3580
- Electricity: 1115.6
- iron: 360
  Other ferrous materials

## Outputs
All rows: measured
- phenol,Sulphur oxides (as SO2): 0.93
- particles (PM10): 0.15
- nitrous oxide: 0.65
- 2,3,7,8-tetrachlorodibenzo-p-dioxin: 91.32
  Dioxins
- fluoride: 2890
- benzo[a]pyrene: 3.18
- sulfide: 0.02
- cyanide: 0.01
- Suspended solids, unspecified: 15.83
- LPG - liquefied petroleum gas: 1.33
- volatile organic compound: 0.03
  Volatile phenol
- Ammonia nitrogen: 1.12
- chemical oxygen demand: 0.0191
- Chemicals (unspecified): 0.09
  IHW
- waste incineration of municipal solid waste (MSW): 0.83

## Use advice
When utilizing this data set for Life Cycle Assessment, users should consider the technological and geographical specificity of the crude steel production process. Any assumptions regarding the efficiency of energy use, the source of raw materials, and the emissions associated with production need to be clearly defined and appropriate to the context of the assessment. The potential for recycling at the end of life of steel products should be carefully modelled, keeping in mind the energy demands and emissions reductions of recycling processes.

## Review details
Inventory: The internal review was done by several iteration steps concerning raw data validation, raw data documentation, representativity, completeness and consistency of modelling with regard to ISO 14040 and 14044.
