# Petroleum Coke Production ; Petroleum Coke ; Cradle

Dataset: ILCD process, Unit process, single operation
Geography: CN
Reference year: 2019
Classification: Unit processes / Energy carriers and technologies / Crude oil based fuels
Generated by: Zimeng Cai, caizm6178@163.com
Owner: Tiangong LCI Data Working Group
Review: Dependent internal review by Tiangong LCI Data Working Group
Amounts: no units in this file; such an amount is in the reference unit of its flow, which a separate flow dataset defines
copyright: false
licenseType: Free of charge for all users and uses

## General comment
Petroleum Coke Production is commonly used as a fuel in the production of aluminium and steel and as a raw material for the manufacturing of graphite, anodes, and other industrial products.

## Time period
Date of publication

## Reference product
- Petroleum Coke: 1000; software or database
  petrol coke

## Inputs
All rows: software or database
- crude oil; 42.3 MJ/kg: 2291
  Fuel mix: crude oil (79%), raw coal (6%), electricity (6%), refined NG (4%), clean coal (3%), residual oil (2%)
- hard coal; 26.3 MJ/kg: 174.06
  (same comment as for crude oil; 42.3 MJ/kg)
- electricity, high voltage, aluminium industry: 174.12
  (same comment as for crude oil; 42.3 MJ/kg)
- natural gas, high pressure: 116.12
  (same comment as for crude oil; 42.3 MJ/kg)
- hard coal: 87.12
  (same comment as for crude oil; 42.3 MJ/kg)
- residual oil: 58.1
  (same comment as for crude oil; 42.3 MJ/kg)

## Data selection and combination
Inventories of energy input and material flow are collected from updated yearbook s, published papers, official reports and databases. The details of the inventory are presented as Table 1. It should be noted that the data for the material transportation assumptions are based on relevant studies, whic h may be slightly different from the actual situation. The life-cycle intensities of each end-use energy type are based on the results of our previous studies.

## Use advice
Users should consider methodological aspects such as the boundaries of the system related to transportation of materials and make amendments based on regional transportation practices if significantly different. Life-cycle intensity data for end-use energy should be updated as per the geographical context and time frame of the study. The values and assumptions from Table 1 referenced in the inventory should be verified against project-specific requirements.

## Review details
Inventory: The internal review was done by several iteration steps concerning raw data validation, raw data documentation, representativity, completeness and consistency of modelling with regard to ISO 14040 and 14044.

## Data sources
- Peng, T., Ou, X., Yan, X. & Wang, G. Life-cycle analysis of energy consumption and GHG emissions of aluminium production in China. in Energy Procedia vol. 158 3937–3943 (2019).
