# Calcined coke roasting-aluminum electrolytic carbon anode production ; green pressed coke ; calcined coke

Dataset: ILCD process, Unit process, single operation
Geography: CN
Reference year: 2019
Classification: Unit processes / Materials production / Inorganic chemicals
Generated by: Chenling Fu, fu-chenling@tsinghua.edu.cn
Owner: Tiangong LCI Data Working Group
Review: Dependent internal review by Tiangong LCI Data Working Group
Amounts: no units in this file; such an amount is in the reference unit of its flow, which a separate flow dataset defines
copyright: false
licenseType: Free of charge for all users and uses

## General comment
The described industrial process pertains to the production of carbon anodes used in the aluminum electrolysis process. Specifically, this encompasses the roasting of calcined coke, which results in carbon blocks known as green pressed coke before they are subjected to further heat treatment to become 'calcined coke'. These carbon anodes are crucial for the production of primary aluminum through the Hall-Héroult process and are used to conduct electricity and facilitate the chemical reduction of alumina into metallic aluminum.

## Time period
Date of publication

## Reference product
- green-pressing: 1000; software or database

## Inputs
All rows: software or database
- electricity, high voltage, aluminium industry: 264.96
- Asphalt: 150
  asphalt
- Water, unspecified natural origin: 5080
- dust collector, electrostatic precipitator, for industrial use: 230
- calcined coke: 750

## Outputs
All rows: software or database
- carbon dioxide (fossil),carbon dioxide (fossil): 91.2
- municipal solid waste: 16.7
- chemical oxygen demand: 0.27
- particles, unspecified: 1.98
- sulfur dioxide: 0.00052
- carbon monoxide (fossil),carbon monoxide (fossil): 0.00166
- Nitrogen oxides: 0.00028
- methane (fossil): 0.0005

## Use advice
When utilizing this data set for Life Cycle Assessment, users should ensure that they account for any emissions and energy consumption associated with the production of green pressed coke and its subsequent calcination. It is essential to consider the specific technological applicability related to the purity of the calcined coke, as impurities can significantly affect the efficiency and environmental impact of the aluminum production process. Additionally, the geographic relevance and time frame of the data should be assessed to ensure accuracy in modeling. When applying this data in comparative studies, users must be consistent with the system boundaries and allocation methodologies employed.

## Review details
Inventory: The internal review was done by several iteration steps concerning raw data validation, raw data documentation, representativity, completeness and consistency of modelling with regard to ISO 14040 and 14044.

## Data sources
- YANG, Y., GUO, Y.-Q., ZHU, W.-S. & HUANG, J.-B. Environmental impact assessment of China’s primary aluminum based on life cycle assessment. Trans Nonferrous Met Soc China 29, 1784–1792 (2019).
