# Industrial silicon production ; Silicon (97%) ; Carbon reduction

Dataset: ILCD process, Unit process, single operation
Geography: CN
Reference year: 2014
Classification: Unit processes / Materials production / Metals and semimetals
Functional unit: The functional unit selected for this paper is a 1 kWp
LCI method principle: Attributional
LCI method approaches: Allocation
Generated by: Jinfeng Yang, yjfzfshn@163.com
Owner: Tiangong LCI Data Working Group
Review: Dependent internal review by Tiangong LCI Data Working Group
Amounts: no units in this file; such an amount is in the reference unit of its flow, which a separate flow dataset defines
copyright: false
licenseType: Free of charge for all users and uses

## General comment
Multi-Si

## Geography
Life cycle assessment of mono-Si and multi-Si photovoltaic systems produced in China

## Time period
Available online

## Technology and included processes
Reaction of reducing agents such as charcoal, coal or wood chips with silica sand in an electric arc furnace at 2000 ℃.

## Technical purpose
The industrial process described is the production of industrial silicon using 97% purity level through carbon reduction methods. This high-grade silicon is specifically employed in the manufacturing of monocrystalline and multi-crystalline silicon photovoltaic systems. Such silicon is integral to the PV industry, where it is used to produce the semiconductor wafers that form the core of solar panels.

## Reference product
- Metallurgical silicon: 1; measured
  Industrial silicon

## Inputs
All rows: measured
- quartz sand: 2.7
  silica
- Charcoal: 0.745
  charcoal
- Petroleum Coke: 0.68
  Petroleum coke
- Graphite Electrode: 0.135
  graphite electrode
- freshwater: 180
  water
- Electricity: 45
  Power consumption

## Outputs
All rows: measured
- carbon dioxide (fossil): 15.5
  CO2
- carbon monoxide,carbon monoxide (fossil): 3.84
  carbon monoxide
- methane (fossil): 0.06
  Methane
- nitrogen dioxide: 0.08
  Nitrogen oxides
- sulfur dioxide: 0.259
- particles (> PM10),particles (>PM10): 0.2
  dust
- biological oxygen demand: 0.01
- chemical oxygen demand: 0.01
  Cod
- DOC, Dissolved Organic Carbon: 0.004
  DOC
- total organic carbon: 0.004
  TOC

## Deviations from the LCI method approaches
The objective of this paper is to conduct a life cycle assessment of monocrystalline and multi-Si photovoltaic (PV) systems produced in China, and to analyze the methods of disposal and the environmental impacts of different methods of disposal.

## Data selection and combination
Ban Hui and Ye Hongliang analyzed the data of five industrial silicon manufacturing plants in China. In this paper, we refer to their material inputs, selecting silica, charcoal, petroleum coke, graphite electrodes, water, and electricity, and calculate the process emissions according to the chemical equations.

## Use advice
For life cycle assessment (LCA) practitioners, this data set can be applied to evaluate the environmental impact of the production stage of mono-Si and multi-Si photovoltaic systems in China. When using this data, consider the methodological boundaries such as system boundary, specific inputs like silica, charcoal, petroleum coke, and the choice of technological routes. Take into account the recycling and disposal processes of the silicon and photovoltaic systems, reflecting them correctly in the LCA model. The functional unit for this assessment is defined as 1 kWp of photovoltaic system capacity.

## Review details
Inventory: The internal review was done by several iteration steps concerning raw data validation, raw data documentation, representativity, completeness and consistency of modelling with regard to ISO 14040 and 14044.

## Data sources
- 李鹞 & 于随然. 中国光伏系统的生命周期评价. 环境工程 32, 119–124 (2014).
