# Electricity production ; Thermal power ; Shaanxi

Dataset: ILCD process, Unit process, single operation
Geography: SAX-CN
Reference year: 2019
Classification: Unit processes / Energy carriers and technologies / Electricity
Generated by: Ruoxi Xiong, xiongrx0126@163.com
Owner: Tiangong LCI Data Working Group
Review: Dependent internal review by Tiangong LCI Data Working Group
Amounts: no units in this file; such an amount is in the reference unit of its flow, which a separate flow dataset defines
copyright: false
licenseType: Free of charge for all users and uses

## General comment
Thermal power generation includes seventeen fossil fuels such as raw coal, washed coal, oil and natural gas. The process only considers the direct power generation process, not the upstream raw material extraction and processing and the downstream power consumption

## Time period
Calculated based on data from the 2019 Energy Statistics Yearbook

## Technical purpose
This dataset represents the process of electricity generation through thermal power in Shaanxi province, using a variety of seventeen fossil fuels including raw coal, washed coal, oil, and natural gas. The data is intended for use in power generation facilities specifically for direct electricity production and does not account for upstream raw material extraction and processing or downstream power consumption.

## Reference product
- electricity for thermal power: 3.6; calculated

## Inputs
All rows: calculated
- Raw coal: 0.324689
- Other Washed Coal: 0.0635755
- Gangue, in ground: 0.0221204
- Coke oven gas: 0.029767
- blast furnace gas: 0.019877
- Converter gas: 0.000688
- Diesel: 1.828e-5
- natural gas: 0.000667

## Outputs
- carbon dioxide (fossil): 0.702386; calculated
- sulfur dioxide: 0.000135421; calculated
- Nitrogen oxides: 0.000215334; calculated
- particles (> PM10): 2.6669e-5; calculated

## Data treatment and extrapolations
For the accounting method, please refer to the "Enterprise Greenhouse Gas Emissions Accounting Methods and Reporting Guidelines for Power Generation Facilities". Different forms of power generation and fuel consumption come from Chapter 3 (Energy Production) and Chapter 6 (Regional Energy Balance Sheet) in the "China Energy Statistical Yearbook 2020". The fuel parameters such as low calorific value and carbon content per unit calorific value used to calculate the carbon dioxide emission factor come from the "2019 China Regional Power Grid Carbon Dioxide Baseline Emission Factor Calculation Instructions OM" and the "Enterprise Greenhouse Gas Emission Accounting Method and Reporting Guide for Power Generation Facilities" 》

## Use advice
When using this dataset for Life Cycle Assessment, users should refer to the 'Enterprise Greenhouse Gas Emissions Accounting Methods and Reporting Guidelines for Power Generation Facilities' to understand the methodology for carbon emission calculations. Users should ensure their calculations for power generation and fuel consumption are aligned with the data provided in Chapter 3 (Energy Production) and Chapter 6 (Regional Energy Balance Sheet) of the 'China Energy Statistical Yearbook 2020'. Also, for the calculation of CO2 emission factors, it is advised to consider fuel parameters like low calorific value and carbon content per unit calorific value as detailed in the '2019 China Regional Power Grid Carbon Dioxide Baseline Emission Factor Calculation Instructions OM' and related guidelines.

## Review details
Inventory: The internal review was done by several iteration steps concerning raw data validation, raw data documentation, representativity, completeness and consistency of modelling with regard to ISO 14040 and 14044.

## Data sources
- 熊若熙. 中国电力生产和消费二氧化碳与污染物排放因子核算. (清华大学, 2023).
