# cement production;cement, portland-composite cement;new dry process rotary kiln, 4000t/d;mixed solid wastes

Dataset: ILCD process, Unit process, black box
Geography: DL-LN-CN
Reference year: 2009
Classification: Unit processes / Materials production / Other mineralic materials
Generated by: #REF!, ysqsophia@gmail.com
Owner: Tiangong LCI Data Working Group
Review: Dependent internal review by Tiangong LCI Data Working Group
Amounts: no units in this file; such an amount is in the reference unit of its flow, which a separate flow dataset defines
copyright: false
licenseType: Free of charge for all users and uses

## General comment
The new dry rotary kiln produces cement by mixing solid waste materials referred to as fly ash and blast furnace slag.

## Geography
Dalian Jingang Tianma Cement Plant

## Time period
The data collection time is 2009 and 2010.

## Technical purpose
This industrial process is utilized for the production of cement, specifically ordinary Portland cement grade 42.4 and composite Portland cement grade 32.5. The new dry process rotary kiln technology is employed to create cement clinker at a rate of 4000 tons per day. This process incorporates mixed solid wastes like fly ash and blast furnace slag as part of the raw materials, emphasizing resource recovery and sustainability in the cement industry. This technology and cement product are applicable in construction projects requiring high-strength concrete and in areas where fly ash and slag are available as byproducts to be utilized in cement manufacturing.

## Model description
The functional unit of cement life cycle assessment is 1 ton of cement product.The entire cement life cycle is divided into raw material preparation unit, pulverized coal preparation unit, clinker calcination unit and cement grinding unit. The raw material preparation stage (raw meal preparation) includes raw material crushing, grinding, drying and pre-homogenization processes; the pulverized coal preparation stage includes raw coal transportation, storage and grinding; the clinker calcination stage includes preheating decomposition and adding coal to the rotary kiln. During the heating process of powder and raw materials, CO2, SO2, NOx and other waste gases are emitted; the cement grinding stage includes gypsum, limestone crushing and cement grinding.

## Reference product
- cement, portland-composite cement: 1000
  Cement products

## Inputs
- calcium carbonate: 841.4
  Limestone
- shale: 54
  Shale
- sandstone: 27.66
  Sandstone
- iron, powder: 16.95
  Iron powder
- gypsum stone (CaSO4-dihydrate): 51.5
  Gupsum
- ash: 154.3
  Fly ash
- blast furnace slag: 257
  Blast furnace slag
- hard coal; 26.3 MJ/kg: 92
  Coal
- Electricity: 318.06
  Electricity. Energy consumption in cement production is mainly from coal and electricity, and the electricity production and coal production in the public system are obtained from the domestically developed CLCD database.

## Outputs
- carbon dioxide (fossil): 632.65
  CO2. CO2 emissions come from two parts: coal combustion in clinker production and limestone calcination. Since CO2 emissions are generally not measured, the emissions are calculated based on the CO2 emission formula.
- sulfur dioxide: 0.207
  SO2. The emission of SO2 in the exhaust gas is provided by the companies.
- Nitrogen oxides: 0.66
  NOx. The emission of NOx in the exhaust gas is provided by the companies.
- carbon monoxide (fossil): 0.0222
  CO
- particles (> PM10): 0.466
  Dust (emission): exhaust gas, with an unspecified particle size, is treated as PM > 10 micrometers in diameter.
- Chlorides, unspecified: 2.38
  Chloride: wastewater. In addition, the data on pollutant and wastewater emissions during transportation comes from the lifecycle assessment software GaBi 4.0.
- sulfate: 0.31
  Sulfates: wastewater. In addition, the data on pollutant and wastewater emissions during transportation comes from the lifecycle assessment software GaBi 4.0.
- blast furnace dust, for recovery: 596.6
  Dust (recovered): solid waste. Solid waste includes dust collected by dust collectors and household garbage. The collected dust is returned to the process, and all household garbage is incinerated in the rotary kiln. In this study, only dust from solid waste is considered, and its data is provided by the company.

## Data selection and combination
The main input data of raw materials and energy for each unit are based on the actual production process of the enterprise and the annual production data of 2009-2010, and are converted into the raw materials and energy required for 1 ton of cement based on the cement output. Data related to cement production are obtained from field surveys and calculations.

## Sampling procedure
A cement company in Dalian has a new dry process kiln cement clinker production line with a daily output of 4,000 tons and an independently mined open-pit limestone mine. There are mineral resources such as limestone and shale distributed around the factory area. There is one cement mill with a diameter of 3.8m and a length of 13m, and two slag mills with a diameter of 3.2m and a length of 13m. The cement production process is mainly divided into four stages: raw meal preparation stage, clinker preparation stage, pulverized coal preparation stage, and cement grinding stage. The main raw materials in the raw meal stage are limestone, shale, silica, and iron powder; the main fuel in the clinker stage is coal; the main raw materials in the cement grinding stage are gypsum, limestone, fly ash, and slag; the main energy sources come from coal and electricity. The enterprise has an annual output of 1.35 million tons of clinker and 700,000 tons of composite Portland cement; the annual production of the rotary kiln is 330 days, and the annual production of the cement mill is 270 days. The products are ordinary Portland grade 42.4 cement and composite Portland grade 32.5 cement.

## Use advice
When utilizing this dataset for Life Cycle Assessment (LCA) of cement products, ensure that the scope of your LCA incorporates the collection of raw materials, coal preparation, clinker calcination, and cement grinding stages. The dataset's functional unit is based on the production of 1 ton of cement. LCA practitioners should take into account the production line's operating days per year and the integration of mixed solid waste materials in the cement composition. Special attention must be given to the emission data during the clinker calcination stage, which includes CO2, SO2, and NOx. Due to regional variances in raw material composition and energy consumption patterns, the geographical and technological applicability should be considered when applying this data to cement manufacturing elsewhere.

## Review details
Inventory: The internal review was done by several iteration steps concerning raw data validation, raw data documentation, representativity, completeness and consistency of modelling with regard to ISO 14040 and 14044.

## Data sources
- 朴文华, 陈郁, 张树深, & 徐小宁. (2012). 基于LCA方法的水泥企业清洁生产审核. 环境科学学报, 32, 1785–1792.
