# Non-thick oil ; Low-permeability oil fields less than 80% ; Secondary oil recovery + tertiary oil recovery ; All sizes; NESPS2 / 非稠油 ; 低渗透油田小于80% ; 二次采油+三次采油 ; 所有规模 ; 全国第二次污染普查数据

Dataset: ILCD process, Unit process, single operation
Geography: CN
Reference year: 2019
Classification: Reference Parameters / Energy carriers and technologies / Crude oil based fuels
Generated by: The data was created by the Office of the Second National Pollution Source Census of the Ministry of Ecology and Environment, and the data was organized by the TianGong Plan team for ILCD format / 生态环境部第二次全国污染源普查工作办公室创建数据，天工计划团队常慧敏整理数据为ILCD格式
Owner: Tiangong LCI Data Working Group / 天工LCI数据工作小组
Review: Dependent internal review by Tiangong LCI Data Working Group / 天工LCI数据工作小组
Amounts: no units in this file; such an amount is in the reference unit of its flow, which a separate flow dataset defines
copyright: false
licenseType: Free of charge for all users and uses

## General comment
the treatment technology for the pollution of Waste waterdidn't offered，The formula for calculating the actual operation rate (k-value) of the end-of-pipe treatment facility is k = power consumption of treatment facilities (kWh/year) / (equipment rated power (kW) × equipment operating time (hours/year))

## Technical purpose
所述技术用于工业环境中管道末端管理，处理如化学需氧量、氨氮、与石油相关的废物、有机氮和酚类等污染物。这些技术适用于在非稠油、低渗透油田的二次采油和三次采油过程中处理废水流。该技术组合包括物理、化学和生物处理方法以及回注技术，这对于石油天然气行业实现法规合规和最小化环境影响至关重要。

## Reference product
- Heavy oil: 1000; calculated
  源文件中描述为为非稠油，此处对其进行了匹配工作，将其匹配到LCAflow库里面相最符合的流

## Outputs
All rows: calculated
- Ammonia Nitrogen: 0
  the Technical of end-of-pipe management technology for pollution Ammonia NitrogenisFilter separation/floating separation + A/O process，Its Technical efficiency of end-of-pipe management80，The formula for calculating the actual operation rate (k-value) of the end-of-pipe treatment facility is k = operating time of wastewater treatment facilities (hours) / normal production time (hours)
  污染物指标氨氮的末端治理技术是过滤分离/上浮分离+A/O工艺，其效率为80，末端治理设施实际运行率（k值）计算公式为k=污水治理设施年运行时间（小时/年）/正常生产时间（小时/年）。原文件中描述污染物类别为废水，污染物指标为氨氮，此处对其进行了匹配工作，将其匹配到LCAflow库里面相最符合的流原文描述的产污系数为 11.12A/(1-A)。请根据备注自行核算后修改对应的排放量。
- Ammonia Nitrogen: 0
  the Technical of end-of-pipe management technology for pollution Ammonia NitrogenisBuffer tank + hydrocyclone + discharge，The formula for calculating the actual operation rate (k-value) of the end-of-pipe treatment facility is k = operating time of wastewater treatment facilities (hours) / normal production time (hours).The original article describes the pollution production coefficients as 11.12A/(1-A)。Please revise the corresponding emissions after accounting for them according to the notes.。.The original article describes the pollution production coefficients as 11.12A/(1-A). Please revise the corresponding emissions after accounting for them according to the notes.
  污染物指标氨氮的末端治理技术是缓冲罐＋水力旋流器＋排放，末端治理设施实际运行率（k值）计算公式为k=污水治理设施年运行时间（小时/年）/正常生产时间（小时/年）。原文件中描述污染物类别为废水，污染物指标为氨氮，此处对其进行了匹配工作，将其匹配到LCAflow库里面相最符合的流原文描述的产污系数为 11.12A/(1-A)。请根据备注自行核算后修改对应的排放量。
- Ammonia Nitrogen: 0
  the Technical of end-of-pipe management technology for pollution Ammonia NitrogenisFilter separation/floating separation + A2/O process，Its Technical efficiency of end-of-pipe management81.The original article describes the pollution production coefficients as 11.12A/(1-A)。Please revise the corresponding emissions after accounting for them according to the notes.。.The original article describes the pollution production coefficients as 11.12A/(1-A). Please revise the corresponding emissions after accounting for them according to the notes.
  污染物指标氨氮的末端治理技术是过滤分离/上浮分离+A2/O工艺，其效率为81，末端治理设施实际运行率（k值）计算公式为k=污水治理设施年运行时间（小时/年）/正常生产时间（小时/年）。原文件中描述污染物类别为废水，污染物指标为氨氮，此处对其进行了匹配工作，将其匹配到LCAflow库里面相最符合的流原文描述的产污系数为 11.12A/(1-A)。请根据备注自行核算后修改对应的排放量。
- Ammonia Nitrogen: 0
  the Technical of end-of-pipe management technology for pollution Ammonia NitrogenisFilter separation/floating separation + bio-contact oxidation process，Its Technical efficiency of end-of-pipe management46，The formula for calculating the actual operation rate (k-value) of the end-of-pipe treatment facility is k = power consumption of treatment facilities (kWh/year) / (equipment rated power (kW) × equipment operating time (hours/year)).The original article describes the pollution production coefficients as 11.12A/(1-A)。Please revise the corresponding emissions after accounting for them according to the notes.。.The original article describes the pollution production coefficients as 11.12A/(1-A). Please revise the corresponding emissions after accounting for them according to the notes.
  污染物指标氨氮的末端治理技术是过滤分离/上浮分离+生物接触氧化法，其效率为46，末端治理设施实际运行率（k值）计算公式为k=污水治理设施年运行时间（小时/年）/正常生产时间（小时/年）。原文件中描述污染物类别为废水，污染物指标为氨氮，此处对其进行了匹配工作，将其匹配到LCAflow库里面相最符合的流原文描述的产污系数为 11.12A/(1-A)。请根据备注自行核算后修改对应的排放量。
- Ammonia Nitrogen: 0
  the Technical of end-of-pipe management technology for pollution Ammonia NitrogenisFilter separation/floating separation + chemical coagulation，Its Technical efficiency of end-of-pipe management78，The formula for calculating the actual operation rate (k-value) of the end-of-pipe treatment facility is k = operating time of wastewater treatment facilities (hours) / normal production time (hours).The original article describes the pollution production coefficients as 11.12A/(1-A)。Please revise the corresponding emissions after accounting for them according to the notes.。.The original article describes the pollution production coefficients as 11.12A/(1-A). Please revise the corresponding emissions after accounting for them according to the notes.
  污染物指标氨氮的末端治理技术是过滤分离/上浮分离+化学混凝法，其效率为78，末端治理设施实际运行率（k值）计算公式为k=污水治理设施年运行时间（小时/年）/正常生产时间（小时/年）。原文件中描述污染物类别为废水，污染物指标为氨氮，此处对其进行了匹配工作，将其匹配到LCAflow库里面相最符合的流原文描述的产污系数为 11.12A/(1-A)。请根据备注自行核算后修改对应的排放量。
- Ammonia Nitrogen: 0
  the Technical of end-of-pipe management technology for pollution Ammonia NitrogenisFilter separation/floating separation + SBR，Its Technical efficiency of end-of-pipe management92.The original article describes the pollution production coefficients as 11.12A/(1-A)。Please revise the corresponding emissions after accounting for them according to the notes.。.The original article describes the pollution production coefficients as 11.12A/(1-A). Please revise the corresponding emissions after accounting for them according to the notes.
  污染物指标氨氮的末端治理技术是过滤分离/上浮分离+SBR类，其效率为92，末端治理设施实际运行率（k值）计算公式为k=污水治理设施年运行时间（小时/年）/正常生产时间（小时/年）。原文件中描述污染物类别为废水，污染物指标为氨氮，此处对其进行了匹配工作，将其匹配到LCAflow库里面相最符合的流原文描述的产污系数为 11.12A/(1-A)。请根据备注自行核算后修改对应的排放量。
- Ammonia Nitrogen: 0
  the Technical of end-of-pipe management technology for pollution Ammonia NitrogenisHydrocyclone + degassing and oil removal tank + discharge.The original article describes the pollution production coefficients as 11.12A/(1-A)。Please revise the corresponding emissions after accounting for them according to the notes.。.The original article describes the pollution production coefficients as 11.12A/(1-A). Please revise the corresponding emissions after accounting for them according to the notes.
  污染物指标氨氮的末端治理技术是水力旋流器＋脱气除油罐＋排放，末端治理设施实际运行率（k值）计算公式为k=污水治理设施年运行时间（小时/年）/正常生产时间（小时/年）。原文件中描述污染物类别为废水，污染物指标为氨氮，此处对其进行了匹配工作，将其匹配到LCAflow库里面相最符合的流原文描述的产污系数为 11.12A/(1-A)。请根据备注自行核算后修改对应的排放量。
- Ammonia Nitrogen: 0
  the Technical of end-of-pipe management technology for pollution Ammonia NitrogenisHydrocyclone + filter + discharge.The original article describes the pollution production coefficients as 11.12A/(1-A)。Please revise the corresponding emissions after accounting for them according to the notes.。.The original article describes the pollution production coefficients as 11.12A/(1-A). Please revise the corresponding emissions after accounting for them according to the notes.
  污染物指标氨氮的末端治理技术是水力旋流器＋过滤器＋排放，末端治理设施实际运行率（k值）计算公式为k=污水治理设施年运行时间（小时/年）/正常生产时间（小时/年）。原文件中描述污染物类别为废水，污染物指标为氨氮，此处对其进行了匹配工作，将其匹配到LCAflow库里面相最符合的流原文描述的产污系数为 11.12A/(1-A)。请根据备注自行核算后修改对应的排放量。
- Ammonia Nitrogen: 0
  the Technical of end-of-pipe management technology for pollution Ammonia NitrogenisInclined plate oil separator + traditional gas flotation machine + walnut shell filter + dual media filter + reinjection，Its Technical efficiency of end-of-pipe management100，The formula for calculating the actual operation rate (k-value) of the end-of-pipe treatment facility is k = operating time of wastewater treatment facilities (hours) / normal production time (hours).The original article describes the pollution production coefficients as 11.12A/(1-A)。Please revise the corresponding emissions after accounting for them according to the notes.。.The original article describes the pollution production coefficients as 11.12A/(1-A). Please revise the corresponding emissions after accounting for them according to the notes.
  污染物指标氨氮的末端治理技术是斜板隔油＋传统气体浮选机＋核桃壳过滤器＋双介质过滤器＋回注，其效率为100，末端治理设施实际运行率（k值）计算公式为k=污水治理设施年运行时间（小时/年）/正常生产时间（小时/年）。原文件中描述污染物类别为废水，污染物指标为氨氮，此处对其进行了匹配工作，将其匹配到LCAflow库里面相最符合的流原文描述的产污系数为 11.12A/(1-A)。请根据备注自行核算后修改对应的排放量。
- Ammonia Nitrogen: 0
  the Technical of end-of-pipe management technology for pollution Ammonia NitrogenisPhysical + chemical + reinjection，Its Technical efficiency of end-of-pipe management100，The formula for calculating the actual operation rate (k-value) of the end-of-pipe treatment facility is k = power consumption of treatment facilities (kWh/year) / (equipment rated power (kW) × equipment operating time (hours/year)).The original article describes the pollution production coefficients as 11.12A/(1-A)。Please revise the corresponding emissions after accounting for them according to the notes.。.The original article describes the pollution production coefficients as 11.12A/(1-A). Please revise the corresponding emissions after accounting for them according to the notes.
  污染物指标氨氮的末端治理技术是物理+化学+回注，其效率为100，末端治理设施实际运行率（k值）计算公式为k=污水治理设施年运行时间（小时/年）/正常生产时间（小时/年）。原文件中描述污染物类别为废水，污染物指标为氨氮，此处对其进行了匹配工作，将其匹配到LCAflow库里面相最符合的流原文描述的产污系数为 11.12A/(1-A)。请根据备注自行核算后修改对应的排放量。
- Ammonia Nitrogen: 0
  the Technical of end-of-pipe management technology for pollution Ammonia NitrogenisPhysical + reinjection，Its Technical efficiency of end-of-pipe management100，The formula for calculating the actual operation rate (k-value) of the end-of-pipe treatment facility is k = power consumption of treatment facilities (kWh/year) / (equipment rated power (kW) × equipment operating time (hours/year)).The original article describes the pollution production coefficients as 11.12A/(1-A)。Please revise the corresponding emissions after accounting for them according to the notes.。.The original article describes the pollution production coefficients as 11.12A/(1-A). Please revise the corresponding emissions after accounting for them according to the notes.
  污染物指标氨氮的末端治理技术是物理+回注，其效率为100，末端治理设施实际运行率（k值）计算公式为k=污水治理设施年运行时间（小时/年）/正常生产时间（小时/年）。原文件中描述污染物类别为废水，污染物指标为氨氮，此处对其进行了匹配工作，将其匹配到LCAflow库里面相最符合的流原文描述的产污系数为 11.12A/(1-A)。请根据备注自行核算后修改对应的排放量。
- chemical oxygen demand: 0
  the Technical of end-of-pipe management technology for pollution chemical oxygen demandisBuffer tank + hydrocyclone + discharge，The formula for calculating the actual operation rate (k-value) of the end-of-pipe treatment facility is k = power consumption of treatment facilities (kWh/year) / (equipment rated power (kW) × equipment operating time (hours/year)).The original article describes the pollution production coefficients as 647A/(1-A)。Please revise the corresponding emissions after accounting for them according to the notes.。.The original article describes the pollution production coefficients as 647A/(1-A). Please revise the corresponding emissions after accounting for them according to the notes.
  污染物指标化学需氧量的末端治理技术是缓冲罐＋水力旋流器＋排放，末端治理设施实际运行率（k值）计算公式为k=污水治理设施年运行时间（小时/年）/正常生产时间（小时/年）。原文件中描述污染物类别为废水，污染物指标为化学需氧量，此处对其进行了匹配工作，将其匹配到LCAflow库里面相最符合的流原文描述的产污系数为 647A/(1-A)。请根据备注自行核算后修改对应的排放量。
- chemical oxygen demand: 0
  the Technical of end-of-pipe management technology for pollution chemical oxygen demandisFilter + dual media filter + reinjection，Its Technical efficiency of end-of-pipe management100，The formula for calculating the actual operation rate (k-value) of the end-of-pipe treatment facility is k = power consumption of treatment facilities (kWh/year) / (equipment rated power (kW) × equipment operating time (hours/year)).The original article describes the pollution production coefficients as 647A/(1-A)。Please revise the corresponding emissions after accounting for them according to the notes.。.The original article describes the pollution production coefficients as 647A/(1-A). Please revise the corresponding emissions after accounting for them according to the notes.
  污染物指标化学需氧量的末端治理技术是过滤器＋双介质过滤器＋回注，其效率为100，末端治理设施实际运行率（k值）计算公式为k=污水治理设施年运行时间（小时/年）/正常生产时间（小时/年）。原文件中描述污染物类别为废水，污染物指标为化学需氧量，此处对其进行了匹配工作，将其匹配到LCAflow库里面相最符合的流原文描述的产污系数为 647A/(1-A)。请根据备注自行核算后修改对应的排放量。
- chemical oxygen demand: 0
  the Technical of end-of-pipe management technology for pollution chemical oxygen demandisFilter separation/floating separation + A/O process，Its Technical efficiency of end-of-pipe management82，The formula for calculating the actual operation rate (k-value) of the end-of-pipe treatment facility is k = power consumption of treatment facilities (kWh/year) / (equipment rated power (kW) × equipment operating time (hours/year)).The original article describes the pollution production coefficients as 647A/(1-A)。Please revise the corresponding emissions after accounting for them according to the notes.。.The original article describes the pollution production coefficients as 647A/(1-A). Please revise the corresponding emissions after accounting for them according to the notes.
  污染物指标化学需氧量的末端治理技术是过滤分离/上浮分离+A/O工艺，其效率为82，末端治理设施实际运行率（k值）计算公式为k=污水治理设施年运行时间（小时/年）/正常生产时间（小时/年）。原文件中描述污染物类别为废水，污染物指标为化学需氧量，此处对其进行了匹配工作，将其匹配到LCAflow库里面相最符合的流原文描述的产污系数为 647A/(1-A)。请根据备注自行核算后修改对应的排放量。
- chemical oxygen demand: 0
  the Technical of end-of-pipe management technology for pollution chemical oxygen demandisFilter separation/floating separation + A2/O process，Its Technical efficiency of end-of-pipe management85，The formula for calculating the actual operation rate (k-value) of the end-of-pipe treatment facility is k = power consumption of treatment facilities (kWh/year) / (equipment rated power (kW) × equipment operating time (hours/year)).The original article describes the pollution production coefficients as 647A/(1-A)。Please revise the corresponding emissions after accounting for them according to the notes.。.The original article describes the pollution production coefficients as 647A/(1-A). Please revise the corresponding emissions after accounting for them according to the notes.
  污染物指标化学需氧量的末端治理技术是过滤分离/上浮分离+A2/O工艺，其效率为85，末端治理设施实际运行率（k值）计算公式为k=污水治理设施年运行时间（小时/年）/正常生产时间（小时/年）。原文件中描述污染物类别为废水，污染物指标为化学需氧量，此处对其进行了匹配工作，将其匹配到LCAflow库里面相最符合的流原文描述的产污系数为 647A/(1-A)。请根据备注自行核算后修改对应的排放量。
- chemical oxygen demand: 0
  the Technical of end-of-pipe management technology for pollution chemical oxygen demandisFilter separation/floating separation + bio-contact oxidation process，Its Technical efficiency of end-of-pipe management88.The original article describes the pollution production coefficients as 647A/(1-A)。Please revise the corresponding emissions after accounting for them according to the notes.。.The original article describes the pollution production coefficients as 647A/(1-A). Please revise the corresponding emissions after accounting for them according to the notes.
  污染物指标化学需氧量的末端治理技术是过滤分离/上浮分离+生物接触氧化法，其效率为88，末端治理设施实际运行率（k值）计算公式为k=污水治理设施年运行时间（小时/年）/正常生产时间（小时/年）。原文件中描述污染物类别为废水，污染物指标为化学需氧量，此处对其进行了匹配工作，将其匹配到LCAflow库里面相最符合的流原文描述的产污系数为 647A/(1-A)。请根据备注自行核算后修改对应的排放量。
- chemical oxygen demand: 0
  the Technical of end-of-pipe management technology for pollution chemical oxygen demandisFilter separation/floating separation + chemical coagulation，Its Technical efficiency of end-of-pipe management73.The original article describes the pollution production coefficients as 647A/(1-A)。Please revise the corresponding emissions after accounting for them according to the notes.。.The original article describes the pollution production coefficients as 647A/(1-A). Please revise the corresponding emissions after accounting for them according to the notes.
  污染物指标化学需氧量的末端治理技术是过滤分离/上浮分离+化学混凝法，其效率为73，末端治理设施实际运行率（k值）计算公式为k=污水治理设施年运行时间（小时/年）/正常生产时间（小时/年）。原文件中描述污染物类别为废水，污染物指标为化学需氧量，此处对其进行了匹配工作，将其匹配到LCAflow库里面相最符合的流原文描述的产污系数为 647A/(1-A)。请根据备注自行核算后修改对应的排放量。
- chemical oxygen demand: 0
  the Technical of end-of-pipe management technology for pollution chemical oxygen demandisFilter separation/floating separation + SBR，Its Technical efficiency of end-of-pipe management86，The formula for calculating the actual operation rate (k-value) of the end-of-pipe treatment facility is k = power consumption of treatment facilities (kWh/year) / (equipment rated power (kW) × equipment operating time (hours/year)).The original article describes the pollution production coefficients as 647A/(1-A)。Please revise the corresponding emissions after accounting for them according to the notes.。.The original article describes the pollution production coefficients as 647A/(1-A). Please revise the corresponding emissions after accounting for them according to the notes.
  污染物指标化学需氧量的末端治理技术是过滤分离/上浮分离+SBR类，其效率为86，末端治理设施实际运行率（k值）计算公式为k=污水治理设施年运行时间（小时/年）/正常生产时间（小时/年）。原文件中描述污染物类别为废水，污染物指标为化学需氧量，此处对其进行了匹配工作，将其匹配到LCAflow库里面相最符合的流原文描述的产污系数为 647A/(1-A)。请根据备注自行核算后修改对应的排放量。
- chemical oxygen demand: 0
  the Technical of end-of-pipe management technology for pollution chemical oxygen demandisHydrocyclone + degassing and oil removal tank + discharge，The formula for calculating the actual operation rate (k-value) of the end-of-pipe treatment facility is k = power consumption of treatment facilities (kWh/year) / (equipment rated power (kW) × equipment operating time (hours/year)).The original article describes the pollution production coefficients as 647A/(1-A)。Please revise the corresponding emissions after accounting for them according to the notes.。.The original article describes the pollution production coefficients as 647A/(1-A). Please revise the corresponding emissions after accounting for them according to the notes.
  污染物指标化学需氧量的末端治理技术是水力旋流器＋脱气除油罐＋排放，末端治理设施实际运行率（k值）计算公式为k=污水治理设施年运行时间（小时/年）/正常生产时间（小时/年）。原文件中描述污染物类别为废水，污染物指标为化学需氧量，此处对其进行了匹配工作，将其匹配到LCAflow库里面相最符合的流原文描述的产污系数为 647A/(1-A)。请根据备注自行核算后修改对应的排放量。
- chemical oxygen demand: 0
  the Technical of end-of-pipe management technology for pollution chemical oxygen demandisHydrocyclone + filter + discharge.The original article describes the pollution production coefficients as 647A/(1-A)。Please revise the corresponding emissions after accounting for them according to the notes.。.The original article describes the pollution production coefficients as 647A/(1-A). Please revise the corresponding emissions after accounting for them according to the notes.
  污染物指标化学需氧量的末端治理技术是水力旋流器＋过滤器＋排放，末端治理设施实际运行率（k值）计算公式为k=污水治理设施年运行时间（小时/年）/正常生产时间（小时/年）。原文件中描述污染物类别为废水，污染物指标为化学需氧量，此处对其进行了匹配工作，将其匹配到LCAflow库里面相最符合的流原文描述的产污系数为 647A/(1-A)。请根据备注自行核算后修改对应的排放量。
- chemical oxygen demand: 0
  the Technical of end-of-pipe management technology for pollution chemical oxygen demandisInclined plate oil separator + traditional gas flotation machine + walnut shell filter，Its Technical efficiency of end-of-pipe management100，The formula for calculating the actual operation rate (k-value) of the end-of-pipe treatment facility is k = power consumption of treatment facilities (kWh/year) / (equipment rated power (kW) × equipment operating time (hours/year)).The original article describes the pollution production coefficients as 647A/(1-A)。Please revise the corresponding emissions after accounting for them according to the notes.。.The original article describes the pollution production coefficients as 647A/(1-A). Please revise the corresponding emissions after accounting for them according to the notes.
  污染物指标化学需氧量的末端治理技术是斜板隔油＋传统气体浮选机＋核桃壳，其效率为100，末端治理设施实际运行率（k值）计算公式为k=污水治理设施年运行时间（小时/年）/正常生产时间（小时/年）。原文件中描述污染物类别为废水，污染物指标为化学需氧量，此处对其进行了匹配工作，将其匹配到LCAflow库里面相最符合的流原文描述的产污系数为 647A/(1-A)。请根据备注自行核算后修改对应的排放量。
- chemical oxygen demand: 0
  the Technical of end-of-pipe management technology for pollution chemical oxygen demandisPhysical + chemical + reinjection，Its Technical efficiency of end-of-pipe management100，The formula for calculating the actual operation rate (k-value) of the end-of-pipe treatment facility is k = operating time of wastewater treatment facilities (hours) / normal production time (hours).The original article describes the pollution production coefficients as 647A/(1-A)。Please revise the corresponding emissions after accounting for them according to the notes.。.The original article describes the pollution production coefficients as 647A/(1-A). Please revise the corresponding emissions after accounting for them according to the notes.
  污染物指标化学需氧量的末端治理技术是物理+化学+回注，其效率为100，末端治理设施实际运行率（k值）计算公式为k=污水治理设施年运行时间（小时/年）/正常生产时间（小时/年）。原文件中描述污染物类别为废水，污染物指标为化学需氧量，此处对其进行了匹配工作，将其匹配到LCAflow库里面相最符合的流原文描述的产污系数为 647A/(1-A)。请根据备注自行核算后修改对应的排放量。
- chemical oxygen demand: 0
  the Technical of end-of-pipe management technology for pollution chemical oxygen demandisPhysical + reinjection，Its Technical efficiency of end-of-pipe management100，The formula for calculating the actual operation rate (k-value) of the end-of-pipe treatment facility is k = operating time of wastewater treatment facilities (hours) / normal production time (hours).The original article describes the pollution production coefficients as 647A/(1-A)。Please revise the corresponding emissions after accounting for them according to the notes.。.The original article describes the pollution production coefficients as 647A/(1-A). Please revise the corresponding emissions after accounting for them according to the notes.
  污染物指标化学需氧量的末端治理技术是物理+回注，其效率为100，末端治理设施实际运行率（k值）计算公式为k=污水治理设施年运行时间（小时/年）/正常生产时间（小时/年）。原文件中描述污染物类别为废水，污染物指标为化学需氧量，此处对其进行了匹配工作，将其匹配到LCAflow库里面相最符合的流原文描述的产污系数为 647A/(1-A)。请根据备注自行核算后修改对应的排放量。
- Nitrogen, organic bound: 0
  the Technical of end-of-pipe management technology for pollution Nitrogen, organic boundisBuffer tank + hydrocyclone + discharge.The original article describes the pollution production coefficients as 8.91A/(1-A)。Please revise the corresponding emissions after accounting for them according to the notes.。.The original article describes the pollution production coefficients as 8.91A/(1-A). Please revise the corresponding emissions after accounting for them according to the notes.
  污染物指标总氮的末端治理技术是缓冲罐＋水力旋流器＋排放，末端治理设施实际运行率（k值）计算公式为k=污水治理设施年运行时间（小时/年）/正常生产时间（小时/年）。原文件中描述污染物类别为废水，污染物指标为总氮，此处对其进行了匹配工作，将其匹配到LCAflow库里面相最符合的流原文描述的产污系数为 8.91A/(1-A)。请根据备注自行核算后修改对应的排放量。
- Nitrogen, organic bound: 0
  the Technical of end-of-pipe management technology for pollution Nitrogen, organic boundisFilter separation/floating separation + A/O process，Its Technical efficiency of end-of-pipe management80，The formula for calculating the actual operation rate (k-value) of the end-of-pipe treatment facility is k = power consumption of treatment facilities (kWh/year) / (equipment rated power (kW) × equipment operating time (hours/year)).The original article describes the pollution production coefficients as 8.91A/(1-A)。Please revise the corresponding emissions after accounting for them according to the notes.。.The original article describes the pollution production coefficients as 8.91A/(1-A). Please revise the corresponding emissions after accounting for them according to the notes.
  污染物指标总氮的末端治理技术是过滤分离/上浮分离+A/O工艺，其效率为80，末端治理设施实际运行率（k值）计算公式为k=污水治理设施年运行时间（小时/年）/正常生产时间（小时/年）。原文件中描述污染物类别为废水，污染物指标为总氮，此处对其进行了匹配工作，将其匹配到LCAflow库里面相最符合的流原文描述的产污系数为 8.91A/(1-A)。请根据备注自行核算后修改对应的排放量。
- Nitrogen, organic bound: 0
  the Technical of end-of-pipe management technology for pollution Nitrogen, organic boundisFilter separation/floating separation + A2/O process，Its Technical efficiency of end-of-pipe management80，The formula for calculating the actual operation rate (k-value) of the end-of-pipe treatment facility is k = power consumption of treatment facilities (kWh/year) / (equipment rated power (kW) × equipment operating time (hours/year)).The original article describes the pollution production coefficients as 8.91A/(1-A)。Please revise the corresponding emissions after accounting for them according to the notes.。.The original article describes the pollution production coefficients as 8.91A/(1-A). Please revise the corresponding emissions after accounting for them according to the notes.
  污染物指标总氮的末端治理技术是过滤分离/上浮分离+A2/O工艺，其效率为80，末端治理设施实际运行率（k值）计算公式为k=污水治理设施年运行时间（小时/年）/正常生产时间（小时/年）。原文件中描述污染物类别为废水，污染物指标为总氮，此处对其进行了匹配工作，将其匹配到LCAflow库里面相最符合的流原文描述的产污系数为 8.91A/(1-A)。请根据备注自行核算后修改对应的排放量。
- Nitrogen, organic bound: 0
  the Technical of end-of-pipe management technology for pollution Nitrogen, organic boundisFilter separation/floating separation + bio-contact oxidation process，Its Technical efficiency of end-of-pipe management72，The formula for calculating the actual operation rate (k-value) of the end-of-pipe treatment facility is k = power consumption of treatment facilities (kWh/year) / (equipment rated power (kW) × equipment operating time (hours/year)).The original article describes the pollution production coefficients as 8.91A/(1-A)。Please revise the corresponding emissions after accounting for them according to the notes.。.The original article describes the pollution production coefficients as 8.91A/(1-A). Please revise the corresponding emissions after accounting for them according to the notes.
  污染物指标总氮的末端治理技术是过滤分离/上浮分离+生物接触氧化法，其效率为72，末端治理设施实际运行率（k值）计算公式为k=污水治理设施年运行时间（小时/年）/正常生产时间（小时/年）。原文件中描述污染物类别为废水，污染物指标为总氮，此处对其进行了匹配工作，将其匹配到LCAflow库里面相最符合的流原文描述的产污系数为 8.91A/(1-A)。请根据备注自行核算后修改对应的排放量。
- Nitrogen, organic bound: 0
  the Technical of end-of-pipe management technology for pollution Nitrogen, organic boundisFilter separation/floating separation + chemical coagulation，Its Technical efficiency of end-of-pipe management76.The original article describes the pollution production coefficients as 8.91A/(1-A)。Please revise the corresponding emissions after accounting for them according to the notes.。.The original article describes the pollution production coefficients as 8.91A/(1-A). Please revise the corresponding emissions after accounting for them according to the notes.
  污染物指标总氮的末端治理技术是过滤分离/上浮分离+化学混凝法，其效率为76，末端治理设施实际运行率（k值）计算公式为k=污水治理设施年运行时间（小时/年）/正常生产时间（小时/年）。原文件中描述污染物类别为废水，污染物指标为总氮，此处对其进行了匹配工作，将其匹配到LCAflow库里面相最符合的流原文描述的产污系数为 8.91A/(1-A)。请根据备注自行核算后修改对应的排放量。
- Nitrogen, organic bound: 0
  the Technical of end-of-pipe management technology for pollution Nitrogen, organic boundisFilter separation/floating separation + SBR，Its Technical efficiency of end-of-pipe management91，The formula for calculating the actual operation rate (k-value) of the end-of-pipe treatment facility is k = power consumption of treatment facilities (kWh/year) / (equipment rated power (kW) × equipment operating time (hours/year)).The original article describes the pollution production coefficients as 8.91A/(1-A)。Please revise the corresponding emissions after accounting for them according to the notes.。.The original article describes the pollution production coefficients as 8.91A/(1-A). Please revise the corresponding emissions after accounting for them according to the notes.
  污染物指标总氮的末端治理技术是过滤分离/上浮分离+SBR类，其效率为91，末端治理设施实际运行率（k值）计算公式为k=污水治理设施年运行时间（小时/年）/正常生产时间（小时/年）。原文件中描述污染物类别为废水，污染物指标为总氮，此处对其进行了匹配工作，将其匹配到LCAflow库里面相最符合的流原文描述的产污系数为 8.91A/(1-A)。请根据备注自行核算后修改对应的排放量。
- Nitrogen, organic bound: 0
  the Technical of end-of-pipe management technology for pollution Nitrogen, organic boundisHydrocyclone + degassing and oil removal tank + discharge，The formula for calculating the actual operation rate (k-value) of the end-of-pipe treatment facility is k = operating time of wastewater treatment facilities (hours) / normal production time (hours).The original article describes the pollution production coefficients as 8.91A/(1-A)。Please revise the corresponding emissions after accounting for them according to the notes.。.The original article describes the pollution production coefficients as 8.91A/(1-A). Please revise the corresponding emissions after accounting for them according to the notes.
  污染物指标总氮的末端治理技术是水力旋流器＋脱气除油罐＋排放，末端治理设施实际运行率（k值）计算公式为k=污水治理设施年运行时间（小时/年）/正常生产时间（小时/年）。原文件中描述污染物类别为废水，污染物指标为总氮，此处对其进行了匹配工作，将其匹配到LCAflow库里面相最符合的流原文描述的产污系数为 8.91A/(1-A)。请根据备注自行核算后修改对应的排放量。
- Nitrogen, organic bound: 0
  the Technical of end-of-pipe management technology for pollution Nitrogen, organic boundisHydrocyclone + filter + discharge，The formula for calculating the actual operation rate (k-value) of the end-of-pipe treatment facility is k = power consumption of treatment facilities (kWh/year) / (equipment rated power (kW) × equipment operating time (hours/year)).The original article describes the pollution production coefficients as 8.91A/(1-A)。Please revise the corresponding emissions after accounting for them according to the notes.。.The original article describes the pollution production coefficients as 8.91A/(1-A). Please revise the corresponding emissions after accounting for them according to the notes.
  污染物指标总氮的末端治理技术是水力旋流器＋过滤器＋排放，末端治理设施实际运行率（k值）计算公式为k=污水治理设施年运行时间（小时/年）/正常生产时间（小时/年）。原文件中描述污染物类别为废水，污染物指标为总氮，此处对其进行了匹配工作，将其匹配到LCAflow库里面相最符合的流原文描述的产污系数为 8.91A/(1-A)。请根据备注自行核算后修改对应的排放量。
- Nitrogen, organic bound: 0
  the Technical of end-of-pipe management technology for pollution Nitrogen, organic boundisInclined plate oil separator + traditional gas flotation machine + walnut shell filter + dual media filter + reinjection，Its Technical efficiency of end-of-pipe management100，The formula for calculating the actual operation rate (k-value) of the end-of-pipe treatment facility is k = power consumption of treatment facilities (kWh/year) / (equipment rated power (kW) × equipment operating time (hours/year)).The original article describes the pollution production coefficients as 8.91A/(1-A)。Please revise the corresponding emissions after accounting for them according to the notes.。.The original article describes the pollution production coefficients as 8.91A/(1-A). Please revise the corresponding emissions after accounting for them according to the notes.
  污染物指标总氮的末端治理技术是斜板隔油＋传统气体浮选机＋核桃壳过滤器＋双介质过滤器＋回注，其效率为100，末端治理设施实际运行率（k值）计算公式为k=污水治理设施年运行时间（小时/年）/正常生产时间（小时/年）。原文件中描述污染物类别为废水，污染物指标为总氮，此处对其进行了匹配工作，将其匹配到LCAflow库里面相最符合的流原文描述的产污系数为 8.91A/(1-A)。请根据备注自行核算后修改对应的排放量。
- Nitrogen, organic bound: 0
  the Technical of end-of-pipe management technology for pollution Nitrogen, organic boundisPhysical + chemical + reinjection，Its Technical efficiency of end-of-pipe management100，The formula for calculating the actual operation rate (k-value) of the end-of-pipe treatment facility is k = power consumption of treatment facilities (kWh/year) / (equipment rated power (kW) × equipment operating time (hours/year)).The original article describes the pollution production coefficients as 8.91A/(1-A)。Please revise the corresponding emissions after accounting for them according to the notes.。.The original article describes the pollution production coefficients as 8.91A/(1-A). Please revise the corresponding emissions after accounting for them according to the notes.
  污染物指标总氮的末端治理技术是物理+化学+回注，其效率为100，末端治理设施实际运行率（k值）计算公式为k=污水治理设施年运行时间（小时/年）/正常生产时间（小时/年）。原文件中描述污染物类别为废水，污染物指标为总氮，此处对其进行了匹配工作，将其匹配到LCAflow库里面相最符合的流原文描述的产污系数为 8.91A/(1-A)。请根据备注自行核算后修改对应的排放量。
- Nitrogen, organic bound: 0
  the Technical of end-of-pipe management technology for pollution Nitrogen, organic boundisPhysical + reinjection，Its Technical efficiency of end-of-pipe management100，The formula for calculating the actual operation rate (k-value) of the end-of-pipe treatment facility is k = power consumption of treatment facilities (kWh/year) / (equipment rated power (kW) × equipment operating time (hours/year)).The original article describes the pollution production coefficients as 8.91A/(1-A)。Please revise the corresponding emissions after accounting for them according to the notes.。.The original article describes the pollution production coefficients as 8.91A/(1-A). Please revise the corresponding emissions after accounting for them according to the notes.
  污染物指标总氮的末端治理技术是物理+回注，其效率为100，末端治理设施实际运行率（k值）计算公式为k=污水治理设施年运行时间（小时/年）/正常生产时间（小时/年）。原文件中描述污染物类别为废水，污染物指标为总氮，此处对其进行了匹配工作，将其匹配到LCAflow库里面相最符合的流原文描述的产污系数为 8.91A/(1-A)。请根据备注自行核算后修改对应的排放量。
- Petroleum-related waste: 0
  the Technical of end-of-pipe management technology for pollution Petroleum-related wasteisBuffer tank + hydrocyclone + discharge，Its Technical efficiency of end-of-pipe management41，The formula for calculating the actual operation rate (k-value) of the end-of-pipe treatment facility is k = operating time of wastewater treatment facilities (hours) / normal production time (hours).The original article describes the pollution production coefficients as 116.56A/(1-A)。Please revise the corresponding emissions after accounting for them according to the notes.。.The original article describes the pollution production coefficients as 116.56A/(1-A). Please revise the corresponding emissions after accounting for them according to the notes.
  污染物指标石油类的末端治理技术是缓冲罐＋水力旋流器＋排放，其效率为41，末端治理设施实际运行率（k值）计算公式为k=污水治理设施年运行时间（小时/年）/正常生产时间（小时/年）。原文件中描述污染物类别为废水，污染物指标为石油类，此处对其进行了匹配工作，将其匹配到LCAflow库里面相最符合的流原文描述的产污系数为 116.56A/(1-A)。请根据备注自行核算后修改对应的排放量。
- Petroleum-related waste: 0
  the Technical of end-of-pipe management technology for pollution Petroleum-related wasteisFilter separation/floating separation + A/O process，Its Technical efficiency of end-of-pipe management74，The formula for calculating the actual operation rate (k-value) of the end-of-pipe treatment facility is k = power consumption of treatment facilities (kWh/year) / (equipment rated power (kW) × equipment operating time (hours/year)).The original article describes the pollution production coefficients as 116.56A/(1-A)。Please revise the corresponding emissions after accounting for them according to the notes.。.The original article describes the pollution production coefficients as 116.56A/(1-A). Please revise the corresponding emissions after accounting for them according to the notes.
  污染物指标石油类的末端治理技术是过滤分离/上浮分离+A/O工艺，其效率为74，末端治理设施实际运行率（k值）计算公式为k=污水治理设施年运行时间（小时/年）/正常生产时间（小时/年）。原文件中描述污染物类别为废水，污染物指标为石油类，此处对其进行了匹配工作，将其匹配到LCAflow库里面相最符合的流原文描述的产污系数为 116.56A/(1-A)。请根据备注自行核算后修改对应的排放量。
- Petroleum-related waste: 0
  the Technical of end-of-pipe management technology for pollution Petroleum-related wasteisFilter separation/floating separation + A2/O process，Its Technical efficiency of end-of-pipe management74，The formula for calculating the actual operation rate (k-value) of the end-of-pipe treatment facility is k = operating time of wastewater treatment facilities (hours) / normal production time (hours).The original article describes the pollution production coefficients as 116.56A/(1-A)。Please revise the corresponding emissions after accounting for them according to the notes.。.The original article describes the pollution production coefficients as 116.56A/(1-A). Please revise the corresponding emissions after accounting for them according to the notes.
  污染物指标石油类的末端治理技术是过滤分离/上浮分离+A2/O工艺，其效率为74，末端治理设施实际运行率（k值）计算公式为k=污水治理设施年运行时间（小时/年）/正常生产时间（小时/年）。原文件中描述污染物类别为废水，污染物指标为石油类，此处对其进行了匹配工作，将其匹配到LCAflow库里面相最符合的流原文描述的产污系数为 116.56A/(1-A)。请根据备注自行核算后修改对应的排放量。
- Petroleum-related waste: 0
  the Technical of end-of-pipe management technology for pollution Petroleum-related wasteisFilter separation/floating separation + bio-contact oxidation process，Its Technical efficiency of end-of-pipe management92，The formula for calculating the actual operation rate (k-value) of the end-of-pipe treatment facility is k = power consumption of treatment facilities (kWh/year) / (equipment rated power (kW) × equipment operating time (hours/year)).The original article describes the pollution production coefficients as 116.56A/(1-A)。Please revise the corresponding emissions after accounting for them according to the notes.。.The original article describes the pollution production coefficients as 116.56A/(1-A). Please revise the corresponding emissions after accounting for them according to the notes.
  污染物指标石油类的末端治理技术是过滤分离/上浮分离+生物接触氧化法，其效率为92，末端治理设施实际运行率（k值）计算公式为k=污水治理设施年运行时间（小时/年）/正常生产时间（小时/年）。原文件中描述污染物类别为废水，污染物指标为石油类，此处对其进行了匹配工作，将其匹配到LCAflow库里面相最符合的流原文描述的产污系数为 116.56A/(1-A)。请根据备注自行核算后修改对应的排放量。
- Petroleum-related waste: 0
  the Technical of end-of-pipe management technology for pollution Petroleum-related wasteisFilter separation/floating separation + chemical coagulation，Its Technical efficiency of end-of-pipe management74，The formula for calculating the actual operation rate (k-value) of the end-of-pipe treatment facility is k = power consumption of treatment facilities (kWh/year) / (equipment rated power (kW) × equipment operating time (hours/year)).The original article describes the pollution production coefficients as 116.56A/(1-A)。Please revise the corresponding emissions after accounting for them according to the notes.。.The original article describes the pollution production coefficients as 116.56A/(1-A). Please revise the corresponding emissions after accounting for them according to the notes.
  污染物指标石油类的末端治理技术是过滤分离/上浮分离+化学混凝法，其效率为74，末端治理设施实际运行率（k值）计算公式为k=污水治理设施年运行时间（小时/年）/正常生产时间（小时/年）。原文件中描述污染物类别为废水，污染物指标为石油类，此处对其进行了匹配工作，将其匹配到LCAflow库里面相最符合的流原文描述的产污系数为 116.56A/(1-A)。请根据备注自行核算后修改对应的排放量。
- Petroleum-related waste: 0
  the Technical of end-of-pipe management technology for pollution Petroleum-related wasteisFilter separation/floating separation + SBR，Its Technical efficiency of end-of-pipe management74.The original article describes the pollution production coefficients as 116.56A/(1-A)。Please revise the corresponding emissions after accounting for them according to the notes.。.The original article describes the pollution production coefficients as 116.56A/(1-A). Please revise the corresponding emissions after accounting for them according to the notes.
  污染物指标石油类的末端治理技术是过滤分离/上浮分离+SBR类，其效率为74，末端治理设施实际运行率（k值）计算公式为k=污水治理设施年运行时间（小时/年）/正常生产时间（小时/年）。原文件中描述污染物类别为废水，污染物指标为石油类，此处对其进行了匹配工作，将其匹配到LCAflow库里面相最符合的流原文描述的产污系数为 116.56A/(1-A)。请根据备注自行核算后修改对应的排放量。
- Petroleum-related waste: 0
  the Technical of end-of-pipe management technology for pollution Petroleum-related wasteisHydrocyclone + degassing and oil removal tank + discharge，Its Technical efficiency of end-of-pipe management41.The original article describes the pollution production coefficients as 116.56A/(1-A)。Please revise the corresponding emissions after accounting for them according to the notes.。.The original article describes the pollution production coefficients as 116.56A/(1-A). Please revise the corresponding emissions after accounting for them according to the notes.
  污染物指标石油类的末端治理技术是水力旋流器＋脱气除油罐＋排放，其效率为41，末端治理设施实际运行率（k值）计算公式为k=污水治理设施年运行时间（小时/年）/正常生产时间（小时/年）。原文件中描述污染物类别为废水，污染物指标为石油类，此处对其进行了匹配工作，将其匹配到LCAflow库里面相最符合的流原文描述的产污系数为 116.56A/(1-A)。请根据备注自行核算后修改对应的排放量。
- Petroleum-related waste: 0
  the Technical of end-of-pipe management technology for pollution Petroleum-related wasteisHydrocyclone + filter + discharge，Its Technical efficiency of end-of-pipe management74.The original article describes the pollution production coefficients as 116.56A/(1-A)。Please revise the corresponding emissions after accounting for them according to the notes.。.The original article describes the pollution production coefficients as 116.56A/(1-A). Please revise the corresponding emissions after accounting for them according to the notes.
  污染物指标石油类的末端治理技术是水力旋流器＋过滤器＋排放，其效率为74，末端治理设施实际运行率（k值）计算公式为k=污水治理设施年运行时间（小时/年）/正常生产时间（小时/年）。原文件中描述污染物类别为废水，污染物指标为石油类，此处对其进行了匹配工作，将其匹配到LCAflow库里面相最符合的流原文描述的产污系数为 116.56A/(1-A)。请根据备注自行核算后修改对应的排放量。
- Petroleum-related waste: 0
  the Technical of end-of-pipe management technology for pollution Petroleum-related wasteisInclined plate oil separator + traditional gas flotation machine + walnut shell filter + dual media filter + reinjection，Its Technical efficiency of end-of-pipe management100，The formula for calculating the actual operation rate (k-value) of the end-of-pipe treatment facility is k = power consumption of treatment facilities (kWh/year) / (equipment rated power (kW) × equipment operating time (hours/year)).The original article describes the pollution production coefficients as 116.56A/(1-A)。Please revise the corresponding emissions after accounting for them according to the notes.。.The original article describes the pollution production coefficients as 116.56A/(1-A). Please revise the corresponding emissions after accounting for them according to the notes.
  污染物指标石油类的末端治理技术是斜板隔油＋传统气体浮选机＋核桃壳过滤器＋双介质过滤器＋回注，其效率为100，末端治理设施实际运行率（k值）计算公式为k=污水治理设施年运行时间（小时/年）/正常生产时间（小时/年）。原文件中描述污染物类别为废水，污染物指标为石油类，此处对其进行了匹配工作，将其匹配到LCAflow库里面相最符合的流原文描述的产污系数为 116.56A/(1-A)。请根据备注自行核算后修改对应的排放量。
- Petroleum-related waste: 0
  the Technical of end-of-pipe management technology for pollution Petroleum-related wasteisPhysical + chemical + reinjection，Its Technical efficiency of end-of-pipe management100，The formula for calculating the actual operation rate (k-value) of the end-of-pipe treatment facility is k = power consumption of treatment facilities (kWh/year) / (equipment rated power (kW) × equipment operating time (hours/year)).The original article describes the pollution production coefficients as 116.56A/(1-A)。Please revise the corresponding emissions after accounting for them according to the notes.。.The original article describes the pollution production coefficients as 116.56A/(1-A). Please revise the corresponding emissions after accounting for them according to the notes.
  污染物指标石油类的末端治理技术是物理+化学+回注，其效率为100，末端治理设施实际运行率（k值）计算公式为k=污水治理设施年运行时间（小时/年）/正常生产时间（小时/年）。原文件中描述污染物类别为废水，污染物指标为石油类，此处对其进行了匹配工作，将其匹配到LCAflow库里面相最符合的流原文描述的产污系数为 116.56A/(1-A)。请根据备注自行核算后修改对应的排放量。
- Petroleum-related waste: 0
  the Technical of end-of-pipe management technology for pollution Petroleum-related wasteisPhysical + reinjection，Its Technical efficiency of end-of-pipe management100，The formula for calculating the actual operation rate (k-value) of the end-of-pipe treatment facility is k = power consumption of treatment facilities (kWh/year) / (equipment rated power (kW) × equipment operating time (hours/year)).The original article describes the pollution production coefficients as 116.56A/(1-A)。Please revise the corresponding emissions after accounting for them according to the notes.。.The original article describes the pollution production coefficients as 116.56A/(1-A). Please revise the corresponding emissions after accounting for them according to the notes.
  污染物指标石油类的末端治理技术是物理+回注，其效率为100，末端治理设施实际运行率（k值）计算公式为k=污水治理设施年运行时间（小时/年）/正常生产时间（小时/年）。原文件中描述污染物类别为废水，污染物指标为石油类，此处对其进行了匹配工作，将其匹配到LCAflow库里面相最符合的流原文描述的产污系数为 116.56A/(1-A)。请根据备注自行核算后修改对应的排放量。
- phenol: 0
  the Technical of end-of-pipe management technology for pollution phenolisBuffer tank + hydrocyclone + discharge，The formula for calculating the actual operation rate (k-value) of the end-of-pipe treatment facility is k = power consumption of treatment facilities (kWh/year) / (equipment rated power (kW) × equipment operating time (hours/year)).The original article describes the pollution production coefficients as 0.83A/(1-A)。Please revise the corresponding emissions after accounting for them according to the notes.。.The original article describes the pollution production coefficients as 0.83A/(1-A). Please revise the corresponding emissions after accounting for them according to the notes.
  污染物指标挥发酚的末端治理技术是缓冲罐＋水力旋流器＋排放，末端治理设施实际运行率（k值）计算公式为k=污水治理设施年运行时间（小时/年）/正常生产时间（小时/年）。原文件中描述污染物类别为废水，污染物指标为挥发酚，此处对其进行了匹配工作，将其匹配到LCAflow库里面相最符合的流原文描述的产污系数为 0.83A/(1-A)。请根据备注自行核算后修改对应的排放量。
- phenol: 0
  the Technical of end-of-pipe management technology for pollution phenolisFilter separation/floating separation + A/O process，Its Technical efficiency of end-of-pipe management73，The formula for calculating the actual operation rate (k-value) of the end-of-pipe treatment facility is k = power consumption of treatment facilities (kWh/year) / (equipment rated power (kW) × equipment operating time (hours/year)).The original article describes the pollution production coefficients as 0.83A/(1-A)。Please revise the corresponding emissions after accounting for them according to the notes.。.The original article describes the pollution production coefficients as 0.83A/(1-A). Please revise the corresponding emissions after accounting for them according to the notes.
  污染物指标挥发酚的末端治理技术是过滤分离/上浮分离+A/O工艺，其效率为73，末端治理设施实际运行率（k值）计算公式为k=污水治理设施年运行时间（小时/年）/正常生产时间（小时/年）。原文件中描述污染物类别为废水，污染物指标为挥发酚，此处对其进行了匹配工作，将其匹配到LCAflow库里面相最符合的流原文描述的产污系数为 0.83A/(1-A)。请根据备注自行核算后修改对应的排放量。
- phenol: 0
  the Technical of end-of-pipe management technology for pollution phenolisFilter separation/floating separation + A2/O process，Its Technical efficiency of end-of-pipe management73.The original article describes the pollution production coefficients as 0.83A/(1-A)。Please revise the corresponding emissions after accounting for them according to the notes.。.The original article describes the pollution production coefficients as 0.83A/(1-A). Please revise the corresponding emissions after accounting for them according to the notes.
  污染物指标挥发酚的末端治理技术是过滤分离/上浮分离+A2/O工艺，其效率为73，末端治理设施实际运行率（k值）计算公式为k=污水治理设施年运行时间（小时/年）/正常生产时间（小时/年）。原文件中描述污染物类别为废水，污染物指标为挥发酚，此处对其进行了匹配工作，将其匹配到LCAflow库里面相最符合的流原文描述的产污系数为 0.83A/(1-A)。请根据备注自行核算后修改对应的排放量。
- phenol: 0
  the Technical of end-of-pipe management technology for pollution phenolisFilter separation/floating separation + bio-contact oxidation process，Its Technical efficiency of end-of-pipe management73，The formula for calculating the actual operation rate (k-value) of the end-of-pipe treatment facility is k = power consumption of treatment facilities (kWh/year) / (equipment rated power (kW) × equipment operating time (hours/year)).The original article describes the pollution production coefficients as 0.83A/(1-A)。Please revise the corresponding emissions after accounting for them according to the notes.。.The original article describes the pollution production coefficients as 0.83A/(1-A). Please revise the corresponding emissions after accounting for them according to the notes.
  污染物指标挥发酚的末端治理技术是过滤分离/上浮分离+生物接触氧化法，其效率为73，末端治理设施实际运行率（k值）计算公式为k=污水治理设施年运行时间（小时/年）/正常生产时间（小时/年）。原文件中描述污染物类别为废水，污染物指标为挥发酚，此处对其进行了匹配工作，将其匹配到LCAflow库里面相最符合的流原文描述的产污系数为 0.83A/(1-A)。请根据备注自行核算后修改对应的排放量。
- phenol: 0
  the Technical of end-of-pipe management technology for pollution phenolisFilter separation/floating separation + chemical coagulation，Its Technical efficiency of end-of-pipe management45，The formula for calculating the actual operation rate (k-value) of the end-of-pipe treatment facility is k = operating time of wastewater treatment facilities (hours) / normal production time (hours).The original article describes the pollution production coefficients as 0.83A/(1-A)。Please revise the corresponding emissions after accounting for them according to the notes.。.The original article describes the pollution production coefficients as 0.83A/(1-A). Please revise the corresponding emissions after accounting for them according to the notes.
  污染物指标挥发酚的末端治理技术是过滤分离/上浮分离+化学混凝法，其效率为45，末端治理设施实际运行率（k值）计算公式为k=污水治理设施年运行时间（小时/年）/正常生产时间（小时/年）。原文件中描述污染物类别为废水，污染物指标为挥发酚，此处对其进行了匹配工作，将其匹配到LCAflow库里面相最符合的流原文描述的产污系数为 0.83A/(1-A)。请根据备注自行核算后修改对应的排放量。
- phenol: 0
  the Technical of end-of-pipe management technology for pollution phenolisHydrocyclone + degassing and oil removal tank + discharge，The formula for calculating the actual operation rate (k-value) of the end-of-pipe treatment facility is k = power consumption of treatment facilities (kWh/year) / (equipment rated power (kW) × equipment operating time (hours/year)).The original article describes the pollution production coefficients as 0.83A/(1-A)。Please revise the corresponding emissions after accounting for them according to the notes.。.The original article describes the pollution production coefficients as 0.83A/(1-A). Please revise the corresponding emissions after accounting for them according to the notes.
  污染物指标挥发酚的末端治理技术是水力旋流器＋脱气除油罐＋排放，末端治理设施实际运行率（k值）计算公式为k=污水治理设施年运行时间（小时/年）/正常生产时间（小时/年）。原文件中描述污染物类别为废水，污染物指标为挥发酚，此处对其进行了匹配工作，将其匹配到LCAflow库里面相最符合的流原文描述的产污系数为 0.83A/(1-A)。请根据备注自行核算后修改对应的排放量。
- phenol: 0
  the Technical of end-of-pipe management technology for pollution phenolisHydrocyclone + filter + discharge.The original article describes the pollution production coefficients as 0.83A/(1-A)。Please revise the corresponding emissions after accounting for them according to the notes.。.The original article describes the pollution production coefficients as 0.83A/(1-A). Please revise the corresponding emissions after accounting for them according to the notes.
  污染物指标挥发酚的末端治理技术是水力旋流器＋过滤器＋排放，末端治理设施实际运行率（k值）计算公式为k=污水治理设施年运行时间（小时/年）/正常生产时间（小时/年）。原文件中描述污染物类别为废水，污染物指标为挥发酚，此处对其进行了匹配工作，将其匹配到LCAflow库里面相最符合的流原文描述的产污系数为 0.83A/(1-A)。请根据备注自行核算后修改对应的排放量。
- phenol: 0
  the Technical of end-of-pipe management technology for pollution phenolisInclined plate oil separator + traditional gas flotation machine + walnut shell filter + dual media filter + reinjection，Its Technical efficiency of end-of-pipe management100，The formula for calculating the actual operation rate (k-value) of the end-of-pipe treatment facility is k = power consumption of treatment facilities (kWh/year) / (equipment rated power (kW) × equipment operating time (hours/year)).The original article describes the pollution production coefficients as 0.83A/(1-A)。Please revise the corresponding emissions after accounting for them according to the notes.。.The original article describes the pollution production coefficients as 0.83A/(1-A). Please revise the corresponding emissions after accounting for them according to the notes.
  污染物指标挥发酚的末端治理技术是斜板隔油＋传统气体浮选机＋核桃壳过滤器＋双介质过滤器＋回注，其效率为100，末端治理设施实际运行率（k值）计算公式为k=污水治理设施年运行时间（小时/年）/正常生产时间（小时/年）。原文件中描述污染物类别为废水，污染物指标为挥发酚，此处对其进行了匹配工作，将其匹配到LCAflow库里面相最符合的流原文描述的产污系数为 0.83A/(1-A)。请根据备注自行核算后修改对应的排放量。
- phenol: 0
  the Technical of end-of-pipe management technology for pollution phenolisPhysical + chemical + reinjection，Its Technical efficiency of end-of-pipe management100，The formula for calculating the actual operation rate (k-value) of the end-of-pipe treatment facility is k = power consumption of treatment facilities (kWh/year) / (equipment rated power (kW) × equipment operating time (hours/year)).The original article describes the pollution production coefficients as 0.83A/(1-A)。Please revise the corresponding emissions after accounting for them according to the notes.。.The original article describes the pollution production coefficients as 0.83A/(1-A). Please revise the corresponding emissions after accounting for them according to the notes.
  污染物指标挥发酚的末端治理技术是物理+化学+回注，其效率为100，末端治理设施实际运行率（k值）计算公式为k=污水治理设施年运行时间（小时/年）/正常生产时间（小时/年）。原文件中描述污染物类别为废水，污染物指标为挥发酚，此处对其进行了匹配工作，将其匹配到LCAflow库里面相最符合的流原文描述的产污系数为 0.83A/(1-A)。请根据备注自行核算后修改对应的排放量。
- phenol: 0
  the Technical of end-of-pipe management technology for pollution phenolisPhysical + reinjection，Its Technical efficiency of end-of-pipe management100，The formula for calculating the actual operation rate (k-value) of the end-of-pipe treatment facility is k = power consumption of treatment facilities (kWh/year) / (equipment rated power (kW) × equipment operating time (hours/year)).The original article describes the pollution production coefficients as 0.83A/(1-A)。Please revise the corresponding emissions after accounting for them according to the notes.。.The original article describes the pollution production coefficients as 0.83A/(1-A). Please revise the corresponding emissions after accounting for them according to the notes.
  污染物指标挥发酚的末端治理技术是物理+回注，其效率为100，末端治理设施实际运行率（k值）计算公式为k=污水治理设施年运行时间（小时/年）/正常生产时间（小时/年）。原文件中描述污染物类别为废水，污染物指标为挥发酚，此处对其进行了匹配工作，将其匹配到LCAflow库里面相最符合的流原文描述的产污系数为 0.83A/(1-A)。请根据备注自行核算后修改对应的排放量。
- Waste water: 0
  the treatment technology for the pollution of Waste waterdidn't offered，The formula for calculating the actual operation rate (k-value) of the end-of-pipe treatment facility is k = power consumption of treatment facilities (kWh/year) / (equipment rated power (kW) × equipment operating time (hours/year)).The original article describes the pollution production coefficients as A/(1-A)。Please revise the corresponding emissions after accounting for them according to the notes.。.The original article describes the pollution production coefficients as A/(1-A). Please revise the corresponding emissions after accounting for them according to the notes.
  污染物指标工业废水量的末端治理技术未说明。原文件中描述污染物类别为废水，污染物指标为工业废水量，此处对其进行了匹配工作，将其匹配到LCAflow库里面相最符合的流原文描述的产污系数为 A/(1-A)。请根据备注自行核算后修改对应的排放量。

## Use advice
This dataset is derived from the Pollution Source Census Report and contains information on pollution emissions and related products. However, it does not include data on energy or chemical consumption, nor does it provide information on waste or co-product generation. When utilizing this dataset, please supplement the missing data based on actual conditions before use
该数据集来源于污染源普查报告，包含污染物排放及相关产品信息，但不包含能源或化学品消耗数据，也不提供废弃物或共生产物产生信息。在使用该数据集时，请根据实际情况补充缺失数据后再使用。

## Review details
Inventory: The internal review was done by several iteration steps concerning raw data validation, raw data documentation, representativity, completeness and consistency of modelling with regard to ISO 14040 and 14044.
清单： 内部审查通过几个迭代步骤完成，涉及原始数据验证、原始数据记录、代表性、完整性、与 ISO 14040 和 14044 有关的建模的一致性。

## Data sources
- 第二次全国污染源普查产排污核算系数手册（试用版）,二级代码07文件，在完整版文件中第50页
