# Soil remediation ; Ex-situ remediation ; Collaborative disposal of cement kilns ; Preparation stage ; Pulverized coal preparation ; Carbon dioxide

Dataset: ILCD process, Unit process, single operation
Geography: CN
Reference year: 2015
Classification: Other Services / Repair and maintenance
Generated by: Cao Jiameng, 2979480760@qq.com
Owner: Tiangong LCI Data Working Group
Review: Dependent internal review by Tiangong LCI Data Working Group
Amounts: no units in this file; such an amount is in the reference unit of its flow, which a separate flow dataset defines
copyright: false
licenseType: Free of charge for all users and uses

## General comment
The cement plant has a modern dry process production line with a scale of 4000t/d, producing 1.9 million tons of cement and 1.5 million tons of clinker annually. The company's own mining area is 0.448km2, and the annual production capacity of limestone is 2 million tons. The production process adopts advanced RSP level five kiln external decomposition technology. Hazardous waste is transported by vehicles, equipped with hazardous goods special vehicles, and the driving route is a truck dedicated line. The transportation distance from the mine to the factory area is about 1.5km, The transportation distance of waste is about 50km. The production process of conventional cement mainly includes stages such as the extraction and transportation of raw and auxiliary materials, raw material preparation, coal powder preparation, clinker calcination, and cement grinding. After adding waste disposal links, waste (polluted soil, digested sludge, waste oil sludge, etc.) can be used as alternative raw materials and fuels to save raw materials such as limestone and coal. The collaborative disposal of cement kilns, preparation stage, and coal powder preparation process mainly include the storage and grinding of coal and industrial waste (waste clay, coating slag, and waste oil sludge).

## Technology and included processes
The coal powder preparation process mainly includes the storage and grinding of coal and industrial waste (waste clay, coating slag, and waste oil sludge).

## Technical purpose
The described industrial process is used for the life cycle assessment of soil remediation through ex-situ treatment. Specifically, it involves the collaborative disposal of waste materials in cement kilns as a part of the preparation stage for produced cement. This includes the substitution of traditional raw materials with waste products such as polluted soil, digested sludge, waste oil sludge, etc., in the pulverized coal preparation stage, to save on natural resources like limestone and coal. The described process is relevant for cement plants with modern dry processes that seek to integrate environmental sustainability into their production.

## Reference product
- carbon dioxide: 13.26; measured

## Inputs
All rows: measured
- waste clay: 1.05
- Coating residue: 0.16
- oil sludge: 5.26
- Hard coal, at consumer EU-27: 98.28
- Electricity: 19.8

## Outputs
- Hard coal, at consumer EU-27: 98.8; measured

## Use advice
When utilizing this dataset for life cycle assessment (LCA), ensure to account for the sources and types of waste materials used as substitutes in the process. The unique aspects of transport, such as the distance from mine to plant and waste transport distance, must be reflected in the LCA model. Modelers should also consider the technology used in the process, namely the RSP level five kiln external decomposition, and its impact on emissions and energy use. Additionally, the process excludes negligible amounts of exhaust gas, wastewater, or solid waste, which should not be featured in LCA calculations unless significant for the specific assessment.

## Review details
Inventory: The internal review was done by several iteration steps concerning raw data validation, raw data documentation, representativity, completeness and consistency of modelling with regard to ISO 14040 and 14044.

## Data sources
- 侯星宇,张芸,戚昱等.水泥窑协同处置工业废弃物的生命周期评价[J].环境科学学报,2015,35(12):4112-4119.
