# Soil Remediation;In-situ Remediation;Bioventilation;Exhaust Gas Treatment

Dataset: ILCD process, Unit process, single operation
Geography: CN
Reference year: 2022
Classification: Other Services / Repair and maintenance
Generated by: Wang Ning, wang_ning@caep.org.cn
Owner: Tiangong LCI Data Working Group
Review: Dependent internal review by Tiangong LCI Data Working Group
Amounts: no units in this file; such an amount is in the reference unit of its flow, which a separate flow dataset defines
copyright: false
licenseType: Free of charge for all users and uses

## General comment
Treatment of extracted exhaust gases

## Geography
案例焦化厂位于我国北方中纬度地带

## Technology and included processes
Use of electricity, diesel fuel, natural gas, etc. to treat extracted soil gas

## Technical purpose
The process described is used for soil remediation through in situ treatment involving biopile (biological ventilation). It particularly relates to a waste gas treatment unit process (single operation) case, typically employed at a coking plant located in the mid-latitude regions of Northern China.

## Reference product
- Exhaust gases treated: 1; measured
  得到处理的废气

## Inputs
All rows: measured
- Electricity: 240000
  消耗电力处理抽提上来的土壤气
- Gasoline (regular): 15600
  消耗天然气处理抽提上来的土壤气
- Diesel: 708
  消柴油处理抽提上来的土壤气
- Water: 414
  消耗水处理抽提上来的土壤气
- Light fuel oil: 698
  消耗汽油处理抽提上来的土壤气
- Exhaust gas: 1
  抽出的土壤气废气

## Use advice
When utilizing this data set, ensure consideration for the region-specific environmental standards and regulations for soil remediation and waste gas treatment. The methodological assumptions need to reflect the technological specifics of biopile systems deployed in mid-latitude regions of Northern China. Additionally, if integrating this process into a broader LCA, make sure to account for related upstream and downstream processes such as energy inputs for the ventilation system and the final disposal of residues.

## Review details
Inventory: The internal review was done by several iteration steps concerning raw data validation, raw data documentation, representativity, completeness and consistency of modelling with regard to ISO 14040 and 14044.

## Data sources
- 刘文晓,夏天翔,张丽娜等.基于修复效果的污染土壤修复工程环境足迹分析[J].环境科学研究,2022,35(10):2367-2377.DOI:10.13198/j.issn.1001-6929.2022.07.05.
