# Bauxite Mining ; Bauxite ; Cradle ; 2012

Dataset: ILCD process, Unit process, single operation
Geography: CN
Reference year: 2021
Classification: Unit processes / Materials production / Non-energetic raw materials
Generated by: Zimeng Cai, caizm6178@163.com
Owner: Tiangong LCI Data Working Group
Review: Dependent internal review by Tiangong LCI Data Working Group
Amounts: no units in this file; such an amount is in the reference unit of its flow, which a separate flow dataset defines
copyright: false
licenseType: Free of charge for all users and uses

## General comment
氧化铝生产2017

## Time period
Date of publication

## Technical purpose
The data set represents the life cycle assessment for bauxite mining and the production of alumina in the year 2017. Applicable for enterprises involved in the extraction and processing of bauxite into alumina, which is primarily used as the feedstock for producing aluminium metal by the electrolytic reduction process.

## Reference product
- bauxite: 4.36688e10; software or database

## Inputs
All rows: software or database
- electricity, high voltage, aluminium industry: 7.62768e7
  electricity
- other fuels: 2.37887e9
  electricity
- Coal, brown, in ground: 3.1901e7
  coal
- Gasoline: 1.572e6
  gasoline
- Diesel oil: 1.1694e7
  diesel

## Data selection and combination
The data in this study refers to the LCA data of PA, SA, electricity, and other background data. The PA data were obtained from statistical data sources, and the SA data were mainly obtained from the literatures. The background data were mainly derived from the Chinese localization LCA database CAS RCEES 2018, which was established by the Research Center for Eco-Environmental Sciences, Chinese Academy of Sciences and covers LCA data for energy, materials, transportation, waste management etc.

## Use advice
Users should note that this data for bauxite mining and alumina production is based on statistical and literature sources from 2012 and more recent background data from the CAS RCEES 2018 LCA database. When applying this data, users should ensure compatibility with their regional and temporal context. Users should also consider any updates or changes in technology, practices, and environmental regulations since 2012 that could affect the LCA results.

## Review details
Inventory: The internal review was done by several iteration steps concerning raw data validation, raw data documentation, representativity, completeness and consistency of modelling with regard to ISO 14040 and 14044.

## Data sources
- Ding, N., Liu, N., Lu, B. & Yang, J. Life cycle greenhouse gas emissions of aluminum based on regional industrial transfer in China. J. Ind. Ecol. 25, 1657–1672 (2021).
