# Repaired groundwater ; MNA system ; Groundwater risk management ; 5 years of operation

Dataset: ILCD process, Unit process, single operation
Geography: JS-CN
Reference year: 2024
Classification: Unit processes / Other Services / Repair and maintenance
Generated by: Yang Xintong, yangxt@caep.org.cn
Owner: Tiangong LCI Data Working Group
Review: Dependent internal review by Tiangong LCI Data Working Group
Amounts: no units in this file; such an amount is in the reference unit of its flow, which a separate flow dataset defines
copyright: false
licenseType: Free of charge for all users and uses

## General comment
After 5 years of natural attenuation monitoring, the pollution source area is 225 m2, and the concentration of VOCs in water has increased from 236.89 mg/L to 76.2 mg/L

## Time period
Publication time of literature

## Technical purpose
The MNA (Monitored Natural Attenuation) system described is designed for the remediation of contaminated groundwater, specifically for managing the risk associated with VOCs (Volatile Organic Compounds) in a polluted area covering 225 m2. This process aligns with long-term groundwater quality efforts such as the natural reduction of contaminant concentrations over a 5-year operation period.

## Reference product
- Remediated groundwater: 1184.85; measured

## Inputs
- Monitoring well: 49; measured
- contaminated groundwater: 1184.85; measured
- Groundwater sample and TVOC analysis: 20; measured

## Use advice
Users of this LCA data should note that the information reflects a specific monitored natural attenuation process over 5 years for a defined pollution source area. To ensure accurate application, adapt these data carefully when scaling to different contexts or time frames. Take caution to maintain consistency with the assumptions made during the monitoring period, including the initial and final VOC concentrations. Avoid direct comparisons with remediation technologies without proper context

## Review details
Inventory: The internal review was done by several iteration steps concerning raw data validation, raw data documentation, representativity, completeness and consistency of modelling with regard to ISO 14040 and 14044.

## Data sources
- Ding, D. et al. Assessing the environmental impacts and costs of biochar and monitored natural attenuation for groundwater heavily contaminated with volatile organic compounds. Science of The Total Environment 846, 157316 (2022).
