# Municipal sludge treatment and disposal;wet sludge moisture content 83.48%;blended with coal for incineration for power generation and drying

Dataset: ILCD process, Unit process, single operation
Geography: CN
Classification: Unit processes / End-of-life treatment / Waste water treatment
Functional unit: The functional unit is 1t wet sludge.
Generated by: Jin Sitian, 2331276@tongji.edu.cn
Owner: Tiangong LCI Data Working Group
Review: Dependent internal review by Tiangong LCI Data Working Group
Amounts: no units in this file; such an amount is in the reference unit of its flow, which a separate flow dataset defines
copyright: ['opt4ROkqig']
licenseType: Free of charge for all users and uses

## General comment
In this paper, the municipal sludge with a moisture content of 83.48% and a dry base calorific value of 5MJ/kg was treated and dried into 45% sludge through flue gas, and then blended with anthracite with a calorific value of 22.16MJ/kg for power generation.

## Technology and included processes
In the process of incineration power generation and flue gas drying and desulfurization, it is assumed that the desulfurization efficiency reaches 90%, the system power generation efficiency reaches 30%, and the plant electricity accounts for 5% of the power generation.

## Technical purpose
This data set refers to municipal sludge treatment and disposal processes where wet sludge with a moisture content of 83.48% is dried through flue gas to 45% moisture content sludge. The dried sludge is then blended with anthracite coal for co-incineration in power generation. The primary application for this process is in waste-to-energy facilities where municipal wastewater treatment by-products are utilized as a supplementary fuel source to coal for electricity production.

## Reference product
- Sludge: 1000; input; estimated
  In this article, municipal sludge with a moisture content of 83.48% and a dry basis calorific value of 5MJ/kg will be treated.

## Inputs
- hard coal: 166.54; calculated
- Light fuel oil: 0.02459; calculated
  fuel oil
- hydrogen chloride: 0.09293; calculated
  NMVOC

## Outputs
All rows: calculated
- Flue dust: 3.86673
  soot
- carbon dioxide (fossil): 4007.77
  The original text does not distinguish between biogenic and fossil, and according to experts, it is fossil here.
- carbon monoxide (fossil): 1.65217
  (same comment as for carbon dioxide (fossil))
- Nitrogen oxides: 3.54378
- sulfur dioxide: 1.46455
- methane (fossil): 10.5553
  (same comment as for carbon dioxide (fossil))
- Waste (solid): 606.522

## Use advice
Users utilizing this data set for Life Cycle Assessment (LCA) should ensure accurate allocation of environmental impacts between the sludge treatment/disposal and the power generation processes, considering the shared use of energy and materials. The calorific values of both the sludge and the anthracite coal need to be accounted for when modeling the co-incineration process. It is important to consider the geographical and technological context of the waste-to-energy facility, as it may affect the environmental impact results. End-of-life phase modeling should also take into account potential energy recovery and emissions associated with the incineration of sludge.

## Review details
Inventory: The internal review was done by several iteration steps concerning raw data validation, raw data documentation, representativity, completeness and consistency of modelling with regard to ISO 14040 and 14044.

## Data sources
- 董进宁,马晓茜.基于生命周期评价的市政污泥烟气干化环境影响评价及其经济性分析[J].现代化工,2009,29(04):82-86.
