# Bauxite Mining ; Bauxite ; Cradle ; 2017

Dataset: ILCD process, Unit process, single operation
Geography: CN
Reference year: 2021
Classification: Unit processes / Materials production / Non-energetic raw materials
Generated by: Zimeng Cai, caizm6178@163.com
Owner: Tiangong LCI Data Working Group
Review: Dependent internal review by Tiangong LCI Data Working Group
Amounts: no units in this file; such an amount is in the reference unit of its flow, which a separate flow dataset defines
copyright: false
licenseType: Free of charge for all users and uses

## General comment
氧化铝生产2017

## Time period
Date of publication

## Technical purpose
This dataset pertains to the mining of bauxite ore, which is the primary raw material used in the production of alumina (Al2O3) and subsequently in the manufacture of aluminium through electrolysis. The bauxite extracted through this industrial process can be used in multiple sectors including, but not limited to, the aluminum production industry, refractory materials, and abrasives. The data set represents information relevant up to the stage of extracted bauxite, typically referred to as the 'cradle' stage in Life Cycle Assessment terms.

## Reference product
- bauxite: 7.59288e10; software or database

## Inputs
- electricity, high voltage, aluminium industry: 1.3451e8; software or database
  electricity
- Coal, brown, in ground: 2.564e7; software or database
  coal
- Diesel oil: 2.4379e7; software or database
  diesel
- petrol, unleaded, burned in machinery: 1.409e6; software or database
  gasoline

## Data selection and combination
The data in this study refers to the LCA data of PA, SA, electricity, and other background data. The PA data were obtained from statistical data sources, and the SA data were mainly obtained from the literatures. The background data were mainly derived from the Chinese localization LCA database CAS RCEES 2018, which was established by the Research Center for Eco-Environmental Sciences, Chinese Academy of Sciences and covers LCA data for energy, materials, transportation, waste management etc.

## Use advice
Users of this dataset should pay attention to the scope of application, which is limited to the extraction and processing phase ('cradle') of bauxite up until 2017. When using this data, consider that the methodological approach includes statistical data for PA and SA (process analysis and sensitivity analysis respectively) and an extensive background LCA database, CAS RCEES 2018, localized to Chinese conditions. This information is critical for those applying this dataset to ensure that the context of technological and environmental impacts remain applicable and valid for the intended LCA scope. Users should also pay attention to the date of publication and sourcing of the data to assess if the dataset requires updating or if more recent data should be sought.

## Review details
Inventory: The internal review was done by several iteration steps concerning raw data validation, raw data documentation, representativity, completeness and consistency of modelling with regard to ISO 14040 and 14044.

## Data sources
- Ding, N., Liu, N., Lu, B. & Yang, J. Life cycle greenhouse gas emissions of aluminum based on regional industrial transfer in China. J. Ind. Ecol. 25, 1657–1672 (2021).
