# Plexiglass ; PMMA: Polymethyl Methacrylate (also known as Acrylic or Plexiglass) ;Coarse monomer tank

Dataset: ILCD process, Unit process, single operation
Geography: JX-CN
Classification: Unit processes / Materials production / Glass and ceramics
Generated by: He xiaxia, 18616148319@163.com
Owner: Tiangong LCI Data Working Group
Review: Dependent internal review by Tiangong LCI Data Working Group
Amounts: no units in this file; such an amount is in the reference unit of its flow, which a separate flow dataset defines
copyright: false
licenseType: Free of charge for all users and uses

## General comment
The process data represent the production of the PMMA monomer, MMA (methyl methacrylate), which is stored in a rough monomer tank. PMMA, also known as acrylic or plexiglass, is utilized extensively in manufacturing a variety of products such as transparent barriers, signs, aircraft canopies, and light fixtures. Additionally, MMA is a precursor in making casting and extrusion sheets, resins for coatings, and emulsion polymers.

## Reference product
- methyl methacrylate: 997.998; measured
  MMA rough finished product

## Inputs
All rows: measured
- Electricity: 138.24
- methyl methacrylate: 896.478
- polymethyl methacrylate (PMMA) beads: 26.062
- freshwater: 15.081
- organic waste (unspecified): 27.4685
- methanol: 8.88
- methacrylic acid: 11.9325
- methacrylate: 11.9325

## Outputs
- Waste (solid): 3.12; measured

## Use advice
Data users should note that the LCA data specifically pertains to the production phase of MMA and its interim storage in a rough monomer tank prior to further processing. When applying this data to assess the environmental impact in a product's lifecycle, ensure that the data is used in the correct context of PMMA production. Use phase behavior, end-of-life options such as recycling and disposal, and the transportation of the MMA should be considered additionally according to specific product requirements and regional regulations. Exclude the impacts of subsequent processing unless the LCA scope explicitly includes them.

## Review details
Inventory: The internal review was done by several iteration steps concerning raw data validation, raw data documentation, representativity, completeness and consistency of modelling with regard to ISO 14040 and 14044.

## Data sources
- 江西旺达新材料有限公司年产20000吨有机玻璃原料生产项目
