# Intermediate culture of abalone ; Large larva of abalone ; Cage culture

Dataset: ILCD process, Unit process, black box
Geography: ND-FJ-CN
Reference year: 2017
Valid until: 2018
Classification: Unit processes / Materials production / Food and renewable raw materials
Functional unit: 1 live-weight ton of abalone
LCI method principle: Attributional
LCI method approaches: Allocation - mass
Generated by: Kangni Wu, wukangni@xmu.stu.edu.cn
Owner: Tiangong LCI Data Working Group
Review: Dependent internal review by Tiangong LCI Data Working Group
Amounts: no units in this file; such an amount is in the reference unit of its flow, which a separate flow dataset defines
copyright: false
licenseType: Free of charge for all users and uses

## General comment
The system includes energy production (red), feed production (green), the main chain of aquaculture production (blue), and the production of other inputs (purple).

## Geography
The prefecture-level city of Ningde comprises a group of districts and counties, of which Fuding city (A), Xiapu County (B), Fu’an city (C), and Jiaocheng district (D) are next to the sea and were included in our assessment. A total of 321 households were randomly sampled in the area in August 2017 and January 2018, and we analyzed the data from 292 households that had mariculture production during 2016.

## Time period
The literature did not specify the sampling time. The researchers conducted household interviews in August 2017 and January 2018 in the coastal areas of Ningde City

## Technology and included processes
Breeding and culture technology of abalone. The sea area of abalone cultivation must be more convenient for water and land transportation, there is no serious industrial pollution in the sea area, the water flow condition is good, the water depth should not be too shallow, it is best to reach 8 to 15 meters, the water quality is clear, and the transparency is greater than 4 meters; The optimum growth water temperature of abalone is 14~24C, so the water temperature in the sea area should not be less than 10C; The purchase of seedlings should be carried out at the time of optimum temperature for abalone growth. Abalone seedlings should be disinfected with disinfectant before going into the sea. Cage selection

## Technical purpose
This dataset represents the intermediate culture of abalone, specifically for large larvae, practiced through cage culture systems. This aquaculture process is crucial in the supply chain for providing high-quality abalone for consumer markets, including but not limited to, luxury seafood restaurants, traditional medicine, and premium seafood retailers. The stages included cover energy production, feed production, the principal chain of aquaculture production, and the production of other necessary inputs for mariculture.

## Model description
The literature refers to the ecoinvent database (v.3.5). In order to account for the variability of the studied system, Monte Carlo simulations were performed in R software (v.3.3.2) to model the correlation between unit process variables in LCA using copula function, which solved the correlation between process variables.Monte Carlo simulations were used in R software, with each cell process represented by a set of input parameters, a correlation matrix of geographical location and growth stages, 2000 iterations were used in the simulation, and the variability of the cell process due to inherent uncertainty, dispersion and unrepresentativeness was considered. Inherent uncertainty is included by assuming a coefficient of variation of 5%, spreads are calculated from primary and secondary data, and a pedigree approach is used to address unrepresentativeness. Dependencies between process chains are included by using dependency sampling in each iteration, as well as dependencies between processes

## Reference product
- Big juveniles of Large Yellow Croake: 1273.7; measured
  The data comes from the average of 49 households in the actual survey

## Inputs
- small juveniles of Large Yellow Croake: 48.4; measured
  The data comes from the average of 49 households in the actual survey
- Fuel: 70.8; measured
  The data comes from the average of 49 households in the actual survey
- laminaria: 1847, 10842.9 (2 entries); measured
  The data comes from the average of 49 households in the actual survey
- transport in t*km: 633.3, 378.7, 249.1 (3 entries); measured
  The data comes from the average of 49 households in the actual survey

## Deviations from the LCI method approaches
The allocation method used throughout the data analysis process is quality allocation, following the guidelines recommended by the British Standards Institution

## Data selection and combination
The data comes from the average of actual survey data

## Data treatment and extrapolations
Literature researchers constructed a life cycle inventory of mariculture production from both survey data and scientific literature. Primary and auxiliary data are collected for the growth stage to simulate other processes such as seed and juvenile production.

## Sampling procedure
Fifty-two abalone farming households were surveyed in Ningde City, Fujian Province, China, and 49 of them were used in the model calculation of this data

## Use advice
Users of this dataset should consider the geographical specificity of the data, which is limited to the mariculture practices of Ningde prefecture-level city, encompassing Fuding city, Xiapu County, Fu'an city, and Jiaocheng district. Users should note that methodological nuances such as the inclusion or exclusion of certain processes may affect the applicability of the data to other regions or conditions. Assumptions made for energy consumption, feed conversion rates, and input-output relationships are relevant to the scale of operation of the sampled households. These data should ideally be updated or verified for larger scale applications or different geographical locations.

## Review details
Inventory: The internal review was done by several iteration steps concerning raw data validation, raw data documentation, representativity, completeness and consistency of modelling with regard to ISO 14040 and 14044.

## Data sources
- Marín, T. et al. Resource Use in Mariculture: A Case Study in Southeastern China. Sustainability 11, (2019).
