# Metal purification ;Metal mixture;Etching

Dataset: ILCD process, Unit process, single operation
Geography: CN
Classification: Unit processes / Materials production / Metals and semimetals
Generated by: Nan Wang, 1209824595@qq.com
Owner: Tiangong LCI Data Working Group
Review: Dependent internal review by Tiangong LCI Data Working Group
Amounts: no units in this file; such an amount is in the reference unit of its flow, which a separate flow dataset defines
copyright: false
licenseType: Free of charge for all users and uses

## General comment
metal extraction is implemented by hydrometallurgical recovery with strong solvents and pollutant discharge.

## Technical purpose
This metal purification process is typically utilized for extracting metals from complex mixtures via hydrometallurgical recovery. The process involves the use of strong solvents and results in pollutant discharge. It is applicable, but not limited to, wet etching techniques in the metal finishing industry, where precision in metal composition is required.

## Reference product
- Multi-Si solar cell,Multi-Si solar cell,Multi-Si solar cell: 38.91; input; software or database

## Inputs
- water: 309.7; software or database
- Electricity: 204.48; software or database
- Nitric acid: 7.08; software or database

## Outputs
All rows: software or database
- aluminium: 2.6
- Silicon: 34.7
- silver: 0.53
- copper: 1.08
- Sludge: 50.2
- Medium and low radioactive liquid waste: 306.1
- nitrogen dioxide: 30.23
- sulfur dioxide: 24.04
- carbon dioxide: 30.82
- Nitric oxide: 0.14
- ammonium: 11.5476

## Use advice
Users of this data set should consider the environmental impact associated with the discharge of pollutants during the metal extraction process. When incorporating this data into Life Cycle Assessment studies, attention should be paid to the potential emissions and waste management practices related to the use of strong solvents. Additionally, users should assess the technological applicability of the process for the specific type of metal mixture being treated and evaluate the efficiency of the recovery method in the context of the metals' end-use.

## Review details
Inventory: The internal review was done by several iteration steps concerning raw data validation, raw data documentation, representativity, completeness and consistency of modelling with regard to ISO 14040 and 14044.

## Data sources
- Li, J. et al. Life cycle analysis of the economic costs and environmental benefits of photovoltaic module waste recycling in China. (2023).
