# Aluminum electrolysis and ingot casting ; Primary aluminum ingot ; Electrolysis 160kA autobaking tank process ; Alumina for metallurgy

Dataset: ILCD process, Unit process, black box
Geography: CN
Reference year: 2005
Classification: Unit processes / Materials production / Metals and semimetals
Generated by: Zimeng Cai, caizm6178@163.com
Owner: Tiangong LCI Data Working Group
Review: Dependent internal review by Tiangong LCI Data Working Group
Amounts: no units in this file; such an amount is in the reference unit of its flow, which a separate flow dataset defines
copyright: false
licenseType: Free of charge for all users and uses

## General comment
无流程图

## Time period
Date of publication

## Technical purpose
The data set represents the production of primary aluminum ingots using the electrolysis 160kA autobaking tank process. This high purity aluminum is predominantly used in various industries including aerospace, transport, construction, and electronics for applications requiring materials with a high strength-to-weight ratio, conductivity, and corrosion resistance.

## Reference product
- aluminium, primary, ingot: 1000; missing unimportant

## Inputs
All rows: missing unimportant
- hard coal: 7961
  煤
- anode, for metal electrolysis: 475
  碳阳极
- aluminium oxide, metallurgical: 2000
  氧化铝
- Fluoride: 50
  氟化物
- Oils, unspecified: 720
  油

## Outputs
- Sulfur dioxide: 65.443; missing unimportant
  SO2
- Fluorine: 1; missing unimportant
  氟化物（以氟计）
- carbon dioxide (fossil),carbon dioxide (fossil): 17290; missing unimportant
  CO2

## Data selection and combination
The data are mainly from relevant literature, and some data are also from internal reports of the aluminum industry. The data is representative and close to the reality, as it is based on a large number of documents.

## Use advice
The data should be used with the understanding that it is based on literature reviews and some internal reports from the aluminum industry, making it representative and close to real-world conditions. Methodological considerations should include ensuring that the system boundaries are correctly defined for LCA studies, particularly with regard to recycling and any upstream and downstream processes associated with aluminum production.

## Review details
Inventory: The internal review was done by several iteration steps concerning raw data validation, raw data documentation, representativity, completeness and consistency of modelling with regard to ISO 14040 and 14044.

## Data sources
- 王小伍 & 华贲. 中国电解铝工业的多因素综合生命周期评价. 轻金属 3–6 (2005).
