# Dry distillation section ; Shale crude oil ; Oil shale block ; Fushun Furnace dry distillation technology process + end-of-pipe treatment measures for: combustion flue gas treatment ; All sizes; NESPS2 / 干馏工段 ; 页岩原油 ; 油页岩块 ; 抚顺炉干馏技术工艺+末端治理措施为：燃烧烟气治理 ; 所有规模 ; 全国第二次污染普查数据

Dataset: ILCD process, Unit process, single operation
Geography: CN
Reference year: 2019
Classification: Reference Parameters / Energy carriers and technologies / Other non-renewable fuels
Generated by: The data was created by the Office of the Second National Pollution Source Census of the Ministry of Ecology and Environment, and the data was organized by the TianGong Plan team for ILCD format / 生态环境部第二次全国污染源普查工作办公室创建数据，天工计划团队常慧敏整理数据为ILCD格式
Owner: Tiangong LCI Data Working Group / 天工LCI数据工作小组
Review: Dependent internal review by Tiangong LCI Data Working Group / 天工LCI数据工作小组
Amounts: no units in this file; such an amount is in the reference unit of its flow, which a separate flow dataset defines
copyright: false
licenseType: Free of charge for all users and uses

## General comment
the Technical of end-of-pipe management technology for pollution Exhaust gasis/

## Technical purpose
所描述的工艺包括使用抚顺炉技术对油页岩块进行干馏, 并采用各种末端治理(End-of-Pipe, EOP)环境处理方法，管理和减少燃烧过程中烟气、废水和固体废物产生的污染。这些处理措施用于控制化学需氧量、氨氮、石油相关废物、氰化物、苯酚、废气、颗粒物(PM2.5 - PM10)、二氧化硫、氮氧化物、挥发性有机物(VOCs)和氨等污染物。此技术适用于管理页岩油生产和燃烧的环境影响的工业规模。

## Reference product
- Oil Shale: 1000; input; calculated
  源文件中描述为为油页岩块，此处对其进行了匹配工作，将其匹配到LCAflow库里面相最符合的流，污染物指标备注为工业废水量

## Outputs
All rows: calculated
- ammonia: 2.05e-5
  the Technical of end-of-pipe management technology for pollution ammoniaisOthers (double-layer discharge board)，Its Technical efficiency of end-of-pipe management99
  污染物指标氨的末端治理技术是其他（双层放料板），其效率为99，末端治理设施实际运行率（k值）计算公式为/。原文件中描述污染物类别为废气，污染物指标为氨，此处对其进行了匹配工作，将其匹配到LCAflow库里面相最符合的流，污染物指标备注为氨
- cyanide: 0.00012
  the Technical of end-of-pipe management technology for pollution cyanideisFloating separation + precipitation separation + biochemical treatment
  污染物指标氰化物的末端治理技术是上浮分离+沉淀分离+生化处理，末端治理设施实际运行率（k值）计算公式为/。原文件中描述污染物类别为废水，污染物指标为氰化物，此处对其进行了匹配工作，将其匹配到LCAflow库里面相最符合的流，污染物指标备注为氰化物
- ammonia: 0.0001435
  the Technical of end-of-pipe management technology for pollution ammoniaisOthers (water basin closed + loose exhaust gas is collected into heating furnace for combustion + double-layer discharge board)，Its Technical efficiency of end-of-pipe management93
  污染物指标氨的末端治理技术是其他（水盆封闭+散排放气体收集进加热炉燃烧+双层放料板），其效率为93，末端治理设施实际运行率（k值）计算公式为/。原文件中描述污染物类别为废气，污染物指标为氨，此处对其进行了匹配工作，将其匹配到LCAflow库里面相最符合的流，污染物指标备注为氨
- ammonia: 0.0002255
  the Technical of end-of-pipe management technology for pollution ammoniaisOthers (basin closed + double-layer discharge board)，Its Technical efficiency of end-of-pipe management89
  污染物指标氨的末端治理技术是其他（水盆封闭+双层放料板），其效率为89，末端治理设施实际运行率（k值）计算公式为/。原文件中描述污染物类别为废气，污染物指标为氨，此处对其进行了匹配工作，将其匹配到LCAflow库里面相最符合的流，污染物指标备注为氨
- Petroleum-related waste: 0.000854
  the Technical of end-of-pipe management technology for pollution Petroleum-related wasteisFloating separation + precipitation separation + biochemical treatment
  污染物指标石油类的末端治理技术是上浮分离+沉淀分离+生化处理，末端治理设施实际运行率（k值）计算公式为/。原文件中描述污染物类别为废水，污染物指标为石油类，此处对其进行了匹配工作，将其匹配到LCAflow库里面相最符合的流，污染物指标备注为石油类
- ammonia: 0.001968
  the Technical of end-of-pipe management technology for pollution ammoniaisOthers (scattered exhaust gas is collected into the heating furnace for combustion)，Its Technical efficiency of end-of-pipe management4
  污染物指标氨的末端治理技术是其他（散排放气体收集进加热炉燃烧），其效率为4，末端治理设施实际运行率（k值）计算公式为/。原文件中描述污染物类别为废气，污染物指标为氨，此处对其进行了匹配工作，将其匹配到LCAflow库里面相最符合的流，污染物指标备注为氨
- particles (PM2.5 - PM10): 0.002
  the Technical of end-of-pipe management technology for pollution particles (PM2.5 - PM10)isDouble alkali process + low NOx combustion，Its Technical efficiency of end-of-pipe management95
  污染物指标颗粒物的末端治理技术是双碱法+低氮燃烧法，其效率为95，末端治理设施实际运行率（k值）计算公式为k=废气治理设施运行时间（小时/年）/正常生产时间（小时/年）。原文件中描述污染物类别为废气，污染物指标为颗粒物，此处对其进行了匹配工作，将其匹配到LCAflow库里面相最符合的流，污染物指标备注为颗粒物
- volatile organic compound: 0.002387
  the Technical of end-of-pipe management technology for pollution volatile organic compoundisOthers (double-layer discharge board)，Its Technical efficiency of end-of-pipe management93
  污染物指标挥发性有机物的末端治理技术是其他（双层放料板），其效率为93，末端治理设施实际运行率（k值）计算公式为/。原文件中描述污染物类别为废气，污染物指标为挥发性有机物，此处对其进行了匹配工作，将其匹配到LCAflow库里面相最符合的流，污染物指标备注为挥发性有机物
- volatile organic compound: 0.003751
  the Technical of end-of-pipe management technology for pollution volatile organic compoundisOthers (water basin closed + loose exhaust gas is collected into heating furnace for combustion + double-layer discharge board)，Its Technical efficiency of end-of-pipe management89
  污染物指标挥发性有机物的末端治理技术是其他（水盆封闭+散排放气体收集进加热炉燃烧+双层放料板），其效率为89，末端治理设施实际运行率（k值）计算公式为/。原文件中描述污染物类别为废气，污染物指标为挥发性有机物，此处对其进行了匹配工作，将其匹配到LCAflow库里面相最符合的流，污染物指标备注为挥发性有机物
- volatile organic compound: 0.004092
  the Technical of end-of-pipe management technology for pollution volatile organic compoundisOthers (basin closed + double-layer discharge board)，Its Technical efficiency of end-of-pipe management88
  污染物指标挥发性有机物的末端治理技术是其他（水盆封闭+双层放料板），其效率为88，末端治理设施实际运行率（k值）计算公式为/。原文件中描述污染物类别为废气，污染物指标为挥发性有机物，此处对其进行了匹配工作，将其匹配到LCAflow库里面相最符合的流，污染物指标备注为挥发性有机物
- phenol: 0.00519
  the Technical of end-of-pipe management technology for pollution phenolisFloating separation + precipitation separation + biochemical treatment
  污染物指标挥发酚的末端治理技术是上浮分离+沉淀分离+生化处理，末端治理设施实际运行率（k值）计算公式为/。原文件中描述污染物类别为废水，污染物指标为挥发酚，此处对其进行了匹配工作，将其匹配到LCAflow库里面相最符合的流，污染物指标备注为挥发酚
- particles (PM2.5 - PM10): 0.0096
  the Technical of end-of-pipe management technology for pollution particles (PM2.5 - PM10)isLime/gypsum method + low NOx combustion，Its Technical efficiency of end-of-pipe management76
  污染物指标颗粒物的末端治理技术是石灰/石膏法+低氮燃烧法，其效率为76，末端治理设施实际运行率（k值）计算公式为k=废气治理设施运行时间（小时/年）/正常生产时间（小时/年）。原文件中描述污染物类别为废气，污染物指标为颗粒物，此处对其进行了匹配工作，将其匹配到LCAflow库里面相最符合的流，污染物指标备注为颗粒物
- sulfur dioxide: 0.0108
  the Technical of end-of-pipe management technology for pollution sulfur dioxideisLime/gypsum method + low NOx combustion，Its Technical efficiency of end-of-pipe management98
  污染物指标二氧化硫的末端治理技术是石灰/石膏法+低氮燃烧法，其效率为98，末端治理设施实际运行率（k值）计算公式为k=废气治理设施运行时间（小时/年）/正常生产时间（小时/年）。原文件中描述污染物类别为废气，污染物指标为二氧化硫，此处对其进行了匹配工作，将其匹配到LCAflow库里面相最符合的流，污染物指标备注为二氧化硫
- sulfur dioxide: 0.0162
  the Technical of end-of-pipe management technology for pollution sulfur dioxideisDouble alkali process + low NOx combustion，Its Technical efficiency of end-of-pipe management97
  污染物指标二氧化硫的末端治理技术是双碱法+低氮燃烧法，其效率为97，末端治理设施实际运行率（k值）计算公式为k=废气治理设施运行时间（小时/年）/正常生产时间（小时/年）。原文件中描述污染物类别为废气，污染物指标为二氧化硫，此处对其进行了匹配工作，将其匹配到LCAflow库里面相最符合的流，污染物指标备注为二氧化硫
- Nitrogen oxides: 0.0232
  the Technical of end-of-pipe management technology for pollution Nitrogen oxidesisDouble alkali process + low NOx combustion，Its Technical efficiency of end-of-pipe management71
  污染物指标氮氧化物的末端治理技术是双碱法+低氮燃烧法，其效率为71，末端治理设施实际运行率（k值）计算公式为k=废气治理设施运行时间（小时/年）/正常生产时间（小时/年）。原文件中描述污染物类别为废气，污染物指标为氮氧化物，此处对其进行了匹配工作，将其匹配到LCAflow库里面相最符合的流，污染物指标备注为氮氧化物
- Nitrogen oxides: 0.0232
  the Technical of end-of-pipe management technology for pollution Nitrogen oxidesisLime/gypsum method + low NOx combustion，Its Technical efficiency of end-of-pipe management71
  污染物指标氮氧化物的末端治理技术是石灰/石膏法+低氮燃烧法，其效率为71，末端治理设施实际运行率（k值）计算公式为k=废气治理设施运行时间（小时/年）/正常生产时间（小时/年）。原文件中描述污染物类别为废气，污染物指标为氮氧化物，此处对其进行了匹配工作，将其匹配到LCAflow库里面相最符合的流，污染物指标备注为氮氧化物
- volatile organic compound: 0.0339875
  the Technical of end-of-pipe management technology for pollution volatile organic compoundisOthers (scattered exhaust gas is collected into the heating furnace for combustion)，Its Technical efficiency of end-of-pipe management0.33
  污染物指标挥发性有机物的末端治理技术是其他（散排放气体收集进加热炉燃烧），其效率为0.33，末端治理设施实际运行率（k值）计算公式为/。原文件中描述污染物类别为废气，污染物指标为挥发性有机物，此处对其进行了匹配工作，将其匹配到LCAflow库里面相最符合的流，污染物指标备注为挥发性有机物
- Ammonia Nitrogen: 0.115
  the Technical of end-of-pipe management technology for pollution Ammonia NitrogenisFloating separation + precipitation separation + biochemical treatment
  污染物指标氨氮的末端治理技术是上浮分离+沉淀分离+生化处理，末端治理设施实际运行率（k值）计算公式为/。原文件中描述污染物类别为废水，污染物指标为氨氮，此处对其进行了匹配工作，将其匹配到LCAflow库里面相最符合的流，污染物指标备注为氨氮
- chemical oxygen demand: 0.154
  the Technical of end-of-pipe management technology for pollution chemical oxygen demandisFloating separation + precipitation separation + biochemical treatment
  污染物指标化学需氧量的末端治理技术是上浮分离+沉淀分离+生化处理，末端治理设施实际运行率（k值）计算公式为/。原文件中描述污染物类别为废水，污染物指标为化学需氧量，此处对其进行了匹配工作，将其匹配到LCAflow库里面相最符合的流，污染物指标备注为化学需氧量
- Waste water: 31.2
  the Technical of end-of-pipe management technology for pollution Waste wateris/
  污染物指标工业废水量的末端治理技术是/，末端治理设施实际运行率（k值）计算公式为/。原文件中描述污染物类别为废水，污染物指标为工业废水量，此处对其进行了匹配工作，将其匹配到LCAflow库里面相最符合的流，污染物指标备注为工业废水量
- Exhaust gas: 479
  the Technical of end-of-pipe management technology for pollution Exhaust gasis/
  污染物指标工业废气量的末端治理技术是/，末端治理设施实际运行率（k值）计算公式为/。原文件中描述污染物类别为废气，污染物指标为工业废气量，此处对其进行了匹配工作，将其匹配到LCAflow库里面相最符合的流，污染物指标备注为工业废气量

## Use advice
This dataset is derived from the Pollution Source Census Report and contains information on pollution emissions and related products. However, it does not include data on energy or chemical consumption, nor does it provide information on waste or co-product generation. When utilizing this dataset, please supplement the missing data based on actual conditions before use
该数据集来源于污染源普查报告，包含污染物排放及相关产品信息，但不包含能源或化学品消耗数据，也不提供废弃物或共生产物产生信息。在使用该数据集时，请根据实际情况补充缺失数据后再使用。

## Review details
Inventory: The internal review was done by several iteration steps concerning raw data validation, raw data documentation, representativity, completeness and consistency of modelling with regard to ISO 14040 and 14044.
清单： 内部审查通过几个迭代步骤完成，涉及原始数据验证、原始数据记录、代表性、完整性、与 ISO 14040 和 14044 有关的建模的一致性。

## Data sources
- 第二次全国污染源普查产排污核算系数手册（试用版）,二级代码25,四级代码2519文件，在完整版文件中第4111页
