# Phosphoric acid ; Phosphate ore, sulfuric acid ; Semi-water method / Di-water method / Semi-water - Di-water method ; All sizes; NESPS2 / 磷酸 ; 磷矿、硫酸 ; 半水法/二水法/半水-二水法 ; 所有规模 ; 全国第二次污染普查数据

Dataset: ILCD process, Unit process, single operation
Geography: CN
Reference year: 2019
Classification: Reference Parameters / Materials production / Inorganic chemicals
Generated by: The data was created by the Office of the Second National Pollution Source Census of the Ministry of Ecology and Environment, and the data was organized by the TianGong Plan team for ILCD format / 生态环境部第二次全国污染源普查工作办公室创建数据，天工计划团队常慧敏整理数据为ILCD格式
Owner: Tiangong LCI Data Working Group / 天工LCI数据工作小组
Review: Dependent internal review by Tiangong LCI Data Working Group / 天工LCI数据工作小组
Amounts: no units in this file; such an amount is in the reference unit of its flow, which a separate flow dataset defines
copyright: false
licenseType: Free of charge for all users and uses

## General comment
the Technical of end-of-pipe management technology for pollution Waste wateris/，Its Technical efficiency of end-of-pipe management0

## Technical purpose
该磷酸生产工艺采用半水法、二水法或半水-二水法结合方法，从磷酸磷矿和硫酸中生产磷酸，可适用于不同规模的生产。所产生的磷酸通常用于农业肥料生产，食品工业作为食品添加剂，以及用于生产清洁产品、动物饲料和药品。

## Reference product
- Orthophosphoric Acid: 1000, 1000 (2 entries); calculated
  源文件中描述为为磷酸，此处对其进行了匹配工作，将其匹配到LCAflow库里面相最符合的流，污染物指标备注为工业废水量

## Outputs
- chemical oxygen demand: 0.000168; calculated
  the Technical of end-of-pipe management technology for pollution chemical oxygen demandisPhysical treatment + chemical treatment，Its Technical efficiency of end-of-pipe management99
  污染物指标化学需氧量的末端治理技术是物理处理法+化学处理法，其效率为99，末端治理设施实际运行率（k值）计算公式为k=治理设施运行时间(小时/年)/正常生产时间(小时/年)。原文件中描述污染物类别为废水，污染物指标为化学需氧量，此处对其进行了匹配工作，将其匹配到LCAflow库里面相最符合的流，污染物指标备注为化学需氧量
- phosphorus, total: 0.000529; calculated
  the Technical of end-of-pipe management technology for pollution phosphorus, totalisPhysical treatment + chemical treatment，Its Technical efficiency of end-of-pipe management99
  污染物指标总磷的末端治理技术是物理处理法+化学处理法，其效率为99，末端治理设施实际运行率（k值）计算公式为k=治理设施运行时间(小时/年)/正常生产时间(小时/年)。原文件中描述污染物类别为废水，污染物指标为总磷，此处对其进行了匹配工作，将其匹配到LCAflow库里面相最符合的流，污染物指标备注为总磷
- arsenic: 0.042; calculated
  the Technical of end-of-pipe management technology for pollution arsenicisPhysical treatment + chemical treatment，Its Technical efficiency of end-of-pipe management79
  污染物指标总砷的末端治理技术是物理处理法+化学处理法，其效率为79，末端治理设施实际运行率（k值）计算公式为k=治理设施运行时间(小时/年)/正常生产时间(小时/年)。原文件中描述污染物类别为废水，污染物指标为总砷，此处对其进行了匹配工作，将其匹配到LCAflow库里面相最符合的流，污染物指标备注为总砷
- Waste water: 400000; calculated
  the Technical of end-of-pipe management technology for pollution Waste wateris/，Its Technical efficiency of end-of-pipe management0
  污染物指标工业废水量的末端治理技术是/，其效率为0。原文件中描述污染物类别为废水，污染物指标为工业废水量，此处对其进行了匹配工作，将其匹配到LCAflow库里面相最符合的流，污染物指标备注为工业废水量

## Use advice
This dataset is derived from the Pollution Source Census Report and contains information on pollution emissions and related products. However, it does not include data on energy or chemical consumption, nor does it provide information on waste or co-product generation. When utilizing this dataset, please supplement the missing data based on actual conditions before use
该数据集来源于污染源普查报告，包含污染物排放及相关产品信息，但不包含能源或化学品消耗数据，也不提供废弃物或共生产物产生信息。在使用该数据集时，请根据实际情况补充缺失数据后再使用。

## Review details
Inventory: The internal review was done by several iteration steps concerning raw data validation, raw data documentation, representativity, completeness and consistency of modelling with regard to ISO 14040 and 14044.
清单： 内部审查通过几个迭代步骤完成，涉及原始数据验证、原始数据记录、代表性、完整性、与 ISO 14040 和 14044 有关的建模的一致性。

## Data sources
- 第二次全国污染源普查产排污核算系数手册（试用版）,二级代码26,四级代码2611文件，在完整版文件中第4111页
