# Hydroxyethylenebisphosphonic acid ; Phosphorus trichloride, glacial acetic acid ; Esterification-hydrolysis process ; All sizes; NESPS2 / 羟基乙叉二膦酸 ; 三氯化磷、冰醋酸 ; 酯化-水解工艺 ; 所有规模 ; 全国第二次污染普查数据

Dataset: ILCD process, Unit process, single operation
Geography: CN
Reference year: 2019
Classification: Reference Parameters / Materials production / Inorganic chemicals
Generated by: The data was created by the Office of the Second National Pollution Source Census of the Ministry of Ecology and Environment, and the data was organized by the TianGong Plan team for ILCD format / 生态环境部第二次全国污染源普查工作办公室创建数据，天工计划团队常慧敏整理数据为ILCD格式
Owner: Tiangong LCI Data Working Group / 天工LCI数据工作小组
Review: Dependent internal review by Tiangong LCI Data Working Group / 天工LCI数据工作小组
Amounts: no units in this file; such an amount is in the reference unit of its flow, which a separate flow dataset defines
copyright: false
licenseType: Free of charge for all users and uses

## General comment
the Technical of end-of-pipe management technology for pollution Exhaust gasis/

## Technical purpose
本数据集描述了一种化学合成过程，涉及羟基乙叉二膦酸和三氯化磷，并使用冰醋酸在酯化-水解反应中制备各种规模的化学产品。处理尾气和氯化氢的末端污染管理技术包括水喷雾吸收，技术效率为70%。

## Reference product
- Etidronic Acid: 1000; calculated
  源文件中描述为为羟基乙叉二膦酸，此处对其进行了匹配工作，将其匹配到LCAflow库里面相最符合的流，污染物指标备注为工业废气量

## Outputs
- hydrogen chloride: 0.0002199; calculated
  the Technical of end-of-pipe management technology for pollution hydrogen chlorideisWater spray absorption，Its Technical efficiency of end-of-pipe management70
  污染物指标氯化氢的末端治理技术是水喷淋吸收，其效率为70，末端治理设施实际运行率（k值）计算公式为k=设备年耗电量年耗电量(千瓦时)/(设备运行功率(kw)*设备年运行小时数(小时))。原文件中描述污染物类别为废气，污染物指标为氯化氢，此处对其进行了匹配工作，将其匹配到LCAflow库里面相最符合的流，污染物指标备注为氯化氢
- Exhaust gas: 66.14; calculated
  the Technical of end-of-pipe management technology for pollution Exhaust gasis/
  污染物指标工业废气量的末端治理技术是/，末端治理设施实际运行率（k值）计算公式为/。原文件中描述污染物类别为废气，污染物指标为工业废气量，此处对其进行了匹配工作，将其匹配到LCAflow库里面相最符合的流，污染物指标备注为工业废气量

## Use advice
This dataset is derived from the Pollution Source Census Report and contains information on pollution emissions and related products. However, it does not include data on energy or chemical consumption, nor does it provide information on waste or co-product generation. When utilizing this dataset, please supplement the missing data based on actual conditions before use
该数据集来源于污染源普查报告，包含污染物排放及相关产品信息，但不包含能源或化学品消耗数据，也不提供废弃物或共生产物产生信息。在使用该数据集时，请根据实际情况补充缺失数据后再使用。

## Review details
Inventory: The internal review was done by several iteration steps concerning raw data validation, raw data documentation, representativity, completeness and consistency of modelling with regard to ISO 14040 and 14044.
清单： 内部审查通过几个迭代步骤完成，涉及原始数据验证、原始数据记录、代表性、完整性、与 ISO 14040 和 14044 有关的建模的一致性。

## Data sources
- 第二次全国污染源普查产排污核算系数手册（试用版）,二级代码26,四级代码2666文件，在完整版文件中第4111页
