# LFP cathode production ; LFP cathode ; LFP cathode slurry, aluminum foil

Dataset: ILCD process, Unit process, single operation
Classification: Materials production / Non-energetic raw materials
Functional unit: Production of 1kg lithium iron phosphate battery cathode
Generated by: Xin Chen, xinchen@mail.nankai.edu.cn
Owner: Tiangong LCI Data Working Group
Review: Dependent internal review by Tiangong LCI Data Working Group
Amounts: no units in this file; such an amount is in the reference unit of its flow, which a separate flow dataset defines
copyright: false
licenseType: Free of charge for all users and uses

## General comment
Apply the positive electrode slurry evenly on the aluminum foil to make a positive electrode sheet

## Inputs
- Aluminum foil: 0.072; article inperiodical
  Data refer to the study by Ellingsen, L. A. et al. Life Cycle Assessment of a Lithium-Ion Battery Vehicle Pack.

## Data selection and combination
The data comes partly from the literature and partly from the ecoinvent database.

## Review details
Inventory: The internal review was done by several iteration steps concerning raw data validation, raw data documentation, representativity, completeness and consistency of modelling with regard to ISO 14040 and 14044.

## Data sources
- Le Varlet, T., Schmidt, O., Gambhir, A., Few, S. & Staffell, I. Comparative life cycle assessment of lithium-ion battery chemistries for residential storage. J. Energy Storage 28, 101230 (2020).
