# Major engineering construction ; Major engineering construction for a wind farm (40 MW)

Dataset: ILCD process, Unit process, black box
Geography: CN
Reference year: 2018
Classification: Unit processes / Systems / Construction
Functional unit: The functional unit is 2 MW wind turbine.
LCI method principle: Attributional
LCI method approaches: Allocation
Generated by: Yunzhi Zhao, ll10088@163.com
Owner: Tiangong LCI Data Working Group
Review: Dependent internal review by Tiangong LCI Data Working Group
Amounts: no units in this file; such an amount is in the reference unit of its flow, which a separate flow dataset defines
copyright: false
licenseType: Free of charge for all users and uses

## General comment
文章中并未详细说明“Major engineering”具体指什么，按照风电场建设规范，推测：应该是指道路建设，电厂地基搭建，变电站建设等工程

## Geography
In this study, an onshore 40 MW wind farm with 20 2WM wind turbines in North China was selected as the research object.

## Technical purpose
The major engineering construction data set for a 40 MW wind farm represents the use of 20 2MW wind turbines in an onshore setting, specifically in North China. The construction includes the types and quantities of materials that are typically used for the development of wind farms in China. This data is relevant for stakeholders in the renewable energy sector, such as wind farm project developers, environmental consultants, and policy makers, for planning and evaluating new wind farm projects and for expanding the use of wind power in sustainable energy portfolios.

## Reference product
- Wind tower foundation: 20; measured
  Major engineering of wind farm.

## Inputs
All rows: measured
- Steel,Steel: 988200
  Ground surface and Underground
- Glass: 100
  Tempered glass
- polyvinylchloride resin (E-PVC): 3700
  Ground surface and Underground
- polyethylene high density granulate (PE-HD): 17100
- aluminium: 145900
- Resin: 6200
  Ground surface and Underground
- copper: 15000
- zinc: 100

## Deviations from the LCI method approaches
A process-based LCA, which follows the principles of ISO 14040[33] and ISO 14044 [34], was used to calculate the GHG emissions of wind turbines over the entire life cycle.

## Data selection and combination
The types and quantities of materials invested in this wind farm represent the average level of types and quantities of materials that are currently invested in wind farms in China (Table 2). All data used for the wind farm analysis were acquired from surveys. The GHG emission coefficients of the various materials were derived from the GaBi (a commercial software for LCA) database.

## Use advice
Users should apply this LCA data for evaluating the environmental impacts associated with the construction of wind farms based on the inclusion of materials and processes described. It is imperative that users adhere to ISO 14040 and ISO 14044 standards to assess the GHG emissions over the full life cycle of wind turbines when utilizing this data. Caution should be taken to ensure representativeness of the data when extrapolating to different geographical locations or technological contexts. It is also advisable to consider potential methodological changes over time and updates in emission factors from newer databases or future surveys.

## Review details
Inventory: The internal review was done by several iteration steps concerning raw data validation, raw data documentation, representativity, completeness and consistency of modelling with regard to ISO 14040 and 14044.

## Data sources
- Li, Q. et al. Life cycle assessment and life cycle cost analysis of a 40 MW wind farm with consideration of the infrastructure. Renewable and Sustainable Energy Reviews 138, 110499 (2021).
