# BF ironmaking

Dataset: ILCD process, Unit process, single operation
Geography: CN
Classification: Unit processes / Materials production / Metals and semimetals
Generated by: Jiwei, 1299801467@qq.com
Owner: Tiangong LCI Data Working Group
Review: Dependent internal review by Tiangong LCI Data Working Group
Amounts: no units in this file; such an amount is in the reference unit of its flow, which a separate flow dataset defines
copyright: false
licenseType: Free of charge for all users and uses

## General comment
The BF ironmaking unit process is specifically used in the steelmaking industry. It entails the conversion of iron ore to crude iron using a blast furnace and is typically part of an integrated steel mill where the crude iron is further processed into various steel products.

## Reference product
- iron: 1000; measured

## Inputs
All rows: measured
- Sinter ore: 1570.54
- freshwater,freshwater: 364.32
- Electricity: 323.748
- Coal gas: 55.29
- compressed air: 55.7
- anthracite: 114.06
- coke,Coke: 373.11
- oxygen: 113.66
- process steam: 69.58

## Outputs
All rows: measured
- BF Slag: 364.45
- BF Gas Sludge: 133.02
- particles (> PM10): 42.45
- carbon dioxide (fossil): 1214.26
  原文未区分bio和fossil，根据专家判断此处为carbon dioxide (fossil)
- sulfur dioxide: 0.948
- Nitrogen oxides: 0.18

## Use advice
When utilizing this data set for life cycle assessment, consider the entire process chain of steel production, including the inputs and outputs associated with the blast furnace process. Users should account for the raw materials and energy consumption, as well as emissions generated during the BF ironmaking process. Attention should be given to the technological applicability in terms of plant efficiency, as well as the relevance of the region-specific energy mix and raw material sourcing in the calculation.

## Review details
Inventory: The internal review was done by several iteration steps concerning raw data validation, raw data documentation, representativity, completeness and consistency of modelling with regard to ISO 14040 and 14044.

## Data sources
- Yang, L. et al. Life cycle carbon footprint of electric arc furnace steelmaking processes under different smelting modes in China. Sustainable Materials and Technologies 35, e00564 (2023).
