# Crude steel production;Crude steel;Hot rolling

Dataset: ILCD process, Unit process, single operation
Geography: CN
Reference year: 2014
Classification: Unit processes / Materials production / Metals and semimetals
Generated by: Fuxiang, 1162850692@qq.com
Owner: Tiangong LCI Data Working Group
Review: Dependent internal review by Tiangong LCI Data Working Group
Amounts: no units in this file; such an amount is in the reference unit of its flow, which a separate flow dataset defines
copyright: false
licenseType: Free of charge for all users and uses

## General comment
Crude steel produced from this process is used in construction, manufacturing of machinery, transportation infrastructure, appliances, and as a base material for further processing and fabrication in various industrial sectors.

## Time period
基于 A 钢厂 2014 年的生产数据进行计算和分析对比。

## Reference product
- Crude Steel: 1000; measured
  Steel

## Inputs
All rows: measured
- Electricity: 417.6
  z10
- Crude Steel: 1041
  crude steel
- Linz-Donawitz gas: 20
  Converter gas
- Blast furnace gas: 80
  blast furnace gas
- Coke oven gas: 30
  coke oven gas

## Outputs
- carbon dioxide (fossil): 243700; measured
  原文未区分bio和fossil，根据专家判断此处为fossil
- methane: 40; measured
- nitrous oxide: 0.017; measured

## Use advice
The dataset for crude steel production is based on the production data from Plant A in 2014. It should be used with consideration of technological advancements and efficiency improvements in the industry since 2014. Users should contextualize the data within the geographic and technological scope of their assessment and consider the need for adjustment or calibration based on more recent data or region-specific factors.

## Review details
Inventory: The internal review was done by several iteration steps concerning raw data validation, raw data documentation, representativity, completeness and consistency of modelling with regard to ISO 14040 and 14044.

## Data sources
- 刘宏强, 付建勋, 刘思雨, 谢欣悦, & 杨笑楹. 钢铁生产过程二氧化碳排放计算方法与实践. 钢铁 51, 74–82 (2016).
