# Silicon production ; Total of all wind farm

Dataset: ILCD process, Unit process, single operation
Geography: NMG-CN
Reference year: 2017
Classification: Materials production / Metals and semimetals
Functional unit: The functional unit is 1.5 MW wind turbine
LCI method principle: Attributional
LCI method approaches: Allocation
Generated by: Yunzhi Zhao, ll10088@163.com
Owner: Tiangong LCI Data Working Group
Review: Dependent internal review by Tiangong LCI Data Working Group
Amounts: no units in this file; such an amount is in the reference unit of its flow, which a separate flow dataset defines
copyright: false
licenseType: Free of charge for all users and uses

## General comment
This data set pertains to the production of silicon for use specifically in the wind power industry. The silicon produced is utilized in the manufacturing of wind turbines. The representative wind farm in this case study, equipped with 33 domestic 1.5 megawatt (MW) wind turbines, serves as a model to assess environmental impacts and substitution effects of wind power generation in areas with significant wind power installations such as northeast Inner Mongolia.

## Geography
The data regarding the parameters of wind power has been collected from Wang (2012). A wind farm equipped with 33 domestic 1.5 megawatts (MW) wind turbines is regarded as a case study to analyze the environmental impact and its substitution effects. The wind farm is located in the northeast of Inner Mongolia, the province in which most of China’s wind power is installed (Xia and Song, 2017).

## Reference product
- silicon,silicon: 1; article inperiodical

## Inputs
- Energy, gross calorific value, in biomass, primary forest: 1.4847; article inperiodical

## Outputs
All rows: article inperiodical
- carbon dioxide: 20510
- sulfur dioxide: 139
- nitrous oxide: 42
- carbon monoxide: 556
- particles (PM2.5 - PM10): 435

## Deviations from the LCI method approaches
The life cycle inventory for wind power is illustrated as follows. The production and manufacturing stage include the production of wind turbines, substations, and cables, which consume a large amount of energy and emit pollutants (Xue et al., 2015).

## Use advice
When applying the LCA data from this dataset, users must take into account the specific wind farm configuration with 33 domestic 1.5 MW wind turbines. The data is case-specific and should be used to analyze environmental impacts and substitution effects in the context of large-scale wind power installations. Users should be aware that the applicability might be limited to wind power facilities with similar characteristics as the wind farm described. Special attention should be given to the production and manufacturing stages of wind turbines, including substations and cables, due to their significant energy consumption and emissions, as indicated by Xue et al. (2015). The functional unit of the dataset is the 1.5 MW wind turbine.

## Review details
Inventory: The internal review was done by several iteration steps concerning raw data validation, raw data documentation, representativity, completeness and consistency of modelling with regard to ISO 14040 and 14044.

## Data sources
- Li, H., Jiang, H.-D., Dong, K.-Y., Wei, Y.-M. & Liao, H. A comparative analysis of the life cycle environmental emissions from wind and coal power: Evidence from China. Journal of Cleaner Production 248, 119192 (2020).
