# Plexiglass ; PMMA: Polymethyl Methacrylate (also known as Acrylic or Plexiglass) ; cracking kettle (electric energy heating process)

Dataset: ILCD process, Unit process, single operation
Geography: JX-CN
Classification: Unit processes / Materials production / Glass and ceramics
Generated by: He xiaxia, 18616148319@163.com
Owner: Tiangong LCI Data Working Group
Review: Dependent internal review by Tiangong LCI Data Working Group
Amounts: no units in this file; such an amount is in the reference unit of its flow, which a separate flow dataset defines
copyright: false
licenseType: Free of charge for all users and uses

## General comment
The data set represents the process for producing polymethyl methacrylate (PMMA) monomer, MMA, through an electric energy heating process in a cracking kettle. This high purity chemical is utilized for manufacturing polymethyl methacrylate (PMMA), commonly known as acrylic or acrylic glass. It is widely used in applications such as the production of transparent structural materials, like windows, shielding barriers, and lightweight lenses.

## Reference product
- polymethyl methacrylate (PMMA) beads: 1091.94; measured

## Inputs
- Electricity: 624.6; measured
- polymethyl methacrylate (PMMA) beads: 1098.25; measured

## Outputs
- mineral waste (ash): 5.4915; measured
- organic waste (unspecified): 0.00255; measured

## Use advice
When using this data set for Life Cycle Assessment (LCA) of PMMA products, attention should be paid to the system boundaries, allocation, and energy sources. Ensure that the electricity consumption is correctly accounted for in the relevant geographical energy mix. If the PMMA is being recycled, users should take into account the recycling process according to the end-of-life scenario of the product, and possibly amend the data set with recycling rates.

## Review details
Inventory: The internal review was done by several iteration steps concerning raw data validation, raw data documentation, representativity, completeness and consistency of modelling with regard to ISO 14040 and 14044.

## Data sources
- 江西旺达新材料有限公司年产20000吨有机玻璃原料生产项目
