# LFP Hydrometallurgical recycling

Dataset: ILCD process, Unit process, single operation
Geography: AH-CN
Reference year: 2022
Classification: End-of-life treatment / Material recycling
Functional unit: The functional unit (FU) was defined as the nominal capacity of a 1 kWh battery pack.
Generated by: huzhikang, hzk2503593129@163.com
Owner: Tiangong LCI Data Working Group
Review: Dependent internal review by Tiangong LCI Data Working Group
Amounts: no units in this file; such an amount is in the reference unit of its flow, which a separate flow dataset defines
copyright: false
licenseType: Free of charge for all users and uses

## General comment
The completely discharged EoL LFP batteries were dismantled, crushed, and sieved to obtain LFP powder. After that, the powder was acid leached, iron removal, transformation de-hybridization, and hydrochloric acid distillation recovery, etc., to get the lithium chloride purification solution.

## Technical purpose
This industrial process is used for the recovery of lithium iron phosphate (LFP) from end-of-life (EoL) LFP batteries through hydrometallurgical methods. The recovered lithium chloride purification solution is suitable for reuse in the manufacturing of new lithium-based batteries, particularly LFP batteries, or possibly in other industries requiring high-grade lithium compounds.

## Reference product
- EoL LFP battery: 1; input; article inperiodical

## Inputs
All rows: article inperiodical
- hydrogen chloride: 0.0343
- hydrogen peroxide: 0.0954
  Hydrogen peroxide
- sodium hydroxide: 0.0873
  Sodium hydroxide
- calcium chloride: 0.357
  Calcium chloride
- Water (fresh water): 0.531
  Fresh water
- Electricity: 1.746

## Outputs
All rows: article inperiodical
- Lithium chloride: 0.357
- Dust (unspecified, from stack),Dust (unspecified, from stack): 0.000176
  dust
- hydrogen fluoride: 2.39e-6
  Hydrogen fluoride
- non-methane volatile organic compounds: 0.000132
  VOC
- hydrogen chloride: 4.01e-6
  Hydrochloric acid mist
- packaging waste (plastic): 0.2
  Plastic casing scrap
- Separator scrap: 0.05
- Waste BMS: 0.03
- Copper Scrap: 0.1
  Copper scrap
- Aluminium Scrap: 0.06
  Aluminium scrap
- Waste Graphite: 0.15
  Waste graphite
- Other Solid Waste: 0.593
  Other solid waste

## Data selection and combination
Data from EIA report.

## Use advice
When using this dataset for Life Cycle Assessment, ensure to account for the specific hydrometallurgical processes of dismantling, crushing, sieving, acid leaching, iron removal, transformation purification, and hydrochloric acid distillation recovery. The data is applicable solely for the recycling of completely discharged LFP batteries. The Functional Unit (FU) for data comparison purposes is the nominal capacity of a 1 kWh battery pack. Special attention should be paid to the methodological consistency when integrating this process into a broader LCA study, ensuring considerations such as system boundaries, allocation rules, and impact assessment methods are in alignment with the dataset.

## Review details
Inventory: The internal review was done by several iteration steps concerning raw data validation, raw data documentation, representativity, completeness and consistency of modelling with regard to ISO 14040 and 14044.

## Data sources
- Quan, J. et al. Comparative life cycle assessment of LFP and NCM batteries including the secondary use and different recycling technologies. Science of The Total Environment 819, 153105 (2022).
