# Scrap steel ; Steel scrap ; Shearing ; All sizes; NESPS2 / 废钢铁 ; 钢铁废碎料 ; 剪切 ; 所有规模 ; 全国第二次污染普查数据

Dataset: ILCD process, Unit process, single operation
Geography: CN
Reference year: 2019
Classification: Reference Parameters / Materials production / Metals and semimetals
Generated by: The data was created by the Office of the Second National Pollution Source Census of the Ministry of Ecology and Environment, and the data was organized by the TianGong Plan team for ILCD format / 生态环境部第二次全国污染源普查工作办公室创建数据，天工计划团队常慧敏整理数据为ILCD格式
Owner: Tiangong LCI Data Working Group / 天工LCI数据工作小组
Review: Dependent internal review by Tiangong LCI Data Working Group / 天工LCI数据工作小组
Amounts: no units in this file; such an amount is in the reference unit of its flow, which a separate flow dataset defines
copyright: false
licenseType: Free of charge for all users and uses

## General comment
the Technical of end-of-pipe management technology for pollution particles (PM2.5 - PM10)is/，The formula for calculating the actual operation rate (k-value) of the end-of-pipe treatment facility is /

## Technical purpose
所述工业过程涉及剪切所有规模的废钢铁和钢铁废料。它在金属回收行业中被用来处理金属产品的生命周期末期或制造过程中的剩余物，以便它们可以被熔化并回收成新的钢铁产品。'管道末端'的颗粒物污染（细颗粒物PM2.5 - PM10）管理技术可能适用于旨在捕获或过滤剪切过程中排放的颗粒物的空气污染控制系统。

## Reference product
- Scrap Steel: 1000; input; calculated
  源文件中描述为为钢铁废碎料，此处对其进行了匹配工作，将其匹配到LCAflow库里面相最符合的流

## Outputs
- particles (PM2.5 - PM10): 0.0072; calculated
  the Technical of end-of-pipe management technology for pollution particles (PM2.5 - PM10)is/，The formula for calculating the actual operation rate (k-value) of the end-of-pipe treatment facility is /
  污染物指标颗粒物（无组织）的末端治理技术是/，末端治理设施实际运行率（k值）计算公式为/。原文件中描述污染物类别为废气，污染物指标为颗粒物（无组织），此处对其进行了匹配工作，将其匹配到LCAflow库里面相最符合的流

## Use advice
This dataset is derived from the Pollution Source Census Report and contains information on pollution emissions and related products. However, it does not include data on energy or chemical consumption, nor does it provide information on waste or co-product generation. When utilizing this dataset, please supplement the missing data based on actual conditions before use
该数据集来源于污染源普查报告，包含污染物排放及相关产品信息，但不包含能源或化学品消耗数据，也不提供废弃物或共生产物产生信息。在使用该数据集时，请根据实际情况补充缺失数据后再使用。

## Review details
Inventory: The internal review was done by several iteration steps concerning raw data validation, raw data documentation, representativity, completeness and consistency of modelling with regard to ISO 14040 and 14044.
清单： 内部审查通过几个迭代步骤完成，涉及原始数据验证、原始数据记录、代表性、完整性、与 ISO 14040 和 14044 有关的建模的一致性。

## Data sources
- 第二次全国污染源普查产排污核算系数手册（试用版）,二级代码42,四级代码4210文件，在完整版文件中第2450页
