# Calcined Lime Production ; Quick Lime - Ground & Bulk ; Cradles

Dataset: ILCD process, Unit process, single operation
Geography: CN
Reference year: 2019
Classification: Unit processes / Materials production / Inorganic chemicals
Generated by: Zimeng Cai, caizm6178@163.com
Owner: Tiangong LCI Data Working Group
Review: Dependent internal review by Tiangong LCI Data Working Group
Amounts: no units in this file; such an amount is in the reference unit of its flow, which a separate flow dataset defines
copyright: false
licenseType: Free of charge for all users and uses

## General comment
煅烧石灰生产;原铝加工

## Time period
Date of publication

## Technical purpose
Quick lime produced through the calcination process is a foundational material used in various industrial sectors. It is predominantly utilized within the aluminum processing units for treating bauxite during the alumina-extraction phase. Additionally, it serves pertinent applications across chemical manufacturing, water treatment, steelmaking, construction (as a building material), and flue gas desulfurization.

## Reference product
- quicklime, milled, loose: 1000; software or database
  calcined lime

## Inputs
- Diesel oil: 13.1175; software or database
  Fuel mix: diesel (53%), electricity (47%)
- electricity, high voltage, aluminium industry: 12.1025; software or database
  Fuel mix: diesel (53%), electricity (47%)

## Data selection and combination
Inventories of energy input and material flow are collected from updated yearbook s, published papers, official reports and databases. The details of the inventory are presented as Table 1. It should be noted that the data for the material transportation assumptions are based on relevant studies, whic h may be slightly different from the actual situation. The life-cycle intensities of each end-use energy type are based on the results of our previous studies.

## Use advice
When employing this LCA data, ensure that material transportation assumptions based on relevant studies are contextualized to the specific geographic and logistical circumstances of your project. Any deviations from the reported inventory may necessitate adjustments to the life-cycle analysis to reflect actual conditions. Additionally, consider the technological applicability of the data set to the specific end-use energy types and update the life-cycle intensities in accordance with the latest relevant studies and local regulations. Finally, pay attention to any updates in yearbooks, published papers, and official reports that may alter inventory details.

## Review details
Inventory: The internal review was done by several iteration steps concerning raw data validation, raw data documentation, representativity, completeness and consistency of modelling with regard to ISO 14040 and 14044.

## Data sources
- Peng, T., Ou, X., Yan, X. & Wang, G. Life-cycle analysis of energy consumption and GHG emissions of aluminium production in China. in Energy Procedia vol. 158 3937–3943 (2019).
