# Hot rolled steel production;Hot rolled steel;Hot rolling(Z11)

Dataset: ILCD process, Unit process, single operation
Geography: CN
Reference year: 1998
Classification: Materials production / Metals and semimetals
Generated by: Fuxiang, 1162850692@qq.com
Owner: Tiangong LCI Data Working Group
Review: Dependent internal review by Tiangong LCI Data Working Group
Amounts: no units in this file; such an amount is in the reference unit of its flow, which a separate flow dataset defines
copyright: false
licenseType: Free of charge for all users and uses

## General comment
来自表 4-16 Z08 钢厂生产吨材环境负荷编目表

## Time period
论文提到钢铁企业环境总体数据为1998年的吨钢环境基础数据。

## Technical purpose
The hot rolled steel produced in the process described is typically utilized in the construction industry for structural components, machinery manufacturing for producing machine parts, and in the automotive industry for creating vehicle frames and bodies. It can also be used for making pipes, tubes, and other profiles for various industrial applications.

## Reference product
- Steel sections: 1050.6; measured

## Inputs
- Energy, geothermal, converted: 2669.92; measured
- water: 17530; measured
- Crude Steel: 1050.6; measured
  crude steel

## Outputs
All rows: measured
- Dust (unspecified, from stack): 1.27
  soot
- sulfur dioxide: 1.23
- Hydrocarbons, aliphatic, alkanes, unspecified: 0.10615
  Petro
- Suspended solids, unspecified: 0.26932
- chemical oxygen demand: 0.41586
- Spoil (deposited, hibernating in ground, non elementary flow): 33

## Use advice
When using the LCA data set for hot rolled steel from the year 1998, it is crucial to consider technological advancements that have occurred since the data was published. Consider the inclusion or exclusion of subsequent recycling phases based on the context of the LCA study. Ensure that the use phase behavior of the hot rolled steel is accurately represented in the LCA model, considering the specific characteristics of this material type.

## Review details
Inventory: The internal review was done by several iteration steps concerning raw data validation, raw data documentation, representativity, completeness and consistency of modelling with regard to ISO 14040 and 14044.

## Data sources
- 周和敏. 钢铁材料生产过程环境协调性评价研究. (北京工业大学, 2001).
