# Grinding and screening;Fragment mixture;grinding and screening

Dataset: ILCD process, Unit process, single operation
Geography: CN
Classification: Unit processes / Materials production / Other mineralic materials
Generated by: Nan Wang, 1209824595@qq.com
Owner: Tiangong LCI Data Working Group
Review: Dependent internal review by Tiangong LCI Data Working Group
Amounts: no units in this file; such an amount is in the reference unit of its flow, which a separate flow dataset defines
copyright: false
licenseType: Free of charge for all users and uses

## General comment
The data set describes a process primarily used for the grinding and screening of a fragment mixture in an industrial setting. This unit process, involving a single operation, can be applied to various sectors where fine particulate material is required, such as in construction material manufacturing, pharmaceutical production, or for preparing raw materials in metallurgy.

## Reference product
- Mixture,Mixture: 641.63; input; software or database
  fragment mixture

## Inputs
- Electricity: 12.42; software or database

## Outputs
All rows: software or database
- Glass for recovery (shards): 505.4
  shards of glass
- Metal Fragment: 28.89
  metal debris
- municipal solid waste deposition: 107.34
  solid waste
- Medium and low radioactive liquid waste: 10.11
- Ammonia Nitrogen: 0.00278
  Ammonia nitrogen
- nitrogen, total (excluding N2): 0.11372
- phosphorus, total: 0.00025

## Use advice
Users of this data set should take into account the specificity of the grinding and screening process for the fragment mixture. Considerations must include the particle size distribution resulting from the process, potential losses during screening, and energy consumption. Ensure appropriate allocation of environmental impacts when this unit process is integrated into a larger system. Recycling or reuse of the processed material, if applicable, should be clearly defined and considered in the overall life cycle assessment.

## Review details
Inventory: The internal review was done by several iteration steps concerning raw data validation, raw data documentation, representativity, completeness and consistency of modelling with regard to ISO 14040 and 14044.

## Data sources
- Li, J. et al. Life cycle analysis of the economic costs and environmental benefits of photovoltaic module waste recycling in China. (2023).
