# Shale gas production;Site preparation stage;Solid wasteand landfill construction

Dataset: ILCD process, Unit process, black box
Geography: SC-CN
Reference year: 2014
Valid until: 2016
Classification: Unit processes / Energy carriers and technologies / Natural gas based fuels
Generated by: Pu Hong, 15695258655@163.com
Owner: Tiangong LCI Data Working Group
Review: Dependent internal review by Tiangong LCI Data Working Group
Amounts: no units in this file; such an amount is in the reference unit of its flow, which a separate flow dataset defines
copyright: false
licenseType: Free of charge for all users and uses

## General comment
The technical application of the described process is specific to the preparation stage of shale gas production. During this phase, solid waste containment systems such as landfill construction are established to manage waste generated from shale gas extraction. The data set represents the environmental impact associated with the construction of these facilities in the Sichuan and Chongqing regions of China, which are major centers of shale gas extraction.

## Geography
China's shale gas extraction work is currently concentrated in the Sichuan and Chongqing areas, and the data from Sichuan and Chongqing are selected for LCA calculations.

## Time period
Raw data dates between 2014-2016

## Reference product
- Retention pond: 3400; min 5000; max 2400; uniform; measured
  场地准备阶段--固体废物池体积

## Inputs
All rows: uniform; measured
- #325 cement: 199000; min 149000; max 282000
  Components of C30 concrete
- sand: 341000; min 255000; max 482000
  Components of C30 concrete
- gravel: 590000; min 441000; max 834000
  Components of C30 concrete
- freshwater: 94000; min 70000; max 132000
  Components of C30 concrete
- Diesel: 5050; min 3689; max 7251
  Used for material transportation, etc.
- Electricity: 1846.8; min 1382.4; max 2610
  Used for concrete mixing, etc.

## Use advice
Users should be aware that the provided LCA data is based on raw data collected between 2014 and 2016, which may not reflect current practices or technological advancements. When using the data for LCA calculations, it should be updated or contextualized to represent the current situation. Additionally, the data is regional and should be applied cautiously if used for other locations. Attention should be paid to methodological consistency when integrating this data into broader lifecycle assessments, particularly regarding the treatment of solid waste management and its environmental impacts.

## Review details
Inventory: The internal review was done by several iteration steps concerning raw data validation, raw data documentation, representativity, completeness and consistency of modelling with regard to ISO 14040 and 14044.

## Data sources
- Wang, J., Liu, M., McLellan, B. C., Tang, X. & Feng, L. Environmental impacts of shale gas development in China: A hybrid life cycle analysis. Resources, Conservation and Recycling 120, 38–45 (2017).
