# a local branded pure milk productions ; Product transportation

Dataset: ILCD process, Unit process, single operation
Geography: CD-SC-CN
Reference year: 2017
Classification: Unit processes / Transport services / Road
Functional unit: The Tetra Pak 1litre pure liquid milk is selected to assess its lifecycle based carbon footprint.
Generated by: Rui Yang, 1632707028@qq.com
Owner: Tiangong LCI Data Working Group
Review: Dependent internal review by Tiangong LCI Data Working Group
Amounts: no units in this file; such an amount is in the reference unit of its flow, which a separate flow dataset defines
copyright: false
licenseType: Free of charge for all users and uses

## General comment
According to the field investigation, light-weight gasoline truck in 2 tonnes of loading capacity is employed to transport the raw milk from the pasture to the processing plant, then to the distribution centre, and their distances are 175 kilometres and 40 kilometres, respectively. Heavy-weight disel truck in 10 tonnes of loading capacity is employed to transport the packaging waste to the municipal landfill, with a distance of 30 kilometres

## Geography
The milk source base is located at Hongya Country, Southwestern Sichuan Province, China, about 147 kilometres far from Chengdu City, the provincial capital. The diary processing plant is located at Pixian, suburb of Chengdu City, which is about 175 kilometres far from the milk source base. The branded milk is mainly distributed to the central Chengdu City, about 40 kilometres distances from the diary processing plant. The milk packaging waste is transported to the municipal landfill for final disposal, about 30 kilometres away from the central city.

## Technology and included processes
This study only focused on processes that directly contributed to pure milk production, that is, only the effects of energy and material input and carbon emissions, as shown in Figure 1. The system boundary of milk life cycle is thus simplified and divided into four stages, namely, raw milk production, dairy product processing, product transportation and packaging waste disposal.

## Technical purpose
The local branded pure milk undergoes a production and distribution process essential for dairy consumption. The light-weight gasoline trucks are utilized for transporting raw milk from pasture to processing plants and further to distribution centers, catering to the need for fresh dairy delivery. Heavy-weight diesel trucks are used for transporting packaging waste to landfills, indicating an application in waste management and recycling logistics.

## Reference product
- milk: 0.001; measured
  pure liquid milk

## Inputs
- transport in t*km: 0.175; measured
  Raw milk transportation
- transport in t*km: 0.04; measured
  Milk distribution
- transport in t*km: 0.03; measured
  Packaging waste Transportation

## Outputs
- carbon dioxide (fossil),carbon dioxide (fossil): 0.03779; measured

## Deviations from the LCI method approaches
Compared with the conventional LCA, the process of life cycle impact assessment is simplified in this study, as it mainly uses different categories of indicators to elaborate results of life cycle inventory (Nigri et al., 2014).

## Data selection and combination
The carbon footprint of product transportation is calculated by transportation loads (tonne·km) multiplying the carbon emissions factor (Cai et al., 2012). According to the field investigation, light-weight gasoline truck in 2 tonnes of loading capacity is employed to transport the raw milk from the pasture to the processing plant, then to the distribution centre, and their distances are 175 kilometres and 40 kilometres, respectively. Heavy-weight disel truck in 10 tonnes of loading capacity is employed to transport the packaging waste to the municipal landfill, with a distance of 30 kilometres. The carbon emissions factors of gasoline and diesel are measured by IPCC (2006), as 164 g per tonne kilometer for 2 tonnes light-weight gasoline truck, 84.8 g per tonne kilometer for 10 tonnes Heavy-weight disel truck, respectively, as shown in Table 3.

## Use advice
Users should consider only the direct contributions to pure milk production when utilizing this LCA data, focusing specifically on energy and material inputs, as well as carbon emissions during the life cycle stages of raw milk production, dairy processing, product transportation, and packaging waste disposal. The carbon footprint data must be calculated carefully using transportation loads and emissions factors as per IPCC guidelines to ensure accuracy in the impact assessment. It is also advised to contextualize the emissions data within the specific geographic parameters of the Sichuan province area detailed in the description.

## Review details
Inventory: The internal review was done by several iteration steps concerning raw data validation, raw data documentation, representativity, completeness and consistency of modelling with regard to ISO 14040 and 14044.

## Data sources
- Zhao, R., Xu, Y., Wen, X., Zhang, N. & Cai, J. Carbon footprint assessment for a local branded pure milk product: a lifecycle based approach. Food Sci. Technol 38, 98–105 (2017).
