# LFP direct recycling（Targeted healing）

Dataset: ILCD process, Unit process, single operation
Geography: CN
Reference year: 2020
Classification: End-of-life treatment / Material recycling
Functional unit: In this paper, the functional unit is defined as the nominal capacity of 1 kWh LIBs, which converts all the data collected into functional units for the calculation to ensure the quantitative evaluation and cross comparability of energy consumption and environmental impact of different batteries in various stages.
Generated by: maqingyuan, m1120498928@163.com
Owner: Tiangong LCI Data Working Group
Review: Dependent internal review by Tiangong LCI Data Working Group
Amounts: no units in this file; such an amount is in the reference unit of its flow, which a separate flow dataset defines
copyright: false
licenseType: Free of charge for all users and uses

## General comment
The battery is discharged before disassembly, and the electrolyte volatilized in the comminution process is centrally treated. Then, small particle-size mixtures such as electrode pieces are washed with DMC to remove residual electrolytes. After drying, the active material is separated from the current collector by immersion in n-methyl-2-pyrrolidone (NMP) with ultrasonic-assisted treatment. The obtained mixed suspension is precipitated and dried after centrifugation. According to the particle size difference, the electrode materials are separated from the current collector and diaphragm. The cathode and anode materials are further divided by foam flotation. The filtered cathode material is mixed with LiOH solution and subjected to relithiation at low temperature and low pressure. Afterward, the relithiated cathode material powder was mixed with excess Li2CO3 and thermally annealed in a nitrogen atmosphere to obtain a repaired battery level cathode active material.

## Geography
Laboratory process

## Technical purpose
This industrial process outlines the direct recycling of lithium ferrophosphate (LFP) batteries using targeted healing methods. The procedure is relevant specifically to the remanufacturing of battery cathode materials to restore them to battery-grade quality for use in the production of new lithium-ion batteries (LIBs). This technology is applicable in battery recycling facilities and contributes to the circular economy of battery materials.

## Model description
SimaPro is an LCA tool that can provide scientific assessment methods and rich databases. It can carry out complete product LCA and to analysis environmental impact at different stages of products . In this study, SimaPro v9.0 and Ecoinvent database v3.5 are used for modeling and environmental index calculation of battery material recycling and remanufacturing. Reducing carbon emissions is the most critical issue for human society at present. Carbon footprint and CED are two important indicators for assessing the climate change mitigation potential and energy performance of the battery life cycle, which are evaluated using IPCC 2013 GWP 100a v1.03 and CED v1.11 in this study, respectively.

## Reference product
- EoL LFP battery: 8.33; input

## Inputs
- Lithium Hydroxide: 0.183
- Citric Acid: 0.0583
- Lithium carbonate: 0.025
- process steam: 5
- electricity mix: 8.856
- Mechanical treatment facility: 3.83e-9
- Chemical Industry: 3.83e-9
- Freight rail: 8.66
- sodium chloride: 0.0641
- Freight Truck: 0.866

## Outputs
- Dust (unspecified, from stack),Dust (unspecified, from stack): 0.00745
- non-methane volatile organic compounds: 0.000641
- Residue to landfill: 0.257
- Cathode Material: 2.53
- Copper Scrap: 0.822
- Aluminum scrap: 0.734

## Data selection and combination
Some data from Xu, P. et al. Efficient Direct Recycling of Lithium-Ion Battery Cathodes by Targeted Healing. Joule 4, 2609–2626 (2020).

## Use advice
When utilizing LCA datasets associated with this industrial process, users should consider the boundary conditions of laboratory-scale operations as mentioned in the study by Xu, P. et al. (2020). The data is based on small-scale experimental setups and may not fully represent commercial-scale processes. Caution should be taken when extrapolating to larger systems. It is important to harmonize the data with specific recycling and remanufacturing scenarios and use the LCA tool SimaPro v9.0 and databases like Ecoinvent v3.5 cautiously, keeping in mind that the environmental indices were calculated according to the functional unit of 1 kWh LIBs nominal capacity to maintain consistency and comparability across different batteries.

## Review details
Inventory: The internal review was done by several iteration steps concerning raw data validation, raw data documentation, representativity, completeness and consistency of modelling with regard to ISO 14040 and 14044.

## Data sources
- Chen, Q. et al. Investigating the environmental impacts of different direct material recycling and battery remanufacturing technologies on two types of retired lithium-ion batteries from electric vehicles in China. Separation and Purification Technology 308, 122966 (2023).
