# Pig production ; intensive feeding

Dataset: ILCD process, Unit process, single operation
Geography: SC-CN
Reference year: 2006
Classification: Unit processes / Materials production / Agricultural production means
Functional unit: In this study, the functional unit (FU) was defined as "1kg pig carcass", which included skin, bone and fat. Foreign studies generally only considered lean meat, but in China's consumption mode, skin and viscera were also fully utilized as edible foods. The concept of carcass was adopted in this study. Although the bone included in this study is an inedible part, it can play a certain compensative role because it does not contain internal organs. In addition, the current data can be easily converted into carcass weight, so it is more in line with the actual situation.
Generated by: Rui Yang, 1632707028@qq.com
Owner: Tiangong LCI Data Working Group
Review: Dependent internal review by Tiangong LCI Data Working Group
Amounts: no units in this file; such an amount is in the reference unit of its flow, which a separate flow dataset defines
copyright: false
licenseType: Free of charge for all users and uses

## General comment
Large-scale intensive feeding in hilly and plain areas. It provides about 1.5% of Sichuan's commercial pigs, and plays a major role in modern pig farming in Sichuan. The main scenarios and parameters of this pig raising scenario are as follows: (1) Energy feed is mainly corn and other grains, all feed raw materials are purchased from outside the system, the feeding period is about 170d, and the average output is 95kg; ② The average number of listed is 5000 per year, most of the varieties are foreign three yuan hybrid pigs (such as DLY, a few are PIC commercial pigs), the slaughter rate is 76%, and the whole feed meat ratio is 3.0:1; ③ The feeding management is more advanced, the use of a large number of modern pig technology, generally self-breeding, the use of limit column and high bed feeding. ④ Fecal treatment and utilization: fecal and sewage anaerobic fermentation treatment. 70% is shipped out to return to the field (at present, this level has not been reached, assuming that this goal can be achieved in the next 5 years due to the strict implementation of environmental protection laws and regulations) long-term storage accounted for 45%, 30% after anaerobic fermentation treatment and put into the surrounding environment discharge water COD is 200mg/L.

## Geography
The data of fecal water quantity were obtained from a survey of typical free-range farmers in the surrounding areas of the east Sichuan, north Sichuan and southwest Sichuan basins

## Technology and included processes
Including raw material production, transportation and pig production process, but does not include pig slaughtering, processing and packaging, transportation process. Pig equipment, machinery and construction are not included, and materials less than 5% of the total or of low environmental relevance are excluded. The production, use and emission of drugs are not considered. Fishmeal and amino acid production are not considered

## Technical purpose
This data set describes an intensive pig production process in hilly and plain areas of Sichuan, providing about 1.5% of Sichuan's commercial pigs. It serves as a modern pig farming model within the region. The process includes large-scale feeding using primarily grain-based energy feed, with a focus on advanced management techniques such as self-breeding, restricted pen usage, and high-bed feed operations. The data set is relevant for actors in the agricultural sector seeking to model modern, intensive animal husbandry practices and for policymakers aiming to understand and manage the environmental impacts of commercial pig production.

## Reference product
- pig: 1; measured
  pork

## Inputs
- Electricity: 0.698061; calculated
  情景C

## Outputs
- ammonia: 0.0107934; measured
  Scenario C
- nitrous oxide: 0.0002784
  Scenario C
- methane (biogenic): 0.030219; calculated
  Scenario C

## Deviations from the LCI method approaches
This study combined LCA methodology and scenario analysis method to conduct systematic environmental impact assessment for three typical pig production scenarios in Sichuan, explore the specific algorithms applied to the current environmental impact assessment of pig production, and reveal the environmentally friendly and unfavorable aspects of various pig production systems and their non-renewable energy utilization efficiency. The results are helpful to the understanding of environmental impact of pig industry and provide reference for the establishment of sustainable development model of pig industry.

## Data selection and combination
In the pollution emission inventory of pig production under various scenarios, the production of fecal and urine nutrients and the production of major greenhouse gases are mainly analyzed. The environmental pollution of malodorous gases, noise and pathogens is not analyzed due to the lack of quantitative data on its potential impact on health. The waste discharge of animal production process was corrected by referring to recent research literature and combining with the data collected in the investigation, so as to reflect the actual situation in Sichuan. Among them, the emission estimate of NH3 is based on the research results of multiple literatures

## Data treatment and extrapolations
1) Due to the complexity of pig breeding patterns in different regions, it is impossible to obtain completely consistent data in similar models. Therefore, according to the main differences related to environmental pollution among relevant literatures, yearbooks and set scenarios, the average data in similar scenarios are calculated on the basis of eliminating suspicious data. 2) There are two types of waste discharge data sources in animal production process, one is directly obtained from investigation and literature, and the other is derived from literature. In order to ensure the quality of data, some actual production data which deviated from the mean value were verified by experiments and consulted by experts, and corrected by cross-reference and comparison of various literatures.

## Use advice
As the data set reflects an intensive pig production scenario, users should note the specificity of the regional context when applying the data to other regions. It is important to consider local differences such as climate, feed composition, and technological applicability when utilizing this LCA data. Additionally, users should be aware that certain elements such as the treatment of manure, animal medication, and production of by-products like fishmeal and amino acids are not considered in this data set. When using the data for environmental impact assessment, it is advisable to supplement it with local data to adjust for regional disparities and to capture a comprehensive picture of the actual environmental footprint.

## Review details
Inventory: The internal review was done by several iteration steps concerning raw data validation, raw data documentation, representativity, completeness and consistency of modelling with regard to ISO 14040 and 14044.

## Data sources
- 白林. 四川养猪业清洁生产系统LCA及猪粪资源化利用关键技术研究. (四川农业大学, 2007).
