# Steam/hot water/other ; Bituminous coal / anthracite / lignite / coal type ; Circulating fluidized bed furnace ; All sizes; NESPS2 / 蒸汽/热水/其他 ; 烟煤/无烟煤/褐煤/型煤 ; 循环流化床炉 ; 所有规模 ; 全国第二次污染普查数据

Dataset: ILCD process, Unit process, single operation
Geography: CN
Reference year: 2019
Classification: Reference Parameters / Energy carriers and technologies / Heat and steam
Generated by: The data was created by the Office of the Second National Pollution Source Census of the Ministry of Ecology and Environment, and the data was organized by the TianGong Plan team for ILCD format / 生态环境部第二次全国污染源普查工作办公室创建数据，天工计划团队常慧敏整理数据为ILCD格式
Owner: Tiangong LCI Data Working Group / 天工LCI数据工作小组
Review: Dependent internal review by Tiangong LCI Data Working Group / 天工LCI数据工作小组
Amounts: no units in this file; such an amount is in the reference unit of its flow, which a separate flow dataset defines
copyright: false
licenseType: Free of charge for all users and uses

## General comment
the Technical of end-of-pipe management technology for pollution mercuryisRotary spray drying method，Its Technical efficiency of end-of-pipe management57.2

## Technical purpose
所述工业过程适用于使用各种类型的煤在循环流化床炉中生成蒸汽或热水。它适用于所有规模的运作。该流程包括针对汞、砷、镉、铬和铅排放的一系列末端污染管理技术。提到的技术包括静电除尘、袋式过滤器、电袋复合除尘器、湿式沉降、旋风除尘、脱硝措施，以及石灰石-石膏湿法、氧化镁法、双碱法、氨法和旋转喷雾干燥法等烟气处理方法。

## Reference product
- Bituminous coal: 1000; input; calculated
  源文件中描述为为烟煤/无烟煤/褐煤/型煤，此处对其进行了匹配工作，将其匹配到LCAflow库里面相最符合的流，污染物指标备注为汞及其化合物（Hg）

## Outputs
All rows: calculated
- cadmium: 0
  Pollutant indicator Cadmium (Cd) end-of-pipe treatment technology is /, its efficiency is 0. The original document describes the pollutant category as exhaust gas, the pollutant indicator is Cadmium (Cd), here to match it to the LCAflow library in the face of the flow that most closely matches the pollutant indicator note for Cadmium (Cd) original description of the coefficient of production of pollution is 0.9150CM,S. Please according to the notes of the self-calculating modified the corresponding emissions. Please revise the corresponding emissions according to the notes.
  污染物指标镉（Cd）的末端治理技术是/，其效率为0。原文件中描述污染物类别为废气，污染物指标为镉（Cd），此处对其进行了匹配工作，将其匹配到LCAflow库里面相最符合的流，污染物指标备注为镉（Cd）原文描述的产污系数为 0.9150CM,S。请根据备注自行核算后修改对应的排放量。
- cadmium: 0
  Pollutant indicator cadmium (Cd) of the end of the treatment technology is cyclone dust removal, its efficiency is 22.9, the end of the actual operation rate of the treatment facilities (k value) is calculated as K = annual operating hours of dust removal facilities / boiler annual operating hours. The original document describes the pollutant category as exhaust gas, the pollutant indicator for cadmium (Cd), here to match it to the LCAflow library face to face the most compatible flow, the pollutant indicator note for cadmium (Cd) described in the original production coefficient of 0.9150CM,S. Please calculate according to the note by themselves to modify the corresponding emissions.
  污染物指标镉（Cd）的末端治理技术是旋风除尘，其效率为22.9，末端治理设施实际运行率（k值）计算公式为K=除尘设施年运行小时数/锅炉年运行小时数。原文件中描述污染物类别为废气，污染物指标为镉（Cd），此处对其进行了匹配工作，将其匹配到LCAflow库里面相最符合的流，污染物指标备注为镉（Cd）原文描述的产污系数为 0.9150CM,S。请根据备注自行核算后修改对应的排放量。
- Chromium: 0
  Pollutant indicator chromium (Cr) end-of-pipe treatment technology is /, its efficiency is 0. The original document describes the pollutant category as exhaust gas, the pollutant indicator is chromium (Cr), here to match it to the LCAflow library of the most compatible flow, pollutant indicator note for chromium (Cr) original description of the production coefficient of 0.8133CM,S. Please according to the notes of their own accounting after modification of the corresponding emissions. Please modify the corresponding emissions according to the notes.
  污染物指标铬（Cr）的末端治理技术是/，其效率为0。原文件中描述污染物类别为废气，污染物指标为铬（Cr），此处对其进行了匹配工作，将其匹配到LCAflow库里面相最符合的流，污染物指标备注为铬（Cr）原文描述的产污系数为 0.8133CM,S。请根据备注自行核算后修改对应的排放量。
- Chromium: 0
  Pollutant indicator chromium (Cr) of the end of the treatment technology is cyclone dust removal, its efficiency is 30, the end of the actual operation rate of the treatment facilities (k value) calculation formula for K = dust removal facilities annual operating hours / boiler annual operating hours. The original document describes the pollutant category as exhaust gas, the pollutant indicator is chromium (Cr), here it is matched to the LCAflow library to match the most compatible flow, the pollutant indicator note is chromium (Cr) the original description of the coefficient of production of 0.8133CM,S. Please modify the corresponding emissions according to the note after their own accounting.
  污染物指标铬（Cr）的末端治理技术是旋风除尘，其效率为30，末端治理设施实际运行率（k值）计算公式为K=除尘设施年运行小时数/锅炉年运行小时数。原文件中描述污染物类别为废气，污染物指标为铬（Cr），此处对其进行了匹配工作，将其匹配到LCAflow库里面相最符合的流，污染物指标备注为铬（Cr）原文描述的产污系数为 0.8133CM,S。请根据备注自行核算后修改对应的排放量。
- lead: 0
  Pollutant indicator lead (Pb) of the end of the treatment technology is cyclone dust removal, its efficiency is 12.1, the end of the actual operation rate of the treatment facilities (k value) calculation formula for K = dust removal facilities annual operating hours / boiler annual operating hours. The original document describes the pollutant category as exhaust gas, the pollutant indicator is lead (Pb), here it is matched to the LCAflow library to match the most compatible flow, the pollutant indicator is lead (Pb), the original description of the coefficient of production of 0.7733CM,S. Please modify the corresponding emissions according to the note after their own accounting.
  污染物指标铅（Pb）的末端治理技术是旋风除尘，其效率为12.1，末端治理设施实际运行率（k值）计算公式为K=除尘设施年运行小时数/锅炉年运行小时数。原文件中描述污染物类别为废气，污染物指标为铅（Pb），此处对其进行了匹配工作，将其匹配到LCAflow库里面相最符合的流，污染物指标备注为铅（Pb）原文描述的产污系数为 0.7733CM,S。请根据备注自行核算后修改对应的排放量。
- mercury: 0
  Pollutant indicator mercury and its compounds (Hg) end treatment technology is electrostatic precipitation, its efficiency is 33.2, the actual operation rate of end treatment facilities (k value) is calculated as K = annual operating hours of precipitation facilities / annual operating hours of boilers. The original document describes the pollutant category as exhaust gas, and the pollutant indicator is mercury and its compounds (Hg), and the matching work is carried out here to match the pollutant indicator to the most compatible flow in the LCAflow library, and the pollutant indicator is mercury and its compounds (Hg), and the original description of the coefficient of production of pollutants is 0.9892CM,S. Please modify the corresponding emission rate according to your own calculations in accordance with the remarks.
  污染物指标汞及其化合物（Hg）的末端治理技术是静电除尘，其效率为33.2，末端治理设施实际运行率（k值）计算公式为K=除尘设施年运行小时数/锅炉年运行小时数。原文件中描述污染物类别为废气，污染物指标为汞及其化合物（Hg），此处对其进行了匹配工作，将其匹配到LCAflow库里面相最符合的流，污染物指标备注为汞及其化合物（Hg）原文描述的产污系数为 0.9892CM,S。请根据备注自行核算后修改对应的排放量。
- mercury: 0
  Pollutant indicator mercury and its compounds (Hg) end-of-pipe treatment technology is /, its efficiency is 0. The original document describes the pollutant category as exhaust gas, the pollutant indicator is mercury and its compounds (Hg), here to match it to the most compatible flow in the LCAflow library, the pollutant indicator note is mercury and its compounds (Hg) the production coefficient in the original description is 0.9892CM,S. Please modify the corresponding emissions according to the notes after self-calculation.
  污染物指标汞及其化合物（Hg）的末端治理技术是/，其效率为0。原文件中描述污染物类别为废气，污染物指标为汞及其化合物（Hg），此处对其进行了匹配工作，将其匹配到LCAflow库里面相最符合的流，污染物指标备注为汞及其化合物（Hg）原文描述的产污系数为 0.9892CM,S。请根据备注自行核算后修改对应的排放量。
- mercury: 0
  Pollutant indicator of mercury and its compounds (Hg) end treatment technology is cyclone dust removal, the efficiency of which is 6, and the formula for calculating the actual operation rate (k value) of end treatment facilities is K = annual operating hours of dust removal facilities / annual operating hours of boilers. The original document describes the pollutant category as exhaust gas, and the pollutant indicator is mercury and its compounds (Hg), and the matching work is carried out here to match the pollutant indicator to the most compatible flow in the LCAflow library, and the pollutant indicator is mercury and its compounds (Hg), and the original description of the production coefficient of the pollutant is 0.9892CM,S. Please modify the corresponding emission rate according to your own calculations in accordance with the note.
  污染物指标汞及其化合物（Hg）的末端治理技术是旋风除尘，其效率为6，末端治理设施实际运行率（k值）计算公式为K=除尘设施年运行小时数/锅炉年运行小时数。原文件中描述污染物类别为废气，污染物指标为汞及其化合物（Hg），此处对其进行了匹配工作，将其匹配到LCAflow库里面相最符合的流，污染物指标备注为汞及其化合物（Hg）原文描述的产污系数为 0.9892CM,S。请根据备注自行核算后修改对应的排放量。
- arsenic: 0
  The end-of-pipe treatment technology for the pollutant indicator arsenic (As) is /, and its efficiency is 0. The original document describes the pollutant category as exhaust gas, and the pollutant indicator is arsenic (As), and the matching work is carried out here to match the pollutant indicator to the flow that best meets the LCAflow library, and the production coefficient of the pollutant indicator, which is described in the original document as arsenic (As), is 0.7560 CM,S. Please calculate and modify the corresponding emissions according to the notes. Please modify the corresponding emission rate after checking the data according to the notes..The original article describes the pollution production coefficients as 0.7560CM,S。Please revise the corresponding emissions after accounting for them according to the notes.。.The original article describes the pollution production coefficients as 0.7560CM,S. Please revise the corresponding emissions after accounting for them according to the notes.
  污染物指标砷（As）的末端治理技术是/，其效率为0。原文件中描述污染物类别为废气，污染物指标为砷（As），此处对其进行了匹配工作，将其匹配到LCAflow库里面相最符合的流，污染物指标备注为砷（As）原文描述的产污系数为 0.7560CM,S。请根据备注自行核算后修改对应的排放量。
- lead: 0
  The end-of-pipe treatment technology for the pollutant indicator lead (Pb) is /, and its efficiency is 0. The original document describes the pollutant category as exhaust gas, and the pollutant indicator is lead (Pb), and the matching work has been carried out here to match the pollutant indicator with the most compatible flow in the LCAflow library, and the production coefficient of the pollutant indicator, which is described in the original document as lead (Pb), is 0.7733CM,S. Please check and modify the corresponding emissions according to the notes. Please revise the corresponding emission rate according to the notes..The original article describes the pollution production coefficients as 0.7733CM,S。Please revise the corresponding emissions after accounting for them according to the notes.。.The original article describes the pollution production coefficients as 0.7733CM,S. Please revise the corresponding emissions after accounting for them according to the notes.
  污染物指标铅（Pb）的末端治理技术是/，其效率为0。原文件中描述污染物类别为废气，污染物指标为铅（Pb），此处对其进行了匹配工作，将其匹配到LCAflow库里面相最符合的流，污染物指标备注为铅（Pb）原文描述的产污系数为 0.7733CM,S。请根据备注自行核算后修改对应的排放量。
- mercury: 0
  The end-of-pipe treatment technology for the pollutant indicator mercury and its compounds (Hg) is wet dust removal, with an efficiency of 15.2. The formula for calculating the actual operation rate of the end-of-pipe treatment facilities (k-value) is K = annual operation hours of the dust removal facilities / annual operation hours of the boiler. The original document describes the pollutant category as waste gas, and the pollutant indicator is mercury and its compounds (Hg), and the matching work is carried out here to match the pollutant indicator to the most compatible flow in the LCAflow library, and the pollutant indicator is mercury and its compounds (Hg), and the original description of the coefficient of production of pollutants is 0.9892CM,S. Please modify the corresponding emission rate according to your own calculations in accordance with the remarks..The original article describes the pollution production coefficients as 0.9892CM,S。Please revise the corresponding emissions after accounting for them according to the notes.。.The original article describes the pollution production coefficients as 0.9892CM,S. Please revise the corresponding emissions after accounting for them according to the notes.
  污染物指标汞及其化合物（Hg）的末端治理技术是湿法除尘，其效率为15.2，末端治理设施实际运行率（k值）计算公式为K=除尘设施年运行小时数/锅炉年运行小时数。原文件中描述污染物类别为废气，污染物指标为汞及其化合物（Hg），此处对其进行了匹配工作，将其匹配到LCAflow库里面相最符合的流，污染物指标备注为汞及其化合物（Hg）原文描述的产污系数为 0.9892CM,S。请根据备注自行核算后修改对应的排放量。
- arsenic: 0
  the Technical of end-of-pipe management technology for pollution arsenicisAmmonia method，Its Technical efficiency of end-of-pipe management80.4.The original article describes the pollution production coefficients as 0.7560CM,S。Please revise the corresponding emissions after accounting for them according to the notes.。.The original article describes the pollution production coefficients as 0.7560CM,S. Please revise the corresponding emissions after accounting for them according to the notes.
  污染物指标砷（As）的末端治理技术是氨法，其效率为80.4，末端治理设施实际运行率（k值）计算公式为K=脱硫设施年运行小时数/锅炉年运行小时数。原文件中描述污染物类别为废气，污染物指标为砷（As），此处对其进行了匹配工作，将其匹配到LCAflow库里面相最符合的流，污染物指标备注为砷（As）原文描述的产污系数为 0.7560CM,S。请根据备注自行核算后修改对应的排放量。
- arsenic: 0
  the Technical of end-of-pipe management technology for pollution arsenicisBag filter，Its Technical efficiency of end-of-pipe management99.The original article describes the pollution production coefficients as 0.7560CM,S。Please revise the corresponding emissions after accounting for them according to the notes.。.The original article describes the pollution production coefficients as 0.7560CM,S. Please revise the corresponding emissions after accounting for them according to the notes.
  污染物指标砷（As）的末端治理技术是袋式除尘，其效率为99，末端治理设施实际运行率（k值）计算公式为K=除尘设施年运行小时数/锅炉年运行小时数。原文件中描述污染物类别为废气，污染物指标为砷（As），此处对其进行了匹配工作，将其匹配到LCAflow库里面相最符合的流，污染物指标备注为砷（As）原文描述的产污系数为 0.7560CM,S。请根据备注自行核算后修改对应的排放量。
- arsenic: 0
  the Technical of end-of-pipe management technology for pollution arsenicisCyclone dust removal，Its Technical efficiency of end-of-pipe management43.The original article describes the pollution production coefficients as 0.7560CM,S。Please revise the corresponding emissions after accounting for them according to the notes.。.The original article describes the pollution production coefficients as 0.7560CM,S. Please revise the corresponding emissions after accounting for them according to the notes.
  污染物指标砷（As）的末端治理技术是旋风除尘，其效率为43，末端治理设施实际运行率（k值）计算公式为K=除尘设施年运行小时数/锅炉年运行小时数。原文件中描述污染物类别为废气，污染物指标为砷（As），此处对其进行了匹配工作，将其匹配到LCAflow库里面相最符合的流，污染物指标备注为砷（As）原文描述的产污系数为 0.7560CM,S。请根据备注自行核算后修改对应的排放量。
- arsenic: 0
  the Technical of end-of-pipe management technology for pollution arsenicisDenitrification measures.The original article describes the pollution production coefficients as 0.7560CM,S。Please revise the corresponding emissions after accounting for them according to the notes.。.The original article describes the pollution production coefficients as 0.7560CM,S. Please revise the corresponding emissions after accounting for them according to the notes.
  污染物指标砷（As）的末端治理技术是脱硝措施。原文件中描述污染物类别为废气，污染物指标为砷（As），此处对其进行了匹配工作，将其匹配到LCAflow库里面相最符合的流，污染物指标备注为砷（As）原文描述的产污系数为 0.7560CM,S。请根据备注自行核算后修改对应的排放量。
- arsenic: 0
  the Technical of end-of-pipe management technology for pollution arsenicisDouble alkali process，Its Technical efficiency of end-of-pipe management80.4.The original article describes the pollution production coefficients as 0.7560CM,S。Please revise the corresponding emissions after accounting for them according to the notes.。.The original article describes the pollution production coefficients as 0.7560CM,S. Please revise the corresponding emissions after accounting for them according to the notes.
  污染物指标砷（As）的末端治理技术是双碱法，其效率为80.4，末端治理设施实际运行率（k值）计算公式为K=脱硫设施年运行小时数/锅炉年运行小时数。原文件中描述污染物类别为废气，污染物指标为砷（As），此处对其进行了匹配工作，将其匹配到LCAflow库里面相最符合的流，污染物指标备注为砷（As）原文描述的产污系数为 0.7560CM,S。请根据备注自行核算后修改对应的排放量。
- arsenic: 0
  the Technical of end-of-pipe management technology for pollution arsenicisElectric-bag composite precipitator，Its Technical efficiency of end-of-pipe management99.The original article describes the pollution production coefficients as 0.7560CM,S。Please revise the corresponding emissions after accounting for them according to the notes.。.The original article describes the pollution production coefficients as 0.7560CM,S. Please revise the corresponding emissions after accounting for them according to the notes.
  污染物指标砷（As）的末端治理技术是电袋组合，其效率为99，末端治理设施实际运行率（k值）计算公式为K=除尘设施年运行小时数/锅炉年运行小时数。原文件中描述污染物类别为废气，污染物指标为砷（As），此处对其进行了匹配工作，将其匹配到LCAflow库里面相最符合的流，污染物指标备注为砷（As）原文描述的产污系数为 0.7560CM,S。请根据备注自行核算后修改对应的排放量。
- arsenic: 0
  the Technical of end-of-pipe management technology for pollution arsenicisElectrostatic precipitation，Its Technical efficiency of end-of-pipe management86.2.The original article describes the pollution production coefficients as 0.7560CM,S。Please revise the corresponding emissions after accounting for them according to the notes.。.The original article describes the pollution production coefficients as 0.7560CM,S. Please revise the corresponding emissions after accounting for them according to the notes.
  污染物指标砷（As）的末端治理技术是静电除尘，其效率为86.2，末端治理设施实际运行率（k值）计算公式为K=除尘设施年运行小时数/锅炉年运行小时数。原文件中描述污染物类别为废气，污染物指标为砷（As），此处对其进行了匹配工作，将其匹配到LCAflow库里面相最符合的流，污染物指标备注为砷（As）原文描述的产污系数为 0.7560CM,S。请根据备注自行核算后修改对应的排放量。
- arsenic: 0
  the Technical of end-of-pipe management technology for pollution arsenicisFlue gas circulating fluidized bed method，Its Technical efficiency of end-of-pipe management80.4.The original article describes the pollution production coefficients as 0.7560CM,S。Please revise the corresponding emissions after accounting for them according to the notes.。.The original article describes the pollution production coefficients as 0.7560CM,S. Please revise the corresponding emissions after accounting for them according to the notes.
  污染物指标砷（As）的末端治理技术是烟气循环流化床法，其效率为80.4，末端治理设施实际运行率（k值）计算公式为K=脱硫设施年运行小时数/锅炉年运行小时数。原文件中描述污染物类别为废气，污染物指标为砷（As），此处对其进行了匹配工作，将其匹配到LCAflow库里面相最符合的流，污染物指标备注为砷（As）原文描述的产污系数为 0.7560CM,S。请根据备注自行核算后修改对应的排放量。
- arsenic: 0
  the Technical of end-of-pipe management technology for pollution arsenicisLimestone-gypsum wet process (lime-gypsum wet process)，Its Technical efficiency of end-of-pipe management80.4.The original article describes the pollution production coefficients as 0.7560CM,S。Please revise the corresponding emissions after accounting for them according to the notes.。.The original article describes the pollution production coefficients as 0.7560CM,S. Please revise the corresponding emissions after accounting for them according to the notes.
  污染物指标砷（As）的末端治理技术是石灰石-石膏湿法（石灰-石膏湿法），其效率为80.4，末端治理设施实际运行率（k值）计算公式为K=脱硫设施年运行小时数/锅炉年运行小时数。原文件中描述污染物类别为废气，污染物指标为砷（As），此处对其进行了匹配工作，将其匹配到LCAflow库里面相最符合的流，污染物指标备注为砷（As）原文描述的产污系数为 0.7560CM,S。请根据备注自行核算后修改对应的排放量。
- arsenic: 0
  the Technical of end-of-pipe management technology for pollution arsenicisMagnesium oxide method，Its Technical efficiency of end-of-pipe management80.4.The original article describes the pollution production coefficients as 0.7560CM,S。Please revise the corresponding emissions after accounting for them according to the notes.。.The original article describes the pollution production coefficients as 0.7560CM,S. Please revise the corresponding emissions after accounting for them according to the notes.
  污染物指标砷（As）的末端治理技术是氧化镁法，其效率为80.4，末端治理设施实际运行率（k值）计算公式为K=脱硫设施年运行小时数/锅炉年运行小时数。原文件中描述污染物类别为废气，污染物指标为砷（As），此处对其进行了匹配工作，将其匹配到LCAflow库里面相最符合的流，污染物指标备注为砷（As）原文描述的产污系数为 0.7560CM,S。请根据备注自行核算后修改对应的排放量。
- arsenic: 0
  the Technical of end-of-pipe management technology for pollution arsenicisRotary spray drying method，Its Technical efficiency of end-of-pipe management80.4.The original article describes the pollution production coefficients as 0.7560CM,S。Please revise the corresponding emissions after accounting for them according to the notes.。.The original article describes the pollution production coefficients as 0.7560CM,S. Please revise the corresponding emissions after accounting for them according to the notes.
  污染物指标砷（As）的末端治理技术是旋转喷雾干燥法，其效率为80.4，末端治理设施实际运行率（k值）计算公式为K=脱硫设施年运行小时数/锅炉年运行小时数。原文件中描述污染物类别为废气，污染物指标为砷（As），此处对其进行了匹配工作，将其匹配到LCAflow库里面相最符合的流，污染物指标备注为砷（As）原文描述的产污系数为 0.7560CM,S。请根据备注自行核算后修改对应的排放量。
- arsenic: 0
  the Technical of end-of-pipe management technology for pollution arsenicisWet precipitation，Its Technical efficiency of end-of-pipe management96.3.The original article describes the pollution production coefficients as 0.7560CM,S。Please revise the corresponding emissions after accounting for them according to the notes.。.The original article describes the pollution production coefficients as 0.7560CM,S. Please revise the corresponding emissions after accounting for them according to the notes.
  污染物指标砷（As）的末端治理技术是湿法除尘，其效率为96.3，末端治理设施实际运行率（k值）计算公式为K=除尘设施年运行小时数/锅炉年运行小时数。原文件中描述污染物类别为废气，污染物指标为砷（As），此处对其进行了匹配工作，将其匹配到LCAflow库里面相最符合的流，污染物指标备注为砷（As）原文描述的产污系数为 0.7560CM,S。请根据备注自行核算后修改对应的排放量。
- cadmium: 0
  the Technical of end-of-pipe management technology for pollution cadmiumisAmmonia method，Its Technical efficiency of end-of-pipe management80.5.The original article describes the pollution production coefficients as 0.9150CM,S。Please revise the corresponding emissions after accounting for them according to the notes.。.The original article describes the pollution production coefficients as 0.9150CM,S. Please revise the corresponding emissions after accounting for them according to the notes.
  污染物指标镉（Cd）的末端治理技术是氨法，其效率为80.5，末端治理设施实际运行率（k值）计算公式为K=脱硫设施年运行小时数/锅炉年运行小时数。原文件中描述污染物类别为废气，污染物指标为镉（Cd），此处对其进行了匹配工作，将其匹配到LCAflow库里面相最符合的流，污染物指标备注为镉（Cd）原文描述的产污系数为 0.9150CM,S。请根据备注自行核算后修改对应的排放量。
- cadmium: 0
  the Technical of end-of-pipe management technology for pollution cadmiumisBag filter，Its Technical efficiency of end-of-pipe management97.6.The original article describes the pollution production coefficients as 0.9150CM,S。Please revise the corresponding emissions after accounting for them according to the notes.。.The original article describes the pollution production coefficients as 0.9150CM,S. Please revise the corresponding emissions after accounting for them according to the notes.
  污染物指标镉（Cd）的末端治理技术是袋式除尘，其效率为97.6，末端治理设施实际运行率（k值）计算公式为K=除尘设施年运行小时数/锅炉年运行小时数。原文件中描述污染物类别为废气，污染物指标为镉（Cd），此处对其进行了匹配工作，将其匹配到LCAflow库里面相最符合的流，污染物指标备注为镉（Cd）原文描述的产污系数为 0.9150CM,S。请根据备注自行核算后修改对应的排放量。
- cadmium: 0
  the Technical of end-of-pipe management technology for pollution cadmiumisDenitrification measures.The original article describes the pollution production coefficients as 0.9150CM,S。Please revise the corresponding emissions after accounting for them according to the notes.。.The original article describes the pollution production coefficients as 0.9150CM,S. Please revise the corresponding emissions after accounting for them according to the notes.
  污染物指标镉（Cd）的末端治理技术是脱硝措施。原文件中描述污染物类别为废气，污染物指标为镉（Cd），此处对其进行了匹配工作，将其匹配到LCAflow库里面相最符合的流，污染物指标备注为镉（Cd）原文描述的产污系数为 0.9150CM,S。请根据备注自行核算后修改对应的排放量。
- cadmium: 0
  the Technical of end-of-pipe management technology for pollution cadmiumisDouble alkali process，Its Technical efficiency of end-of-pipe management80.5.The original article describes the pollution production coefficients as 0.9150CM,S。Please revise the corresponding emissions after accounting for them according to the notes.。.The original article describes the pollution production coefficients as 0.9150CM,S. Please revise the corresponding emissions after accounting for them according to the notes.
  污染物指标镉（Cd）的末端治理技术是双碱法，其效率为80.5，末端治理设施实际运行率（k值）计算公式为K=脱硫设施年运行小时数/锅炉年运行小时数。原文件中描述污染物类别为废气，污染物指标为镉（Cd），此处对其进行了匹配工作，将其匹配到LCAflow库里面相最符合的流，污染物指标备注为镉（Cd）原文描述的产污系数为 0.9150CM,S。请根据备注自行核算后修改对应的排放量。
- cadmium: 0
  the Technical of end-of-pipe management technology for pollution cadmiumisElectric-bag composite precipitator，Its Technical efficiency of end-of-pipe management97.6.The original article describes the pollution production coefficients as 0.9150CM,S。Please revise the corresponding emissions after accounting for them according to the notes.。.The original article describes the pollution production coefficients as 0.9150CM,S. Please revise the corresponding emissions after accounting for them according to the notes.
  污染物指标镉（Cd）的末端治理技术是电袋组合，其效率为97.6，末端治理设施实际运行率（k值）计算公式为K=除尘设施年运行小时数/锅炉年运行小时数。原文件中描述污染物类别为废气，污染物指标为镉（Cd），此处对其进行了匹配工作，将其匹配到LCAflow库里面相最符合的流，污染物指标备注为镉（Cd）原文描述的产污系数为 0.9150CM,S。请根据备注自行核算后修改对应的排放量。
- cadmium: 0
  the Technical of end-of-pipe management technology for pollution cadmiumisElectrostatic precipitation，Its Technical efficiency of end-of-pipe management96.5.The original article describes the pollution production coefficients as 0.9150CM,S。Please revise the corresponding emissions after accounting for them according to the notes.。.The original article describes the pollution production coefficients as 0.9150CM,S. Please revise the corresponding emissions after accounting for them according to the notes.
  污染物指标镉（Cd）的末端治理技术是静电除尘，其效率为96.5，末端治理设施实际运行率（k值）计算公式为K=除尘设施年运行小时数/锅炉年运行小时数。原文件中描述污染物类别为废气，污染物指标为镉（Cd），此处对其进行了匹配工作，将其匹配到LCAflow库里面相最符合的流，污染物指标备注为镉（Cd）原文描述的产污系数为 0.9150CM,S。请根据备注自行核算后修改对应的排放量。
- cadmium: 0
  the Technical of end-of-pipe management technology for pollution cadmiumisFlue gas circulating fluidized bed method，Its Technical efficiency of end-of-pipe management80.5.The original article describes the pollution production coefficients as 0.9150CM,S。Please revise the corresponding emissions after accounting for them according to the notes.。.The original article describes the pollution production coefficients as 0.9150CM,S. Please revise the corresponding emissions after accounting for them according to the notes.
  污染物指标镉（Cd）的末端治理技术是烟气循环流化床法，其效率为80.5，末端治理设施实际运行率（k值）计算公式为K=脱硫设施年运行小时数/锅炉年运行小时数。原文件中描述污染物类别为废气，污染物指标为镉（Cd），此处对其进行了匹配工作，将其匹配到LCAflow库里面相最符合的流，污染物指标备注为镉（Cd）原文描述的产污系数为 0.9150CM,S。请根据备注自行核算后修改对应的排放量。
- cadmium: 0
  the Technical of end-of-pipe management technology for pollution cadmiumisLimestone-gypsum wet process (lime-gypsum wet process)，Its Technical efficiency of end-of-pipe management80.5.The original article describes the pollution production coefficients as 0.9150CM,S。Please revise the corresponding emissions after accounting for them according to the notes.。.The original article describes the pollution production coefficients as 0.9150CM,S. Please revise the corresponding emissions after accounting for them according to the notes.
  污染物指标镉（Cd）的末端治理技术是石灰石-石膏湿法（石灰-石膏湿法），其效率为80.5，末端治理设施实际运行率（k值）计算公式为K=脱硫设施年运行小时数/锅炉年运行小时数。原文件中描述污染物类别为废气，污染物指标为镉（Cd），此处对其进行了匹配工作，将其匹配到LCAflow库里面相最符合的流，污染物指标备注为镉（Cd）原文描述的产污系数为 0.9150CM,S。请根据备注自行核算后修改对应的排放量。
- cadmium: 0
  the Technical of end-of-pipe management technology for pollution cadmiumisMagnesium oxide method，Its Technical efficiency of end-of-pipe management80.5.The original article describes the pollution production coefficients as 0.9150CM,S。Please revise the corresponding emissions after accounting for them according to the notes.。.The original article describes the pollution production coefficients as 0.9150CM,S. Please revise the corresponding emissions after accounting for them according to the notes.
  污染物指标镉（Cd）的末端治理技术是氧化镁法，其效率为80.5，末端治理设施实际运行率（k值）计算公式为K=脱硫设施年运行小时数/锅炉年运行小时数。原文件中描述污染物类别为废气，污染物指标为镉（Cd），此处对其进行了匹配工作，将其匹配到LCAflow库里面相最符合的流，污染物指标备注为镉（Cd）原文描述的产污系数为 0.9150CM,S。请根据备注自行核算后修改对应的排放量。
- cadmium: 0
  the Technical of end-of-pipe management technology for pollution cadmiumisRotary spray drying method，Its Technical efficiency of end-of-pipe management80.5.The original article describes the pollution production coefficients as 0.9150CM,S。Please revise the corresponding emissions after accounting for them according to the notes.。.The original article describes the pollution production coefficients as 0.9150CM,S. Please revise the corresponding emissions after accounting for them according to the notes.
  污染物指标镉（Cd）的末端治理技术是旋转喷雾干燥法，其效率为80.5，末端治理设施实际运行率（k值）计算公式为K=脱硫设施年运行小时数/锅炉年运行小时数。原文件中描述污染物类别为废气，污染物指标为镉（Cd），此处对其进行了匹配工作，将其匹配到LCAflow库里面相最符合的流，污染物指标备注为镉（Cd）原文描述的产污系数为 0.9150CM,S。请根据备注自行核算后修改对应的排放量。
- cadmium: 0
  the Technical of end-of-pipe management technology for pollution cadmiumisWet precipitation，Its Technical efficiency of end-of-pipe management75.The original article describes the pollution production coefficients as 0.9150CM,S。Please revise the corresponding emissions after accounting for them according to the notes.。.The original article describes the pollution production coefficients as 0.9150CM,S. Please revise the corresponding emissions after accounting for them according to the notes.
  污染物指标镉（Cd）的末端治理技术是湿法除尘，其效率为75，末端治理设施实际运行率（k值）计算公式为K=除尘设施年运行小时数/锅炉年运行小时数。原文件中描述污染物类别为废气，污染物指标为镉（Cd），此处对其进行了匹配工作，将其匹配到LCAflow库里面相最符合的流，污染物指标备注为镉（Cd）原文描述的产污系数为 0.9150CM,S。请根据备注自行核算后修改对应的排放量。
- Chromium: 0
  the Technical of end-of-pipe management technology for pollution ChromiumisAmmonia method，Its Technical efficiency of end-of-pipe management86.The original article describes the pollution production coefficients as 0.8133CM,S。Please revise the corresponding emissions after accounting for them according to the notes.。.The original article describes the pollution production coefficients as 0.8133CM,S. Please revise the corresponding emissions after accounting for them according to the notes.
  污染物指标铬（Cr）的末端治理技术是氨法，其效率为86，末端治理设施实际运行率（k值）计算公式为K=脱硫设施年运行小时数/锅炉年运行小时数。原文件中描述污染物类别为废气，污染物指标为铬（Cr），此处对其进行了匹配工作，将其匹配到LCAflow库里面相最符合的流，污染物指标备注为铬（Cr）原文描述的产污系数为 0.8133CM,S。请根据备注自行核算后修改对应的排放量。
- Chromium: 0
  the Technical of end-of-pipe management technology for pollution ChromiumisBag filter，Its Technical efficiency of end-of-pipe management95.1.The original article describes the pollution production coefficients as 0.8133CM,S。Please revise the corresponding emissions after accounting for them according to the notes.。.The original article describes the pollution production coefficients as 0.8133CM,S. Please revise the corresponding emissions after accounting for them according to the notes.
  污染物指标铬（Cr）的末端治理技术是袋式除尘，其效率为95.1，末端治理设施实际运行率（k值）计算公式为K=除尘设施年运行小时数/锅炉年运行小时数。原文件中描述污染物类别为废气，污染物指标为铬（Cr），此处对其进行了匹配工作，将其匹配到LCAflow库里面相最符合的流，污染物指标备注为铬（Cr）原文描述的产污系数为 0.8133CM,S。请根据备注自行核算后修改对应的排放量。
- Chromium: 0
  the Technical of end-of-pipe management technology for pollution ChromiumisDenitrification measures.The original article describes the pollution production coefficients as 0.8133CM,S。Please revise the corresponding emissions after accounting for them according to the notes.。.The original article describes the pollution production coefficients as 0.8133CM,S. Please revise the corresponding emissions after accounting for them according to the notes.
  污染物指标铬（Cr）的末端治理技术是脱硝措施。原文件中描述污染物类别为废气，污染物指标为铬（Cr），此处对其进行了匹配工作，将其匹配到LCAflow库里面相最符合的流，污染物指标备注为铬（Cr）原文描述的产污系数为 0.8133CM,S。请根据备注自行核算后修改对应的排放量。
- Chromium: 0
  the Technical of end-of-pipe management technology for pollution ChromiumisDouble alkali process，Its Technical efficiency of end-of-pipe management86.The original article describes the pollution production coefficients as 0.8133CM,S。Please revise the corresponding emissions after accounting for them according to the notes.。.The original article describes the pollution production coefficients as 0.8133CM,S. Please revise the corresponding emissions after accounting for them according to the notes.
  污染物指标铬（Cr）的末端治理技术是双碱法，其效率为86，末端治理设施实际运行率（k值）计算公式为K=脱硫设施年运行小时数/锅炉年运行小时数。原文件中描述污染物类别为废气，污染物指标为铬（Cr），此处对其进行了匹配工作，将其匹配到LCAflow库里面相最符合的流，污染物指标备注为铬（Cr）原文描述的产污系数为 0.8133CM,S。请根据备注自行核算后修改对应的排放量。
- Chromium: 0
  the Technical of end-of-pipe management technology for pollution ChromiumisElectric-bag composite precipitator，Its Technical efficiency of end-of-pipe management95.1.The original article describes the pollution production coefficients as 0.8133CM,S。Please revise the corresponding emissions after accounting for them according to the notes.。.The original article describes the pollution production coefficients as 0.8133CM,S. Please revise the corresponding emissions after accounting for them according to the notes.
  污染物指标铬（Cr）的末端治理技术是电袋组合，其效率为95.1，末端治理设施实际运行率（k值）计算公式为K=除尘设施年运行小时数/锅炉年运行小时数。原文件中描述污染物类别为废气，污染物指标为铬（Cr），此处对其进行了匹配工作，将其匹配到LCAflow库里面相最符合的流，污染物指标备注为铬（Cr）原文描述的产污系数为 0.8133CM,S。请根据备注自行核算后修改对应的排放量。
- Chromium: 0
  the Technical of end-of-pipe management technology for pollution ChromiumisElectrostatic precipitation，Its Technical efficiency of end-of-pipe management98.5.The original article describes the pollution production coefficients as 0.8133CM,S。Please revise the corresponding emissions after accounting for them according to the notes.。.The original article describes the pollution production coefficients as 0.8133CM,S. Please revise the corresponding emissions after accounting for them according to the notes.
  污染物指标铬（Cr）的末端治理技术是静电除尘，其效率为98.5，末端治理设施实际运行率（k值）计算公式为K=除尘设施年运行小时数/锅炉年运行小时数。原文件中描述污染物类别为废气，污染物指标为铬（Cr），此处对其进行了匹配工作，将其匹配到LCAflow库里面相最符合的流，污染物指标备注为铬（Cr）原文描述的产污系数为 0.8133CM,S。请根据备注自行核算后修改对应的排放量。
- Chromium: 0
  the Technical of end-of-pipe management technology for pollution ChromiumisFlue gas circulating fluidized bed method，Its Technical efficiency of end-of-pipe management86.The original article describes the pollution production coefficients as 0.8133CM,S。Please revise the corresponding emissions after accounting for them according to the notes.。.The original article describes the pollution production coefficients as 0.8133CM,S. Please revise the corresponding emissions after accounting for them according to the notes.
  污染物指标铬（Cr）的末端治理技术是烟气循环流化床法，其效率为86，末端治理设施实际运行率（k值）计算公式为K=脱硫设施年运行小时数/锅炉年运行小时数。原文件中描述污染物类别为废气，污染物指标为铬（Cr），此处对其进行了匹配工作，将其匹配到LCAflow库里面相最符合的流，污染物指标备注为铬（Cr）原文描述的产污系数为 0.8133CM,S。请根据备注自行核算后修改对应的排放量。
- Chromium: 0
  the Technical of end-of-pipe management technology for pollution ChromiumisLimestone-gypsum wet process (lime-gypsum wet process)，Its Technical efficiency of end-of-pipe management86.The original article describes the pollution production coefficients as 0.8133CM,S。Please revise the corresponding emissions after accounting for them according to the notes.。.The original article describes the pollution production coefficients as 0.8133CM,S. Please revise the corresponding emissions after accounting for them according to the notes.
  污染物指标铬（Cr）的末端治理技术是石灰石-石膏湿法（石灰-石膏湿法），其效率为86，末端治理设施实际运行率（k值）计算公式为K=脱硫设施年运行小时数/锅炉年运行小时数。原文件中描述污染物类别为废气，污染物指标为铬（Cr），此处对其进行了匹配工作，将其匹配到LCAflow库里面相最符合的流，污染物指标备注为铬（Cr）原文描述的产污系数为 0.8133CM,S。请根据备注自行核算后修改对应的排放量。
- Chromium: 0
  the Technical of end-of-pipe management technology for pollution ChromiumisMagnesium oxide method，Its Technical efficiency of end-of-pipe management86.The original article describes the pollution production coefficients as 0.8133CM,S。Please revise the corresponding emissions after accounting for them according to the notes.。.The original article describes the pollution production coefficients as 0.8133CM,S. Please revise the corresponding emissions after accounting for them according to the notes.
  污染物指标铬（Cr）的末端治理技术是氧化镁法，其效率为86，末端治理设施实际运行率（k值）计算公式为K=脱硫设施年运行小时数/锅炉年运行小时数。原文件中描述污染物类别为废气，污染物指标为铬（Cr），此处对其进行了匹配工作，将其匹配到LCAflow库里面相最符合的流，污染物指标备注为铬（Cr）原文描述的产污系数为 0.8133CM,S。请根据备注自行核算后修改对应的排放量。
- Chromium: 0
  the Technical of end-of-pipe management technology for pollution ChromiumisRotary spray drying method，Its Technical efficiency of end-of-pipe management86.The original article describes the pollution production coefficients as 0.8133CM,S。Please revise the corresponding emissions after accounting for them according to the notes.。.The original article describes the pollution production coefficients as 0.8133CM,S. Please revise the corresponding emissions after accounting for them according to the notes.
  污染物指标铬（Cr）的末端治理技术是旋转喷雾干燥法，其效率为86，末端治理设施实际运行率（k值）计算公式为K=脱硫设施年运行小时数/锅炉年运行小时数。原文件中描述污染物类别为废气，污染物指标为铬（Cr），此处对其进行了匹配工作，将其匹配到LCAflow库里面相最符合的流，污染物指标备注为铬（Cr）原文描述的产污系数为 0.8133CM,S。请根据备注自行核算后修改对应的排放量。
- Chromium: 0
  the Technical of end-of-pipe management technology for pollution ChromiumisWet precipitation，Its Technical efficiency of end-of-pipe management48.1.The original article describes the pollution production coefficients as 0.8133CM,S。Please revise the corresponding emissions after accounting for them according to the notes.。.The original article describes the pollution production coefficients as 0.8133CM,S. Please revise the corresponding emissions after accounting for them according to the notes.
  污染物指标铬（Cr）的末端治理技术是湿法除尘，其效率为48.1，末端治理设施实际运行率（k值）计算公式为K=除尘设施年运行小时数/锅炉年运行小时数。原文件中描述污染物类别为废气，污染物指标为铬（Cr），此处对其进行了匹配工作，将其匹配到LCAflow库里面相最符合的流，污染物指标备注为铬（Cr）原文描述的产污系数为 0.8133CM,S。请根据备注自行核算后修改对应的排放量。
- lead: 0
  the Technical of end-of-pipe management technology for pollution leadisAmmonia method，Its Technical efficiency of end-of-pipe management78.4.The original article describes the pollution production coefficients as 0.7733CM,S。Please revise the corresponding emissions after accounting for them according to the notes.。.The original article describes the pollution production coefficients as 0.7733CM,S. Please revise the corresponding emissions after accounting for them according to the notes.
  污染物指标铅（Pb）的末端治理技术是氨法，其效率为78.4，末端治理设施实际运行率（k值）计算公式为K=脱硫设施年运行小时数/锅炉年运行小时数。原文件中描述污染物类别为废气，污染物指标为铅（Pb），此处对其进行了匹配工作，将其匹配到LCAflow库里面相最符合的流，污染物指标备注为铅（Pb）原文描述的产污系数为 0.7733CM,S。请根据备注自行核算后修改对应的排放量。
- lead: 0
  the Technical of end-of-pipe management technology for pollution leadisBag filter，Its Technical efficiency of end-of-pipe management99.The original article describes the pollution production coefficients as 0.7733CM,S。Please revise the corresponding emissions after accounting for them according to the notes.。.The original article describes the pollution production coefficients as 0.7733CM,S. Please revise the corresponding emissions after accounting for them according to the notes.
  污染物指标铅（Pb）的末端治理技术是袋式除尘，其效率为99，末端治理设施实际运行率（k值）计算公式为K=除尘设施年运行小时数/锅炉年运行小时数。原文件中描述污染物类别为废气，污染物指标为铅（Pb），此处对其进行了匹配工作，将其匹配到LCAflow库里面相最符合的流，污染物指标备注为铅（Pb）原文描述的产污系数为 0.7733CM,S。请根据备注自行核算后修改对应的排放量。
- lead: 0
  the Technical of end-of-pipe management technology for pollution leadisDenitrification measures.The original article describes the pollution production coefficients as 0.7733CM,S。Please revise the corresponding emissions after accounting for them according to the notes.。.The original article describes the pollution production coefficients as 0.7733CM,S. Please revise the corresponding emissions after accounting for them according to the notes.
  污染物指标铅（Pb）的末端治理技术是脱硝措施。原文件中描述污染物类别为废气，污染物指标为铅（Pb），此处对其进行了匹配工作，将其匹配到LCAflow库里面相最符合的流，污染物指标备注为铅（Pb）原文描述的产污系数为 0.7733CM,S。请根据备注自行核算后修改对应的排放量。
- lead: 0
  the Technical of end-of-pipe management technology for pollution leadisDouble alkali process，Its Technical efficiency of end-of-pipe management78.4.The original article describes the pollution production coefficients as 0.7733CM,S。Please revise the corresponding emissions after accounting for them according to the notes.。.The original article describes the pollution production coefficients as 0.7733CM,S. Please revise the corresponding emissions after accounting for them according to the notes.
  污染物指标铅（Pb）的末端治理技术是双碱法，其效率为78.4，末端治理设施实际运行率（k值）计算公式为K=脱硫设施年运行小时数/锅炉年运行小时数。原文件中描述污染物类别为废气，污染物指标为铅（Pb），此处对其进行了匹配工作，将其匹配到LCAflow库里面相最符合的流，污染物指标备注为铅（Pb）原文描述的产污系数为 0.7733CM,S。请根据备注自行核算后修改对应的排放量。
- lead: 0
  the Technical of end-of-pipe management technology for pollution leadisElectric-bag composite precipitator，Its Technical efficiency of end-of-pipe management99.The original article describes the pollution production coefficients as 0.7733CM,S。Please revise the corresponding emissions after accounting for them according to the notes.。.The original article describes the pollution production coefficients as 0.7733CM,S. Please revise the corresponding emissions after accounting for them according to the notes.
  污染物指标铅（Pb）的末端治理技术是电袋组合，其效率为99，末端治理设施实际运行率（k值）计算公式为K=除尘设施年运行小时数/锅炉年运行小时数。原文件中描述污染物类别为废气，污染物指标为铅（Pb），此处对其进行了匹配工作，将其匹配到LCAflow库里面相最符合的流，污染物指标备注为铅（Pb）原文描述的产污系数为 0.7733CM,S。请根据备注自行核算后修改对应的排放量。
- lead: 0
  the Technical of end-of-pipe management technology for pollution leadisElectrostatic precipitation，Its Technical efficiency of end-of-pipe management97.2.The original article describes the pollution production coefficients as 0.7733CM,S。Please revise the corresponding emissions after accounting for them according to the notes.。.The original article describes the pollution production coefficients as 0.7733CM,S. Please revise the corresponding emissions after accounting for them according to the notes.
  污染物指标铅（Pb）的末端治理技术是静电除尘，其效率为97.2，末端治理设施实际运行率（k值）计算公式为K=除尘设施年运行小时数/锅炉年运行小时数。原文件中描述污染物类别为废气，污染物指标为铅（Pb），此处对其进行了匹配工作，将其匹配到LCAflow库里面相最符合的流，污染物指标备注为铅（Pb）原文描述的产污系数为 0.7733CM,S。请根据备注自行核算后修改对应的排放量。
- lead: 0
  the Technical of end-of-pipe management technology for pollution leadisFlue gas circulating fluidized bed method，Its Technical efficiency of end-of-pipe management78.4.The original article describes the pollution production coefficients as 0.7733CM,S。Please revise the corresponding emissions after accounting for them according to the notes.。.The original article describes the pollution production coefficients as 0.7733CM,S. Please revise the corresponding emissions after accounting for them according to the notes.
  污染物指标铅（Pb）的末端治理技术是烟气循环流化床法，其效率为78.4，末端治理设施实际运行率（k值）计算公式为K=脱硫设施年运行小时数/锅炉年运行小时数。原文件中描述污染物类别为废气，污染物指标为铅（Pb），此处对其进行了匹配工作，将其匹配到LCAflow库里面相最符合的流，污染物指标备注为铅（Pb）原文描述的产污系数为 0.7733CM,S。请根据备注自行核算后修改对应的排放量。
- lead: 0
  the Technical of end-of-pipe management technology for pollution leadisLimestone-gypsum wet process (lime-gypsum wet process)，Its Technical efficiency of end-of-pipe management78.4.The original article describes the pollution production coefficients as 0.7733CM,S。Please revise the corresponding emissions after accounting for them according to the notes.。.The original article describes the pollution production coefficients as 0.7733CM,S. Please revise the corresponding emissions after accounting for them according to the notes.
  污染物指标铅（Pb）的末端治理技术是石灰石-石膏湿法（石灰-石膏湿法），其效率为78.4，末端治理设施实际运行率（k值）计算公式为K=脱硫设施年运行小时数/锅炉年运行小时数。原文件中描述污染物类别为废气，污染物指标为铅（Pb），此处对其进行了匹配工作，将其匹配到LCAflow库里面相最符合的流，污染物指标备注为铅（Pb）原文描述的产污系数为 0.7733CM,S。请根据备注自行核算后修改对应的排放量。
- lead: 0
  the Technical of end-of-pipe management technology for pollution leadisMagnesium oxide method，Its Technical efficiency of end-of-pipe management78.4.The original article describes the pollution production coefficients as 0.7733CM,S。Please revise the corresponding emissions after accounting for them according to the notes.。.The original article describes the pollution production coefficients as 0.7733CM,S. Please revise the corresponding emissions after accounting for them according to the notes.
  污染物指标铅（Pb）的末端治理技术是氧化镁法，其效率为78.4，末端治理设施实际运行率（k值）计算公式为K=脱硫设施年运行小时数/锅炉年运行小时数。原文件中描述污染物类别为废气，污染物指标为铅（Pb），此处对其进行了匹配工作，将其匹配到LCAflow库里面相最符合的流，污染物指标备注为铅（Pb）原文描述的产污系数为 0.7733CM,S。请根据备注自行核算后修改对应的排放量。
- lead: 0
  the Technical of end-of-pipe management technology for pollution leadisRotary spray drying method，Its Technical efficiency of end-of-pipe management78.4.The original article describes the pollution production coefficients as 0.7733CM,S。Please revise the corresponding emissions after accounting for them according to the notes.。.The original article describes the pollution production coefficients as 0.7733CM,S. Please revise the corresponding emissions after accounting for them according to the notes.
  污染物指标铅（Pb）的末端治理技术是旋转喷雾干燥法，其效率为78.4，末端治理设施实际运行率（k值）计算公式为K=脱硫设施年运行小时数/锅炉年运行小时数。原文件中描述污染物类别为废气，污染物指标为铅（Pb），此处对其进行了匹配工作，将其匹配到LCAflow库里面相最符合的流，污染物指标备注为铅（Pb）原文描述的产污系数为 0.7733CM,S。请根据备注自行核算后修改对应的排放量。
- lead: 0
  the Technical of end-of-pipe management technology for pollution leadisWet precipitation，Its Technical efficiency of end-of-pipe management70.1.The original article describes the pollution production coefficients as 0.7733CM,S。Please revise the corresponding emissions after accounting for them according to the notes.。.The original article describes the pollution production coefficients as 0.7733CM,S. Please revise the corresponding emissions after accounting for them according to the notes.
  污染物指标铅（Pb）的末端治理技术是湿法除尘，其效率为70.1，末端治理设施实际运行率（k值）计算公式为K=除尘设施年运行小时数/锅炉年运行小时数。原文件中描述污染物类别为废气，污染物指标为铅（Pb），此处对其进行了匹配工作，将其匹配到LCAflow库里面相最符合的流，污染物指标备注为铅（Pb）原文描述的产污系数为 0.7733CM,S。请根据备注自行核算后修改对应的排放量。
- mercury: 0
  the Technical of end-of-pipe management technology for pollution mercuryisAmmonia method，Its Technical efficiency of end-of-pipe management57.2.The original article describes the pollution production coefficients as 0.9892CM,S。Please revise the corresponding emissions after accounting for them according to the notes.。.The original article describes the pollution production coefficients as 0.9892CM,S. Please revise the corresponding emissions after accounting for them according to the notes.
  污染物指标汞及其化合物（Hg）的末端治理技术是氨法，其效率为57.2，末端治理设施实际运行率（k值）计算公式为K=脱硫设施年运行小时数/锅炉年运行小时数。原文件中描述污染物类别为废气，污染物指标为汞及其化合物（Hg），此处对其进行了匹配工作，将其匹配到LCAflow库里面相最符合的流，污染物指标备注为汞及其化合物（Hg）原文描述的产污系数为 0.9892CM,S。请根据备注自行核算后修改对应的排放量。
- mercury: 0
  the Technical of end-of-pipe management technology for pollution mercuryisBag filter，Its Technical efficiency of end-of-pipe management67.9.The original article describes the pollution production coefficients as 0.9892CM,S。Please revise the corresponding emissions after accounting for them according to the notes.。.The original article describes the pollution production coefficients as 0.9892CM,S. Please revise the corresponding emissions after accounting for them according to the notes.
  污染物指标汞及其化合物（Hg）的末端治理技术是袋式除尘，其效率为67.9，末端治理设施实际运行率（k值）计算公式为K=除尘设施年运行小时数/锅炉年运行小时数。原文件中描述污染物类别为废气，污染物指标为汞及其化合物（Hg），此处对其进行了匹配工作，将其匹配到LCAflow库里面相最符合的流，污染物指标备注为汞及其化合物（Hg）原文描述的产污系数为 0.9892CM,S。请根据备注自行核算后修改对应的排放量。
- mercury: 0
  the Technical of end-of-pipe management technology for pollution mercuryisDenitrification measures.The original article describes the pollution production coefficients as 0.9892CM,S。Please revise the corresponding emissions after accounting for them according to the notes.。.The original article describes the pollution production coefficients as 0.9892CM,S. Please revise the corresponding emissions after accounting for them according to the notes.
  污染物指标汞及其化合物（Hg）的末端治理技术是脱硝措施。原文件中描述污染物类别为废气，污染物指标为汞及其化合物（Hg），此处对其进行了匹配工作，将其匹配到LCAflow库里面相最符合的流，污染物指标备注为汞及其化合物（Hg）原文描述的产污系数为 0.9892CM,S。请根据备注自行核算后修改对应的排放量。
- mercury: 0
  the Technical of end-of-pipe management technology for pollution mercuryisDouble alkali process，Its Technical efficiency of end-of-pipe management57.2.The original article describes the pollution production coefficients as 0.9892CM,S。Please revise the corresponding emissions after accounting for them according to the notes.。.The original article describes the pollution production coefficients as 0.9892CM,S. Please revise the corresponding emissions after accounting for them according to the notes.
  污染物指标汞及其化合物（Hg）的末端治理技术是双碱法，其效率为57.2，末端治理设施实际运行率（k值）计算公式为K=脱硫设施年运行小时数/锅炉年运行小时数。原文件中描述污染物类别为废气，污染物指标为汞及其化合物（Hg），此处对其进行了匹配工作，将其匹配到LCAflow库里面相最符合的流，污染物指标备注为汞及其化合物（Hg）原文描述的产污系数为 0.9892CM,S。请根据备注自行核算后修改对应的排放量。
- mercury: 0
  the Technical of end-of-pipe management technology for pollution mercuryisElectric-bag composite precipitator，Its Technical efficiency of end-of-pipe management67.9.The original article describes the pollution production coefficients as 0.9892CM,S。Please revise the corresponding emissions after accounting for them according to the notes.。.The original article describes the pollution production coefficients as 0.9892CM,S. Please revise the corresponding emissions after accounting for them according to the notes.
  污染物指标汞及其化合物（Hg）的末端治理技术是电袋组合，其效率为67.9，末端治理设施实际运行率（k值）计算公式为K=除尘设施年运行小时数/锅炉年运行小时数。原文件中描述污染物类别为废气，污染物指标为汞及其化合物（Hg），此处对其进行了匹配工作，将其匹配到LCAflow库里面相最符合的流，污染物指标备注为汞及其化合物（Hg）原文描述的产污系数为 0.9892CM,S。请根据备注自行核算后修改对应的排放量。
- mercury: 0
  the Technical of end-of-pipe management technology for pollution mercuryisFlue gas circulating fluidized bed method，Its Technical efficiency of end-of-pipe management57.2.The original article describes the pollution production coefficients as 0.9892CM,S。Please revise the corresponding emissions after accounting for them according to the notes.。.The original article describes the pollution production coefficients as 0.9892CM,S. Please revise the corresponding emissions after accounting for them according to the notes.
  污染物指标汞及其化合物（Hg）的末端治理技术是烟气循环流化床法，其效率为57.2，末端治理设施实际运行率（k值）计算公式为K=脱硫设施年运行小时数/锅炉年运行小时数。原文件中描述污染物类别为废气，污染物指标为汞及其化合物（Hg），此处对其进行了匹配工作，将其匹配到LCAflow库里面相最符合的流，污染物指标备注为汞及其化合物（Hg）原文描述的产污系数为 0.9892CM,S。请根据备注自行核算后修改对应的排放量。
- mercury: 0
  the Technical of end-of-pipe management technology for pollution mercuryisLimestone-gypsum wet process (lime-gypsum wet process)，Its Technical efficiency of end-of-pipe management57.2.The original article describes the pollution production coefficients as 0.9892CM,S。Please revise the corresponding emissions after accounting for them according to the notes.。.The original article describes the pollution production coefficients as 0.9892CM,S. Please revise the corresponding emissions after accounting for them according to the notes.
  污染物指标汞及其化合物（Hg）的末端治理技术是石灰石-石膏湿法（石灰-石膏湿法），其效率为57.2，末端治理设施实际运行率（k值）计算公式为K=脱硫设施年运行小时数/锅炉年运行小时数。原文件中描述污染物类别为废气，污染物指标为汞及其化合物（Hg），此处对其进行了匹配工作，将其匹配到LCAflow库里面相最符合的流，污染物指标备注为汞及其化合物（Hg）原文描述的产污系数为 0.9892CM,S。请根据备注自行核算后修改对应的排放量。
- mercury: 0
  the Technical of end-of-pipe management technology for pollution mercuryisMagnesium oxide method，Its Technical efficiency of end-of-pipe management57.2.The original article describes the pollution production coefficients as 0.9892CM,S。Please revise the corresponding emissions after accounting for them according to the notes.。.The original article describes the pollution production coefficients as 0.9892CM,S. Please revise the corresponding emissions after accounting for them according to the notes.
  污染物指标汞及其化合物（Hg）的末端治理技术是氧化镁法，其效率为57.2，末端治理设施实际运行率（k值）计算公式为K=脱硫设施年运行小时数/锅炉年运行小时数。原文件中描述污染物类别为废气，污染物指标为汞及其化合物（Hg），此处对其进行了匹配工作，将其匹配到LCAflow库里面相最符合的流，污染物指标备注为汞及其化合物（Hg）原文描述的产污系数为 0.9892CM,S。请根据备注自行核算后修改对应的排放量。
- mercury: 0
  the Technical of end-of-pipe management technology for pollution mercuryisRotary spray drying method，Its Technical efficiency of end-of-pipe management57.2.The original article describes the pollution production coefficients as 0.9892CM,S。Please revise the corresponding emissions after accounting for them according to the notes.。.The original article describes the pollution production coefficients as 0.9892CM,S. Please revise the corresponding emissions after accounting for them according to the notes.
  污染物指标汞及其化合物（Hg）的末端治理技术是旋转喷雾干燥法，其效率为57.2，末端治理设施实际运行率（k值）计算公式为K=脱硫设施年运行小时数/锅炉年运行小时数。原文件中描述污染物类别为废气，污染物指标为汞及其化合物（Hg），此处对其进行了匹配工作，将其匹配到LCAflow库里面相最符合的流，污染物指标备注为汞及其化合物（Hg）原文描述的产污系数为 0.9892CM,S。请根据备注自行核算后修改对应的排放量。

## Use advice
This dataset is derived from the Pollution Source Census Report and contains information on pollution emissions and related products. However, it does not include data on energy or chemical consumption, nor does it provide information on waste or co-product generation. When utilizing this dataset, please supplement the missing data based on actual conditions before use
该数据集来源于污染源普查报告，包含污染物排放及相关产品信息，但不包含能源或化学品消耗数据，也不提供废弃物或共生产物产生信息。在使用该数据集时，请根据实际情况补充缺失数据后再使用。

## Review details
Inventory: The internal review was done by several iteration steps concerning raw data validation, raw data documentation, representativity, completeness and consistency of modelling with regard to ISO 14040 and 14044.
清单： 内部审查通过几个迭代步骤完成，涉及原始数据验证、原始数据记录、代表性、完整性、与 ISO 14040 和 14044 有关的建模的一致性。

## Data sources
- 第二次全国污染源普查产排污核算系数手册（试用版）,四级代码4430文件，在完整版文件中第5449页
