# Electricity production ; Thermal power ; Yunnan

Dataset: ILCD process, Unit process, single operation
Geography: YN-CN
Reference year: 2019
Classification: Unit processes / Energy carriers and technologies / Electricity
Generated by: Ruoxi Xiong, xiongrx0126@163.com
Owner: Tiangong LCI Data Working Group
Review: Dependent internal review by Tiangong LCI Data Working Group
Amounts: no units in this file; such an amount is in the reference unit of its flow, which a separate flow dataset defines
copyright: false
licenseType: Free of charge for all users and uses

## General comment
Thermal power generation includes seventeen fossil fuels such as raw coal, washed coal, oil and natural gas. The process only considers the direct power generation process, not the upstream raw material extraction and processing and the downstream power consumption

## Time period
Calculated based on data from the 2019 Energy Statistics Yearbook

## Technical purpose
This dataset represents the use of various fossil fuels, including raw coal, washed coal, oil, and natural gas, for electricity production in thermal power plants located in Yunnan province. The data is specific to the direct power generation process which is commonly employed in the grid energy mix for the region.

## Reference product
- electricity for thermal power: 3.6; calculated

## Inputs
All rows: calculated
- Raw coal: 0.481158
- Gangue, in ground: 0.0226012
- Coke oven gas: 0.001486
- blast furnace gas: 0.262685
- Converter gas: 0.023173
- Diesel: 0.00010433

## Outputs
- carbon dioxide (fossil): 1.16098; calculated
- sulfur dioxide: 0.000187763; calculated
- Nitrogen oxides: 0.000309024; calculated
- particles (> PM10): 4.1602e-5; calculated

## Data treatment and extrapolations
For the accounting method, please refer to the "Enterprise Greenhouse Gas Emissions Accounting Methods and Reporting Guidelines for Power Generation Facilities". Different forms of power generation and fuel consumption come from Chapter 3 (Energy Production) and Chapter 6 (Regional Energy Balance Sheet) in the "China Energy Statistical Yearbook 2020". The fuel parameters such as low calorific value and carbon content per unit calorific value used to calculate the carbon dioxide emission factor come from the "2019 China Regional Power Grid Carbon Dioxide Baseline Emission Factor Calculation Instructions OM" and the "Enterprise Greenhouse Gas Emission Accounting Method and Reporting Guide for Power Generation Facilities" 》

## Use advice
When utilizing this dataset for life cycle assessment or carbon footprint calculations, users should limit their consideration to the direct emissions from power generation. Upstream activities such as raw material extraction and processing, as well as downstream power consumption, should be excluded. For methodological consistency, assessments should be based on the accounting principles provided in the 'Enterprise Greenhouse Gas Emissions Accounting Methods and Reporting Guidelines for Power Generation Facilities' and the fuel parameters from the specified sources for the calculation of CO2 emission factors.

## Review details
Inventory: The internal review was done by several iteration steps concerning raw data validation, raw data documentation, representativity, completeness and consistency of modelling with regard to ISO 14040 and 14044.

## Data sources
- 熊若熙. 中国电力生产和消费二氧化碳与污染物排放因子核算. (清华大学, 2023).
