# Aluminum ingot casting ; Primary aluminum ingot ; Central China Power Grid ; Liquid primary aluminum

Dataset: ILCD process, Partly terminated system
Geography: CN
Reference year: 2011
Classification: Unit processes / Materials production / Metals and semimetals
Generated by: Jinliang Xie, jinliang.research@gmail.com
Owner: Tiangong LCI Data Working Group
Review: Dependent internal review by Tiangong LCI Data Working Group
Amounts: no units in this file; such an amount is in the reference unit of its flow, which a separate flow dataset defines
copyright: false
licenseType: Free of charge for all users and uses

## General comment
结合不同工艺的电解铝产量分布比例所计算出的国内电解铝生产过程CO2排放因子的加权平均值。从氧化铝到铝锭。

## Geography
南方电网

## Time period
Year of publication

## Technical purpose
Primary aluminum ingots produced through the process of aluminum ingot casting are typically used in a variety of applications including construction, transportation, packaging, and electrical industries. Examples of end-use products comprising of these ingots are aluminum components for vehicles, structural building materials, cans, foils, and electrical wiring. The data set applies particularly to the production of primary aluminum using aluminum oxide as a raw material within the geographical context of the Central China Power Grid and reflects the CO2 emissions factor from this regional manufacturing process.

## Reference product
- aluminium, primary, ingot: 1000; measured

## Outputs
- carbon dioxide (fossil),carbon dioxide (fossil): 1038.1; measured

## Data selection and combination
On the basis of fully sorting out the production situation of alumina and electrolytic aluminum enterprises across the country, and in accordance with the principle of covering all representative processes and production capacities, and taking into full consideration the distribution of production capacities, nature of enterprises and other factors, we focused on selecting typical primary aluminum smelting enterprises in typical regions such as Henan, Shandong and Guangxi, and carried out an in-depth field survey, and formed a database of carbon emission factors for alumina and electrolytic aluminum, with the data of 2011 as the main body. The database of alumina production includes primary and secondary materials. The alumina production database includes four sub-databases: consumption of raw and auxiliary materials and waste generation, process technology and equipment, energy consumption of process materials, and secondary energy production of self-provided cogeneration plants. For details, see Table 1 of the literature sources.

## Use advice
When utilizing this data set, attention must be paid to the methodological aspects such as the geographical relevance to the Central China Power Grid, and the specific production processes of aluminum oxide to ingot. The CO2 emissions factors are a weighted average based on the production distribution ratios of different alumina electrolysis processes. Data originating from a comprehensive review of the national aluminum oxide and electrolytic aluminum production, focusing on typical primary aluminum smelting enterprises in regions such as Henan, Shandong, and Guangxi, should be used cautiously. Scope of the electrolytic aluminum production process accounting includes carbon anode consumption, PFCs emissions, and the production process of purchased electricity. For further details see source table 1 and consider updates or regional modifications in technological practices when applying this data.

## Review details
Inventory: The internal review was done by several iteration steps concerning raw data validation, raw data documentation, representativity, completeness and consistency of modelling with regard to ISO 14040 and 14044.

## Data sources
- 张文娟，李会泉，陈波，李强，韩永鹏 & 孙振华. 我国原铝冶炼行业温室气体排放模型. 环境科学研究 vol. 26 1132–1138 (2013).
