# Treatment of industrial wastewater ; Electrodialysis, spiral-wound, CN

Dataset: ILCD process, Unit process, single operation
Geography: CN
Reference year: 2023
Classification: End-of-life treatment / Waste water treatment
Functional unit: 1 t sodium chloride
Generated by: Jiaqi Lu, wilsherelu@foxmail.com
Owner: Tiangong LCI Data Working Group
Review: Dependent internal review by Tiangong LCI Data Working Group
Amounts: no units in this file; such an amount is in the reference unit of its flow, which a separate flow dataset defines
copyright: false
licenseType: Free of charge for all users and uses

## General comment
This data set represents a single unit process of treating 1 ton of industrial wastewater to extract 1 ton of sodium chloride through electrodialysis with a spiral-wound module, as commonly practiced in China. The purified sodium chloride can be used for various applications in the chemical industry, such as feedstock for chlor-alkali processes, de-icing, water treatment, agriculture, and food processing.

## Reference product
- sodium chloride: 1000; article inperiodical
  product salt

## Inputs
- Electrodialysis Component: 0.0073; article inperiodical
  ED components
- electricity mix: 464.148; article inperiodical
  Process power consumption
- Water (fresh water): 370370; article inperiodical
  raw water

## Outputs
- High-concentration saline wastewater: 74074; article inperiodical
  thick water
- Deionized Water: 290296; article inperiodical
  freshwater

## Use advice
When using this data set for Life Cycle Assessment, it is important to consider the scope and boundaries of the analysis. Ensure that this unit process is applicable in the geographical context of China. Account for the energy consumption and any chemical additives used during the electrodialysis process. Consider the environmental impacts of waste products and by-products produced during this treatment. If extrapolating data beyond the intended scope, adjustments may be required to reflect local conditions adequately.

## Review details
Inventory: The internal review was done by several iteration steps concerning raw data validation, raw data documentation, representativity, completeness and consistency of modelling with regard to ISO 14040 and 14044.

## Data sources
- Xue, N. et al. Carbon footprint analysis and carbon neutrality potential of desalination by electrodialysis for different applications. Water Res. 232, 119716 (2023).
