# On-site emissions｜electricity｜biomass boiler（15MW）

Dataset: ILCD process, Unit process, single operation
Geography: CN
Reference year: 2020
Classification: Energy carriers and technologies / Heat and steam
Functional unit: Taking 1 ton of straw as the functional unit
LCI method principle: Consequential
Generated by: Chaoshuo Liu, liucs22@mails.jlu.edu.cn
Owner: Tiangong LCI Data Working Group
Review: Dependent internal review by Tiangong LCI Data Working Group
Amounts: no units in this file; such an amount is in the reference unit of its flow, which a separate flow dataset defines
copyright: false
licenseType: Free of charge for all users and uses

## General comment
on-site emissions were emissions from plant operation.

## Technical purpose
The electricity generated by a 15MW biomass boiler using straw as fuel is primarily utilized for power supply within the production facility. It serves as an on-site energy source that can potentially cater to various operations in an industry relying on biomass as a renewable energy option.

## Reference product
- electricity from waste incineration: 435.276; article inperiodical

## Inputs
- Corn straw: 1000; article inperiodical
- Electricity: 10.26; article inperiodical
- Diesel: 4.43; article inperiodical
- process water: 1194; article inperiodical

## Outputs
- sulfur dioxide: 0.25115; article inperiodical
- nitrogen dioxide: 0.20847; article inperiodical

## Use advice
When using this data set for life cycle assessment, ensure the system boundary includes this on-site generation and its associated emissions. The functional unit is defined as the emissions produced from burning 1 ton of straw; thus, extrapolation to other quantities should be done cautiously. Emissions must be allocated accordingly if the electricity is used for multiple processes or products. Reference to current technology standards and regulations is advised to maintain the data's relevance over time.

## Review details
Inventory: The internal review was done by several iteration steps concerning raw data validation, raw data documentation, representativity, completeness and consistency of modelling with regard to ISO 14040 and 14044.

## Data sources
- Yang, Y., Ni, J.-Q., Zhou, S. & Xie, G. H. Comparison of energy performance and environmental impacts of three corn stover-based bioenergy pathways. Journal of Cleaner Production 272, 122631 (2020).
