# Remediated soil ; PCE contaminated soil ; Stimulated biological degradation

Dataset: ILCD process, Unit process, black box
Geography: BE
Reference year: 2019
Classification: Unit processes / Other Services / Repair and maintenance
Functional unit: The functional unit was defined for this study as all the relevant products and processes needed for the remediation of a site contaminated with volatile hydrocarbons with a pollution load of 3300 kg PCE, to eliminate the potential human risk.
Generated by: Yang Xintong, yangxt@caep.org.cn
Owner: Tiangong LCI Data Working Group
Review: Dependent internal review by Tiangong LCI Data Working Group
Amounts: no units in this file; such an amount is in the reference unit of its flow, which a separate flow dataset defines
copyright: false
licenseType: Free of charge for all users and uses

## General comment
Uses less oxidants and more lactate as an organic carbon source for the stimulated biological degradation. Focuses more on stimulation of the biological degradation of the contamination to reduce the pollution load.

## Geography
The case concerns the remediation of a former dry-cleaning site (with an area of 505 m2 ) in a densely populated city center in Flanders.

## Time period
Publication time of literature

## Technical purpose
The remediated soil data set pertains to an environmental restoration process tailored for sites contaminated with perchloroethylene (PCE), a type of volatile hydrocarbon. This remediation process is specifically designed to stimulate biological degradation by utilizing lower amounts of oxidants and a greater proportion of lactate as an organic carbon source, thereby accelerating the breakdown of contaminants to alleviate pollution. This process is particularly relevant for former dry cleaning establishments or other sites with PCE contamination in urban areas, where enhanced bioremediation is preferred due to its lower environmental impact and sustainability.

## Reference product
- Remedied site: 505; measured

## Inputs
All rows: measured
- Electricity: 2.90304e6
  Electricity use throughout project
- Tap Water: 9216
  Water use throughout project
- Hydrogen peroxide,Hydrogen peroxide: 616
  Hydrogen peroxide use
- Tap Water: 1144
  throughout project
- Digger: 1533
  Excavation
- transport in t*km: 119300
  Transport excavated soil
- Diesel,Diesel: 105
  Cleaning excavated soil
- Electricity: 41040
  Cleaning excavated soil
- Polyethylene,Polyethylene: 663
  Foil to cover after excavation
- Plastic Film: 663
  Foil to cover after excavation
- Digger: 2765
  Pipe work
- Activated Carbon: 2000
  Pump and Treat
- Activated Carbon: 16000
  Soil vapor extraction
- Diesel,Diesel: 26046
  Coil drilling throughout the project
- Tap Water: 228
  Coil drilling throughout the project
- Maltose Syrup: 456
  Stimulated biological degradation
- Road Transport,Road Transport: 1.089e7, 5.13e6 (2 entries)
  Transport of workers during project
- Contaminated Site: 505

## Use advice
When applying this data set for LCA, ensure that the scope of contamination and remediation methods align with the parameters of the case study: a former dry-cleaning site of 505 m2 with a pollution load of 3300 kg of PCE in a densely populated urban area. Consider the regional context, as the process is designed for conditions in Flanders. The LCA model should reflect the reduced use of oxidants and focus on enhanced biological degradation with lactate as a carbon source. The functional unit should address all necessary products and processes for remediation to eliminate potential human health risks associated with PCE contamination.

## Review details
Inventory: The internal review was done by several iteration steps concerning raw data validation, raw data documentation, representativity, completeness and consistency of modelling with regard to ISO 14040 and 14044.

## Data sources
- Huysegoms L ,Rousseau S ,Cappuyns V . Chemical or Natural? Including LCA in Social CBA to Compare Remediation Alternatives for a Dry-Cleaning Facility [J]. Sustainability, 2019, 11 (7): 1975-1975.
