# Electricity production ; Electricity mix ; Hebei

Dataset: ILCD process, Unit process, single operation
Geography: HEB-CN
Reference year: 2019
Classification: Unit processes / Energy carriers and technologies / Electricity
Generated by: Ruoxi Xiong, xiongrx0126@163.com
Owner: Tiangong LCI Data Working Group
Review: Dependent internal review by Tiangong LCI Data Working Group
Amounts: no units in this file; such an amount is in the reference unit of its flow, which a separate flow dataset defines
copyright: false
licenseType: Free of charge for all users and uses

## General comment
Electricity mix includes thermal, hydro, wind, nuclear and solar generation

## Technical purpose
Electricity generated from the Hebei electricity mix is utilized for a variety of applications such as residential, commercial, industrial power supply, and potentially for electric vehicles and public infrastructure. This process represents power from multiple sources including thermal, hydro, wind, nuclear, and solar generation contributing to the regional electricity grid.

## Reference product
- Electricity: 3.6; missing unimportant
  [{'text': '能量', 'type': 'text'}]

## Inputs
All rows: missing unimportant
- electricity for thermal power: 3.05202
  [{'text': '能量', 'type': 'text'}]
- electricity from hydroelectric power plant: 0.01719
  [{'text': '能量', 'type': 'text'}]
- electricity for nuclear power: 0
  [{'text': '能量', 'type': 'text'}]
- electricity from wind power: 0.341683
  [{'text': '能量', 'type': 'text'}]
- electricity for solar power: 0.189108
  [{'text': '能量', 'type': 'text'}]

## Use advice
When utilizing this dataset for Life Cycle Assessment, users should consider the specific mix of energy sources and their respective emissions and extraction impacts. It is important to account for regional variations in energy production and the temporal changes in the energy mix. This data should be updated regularly to reflect the current state of the energy mix in Hebei. Considerations regarding the upstream and downstream processes, including energy transmission, losses, and end-of-life scenarios for infrastructures should also be factored in.

## Review details
Inventory: The internal review was done by several iteration steps concerning raw data validation, raw data documentation, representativity, completeness and consistency of modelling with regard to ISO 14040 and 14044.

## Data sources
- 能源统计年鉴2020
