# Soil and groundwater remediation;Ex-situ;Soil washing;Waste water treatment

Dataset: ILCD process, Unit process, single operation
Geography: KR
Reference year: 2023
Classification: Unit processes / Other Services / Repair and maintenance
Generated by: Huang Yue, huangyue@caep.org.cn
Owner: Tiangong LCI Data Working Group
Review: Dependent internal review by Tiangong LCI Data Working Group
Amounts: no units in this file; such an amount is in the reference unit of its flow, which a separate flow dataset defines
copyright: false
licenseType: Free of charge for all users and uses

## General comment
Treatment of wastewater using sedimentation tanks, sodium hydroxide, etc.

## Geography
Incheon City, approximately 50 km east of Seoul, South Korea

## Technical purpose
The soil and groundwater remediation process described is used for the treatment of contaminated soils and groundwater through an ex-situ soil washing technique. This involves mechanically washing the soil to remove contaminants, followed by the treatment of wastewater generated from this process using sedimentation tanks and sodium hydroxide to ensure it meets environmental standards before discharge or further use.

## Reference product
- waste water - treated: 1; measured

## Inputs
- Electricity: 97188.8; measured
- sodium hydroxide: 75924; measured
- waste water - untreated: 1; measured

## Outputs
- carbon dioxide (fossil): 116000; measured
- particles (PM10): 0.103; measured
- sulfur oxides: 44; measured
- nitrous oxide: 0.327; measured

## Data treatment and extrapolations
The total footprint was analyzed by calculating the footprints of each stage separately using SiteWiseTM ver.2

## Use advice
Users applying this data should ensure that it reflects the conditions applicable to the intended geographical area, as the data was gathered in Incheon City, approximately 50 km east of Seoul, South Korea. Inclusion or exclusion of ancillary processes should be considered based on lifecycle stage relevance. Ensure methodological consistency when integrating this data with other LCA datasets, particularly in modeling the use phase behavior and potential recycling processes. This data set used SiteWiseTM ver.2 for environmental footprint calculations, which should be taken into account when assessing the footprint of similar processes.

## Review details
Inventory: The internal review was done by several iteration steps concerning raw data validation, raw data documentation, representativity, completeness and consistency of modelling with regard to ISO 14040 and 14044.

## Data sources
- Kim, D.-H., Hwang, B.-R., Moon, D.-H., Kim, Y.-S. & Baek, K. Environmental assessment on a soil washing process of a Pb-contaminated shooting range site: a case study. Environ Sci Pollut Res 20, 8417–8424 (2013).
