# Municipal sludge treatment and disposal;wet sludge moisture content 80%;landfill

Dataset: ILCD process, Unit process, single operation
Geography: XM-FJ-CN
Classification: Unit processes / End-of-life treatment / Waste water treatment
Functional unit: The system boundary is defined as the transport of wet sludge (80% moisture content) to the sludge treatment or disposal point to form a complete process route.
Generated by: Jin Sitian, 2331276@tongji.edu.cn
Owner: Tiangong LCI Data Working Group
Review: Dependent internal review by Tiangong LCI Data Working Group
Amounts: no units in this file; such an amount is in the reference unit of its flow, which a separate flow dataset defines
copyright: ['opt4ROkqig']
licenseType: Free of charge for all users and uses

## General comment
In the whole process route, the floor space, energy consumption, greenhouse gases, and gas pollutant emissions of each link are included in the scope of environmental impact assessment.

## Technology and included processes
The sludge landfill process involves machinery such as compactors, bulldozers, etc.

## Technical purpose
The process described is utilized for the treatment and disposal of municipal sludge with a moisture content of 80%. It is specifically applied in the transportation of the wet sludge to a treatment or disposal facility, where it will be landfilled. This is particularly relevant for waste management facilities dealing with large volumes of municipal sludge.

## Reference product
- Sludge: 1000; input; estimated
  1t wet sludge (moisture content 80%)

## Inputs
- Diesel: 4.2; measured

## Outputs
- methane (biogenic),methane (biogenic): 19.7; measured
  The original text does not distinguish between biogenic and fossil, and according to experts, it is biogenic here.

## Use advice
When using this LCA data set, users should ensure that the data strictly corresponds to municipal sludge with a moisture content of 80% being transported for landfilling. Attention should be given to the transport distance, mode of transport, and local landfill operations, as these factors could significantly influence the environmental impact. For accurate modeling, inclusion or exclusion of sludge pre-treatment processes and the possibility of material recovery or recycling should also be considered.

## Review details
Inventory: The internal review was done by several iteration steps concerning raw data validation, raw data documentation, representativity, completeness and consistency of modelling with regard to ISO 14040 and 14044.

## Data sources
- 刘洪涛,郑海霞,陈俊,等. 城镇污水处理厂污泥处理处置工艺生命周期评价[J]. 中国给水排水,2013,29(6):11-13. DOI:10.3969/j.issn.1000-4602.2013.06.003.
