# Converter steelmaking ; pig iron ; crude steel

Dataset: ILCD process, Unit process, single operation
Geography: CN
Reference year: 2020
Classification: Materials production / Metals and semimetals
Generated by: Jiwei, 1299801467@qq.com
Owner: Tiangong LCI Data Working Group
Review: Dependent internal review by Tiangong LCI Data Working Group
Amounts: no units in this file; such an amount is in the reference unit of its flow, which a separate flow dataset defines
licenseType: Free of charge for all users and uses

## General comment
This dataset represents a unit process for the basic oxygen steelmaking (BOS) process, commonly known as the converter steelmaking process. It is used for converting pig iron into crude steel, which is an intermediate product in steel production. This data set could be applied for manufacturing a variety of steel products utilized across multiple industries, including construction, transportation, and machinery manufacturing.

## Time period
论文提到钢铁企业环境总体数据为1998年的吨钢环境基础数据。

## Reference product
- Converter gas: 739; article inperiodical

## Inputs
All rows: article inperiodical
- iron: 665
- dolomite: 5.8
- quicklime: 29.2
- freshwater: 600
- compressed air: 8.9
- Steel scrap (external supply): 59.1
- Silicomanganese: 6.4
- Refractory: 7.4
- oxygen: 37
- Electricity: 203.04
- Converter gas: 7.4

## Outputs
- Converter gas: 29.1; article inperiodical
- BOF Slag: 188; article inperiodical
- carbon dioxide: 32.4; article inperiodical
- Sinter / Pellet Dust: 0.08; article inperiodical

## Use advice
When using this LCA data set, attention should be paid to the base year of the data which is 1998. It may not reflect current technological efficiencies or environmental controls. Users should consider temporal relevance when applying this data to current scenarios. This data set does not include end-of-life recycling processes for steel or consider specific use phase behaviors. For accurate assessment, align this data with similar temporal and technological context data sets.

## Review details
Inventory: The internal review was done by several iteration steps concerning raw data validation, raw data documentation, representativity, completeness and consistency of modelling with regard to ISO 14040 and 14044.

## Data sources
- 梁田. 基于生命周期评价的典型钢铁企业环境影响评估及绿色发展研究. (郑州大学, 2020).
