# Cement slurry barrier ; Soil Risk Control ; Vertical Barrier ; Cement jet grout

Dataset: ILCD process, Unit process, single operation
Geography: US
Reference year: 2013
Classification: Unit processes / Other Services / Repair and maintenance
Generated by: Xiao Meng, xiaomeng@mail
Owner: Tiangong LCI Data Working Group
Review: Dependent internal review by Tiangong LCI Data Working Group
Amounts: no units in this file; such an amount is in the reference unit of its flow, which a separate flow dataset defines
copyright: false
licenseType: Free of charge for all users and uses

## General comment
Form a cement grout vertical barrier that can prevent the migration of radioactive isotopes from contaminated soil to groundwater, with a barrier capacity of 83 cubic meters.

## Geography
For this project, a Superfund location at the Brookhaven National Laboratory (BNL) is studied. This particular case was chosen because it is representative of the scale and scenario where soil grouting would be used. It is also one of only a few sites where CS grouting has been used for full scale remediation. BNL has served as a production facility for research and development of radioisotopes for decades. The design of some of the facilities failed to provide adequate safety measures against the spread of radioactivity to the soils and groundwater beneath them and as a result, BNL was added to the Superfund National Priorities List in 1989.

## Technical purpose
The industrial process described is the formation of a cement grout vertical barrier for soil risk control at a Superfund site. This barrier is implemented to prevent the migration of radioactive isotopes from contaminated soil to groundwater, designed to contain up to 83 cubic meters of polluted soil. Such barriers are typically used in locations that require soil grouting for environmental remediation, especially in areas with historic radioactive contamination.

## Reference product
- Cement slurry barrier: 48.6; measured
  使用该水泥液浆屏障，所能阻隔放射性同位素向地下水迁移的污染土壤量

## Inputs
All rows: measured
- cement, unspecified: 22970
- Electricity: 30240
- Equipment and Materials Arriving on Site: 37510
- Steel: 4300
- Tap Water: 41.9

## Use advice
When using this LCA data set, users should ensure that the scope of their environmental remediation project matches the scale and scenario of a typical Superfund site remediation. Care should be taken to adapt the barrier capacity to the specific volume of contaminated soil at the site in question. Additionally, the use-phase behavior of the cement grout vertical barrier should be considered, including its long-term stability and containment effectiveness. Lastly, users should be aware of the methodological limitations of the data and adjust their usage accordingly, especially when extrapolating results to other sites with different contamination characteristics or environmental conditions.

## Review details
Inventory: The internal review was done by several iteration steps concerning raw data validation, raw data documentation, representativity, completeness and consistency of modelling with regard to ISO 14040 and 14044.

## Data sources
- Gallagher, P. M., Spatari, S. & Cucura, J. Hybrid life cycle assessment comparison of colloidal silica and cement grouted soil barrier remediation technologies. Journal of Hazardous Materials 250–251, 421–430 (2013).
