# Veterinarybiologicaldrugs|Prokaryoticandeukaryoticfermentationmedia(cornproteinpowder(pulp),yeast,bio-nitrogen,starch,etc.)|Biofermentation process|greater than or equal to10000 kg/a / /|兽用生物药品|原核、真核发酵培养基（玉米蛋白粉（浆）、酵母素、生物氮素、淀粉等）|生物发酵工艺|大于等于10000千克/年

Dataset: ILCD process, Partly terminated system
Geography: CN
Reference year: 2019
Classification: Materials production / Other mineralic materials
Generated by: The data was created by the Office of the Second National Pollution Source Census of the Ministry of Ecology and Environment, and the data was organized by the TianGong Plan team for ILCD format / 生态环境部第二次全国污染源普查工作办公室创建数据，天工计划团队常慧敏整理数据为ILCD格式
Amounts: no units in this file; such an amount is in the reference unit of its flow, which a separate flow dataset defines
copyright: false

## Technology and included processes
the Technical of end-of-pipe management technology for pollution Veterinary Biological Productsis/，The formula for calculating the actual operation rate (k-value) of the end-of-pipe treatment facility is k = operating time of wastewater treatment facilities (hours) / annual normal production time of enterprise (hours)
污染物指标废水量的末端治理技术是/，末端治理设施实际运行率（k值）计算公式为/

## Reference product
- Veterinary Biological Products: 1; calculated
  原文件中描述污染物类别为Product，污染物指标为兽用生物药品，此处对其进行了匹配工作，将其匹配到LCAflow库里面相最符合的流，污染物指标备注为废水量

## Outputs
All rows: calculated
- Waste water: 0.195
  原文件中描述污染物类别为废水，污染物指标为废水量，此处对其进行了匹配工作，将其匹配到LCAflow库里面相最符合的流，污染物指标备注为废水量
- chemical oxygen demand: 0.219, 0.026499, 0.014454, 0.010731, 0.002628, 0.0219 (6 entries)
  原文件中描述污染物类别为废水，污染物指标为化学需氧量，此处对其进行了匹配工作，将其匹配到LCAflow库里面相最符合的流，污染物指标备注为化学需氧量
- Ammonia Nitrogen: 0.009, 0.001755, 0.00045, 0.001701, 0.001143, 0.0009 (6 entries)
  原文件中描述污染物类别为废水，污染物指标为氨氮，此处对其进行了匹配工作，将其匹配到LCAflow库里面相最符合的流，污染物指标备注为氨氮
- Nitrogen, organic bound: 0.012, 0.004284, 0.002004, 0.00564, 0.0018, 0.0036 (6 entries)
  原文件中描述污染物类别为废水，污染物指标为总氮，此处对其进行了匹配工作，将其匹配到LCAflow库里面相最符合的流，污染物指标备注为总氮
- phosphorus, total: 0.002, 7e-5, 3e-5, 4.6e-5, 2e-5, 0.0002 (6 entries)
  原文件中描述污染物类别为废水，污染物指标为总磷，此处对其进行了匹配工作，将其匹配到LCAflow库里面相最符合的流，污染物指标备注为总磷
- volatile organic compound: 0.58, 0.145, 0.00696, 0.0058, 0.406, 0.058 (6 entries)
  原文件中描述污染物类别为废气，污染物指标为挥发性有机物，此处对其进行了匹配工作，将其匹配到LCAflow库里面相最符合的流，污染物指标备注为挥发性有机物

## Data sources
- 第二次全国污染源普查产排污核算系数手册（试用版）,二级代码27,三级代码275.0文件，在完整版文件中第3158页
