# End-of-life ternary lithium batteries Advanced hydrometallurgy process

Dataset: ILCD process, Unit process, single operation
Geography: CN
Reference year: 2020
Classification: Unit processes / End-of-life treatment / Material recycling
Functional unit: using 1 kWh as the functionalunit
Generated by: Pengfei, pengfei24@email.ncu.edu.cn
Owner: Tiangong LCI Data Working Group
Review: Dependent internal review by Tiangong LCI Data Working Group
Amounts: no units in this file; such an amount is in the reference unit of its flow, which a separate flow dataset defines
copyright: false
licenseType: Free of charge for all users and uses

## General comment
Before adopting the wet process for material recovery, the EoL ternary lithium batteries are safely discharged, disassembled, pyrolyzed, mechanically crushed, and sorted to get powdered lithium-containing waste. Lithium-containing material is added to leaching solvent for leaching, filtered and separated to get lithium-containing solution, added to the purification agent for reaction, filtered, concentrated, and under certain reaction conditions, added to the precipitation agent fully reacted to crystallization and precipitation, filtered, washed and dried to get battery-grade lithium carbonate.Translated with DeepL

## Technology and included processes
Leaching: During the leaching process, the solid-liquid ratio of the selected electrode materials for smelting and the leaching solution should be controlled within the appropriate range, and should be stirred evenly and reacted adequately.Impurity removal: The impurity removal process should be based on the premise of not introducing excess impurities, combined with precipitation and extraction methods to ensure that the impurity elements are reasonably removed, and reduce the loss of nickel, cobalt, manganese, lithium and other elements.Purification: Should be purified according to the characteristics of metal elements, select the appropriate extractant, under certain extraction conditions, after multiple extraction, to obtain a high-purity target metal solution, such as nickel, cobalt, manganese solution or lithium solution.Material synthesis: Material synthesis is the process of converting metal purification liquid into positive electrode materials, precursors and other battery materials. The products synthesized by the material should meet the national standards or industry standards of the relevant products, nickel diamond lithium manganese oxide should meet the requirements of YS/T798, nickel cobalt manganese hydroxide should meet the requirements of GB/T26300.

## Technical purpose
The advanced hydrometallurgy process for ternary lithium batteries described is utilized in the recycling of end-of-life (EoL) battery materials. Specifically, it is used to recover high-purity lithium carbonate, which is a critical component in the manufacture of new battery cells for consumer electronics, electric vehicles, and energy storage systems.

## Reference product
- EoL NCM battery: 3.6; input; software or database

## Inputs
All rows: software or database
- Sodium carbonate（95%）: 1.43
  Soda (Na2CO3)
- Citric Acid: 16.7
  Citric acid，New process based on GREET/CN
- sodium hydroxide: 2.08
- Electricity: 4.58
- Carbon dioxide (fossil): 0.16
  The original text does not distinguish between bio and fossil, and according to experts, it is fossil here
- natural gas,natural gas: 11.79, 11.79 (2 entries)

## Outputs
All rows: software or database
- nickel: 0.95
- manganese: 0.3
- Lithium carbonate: 0.98
- cobalt: 0.32
- copper: 1.01
- aluminium: 0.8

## Data selection and combination
The data come from multiple papers and are difficult to distinguish.

## Data treatment and extrapolations
calculation basis is GEB2016 (12.0 × 1024 sej)

## Use advice
Users should apply this data set considering the specific end-of-life scenario for ternary lithium batteries, taking into account the energy consumption expressed in GEB2016 (12.0 × 1024 sej) per 1 kWh of battery output. The data should be used to model the environmental impacts of the hydrometallurgy process accurately. It is important to consider the completeness of the data from various papers and ensure methodological alignment with the functional unit of 1 kWh during the life cycle assessment.

## Review details
Inventory: The internal review was done by several iteration steps concerning raw data validation, raw data documentation, representativity, completeness and consistency of modelling with regard to ISO 14040 and 14044.

## Data sources
- Wang, Y. et al. Environmental impact assessment of second life and recycling for LiFePO4 power batteries in China. Journal of Environmental Management 314, 115083 (2022).
