# Injection well ; 5.1 cm dia. 9 m deep ; Groundwater in-situ remediation ; In-situ Chemical Oxidation

Dataset: ILCD process, Unit process, single operation
Geography: CA
Reference year: 2007
Classification: Unit processes / Other Services / Repair and maintenance
Generated by: Wang Ning, wang_ning@caep.org.cn
Owner: Tiangong LCI Data Working Group
Review: Dependent internal review by Tiangong LCI Data Working Group
Amounts: no units in this file; such an amount is in the reference unit of its flow, which a separate flow dataset defines
copyright: false
licenseType: Free of charge for all users and uses

## General comment
Injection well construction

## Geography
The contaminated area was located 600 m from a river shore in the northern part of the prov-ince of Quebec， Canada.

## Technology and included processes
Construction of injection wells using polyvinyl chloride, bentonite, concrete, quartz sand, gravel, diesel fuel, etc.

## Technical purpose
This injection well, with a diameter of 5.1 cm and a depth of 9 m, is designed for groundwater in-situ remediation through in-situ chemical oxidation. Specifically, it serves the purpose of treating contaminated groundwater located 600 m from a river shore in the northern part of Quebec, Canada. The construction materials include polyvinyl chloride, bentonite, quartz sand, gravel, concrete, and diesel fuel, indicating its utility in environmental engineering applications, particularly for the containment and treatment of subsurface pollutants.

## Reference product
- injection well: 125; estimated
  125 steel wells 5.1 cm dia. 9 m deep, in 10 lines spaced by 5 m

## Inputs
All rows: estimated
- Diesel: 281
- cement, unspecified: 5117
- bentonite: 1676
- sand: 352
- gravel: 2076
- Polyvinyl chloride: 513
- Steel: 10534

## Use advice
When utilizing this dataset for Life Cycle Assessment, it is crucial to consider the geographical specificity of the construction resources and the remediation process - here, the northern part of Quebec, Canada. The use-phase behavior expected for the injection well should include considerations of chemical longevity and reaction rates in the in-situ oxidation process. Moreover, if the dataset is used to assess the environmental impact, inclusion of potential emissions during the construction phase, operational phase, and possible decommissioning should be considered. This data set should be employed with an understanding of its technological applicability to similar geographic and hydrogeologic contexts.

## Review details
Inventory: The internal review was done by several iteration steps concerning raw data validation, raw data documentation, representativity, completeness and consistency of modelling with regard to ISO 14040 and 14044.

## Data sources
- Cadotte, M., Deschênes, L. & Samson, R. Selection of a remediation scenario for a diesel-contaminated site using LCA. Int J Life Cycle Assess 12, 239–251 (2007).
