# Lithium Concentrate Production ; Lithium Spodumene Concentrate (6% Li2O) ; Crushing ; Central Ostrobothnia, Finland (0.6% Li2O)

Dataset: ILCD process, Unit process, single operation
Geography: FI
Reference year: 2016
Classification: Unit processes / Materials production / Non-energetic raw materials
Generated by: Sun Xin, xs389@cornell.edu
Owner: Tiangong LCI Data Working Group
Review: Dependent internal review by Tiangong LCI Data Working Group
Amounts: no units in this file; such an amount is in the reference unit of its flow, which a separate flow dataset defines
licenseType: Free of charge for all users and uses

## General comment
The future supply routes reviewed in this study are based on data gathered from technical reports and environmental impact assessment reports of several lithium mining and processing companies (Lithium Americas Corp., Minera Salar Blanco, Nemaska Lithium Inc., and Keliber Oy) that are at various stages of developing their lithium assets. These are considered future supply routes as they are not yet active but areexpected to be operational in 5–10 years. The lower lithium concentrations at these brine-based sources also reflect the possible future lithium grades of current supply routes from brines, whose lithium concentrations will likely decrease over the years due to extraction

## Technology and included processes
The future supply routes for spodumene are described in technical reports of operations at the Whabouchi site, Canada and the Central Ostrobothnia region, Finland. While neither Canada nor Finland are among the countries with the largest lithium reserves (USGS, 2021), they represent examples of new lithium supplies that might become exploited in response to increased lithium demand. The average lithium concentration in spodumene at the Whabouchi site is about 0.7% and in Central Ostrobothnia region it is 0.6%. In these future supply routes, concentrated spodumene is directly converted to LiOH⋅H2O without producing Li2CO3 as an intermediate. The datasets representing mining operations in Canada and Finland are based on the technical reports prepared for Nemaska Lithium Inc. (Golder Associates, 2013; Laferri´ere et al., 2012; Nemaska Lithium Inc., 2013; SENES Consultants Ltd., 2013) and Keliber Oy (Keliber Oy, 2020a, b; Sweco, 2016), respectively. Specific data for chemical inputs was not available for the LiOH⋅H2O production unit process (from concentrated spodumene) in the Nemaska Lithium reports. Therefore, the chemical usage in the Keliber Oy reports were used as proxy data when comparing the different lithium supplies.

## Technical purpose
This dataset represents the production process for lithium spodumene concentrate with a lithium oxide (Li2O) content of 6%, derived from Central Ostrobothnia, Finland with an initial Li2O content of 0.6%. Lithium concentrate produced from this process is typically used in the manufacturing of lithium-ion batteries, which are commonly used in portable electronics, electric vehicles, and for grid storage solutions. Additionally, it may be utilized for the production of high purity lithium compounds in pharmaceuticals and other specialized industrial applications.

## Reference product
- Spodumene concentrate (6.3% Li2O): 1000; measured

## Inputs
All rows: measured
- Spodumene（0.6% Li2O）: 3940
- freshwater,freshwater: 9.88
- Diesel: 1740
- Electricity: 1000.8
- sodium hydroxide: 1.94
- Sulfuric acid: 0.606
- Isopropyl Ethyl Thionocarbamate: 6.3
- Polyacrylamide,Polyacrylamide: 0.0152

## Use advice
Users should note that this dataset does not include the production processes for raw materials and energy flows which constitute very small amounts (less than 1%). For accurate Life Cycle Assessment (LCA) modeling, it is crucial to account for these exclusions, especially if this process is a significant part of the LCA model. This dataset is best applied in LCAs calculating the environmental impact of products that include lithium-based components. It may require the combination with other datasets to ensure a comprehensive LCA, including those for transport, further processing, and end-of-life stages.

## Review details
Inventory: The internal review was done by several iteration steps concerning raw data validation, raw data documentation, representativity, completeness and consistency of modelling with regard to ISO 14040 and 14044.

## Data sources
- Chordia, M., Wickerts, S., Nordelöf, A. & Arvidsson, R. Life cycle environmental impacts of current and future battery-grade lithium supply from brine and spodumene. Resources, Conservation and Recycling 187, 106634 (2022).
