# Catalytic gasoline adsorption desulfurization regeneration flue gas ; Refined gasoline ; Catalytic cracked gasoline ; Adsorption ; All sizes; NESPS2 / 催化汽油吸附脱硫再生烟气 ; 精制汽油 ; 催化裂化汽油 ; 吸附 ; 所有规模 ; 全国第二次污染普查数据

Dataset: ILCD process, Unit process, single operation
Geography: CN
Reference year: 2019
Classification: Reference Parameters / Energy carriers and technologies / Other non-renewable fuels
Generated by: The data was created by the Office of the Second National Pollution Source Census of the Ministry of Ecology and Environment, and the data was organized by the TianGong Plan team for ILCD format / 生态环境部第二次全国污染源普查工作办公室创建数据，天工计划团队常慧敏整理数据为ILCD格式
Owner: Tiangong LCI Data Working Group / 天工LCI数据工作小组
Review: Dependent internal review by Tiangong LCI Data Working Group / 天工LCI数据工作小组
Amounts: no units in this file; such an amount is in the reference unit of its flow, which a separate flow dataset defines
copyright: false
licenseType: Free of charge for all users and uses

## General comment
the Technical of end-of-pipe management technology for pollution Exhaust gasis/，Its Technical efficiency of end-of-pipe management0

## Technical purpose
该工业流程应用于石油炼制行业，专门用于汽油的处理和净化。利用催化汽油吸附脱硫工艺去除汽油流中的硫，以生产符合质量标准的精炼汽油。该流程适用于催化裂化汽油，并且可以在不同规模上操作。此外，采用了多种管尾污染管理技术，例如：氢氧化钠法脱硫、氧化镁脱硫、静电沉降、湿式静电沉降和袋式过滤，用于控制二氧化硫和颗粒物质(PM2.5 - PM10)的排放。

## Reference product
- Slurry oil: 1000; input; calculated
  源文件中描述为为催化裂化汽油，此处对其进行了匹配工作，将其匹配到LCAflow库里面相最符合的流，污染物指标备注为工业废气量

## Outputs
All rows: calculated
- sulfur dioxide: 2e-5
  the Technical of end-of-pipe management technology for pollution sulfur dioxideisMagnesium oxide desulfurization，Its Technical efficiency of end-of-pipe management95
  污染物指标二氧化硫的末端治理技术是氧化镁法脱硫，其效率为95，末端治理设施实际运行率（k值）计算公式为k=工艺废气净化装置运行时间/正常生产时间。原文件中描述污染物类别为废气，污染物指标为二氧化硫，此处对其进行了匹配工作，将其匹配到LCAflow库里面相最符合的流，污染物指标备注为二氧化硫
- sulfur dioxide: 2e-5
  the Technical of end-of-pipe management technology for pollution sulfur dioxideisOthers (sodium hydroxide method) desulfurization，Its Technical efficiency of end-of-pipe management95
  污染物指标二氧化硫的末端治理技术是其他（氢氧化钠法）脱硫，其效率为95，末端治理设施实际运行率（k值）计算公式为k=工艺废气净化装置运行时间/正常生产时间。原文件中描述污染物类别为废气，污染物指标为二氧化硫，此处对其进行了匹配工作，将其匹配到LCAflow库里面相最符合的流，污染物指标备注为二氧化硫
- particles (PM2.5 - PM10): 2.4e-5
  the Technical of end-of-pipe management technology for pollution particles (PM2.5 - PM10)isBag filter，Its Technical efficiency of end-of-pipe management92
  污染物指标颗粒物的末端治理技术是袋式除尘，其效率为92，末端治理设施实际运行率（k值）计算公式为k=工艺废气净化装置运行时间/正常生产时间。原文件中描述污染物类别为废气，污染物指标为颗粒物，此处对其进行了匹配工作，将其匹配到LCAflow库里面相最符合的流，污染物指标备注为颗粒物
- particles (PM2.5 - PM10): 3e-5
  the Technical of end-of-pipe management technology for pollution particles (PM2.5 - PM10)isElectrostatic precipitation，Its Technical efficiency of end-of-pipe management90
  污染物指标颗粒物的末端治理技术是静电除尘，其效率为90，末端治理设施实际运行率（k值）计算公式为k=工艺废气净化装置运行时间/正常生产时间。原文件中描述污染物类别为废气，污染物指标为颗粒物，此处对其进行了匹配工作，将其匹配到LCAflow库里面相最符合的流，污染物指标备注为颗粒物
- particles (PM2.5 - PM10): 3e-5
  the Technical of end-of-pipe management technology for pollution particles (PM2.5 - PM10)isOthers (wet electrostatic precipitation)，Its Technical efficiency of end-of-pipe management90
  污染物指标颗粒物的末端治理技术是其他（湿式电除尘），其效率为90，末端治理设施实际运行率（k值）计算公式为k=工艺废气净化装置运行时间/正常生产时间。原文件中描述污染物类别为废气，污染物指标为颗粒物，此处对其进行了匹配工作，将其匹配到LCAflow库里面相最符合的流，污染物指标备注为颗粒物
- Exhaust gas: 52.6
  the Technical of end-of-pipe management technology for pollution Exhaust gasis/，Its Technical efficiency of end-of-pipe management0
  污染物指标工业废气量的末端治理技术是/，其效率为0，末端治理设施实际运行率（k值）计算公式为k=工艺废气净化装置运行时间/正常生产时间。原文件中描述污染物类别为废气，污染物指标为工业废气量，此处对其进行了匹配工作，将其匹配到LCAflow库里面相最符合的流，污染物指标备注为工业废气量

## Use advice
This dataset is derived from the Pollution Source Census Report and contains information on pollution emissions and related products. However, it does not include data on energy or chemical consumption, nor does it provide information on waste or co-product generation. When utilizing this dataset, please supplement the missing data based on actual conditions before use
该数据集来源于污染源普查报告，包含污染物排放及相关产品信息，但不包含能源或化学品消耗数据，也不提供废弃物或共生产物产生信息。在使用该数据集时，请根据实际情况补充缺失数据后再使用。

## Review details
Inventory: The internal review was done by several iteration steps concerning raw data validation, raw data documentation, representativity, completeness and consistency of modelling with regard to ISO 14040 and 14044.
清单： 内部审查通过几个迭代步骤完成，涉及原始数据验证、原始数据记录、代表性、完整性、与 ISO 14040 和 14044 有关的建模的一致性。

## Data sources
- 第二次全国污染源普查产排污核算系数手册（试用版）,二级代码25,四级代码2511文件，在完整版文件中第4090页
