# Municipal wastewater treatment ; Wastewater ; Anoxic/Oxic process

Dataset: ILCD process, Unit process, single operation
Geography: HLJ-CN
Classification: Unit processes / End-of-life treatment / Wastewater treatment
Generated by: HUANG Runyao, runyaoh@163.com
Owner: Tiangong LCI Data Working Group
Review: Dependent internal review by Tiangong LCI Data Working Group
Amounts: no units in this file; such an amount is in the reference unit of its flow, which a separate flow dataset defines
copyright: ['opt4ROkqig']
licenseType: Free of charge for all users and uses

## General comment
In municipal wastewater treatment, the activated sludge process is a commonly used technology. This process involves mixing wastewater containing pollutants with activated sludge and circulating them to degrade and transform organic matter and ammonia nitrogen pollutants into harmless substances through microbial action. In this process, wastewater is introduced into a reactor where it is mixed with activated sludge and exposed to oxygen supply, stimulating the growth and metabolism of microorganisms. Microorganisms utilize organic matter as a carbon and energy source for growth while oxidizing pollutants. The treated water, after processes such as sedimentation and filtration, meets discharge standards, while the recycled activated sludge can be reused in subsequent treatment cycles.

## Geography
Ashihe River Watershed

## Technology and included processes
In municipal wastewater treatment, the anoxic/anaerobic treatment process exhibits the following technical characteristics:Anoxic Treatment Zone: This process includes an anoxic treatment zone where water is exposed to low or zero oxygen conditions, promoting nitrogen and phosphorus removal while reducing nitrification, thus lowering oxygen demand and energy consumption.Nitrogen and Phosphorus Removal Efficiency: The anoxic treatment zone facilitates effective removal of nitrogen and phosphorus through denitrification and phosphorus release under anoxic conditions, enhancing treatment efficiency.Operational Conditions: In the anoxic treatment zone, strict control of oxygen supply is necessary to maintain low oxygen conditions, while oxygen supply and mixing rates in aerobic zones must also be controlled. Operators need to adjust parameters such as influent water quality, flow rate, and treatment requirements to ensure optimal treatment performance.Related Upstream and Downstream Processes: Upstream processes for the anoxic/anaerobic treatment process include wastewater pretreatment such as screening, grit removal, and sedimentation to remove large particles and settleable solids. Downstream processes may include further oxidation, sedimentation, or filtration to ensure the final treated water quality meets discharge standards.

## Technical purpose
The Anoxic/Oxic process unit operation is utilized in the treatment of wastewater within the Ashihe River watershed. It is primarily used for reducing the concentration of nutrients such as nitrogen and phosphorus, which are common contaminants in water bodies. The process is applicable to municipal or industrial wastewater treatment facilities aiming at advanced nutrient removal to meet stringent discharge standards.

## Reference product
- Wastewater: 1; input; measured

## Inputs
All rows: measured
- Electricity: 1.9836
- Polyaluminium Chloride: 0.06
- urea: 0.0016
- urea: 0.0017
  The diamine
- Polyferric chloride: 0.0016

## Outputs
- chemical oxygen demand: 250; measured

## Use advice
Users applying this data should consider the specific context of the wastewater treatment facility, including local regulations and environmental standards. The data set is relevant for the assessment of wastewater treatment processes and should be used in the context of regional water pollution control strategies. Attention should be given to the operational parameters of the Anoxic/Oxic process unit, such as hydraulic retention time and sludge age, as these affect the efficiency of nutrient removal. The inclusion or exclusion of upstream and downstream processes, energy consumption, and chemical use in the LCA would depend on the goal and scope of the study.

## Review details
Inventory: The internal review was done by several iteration steps concerning raw data validation, raw data documentation, representativity, completeness and consistency of modelling with regard to ISO 14040 and 14044.

## Data sources
- Bai, S. et al. Optimization of wastewater treatment strategies using life cycle assessment from a watershed perspective. Journal of Cleaner Production 312, 127784 (2021).
