# Substation Construction and Operation;110kV Indoor Substation;A2-6 Design Plan

Dataset: ILCD process, Partly terminated system
Geography: HA-JS-CN
Reference year: 2021
Valid until: 2046
Classification: Unit processes / Systems / Construction
Generated by: Wang, Yuxuan , wyx135230@163.com
Owner: Tiangong LCI Data Working Group
Review: Dependent internal review by Tiangong LCI Data Working Group
Amounts: no units in this file; such an amount is in the reference unit of its flow, which a separate flow dataset defines
copyright: false
licenseType: Free of charge for all users and uses

## General comment
The whole life cycle carbon footprint model was used to quantify the carbon emissions from the operation and construction phases of the 110kV substation scheme. The operational carbon emissions include the carbon emissions from the maintenance process, and the construction carbon emissions include the production of building materials and the production of equipment.

## Geography
The geographic location of the substation is not specified in the text, and the geographic location of this author's company was selected

## Time period
The article did not specify the starting time of the dataset, and the time of publication of the literature was selected as the valid starting time, with a full life cycle of 25 years, with 2 years as the valid time period

## Technology and included processes
Operation phase: 1. Energy consumption of substation loads: energy consumption caused by normal operation and power supply of equipment in the substation, generally AC loads, DC loads, and USP loads. 2. Self-consumption of energy by electrical equipment: power loss generated by electrical equipment with coils and impedance components in the normal operation of the substation, which is non-designed and uncontrollable. 3. Sulfur Hexafluoride (SF6) emissions: widely used as high-voltage insulation and arc extinguishing media in the electric power industry. 4. Emission of sulfur hexafluoride: it is widely used in the electric power industry as a high-voltage insulation and arc extinguishing medium, and in recent years, it has been more and more widely used in medium-voltage switchgear and ring network cabinets. 4. Carbon emission from operation and maintenance: in a city with a population of about 3 million people, the frequency of operation and maintenance of a traditional substation is four times a month, and the distance between the substation and the operation and maintenance center is 30 kilometers on average. construction phase: 1. mineral oil for transformers: in a conventional A2-6 scheme, there are two 50 MVA main transformers, each of which requires mineral oil. The amount of transformer oil replenished during operation is very small compared with the amount filled during construction, so its impact can be ignored. 2. equipment raw materials. 3. construction raw materials: the steel required for the construction of the assembled substation in the conventional A2-6 scheme is about 460 t, and the cement is 968 t.

## Technical purpose
The 110kV Indoor Substation, designed following the A2-6 plan, is engineered for the conversion and distribution of electrical power within the grid network. It serves a critical role in managing the electricity supply for a city of approximately 3 million people. The substation is specifically intended for indoor use, implying it is suitable for areas that require a minimized physical footprint or protected installation due to environmental or logistical considerations.

## Reference product
- Transformer Substation: 1; estimated
  The stream corresponding to the substation cannot be found in da.tiangong.world.

## Inputs
All rows: estimated
- Mineral Oil: 44000
  Check the product flow of mineral oil in da.tiangong.world. There are two 50 MVA main transformers in the conventional A2-6 solution, each requiring about 22 tons of mineral oil.
- copper: 55500
  A2-6 Plan 2 main transformers contain 28 t of copper in raw materials; the total station GIS raw materials contain 3.3 t of copper; the entire station switch cabinet contains 24.2 t of copper
- Steel sections: 76400
  50 t of other steel materials are used as raw materials for the two main transformers of the conventional A2-6 scheme; 2.2 t of steel are used as raw materials for GIS of the whole station; 10.8 t of steel are used for the switch cabinet of the whole station.
- Steel Sheet: 63000
  A2-6 Plan 2 Main transformer raw materials include 63 tons of silicon steel sheets. The silicon steel sheets are essentially extremely low carbon steel plates with a mass fraction of silicon of 0.5% to 5%. They are replaced by existing flows.
- aluminium: 16600
  Site-wide GIS raw material Chinalco 16.6 t
- Steel sections: 460000
  The steel required for the construction of the conventional A2-6 scheme prefabricated substation is approximately 460 t
- Concrete: 968000

## Outputs
- carbon dioxide (fossil): 353825; calculated
  Recorded on a one-year basis, carbon emissions during the operation phase. According to experts, this is carbon dioxide (fossil).
- carbon dioxide (fossil): 2.92478e6; calculated
  Recorded on a one-year basis, carbon emissions during the construction phase. According to experts, this is carbon dioxide (fossi).

## Data selection and combination
Selection of appropriate carbon emission factors and other data from the IPCC 2006 Guidelines for National Greenhouse Gas Inventories and related papers. The amount of raw materials such as building materials is based on the A2-6 program.

## Use advice
When utilizing the Life Cycle Assessment (LCA) data for the 110kV Indoor Substation under the A2-6 Design Plan, attention should be paid to the geographical representativeness as the data is based on the geographical location of the author's company rather than the actual location of the substation. The starting time of the dataset coincides with the literature publication date, and the life cycle is considered to be 25 years, with analyses recommended in 2-year increments. Users should note the inclusion of both construction and operation phase emissions, with an emphasis on operation-related consumptions (station service load energy consumption, self-consumption of energy by electrical equipment) and maintenance procedures. The impact of the replenishment of transformer oil during operation is deemed negligible compared to its initial filling during construction. Emission factors should be adapted from the IPCC 2006 Guidelines or related scholarly work relevant to the regional context of the project.

## Review details
Inventory: The internal review was done by several iteration steps concerning raw data validation, raw data documentation, representativity, completeness and consistency of modelling with regard to ISO 14040 and 14044.

## Data sources
- 王卓. 基于全生命周期的110kV变电站降碳方案研究. 电工电气 66–69 (2022).
