# cement production;cement, ordinary portland cement, 52.5MPa;dry process rotary kiln

Dataset: ILCD process, Unit process, black box
Geography: BJ-CN
Classification: Materials production / Other mineralic materials
Generated by: Siqi Yang, ysqsophia@gmail.com
Owner: Tiangong LCI Data Working Group
Review: Dependent internal review by Tiangong LCI Data Working Group
Amounts: no units in this file; such an amount is in the reference unit of its flow, which a separate flow dataset defines
copyright: false
licenseType: Free of charge for all users and uses

## General comment
New dry rotary kiln system.

## Geography
A cement plant in Beijing

## Technical purpose
The described industrial process pertains to the production of 52.5MPa ordinary Portland cement using a new dry process rotary kiln system. This process is used in the manufacture of cement in a plant located in the Beijing area. The cement produced can be employed in various construction applications, such as building infrastructure, creating concrete structures, and other civil engineering works where high-grade cement is required.

## Model description
Combined with the characteristics of the cement production process itself, the research scope is defined as: from raw material entering the factory, raw material pretreatment, raw meal grinding, raw meal calcination, clinker grinding, until cement homogenization, storage, and packaging. The production and processing process of raw materials is not considered here, only the impact of the production process on the environment is considered, that is, the process of direct raw material consumption and direct waste emissions. Taking the performance of 1 ton of 525# ordinary Portland cement as a functional unit, 1Fu=52.5tMPa.

## Reference product
- cement, ordinary portland cement, 52.5MPa: 1000
  P.O. 52.5 Cement

## Inputs
- limestone, crushed, for mill: 1318.5
  Limestone
- clay: 94.5
  Clay-based raw materials
- iron, powder: 27
  Iron correction raw material
- gypsum stone (CaSO4-dihydrate): 60
  The proportion of gypsum is 5.5%
- mixed materials, mineral: 200
  Mixed material
- hard coal; 26.3 MJ/kg: 120
  Coal consumption
- electricity, medium voltage: 363.6
  Electricity consumption
- hard coal: 129.156
  Standard coal. The original text refers to the consumption of fuel oil (L), which is converted to the equivalent amount of standard coal. The original data is 120kg standard coal, here converted to hard coal, the conversion formula is 1kg hard coal = 0.929kg standard coal.

## Outputs
- Nitrogen oxides: 1.88
  NOx
- sulfur dioxide: 0.004
  SO2
- hydrogen chloride: 0.000436
  HCI
- fluorine: 0.000469
  F
- particles (> PM10): 0.012
  Smoke, with an unspecified particle size, is treated as PM > 10 micrometers in diameter.
- mercury: 2.2e-6; min 1.7e-6; max 2.7e-6; uniform
  Hg
- arsenic: 4.95e-5; min 1.7e-5; max 8.2e-5; uniform
  AS
- chromium: 3.4e-5
  Cr
- copper: 3.4e-6
  With
- lead: 0.000117; min 3.4e-5; max 0.0002; uniform
  Pb
- zinc: 0.0001517; min 3.4e-6; max 0.0003; uniform
  Zn
- cadmium: 8.7e-6; min 3.4e-6; max 1.4e-5; uniform
  Cd
- nickel: 5.1e-5; min 2.7e-5; max 7.5e-5; uniform
  Ni

## Use advice
When using this dataset, researchers and analysts must be aware that it only accounts for the environmental impact of the direct raw material consumption and waste emissions from the production process, excluding the production and processing of the raw materials themselves. Additionally, CO2 emissions data is not included in this dataset, which must be considered if assessing the overall environmental impact of the process. When utilizing this data for life cycle assessment or related environmental studies, it is essential to account for these limitations and possibly supplement with additional data where relevant.

## Review details
Inventory: The internal review was done by several iteration steps concerning raw data validation, raw data documentation, representativity, completeness and consistency of modelling with regard to ISO 14040 and 14044.

## Data sources
- 富丽. (2004). 生态水泥生命周期评价研究 [硕士, 北京工业大学].
