# Cable manufacture ; a total of 67.2 km submarine cable.

Dataset: ILCD process, Unit process, single operation
Geography: SH-CN
Reference year: 2009
Classification: Unit processes / Systems / Electrics and electronics
Functional unit: The functional unit is 1 kWh on-grid electricity provision.
LCI method principle: Attributional
LCI method approaches: Allocation
Generated by: Yunzhi Zhao, ll10088@163.com
Owner: Tiangong LCI Data Working Group
Review: Dependent internal review by Tiangong LCI Data Working Group
Amounts: no units in this file; such an amount is in the reference unit of its flow, which a separate flow dataset defines
copyright: false
licenseType: Free of charge for all users and uses

## General comment
This dataset represents the manufacture of submarine cables specifically designed for application in offshore wind farms, such as the Donghai Bridge Offshore Wind Farm (DBOWF) in China. The submarine cables, spanning a total length of 67.2 kilometers, are integral components for the transmission of electricity from the wind turbines to the power grid. They facilitate the critical connection between the wind turbines, located on each side of the Donghai bridge, and the energy infrastructure on land. Given the technical nature of these cables, they are specialized for underwater use to withstand the marine environment and maintain power transmission over long distances beneath the sea.

## Geography
The studied wind farm, the Donghai Bridge Offshore Wind Farm (DBOWF), is China's first offshore wind farm within the jurisdiction of Shanghai, as well as the first offshore wind farm outside Europe. The project has two-phases of construction, located on each side of the Donghai bridge (Fig. 1).

## Reference product
- Steel Wire,Cable: 67200

## Inputs
- copper: 545600
- polyethylene high density granulate (PE-HD): 153600
  ON
- polypropylene fibres (PP): 103700
- lead: 648800
  Pb
- Steel,Steel: 968300

## Deviations from the LCI method approaches
The present study employed the PLCA modeling approach to calculate the energy and environmental emissions of a typical offshore wind farm in China. The cradle-to-grave process includes four stages, materials and equipment manufacturing, transportation and installation, operation and maintenance, and dismantling and recycling (Fig. 2).

## Data selection and combination
The technical parameters of wind turbines, foundations and cables are obtained from the design documents of the DBOWF (Table 2). The energy and emissions factors (i.e., the energy consumption and environmental emissions of per unit material and component production) are derived from the Ecoinvent 2.2 dataset (Ecoinvent Centre, 2009), and the coefficients of China's practices were preferentially referred. For key materials and equipment, their sea transportation energy is calculated from the transportation load and shipping energy intensity. The facility installation energy and emissions were estimated based on the construction plan. The wind farm's operation and maintenance data, such as the frequency and working time of maintenance, were obtained from site investigations with engineers and technicians. The uncertainties associated with model parameters and input data are illustrated in the sensitivity analysis section of this paper.

## Use advice
Users of this dataset should incorporate information related to the energy and emission factors provided by the Ecoinvent 2.2 dataset, with a focus on coefficients reflective of Chinese practices. The modeling approach and parameters from this dataset apply specifically to offshore wind farms and may not be appropriate for other types of marine construction or power transmission applications. Users must pay attention to the transportation load and shipping energy intensity when evaluating the sea transportation of materials and the subsequent environmental impact. Additionally, users should take into account the operational energy consumption and emissions data, informed by the actual operation and maintenance practices of the wind farm. The sensitivity analysis included as part of this dataset is critical for understanding the range of uncertainties in the model parameters and input data. When extending the application of this data, users should be cautions regarding the scope and the specific technological context of the DBOWF.

## Review details
Inventory: The internal review was done by several iteration steps concerning raw data validation, raw data documentation, representativity, completeness and consistency of modelling with regard to ISO 14040 and 14044.

## Data sources
- Yang, J. et al. The life-cycle energy and environmental emissions of a typical offshore wind farm in China. Journal of Cleaner Production 180, 316–324 (2018).
