# NMC532 hydrometallurgical recycling

Dataset: ILCD process, Unit process, single operation
Geography: CN
Reference year: 2021
Classification: End-of-life treatment / Material recycling
Functional unit: 333.9 kg of the degraded NMC532 can be sorted from per 1 ton of degraded battery
Generated by: maqingyuan, m1120498928@163.com
Owner: Tiangong LCI Data Working Group
Review: Dependent internal review by Tiangong LCI Data Working Group
Amounts: no units in this file; such an amount is in the reference unit of its flow, which a separate flow dataset defines
copyright: false
licenseType: Free of charge for all users and uses

## General comment
The used NMC cells are firstly pretreated, then acid leaching is performed to get metal sulfate, and NMC precursors are obtained by adding alkali for co-precipitation, and new NMC is obtained by sintering.

## Technical purpose
The hydrometallurgical recycling process of NMC532 is applied in the recovery of nickel, cobalt, and manganese from used NMC batteries. This recycled material serves as an effective supply source for the fabrication of new cathode materials in lithium-ion battery manufacturing. By processing degraded NMC532 cells, this technology supports the sustainable life cycle of batteries in the electronics and automotive industries where such batteries are commonly used.

## Reference product
- Degraded NMC532: 740; input; calculated

## Inputs
- P204（95%）P507（95%）: 2190; calculated
- Nickel sulfate: 540; calculated
- sodium hydroxide: 810; calculated
- nitrogen: 30; measured
- Liquid ammonia: 140; measured
- Lithium Hydroxide Monohydrate: 450; calculated
- Average labor (Disassemble degraded battery): 3.65; measured
- Average labor（Material preparation）: 7.3; measured
- water,water: 1.5e6; measured
- Electricity: 55800; calculated
- Equipment Depreciation: 1000; measured

## Outputs
- Sewage treatment: 20000; measured
- Ni-Co-Mn precursor,Ni-Co-Mn precursor: 1.4475e6; measured

## Data treatment and extrapolations
① We calculated the cost per one ton of recycled cathode materials. The recycle process can be divided into four steps: DISASSEMBLE degraded battery, EXTRACTION to get Ni/Co/Mn sulfates, NCM(OH)2 PRECURSOR PREPARATION and LITHIATION.② During the DISASSEMBLE process, we use degraded NMC532 as raw material.③ During the EXTRACTION process, Ni/Co/Mn sulfates are generated, we suggest the yield can be up to 100%.

## Use advice
When utilizing the dataset for the NMC532 hydrometallurgical recycling process, ensure that the methodological framework accommodates the inclusion of all four specified stages: disassembly, extraction, precursor preparation, and lithiation. Factor in the economic considerations as cost per ton for recycled cathode material is provided. The expected yield of Ni/Co/Mn sulfates during the extraction phase should be regarded as optimal and therefore modeled at a maximum rate of 100%. Additionally, users must account for the weight conversion from degraded batteries to the amount of usable NMC532, specifically 333.9 kg per ton of batteries processed.

## Review details
Inventory: The internal review was done by several iteration steps concerning raw data validation, raw data documentation, representativity, completeness and consistency of modelling with regard to ISO 14040 and 14044.

## Data sources
- Qian, G. et al. Value-creating upcycling of retired electric vehicle battery cathodes. Cell Reports Physical Science 3, 100741 (2022).
