# cement production;cement, portland cement, 42.5MPa;other rotary kilns

Dataset: ILCD process, Unit process, black box
Geography: HLJ-CN
Reference year: 2008
Classification: Materials production / Other mineralic materials
Generated by: Siqi Yang, ysqsophia@gmail.com
Owner: Tiangong LCI Data Working Group
Review: Dependent internal review by Tiangong LCI Data Working Group
Amounts: no units in this file; such an amount is in the reference unit of its flow, which a separate flow dataset defines
copyright: false
licenseType: Free of charge for all users and uses

## General comment
Other rotary kilns are used for the production of portland cement. A study was conducted on the process flow and operating parameters of other rotary kiln technologies currently available in the cement industry in Heilongjiang Province, and input and output data of the established product system were collected and calculated and quantified.

## Technical purpose
This data set describes the production process of portland cement with a 28-day compressive strength of 42.5 MPa, utilizing alternative rotary kiln technologies. The described portland cement is suitable for construction applications where high strength cement is required, such as the construction of infrastructure, buildings, and bridges. It is specifically applicable to the cement industry within Heilongjiang Province, involving the stages from raw meal preparation to cement preparation.

## Model description
The functional unit is the performance of 1kg cement with a 28-day compressive strength of 42.5MPa, that is, 1Fu=42.5kgMPa. The scope of evaluation is raw meal preparation, clinker calcination and cement preparation. The environmental load caused by the consumption of clay resources is not considered for the time being. Iron powder is an iron correction material, and its environmental impact will not be considered. The wastes considered to be emitted at the output end of the product system mainly include nitrogen oxides, sulfur dioxide, carbon dioxide and dust.

## Reference product
- cement, portland cement, 42.5MPa: 1000
  Portland cement with a strength grade of 42.5.

## Inputs
- limestone, crushed, for mill: 1203.4
  Limestone
- gypsum stone (CaSO4-dihydrate): 59
  Gypsum
- hard coal: 235.386
  Standard coal. The original data is 0.2187kg standard coal, here converted to hard coal, the conversion formula is 1kg hard coal = 0.929kg standard coal.
- electricity, medium voltage: 413.28
  Electricity

## Outputs
- particles (> PM10): 0.64
  Dust, with an unspecified particle size, is treated as PM > 10 micrometers in diameter.
- sulfur dioxide: 0.7554
  Sulfur dioxide
- Nitrogen oxides: 2.951
- carbon dioxide: 1181.7
  Carbon dioxide

## Use advice
When using this data set for Life Cycle Assessment (LCA), consider that the scope of evaluation includes raw meal preparation, clinker calcination, and cement preparation, but does not account for the environmental load caused by the consumption of clay resources nor the impact of iron powder as an iron correction material. Furthermore, when modeling the use phase behavior or interpreting the results, it is important to note that only nitrogen oxides, sulfur dioxide, carbon dioxide, and dust emissions are considered. Ensure that LCA studies incorporating this data are restricted to the use of portland cement in contexts with comparable technological applicability and industrial operating parameters.

## Review details
Inventory: The internal review was done by several iteration steps concerning raw data validation, raw data documentation, representativity, completeness and consistency of modelling with regard to ISO 14040 and 14044.

## Data sources
- 于淼. (2008). 黑龙江水泥工业可持续发展研究 [硕士, 哈尔滨工业大学].
