# Calcium carbonate powder production ; Crushing and screening method, CN

Dataset: ILCD process
Geography: CN
Classification: Unit processes / Materials production / Non-energetic raw materials
Generated by: Jiaqi Lu, wilsherelu@foxmail.com
Owner: Tiangong LCI Data Working Group
Review: Dependent internal review by Tiangong LCI Data Working Group
Amounts: no units in this file; such an amount is in the reference unit of its flow, which a separate flow dataset defines
copyright: false
licenseType: Free of charge for all users and uses

## General comment
This dataset represents the carbon footprint associated with the production of calcium carbonate powder through the process of crushing and screening. The produced calcium carbonate powder is commonly used as a filler in plastics, paper, paint, and construction materials, as well as a dietary calcium supplement in animal feed.

## Reference product
- Putty Powder: 1000; missing unimportant
  Large white powder products

## Inputs
- Limestone: 1458; missing unimportant
  limestone
- Light fuel oil: 0.0267; missing unimportant
  diesel fuel
- water: 0.0777; missing unimportant
- Electricity: 54.972; missing unimportant

## Outputs
All rows: missing unimportant
- Particles (PM0.2 - PM2.5): 0.2
  dust
- waste water - untreated: 0.035
  domestic sewage
- municipal solid waste deposition: 0.1232
  domestic waste
- used oil: 1.668e-6
  Waste oil
- nitrous oxide: 0.000415
  Nitrogen oxides (fuel exhaust)
- carbon monoxide (fossil): 0.001117
  Carbon monoxide (fuel exhaust gas)
- total hydrocarbons（THC）: 0.000183
  THC (fuel exhaust)

## Use advice
When utilizing this data, ensure that the scope of the Life Cycle Assessment matches the intended use of the calcium carbonate powder. Consider the geographic relevance of the data as it pertains to CN (China), and ensure the technological representativeness of the crushing and screening method. Additional processes such as transportation, end-of-life treatment, and possible recycling streams should also be considered in the system boundary.

## Review details
Inventory: The internal review was done by several iteration steps concerning raw data validation, raw data documentation, representativity, completeness and consistency of modelling with regard to ISO 14040 and 14044.

## Data sources
- 年产12万吨石膏粉项目环评报告
