# Plexiglass ; PMMA: Polymethyl Methacrylate (also known as Acrylic or Plexiglass); cryogenic process

Dataset: ILCD process, Unit process, single operation
Geography: JX-CN
Classification: Unit processes / Materials production / Glass and ceramics
Generated by: He xiaxia, 18616148319@163.com
Owner: Tiangong LCI Data Working Group
Review: Dependent internal review by Tiangong LCI Data Working Group
Amounts: no units in this file; such an amount is in the reference unit of its flow, which a separate flow dataset defines
copyright: false
licenseType: Free of charge for all users and uses

## General comment
This data set relates to the production of Polymethyl Methacrylate (PMMA), commonly known as acrylic or plexiglass, through a cryogenic process. PMMA is used in a variety of applications such as manufacturing transparent barriers, signs, aircraft canopies, skylights, automobile taillights, and as a lightweight alternative to glass.

## Reference product
- propionic acid: 17.479; measured
  Distillation condensate

## Inputs
- Electricity: 188.28; measured
- waste heat: 94.66, 17.964 (2 entries); measured

## Use advice
When using this dataset for life cycle assessment (LCA), pay careful attention to the boundaries of the cryogenic process used in the production of PMMA. Ensure that the dataset is consistent with the methodological choices in the LCA, such as system boundary definition and impact assessment methods. Consider the energy consumption of the cryogenic process, and include end-of-life treatment if the analysis considers the full life cycle of PMMA products.

## Review details
Inventory: The internal review was done by several iteration steps concerning raw data validation, raw data documentation, representativity, completeness and consistency of modelling with regard to ISO 14040 and 14044.

## Data sources
- 江西旺达新材料有限公司年产20000吨有机玻璃原料生产项目
