# aromatics production ; aromatics ; coal-based methanol to aromatics route

Dataset: ILCD process, Unit process, black box
Geography: CN
Reference year: 2022
Classification: Materials production / Organic chemicals
Functional unit: The functional unit is defined as 1 kg aromatics production
LCI method principle: Attributional
LCI method approaches: Allocation - market value
Generated by: Yanan Ren, renyn15@tsinghua.org.cn
Owner: Tiangong LCI Data Working Group
Review: Dependent internal review by Tiangong LCI Data Working Group
Amounts: no units in this file; such an amount is in the reference unit of its flow, which a separate flow dataset defines
copyright: false
licenseType: Free of charge for all users and uses

## General comment
The methanol aromatization process undergoes methanol dehydration,olefins formation, and olefinsaromatization, with complex side reactions such as polymerization, isomerization,and alkylation. After aromatization, the mixture enters the phase separator toseparate the dry gas that is used as the fuel gas for the plants. The liquidphase enters the stabilizer to separate liquefied petroleum gas (LPG) and the remainingliquid phase continues to enter the rectification column to separate aromaticsand heavy aromatics (C9+). Aromatics is the main product, and LPG and heavyaromatics are byproducts.

## Geography
The operating data of the CBMTA and OBNTA plants are from the environmental impact assessment reports collected and managed by China’s Advanced Coal to Chemicals Industry Database of the Professional Knowledge Service System for Energy (PKSSE).

## Time period
Not mentioned, replaced by the publication time of the document

## Technical purpose
The coal-based methanol to aromatics (CBMTA) process is used for the production of aromatics which are essential components in the manufacture of a broad range of chemical products. These aromatics are primarily used as raw materials in the synthesis of plastics, resins, synthetic fibers, rubber, dyes, detergents, pharmaceuticals, and other chemical intermediates. The byproducts, liquefied petroleum gas (LPG) and heavy aromatics (C9+), have utility as fuel and in further chemical processing respectively.

## Model description
Upstream feedstock, material, and energy transportation stages are excluded from the system since they have a limited impact on the whole system and can be neglected based on the cut-off criterion in the LCA framework. The system is also irrespective of downstream aromatics transportation and utilization stages because its function is defined as to produce the aromatics product.

## Reference product
- Aromatic hydrocarbon: 1; measured
  Aromatics

## Inputs
All rows: measured
- Methanol: 3.12
- process water: 0.05
  Process water
- Water (fresh water): 0.96
  Supplement water
- ZSM-5 catalyst: 0.00067
- light fuel oil: 4e-5
  Thermal oil
- electricity mix: 0.396
  Electricity
- natural gas: 1.57
  Natural gas

## Outputs
All rows: measured
- Heavy aromatics: 0.11
- LPG - liquefied petroleum gas: 0.18
  LPG
- Refinery Gas: 2.6
  Dry gas (self-use)
- carbon dioxide: 0.31
  CO2
- Dust (unspecified, from stack): 1e-5
  PM
- volatile organic compound: 0.00122
  VOCs
- sulfur dioxide: 1e-5
  SO2
- nitrous oxide: 8e-5
  NOx

## Deviations from the LCI method approaches
Here, economy allocation is optimal since these products have quite different chemical usages, while they have the same economic function that is to be sold as commodities.

## Data selection and combination
In the system, the aromatics production stage is set as the foreground stage and its numerous data are monitored and collected via the site survey, while upstream feedstock, material, and energy production stages are defined as background stages and their data are collected from the mature LCA database.

## Use advice
When using this LCA dataset, it is important to clearly differentiate between the foreground and background stages. The foreground stage includes all processes directly involved in aromatics production, for which data must be collected from the site-specific surveys. The background stages are those related to upstream feedstock, material, and energy production, for which data should be sourced from established LCA databases. Economy allocation should be applied, given the different chemical uses and common economic function of the co-products. The transportation stages for upstream and downstream processes are not included in the system boundaries, as per the cut-off criteria in the LCA framework. The functional unit for this data set is defined as 1 kg of aromatics produced.

## Review details
Inventory: The internal review was done by several iteration steps concerning raw data validation, raw data documentation, representativity, completeness and consistency of modelling with regard to ISO 14040 and 14044.

## Data sources
- Li, J. et al. Comparative resource-environment-economy assessment of coal- and oil-based aromatics production. Resources Policy 77, 102629 (2022).
