# raw meal preparation;raw meal

Dataset: ILCD process, Unit process, single operation
Geography: CN
Classification: Materials production / Non-energetic raw materials
Generated by: Siqi Yang, ysqsophia@gmail.com
Owner: Tiangong LCI Data Working Group
Review: Dependent internal review by Tiangong LCI Data Working Group
Amounts: no units in this file; such an amount is in the reference unit of its flow, which a separate flow dataset defines
copyright: false
licenseType: Free of charge for all users and uses

## General comment
In the preparative phase for raw meal, the crude raw materials are ground into fine particles of a certain size range that meets the procedural requirements; then, water and other necessary materials are added to form raw balls, the final semi-product of the procedural phase. During this phase, input includes limestone, clay, coal, iron powder, and water contained in the raw materials or added in the procedural line. The phase includes three interior transformative processes: grinding the raw materials, coal pulverization, and the formation of raw balls by adding water to the white ground raw materials. Raw balls are the final product of this phase. In this phase, the ball products account for the majority of the total output, amounting to up to 79.32% (not including water). The main emission of pollutants is dust, which accounts for 0.29% of the total output.

## Technology and included processes
In the preparative phase for raw meal, the crude raw materials are ground into fine particles of a certain size range that meets the procedural requirements; then, water and other necessary materials are added to form raw balls, the final semi-product of the procedural phase. During this phase, input includes limestone, clay, coal, iron powder, and water contained in the raw materials or added in the procedural line. The phase includes three interior transformative processes: grinding the raw materials, coal pulverization, and the formation of raw balls by adding water to the white ground raw materials. Raw balls are the final product of this phase. The detailed material flows are described quantitatively in Fig. 3. In this phase, the ball products account for the majority of the total output, amounting to up to 79.32% (not including water). The main emission of pollutants is dust, which accounts for 0.29% of the total output.

## Technical purpose
The raw meal preparative process described is designed for use in the production of clinker in the cement industry. Specifically, the system is used in cement enterprises employing vertical kiln production systems. It includes stages of grinding raw materials such as limestone and clay, coal pulverization, and forming raw balls by adding water and binding materials, to produce an intermediary product used in later stages of the cement production process.

## Model description
The system boundary is the raw meal preparation stage (including grinding).

## Reference product
- raw meal: 1000
  Raw ball

## Inputs
- limestone, crushed, for mill: 719.28
  Limestone
- clay: 149.614
  Clay
- hard coal; 26.3 MJ/kg: 99.743
  Coal
- iron, powder: 34.961
  Iron powder
- Water (fresh water): 25.193
  Water (water content):water contained in the input materials. As for the indicators in per unit of cement product, the direct inputs of materials include limestone, clay, coal, iron powder additives, mixed materials, gypsum, and oxygen, but exclude the inputs of water added or contained in the raw materials or energy. The total input of materials consists of the direct input of materials and the input of hidden flows, which includes all amounts of water, and the other components of air, aside from oxygen.
- Water (fresh water): 231.877
  Water input

## Outputs
- particles (> PM10): 3.599
  Dust. The particle size is not specified. Here we treat it as PM>10.
- Water (groundwater from technosphere, waste water): 257.069
  Water

## Sampling procedure
After investigation, the annual production capacity of cement companies using vertical kiln production systems is 100,000 tons of clinker. The overall characteristics of shaft kiln production lines are high energy consumption, limited production capacity, low labor productivity, and large dust emissions. The dynamic metabolism analysis of the shaft kiln production line is carried out in units of 1 hour under normal production levels.

## Use advice
This dataset represents the raw meal preparation phase for cement clinker production and includes detailed material flows. Data users should take note that the system boundary encompasses the entire raw meal preparation stage, including grinding. The major outputs and emissions should be accounted for in the inventory phase of the LCA, with ball products encompassing the majority of the total output, and dust emissions accounting for a minor, but noteworthy, proportion. The data is intended for use in the LCA of cement produced by vertical shaft kilns, where implications on environmental impacts, energy consumption, and production scalability are of concern. This dataset is based on a production capacity of 100,000 tons of clinker per year and should be calibrated for LCA studies of cement production facilities with different capacities or technological setups.

## Review details
Inventory: The internal review was done by several iteration steps concerning raw data validation, raw data documentation, representativity, completeness and consistency of modelling with regard to ISO 14040 and 14044.

## Data sources
- Dan Hu, Zhen Guo, Zhen Wang, & Qiang Xiao. (2015). Metabolism analysis and eco-environmental impact assessment of two typical cement production systems in Chinese enterprises. Ecological Informatics 26, 70–77.
