# Northwest (Fuping) Wheat-Corn Production ; Wheat Cultivation

Dataset: ILCD process, Unit process, single operation
Geography: WN-SAX-CN
Reference year: 2013
Valid until: 2013
Classification: Unit processes / Materials production / Agricultural production means
Functional unit: 1t
Generated by: Haoran Zhang, hrzhang@whu.edu.cn
Owner: Tiangong LCI Data Working Group
Review: Dependent internal review by Tiangong LCI Data Working Group
Amounts: no units in this file; such an amount is in the reference unit of its flow, which a separate flow dataset defines
copyright: false
licenseType: Free of charge for all users and uses

## General comment
The life cycle of winter wheats-summer maize rotation system mainly includes three stages: raw material mining and transportation, agricultural materials production and transportation, and crop planting, including coal, oil, natural gas, electricity and other raw materials mining and production, land resource utilization, fertilizer, pesticide and other agricultural materials production related energy consumption and pollutant emission. Including CO2, NH3, SO2, CH4, N2O and CO [11]. The environmental impact of plant equipment, construction facilities, production of transport tools and transportation of raw materials associated with the system is not considered.

## Geography
fuping

## Technology and included processes
The research on the resource utilization and environmental emission of winter wheat-summer maize rotation system from raw material extraction, processing and transportation to agricultural materials production and crop planting process is to provide decision-making basis for the production and environmental management of the whole process of winter wheat-summer maize rotation system. The life cycle assessment of agricultural products starts from the mining of ore and energy and ends in the output of crop planting, including the output of agricultural products and pollutants. Land resources are the basis of all production activities and directly enter the agricultural system. In this study, 1 t of crops were evaluated as functional units

## Technical purpose
This dataset focuses on the life cycle of winter wheat and summer maize rotation system in Northwest (Fuping) region, specifically used in analyses and decision-making related to agricultural cultivation practices, crop yield optimization, and environmental impact assessments commonly applied in agri-environmental research and policy planning.

## Reference product
- wheat: 1000; measured

## Inputs
- arable: 1608.72; measured
- water: 4362.95; measured
- Electricity: 38156.5; measured
- Corn Seeds: 29.62; measured

## Outputs
All rows: measured
- carbon monoxide (fossil): 0.541
- Nitrogen oxides: 3.571
- sulfide: 2.686
- carbon dioxide (fossil),carbon dioxide (fossil): 1146.43
- methane (fossil),methane (fossil): 0.03351
- nitrous oxide: 0.44668
- ammonium: 5.75
- phosphorus, total: 0.01003
- phosphoric acid: 0.04826
- sodium nitrate: 1.34987
- Insecticide: 0.05247
- heavy metals (unspecified): 0.0047

## Deviations from the LCI method approaches
The lifecycle evaluation of agricultural products starts from mining of ores and energy, terminated by the output of crops, including the output of agricultural products and pollutants. Land resources are the basis of all production activities and directly enter the agricultural production system."

## Data selection and combination
The data for the study mainly comes from field surveys conducted from August to September 2013, randomly surveying 30 farmers each in Fuping and Yangling, regarding the planting of winter wheat and summer corn.

## Data treatment and extrapolations
Impact assessment consists of four steps: impact categorization, characterization, normalization, and weighted assessment.

## Use advice
Users should apply this data set considering the methodological scope of the life cycle assessment, which includes the extraction and transportation of minerals and energy, production and transportation of agricultural inputs, and cultivation of crops. The environmental impacts of related infrastructure, facilities, and the transportation of materials are excluded. Careful consideration should be given to the temporal and geographical relevance of the data (2013, Fuping and Yangling regions). Additional modeling might be required to adjust for changes over time and different agricultural practices.

## Review details
Inventory: The internal review was done by several iteration steps concerning raw data validation, raw data documentation, representativity, completeness and consistency of modelling with regard to ISO 14040 and 14044.

## Data sources
- 彭小瑜, 吴喜慧, 吴发启, 等. 陕西关中地区冬小麦-夏玉米轮作系统生命周期评价[J].农业环境科学学报, 2015, 34(4).
