# Xanthophosphorus ; Phosphate ore, silica, coke ; Electric furnace method ; All sizes; NESPS2 / 黄磷 ; 磷矿、硅石、焦碳 ; 电炉法 ; 所有规模 ; 全国第二次污染普查数据

Dataset: ILCD process, Unit process, single operation
Geography: CN
Reference year: 2019
Classification: Reference Parameters / Materials production / Inorganic chemicals
Generated by: The data was created by the Office of the Second National Pollution Source Census of the Ministry of Ecology and Environment, and the data was organized by the TianGong Plan team for ILCD format / 生态环境部第二次全国污染源普查工作办公室创建数据，天工计划团队常慧敏整理数据为ILCD格式
Owner: Tiangong LCI Data Working Group / 天工LCI数据工作小组
Review: Dependent internal review by Tiangong LCI Data Working Group / 天工LCI数据工作小组
Amounts: no units in this file; such an amount is in the reference unit of its flow, which a separate flow dataset defines
copyright: false
licenseType: Free of charge for all users and uses

## General comment
the Technical of end-of-pipe management technology for pollution Waste wateris/，Its Technical efficiency of end-of-pipe management0

## Technical purpose
该工业过程涉及使用磷矿、硅石和焦炭通过电炉法生产黄磷，适用于所有规模的设施。突出的管道末端污染管理技术主要用于化学工业处理含有危险物质的废水。这些设施可能生产的黄磷用于多种应用，如生产阻燃剂、农药、烟火和各种磷化合物。

## Reference product
- Yellow Phosphorus: 1000; calculated
  源文件中描述为为黄磷，此处对其进行了匹配工作，将其匹配到LCAflow库里面相最符合的流，污染物指标备注为工业废水量

## Outputs
All rows: calculated
- arsenic: 0.0001
  the Technical of end-of-pipe management technology for pollution arsenicisMulti-stage neutralization + multi-stage precipitation，Its Technical efficiency of end-of-pipe management98
  污染物指标砷的末端治理技术是多级中和+多级沉淀，其效率为98，末端治理设施实际运行率（k值）计算公式为k=治理设施运行时间（小时/年）/正常生产时间（小时/年）。原文件中描述污染物类别为废水，污染物指标为砷，此处对其进行了匹配工作，将其匹配到LCAflow库里面相最符合的流，污染物指标备注为砷
- phosphorus, total: 0.0455
  the Technical of end-of-pipe management technology for pollution phosphorus, totalisMulti-stage neutralization + multi-stage precipitation，Its Technical efficiency of end-of-pipe management99.5
  污染物指标总磷的末端治理技术是多级中和+多级沉淀，其效率为99.5，末端治理设施实际运行率（k值）计算公式为k=治理设施运行时间（小时/年）/正常生产时间（小时/年）。原文件中描述污染物类别为废水，污染物指标为总磷，此处对其进行了匹配工作，将其匹配到LCAflow库里面相最符合的流，污染物指标备注为总磷
- Nitrogen, organic bound: 0.23
  the Technical of end-of-pipe management technology for pollution Nitrogen, organic boundisMulti-stage neutralization + multi-stage precipitation，Its Technical efficiency of end-of-pipe management90
  污染物指标总氮的末端治理技术是多级中和+多级沉淀，其效率为90，末端治理设施实际运行率（k值）计算公式为k=治理设施运行时间（小时/年）/正常生产时间（小时/年）。原文件中描述污染物类别为废水，污染物指标为总氮，此处对其进行了匹配工作，将其匹配到LCAflow库里面相最符合的流，污染物指标备注为总氮
- chemical oxygen demand: 0.41
  the Technical of end-of-pipe management technology for pollution chemical oxygen demandisMulti-stage neutralization + multi-stage precipitation，Its Technical efficiency of end-of-pipe management90
  污染物指标化学需氧量的末端治理技术是多级中和+多级沉淀，其效率为90，末端治理设施实际运行率（k值）计算公式为k=治理设施运行时间（小时/年）/正常生产时间（小时/年）。原文件中描述污染物类别为废水，污染物指标为化学需氧量，此处对其进行了匹配工作，将其匹配到LCAflow库里面相最符合的流，污染物指标备注为化学需氧量
- Waste water: 14.7
  the Technical of end-of-pipe management technology for pollution Waste wateris/，Its Technical efficiency of end-of-pipe management0
  污染物指标工业废水量的末端治理技术是/，其效率为0。原文件中描述污染物类别为废水，污染物指标为工业废水量，此处对其进行了匹配工作，将其匹配到LCAflow库里面相最符合的流，污染物指标备注为工业废水量

## Use advice
This dataset is derived from the Pollution Source Census Report and contains information on pollution emissions and related products. However, it does not include data on energy or chemical consumption, nor does it provide information on waste or co-product generation. When utilizing this dataset, please supplement the missing data based on actual conditions before use
该数据集来源于污染源普查报告，包含污染物排放及相关产品信息，但不包含能源或化学品消耗数据，也不提供废弃物或共生产物产生信息。在使用该数据集时，请根据实际情况补充缺失数据后再使用。

## Review details
Inventory: The internal review was done by several iteration steps concerning raw data validation, raw data documentation, representativity, completeness and consistency of modelling with regard to ISO 14040 and 14044.
清单： 内部审查通过几个迭代步骤完成，涉及原始数据验证、原始数据记录、代表性、完整性、与 ISO 14040 和 14044 有关的建模的一致性。

## Data sources
- 第二次全国污染源普查产排污核算系数手册（试用版）,二级代码26,四级代码2619文件，在完整版文件中第4111页
