# Polymer Aluminum Electrolytic Capacitors (PAEC) Production ; Polymer Aluminum Electrolytic Capacitors (PAEC)>2cm ; ; Primary Aluminum Ingots

Dataset: ILCD process, Unit process, single operation
Geography: CN
Reference year: 2022
Classification: Unit processes / Materials production / Metals and semimetals
Generated by: Huimin Chang, huiminchang@tsinghua.edu.cn
Owner: Tiangong LCI Data Working Group
Review: Dependent internal review by Tiangong LCI Data Working Group
Amounts: no units in this file; such an amount is in the reference unit of its flow, which a separate flow dataset defines
copyright: false
licenseType: Free of charge for all users and uses

## General comment
聚合物铝电解电容器 (PAEC) 生产阶段 ; 25V 150uf

## Time period
Literature published on 2022-11-15 in the literature The reference year of the elementary data (alumminum ingots, separator paper, tansport, electricity, and water) is around 2016 and qcruired from the Gabi database (Version: 10.6.1.35)

## Technology and included processes
The manufacturing stage of the AECs is divided into several sub-stages in this study based on the actual fabrication segmentation in the AEC industry. First, the high-purity aluminum ingots will be smelt, cast, rolled, and annealed into the aluminum foil with a thickness of about 10–100 μm. Then, anode foil and cathode foil for the AECs will be fabricated, respectively. The same manufacturing processes are applied toward anode foil in three types of AECs. The aluminum blank foil will be etched by the weak acids to increase the superficial area of the foil, and the electrochemical reaction can further form the dielectric (Al2O3). But cathode foil of three types of AECs varies in structure and manufacturing processes due to the differences in electrolytes. The cathode foil of LAECs is made by the etched process, while the cathode foil of PAEC is made by the carbon coating process after the etched process. In PHAECs, when liquid-state electrolyte and solid-state polymer are used simultaneously, the carbon-coated cathode aluminum foil of the PAECs is also replaced by the aluminum foil with TiO2 film to overcome the potential problems on capacitor cycling life. After obtaining the anode and cathode foil, the AECs can be manufactured, assembled, and packed. Besides, there are some differences in the AEC fabrication sub-stage. The specific processes of the three types of AECs are shown in Fig. 2. In detail, the differences in manufacturing processes among the three types of AECs are mainly due to the change of repair conditions of the capacitor dielectric (Al2O3 film) and the introduction of conductive polymer. On the one hand, PAECs and PHAECs cannot use the electrolyte to repair the dielectric layer in the aging process like LAECs, so an additional forming solution is required to perform forming process, which adds extra manufacturing steps. On the other hand, the conductive polymer needs to be effectively introduced into the middle of anode and cathode foils. The conductive polymer (PEDOT) in PAECs is formed by the polymerization reaction of EDOT and oxidizing agents in the capacitor manufacturing process, while the conductive polymer (PEDOT:PSS) in PHAEC is introduced into the capacitors by the dispersive solution. The collected inventory data of LAECs, PAECs, and PHAECs by the FU are summarized in Table 2. The details of the inventory data are available in Sheets 5–7 of Supporting Info B.

## Technical purpose
This dataset provides an overview of the production process of Polymer Aluminum Electrolytic Capacitors (PAECs), which are primarily used in electronic devices for energy storage and filtering applications. These capacitors, specifically those greater than 2cm in size, are manufactured using high-purity aluminum ingots and various processes such as smelting, casting, rolling, annealing, etching, and coating to produce anode and cathode foils. The capacitors are suitable for applications where repair of dielectrics is carried out without using an electrolyte during the aging process and where conductive polymers such as PEDOT are introduced between the foils.

## Reference product
- capacitor, electrolyte type, > 2cm height: 1e6; measured
  capacitors (product)

## Inputs
All rows: measured
- electricity, high voltage, aluminium industry: 25645
  Electricity grid mix (China)
- aluminium, primary, ingot: 346
  346=260.8(99.99% Al ingots)+85.2(99.9% Al ingots)
- water, deionised: 84947
- tap water: 37492.5
- section bar extrusion, aluminium: 486.8
  Aluminum profile (China)
- paper, woodfree, uncoated: 65.3
- rubber: 131.8
  Rubber from Gabi database ({401c53f8-0ace-410b-9cc7-9a586f8ac2e6})
- wire drawing, steel: 2.12
  substance flow is leads (Fe) but database from Gabi database is steel wire ({d3e4d4d7-66ee-4bea-b6eb-9704682a0b8a})
- section bar extrusion, aluminium: 15.94
  Tab (alluminium profile (China) )
- sealing tape, aluminium/PE, 50 mm wide: 4.2517
  Tape(PP film ,from Gabi {7d6d2565-aeb4-4f36-a049-f715a80fe954})
- phosphoric acid, industrial grade, without water, in 85% solution state: 71.9654
  H3PO4
- boric acid, anhydrous, powder: 12.7679
  HBO3
- hydrochloric acid, without water, in 30% solution state: 97.4099
  HCl (31%)
- sodium hydroxide, without water, in 50% solution state: 107.943
  NaOH (30%)
- sulfuric acid: 580.563
  H2SO4 (98%)
- nitric acid, without water, in 50% solution state: 29.223
  HNO3 (98%)
- Lubricating oil,Lubricating Oil: 8.9016
  Rolling oil
- Ammonium Citrate: 24.5909
  Ammonium citrate
- Ammonium Pentaborate: 6.7447
  Ammonium pentaborate
- Ammonium adipate: 34.3393
- Ammonium dihydrogen phosphate: 1.124
  NH4H2PO4
- anode, paste, for aluminium electrolysis: 10.9643
  Carbon coating paste
- EDOT: 14.025
- Iron (III) p-toluene sulfonate hexahydrate: 35.3129
- 1-butanol: 28.8924
  N-butanol

## Outputs
All rows: measured
- Aluminium Phosphate: 9.0494
  AlPO4 (by-product)4
- used capacitor: 62925.2
  Capacitors (waste)
- wastewater, average: 73437.4
  Waste water
- sewage sludge: 8.5165
  Sludge
- aluminium scrap, new: 23.7393
  Al scraps
- chemical oxygen demand: 3.2703
  COD

## Data selection and combination
The material information and performance parameters of the three types of AECs are from the investigated manufacturer. Moreover, through the field research of several factories in the AEC industry, the original data on aluminum blank foil fabrication (made from aluminum ingots), anode/cathode foil fabrication (made from aluminum blank foil), and capacitor fabrication were obtained. Due to technical confidentiality, the LCI data of the fabrication of the cathode foil for PHAECs cannot be obtained directly from the supplier. Therefore, the manufacturing LCI of aluminum cathode foil in PHAECs is adjusted according to the coating process data of cathode foil of PAECs, considering their similarity. In the transportation stage, the data of the main raw materials from the material origin to the capacitor manufacturer and the data of the manufactured capacitor products from the manufacturer to the customers are from the supply chain system of the manufacturer. The energy consumption in the use stage is calculated based on the physical equations and the electrical parameters of the AECs. To ensure the completeness of the analysis, the data of the end-of-life stage is obtained based on the analysis and calculation.The reference year of the elementary data is around 2016. The elementary data (i.e., aluminum ingots, separator paper, transport, electricity, and water) are acquired from the Gabi database (Version: 10.6.1.35). In addition, some background data, including 3, 4-ethylene dioxythiophene (EDOT), ammonium adipate, ammonium citrate, etc., are not available in the Gabi database. They are estimated based on the chemical reactions with the material preparation process from the existing raw materials in the Gabi database. The data on the preparation process of the dispersive solution (PEDOT:PSS, 1%wt) for PHAECs' fabrication are scaled from the lab data. The detailed LCI data of the three types of AEC and unit impact of the substance flow is provided in Sheets 5–7 and Sheet 2 of Supporting Info B.

## Use advice
The inventory data provided within this dataset originates from various stages of the production process for three types of Aluminum Electrolytic Capacitors (AECs) including LAECs, PAECs, and PHAECs. Users should consider the specific manufacturing differences, especially in the repair conditions of Al2O3 dielectric films and the introduction of conductive polymers. The dataset is based on data from the year 2016 sourced from the Gabi database and information from the investigated manufacturers. For the most accurate impact assessment, users should follow the detailed Life Cycle Inventory (LCI) data and methodologies provided in the supporting documents (Supporting Info B, Sheets 5–7 for inventory data and Sheet 2 for unit impact), ensuring appropriate application in LCA context. If different years or production technologies are used in the assessment, adjustments to reflect technology and energy consumption progress should be considered.

## Review details
Inventory: The internal review was done by several iteration steps concerning raw data validation, raw data documentation, representativity, completeness and consistency of modelling with regard to ISO 14040 and 14044.

## Data sources
- Zhang, C., Zheng, Y., Jing, J., Liu, Y. & Huang, H. A comparative LCA study on aluminum electrolytic capacitors: From liquid-state electrolyte, solid-state polymer to their hybrid. J. Clean. Prod. 375, (2022).
