# Boiling and lifting ; Boiling and lifting products ; Chinese medicine tablets ; Extraction (using organic solvents); NESPS2 / 煮提 ; 煮提产物 ; 中药饮片 ; 提取（使用有机溶剂） ; 小于200吨-中药饮片/年 ; 全国第二次污染普查数据

Dataset: ILCD process, Unit process, single operation
Geography: CN
Reference year: 2019
Classification: Reference Parameters / Energy carriers and technologies / Heat and steam
Generated by: The data was created by the Office of the Second National Pollution Source Census of the Ministry of Ecology and Environment, and the data was organized by the TianGong Plan team for ILCD format / 生态环境部第二次全国污染源普查工作办公室创建数据，天工计划团队常慧敏整理数据为ILCD格式
Owner: Tiangong LCI Data Working Group / 天工LCI数据工作小组
Review: Dependent internal review by Tiangong LCI Data Working Group / 天工LCI数据工作小组
Amounts: no units in this file; such an amount is in the reference unit of its flow, which a separate flow dataset defines
copyright: false
licenseType: Free of charge for all users and uses

## General comment
the Technical of end-of-pipe management technology for pollution Exhaust gasis/，The formula for calculating the actual operation rate (k-value) of the end-of-pipe treatment facility is /

## Technical purpose
该数据集代表的是年产量小于200吨的中药饮片生产过程中的一个阶段，特别关注使用有机溶剂的提取过程。数据集包括了末端污染管理技术的应用，如用于处理废水和去除污染物如化学需氧量（COD）、氨氮、总磷、有机氮和挥发性有机物（VOCs）的好氧和厌氧生物处理以及物理化学处理。该数据适用于处理类似生产规模和污染控制技术的设施。

## Reference product
- Traditional Chinese Medicine decoction pieces: 1000; input; calculated
  源文件中描述为为中药饮片，此处对其进行了匹配工作，将其匹配到LCAflow库里面相最符合的流，污染物指标备注为废水量

## Outputs
All rows: calculated
- volatile organic compound: 6.3
  the Technical of end-of-pipe management technology for pollution volatile organic compoundisCondensation + absorption + diversion，Its Technical efficiency of end-of-pipe management94，The formula for calculating the actual operation rate (k-value) of the end-of-pipe treatment facility is /
  污染物指标有组织挥发性有机物的末端治理技术是冷凝法+吸收+分流，其效率为94，末端治理设施实际运行率（k值）计算公式为k=工艺废气净化装置耗电量（千瓦时）/工艺废气净化装置额定功率（千瓦）/工艺废气净化装置运行时间（小时）。原文件中描述污染物类别为废气，污染物指标为有组织挥发性有机物，此处对其进行了匹配工作，将其匹配到LCAflow库里面相最符合的流，污染物指标备注为有组织挥发性有机物
- volatile organic compound: 7.2
  the Technical of end-of-pipe management technology for pollution volatile organic compoundisConfined room collection + absorption，Its Technical efficiency of end-of-pipe management85，The formula for calculating the actual operation rate (k-value) of the end-of-pipe treatment facility is /
  污染物指标无组织挥发性有机物的末端治理技术是密闭间收集+吸收，其效率为85，末端治理设施实际运行率（k值）计算公式为k=工艺废气净化装置耗电量（千瓦时）/工艺废气净化装置额定功率（千瓦）/工艺废气净化装置运行时间（小时）。原文件中描述污染物类别为废气，污染物指标为无组织挥发性有机物，此处对其进行了匹配工作，将其匹配到LCAflow库里面相最符合的流，污染物指标备注为无组织挥发性有机物
- volatile organic compound: 16.8
  the Technical of end-of-pipe management technology for pollution volatile organic compoundisSemi-closed cover collection + absorption，Its Technical efficiency of end-of-pipe management65
  污染物指标无组织挥发性有机物的末端治理技术是半密闭罩收集+吸收，其效率为65，末端治理设施实际运行率（k值）计算公式为k=工艺废气净化装置耗电量（千瓦时）/工艺废气净化装置额定功率（千瓦）/工艺废气净化装置运行时间（小时）。原文件中描述污染物类别为废气，污染物指标为无组织挥发性有机物，此处对其进行了匹配工作，将其匹配到LCAflow库里面相最符合的流，污染物指标备注为无组织挥发性有机物
- volatile organic compound: 17.85
  the Technical of end-of-pipe management technology for pollution volatile organic compoundisAbsorption + diversion，Its Technical efficiency of end-of-pipe management83，The formula for calculating the actual operation rate (k-value) of the end-of-pipe treatment facility is /
  污染物指标有组织挥发性有机物的末端治理技术是吸收+分流，其效率为83，末端治理设施实际运行率（k值）计算公式为k=工艺废气净化装置耗电量（千瓦时）/工艺废气净化装置额定功率（千瓦）/工艺废气净化装置运行时间（小时）。原文件中描述污染物类别为废气，污染物指标为有组织挥发性有机物，此处对其进行了匹配工作，将其匹配到LCAflow库里面相最符合的流，污染物指标备注为有组织挥发性有机物
- Waste water: 23800
  the Technical of end-of-pipe management technology for pollution Waste wateris/，The formula for calculating the actual operation rate (k-value) of the end-of-pipe treatment facility is /
  污染物指标废水量的末端治理技术是/，末端治理设施实际运行率（k值）计算公式为/。原文件中描述污染物类别为废水，污染物指标为废水量，此处对其进行了匹配工作，将其匹配到LCAflow库里面相最符合的流，污染物指标备注为废水量
- phosphorus, total: 0.02916
  the Technical of end-of-pipe management technology for pollution phosphorus, totalisAnaerobic biological treatment + aerobic biological treatment + physicochemical treatment，Its Technical efficiency of end-of-pipe management94，The formula for calculating the actual operation rate (k-value) of the end-of-pipe treatment facility is k = annual normal operating time of dust removal equipment (hours) / production system annual production operating time (hours)
  污染物指标总磷的末端治理技术是厌氧生物处理法+好氧生物处理法+物理化学处理法，其效率为94，末端治理设施实际运行率（k值）计算公式为k=污水治理设施运行时间（小时）/正常生产时间（小时）常生产时间（小时/年）。原文件中描述污染物类别为废水，污染物指标为总磷，此处对其进行了匹配工作，将其匹配到LCAflow库里面相最符合的流，污染物指标备注为总磷
- phosphorus, total: 0.0729
  the Technical of end-of-pipe management technology for pollution phosphorus, totalisAerobic biological treatment + physical chemical treatment，Its Technical efficiency of end-of-pipe management85，The formula for calculating the actual operation rate (k-value) of the end-of-pipe treatment facility is k = annual normal operating time of dust removal equipment (hours) / production system annual production operating time (hours)
  污染物指标总磷的末端治理技术是好氧生物处理法+物理化学处理法，其效率为85，末端治理设施实际运行率（k值）计算公式为k=污水治理设施运行时间（小时）/正常生产时间（小时）常生产时间（小时/年）。原文件中描述污染物类别为废水，污染物指标为总磷，此处对其进行了匹配工作，将其匹配到LCAflow库里面相最符合的流，污染物指标备注为总磷
- Ammonia Nitrogen: 0.111
  the Technical of end-of-pipe management technology for pollution Ammonia NitrogenisAnaerobic biological treatment + aerobic biological treatment，Its Technical efficiency of end-of-pipe management95
  污染物指标氨氮的末端治理技术是厌氧生物处理法+好氧生物处理法，其效率为95，末端治理设施实际运行率（k值）计算公式为k=污水治理设施运行时间（小时）/正常生产时间（小时）常生产时间（小时/年）。原文件中描述污染物类别为废水，污染物指标为氨氮，此处对其进行了匹配工作，将其匹配到LCAflow库里面相最符合的流，污染物指标备注为氨氮
- Ammonia Nitrogen: 0.222
  the Technical of end-of-pipe management technology for pollution Ammonia NitrogenisAerobic biological treatment，Its Technical efficiency of end-of-pipe management90
  污染物指标氨氮的末端治理技术是好氧生物处理法，其效率为90，末端治理设施实际运行率（k值）计算公式为k=污水治理设施运行时间（小时）/正常生产时间（小时）常生产时间（小时/年）。原文件中描述污染物类别为废水，污染物指标为氨氮，此处对其进行了匹配工作，将其匹配到LCAflow库里面相最符合的流，污染物指标备注为氨氮
- Nitrogen, organic bound: 0.2359
  the Technical of end-of-pipe management technology for pollution Nitrogen, organic boundisAnaerobic biological treatment + aerobic biological treatment，Its Technical efficiency of end-of-pipe management93
  污染物指标总氮的末端治理技术是厌氧生物处理法+好氧生物处理法，其效率为93，末端治理设施实际运行率（k值）计算公式为k=污水治理设施运行时间（小时）/正常生产时间（小时）常生产时间（小时/年）。原文件中描述污染物类别为废水，污染物指标为总氮，此处对其进行了匹配工作，将其匹配到LCAflow库里面相最符合的流，污染物指标备注为总氮
- Nitrogen, organic bound: 0.4718
  the Technical of end-of-pipe management technology for pollution Nitrogen, organic boundisAerobic biological treatment，Its Technical efficiency of end-of-pipe management86，The formula for calculating the actual operation rate (k-value) of the end-of-pipe treatment facility is k = annual normal operating time of dust removal equipment (hours) / production system annual production operating time (hours)
  污染物指标总氮的末端治理技术是好氧生物处理法，其效率为86，末端治理设施实际运行率（k值）计算公式为k=污水治理设施运行时间（小时）/正常生产时间（小时）常生产时间（小时/年）。原文件中描述污染物类别为废水，污染物指标为总氮，此处对其进行了匹配工作，将其匹配到LCAflow库里面相最符合的流，污染物指标备注为总氮
- chemical oxygen demand: 2.89
  the Technical of end-of-pipe management technology for pollution chemical oxygen demandisAnaerobic biological treatment + aerobic biological treatment，Its Technical efficiency of end-of-pipe management99
  污染物指标化学需氧量的末端治理技术是厌氧生物处理法+好氧生物处理法，其效率为99，末端治理设施实际运行率（k值）计算公式为k=污水治理设施运行时间（小时）/正常生产时间（小时）常生产时间（小时/年）。原文件中描述污染物类别为废水，污染物指标为化学需氧量，此处对其进行了匹配工作，将其匹配到LCAflow库里面相最符合的流，污染物指标备注为化学需氧量
- chemical oxygen demand: 5.78
  the Technical of end-of-pipe management technology for pollution chemical oxygen demandisAerobic biological treatment，Its Technical efficiency of end-of-pipe management98，The formula for calculating the actual operation rate (k-value) of the end-of-pipe treatment facility is k = annual normal operating time of wastewater treatment equipment (hours) / annual operating time of production system (hours)
  污染物指标化学需氧量的末端治理技术是好氧生物处理法，其效率为98，末端治理设施实际运行率（k值）计算公式为k=污水治理设施运行时间（小时）/正常生产时间（小时）常生产时间（小时/年）。原文件中描述污染物类别为废水，污染物指标为化学需氧量，此处对其进行了匹配工作，将其匹配到LCAflow库里面相最符合的流，污染物指标备注为化学需氧量
- Exhaust gas: 15400
  the Technical of end-of-pipe management technology for pollution Exhaust gasis/，The formula for calculating the actual operation rate (k-value) of the end-of-pipe treatment facility is /
  污染物指标废气量的末端治理技术是/，末端治理设施实际运行率（k值）计算公式为/。原文件中描述污染物类别为废气，污染物指标为废气量，此处对其进行了匹配工作，将其匹配到LCAflow库里面相最符合的流，污染物指标备注为废气量

## Use advice
This dataset is derived from the Pollution Source Census Report and contains information on pollution emissions and related products. However, it does not include data on energy or chemical consumption, nor does it provide information on waste or co-product generation. When utilizing this dataset, please supplement the missing data based on actual conditions before use
该数据集来源于污染源普查报告，包含污染物排放及相关产品信息，但不包含能源或化学品消耗数据，也不提供废弃物或共生产物产生信息。在使用该数据集时，请根据实际情况补充缺失数据后再使用。

## Review details
Inventory: The internal review was done by several iteration steps concerning raw data validation, raw data documentation, representativity, completeness and consistency of modelling with regard to ISO 14040 and 14044.
清单： 内部审查通过几个迭代步骤完成，涉及原始数据验证、原始数据记录、代表性、完整性、与 ISO 14040 和 14044 有关的建模的一致性。

## Data sources
- 第二次全国污染源普查产排污核算系数手册（试用版）,二级代码27,四级代码2740文件，在完整版文件中第3089页
