# Mining process ; Raw coal, crude oil ; Oilfield oil and gas ; Drilling

Dataset: ILCD process, Unit process, single operation
Geography: LN-CN
Reference year: 2017
Classification: Unit processes / Energy carriers and technologies / Energetic raw materials
LCI method principle: Attributional
LCI method approaches: Consequential
Generated by: zimeng li, 1577978537@qq.com
Owner: Tiangong LCI Data Working Group
Review: Dependent internal review by Tiangong LCI Data Working Group
Amounts: no units in this file; such an amount is in the reference unit of its flow, which a separate flow dataset defines
copyright: false
licenseType: Free of charge for all users and uses

## General comment
Analysis of the working links of energy, water resources and other resources consumption, waste emissions and other indicators

## Geography
Liaohe Oilfield

## Time period
Time of publication

## Technology and included processes
Drilling in the process of oil development is the construction process of oil Wells, workers use drilling tools and relevant technology to use the drill bit to drill underground, drill through the rock to the target layer. The drilling process includes a number of construction projects, and the use of site construction, drilling fluid configuration, discharge and oil production waste liquid discharge, etc., in the operation process will produce waste liquid, noise and solid waste and other pollution behaviors.

## Technical purpose
This dataset describes the mining process specific to the extraction of raw materials like coal and crude oil from the Liaohe Oilfield. The data set is especially relevant for the analysis in the oil and gas sector, focusing on energy and water consumption as well as waste emissions during the drilling phase of the oilfield operation. The process is crucial for the supply of raw coal and crude oil as inputs for various energy generation and industrial applications.

## Reference product
- LPG - liquefied petroleum gas: 21; input; uniform; missing unimportant
  Crude oil input accounts for 10.1% of raw coal input in the oil and gas development stage

## Inputs
- LPG - liquefied petroleum gas: 32; uniform; missing unimportant
  Raw coal input accounts for 10.1% of raw coal input in the oil and gas development stage

## Use advice
When utilizing this dataset for LCA, it is imperative to account for methodological considerations such as the scope of the system boundary, which should include all relevant drilling operations. Data users need to ensure the mining process data is relevant and current as of the time of publication, and to adjust for technological changes or efficiency improvements if applying it to different temporal contexts. Attention should be paid to the geographical specificity, as results may not be transferable to other regions without adjustments for local conditions. Further, when modeling the use phase behavior, variations in operational practices and maintenance regimes specific to the Liaohe Oilfield should be taken into account.

## Review details
Inventory: The internal review was done by several iteration steps concerning raw data validation, raw data documentation, representativity, completeness and consistency of modelling with regard to ISO 14040 and 14044.

## Data sources
- 胡新磊. 基于LCA的油田油气开发环境影响评价研究[D].吉林大学,2017.
