# Aluminum ingot casting ; Primary aluminum ingot ; Liquid primary aluminum ; 2009

Dataset: ILCD process, Unit process, single operation
Geography: CN
Reference year: 2021
Classification: Unit processes / Materials production / Metals and semimetals
Generated by: Zimeng Cai, caizm6178@163.com
Owner: Tiangong LCI Data Working Group
Review: Dependent internal review by Tiangong LCI Data Working Group
Amounts: no units in this file; such an amount is in the reference unit of its flow, which a separate flow dataset defines
copyright: false
licenseType: Free of charge for all users and uses

## General comment
Primary aluminum ingots produced by the casting process are suitable for use in various industries that require high-quality aluminum materials. This includes the automotive industry for manufacturing lightweight vehicle components, the construction industry for structural elements and panels, aerospace industry for aircraft components, and the electronics industry for conductors and casings.

## Time period
Date of publication

## Reference product
- aluminium, primary, ingot: 1000; software or database

## Inputs
- aluminium, primary, liquid: 1030.29; software or database

## Data selection and combination
The data in this study refers to the LCA data of PA, SA, electricity, and other background data. The PA data were obtained from statistical data sources, and the SA data were mainly obtained from the literatures. The background data were mainly derived from the Chinese localization LCA database CAS RCEES 2018, which was established by the Research Center for Eco-Environmental Sciences, Chinese Academy of Sciences and covers LCA data for energy, materials, transportation, waste management etc.

## Use advice
Users of this LCA data should ensure that they consider the specific year of data publication, which is 2009, as the environmental impact of aluminum ingot production may change over time with technological advancements. It is important to refer to the most recent data where possible. Additionally, users need to pay attention to the sources of both primary aluminum (PA) and secondary aluminum (SA) data. Recycling processes and their efficiencies should be considered when applying this data. Background data from the CAS RCEES 2018 should be used within the context of China, as they are specifically tailored to factor in local environmental impacts from energy, materials, transportation, and waste management.

## Review details
Inventory: The internal review was done by several iteration steps concerning raw data validation, raw data documentation, representativity, completeness and consistency of modelling with regard to ISO 14040 and 14044.

## Data sources
- Ding, N., Liu, N., Lu, B. & Yang, J. Life cycle greenhouse gas emissions of aluminum based on regional industrial transfer in China. J. Ind. Ecol. 25, 1657–1672 (2021).
