# Burning｜electricity｜biomass boiler（30MW）

Dataset: ILCD process, Unit process, single operation
Geography: CN
Reference year: 2020
Classification: Unit processes / Energy carriers and technologies / Heat and steam
Functional unit: Taking the production of 10,000KWh of electric energy as the functional unit (consumption of straw is 1.4kg/kwh)
LCI method principle: Consequential
Generated by: Chaoshuo Liu, liucs22@mails.jlu.edu.cn
Owner: Tiangong LCI Data Working Group
Review: Dependent internal review by Tiangong LCI Data Working Group
Amounts: no units in this file; such an amount is in the reference unit of its flow, which a separate flow dataset defines
copyright: false
licenseType: Free of charge for all users and uses

## General comment
This data set describes a biomass boiler with a capacity of 30MW that is used for the direct combustion process to generate electricity. The primary fuel for generating the 10,000 kWh of electrical energy is straw, with a consumption rate of 1.4 kg/kWh. This process is typically utilized in power plants that use renewable biomass resources to produce electricity for a variety of applications, such as residential, commercial, or industrial energy supply.

## Reference product
- electricity from waste incineration: 36000; measured

## Inputs
- Crop straw: 18000; measured

## Outputs
All rows: measured
- carbon monoxide (biogenic): 2.772
  The expert notes that the original text does not differentiate between biogenic and fossil sources of emissions, and in their opinion, the emissions in question are biogenic.
- nitrous oxide: 3.038
- sulfur dioxide: 0.476
- particles (> PM10),particles (> PM10): 2.758
- methane (biogenic),methane (biogenic): 0.462
  (same comment as for carbon monoxide (biogenic))

## Use advice
When utilizing this data set for Life Cycle Assessment, consider integrating it within the energy supply chain, especially focusing on biomass energy production. Attention should be paid to regional differences in straw availability and quality, which can impact the overall efficiency and emissions of the process. Users should also consider the end-of-life processes for the biomass infrastructure, potential emissions from straw procurement and transportation, and any energy inputs required during the operation of the biomass boiler. Ensure that these parameters are consistently applied in the LCA model to avoid misinterpretation.

## Review details
Inventory: The internal review was done by several iteration steps concerning raw data validation, raw data documentation, representativity, completeness and consistency of modelling with regard to ISO 14040 and 14044.

## Data sources
- Wang, Z. et al. Sustainability assessment of straw direct combustion power generation in China: From the environmental and economic perspectives of straw substitute to coal. Journal of Cleaner Production 273, 122890 (2020).
