# Metallurgical ash production;Metallurgical ash;Mining and burning(D01)

Dataset: ILCD process, Unit process, single operation
Geography: CN
Reference year: 1998
Classification: Materials production / Metals and semimetals
Generated by: Fuxiang, 1162850692@qq.com
Owner: Tiangong LCI Data Working Group
Review: Dependent internal review by Tiangong LCI Data Working Group
Amounts: no units in this file; such an amount is in the reference unit of its flow, which a separate flow dataset defines
copyright: false
licenseType: Free of charge for all users and uses

## General comment
来自表 4-17 D01 钢厂生产吨材环境负荷编目表

## Time period
论文提到钢铁企业环境总体数据为1998年的吨钢环境基础数据。

## Technical purpose
Metallurgical ash is used as an agent in several metallurgical processes including acting as a refractory material, flux in the steelmaking process, and for the adjustment of slag properties. It is also utilized in other industrial processes that require compounds high in calcium oxide.

## Reference product
- Metallurgical ash: 173; measured
  Metallurgical white ash

## Inputs
- Energy, geothermal, converted: 828.731; measured
- water: 70; measured

## Outputs
- Dust (unspecified, from stack): 0.076; measured
- sulfur dioxide: 0.329; measured
- Suspended solids, unspecified: 0.07266; measured
- Spoil (deposited, hibernating in ground, non elementary flow): 6.617; measured

## Use advice
This dataset, reflecting the environmental burden of producing one ton of metallurgical ash based on the year 1998 data, should be used with caution. Due to potential changes in environmental regulations and manufacturing technologies, the actual current environmental impact may differ. Users should consider updating these values with current local data for precise life cycle assessments. Additionally, users should account for any potential changes in metallurgical process efficiencies and recycling practices that may affect the environmental profile of the material.

## Review details
Inventory: The internal review was done by several iteration steps concerning raw data validation, raw data documentation, representativity, completeness and consistency of modelling with regard to ISO 14040 and 14044.

## Data sources
- 周和敏. 钢铁材料生产过程环境协调性评价研究. (北京工业大学, 2001).
