# Monitoring well ; Din=0.15m,L=50m ; Groundwater in-situ remediation ; Enhanced bioremediation ;Construction of injection wells and monitoring wells

Dataset: ILCD process, Unit process, single operation
Geography: SH-CN
Reference year: 2020
Classification: Unit processes / Other Services / Repair and maintenance
Generated by: Xiao Meng, xiaomeng@mail
Owner: Tiangong LCI Data Working Group
Review: Dependent internal review by Tiangong LCI Data Working Group
Amounts: no units in this file; such an amount is in the reference unit of its flow, which a separate flow dataset defines
copyright: false
licenseType: Free of charge for all users and uses

## General comment
CHC+ISB (Heating-Cooling System + In-situ Bioremediation) is used for site remediation, and during the construction preparation phase, injection wells and monitoring wells are constructed.

## Geography
The aquifer in a certain area in Shanghai, China, is uniformly contaminated with chlorinated volatile organic compounds (CVOCs), with a surface area of 20,000 m2 and a depth of 50 m, with the water table located at a depth of 30 m.

## Technical purpose
The data set describes the usage of a Heating-Cooling System (CHC) in conjunction with In-situ Bioremediation (ISB) for the remediation of chlorinated volatile organic compounds (CVOCs) contaminated aquifers. It is specifically applied in the construction of injection and monitoring wells for groundwater in-situ remediation projects. This is suitable for environmental engineering firms that focus on the remediation of CVOCs pollution within groundwater systems.

## Reference product
- Monitoring well: 272
  文中仅给出监测井和注入井一共544口，没有给出单独的监测井和注入井数量，这里填报人简单估计两种监测井数量各半。

## Inputs
- Gravel Sand: 178145; calculated
  Gravel sand
- bentonite: 75216.2; calculated
- Steel: 1360; software or database
- Polyethylene,Polyethylene: 13600; software or database
  Polyethylene pipe
- Electricity: 846029; software or database

## Outputs
- Waste (solid): 245130
  每口井约产生钻井废土0.9012吨

## Use advice
Users of this data set should ensure the applicability of the described remediation process to the specific conditions of their contaminated sites, considering factors such as the type and concentration of CVOCs, the geology of the aquifer, and the depth of the water table. It is also important to note that the construction of wells should comply with local regulations and guidelines to prevent further contamination or disruption of the aquifer. Special attention should be given to the potential need to adjust the dimensions of the wells depending on the scale of the remediation project, as well as to the safety considerations during construction.

## Review details
Inventory: The internal review was done by several iteration steps concerning raw data validation, raw data documentation, representativity, completeness and consistency of modelling with regard to ISO 14040 and 14044.

## Data sources
- Ni, Z. et al. Comparative Life-Cycle Assessment of Aquifer Thermal Energy Storage Integrated with in Situ Bioremediation of Chlorinated Volatile Organic Compounds. Environ. Sci. Technol. 54, 3039–3049 (2020).
