# Treatment of wasted ultrafiltration module ; mix of incineration and landfilling, CN

Dataset: ILCD process, Unit process, single operation
Geography: CN
Reference year: 2022
Classification: Unit processes / End-of-life treatment / Other end-of-life services
Functional unit: 1 item of ultrafiltration module
Generated by: Jiaqi Lu, wilsherelu@foxmail.com
Owner: Tiangong LCI Data Working Group
Review: Dependent internal review by Tiangong LCI Data Working Group
Amounts: no units in this file; such an amount is in the reference unit of its flow, which a separate flow dataset defines
copyright: false
licenseType: Free of charge for all users and uses

## General comment
The process data set describes the treatment of wasted ultrafiltration modules which are commonly utilized in water and wastewater treatment facilities. This module is deployed for purification and separation activities, where it helps in the removal of suspended solids, bacteria, viruses, and high molecular weight substances from various liquids. The ultrafiltration module represented by this data is designed for scenarios such as reclaiming water, concentrating food and beverage items, or processing pharmaceutical and chemical solutions.

## Reference product
- Ultrafiltration Component: 1; input; measured
  1 waste Ultrafiltration module

## Outputs
All rows: measured
- waste incineration of plastics (unspecified) fraction in municipal solid waste (MSW): 11.75
  Waste extruded plastic pipe
- waste incineration of plastics (unspecified) fraction in municipal solid waste (MSW): 4.27
  Waste injection molded plastic
- waste incineration of plastics (unspecified) fraction in municipal solid waste (MSW): 2.42
  Waste PU filler
- waste incineration of plastics (unspecified) fraction in municipal solid waste (MSW): 21.97
  Waste PVDF membrane
- waste incineration of plastics (unspecified) fraction in municipal solid waste (MSW): 29.28
  Waste PVC shell

## Use advice
When utilizing this data set, users should account for the specific mix of incineration and landfilling used in the treatment of the wasted ultrafiltration module. The geographical coverage is CN (China), indicating that the data is specific to procedures and regulations within China. It's imperative to align the data use with regional practices for waste treatment. Additionally, when applying the data to environmental impact assessments, users must consider the end-of-life phase for the module, factoring in the potential emissions from incineration and potential ecological impacts from landfilling.

## Review details
Inventory: The internal review was done by several iteration steps concerning raw data validation, raw data documentation, representativity, completeness and consistency of modelling with regard to ISO 14040 and 14044.

## Data sources
- Ultrafiltration product manual
