# Potable water production ; Ultrafiltration, hollow fiber membrane, CN

Dataset: ILCD process, Unit process, single operation
Geography: CN
Reference year: 2022
Classification: Energy carriers and technologies / Heat and steam
Functional unit: 1 t potable water
Generated by: Jiaqi Lu, wilsherelu@foxmail.com
Owner: Tiangong LCI Data Working Group
Review: Dependent internal review by Tiangong LCI Data Working Group
Amounts: no units in this file; such an amount is in the reference unit of its flow, which a separate flow dataset defines
copyright: false
licenseType: Free of charge for all users and uses

## General comment
This data set describes the use of ultrafiltration with hollow fiber membrane technology for the production of potable water. It is intended for scenarios where high-quality drinking water needs to be produced, purified or processed. This could be applicable in municipalities' water treatment facilities, bottled water production plants, or any industrial process requiring high purity water.

## Reference product
- drinking water: 1000; measured

## Inputs
- electricity mix: 6.498; measured
  Filtering power consumption
- Water (fresh water): 1310; measured
  raw water
- Ultrafiltration Component: 2.37e-6; measured
  Ultrafiltration components

## Outputs
- waste water - treated: 310; measured
  Can be discharged directly

## Use advice
Users of this data set should consider the specific context of the potable water production process being modeled. Attention should be paid to the geographic and technological relevance as regional variations in water quality and available technology may influence the applicability of the data. Users should also factor in the pre-treatment and post-treatment processes connected to ultrafiltration when accounting for energy consumption and emissions. This data specifically refers to the process of producing 1 ton of potable water and should be scaled accordingly to match the quantity of water being assessed in the LCA.

## Review details
Inventory: The internal review was done by several iteration steps concerning raw data validation, raw data documentation, representativity, completeness and consistency of modelling with regard to ISO 14040 and 14044.

## Data sources
- Ultrafiltration product manual
