# Livestock and poultry breeding ; feed crop planting stage ; pig breeding area

Dataset: ILCD process, Unit process, single operation
Geography: CN
Reference year: 2014
Classification: Unit processes / Materials production / Agricultural production means
Functional unit: 1kg pork
Generated by: Rui Yang, 1632707028@qq.com
Owner: Tiangong LCI Data Working Group
Review: Dependent internal review by Tiangong LCI Data Working Group
Amounts: no units in this file; such an amount is in the reference unit of its flow, which a separate flow dataset defines
copyright: false
licenseType: Free of charge for all users and uses

## General comment
The feed described in this paper is mainly energy feed, including: corn, wheat, soybean, sorghum, rice. In fact, in the process of livestock breeding, livestock feed is mainly composed of corn, wheat and soybeans. Feed crop planting stage mainly includes fertilizer production stage, corn, soybean, wheat planting stage.

## Geography
This study was conducted from 2014 to 2015, aiming at livestock and poultry feeding cycle, meat ratio, feed formula, feed consumption, coal and electricity consumption, etc. Has been to Shandong Gaomi Zhengda pig farm, Laixi City Zhishuang dairy farm, Jimo city Duan Bolan town Jiangjiapo village pig farm, Jimo City Liujiazhuang town livestock farm, Rizhao City Changling town Guanzhuang village, Juxian County Zhailihe town Dongxing Agriculture and animal husbandry company, Juxian Qiaoshan town east Chen dairy farm, Juxian Qiaoshan town Liu Jiayi water pig farm, Zhucheng Foreign Trade Co., LTD. Phoenix parents breeding duck farm, Xinjiang Fukang Hongfa Breeding professional cooperative, Jiuyun Street Town Xuhong laying Chicken cooperative, Jiuyun Street Town Liuyun Village self-contained breeding farm, China Australia Holding Group Co., LTD., Dezhou City Qingyun County Wayu Village, Shandong Province Qingyun County four Liu community beef cattle breeding base, Dezhou City Qingyun Qingnian chicken breeding base, Qingyun County Yongli Poultry layer breeding company, Qingyun County Xingchen youth chicken breeding Field research was carried out by professional breeding cooperatives, Qingyun Dongtai broiler breeding cooperatives, Hebei Yanshan Boyuan Feed Co., LTD., Yanshan Da Chinese Feed Co., LTD., Wudi Liuhe Feed Co., LTD., and China-Australia Oriental Hope Feed Co., LTD.

## Technology and included processes
In this paper, the life cycle of livestock and poultry farming is divided into six stages: feed crop planting, feed processing, livestock and poultry raising, manure treatment, slaughter and transportation. The specific life cycle process of livestock and poultry breeding is shown in Figure 2-1. Due to the lack of some data and the limitations of basic conditions, the production, transportation and use of pesticides, mulch and feed additives have not been analyzed, and the environmental impact caused by other related infrastructure construction, transport production and labor costs is no longer considered.

## Technical purpose
The described process details the role of specific feed crops such as corn, wheat, and soybean in livestock and poultry breeding, particularly focusing on pig breeding. This data set applies primarily to the assessment of the environmental impact of producing energy feeds used in large-scale livestock farming operations. Subsequent stages of the process include fertilizer production and the actual planting of the specified crops.

## Reference product
- pig: 1; measured
  作为参考定量，非实际输出

## Inputs
- Fertilizer: 0.201868; calculated
- hard coal: 0.0127653; calculated

## Outputs
All rows: measured
- nitrous oxide: 0.0047288
  Pig breeding community
- nitrogen, total (excluding N2): 0.0143544
  Pig breeding community
- Nitrogen trioxide: 0.00399
  Pig breeding community
- ammonia: 0.011387
  Pig breeding community
- hydrocarbons (unspecified): 0.0001083
  Pig breeding community
- carbon monoxide (fossil): 0.0008032
  Pig breeding community
- sulfur dioxide: 0.0009738
  Pig breeding community
- carbon dioxide (fossil),carbon dioxide (fossil): 1.94134
  Pig breeding community

## Use advice
Users of this data should take into account the regional characteristics of feed crop production and livestock breeding practices when applying it to life cycle assessments. Variances in technological processes, local climate, and soil conditions can affect the results of the assessment. Therefore, users should ensure to contextualize this data with local conditions and practices. The data set focuses on the years 2014-2015; thus, users must consider any changes that may have occurred since this period. For transparency, when utilizing this data to support environmental impact statements or policy decisions, users should disclose any extrapolations or estimations made beyond the provided period.

## Review details
Inventory: The internal review was done by several iteration steps concerning raw data validation, raw data documentation, representativity, completeness and consistency of modelling with regard to ISO 14040 and 14044.

## Data sources
- 周景月. 基于生命周期评价的畜禽养殖环境影响分析. (青岛科技大学, 2017).
