# Remediated soil ; Soil ex-situ remediation ; Ex-situ thermal desorption

Dataset: ILCD process, Unit process, single operation
Geography: WH-HUB-CN
Reference year: 2022
Classification: Unit processes / Other Services / Repair and maintenance
Functional unit: The functional unit of life cycle assessment is defined as the disposal of foundation pit wastewater generated during the excavation process of 1000m3 contaminated soil, in order to achieve risk-based remediation goals.
Generated by: Yang Xintong, yangxt@caep.org.cn
Owner: Tiangong LCI Data Working Group
Review: Dependent internal review by Tiangong LCI Data Working Group
Amounts: no units in this file; such an amount is in the reference unit of its flow, which a separate flow dataset defines
copyright: false
licenseType: Free of charge for all users and uses

## General comment
During the soil excavation process, contaminated groundwater will be collected and disposed of in the form of foundation pit wastewater.

## Geography
A contaminated site located in Wuhan, China was selected as the case study. Approximately 1.25 million m3 of soil was found contaminated, and forty types of VOCs, SVOCs, and heavy metal contaminants were measured in the soil.

## Technology and included processes
When the contaminated soil was excavated, wastewater (e.g., contaminated groundwater) generated as the by-product also needed treatment (e.g., flocculation sedimentation, chemical redox, and coagulation).

## Technical purpose
This data set represents the process of ex-situ thermal desorption used for soil remediation at a contaminated site in Wuhan, China. The soil at this site was contaminated with a mixture of VOCs, SVOCs, and heavy metals, and approximately 1.25 million cubic meters of soil required treatment. Soil remediation processes, such as the described ex-situ method, are generally applied to industrial and hazard-critical areas where soil quality must meet certain safety and environmental standards. The treatment of by-product wastewater, including contaminated groundwater generated during excavation, is typically necessary and involves techniques such as flocculation, sedimentation, chemical redox, and coagulation.

## Reference product
- Remediated soil: 1000; measured

## Inputs
- Activated Carbon: 1025.69; measured
- Electricity: 57302; measured
- natural gas,natural gas: 86715; measured
- Excavated soil,Excavated soil: 1000; measured

## Use advice
Users of this data set should model the full soil remediation process for a functional unit of 1000 cubic meters of contaminated soil, along with the associated disposal of foundation pit wastewater generated during the excavation process. It is important to note that the data only covers the operational phase of site remediation, without considering the impacts from the manufacturing of remediation equipment. Users should include remediation goals based on risk assessment criteria and consider the local environmental regulations and standards when applying this data set to broader life cycle assessments.

## Review details
Inventory: The internal review was done by several iteration steps concerning raw data validation, raw data documentation, representativity, completeness and consistency of modelling with regard to ISO 14040 and 14044.

## Data sources
- Guangji H ,Huan L ,Chang C , et al. Selection of green remediation alternatives for chemical industrial sites: An integrated life cycle assessment and fuzzy synthetic evaluation approach. Science of the Total Environment, 2022, 845 157211-157211.
