# Plastic shoes ; Plastic, shoe sole materials, polyvinyl chloride, polyethylene, polyurethane, ethylene vinyl acetate resins, other resins ; Injection molding process ; All sizes; NESPS2 / 塑料鞋 ; 塑料、鞋底材料、聚氯乙烯、聚乙烯、聚氨酯、乙烯醋酸乙烯树脂、其他树脂 ; 注塑工艺 ; 所有规模 ; 全国第二次污染普查数据

Dataset: ILCD process, Unit process, single operation
Geography: CN
Reference year: 2019
Classification: Reference Parameters / Materials production / Plastics
Generated by: The data was created by the Office of the Second National Pollution Source Census of the Ministry of Ecology and Environment, and the data was organized by the TianGong Plan team for ILCD format / 生态环境部第二次全国污染源普查工作办公室创建数据，天工计划团队常慧敏整理数据为ILCD格式
Owner: Tiangong LCI Data Working Group / 天工LCI数据工作小组
Review: Dependent internal review by Tiangong LCI Data Working Group / 天工LCI数据工作小组
Amounts: no units in this file; such an amount is in the reference unit of its flow, which a separate flow dataset defines
copyright: false
licenseType: Free of charge for all users and uses

## General comment
the Technical of end-of-pipe management technology for pollution volatile organic compoundisDirect discharge，Its Technical efficiency of end-of-pipe management0，The formula for calculating the actual operation rate (k-value) of the end-of-pipe treatment facility is /

## Technical purpose
本数据集描述了通过注塑工艺用于生产鞋底的多种材料，包括塑料、聚氯乙烯、聚乙烯、聚氨酯、乙烯-醋酸乙烯树脂，并适用于所有规模的生产。数据还涉及多种用于生产过程中减少挥发性有机化合物（VOCs）和颗粒物（PM2.5 - PM10）排放的末端处理技术。

## Reference product
- Plastic Shoes: 1; calculated
  源文件中描述为为塑料鞋，此处对其进行了匹配工作，将其匹配到LCAflow库里面相最符合的流，污染物指标备注为挥发性有机物

## Outputs
All rows: calculated
- particles (PM2.5 - PM10): 0.0002025
  the Technical of end-of-pipe management technology for pollution particles (PM2.5 - PM10)isCyclone dust removal + bag filter，Its Technical efficiency of end-of-pipe management95，The formula for calculating the actual operation rate (k-value) of the end-of-pipe treatment facility is /
  污染物指标颗粒物的末端治理技术是旋风+布袋，其效率为95，末端治理设施实际运行率（k值）计算公式为除尘设备运行时间（小时）/总生产时间（小时）。原文件中描述污染物类别为废气，污染物指标为颗粒物，此处对其进行了匹配工作，将其匹配到LCAflow库里面相最符合的流，污染物指标备注为颗粒物
- particles (PM2.5 - PM10): 0.000405
  the Technical of end-of-pipe management technology for pollution particles (PM2.5 - PM10)isBag filter，Its Technical efficiency of end-of-pipe management90，The formula for calculating the actual operation rate (k-value) of the end-of-pipe treatment facility is /
  污染物指标颗粒物的末端治理技术是袋式除尘，其效率为90，末端治理设施实际运行率（k值）计算公式为除尘设备运行时间（小时）/总生产时间（小时）。原文件中描述污染物类别为废气，污染物指标为颗粒物，此处对其进行了匹配工作，将其匹配到LCAflow库里面相最符合的流，污染物指标备注为颗粒物
- volatile organic compound: 0.005736
  the Technical of end-of-pipe management technology for pollution volatile organic compoundisOthers (adsorption method + photolysis)，Its Technical efficiency of end-of-pipe management60，The formula for calculating the actual operation rate (k-value) of the end-of-pipe treatment facility is /
  污染物指标挥发性有机物的末端治理技术是其他（吸附法+光解），其效率为60，末端治理设施实际运行率（k值）计算公式为废气净化设备运行时间（小时）/总生产时间（小时）。原文件中描述污染物类别为废气，污染物指标为挥发性有机物，此处对其进行了匹配工作，将其匹配到LCAflow库里面相最符合的流，污染物指标备注为挥发性有机物
- volatile organic compound: 0.007887
  the Technical of end-of-pipe management technology for pollution volatile organic compoundisAdsorption/catalytic combustion method，Its Technical efficiency of end-of-pipe management45，The formula for calculating the actual operation rate (k-value) of the end-of-pipe treatment facility is /
  污染物指标挥发性有机物的末端治理技术是吸附/催化燃烧法，其效率为45，末端治理设施实际运行率（k值）计算公式为废气净化设备运行时间（小时）/总生产时间（小时）。原文件中描述污染物类别为废气，污染物指标为挥发性有机物，此处对其进行了匹配工作，将其匹配到LCAflow库里面相最符合的流，污染物指标备注为挥发性有机物
- volatile organic compound: 0.008604
  the Technical of end-of-pipe management technology for pollution volatile organic compoundisCatalytic combustion method，Its Technical efficiency of end-of-pipe management40，The formula for calculating the actual operation rate (k-value) of the end-of-pipe treatment facility is /
  污染物指标挥发性有机物的末端治理技术是催化燃烧法，其效率为40，末端治理设施实际运行率（k值）计算公式为废气净化设备运行时间（小时）/总生产时间（小时）。原文件中描述污染物类别为废气，污染物指标为挥发性有机物，此处对其进行了匹配工作，将其匹配到LCAflow库里面相最符合的流，污染物指标备注为挥发性有机物
- volatile organic compound: 0.008604
  the Technical of end-of-pipe management technology for pollution volatile organic compoundisOthers (spray tower + photolysis)，Its Technical efficiency of end-of-pipe management40，The formula for calculating the actual operation rate (k-value) of the end-of-pipe treatment facility is k = normal operating time of wastewater treatment facilities (days/year) / number of days of pressing (days/year)
  污染物指标挥发性有机物的末端治理技术是其他（喷淋塔+光解），其效率为40，末端治理设施实际运行率（k值）计算公式为废气净化设备运行时间（小时）/总生产时间（小时）。原文件中描述污染物类别为废气，污染物指标为挥发性有机物，此处对其进行了匹配工作，将其匹配到LCAflow库里面相最符合的流，污染物指标备注为挥发性有机物
- volatile organic compound: 0.009321
  the Technical of end-of-pipe management technology for pollution volatile organic compoundisPhotolysis，Its Technical efficiency of end-of-pipe management35，The formula for calculating the actual operation rate (k-value) of the end-of-pipe treatment facility is /
  污染物指标挥发性有机物的末端治理技术是光解，其效率为35，末端治理设施实际运行率（k值）计算公式为废气净化设备运行时间（小时）/总生产时间（小时）。原文件中描述污染物类别为废气，污染物指标为挥发性有机物，此处对其进行了匹配工作，将其匹配到LCAflow库里面相最符合的流，污染物指标备注为挥发性有机物
- volatile organic compound: 0.011472
  the Technical of end-of-pipe management technology for pollution volatile organic compoundisLow temperature plasma，Its Technical efficiency of end-of-pipe management20，The formula for calculating the actual operation rate (k-value) of the end-of-pipe treatment facility is k = normal operating time of wastewater treatment facilities (days/year) / number of days of pressing (days/year)
  污染物指标挥发性有机物的末端治理技术是低温等离子体，其效率为20，末端治理设施实际运行率（k值）计算公式为废气净化设备运行时间（小时）/总生产时间（小时）。原文件中描述污染物类别为废气，污染物指标为挥发性有机物，此处对其进行了匹配工作，将其匹配到LCAflow库里面相最符合的流，污染物指标备注为挥发性有机物
- volatile organic compound: 0.011472
  the Technical of end-of-pipe management technology for pollution volatile organic compoundisOthers (adsorption)，Its Technical efficiency of end-of-pipe management20，The formula for calculating the actual operation rate (k-value) of the end-of-pipe treatment facility is k = normal operating time of wastewater treatment facilities (days/year) / number of days of pressing (days/year)
  污染物指标挥发性有机物的末端治理技术是其他（吸附法），其效率为20，末端治理设施实际运行率（k值）计算公式为废气净化设备运行时间（小时）/总生产时间（小时）。原文件中描述污染物类别为废气，污染物指标为挥发性有机物，此处对其进行了匹配工作，将其匹配到LCAflow库里面相最符合的流，污染物指标备注为挥发性有机物
- volatile organic compound: 0.011472
  the Technical of end-of-pipe management technology for pollution volatile organic compoundisPhotocatalysis，Its Technical efficiency of end-of-pipe management20，The formula for calculating the actual operation rate (k-value) of the end-of-pipe treatment facility is /
  污染物指标挥发性有机物的末端治理技术是光催化，其效率为20，末端治理设施实际运行率（k值）计算公式为废气净化设备运行时间（小时）/总生产时间（小时）。原文件中描述污染物类别为废气，污染物指标为挥发性有机物，此处对其进行了匹配工作，将其匹配到LCAflow库里面相最符合的流，污染物指标备注为挥发性有机物
- volatile organic compound: 0.012906
  the Technical of end-of-pipe management technology for pollution volatile organic compoundisOthers (spray tower)，Its Technical efficiency of end-of-pipe management10，The formula for calculating the actual operation rate (k-value) of the end-of-pipe treatment facility is k = normal operating time of wastewater treatment facilities (days/year) / number of days of pressing (days/year)
  污染物指标挥发性有机物的末端治理技术是其他（喷淋塔），其效率为10，末端治理设施实际运行率（k值）计算公式为废气净化设备运行时间（小时）/总生产时间（小时）。原文件中描述污染物类别为废气，污染物指标为挥发性有机物，此处对其进行了匹配工作，将其匹配到LCAflow库里面相最符合的流，污染物指标备注为挥发性有机物
- volatile organic compound: 0.01434
  the Technical of end-of-pipe management technology for pollution volatile organic compoundisDirect discharge，Its Technical efficiency of end-of-pipe management0，The formula for calculating the actual operation rate (k-value) of the end-of-pipe treatment facility is /
  污染物指标挥发性有机物的末端治理技术是直排，其效率为0，末端治理设施实际运行率（k值）计算公式为废气净化设备运行时间（小时）/总生产时间（小时）。原文件中描述污染物类别为废气，污染物指标为挥发性有机物，此处对其进行了匹配工作，将其匹配到LCAflow库里面相最符合的流，污染物指标备注为挥发性有机物

## Use advice
This dataset is derived from the Pollution Source Census Report and contains information on pollution emissions and related products. However, it does not include data on energy or chemical consumption, nor does it provide information on waste or co-product generation. When utilizing this dataset, please supplement the missing data based on actual conditions before use
该数据集来源于污染源普查报告，包含污染物排放及相关产品信息，但不包含能源或化学品消耗数据，也不提供废弃物或共生产物产生信息。在使用该数据集时，请根据实际情况补充缺失数据后再使用。

## Review details
Inventory: The internal review was done by several iteration steps concerning raw data validation, raw data documentation, representativity, completeness and consistency of modelling with regard to ISO 14040 and 14044.
清单： 内部审查通过几个迭代步骤完成，涉及原始数据验证、原始数据记录、代表性、完整性、与 ISO 14040 和 14044 有关的建模的一致性。

## Data sources
- 第二次全国污染源普查产排污核算系数手册（试用版）,二级代码19,四级代码1953文件，在完整版文件中第2793页
