# Production of perovskite photovoltaic modules;ZnO module 1m2;spin coating method;ZnO

Dataset: ILCD process, Unit process, single operation
Geography: US
Classification: Unit processes / Energy carriers and technologies / Electricity
Functional unit: 1 square meter perovskite photovoltaic module
Generated by: Xijing Yao, 15898832265@163.com
Owner: Tiangong LCI Data Working Group
Review: Dependent internal review by Tiangong LCI Data Working Group
Amounts: no units in this file; such an amount is in the reference unit of its flow, which a separate flow dataset defines
copyright: false
licenseType: Free of charge for all users and uses

## General comment
The main process steps include substrate glass production, deposition of perovskite layers, deposition of electron transport layers, and packaging.

## Technology and included processes
Spin-coating method: The spin-coating process is relatively simple, and it is the mainstream preparation method of perovskite light-absorbing layer. Firstly, PbX2 was dissolved in solvent and spun on the substrate to form a film; Then PbX2 is soaked in solution or spun on the substrate again to react with PbX2 film to produce perovskite.

## Technical purpose
This ZnO module of 1 square meter is designed for integration into perovskite photovoltaic panels. It is typically used as a semiconductor layer within the panel structure to enhance the efficiency of solar-to-electric energy conversion.

## Reference product
- Solar Module,Solar Module,Solar Module: 1; log-normal

## Inputs
All rows: log-normal
- ethanol: 0.0271579
  Substrate cleaning solvent
- water: 0.0327
  Substrate cleaning solvent
- zinc oxide: 0.0459
  Layer thickness 25 nm
- dimethyl formamide: 0.00283; calculated
  Solvent of PbI2
- isopropanol: 0.0112; calculated
  Solvent of CH3NH3I
- chlorobenzene: 0.0118; calculated
  Solvent of spiro-OMeTAD
- silver: 0.00119
  Layer thickness 150 nm
- polyethylene terephthalate (PET) granulate: 0.0617
  Applied on 2 sides
- Adhesives: 0.0202
  3 M 467 MPF
- Electricity: 16.416; calculated
- Indium Tin Oxide (ITO) coated glass: 1.54; calculated
  Substrate
- Lead iodide: 0.00138; calculated
  Layer thickness 96 nm
- methylammounium iodide: 0.00014; calculated
  Layer thickness 204 nm
- Spiro-OMeTAD: 0.00085; calculated
  Layer thickness 200 nm

## Outputs
All rows: log-normal
- ethanol: 0.0258
  Substrate cleaning solvent
- butanol: 0.038
  Solvent of ZnO ink
- methanol: 0.0571
  Solvent of ZnO ink
- chloroform: 0.0496
  Solvent of ZnO ink
- dimethyl formamide: 0.00283; calculated
  Solvent of PbI2
- isopropanol: 0.0112; calculated
  Solvent of CH3NH3I
- chlorobenzene: 0.0118; calculated
  Solvent of spiro-OMeTAD
- silver: 0.000215
  Wasted cathode
- landfill of glas/inert waste: 1.63
- Zinc acetate dihydrate: 0.000617; calculated
  Wasted concentrate in ZnO ink
- Potassium hydroxide: 0.000443; calculated
  Solvent of ZnO ink
- Lead iodide: 0.000966; calculated
  Wasted PbI2
- Spiro-OMeTAD: 0.000595; calculated
  Wasted Spiro-OMeTAD

## Use advice
Users of this data set should consider the specific technological application of the ZnO module in perovskite solar panels. Attention should be given to the expected lifespan of the module, its efficiency over time, and the potential for recycling of materials at the end of its life. When integrating this data into a Life Cycle Assessment, the locality and sourcing of raw materials, as well as the manufacturing and disposal processes, should be considered.

## Review details
Inventory: The internal review was done by several iteration steps concerning raw data validation, raw data documentation, representativity, completeness and consistency of modelling with regard to ISO 14040 and 14044.
