# Citrus production

Dataset: ILCD process, Unit process, black box
Geography: SC-CN
Reference year: 2017
Valid until: 2018
Classification: Unit processes / Materials production / Agricultural production means
Functional unit: One hectare of citrus orchard
Generated by: zhu xian, zzhu0918@163.com
Owner: Tiangong LCI Data Working Group
Review: Dependent internal review by Tiangong LCI Data Working Group
Amounts: no units in this file; such an amount is in the reference unit of its flow, which a separate flow dataset defines
copyright: false
licenseType: Free of charge for all users and uses

## General comment
Cultivate citrus seedlings, apply pesticides, chemical fertilizers, farm manure and water, and use manual and machine to harvest citrus products，and produce emissions to the air, soil and water, respectively.

## Geography
Danling County, locating in Sichuan province of southwest China, is one of top 30 citrus producing counties in China.

## Time period
Inputs and outputs of the citrus production in Danling County, Sichuan, southwest China based on returned survey questionnaires from 155 farmers in 2017 and 2018.

## Technical purpose
This dataset represents the inputs and outputs associated with citrus production in Danling County, one of the top citrus-producing areas in China. The data is meant for use in environmental impact studies, agricultural efficiency analysis, and sustainability assessments. It is suitable for understanding the resource utilization and environmental emissions of cultivating citrus plants, particularly in large-scale agricultural settings and in regions with similar climate and cultivation practices to Sichuan province.

## Reference product
- Citrus: 24400; min 1880; max 56300; measured

## Inputs
All rows: measured
- Nitrogenous fertilizer: 847; min 140; max 2094
- Phosphate fertilizer: 443; min 84.6; max 1400
- Potassium fertilizer: 693; min 130; max 1754
- Pesticide: 21.2; min 0.43; max 96.6
- Electricity: 284.76; min 19.512; max 1177.2
- diesel oil: 0.0289; max 0.169

## Use advice
Users should consider the geographical and technological context when applying this data, as it is specific to citrus orchards in Danling County from the years 2017 and 2018. It is important to adjust the data for temporal and regional differences if using it as a reference for other locations or times. Any extrapolation should be done with caution, ensuring an understanding of local agricultural practices, input types and application rates, and emission factors. Methodologically, users should take into account the potential variations in yield, input usage, and emission rates when modeling other processes or locations.

## Review details
Inventory: The internal review was done by several iteration steps concerning raw data validation, raw data documentation, representativity, completeness and consistency of modelling with regard to ISO 14040 and 14044.
