# Alumina production ; Alumina for metallurgy ; Bauxite ; 2015

Dataset: ILCD process, Unit process, single operation
Geography: CN
Reference year: 2021
Classification: Unit processes / Materials production / Non-energetic raw materials
Generated by: Yuzhen Feng, fyz22
Owner: Tiangong LCI Data Working Group
Review: Dependent internal review by Tiangong LCI Data Working Group
Amounts: no units in this file; such an amount is in the reference unit of its flow, which a separate flow dataset defines
copyright: false
licenseType: Free of charge for all users and uses

## General comment
This data set refers to the production of alumina specifically intended for use in metallurgy. The alumina produced from this process is derived from bauxite and is used primarily in the aluminum smelting industry to produce metallic aluminum through the Hall-Héroult process.

## Time period
Date of publication

## Reference product
- aluminium oxide, metallurgical: 1000; software or database
  alumina

## Inputs
All rows: software or database
- soda ash, dense: 145.63
  soda ash
- Petroleum Coke: 905.914
  Energy sources proportion of energy consumption is coal: fuel oil: coke: natural gas: coke even gas=46.0%: 11.0%: 7.1%: 14.1%: 21.7%
- coal gas: 2768.78
  (same comment as for Petroleum Coke)
- natural gas, high pressure: 1799.07
  (same comment as for Petroleum Coke)
- fuel oil, unspecified: 1403.53
  (same comment as for Petroleum Coke)
- hard coal: 5869.3
  (same comment as for Petroleum Coke)
- Water, unspecified natural origin: 1.34
  water consumption

## Data selection and combination
The data in this study refers to the LCA data of PA, SA, electricity, and other background data. The PA data were obtained from statistical data sources, and the SA data were mainly obtained from the literatures. The background data were mainly derived from the Chinese localization LCA database CAS RCEES 2018, which was established by the Research Center for Eco-Environmental Sciences, Chinese Academy of Sciences and covers LCA data for energy, materials, transportation, waste management etc.

## Use advice
Users of this data should take note that the LCA data includes information on the production of alumina (PA), supporting activities (SA), electricity, and other background data. The methodological considerations for utilizing this data should include the sources from which the PA and SA data are obtained, specifically statistical data and relevant literature. In addition, users should ensure that their LCA models align with the localized Chinese context by incorporating the background data from the CAS RCEES 2018 database, encompassing aspects such as energy, materials, transportation, and waste management within their analyses.

## Review details
Inventory: The internal review was done by several iteration steps concerning raw data validation, raw data documentation, representativity, completeness and consistency of modelling with regard to ISO 14040 and 14044.

## Data sources
- Ding, N., Liu, N., Lu, B. & Yang, J. Life cycle greenhouse gas emissions of aluminum based on regional industrial transfer in China. J. Ind. Ecol. 25, 1657–1672 (2021).
