# Corrugated board production/OCC/non-deinking

Dataset: ILCD process, Unit process, single operation
Geography: CN
Reference year: 2021
Valid until: 2026
Classification: Unit processes / Materials production / Paper and cardboards
Generated by: Xiaohua Liu, lxh01311@163.com
Owner: Tiangong LCI Data Working Group
Review: Dependent internal review by Tiangong LCI Data Working Group
Amounts: no units in this file; such an amount is in the reference unit of its flow, which a separate flow dataset defines
licenseType: Free of charge for all users and uses

## General comment
This dataset represents the production of 1 ton of corrugated board using Old Corrugated Containers (OCC) as the primary raw material without the deinking process. The corrugated board produced is typically used for packaging purposes, providing structural support for a variety of products during transportation and handling.

## Reference product
- corrguted cardboard: 1000; missing unimportant

## Inputs
All rows: missing unimportant
- Waste paper: 1099
  废纸
- hard coal: 351.12
  煤炭
- Electricity: 936.612
  电力
- water: 7.05
  水
- Diesel: 43
  柴油
- Cassava Starch: 48
  木薯淀粉
- Chemicals (unspecified): 8.5
  环压增强剂
- Chemicals (unspecified): 1.9
  过硫酸铵
- Chemicals (unspecified): 0.007
  聚合硫酸铁

## Outputs
- carbon dioxide (fossil): 889.88; missing unimportant
  The original text did not distinguish between bio and fossil，according to experts, carbon dioxide is classified as carbon dioxide（fossil） in this area
- methane (fossil): 0.009; missing unimportant
  甲烷
- nitrous oxide: 0.014; missing unimportant
  氧化亚氮
- sulfur dioxide: 0.084; missing unimportant
  二氧化硫

## Use advice
Users of this data should consider the technological applicability specific to this dataset; for instance, the exclusion of the deinking process when OCC is used as raw material. The advice is to apply this dataset to LCA models where corrugated board is required, especially in cases where waste paper is recycled without deinking. Methodological considerations should also include the downstream life cycle stages of the corrugated board, such as usage and disposal.

## Review details
Inventory: The internal review was done by several iteration steps concerning raw data validation, raw data documentation, representativity, completeness and consistency of modelling with regard to ISO 14040 and 14044.

## Data sources
- 基于生命周期评价的瓦楞原纸
