# Propylene Production ; Propylene ; Methanol to Olefins ; Methanol

Dataset: ILCD process, Unit process, black box
Geography: ZJ-GD-CN
Reference year: 2018
Classification: Unit processes / Materials production / Organic chemicals
Functional unit: A functional unit is defined as 1 ton of propylene product
LCI method principle: Attributional
LCI method approaches: Allocation - mass
Generated by: Yanan Ren, renyn15@tsinghua.org.cn
Owner: Tiangong LCI Data Working Group
Review: Dependent internal review by Tiangong LCI Data Working Group
Amounts: no units in this file; such an amount is in the reference unit of its flow, which a separate flow dataset defines
copyright: false
licenseType: Free of charge for all users and uses

## General comment
ID14 Propylene Production ; Propylene ; Coal to Olefins Route ; Coal ; Subordinate Process 5

## Geography
The case plant of the catalytic cracking route comes from Sinopec Zhanjiang Dongxing Petrochemical Co., Ltd. The company is located in Zhanjiang City, Guangdong Province. Its catalytic cracking olefins process was built in 2018, with an annual production capacity of 116,000 tons of propylene.

## Time period
Craft built in 2018

## Technical purpose
The propylene produced through the catalytic cracking process at Sinopec Zhanjiang Dongxing Petrochemical Co., Ltd. is intended for use in various chemical manufacturing applications. It serves as a fundamental building block in the production of polypropylene plastics, acrylonitrile, propylene oxide, and a myriad of other chemical intermediates and products. Given its production scale, the propylene is suitable for both small-scale specialty uses and large-scale industrial applications.

## Model description
The consumption of raw materials, energy, electricity, steam, water and auxiliary chemicals involved in each sub-stage is considered, and the output considers propylene and by-products (such as C4 products produced by the propane dehydrogenation process. The mass distribution method is used to quantify the products The environmental load between propylene and by-products. In addition, this model also considers the waste discharge of each process. This study focuses on the environmental impact analysis of different propylene production processes. Therefore, the utilization of propylene hydrocarbons and the end-of-life treatment of their products, as well as infrastructure Construction and equipment maintenance are outside the scope of this assessment.

## Reference product
- propene (propylene): 1000; measured
  Acrylic

## Inputs
All rows: measured
- Methanol: 4480
  MTO grade methanol
- Hydrogen: 1.24
  hydrogen
- sodium hydroxide: 30.03
  NaOH solution
- Dimethyl disulfide: 0.12
  dimethyl disulfide
- nitrogen: 266.21
  low pressure nitrogen
- process steam: 5850
  steam
- freshwater: 2860
  fresh water
- Electricity: 1432.58
  electricity

## Outputs
All rows: measured
- ethene (ethylene): 670
  Ethylene
- LPG - liquefied petroleum gas: 30
  liquefied petroleum gas
- C5 Hydrocarbon Mixture: 40
  C5
- gasoline (regular): 60
  gasoline
- carbon dioxide (fossil): 270
  CO2
- carbon monoxide (fossil): 0.02542
  CO
- particles (> PM10): 0.00794
  particulates
- nitrous oxide: 0.13233
  NOx
- Sodium carboxylate: 1.01837
  sodium carboxylate
- chemical oxygen demand: 0.42136
  COD
- biological oxygen demand: 0.15143
  BOD5
- Dissolved solids: 0.02164
  TDS

## Data selection and combination
The detailed input-output data of the propylene production process comes from the company's public environmental impact assessment report, including the input of raw materials and auxiliary materials, energy and resource consumption, and discharge of waste gas, wastewater and solid waste.

## Use advice
Users of this data should consider the precision of the input-output data stemming from the company's public environmental impact assessment when applying this information to their LCA models. Ensure the functional unit of 1 ton of propylene product aligns with the system boundaries of your model, and attention should be given to the exclusion of end-of-life treatment, infrastructure construction, and equipment maintenance phases from the scope of the assessment. Furthermore, the environmental load should be allocated between propylene and by-products using the mass distribution method, acknowledging waste discharges from the process.

## Review details
Inventory: The internal review was done by several iteration steps concerning raw data validation, raw data documentation, representativity, completeness and consistency of modelling with regard to ISO 14040 and 14044.

## Data sources
- 吕琳. 丙烯产品环境负荷及温室气体减排的碳税政策. (大连理工大学, 2022).
