# Aluminum electrolytic capacitor production ; Aluminum electrolytic capacitor (35V 1000uf)

Dataset: ILCD process, Unit process, black box
Geography: NT-JS-CN
Reference year: 2020
Classification: Unit processes / Materials production / Metals and semimetals
Generated by: Jinliang Xie, jinliang.research@gmail.com
Owner: Tiangong LCI Data Working Group
Review: Dependent internal review by Tiangong LCI Data Working Group
Amounts: no units in this file; such an amount is in the reference unit of its flow, which a separate flow dataset defines
copyright: false
licenseType: Free of charge for all users and uses

## General comment
Aluminum electrolytic capacitors, specifically with a rating of 35V and a capacitance of 1000 microfarads (1000uf), are electronic components used for energy storage in electrical circuits. They are widely utilized across various applications including power supply filtering, signal conditioning, and electronic noise filtering in devices ranging from consumer electronics, automotive electronics, industrial machinery, to power electronics systems.

## Time period
Data from research conducted in 2020

## Reference product
- Aluminum Electrolytic Capacitors: 10000; measured
  aluminum electrolytic capacitors (qualified) (10000 pcs)

## Inputs
All rows: measured
- electricity, high voltage, aluminium industry: 4970.09
- electrolyte, KOH, LiOH additive: 115.73
  Electrolyte (soak); The complete composition of electrolyte is 69% main solvent (1,4-butyrolactone), 26% auxiliary solvent (ammonium tetramethylsuccinate), and 5% solute (water). The electrolyte here is assumed to consist of 95% the main solvent and 5% solutes to simplify the analysis of environmental impacts.
- Aluminum ingots(cathode): 59.36
  Al ingots (cathode)
- Aluminum ingots(anode): 106
  Al ingots (anode) ; Al smelting preparation (anode)
- Lead, in ground: 12.91
  Lead from assembly (including sleeving)
- case from assembly (including sleeving): 299.18
- polysulfide, sealing compound: 64.14
  Sealing cover from assembly (including sleeving)
- Sleeve: 17.35
  sleeve from assembly (including sleeving)
- Armature Winding: 12.91
  tab from winding ; 绕组接线片
- sealing tape, aluminium/PE, 50 mm wide: 1.87
  tape from winding
- Separator Paper Coil,Separator Paper Coil: 38.48
  Separator paper coil
- water, deionised: 27291
  deionized water
- tap water: 15274.4
  tape water
- phosphoric acid, industrial grade, without water, in 85% solution state: 28.56
- Perboric acid: 5.19
  perboric acid; HBO3; 过硼酸
- hydrochloric acid, without water, in 30% solution state: 40.19
  HCl (31%)
- Nitrogen: 0.2
  N2 gas (final annealing)
- sodium hydroxide, without water, in 50% solution state: 45.25
  NaOH (30%)
- ammonium nitrate: 0.46
  Ammonium nitrate; 硝酸氢铵; NH4H2PO4
- nitric acid, without water, in 50% solution state: 12.06
  HNO3 (98%)
- Cold Rolling Oil: 3.99
  rolling oil (cold rolling)
- Ammonium Citrate: 10
  Ammonium citrate (formation process); 柠檬酸铵
- Ammonium Pentaborate: 2.74
  Ammonium pentaborate (formation process); 五硼酸铵
- Argon-40: 0.03
  Ar gas (Al smelting preparation)

## Outputs
All rows: measured
- Aluminium Phosphate: 3.68
  Aluminium phosphate (AlPO4) (production of anode formed foil); The environmental impacts from the production stage are all allocated to the capacitors. The by-product AlPO4 in production of anode formed foil is taken as an economical treatment method to address the production waste because of the limited amount and the simplified analysis.
- aluminium scrap, new: 11.35
  Al scraps; The environmental impacts on the specialized recycling processing of the flows are ignored.
- Scraps of Separator Paper: 0.502
  Scraps of separator paper; The environmental impacts on the specialized recycling processing of the flows are ignored.
- Sludge (Sewage Treatment): 3.462
  sludge (Sewage treatment); The environmental impacts on the specialized landfill of the sludge are ignored.
- wastewater, average: 23330.6
  wastewater
- Total Phosphorus (TP): 0.009
  total phosphorous (TP) (production of anode formed foil); 总磷 (污染物);
- total nitrogen: 0.04
  total nitrogen (TN); 总氮 (污染物)
- Suspended solids, unspecified: 0.336
- chemical oxygen demand: 1.008
- Biochemical Oxygen Demand: 0.128
  Biochemical Oxygen Demand (BOD) (Production of Al blank foil); 生化需氧量 (水体污染物)
- ammonia: 0.104
  Ammonia nitrogen (NH3-N)
- Dust: 0.061
  dust (Al smelting preparation)
- Hydrochloric acid: 0.197
- Sulfuric acid: 0.021
- Nitrogen oxides: 0.024
- ammonia: 0.022
- Aluminum Electrolytic Capacitors (Waste): 6281.67
  aluminum electrolytic capacitors (waste) ; The environmental impacts on the specialized recycling processing of the flows are ignored.

## Data selection and combination
The foreground data are from an AECs’ manufacturer and its supplier. The data about the product family and manufacturing processes of capacitor fabrication are from the AECs’ manufacturer in Nantong, Jiangsu, China. The reference year of capacitor fabrication is 2021. Furthermore, through the investigation of the manufacturer’s upstream supplier, the original data of manufacturing processes of blank foil fabrication (anode and cathode), formed foil fabrication, and cathode etched foil fabrication are obtained. The reference year of blank foil fabrication, formed foil fabrication, and cathode etched foil fabrication is 2020. The background data of the substance flows (i.e., aluminum ingots, separator paper, electricity, water) from the primary industries are acquired from the Gabi software (version 10.0.0.71). The LCI data about specialized treating processes of production waste, including capacitors (waste), aluminum scraps, paper scraps, and sludge, are ignored. In the electrolyte, the complete composition of the electrolyte is 69% main solvent (1,4-butyrolactone), 26% auxiliary solvent (ammonium tetramethyl succinate), and 5% solute (water). The electrolyte here is assumed to consist of 95% of the main solvent and 5% solutes to simplify the analysis of environmental impacts due to the missing LCI data. The inaccessible LCI data about 1,4-butyrolactone, ammonium citrate, ammonium pentaborate, NH4H2PO4, and HBO3 are estimated according to chemical equations of the existing substance flows (reactants) in Gabi software. This will underestimate the environmental impact of these substances in actual industrial production to a certain extent. Besides, many chemical reactions need to satisfy various reaction conditions such as pressure, temperature, and catalyst, which will lead to the extra input of energy and raw materials and increase the risk of environmental pollution. If there are side reactions for the desired chemical reaction, it will not only affect the yield of the targeted product of the reaction but also need a suitable subsequent treatment process to separate and purify the product. Due to the limited consumption of these five materials, their influence on the final assessment result is not significant.

## Sampling procedure
Life cycle inventory data are mainly collected from environmental impact assessment report of Zhejiangyuhua aluminum alloy production site in China.

## Use advice
When utilizing the provided Life Cycle Inventory (LCI) data for environmental impact assessment, it is important to note that some specialized treating processes of production waste (i.e., capacitors, aluminum scraps, paper scraps, and sludge) have been excluded. The environmental impact of the substances 1,4-butyrolactone, ammonium citrate, ammonium pentaborate, NH4H2PO4, and HBO3 is potentially underestimated due to estimated LCI data based on chemical equations from the Gabi software. Users must also consider that many chemical reactions involve specific reaction conditions, such as pressure, temperature, and catalysts, which have associated energy and material inputs and could increase the risk of environmental pollution. Furthermore, side reactions should be accounted for as they can affect yields and require subsequent treatment for product separation and purification. Due to their limited usage, the contribution of these five materials to the final assessment result is considered minor, but special attention should be given to the complete composition of the electrolyte in environmental impact analyses.

## Review details
Inventory: The internal review was done by several iteration steps concerning raw data validation, raw data documentation, representativity, completeness and consistency of modelling with regard to ISO 14040 and 14044.

## Data sources
- Zhang, C., Zheng, Y., Huang, H., Liu, Z. & Jing, J. Environmental impact assessment of aluminum electrolytic capacitors in a product family from the manufacturer’s perspective. Int. J. Life Cycle Assess. (2022)
