# Glyphosate ; Iminodiacetonitrile, phosphorus trichloride, paraformaldehyde ; IDA method - iminodiacetonitrile alkaline diglyphosate process + glyphosate synthesis ; All sizes; NESPS2 / 草甘膦 ; 亚氨基二乙腈、三氯化磷、多聚甲醛 ; IDA法——亚氨基二乙腈碱解双甘膦工艺+草甘膦合成 ; 所有规模 ; 全国第二次污染普查数据

Dataset: ILCD process, Unit process, single operation
Geography: CN
Reference year: 2019
Classification: Reference Parameters / Materials production / Organic chemicals
Generated by: The data was created by the Office of the Second National Pollution Source Census of the Ministry of Ecology and Environment, and the data was organized by the TianGong Plan team for ILCD format / 生态环境部第二次全国污染源普查工作办公室创建数据，天工计划团队常慧敏整理数据为ILCD格式
Owner: Tiangong LCI Data Working Group / 天工LCI数据工作小组
Review: Dependent internal review by Tiangong LCI Data Working Group / 天工LCI数据工作小组
Amounts: no units in this file; such an amount is in the reference unit of its flow, which a separate flow dataset defines
copyright: false
licenseType: Free of charge for all users and uses

## General comment
the Technical of end-of-pipe management technology for pollution Exhaust gasis/，Its Technical efficiency of end-of-pipe management0，The formula for calculating the actual operation rate (k-value) of the end-of-pipe treatment facility is /

## Technical purpose
该数据集描述了使用IDA方法生产和处理草甘膦的各种过程。草甘膦是一种广谱除草剂，在农业中用于控制杂草。其生产涉及从亚氨基二乙腈、三氯化磷和多聚甲醛合成草甘膦。数据还详细介绍了旨在处理废水和废气污染的尾端处理技术，包括化学需氧量、氨氮、有机结合氮、总磷和挥发性有机化合物的处理。

## Reference product
- glyphosate: 1000; calculated
  源文件中描述为为草甘膦，此处对其进行了匹配工作，将其匹配到LCAflow库里面相最符合的流，污染物指标备注为工业废水量

## Outputs
All rows: calculated
- Ammonia Nitrogen: 0.00119
  the Technical of end-of-pipe management technology for pollution Ammonia Nitrogenis(2500 others) Incineration，Its Technical efficiency of end-of-pipe management99.9，The formula for calculating the actual operation rate (k-value) of the end-of-pipe treatment facility is /
  污染物指标氨氮的末端治理技术是（2500其他）焚烧，其效率为99.9，末端治理设施实际运行率（k值）计算公式为k=治理设施耗电量（千瓦时）/（治理设施运行时数（小时）*治理设施额定功率(千瓦)）。原文件中描述污染物类别为废水，污染物指标为氨氮，此处对其进行了匹配工作，将其匹配到LCAflow库里面相最符合的流，污染物指标备注为氨氮
- Nitrogen, organic bound: 0.00192
  the Technical of end-of-pipe management technology for pollution Nitrogen, organic boundis(2500 others) Incineration，Its Technical efficiency of end-of-pipe management99.9，The formula for calculating the actual operation rate (k-value) of the end-of-pipe treatment facility is /
  污染物指标总氮的末端治理技术是（2500其他）焚烧，其效率为99.9。原文件中描述污染物类别为废水，污染物指标为总氮，此处对其进行了匹配工作，将其匹配到LCAflow库里面相最符合的流，污染物指标备注为总氮
- volatile organic compound: 2.04
  the Technical of end-of-pipe management technology for pollution volatile organic compoundis(Absorption + diversion) + (adsorption + steam desorption)/(adsorption + nitrogen/air desorption) + photocatalysis，Its Technical efficiency of end-of-pipe management98，The formula for calculating the actual operation rate (k-value) of the end-of-pipe treatment facility is /
  污染物指标挥发性有机物的末端治理技术是（吸收+分流）+（吸附+蒸汽解析）/（吸附+氮气/空气解析）+光催化，其效率为98，末端治理设施实际运行率（k值）计算公式为k=治理设施耗电量（千瓦时）/（治理设施运行时数（小时）*治理设施额定功率(千瓦)）。原文件中描述污染物类别为废气，污染物指标为挥发性有机物，此处对其进行了匹配工作，将其匹配到LCAflow库里面相最符合的流，污染物指标备注为挥发性有机物
- volatile organic compound: 3.06
  the Technical of end-of-pipe management technology for pollution volatile organic compoundisCondensation + (absorption + diversion) + (adsorption + steam desorption)/(adsorption + nitrogen/air desorption)，Its Technical efficiency of end-of-pipe management97，The formula for calculating the actual operation rate (k-value) of the end-of-pipe treatment facility is /
  污染物指标挥发性有机物的末端治理技术是冷凝法+（吸收+分流）+（吸附+蒸汽解析）/（吸附+氮气/空气解析），其效率为97，末端治理设施实际运行率（k值）计算公式为k=治理设施耗电量（千瓦时）/（治理设施运行时数（小时）*治理设施额定功率(千瓦)）。原文件中描述污染物类别为废气，污染物指标为挥发性有机物，此处对其进行了匹配工作，将其匹配到LCAflow库里面相最符合的流，污染物指标备注为挥发性有机物
- phosphorus, total: 0.00476
  the Technical of end-of-pipe management technology for pollution phosphorus, totalis(2500 others) Incineration，Its Technical efficiency of end-of-pipe management99.9，The formula for calculating the actual operation rate (k-value) of the end-of-pipe treatment facility is /
  污染物指标总磷的末端治理技术是（2500其他）焚烧，其效率为99.9，末端治理设施实际运行率（k值）计算公式为k=治理设施耗电量（千瓦时）/（治理设施运行时数（小时）*治理设施额定功率(千瓦)）。原文件中描述污染物类别为废水，污染物指标为总磷，此处对其进行了匹配工作，将其匹配到LCAflow库里面相最符合的流，污染物指标备注为总磷
- Nitrogen, organic bound: 0.0096
  the Technical of end-of-pipe management technology for pollution Nitrogen, organic boundisRedox process + electrolysis + anaerobic hydrolysis + shaped anaerobic reactor + biological filter + A2/O process + chemical precipitation，Its Technical efficiency of end-of-pipe management99.5，The formula for calculating the actual operation rate (k-value) of the end-of-pipe treatment facility is /
  污染物指标总氮的末端治理技术是氧化还原法+电解法+厌氧水解类+定型厌氧反应器类+生物滤池+A2/O工艺+化学沉淀法，其效率为99.5，末端治理设施实际运行率（k值）计算公式为k=治理设施耗电量（千瓦时）/（治理设施运行时数（小时）*治理设施额定功率(千瓦)）。原文件中描述污染物类别为废水，污染物指标为总氮，此处对其进行了匹配工作，将其匹配到LCAflow库里面相最符合的流，污染物指标备注为总氮
- Ammonia Nitrogen: 0.0119
  the Technical of end-of-pipe management technology for pollution Ammonia NitrogenisRedox process + (1700 others) deamination tower + chemical precipitation + A2/O process + chemical precipitation，Its Technical efficiency of end-of-pipe management99，The formula for calculating the actual operation rate (k-value) of the end-of-pipe treatment facility is /
  污染物指标氨氮的末端治理技术是氧化还原法+（1700其他）脱氨塔+化学沉淀法+A2/O工艺+化学沉淀法，其效率为99，末端治理设施实际运行率（k值）计算公式为k=治理设施耗电量（千瓦时）/（治理设施运行时数（小时）*治理设施额定功率(千瓦)）。原文件中描述污染物类别为废水，污染物指标为氨氮，此处对其进行了匹配工作，将其匹配到LCAflow库里面相最符合的流，污染物指标备注为氨氮
- chemical oxygen demand: 0.0238
  the Technical of end-of-pipe management technology for pollution chemical oxygen demandis(2500 others) Incineration，Its Technical efficiency of end-of-pipe management99.9，The formula for calculating the actual operation rate (k-value) of the end-of-pipe treatment facility is /
  污染物指标化学需氧量的末端治理技术是（2500其他）焚烧，其效率为99.9，末端治理设施实际运行率（k值）计算公式为k=治理设施耗电量（千瓦时）/（治理设施运行时数（小时）*治理设施额定功率(千瓦)）。原文件中描述污染物类别为废水，污染物指标为化学需氧量，此处对其进行了匹配工作，将其匹配到LCAflow库里面相最符合的流，污染物指标备注为化学需氧量
- Nitrogen, organic bound: 0.03648
  the Technical of end-of-pipe management technology for pollution Nitrogen, organic boundisShaped anaerobic reactor + biological filter + chemical coagulation + redox process + biofilm process，Its Technical efficiency of end-of-pipe management98.1，The formula for calculating the actual operation rate (k-value) of the end-of-pipe treatment facility is /
  污染物指标总氮的末端治理技术是定型厌氧反应器类+生物滤池+化学混凝法+氧化还原法+生物膜法，其效率为98.1。原文件中描述污染物类别为废水，污染物指标为总氮，此处对其进行了匹配工作，将其匹配到LCAflow库里面相最符合的流，污染物指标备注为总氮
- Waste water: 48000
  the Technical of end-of-pipe management technology for pollution Waste wateris/，Its Technical efficiency of end-of-pipe management0，The formula for calculating the actual operation rate (k-value) of the end-of-pipe treatment facility is /
  污染物指标工业废水量的末端治理技术是/，其效率为0。原文件中描述污染物类别为废水，污染物指标为工业废水量，此处对其进行了匹配工作，将其匹配到LCAflow库里面相最符合的流，污染物指标备注为工业废水量
- Ammonia Nitrogen: 0.0714
  the Technical of end-of-pipe management technology for pollution Ammonia NitrogenisShaped anaerobic reactor + biological filter + chemical coagulation + redox process + biofilm process，Its Technical efficiency of end-of-pipe management94，The formula for calculating the actual operation rate (k-value) of the end-of-pipe treatment facility is /
  污染物指标氨氮的末端治理技术是定型厌氧反应器类+生物滤池+化学混凝法+氧化还原法+生物膜法，其效率为94，末端治理设施实际运行率（k值）计算公式为k=治理设施耗电量（千瓦时）/（治理设施运行时数（小时）*治理设施额定功率(千瓦)）。原文件中描述污染物类别为废水，污染物指标为氨氮，此处对其进行了匹配工作，将其匹配到LCAflow库里面相最符合的流，污染物指标备注为氨氮
- Ammonia Nitrogen: 0.0833
  the Technical of end-of-pipe management technology for pollution Ammonia NitrogenisRedox process + electrolysis + anaerobic hydrolysis + shaped anaerobic reactor + biological filter + A2/O process + chemical precipitation，Its Technical efficiency of end-of-pipe management93，The formula for calculating the actual operation rate (k-value) of the end-of-pipe treatment facility is /
  污染物指标氨氮的末端治理技术是氧化还原法+电解法+厌氧水解类+定型厌氧反应器类+生物滤池+A2/O工艺+化学沉淀法，其效率为93，末端治理设施实际运行率（k值）计算公式为k=治理设施耗电量（千瓦时）/（治理设施运行时数（小时）*治理设施额定功率(千瓦)）。原文件中描述污染物类别为废水，污染物指标为氨氮，此处对其进行了匹配工作，将其匹配到LCAflow库里面相最符合的流，污染物指标备注为氨氮
- chemical oxygen demand: 0.119
  the Technical of end-of-pipe management technology for pollution chemical oxygen demandisRedox process + electrolysis + anaerobic hydrolysis + shaped anaerobic reactor + biological filter + A2/O process + chemical precipitation，Its Technical efficiency of end-of-pipe management99.5，The formula for calculating the actual operation rate (k-value) of the end-of-pipe treatment facility is /
  污染物指标化学需氧量的末端治理技术是氧化还原法+电解法+厌氧水解类+定型厌氧反应器类+生物滤池+A2/O工艺+化学沉淀法，其效率为99.5，末端治理设施实际运行率（k值）计算公式为k=治理设施耗电量（千瓦时）/（治理设施运行时数（小时）*治理设施额定功率(千瓦)）。原文件中描述污染物类别为废水，污染物指标为化学需氧量，此处对其进行了匹配工作，将其匹配到LCAflow库里面相最符合的流，污染物指标备注为化学需氧量
- chemical oxygen demand: 0.1666
  the Technical of end-of-pipe management technology for pollution chemical oxygen demandisShaped anaerobic reactor + biological filter + chemical coagulation + redox process + biofilm process，Its Technical efficiency of end-of-pipe management99.3，The formula for calculating the actual operation rate (k-value) of the end-of-pipe treatment facility is /
  污染物指标化学需氧量的末端治理技术是定型厌氧反应器类+生物滤池+化学混凝法+氧化还原法+生物膜法，其效率为99.3，末端治理设施实际运行率（k值）计算公式为k=治理设施耗电量（千瓦时）/（治理设施运行时数（小时）*治理设施额定功率(千瓦)）。原文件中描述污染物类别为废水，污染物指标为化学需氧量，此处对其进行了匹配工作，将其匹配到LCAflow库里面相最符合的流，污染物指标备注为化学需氧量
- chemical oxygen demand: 0.238
  the Technical of end-of-pipe management technology for pollution chemical oxygen demandisRedox process + (1700 others) deamination tower + chemical precipitation + A2/O process + chemical precipitation，Its Technical efficiency of end-of-pipe management99，The formula for calculating the actual operation rate (k-value) of the end-of-pipe treatment facility is k = operating time of wastewater terminal treatment facilities (hours) / normal production time (hours)
  污染物指标化学需氧量的末端治理技术是氧化还原法+（1700其他）脱氨塔+化学沉淀法+A2/O工艺+化学沉淀法，其效率为99，末端治理设施实际运行率（k值）计算公式为k=治理设施耗电量（千瓦时）/（治理设施运行时数（小时）*治理设施额定功率(千瓦)）。原文件中描述污染物类别为废水，污染物指标为化学需氧量，此处对其进行了匹配工作，将其匹配到LCAflow库里面相最符合的流，污染物指标备注为化学需氧量
- Nitrogen, organic bound: 0.28224
  the Technical of end-of-pipe management technology for pollution Nitrogen, organic boundisRedox process + (1700 others) deamination tower + chemical precipitation + A2/O process + chemical precipitation，Its Technical efficiency of end-of-pipe management85.3，The formula for calculating the actual operation rate (k-value) of the end-of-pipe treatment facility is /
  污染物指标总氮的末端治理技术是氧化还原法+（1700其他）脱氨塔+化学沉淀法+A2/O工艺+化学沉淀法，其效率为85.3。原文件中描述污染物类别为废水，污染物指标为总氮，此处对其进行了匹配工作，将其匹配到LCAflow库里面相最符合的流，污染物指标备注为总氮
- phosphorus, total: 0.2856
  the Technical of end-of-pipe management technology for pollution phosphorus, totalisRedox process + (1700 others) deamination tower + chemical precipitation + A2/O process + chemical precipitation，Its Technical efficiency of end-of-pipe management94，The formula for calculating the actual operation rate (k-value) of the end-of-pipe treatment facility is /
  污染物指标总磷的末端治理技术是氧化还原法+（1700其他）脱氨塔+化学沉淀法+A2/O工艺+化学沉淀法，其效率为94，末端治理设施实际运行率（k值）计算公式为k=治理设施耗电量（千瓦时）/（治理设施运行时数（小时）*治理设施额定功率(千瓦)）。原文件中描述污染物类别为废水，污染物指标为总磷，此处对其进行了匹配工作，将其匹配到LCAflow库里面相最符合的流，污染物指标备注为总磷
- phosphorus, total: 0.4284
  the Technical of end-of-pipe management technology for pollution phosphorus, totalisRedox process + electrolysis + anaerobic hydrolysis + shaped anaerobic reactor + biological filter + A2/O process + chemical precipitation，Its Technical efficiency of end-of-pipe management91，The formula for calculating the actual operation rate (k-value) of the end-of-pipe treatment facility is /
  污染物指标总磷的末端治理技术是氧化还原法+电解法+厌氧水解类+定型厌氧反应器类+生物滤池+A3/O工艺+化学沉淀法，其效率为91，末端治理设施实际运行率（k值）计算公式为k=治理设施耗电量（千瓦时）/（治理设施运行时数（小时）*治理设施额定功率(千瓦)）。原文件中描述污染物类别为废水，污染物指标为总磷，此处对其进行了匹配工作，将其匹配到LCAflow库里面相最符合的流，污染物指标备注为总磷
- phosphorus, total: 0.8092
  the Technical of end-of-pipe management technology for pollution phosphorus, totalisShaped anaerobic reactor + biological filter + chemical coagulation + redox process + biofilm process，Its Technical efficiency of end-of-pipe management83，The formula for calculating the actual operation rate (k-value) of the end-of-pipe treatment facility is /
  污染物指标总磷的末端治理技术是定型厌氧反应器类+生物滤池+化学混凝法+氧化还原法+生物膜法，其效率为83，末端治理设施实际运行率（k值）计算公式为k=治理设施耗电量（千瓦时）/（治理设施运行时数（小时）*治理设施额定功率(千瓦)）。原文件中描述污染物类别为废水，污染物指标为总磷，此处对其进行了匹配工作，将其匹配到LCAflow库里面相最符合的流，污染物指标备注为总磷
- Exhaust gas: 9830
  the Technical of end-of-pipe management technology for pollution Exhaust gasis/，Its Technical efficiency of end-of-pipe management0，The formula for calculating the actual operation rate (k-value) of the end-of-pipe treatment facility is /
  污染物指标工业废气量的末端治理技术是/，其效率为0。原文件中描述污染物类别为废气，污染物指标为工业废气量，此处对其进行了匹配工作，将其匹配到LCAflow库里面相最符合的流，污染物指标备注为工业废气量

## Use advice
This dataset is derived from the Pollution Source Census Report and contains information on pollution emissions and related products. However, it does not include data on energy or chemical consumption, nor does it provide information on waste or co-product generation. When utilizing this dataset, please supplement the missing data based on actual conditions before use
该数据集来源于污染源普查报告，包含污染物排放及相关产品信息，但不包含能源或化学品消耗数据，也不提供废弃物或共生产物产生信息。在使用该数据集时，请根据实际情况补充缺失数据后再使用。

## Review details
Inventory: The internal review was done by several iteration steps concerning raw data validation, raw data documentation, representativity, completeness and consistency of modelling with regard to ISO 14040 and 14044.
清单： 内部审查通过几个迭代步骤完成，涉及原始数据验证、原始数据记录、代表性、完整性、与 ISO 14040 和 14044 有关的建模的一致性。

## Data sources
- 第二次全国污染源普查产排污核算系数手册（试用版）,二级代码26,三级代码263.0文件，在完整版文件中第2935页
