# Painting/painting ; Lacquer Crafts ; Oil-based paint ; Painting/painting ; All sizes; NESPS2 / 刷漆/喷漆 ; 漆器工艺品 ; 油性漆料 ; 刷漆/喷漆 ; 所有规模 ; 全国第二次污染普查数据

Dataset: ILCD process, Unit process, single operation
Geography: CN
Reference year: 2019
Classification: Reference Parameters / Systems / Paints and chemical preparations
Generated by: The data was created by the Office of the Second National Pollution Source Census of the Ministry of Ecology and Environment, and the data was organized by the TianGong Plan team for ILCD format / 生态环境部第二次全国污染源普查工作办公室创建数据，天工计划团队常慧敏整理数据为ILCD格式
Owner: Tiangong LCI Data Working Group / 天工LCI数据工作小组
Review: Dependent internal review by Tiangong LCI Data Working Group / 天工LCI数据工作小组
Amounts: no units in this file; such an amount is in the reference unit of its flow, which a separate flow dataset defines
copyright: false
licenseType: Free of charge for all users and uses

## General comment
the Technical of end-of-pipe management technology for pollution Exhaust gasis/，The formula for calculating the actual operation rate (k-value) of the end-of-pipe treatment facility is k = annual operating hours of dust removal facilities / annual operating hours of hot blast stove

## Technical purpose
上述工业流程用于各种尺寸漆器工艺品上的油性漆涂装，采用喷漆或刷漆技术。适用于各种规模的生产，从小型工艺作坊到大型生产设施。该流程包括用于控制废气和挥发性有机化合物（VOCs）污染的末端治理技术，采用了光催化、活性炭吸附、光解和直接排放等方法来处理排放物。

## Reference product
- Paint: 1000; input; calculated
  源文件中描述为为油性漆料，此处对其进行了匹配工作，将其匹配到LCAflow库里面相最符合的流，污染物类别备注为①2431雕塑工艺品、2432金属工艺品、2434花画工艺品、2435天然植物纤维编织工艺品、2438珠宝首饰及有关物品、2439其他工艺美术及礼仪用品的生产过程中，如果包含刷漆/喷漆工艺，废气指标可所使用的漆料类别（油性漆料、水性漆料和天然生漆三种）参考本系数。，污染物指标备注为工业废气量

## Outputs
All rows: calculated
- volatile organic compound: 119.6
  the Technical of end-of-pipe management technology for pollution volatile organic compoundisPhotocatalysis + activated carbon adsorption，Its Technical efficiency of end-of-pipe management80，The formula for calculating the actual operation rate (k-value) of the end-of-pipe treatment facility is k = annual operating hours of desulfurization facilities / annual operating hours of hot blast stove
  污染物指标挥发性有机物的末端治理技术是光催化+活性炭吸附，其效率为80，末端治理设施实际运行率（k值）计算公式为k=废气治理设施运行时间（小时/年）/废气产污核算环节正常生产（小时/年）。原文件中描述污染物类别为废气，污染物指标为挥发性有机物，此处对其进行了匹配工作，将其匹配到LCAflow库里面相最符合的流，污染物类别备注为①2431雕塑工艺品、2432金属工艺品、2434花画工艺品、2435天然植物纤维编织工艺品、2438珠宝首饰及有关物品、2440其他工艺美术及礼仪用品的生产过程中，如果包含刷漆/喷漆工艺，废气指标可所使用的漆料类别（油性漆料、水性漆料和天然生漆三种）参考本系数。，污染物指标备注为挥发性有机物，产污系数备注为①2431雕塑工艺品、2432金属工艺品、2434花画工艺品、2435天然植物纤维编织工艺品、2438珠宝首饰及有关物品、2439其他工艺美术及礼仪用品的生产过程中，如果包含刷漆/喷漆工艺，废气指标可所使用的漆料类别（油性漆料、水性漆料和天然生漆三种）参考本系数。
- volatile organic compound: 179.4
  the Technical of end-of-pipe management technology for pollution volatile organic compoundisActivated carbon adsorption，Its Technical efficiency of end-of-pipe management70
  污染物指标挥发性有机物的末端治理技术是活性炭吸附，其效率为70，末端治理设施实际运行率（k值）计算公式为k=废气治理设施运行时间（小时/年）/废气产污核算环节正常生产（小时/年）。原文件中描述污染物类别为废气，污染物指标为挥发性有机物，此处对其进行了匹配工作，将其匹配到LCAflow库里面相最符合的流，污染物类别备注为①2431雕塑工艺品、2432金属工艺品、2434花画工艺品、2435天然植物纤维编织工艺品、2438珠宝首饰及有关物品、2443其他工艺美术及礼仪用品的生产过程中，如果包含刷漆/喷漆工艺，废气指标可所使用的漆料类别（油性漆料、水性漆料和天然生漆三种）参考本系数。，污染物指标备注为挥发性有机物，产污系数备注为①2431雕塑工艺品、2432金属工艺品、2434花画工艺品、2435天然植物纤维编织工艺品、2438珠宝首饰及有关物品、2439其他工艺美术及礼仪用品的生产过程中，如果包含刷漆/喷漆工艺，废气指标可所使用的漆料类别（油性漆料、水性漆料和天然生漆三种）参考本系数。
- volatile organic compound: 358.8
  the Technical of end-of-pipe management technology for pollution volatile organic compoundisPhotocatalysis，Its Technical efficiency of end-of-pipe management40
  污染物指标挥发性有机物的末端治理技术是光催化，其效率为40，末端治理设施实际运行率（k值）计算公式为k=废气治理设施运行时间（小时/年）/废气产污核算环节正常生产（小时/年）。原文件中描述污染物类别为废气，污染物指标为挥发性有机物，此处对其进行了匹配工作，将其匹配到LCAflow库里面相最符合的流，污染物类别备注为①2431雕塑工艺品、2432金属工艺品、2434花画工艺品、2435天然植物纤维编织工艺品、2438珠宝首饰及有关物品、2442其他工艺美术及礼仪用品的生产过程中，如果包含刷漆/喷漆工艺，废气指标可所使用的漆料类别（油性漆料、水性漆料和天然生漆三种）参考本系数。，污染物指标备注为挥发性有机物，产污系数备注为①2431雕塑工艺品、2432金属工艺品、2434花画工艺品、2435天然植物纤维编织工艺品、2438珠宝首饰及有关物品、2439其他工艺美术及礼仪用品的生产过程中，如果包含刷漆/喷漆工艺，废气指标可所使用的漆料类别（油性漆料、水性漆料和天然生漆三种）参考本系数。
- volatile organic compound: 358.8
  the Technical of end-of-pipe management technology for pollution volatile organic compoundisPhotolysis，Its Technical efficiency of end-of-pipe management40，The formula for calculating the actual operation rate (k-value) of the end-of-pipe treatment facility is k = annual operating hours of desulfurization facilities / annual operating hours of hot blast stove
  污染物指标挥发性有机物的末端治理技术是光解，其效率为40，末端治理设施实际运行率（k值）计算公式为k=废气治理设施运行时间（小时/年）/废气产污核算环节正常生产（小时/年）。原文件中描述污染物类别为废气，污染物指标为挥发性有机物，此处对其进行了匹配工作，将其匹配到LCAflow库里面相最符合的流，污染物类别备注为①2431雕塑工艺品、2432金属工艺品、2434花画工艺品、2435天然植物纤维编织工艺品、2438珠宝首饰及有关物品、2441其他工艺美术及礼仪用品的生产过程中，如果包含刷漆/喷漆工艺，废气指标可所使用的漆料类别（油性漆料、水性漆料和天然生漆三种）参考本系数。，污染物指标备注为挥发性有机物，产污系数备注为①2431雕塑工艺品、2432金属工艺品、2434花画工艺品、2435天然植物纤维编织工艺品、2438珠宝首饰及有关物品、2439其他工艺美术及礼仪用品的生产过程中，如果包含刷漆/喷漆工艺，废气指标可所使用的漆料类别（油性漆料、水性漆料和天然生漆三种）参考本系数。
- volatile organic compound: 598
  the Technical of end-of-pipe management technology for pollution volatile organic compoundisDirect discharge，Its Technical efficiency of end-of-pipe management0
  污染物指标挥发性有机物的末端治理技术是直排，其效率为0，末端治理设施实际运行率（k值）计算公式为k=废气治理设施运行时间（小时/年）/废气产污核算环节正常生产（小时/年）。原文件中描述污染物类别为废气，污染物指标为挥发性有机物，此处对其进行了匹配工作，将其匹配到LCAflow库里面相最符合的流，污染物类别备注为①2431雕塑工艺品、2432金属工艺品、2434花画工艺品、2435天然植物纤维编织工艺品、2438珠宝首饰及有关物品、2444其他工艺美术及礼仪用品的生产过程中，如果包含刷漆/喷漆工艺，废气指标可所使用的漆料类别（油性漆料、水性漆料和天然生漆三种）参考本系数。，污染物指标备注为挥发性有机物，产污系数备注为①2431雕塑工艺品、2432金属工艺品、2434花画工艺品、2435天然植物纤维编织工艺品、2438珠宝首饰及有关物品、2439其他工艺美术及礼仪用品的生产过程中，如果包含刷漆/喷漆工艺，废气指标可所使用的漆料类别（油性漆料、水性漆料和天然生漆三种）参考本系数。
- Exhaust gas: 753000
  the Technical of end-of-pipe management technology for pollution Exhaust gasis/，The formula for calculating the actual operation rate (k-value) of the end-of-pipe treatment facility is k = annual operating hours of dust removal facilities / annual operating hours of hot blast stove
  污染物指标工业废气量的末端治理技术是/，末端治理设施实际运行率（k值）计算公式为/。原文件中描述污染物类别为废气，污染物指标为工业废气量，此处对其进行了匹配工作，将其匹配到LCAflow库里面相最符合的流，污染物类别备注为①2431雕塑工艺品、2432金属工艺品、2434花画工艺品、2435天然植物纤维编织工艺品、2438珠宝首饰及有关物品、2439其他工艺美术及礼仪用品的生产过程中，如果包含刷漆/喷漆工艺，废气指标可所使用的漆料类别（油性漆料、水性漆料和天然生漆三种）参考本系数。，污染物指标备注为工业废气量

## Use advice
This dataset is derived from the Pollution Source Census Report and contains information on pollution emissions and related products. However, it does not include data on energy or chemical consumption, nor does it provide information on waste or co-product generation. When utilizing this dataset, please supplement the missing data based on actual conditions before use
该数据集来源于污染源普查报告，包含污染物排放及相关产品信息，但不包含能源或化学品消耗数据，也不提供废弃物或共生产物产生信息。在使用该数据集时，请根据实际情况补充缺失数据后再使用。

## Review details
Inventory: The internal review was done by several iteration steps concerning raw data validation, raw data documentation, representativity, completeness and consistency of modelling with regard to ISO 14040 and 14044.
清单： 内部审查通过几个迭代步骤完成，涉及原始数据验证、原始数据记录、代表性、完整性、与 ISO 14040 和 14044 有关的建模的一致性。

## Data sources
- 第二次全国污染源普查产排污核算系数手册（试用版）,二级代码24,四级代码2433文件，在完整版文件中第2843页
