# Dismantling ; Waste PV modules ; Manual disassembly; Remelting of glass ; broken glass ; High temperature remelting; Heat treatment photovoltaic cells ; Photovoltaic cells ; Heat treatment methods; EVA separation; anaerobicthermal decomposition in inert gas； Metal extraction ; aluminum, steel, copper, silver, and SoG-Si ; Acid leaching, extraction, and thermal decomposition

Dataset: ILCD process, Unit process, black box
Geography: CN
Classification: Unit processes / End-of-life treatment / Material recycling
Generated by: Nan Wang, 1209824595@qq.com
Owner: Tiangong LCI Data Working Group
Review: Dependent internal review by Tiangong LCI Data Working Group
Amounts: no units in this file; such an amount is in the reference unit of its flow, which a separate flow dataset defines
copyright: false
licenseType: Free of charge for all users and uses

## General comment
From the perspective of more mainstream recycling, PV systems are generally disassembled first. The disassembling stage mainly consumes electricity. The decommissioned BOS produces scrap metal materials in this stage. PV modules are disassembled into large aluminum alloy pieces, broken glass, broken PV cells, and other waste materials. The broken glass needs to be remelted at high temperatures. The heat treatment method is used in the recycling of the PV cell. The EVA is completely separated from the cell by anaerobicthermal decomposition in inert gas. After a variety of chemical treatments, including acid leaching, extraction, and thermal decomposition, the materials including aluminum, steel, copper, silver, and SoG-Si can be directly put into manufacturing. Other waste materials are generally directly incinerated or landfilled.

## Technical purpose
The described industrial process pertains to the recycling of waste photovoltaic (PV) modules. The materials recovered through this process, such as aluminum, steel, copper, silver, and silicon, are utilized to fabricate new products, thereby serving as secondary raw materials in their respective industries. The glass remelted at high temperatures is used to produce new glass products, and the treated PV cells can be reintegrated into the manufacture of new photovoltaic modules or other electronics. The process supports the sustainable use of resources in the solar power industry.

## Reference product
- PV Module Waste: 1; input; uniform; estimated

## Inputs
- Electricity: 248516; software or database

## Outputs
All rows: software or database
- Lead Acid Battery: 57420
  Lead acid battery
- Solar grade multi-Si: 4164.94
- Glass for recovery (shards): 75601; uniform
- copper: 3146.43
- aluminium: 35650; uniform
- silver: 44.48
- Steel,Steel: 53200; uniform
  Steel

## Use advice
When utilizing the dataset involving the described processes, attention should be given to the precise methodological considerations of each recycling stage. Users must ensure to properly account for energy consumption during disassembly and raw material recovery efficiency. Include relevant allocation procedures for multi-output processes when applicable. Additionally, identify and include the environmental impacts of waste materials treatment, such as incineration or landfilling. Consider temporal and geographical applicability regarding the technological development and local recycling capabilities.

## Review details
Inventory: The internal review was done by several iteration steps concerning raw data validation, raw data documentation, representativity, completeness and consistency of modelling with regard to ISO 14040 and 14044.

## Data sources
- Shen, Z. et al. A life cycle assessment of Hydropower-Silicon-Photovoltaic industrial chain in China. Journal of Cleaner Production 362, 132411 (2022).
