# Sediment remediation ; ex-situ remediation ; ex-situ thermal analysis ; engineering implementation ; sediment transportation

Dataset: ILCD process, Unit process, single operation
Geography: CN
Classification: Other Services / Repair and maintenance
Generated by: Wang Feng, wangfeng@caep.org.cn
Owner: Tiangong LCI Data Working Group
Review: Dependent internal review by Tiangong LCI Data Working Group
Amounts: no units in this file; such an amount is in the reference unit of its flow, which a separate flow dataset defines
copyright: false
licenseType: Free of charge for all users and uses

## General comment
In order to treat 1 t of sediment as a functional unit, a truck with a capacity of 5 t was used in the transportation section, and the transportation distance was 2 km.

## Technology and included processes
The transportation link adopts a 5 t truck with a transportation distance of 2 km.

## Technical purpose
The industrial process described is related to the remediation of contaminated sediments using ex situ thermal desorption technology. Specifically, this dataset can represent the transportation of 1 tonne of sludge over a distance of 2 kilometers using a 5-tonne truck, followed by the drying step using a hollow paddle drying machine with a power rating of 55 kW. The drying system has a capacity of 50 tonnes per day, operating around the clock. The thermal desorption step is carried out in a tubular furnace rated at 4 kW (1.4 kW when idle), and includes pre-treatment with nitrogen gas for 2 to 3 minutes to ensure an oxygen-free environment. The process achieves a final temperature of 350°C. Resulting gases from thermal desorption are first cooled; the condensate primarily consists of bio-oil with a high calorific value that can be recovered and reused. This data set pertains to a single unit process within the wider context of sediment remediation.

## Reference product
- sediment: 1000

## Inputs
- Oils, unspecified: 8e-5; calculated

## Outputs
- nitrogen dioxide: 0.0049; calculated
- carbon dioxide: 1.08; calculated
- sulfur dioxide: 1.3; calculated

## Use advice
When utilizing this dataset, users should pay special attention to the scope of the described process since it is intended for a specific scenario of sediment remediation. The dataset might not be applicable for other types of waste material or different environmental conditions. Interpretation of the results should consider the technological applicability, such as the scale of operation and the specific type of equipment used. Additionally, users should take into account the energy consumption details provided for both the drying and thermal desorption steps, as well as the recovery potential of the by-product, which in this case is bio-oil with a high calorific value.

## Review details
Inventory: The internal review was done by several iteration steps concerning raw data validation, raw data documentation, representativity, completeness and consistency of modelling with regard to ISO 14040 and 14044.

## Data sources
- 王久兵.污泥热解反应机制及其能源化工艺的全生命周期评价研究[D].浙江工业大学,2016.
