# Air stripping unit ; Groundwater pump and treatment

Dataset: ILCD process, Unit process, single operation
Geography: UM
Reference year: 2009
Classification: Unit processes / Other Services / Repair and maintenance
Generated by: Yang Xintong, yangxt@caep.org.cn
Owner: Tiangong LCI Data Working Group
Review: Dependent internal review by Tiangong LCI Data Working Group
Amounts: no units in this file; such an amount is in the reference unit of its flow, which a separate flow dataset defines
copyright: false
licenseType: Free of charge for all users and uses

## General comment
PTS removes the contaminated groundwater by pumping and use of aboveground treatment facilities. A PTS provides quick initial reductions in contaminant concentrations, but often results in a slow, steady reduction for the long-term.

## Geography
The case study was conducted using publicly available design documents for two remediation strategies designed by Battelle for Dover Air Force Base (AFB) in Dover, DE

## Technology and included processes
The PTS was modeled with five subsystems: extraction wells, air-stripping unit (ASU), catalytic oxidation unit (COU), granular activated carbon (GAC) unit, and treatment facilities.The model COU was modeled as a fixed bed reactor made out of aluminum and steel, with catalyst, and electric heaters.

## Technical purpose
The catalytic oxidation unit is typically implemented for the treatment of contaminated groundwater at industrial and military sites, such as the remediation strategy designed for Dover Air Force Base. It is utilized for reducing pollutants in groundwater to address environmental contamination issues. The unit, when combined with air stripping, granular activated carbon treatment, and other treatment facilities, forms a comprehensive groundwater pump and treatment system (PTS) that offers initial quick reductions and long-term steady contaminant concentration decreases.

## Reference product
- Air stripping unit: 1; measured

## Inputs
- Aluminium and aluminium alloy products: 110; measured
  Air Stripping Unit Aluminum
- Polyethylene,Polyethylene: 330; measured
  Air Stripping Unit HDPE
- Steel: 50; measured
  Air Stripping Unit Steel (Blower)

## Use advice
When using the LCA data set for the catalytic oxidation unit process, ensure you account for the system boundaries and any limitations in the data set such as omitted inputs or emissions. Consider augmenting the LCA with additional inputs and outputs from literature or calculations based on fundamental principles where data gaps are identified. Caution should be taken to only apply this data in the context of similar environmental remediation scenarios where groundwater contamination is addressed using a pump and treatment strategy. The technological applicability of the data is specific to groundwater remediation processes with elements similar to those described in the Dover AFB case study.

## Review details
Inventory: The internal review was done by several iteration steps concerning raw data validation, raw data documentation, representativity, completeness and consistency of modelling with regard to ISO 14040 and 14044.

## Data sources
- Life-Cycle Case Study Comparison of Permeable Reactive Barrier versus Pump-and-Treat Remediation
