# SVE system ; Soil in-situ remediation ; SVE system assembly

Dataset: ILCD process, Unit process, single operation
Geography: KR
Reference year: 2011
Classification: Unit processes / Other Services / Repair and maintenance
Generated by: Zhang Jianbin, zhangjb@caep.org.cn
Owner: Tiangong LCI Data Working Group
Review: Dependent internal review by Tiangong LCI Data Working Group
Amounts: no units in this file; such an amount is in the reference unit of its flow, which a separate flow dataset defines
copyright: false
licenseType: Free of charge for all users and uses

## General comment
- Flexible polyurethane hose 340 m - Sand 4 m3 , Concrete 5 m3 - Welding, gas 100 m

## Technology and included processes
1 extraction well and 2 monitoring wells Already manufactured SVE commercial system (ex_x0002_traction+oil and water separator+off gas treatment) applied on the site

## Technical purpose
The SVE (Soil Vapor Extraction) system described is used for in-situ remediation of contaminated soil areas. With a stated coverage of 200 m2 and a remediation depth of 5 m, it is particularly applicable to industrial sites with volatile organic compounds (VOCs) contamination. The system facilitates the onsite purification process by applying vacuum pressure through extraction wells to volatilize and remove contaminants from the soil. The commercial SVE system includes an extraction well and two monitoring wells, plus integrated oil and water separation and off-gas treatment facilities.

## Reference product
- SVE system: 1; measured

## Inputs
- Flexible Polyurethane Hose: 340; measured
- sand: 4; measured
- Concrete: 5; measured
- CO2 Welding, Laser Beam Welding, Flux-cored Arc Welding, Gas Metal Arc Welding: 100; measured
- Equipment and Materials Arriving on Site: 44800
  文中给出修复工程总的材料使用量为99.8吨，此处44.8吨为填报人根据经验估算得到的结果。SVE处理系统包括提取+油水分离器+尾气处理各部分。

## Use advice
When utilizing the LCA data for this SVE system, ensure inclusion of all primary raw materials and energy consumption as per the input-output stream noted in the description. The data set is specifically tailored for the described system and use case; any deviation in application size, depth, or additional processes should be accounted for separately. Consider the locally available technology and infrastructure capabilities when modeling use phase behavior. Methodological advice includes accounting for potential recycling of materials such as the polyurethane hose, sand, and concrete. Ensure adherence to the technological applicability of the off-gas treatment and any regulatory compliance specific to the region where the system is applied.

## Review details
Inventory: The internal review was done by several iteration steps concerning raw data validation, raw data documentation, representativity, completeness and consistency of modelling with regard to ISO 14040 and 14044.

## Data sources
- Jeong, S.-W. & Suh, S.-W. Assessment of Environmental Impacts and CO 2 Emissions from Soil Remediation Technologies using Life Cycle Assessment - Case Studies on SVE and Biopile Systems -. Journal of Korean Society of Environmental Engineers 33, 267–274 (2011).
