# Soil remediation;In-situ;In-situ Chemical Oxidation;Injection of oxidizing agents;Sodium persulfate;

Dataset: ILCD process, Unit process, single operation
Geography: CN
Reference year: 2021
Classification: Unit processes / Other Services / Repair and maintenance
Generated by: Wang Yipeng, wangyp@caep.org.cn
Owner: Tiangong LCI Data Working Group
Review: Dependent internal review by Tiangong LCI Data Working Group
Amounts: no units in this file; such an amount is in the reference unit of its flow, which a separate flow dataset defines
copyright: false
licenseType: Free of charge for all users and uses

## General comment
Injection of oxidizing agents

## Technology and included processes
Based on 17.6 kg of sodium persulfate per ton of contaminated soil.

## Technical purpose
The industrial process described is intended for the in-situ chemical oxidation (ISCO) soil remediation. It is an environmental engineering technique used to treat and decontaminate soil in place by injecting oxidizing agents, in this case, sodium persulfate. This method is utilized to break down soil contaminants such as hydrocarbons, chlorinated compounds, and certain inorganic substances without excavating the soil. It is particularly applicable for polluted industrial or commercial lands, where in-situ treatment is preferred due to lower disruption and cost compared to excavation and off-site treatment.

## Reference product
- A device for configuring solid pharmaceuticals into liquid pharmaceuticals: 1; measured

## Inputs
- Stainless Steel: 100; measured
- Electricity: 1884.6; measured
- Sodium persulfate: 17.568; measured
- sulphuric acid: 0.5; measured

## Outputs
- sulfate: 4.7; measured
- Nitrogen oxides: 1.25; measured
- sulfur dioxide: 0.1; measured
- carbon dioxide (fossil): 121.2; measured

## Use advice
When using this data set for Life Cycle Assessment (LCA), it is important to ensure the methodological consistency with other data sets within your study. For instance, make certain that the unit processes, measured in kg of sodium persulfate per ton of contaminated soil, align with the functional unit and reference flows of your project. Furthermore, the energy consumption data included should be accounted for in the environmental impact assessment. Consider any site-specific conditions that may affect the efficacy of the in-situ oxidation, such as soil composition and contaminant distribution. If recycling or reuse of treated soil is planned, include it in the system boundaries of the LCA accordingly. Pay attention to the geographic and technological representativeness of the data to ensure its applicability to your scenario.

## Review details
Inventory: The internal review was done by several iteration steps concerning raw data validation, raw data documentation, representativity, completeness and consistency of modelling with regard to ISO 14040 and 14044.

## Data sources
- 王顺扬. 基于多目标决策方法改进LCA的污染场地修复技术比选研究.山西大学（硕士论文）,2021.
