# Electricity/electrical energy + heat energy ; Coal ; Pulverized coal boiler ; 35~74 MW; NESPS2 / 电能/电能+热能 ; 煤炭 ; 煤粉锅炉 ; 35～74兆瓦 ; 全国第二次污染普查数据

Dataset: ILCD process, Unit process, single operation
Geography: CN
Reference year: 2019
Classification: Reference Parameters / Energy carriers and technologies / Electricity
Generated by: The data was created by the Office of the Second National Pollution Source Census of the Ministry of Ecology and Environment, and the data was organized by the TianGong Plan team for ILCD format / 生态环境部第二次全国污染源普查工作办公室创建数据，天工计划团队常慧敏整理数据为ILCD格式
Owner: Tiangong LCI Data Working Group / 天工LCI数据工作小组
Review: Dependent internal review by Tiangong LCI Data Working Group / 天工LCI数据工作小组
Amounts: no units in this file; such an amount is in the reference unit of its flow, which a separate flow dataset defines
copyright: false
licenseType: Free of charge for all users and uses

## General comment
the Technical of end-of-pipe management technology for pollution sulfur dioxideisSeawater desulfurization process，Its Technical efficiency of end-of-pipe management1.7143Sar+93.71

## Technical purpose
所描述的工业过程包括一个35到74兆瓦输出范围的煤粉锅炉系统，用于电力和热能的产生。这些数据与运行和评估中到大型电力及热能生产设施相关，特别是在煤炭是主要燃料来源的情况下。数据集中提到的末端处理技术包括电除尘、电袋复合除尘器、布袋过滤器、这些技术的高效型号，以及与湿式脱硫协同和湿式静电除尘器的组合，用于控制颗粒物(PM2.5 - PM10)。此外，还描述了几种用于控制二氧化硫的脱硫方法，包括石灰石/石膏法、海水脱硫工艺、氨法等。还详细说明了氮氧化物和汞污染控制的技术，尤其是选择性催化还原(SCR)和协同汞去除方法的各种实施。

## Reference product
- Coal: 1000; input; calculated
  源文件中描述为为煤炭，此处对其进行了匹配工作，将其匹配到LCAflow库里面相最符合的流，污染物指标备注为颗粒物

## Outputs
All rows: calculated
- volatile organic compound: 0
  the Technical of end-of-pipe management technology for pollution volatile organic compoundis/
  污染物指标挥发性有机物的末端治理技术是/。原文件中描述污染物类别为废气，污染物指标为挥发性有机物，此处对其进行了匹配工作，将其匹配到LCAflow库里面相最符合的流，污染物指标备注为挥发性有机物
- Nitrogen oxides: 0.396
  the Technical of end-of-pipe management technology for pollution Nitrogen oxidesisHigh-efficiency SCR③，Its Technical efficiency of end-of-pipe management80
  污染物指标氮氧化物（低氮燃烧法-SNCR，煤炭干燥无灰基挥发分>37%）的末端治理技术是高效选择性催化还原法（SCR）③，其效率为80，末端治理设施实际运行率（k值）计算公式为脱硝设施年实际运行小时数/机组年实际运行小时数，③高效氮氧化物末端治理技术：采取高效低氮燃烧技术、增设脱硝催化剂层数等措施，满足《燃煤电厂超低排放烟气治理工程技术规范》（HJ2053-2066）相关
  要求。。原文件中描述污染物类别为废气，污染物指标为氮氧化物（低氮燃烧法-SNCR，煤炭干燥无灰基挥发分>37%），此处对其进行了匹配工作，将其匹配到LCAflow库里面相最符合的流，污染物指标备注为氮氧化物（低氮燃烧法-SNCR，煤炭干燥无灰基挥发分>37%）
- Nitrogen oxides: 0.417
  the Technical of end-of-pipe management technology for pollution Nitrogen oxidesisHigh-efficiency SCR③，Its Technical efficiency of end-of-pipe management85
  污染物指标氮氧化物（低氮燃烧法-SNCR，10%小于煤炭干燥无灰基挥发分小于等于20%）的末端治理技术是高效选择性催化还原法（SCR）③，其效率为85，末端治理设施实际运行率（k值）计算公式为脱硝设施年实际运行小时数/机组年实际运行小时数，③高效氮氧化物末端治理技术：采取高效低氮燃烧技术、增设脱硝催化剂层数等措施，满足《燃煤电厂超低排放烟气治理工程技术规范》（HJ2053-2064）相关
  要求。。原文件中描述污染物类别为废气，污染物指标为氮氧化物（低氮燃烧法-SNCR，10%小于煤炭干燥无灰基挥发分小于等于20%），此处对其进行了匹配工作，将其匹配到LCAflow库里面相最符合的流，污染物指标备注为氮氧化物（低氮燃烧法-SNCR，10%小于煤炭干燥无灰基挥发分小于等于20%）
- Nitrogen oxides: 0.4294
  the Technical of end-of-pipe management technology for pollution Nitrogen oxidesisHigh-efficiency SCR③，Its Technical efficiency of end-of-pipe management81
  污染物指标氮氧化物（低氮燃烧法-SNCR，20%小于煤炭干燥无灰基挥发分小于等于37%）的末端治理技术是高效选择性催化还原法（SCR）③，其效率为81，末端治理设施实际运行率（k值）计算公式为脱硝设施年实际运行小时数/机组年实际运行小时数，③高效氮氧化物末端治理技术：采取高效低氮燃烧技术、增设脱硝催化剂层数等措施，满足《燃煤电厂超低排放烟气治理工程技术规范》（HJ2053-2065）相关
  要求。。原文件中描述污染物类别为废气，污染物指标为氮氧化物（低氮燃烧法-SNCR，20%小于煤炭干燥无灰基挥发分小于等于37%），此处对其进行了匹配工作，将其匹配到LCAflow库里面相最符合的流，污染物指标备注为氮氧化物（低氮燃烧法-SNCR，20%小于煤炭干燥无灰基挥发分小于等于37%）
- Nitrogen oxides: 0.48
  the Technical of end-of-pipe management technology for pollution Nitrogen oxidesisHigh-efficiency SCR③，Its Technical efficiency of end-of-pipe management85
  污染物指标氮氧化物（低氮燃烧法，20%小于煤炭干燥无灰基挥发分小于等于37%）的末端治理技术是高效选择性催化还原法（SCR）③，其效率为85，末端治理设施实际运行率（k值）计算公式为脱硝设施年实际运行小时数/机组年实际运行小时数，③高效氮氧化物末端治理技术：采取高效低氮燃烧技术、增设脱硝催化剂层数等措施，满足《燃煤电厂超低排放烟气治理工程技术规范》（HJ2053-2062）相关
  要求。。原文件中描述污染物类别为废气，污染物指标为氮氧化物（低氮燃烧法，20%小于煤炭干燥无灰基挥发分小于等于37%），此处对其进行了匹配工作，将其匹配到LCAflow库里面相最符合的流，污染物指标备注为氮氧化物（低氮燃烧法，20%小于煤炭干燥无灰基挥发分小于等于37%）
- Nitrogen oxides: 0.5168
  the Technical of end-of-pipe management technology for pollution Nitrogen oxidesisHigh-efficiency SCR③，Its Technical efficiency of end-of-pipe management83
  污染物指标氮氧化物（低氮燃烧法，煤炭干燥无灰基挥发分>37%）的末端治理技术是高效选择性催化还原法（SCR）③，其效率为83，末端治理设施实际运行率（k值）计算公式为脱硝设施年实际运行小时数/机组年实际运行小时数，③高效氮氧化物末端治理技术：采取高效低氮燃烧技术、增设脱硝催化剂层数等措施，满足《燃煤电厂超低排放烟气治理工程技术规范》（HJ2053-2063）相关
  要求。。原文件中描述污染物类别为废气，污染物指标为氮氧化物（低氮燃烧法，煤炭干燥无灰基挥发分>37%），此处对其进行了匹配工作，将其匹配到LCAflow库里面相最符合的流，污染物指标备注为氮氧化物（低氮燃烧法，煤炭干燥无灰基挥发分>37%）
- Nitrogen oxides: 0.56625
  the Technical of end-of-pipe management technology for pollution Nitrogen oxidesisHigh-efficiency SCR③，Its Technical efficiency of end-of-pipe management87.5
  污染物指标氮氧化物（低氮燃烧法，10%小于煤炭干燥无灰基挥发分小于等于20%）的末端治理技术是高效选择性催化还原法（SCR）③，其效率为87.5，末端治理设施实际运行率（k值）计算公式为脱硝设施年实际运行小时数/机组年实际运行小时数，③高效氮氧化物末端治理技术：采取高效低氮燃烧技术、增设脱硝催化剂层数等措施，满足《燃煤电厂超低排放烟气治理工程技术规范》（HJ2053-2061）相关
  要求。。原文件中描述污染物类别为废气，污染物指标为氮氧化物（低氮燃烧法，10%小于煤炭干燥无灰基挥发分小于等于20%），此处对其进行了匹配工作，将其匹配到LCAflow库里面相最符合的流，污染物指标备注为氮氧化物（低氮燃烧法，10%小于煤炭干燥无灰基挥发分小于等于20%）
- Nitrogen oxides: 0.594
  the Technical of end-of-pipe management technology for pollution Nitrogen oxidesisSCR，Its Technical efficiency of end-of-pipe management70
  污染物指标氮氧化物（低氮燃烧法-SNCR，煤炭干燥无灰基挥发分>37%）的末端治理技术是选择性催化还原法（SCR），其效率为70，末端治理设施实际运行率（k值）计算公式为脱硝设施年实际运行小时数/机组年实际运行小时数。原文件中描述污染物类别为废气，污染物指标为氮氧化物（低氮燃烧法-SNCR，煤炭干燥无灰基挥发分>37%），此处对其进行了匹配工作，将其匹配到LCAflow库里面相最符合的流，污染物指标备注为氮氧化物（低氮燃烧法-SNCR，煤炭干燥无灰基挥发分>37%）
- Nitrogen oxides: 0.678
  the Technical of end-of-pipe management technology for pollution Nitrogen oxidesisSCR，Its Technical efficiency of end-of-pipe management70
  污染物指标氮氧化物（低氮燃烧法-SNCR，20%小于煤炭干燥无灰基挥发分小于等于37%）的末端治理技术是选择性催化还原法（SCR），其效率为70，末端治理设施实际运行率（k值）计算公式为脱硝设施年实际运行小时数/机组年实际运行小时数。原文件中描述污染物类别为废气，污染物指标为氮氧化物（低氮燃烧法-SNCR，20%小于煤炭干燥无灰基挥发分小于等于37%），此处对其进行了匹配工作，将其匹配到LCAflow库里面相最符合的流，污染物指标备注为氮氧化物（低氮燃烧法-SNCR，20%小于煤炭干燥无灰基挥发分小于等于37%）
- Nitrogen oxides: 0.695
  the Technical of end-of-pipe management technology for pollution Nitrogen oxidesisSCR，Its Technical efficiency of end-of-pipe management75
  污染物指标氮氧化物（低氮燃烧法-SNCR，10%小于煤炭干燥无灰基挥发分小于等于20%）的末端治理技术是选择性催化还原法（SCR），其效率为75，末端治理设施实际运行率（k值）计算公式为脱硝设施年实际运行小时数/机组年实际运行小时数。原文件中描述污染物类别为废气，污染物指标为氮氧化物（低氮燃烧法-SNCR，10%小于煤炭干燥无灰基挥发分小于等于20%），此处对其进行了匹配工作，将其匹配到LCAflow库里面相最符合的流，污染物指标备注为氮氧化物（低氮燃烧法-SNCR，10%小于煤炭干燥无灰基挥发分小于等于20%）
- Nitrogen oxides: 0.76
  the Technical of end-of-pipe management technology for pollution Nitrogen oxidesisSCR，Its Technical efficiency of end-of-pipe management75
  污染物指标氮氧化物（低氮燃烧法，煤炭干燥无灰基挥发分>37%）的末端治理技术是选择性催化还原法（SCR），其效率为75，末端治理设施实际运行率（k值）计算公式为脱硝设施年实际运行小时数/机组年实际运行小时数。原文件中描述污染物类别为废气，污染物指标为氮氧化物（低氮燃烧法，煤炭干燥无灰基挥发分>37%），此处对其进行了匹配工作，将其匹配到LCAflow库里面相最符合的流，污染物指标备注为氮氧化物（低氮燃烧法，煤炭干燥无灰基挥发分>37%）
- Nitrogen oxides: 0.7701
  the Technical of end-of-pipe management technology for pollution Nitrogen oxidesisSCR，Its Technical efficiency of end-of-pipe management83
  污染物指标氮氧化物（低氮燃烧法，10%小于煤炭干燥无灰基挥发分小于等于20%）的末端治理技术是选择性催化还原法（SCR），其效率为83，末端治理设施实际运行率（k值）计算公式为脱硝设施年实际运行小时数/机组年实际运行小时数。原文件中描述污染物类别为废气，污染物指标为氮氧化物（低氮燃烧法，10%小于煤炭干燥无灰基挥发分小于等于20%），此处对其进行了匹配工作，将其匹配到LCAflow库里面相最符合的流，污染物指标备注为氮氧化物（低氮燃烧法，10%小于煤炭干燥无灰基挥发分小于等于20%）
- Nitrogen oxides: 0.8
  the Technical of end-of-pipe management technology for pollution Nitrogen oxidesisSCR，Its Technical efficiency of end-of-pipe management75
  污染物指标氮氧化物（低氮燃烧法，20%小于煤炭干燥无灰基挥发分小于等于37%）的末端治理技术是选择性催化还原法（SCR），其效率为75，末端治理设施实际运行率（k值）计算公式为脱硝设施年实际运行小时数/机组年实际运行小时数。原文件中描述污染物类别为废气，污染物指标为氮氧化物（低氮燃烧法，20%小于煤炭干燥无灰基挥发分小于等于37%），此处对其进行了匹配工作，将其匹配到LCAflow库里面相最符合的流，污染物指标备注为氮氧化物（低氮燃烧法，20%小于煤炭干燥无灰基挥发分小于等于37%）
- Nitrogen oxides: 0.8625
  the Technical of end-of-pipe management technology for pollution Nitrogen oxidesisSCR，Its Technical efficiency of end-of-pipe management87.5
  污染物指标氮氧化物（低氮燃烧法，10%小于煤炭干燥无灰基挥发分小于等于20%）的末端治理技术是选择性催化还原法（SCR），其效率为87.5，末端治理设施实际运行率（k值）计算公式为脱硝设施年实际运行小时数/机组年实际运行小时数。原文件中描述污染物类别为废气，污染物指标为氮氧化物（低氮燃烧法，10%小于煤炭干燥无灰基挥发分小于等于20%），此处对其进行了匹配工作，将其匹配到LCAflow库里面相最符合的流，污染物指标备注为氮氧化物（低氮燃烧法，10%小于煤炭干燥无灰基挥发分小于等于20%）
- Nitrogen oxides: 1.98
  the Technical of end-of-pipe management technology for pollution Nitrogen oxidesisOthers (direct discharge)
  污染物指标氮氧化物（低氮燃烧法-SNCR，煤炭干燥无灰基挥发分>37%）的末端治理技术是其他（直排），末端治理设施实际运行率（k值）计算公式为脱硝设施年实际运行小时数/机组年实际运行小时数。原文件中描述污染物类别为废气，污染物指标为氮氧化物（低氮燃烧法-SNCR，煤炭干燥无灰基挥发分>37%），此处对其进行了匹配工作，将其匹配到LCAflow库里面相最符合的流，污染物指标备注为氮氧化物（低氮燃烧法-SNCR，煤炭干燥无灰基挥发分>37%）
- Nitrogen oxides: 2.26
  the Technical of end-of-pipe management technology for pollution Nitrogen oxidesisOthers (direct discharge)
  污染物指标氮氧化物（低氮燃烧法-SNCR，20%小于煤炭干燥无灰基挥发分小于等于37%）的末端治理技术是其他（直排），末端治理设施实际运行率（k值）计算公式为脱硝设施年实际运行小时数/机组年实际运行小时数。原文件中描述污染物类别为废气，污染物指标为氮氧化物（低氮燃烧法-SNCR，20%小于煤炭干燥无灰基挥发分小于等于37%），此处对其进行了匹配工作，将其匹配到LCAflow库里面相最符合的流，污染物指标备注为氮氧化物（低氮燃烧法-SNCR，20%小于煤炭干燥无灰基挥发分小于等于37%）
- Nitrogen oxides: 2.78
  the Technical of end-of-pipe management technology for pollution Nitrogen oxidesisOthers (direct discharge)
  污染物指标氮氧化物（低氮燃烧法-SNCR，10%小于煤炭干燥无灰基挥发分小于等于20%）的末端治理技术是其他（直排），末端治理设施实际运行率（k值）计算公式为脱硝设施年实际运行小时数/机组年实际运行小时数。原文件中描述污染物类别为废气，污染物指标为氮氧化物（低氮燃烧法-SNCR，10%小于煤炭干燥无灰基挥发分小于等于20%），此处对其进行了匹配工作，将其匹配到LCAflow库里面相最符合的流，污染物指标备注为氮氧化物（低氮燃烧法-SNCR，10%小于煤炭干燥无灰基挥发分小于等于20%）
- Nitrogen oxides: 3.04
  the Technical of end-of-pipe management technology for pollution Nitrogen oxidesisOthers (direct discharge)
  污染物指标氮氧化物（低氮燃烧法，煤炭干燥无灰基挥发分>37%）的末端治理技术是其他（直排），末端治理设施实际运行率（k值）计算公式为脱硝设施年实际运行小时数/机组年实际运行小时数。原文件中描述污染物类别为废气，污染物指标为氮氧化物（低氮燃烧法，煤炭干燥无灰基挥发分>37%），此处对其进行了匹配工作，将其匹配到LCAflow库里面相最符合的流，污染物指标备注为氮氧化物（低氮燃烧法，煤炭干燥无灰基挥发分>37%）
- Nitrogen oxides: 3.2
  the Technical of end-of-pipe management technology for pollution Nitrogen oxidesisOthers (direct discharge)
  污染物指标氮氧化物（低氮燃烧法，20%小于煤炭干燥无灰基挥发分小于等于37%）的末端治理技术是其他（直排），末端治理设施实际运行率（k值）计算公式为脱硝设施年实际运行小时数/机组年实际运行小时数。原文件中描述污染物类别为废气，污染物指标为氮氧化物（低氮燃烧法，20%小于煤炭干燥无灰基挥发分小于等于37%），此处对其进行了匹配工作，将其匹配到LCAflow库里面相最符合的流，污染物指标备注为氮氧化物（低氮燃烧法，20%小于煤炭干燥无灰基挥发分小于等于37%）
- Nitrogen oxides: 4.53
  the Technical of end-of-pipe management technology for pollution Nitrogen oxidesisOthers (direct discharge)
  污染物指标氮氧化物（低氮燃烧法，10%小于煤炭干燥无灰基挥发分小于等于20%）的末端治理技术是其他（直排），末端治理设施实际运行率（k值）计算公式为脱硝设施年实际运行小时数/机组年实际运行小时数。原文件中描述污染物类别为废气，污染物指标为氮氧化物（低氮燃烧法，10%小于煤炭干燥无灰基挥发分小于等于20%），此处对其进行了匹配工作，将其匹配到LCAflow库里面相最符合的流，污染物指标备注为氮氧化物（低氮燃烧法，10%小于煤炭干燥无灰基挥发分小于等于20%）
- mercury: 0
  the Technical of end-of-pipe management technology for pollution mercuryisSynergistic mercury removal，Its Technical efficiency of end-of-pipe management25.73MHgar+84.12.The original article describes the pollution production coefficients as 0.000995MHgar。Please revise the corresponding emissions after accounting for them according to the notes.。.The original article describes the pollution production coefficients as 0.000995MHgar. Please revise the corresponding emissions after accounting for them according to the notes.
  污染物指标汞及其化合物的末端治理技术是协同脱汞，其效率为25.73MHgar+84.12，末端治理设施实际运行率（k值）计算公式为取该机组除尘、脱硝脱硫K的最小值。原文件中描述污染物类别为废气，污染物指标为汞及其化合物，此处对其进行了匹配工作，将其匹配到LCAflow库里面相最符合的流，污染物指标备注为汞及其化合物原文描述的产污系数为 0.000995MHgar。请根据备注自行核算后修改对应的排放量。
- particles (PM2.5 - PM10): 0
  the Technical of end-of-pipe management technology for pollution particles (PM2.5 - PM10)isBag filter + others (wet desulfurization synergy) + others (wet electrostatic precipitator)，Its Technical efficiency of end-of-pipe management0.00036Aar+99.983.The original article describes the pollution production coefficients as 9.36Aar+10.44。Please revise the corresponding emissions after accounting for them according to the notes.。.The original article describes the pollution production coefficients as 9.36Aar+10.44. Please revise the corresponding emissions after accounting for them according to the notes.
  污染物指标颗粒物的末端治理技术是袋式除尘+其他（湿法脱硫协同）+其他（湿式电除尘），其效率为0.00036Aar+99.983，末端治理设施实际运行率（k值）计算公式为除尘设施年实际运行小时数/机组年实际运行小时数。原文件中描述污染物类别为废气，污染物指标为颗粒物，此处对其进行了匹配工作，将其匹配到LCAflow库里面相最符合的流，污染物指标备注为颗粒物原文描述的产污系数为 9.36Aar+10.44。请根据备注自行核算后修改对应的排放量。
- particles (PM2.5 - PM10): 0
  the Technical of end-of-pipe management technology for pollution particles (PM2.5 - PM10)isBag filter + others (wet desulfurization synergy)，Its Technical efficiency of end-of-pipe management0.0018Aar+99.916.The original article describes the pollution production coefficients as 9.36Aar+10.44。Please revise the corresponding emissions after accounting for them according to the notes.。.The original article describes the pollution production coefficients as 9.36Aar+10.44. Please revise the corresponding emissions after accounting for them according to the notes.
  污染物指标颗粒物的末端治理技术是袋式除尘+其他（湿法脱硫协同），其效率为0.0018Aar+99.916，末端治理设施实际运行率（k值）计算公式为除尘设施年实际运行小时数/机组年实际运行小时数。原文件中描述污染物类别为废气，污染物指标为颗粒物，此处对其进行了匹配工作，将其匹配到LCAflow库里面相最符合的流，污染物指标备注为颗粒物原文描述的产污系数为 9.36Aar+10.44。请根据备注自行核算后修改对应的排放量。
- particles (PM2.5 - PM10): 0
  the Technical of end-of-pipe management technology for pollution particles (PM2.5 - PM10)isBag filter + others (wet electrostatic precipitator)，Its Technical efficiency of end-of-pipe management0.0009Aar+99.958.The original article describes the pollution production coefficients as 9.36Aar+10.44。Please revise the corresponding emissions after accounting for them according to the notes.。.The original article describes the pollution production coefficients as 9.36Aar+10.44. Please revise the corresponding emissions after accounting for them according to the notes.
  污染物指标颗粒物的末端治理技术是袋式除尘+其他（湿式电除尘），其效率为0.0009Aar+99.958，末端治理设施实际运行率（k值）计算公式为除尘设施年实际运行小时数/机组年实际运行小时数。原文件中描述污染物类别为废气，污染物指标为颗粒物，此处对其进行了匹配工作，将其匹配到LCAflow库里面相最符合的流，污染物指标备注为颗粒物原文描述的产污系数为 9.36Aar+10.44。请根据备注自行核算后修改对应的排放量。
- particles (PM2.5 - PM10): 0
  the Technical of end-of-pipe management technology for pollution particles (PM2.5 - PM10)isBag filter，Its Technical efficiency of end-of-pipe management0.0045Aar+99.79.The original article describes the pollution production coefficients as 9.36Aar+10.44。Please revise the corresponding emissions after accounting for them according to the notes.。.The original article describes the pollution production coefficients as 9.36Aar+10.44. Please revise the corresponding emissions after accounting for them according to the notes.
  污染物指标颗粒物的末端治理技术是袋式除尘，其效率为0.0045Aar+99.79，末端治理设施实际运行率（k值）计算公式为除尘设施年实际运行小时数/机组年实际运行小时数。原文件中描述污染物类别为废气，污染物指标为颗粒物，此处对其进行了匹配工作，将其匹配到LCAflow库里面相最符合的流，污染物指标备注为颗粒物原文描述的产污系数为 9.36Aar+10.44。请根据备注自行核算后修改对应的排放量。
- particles (PM2.5 - PM10): 0
  the Technical of end-of-pipe management technology for pollution particles (PM2.5 - PM10)isElectric-bag composite precipitator + others (wet desulfurization synergy) + others (wet electrostatic precipitator)，Its Technical efficiency of end-of-pipe management0.000384Aar+99.983.The original article describes the pollution production coefficients as 9.36Aar+10.44。Please revise the corresponding emissions after accounting for them according to the notes.。.The original article describes the pollution production coefficients as 9.36Aar+10.44. Please revise the corresponding emissions after accounting for them according to the notes.
  污染物指标颗粒物的末端治理技术是电袋组合+其他（湿法脱硫协同）+其他（湿式电除尘），其效率为0.000384Aar+99.983，末端治理设施实际运行率（k值）计算公式为除尘设施年实际运行小时数/机组年实际运行小时数。原文件中描述污染物类别为废气，污染物指标为颗粒物，此处对其进行了匹配工作，将其匹配到LCAflow库里面相最符合的流，污染物指标备注为颗粒物原文描述的产污系数为 9.36Aar+10.44。请根据备注自行核算后修改对应的排放量。
- particles (PM2.5 - PM10): 0
  the Technical of end-of-pipe management technology for pollution particles (PM2.5 - PM10)isElectric-bag composite precipitator + others (wet desulfurization synergy)，Its Technical efficiency of end-of-pipe management0.00192Aar+99.914.The original article describes the pollution production coefficients as 9.36Aar+10.44。Please revise the corresponding emissions after accounting for them according to the notes.。.The original article describes the pollution production coefficients as 9.36Aar+10.44. Please revise the corresponding emissions after accounting for them according to the notes.
  污染物指标颗粒物的末端治理技术是电袋组合+其他（湿法脱硫协同），其效率为0.00192Aar+99.914，末端治理设施实际运行率（k值）计算公式为除尘设施年实际运行小时数/机组年实际运行小时数。原文件中描述污染物类别为废气，污染物指标为颗粒物，此处对其进行了匹配工作，将其匹配到LCAflow库里面相最符合的流，污染物指标备注为颗粒物原文描述的产污系数为 9.36Aar+10.44。请根据备注自行核算后修改对应的排放量。
- particles (PM2.5 - PM10): 0
  the Technical of end-of-pipe management technology for pollution particles (PM2.5 - PM10)isElectric-bag composite precipitator + others (wet electrostatic precipitator)，Its Technical efficiency of end-of-pipe management0.00096Aar+99.957.The original article describes the pollution production coefficients as 9.36Aar+10.44。Please revise the corresponding emissions after accounting for them according to the notes.。.The original article describes the pollution production coefficients as 9.36Aar+10.44. Please revise the corresponding emissions after accounting for them according to the notes.
  污染物指标颗粒物的末端治理技术是电袋组合+其他（湿式电除尘），其效率为0.00096Aar+99.957，末端治理设施实际运行率（k值）计算公式为除尘设施年实际运行小时数/机组年实际运行小时数。原文件中描述污染物类别为废气，污染物指标为颗粒物，此处对其进行了匹配工作，将其匹配到LCAflow库里面相最符合的流，污染物指标备注为颗粒物原文描述的产污系数为 9.36Aar+10.44。请根据备注自行核算后修改对应的排放量。
- particles (PM2.5 - PM10): 0
  the Technical of end-of-pipe management technology for pollution particles (PM2.5 - PM10)isElectric-bag composite precipitator，Its Technical efficiency of end-of-pipe management0.0048Aar+99.78.The original article describes the pollution production coefficients as 9.36Aar+10.44。Please revise the corresponding emissions after accounting for them according to the notes.。.The original article describes the pollution production coefficients as 9.36Aar+10.44. Please revise the corresponding emissions after accounting for them according to the notes.
  污染物指标颗粒物的末端治理技术是电袋组合，其效率为0.0048Aar+99.78，末端治理设施实际运行率（k值）计算公式为除尘设施年实际运行小时数/机组年实际运行小时数。原文件中描述污染物类别为废气，污染物指标为颗粒物，此处对其进行了匹配工作，将其匹配到LCAflow库里面相最符合的流，污染物指标备注为颗粒物原文描述的产污系数为 9.36Aar+10.44。请根据备注自行核算后修改对应的排放量。
- particles (PM2.5 - PM10): 0
  the Technical of end-of-pipe management technology for pollution particles (PM2.5 - PM10)isElectrostatic precipitation + others (wet desulfurization synergy) + others (wet electrostatic precipitator)，Its Technical efficiency of end-of-pipe management0.000408Aar+99.98.The original article describes the pollution production coefficients as 9.36Aar+10.44。Please revise the corresponding emissions after accounting for them according to the notes.。.The original article describes the pollution production coefficients as 9.36Aar+10.44. Please revise the corresponding emissions after accounting for them according to the notes.
  污染物指标颗粒物的末端治理技术是静电除尘+其他（湿法脱硫协同）+其他（湿式电除尘），其效率为0.000408Aar+99.98，末端治理设施实际运行率（k值）计算公式为除尘设施年实际运行小时数/机组年实际运行小时数。原文件中描述污染物类别为废气，污染物指标为颗粒物，此处对其进行了匹配工作，将其匹配到LCAflow库里面相最符合的流，污染物指标备注为颗粒物原文描述的产污系数为 9.36Aar+10.44。请根据备注自行核算后修改对应的排放量。
- particles (PM2.5 - PM10): 0
  the Technical of end-of-pipe management technology for pollution particles (PM2.5 - PM10)isElectrostatic precipitation + others (wet desulfurization synergy)，Its Technical efficiency of end-of-pipe management0.00204Aar+99.902.The original article describes the pollution production coefficients as 9.36Aar+10.44。Please revise the corresponding emissions after accounting for them according to the notes.。.The original article describes the pollution production coefficients as 9.36Aar+10.44. Please revise the corresponding emissions after accounting for them according to the notes.
  污染物指标颗粒物的末端治理技术是静电除尘+其他（湿法脱硫协同），其效率为0.00204Aar+99.902，末端治理设施实际运行率（k值）计算公式为除尘设施年实际运行小时数/机组年实际运行小时数。原文件中描述污染物类别为废气，污染物指标为颗粒物，此处对其进行了匹配工作，将其匹配到LCAflow库里面相最符合的流，污染物指标备注为颗粒物原文描述的产污系数为 9.36Aar+10.44。请根据备注自行核算后修改对应的排放量。
- particles (PM2.5 - PM10): 0
  the Technical of end-of-pipe management technology for pollution particles (PM2.5 - PM10)isElectrostatic precipitation + others (wet electrostatic precipitator)，Its Technical efficiency of end-of-pipe management0.00102Aar+99.951.The original article describes the pollution production coefficients as 9.36Aar+10.44。Please revise the corresponding emissions after accounting for them according to the notes.。.The original article describes the pollution production coefficients as 9.36Aar+10.44. Please revise the corresponding emissions after accounting for them according to the notes.
  污染物指标颗粒物的末端治理技术是静电除尘+其他（湿式电除尘），其效率为0.00102Aar+99.951，末端治理设施实际运行率（k值）计算公式为除尘设施年实际运行小时数/机组年实际运行小时数。原文件中描述污染物类别为废气，污染物指标为颗粒物，此处对其进行了匹配工作，将其匹配到LCAflow库里面相最符合的流，污染物指标备注为颗粒物原文描述的产污系数为 9.36Aar+10.44。请根据备注自行核算后修改对应的排放量。
- particles (PM2.5 - PM10): 0
  the Technical of end-of-pipe management technology for pollution particles (PM2.5 - PM10)isElectrostatic precipitation，Its Technical efficiency of end-of-pipe management0.0051Aar+99.75.The original article describes the pollution production coefficients as 9.36Aar+10.44。Please revise the corresponding emissions after accounting for them according to the notes.。.The original article describes the pollution production coefficients as 9.36Aar+10.44. Please revise the corresponding emissions after accounting for them according to the notes.
  污染物指标颗粒物的末端治理技术是静电除尘，其效率为0.0051Aar+99.75，末端治理设施实际运行率（k值）计算公式为除尘设施年实际运行小时数/机组年实际运行小时数。原文件中描述污染物类别为废气，污染物指标为颗粒物，此处对其进行了匹配工作，将其匹配到LCAflow库里面相最符合的流，污染物指标备注为颗粒物原文描述的产污系数为 9.36Aar+10.44。请根据备注自行核算后修改对应的排放量。
- particles (PM2.5 - PM10): 0
  the Technical of end-of-pipe management technology for pollution particles (PM2.5 - PM10)isHigh-efficiency bag filter + others (wet desulfurization synergy) + others (wet electrostatic precipitator)①，Its Technical efficiency of end-of-pipe management0.00012Aar+99.9944.The original article describes the pollution production coefficients as 9.36Aar+10.44。Please revise the corresponding emissions after accounting for them according to the notes.。.The original article describes the pollution production coefficients as 9.36Aar+10.44. Please revise the corresponding emissions after accounting for them according to the notes.
  污染物指标颗粒物的末端治理技术是高效袋式除尘+其他（湿法脱硫协同）+其他（湿式电除尘）①，其效率为0.00012Aar+99.9944，末端治理设施实际运行率（k值）计算公式为除尘设施年实际运行小时数/机组年实际运行小时数，①高效颗粒物末端治理技术：采取高效电源供电、低低温电除尘、超净电袋、高效袋式除尘、湿法脱硫协同、湿式电除尘等技术，满足《燃煤电厂超低排放烟气
  治理工程技术规范》（HJ2053-2108）相关要求。
  。原文件中描述污染物类别为废气，污染物指标为颗粒物，此处对其进行了匹配工作，将其匹配到LCAflow库里面相最符合的流，污染物指标备注为颗粒物原文描述的产污系数为 9.36Aar+10.44。请根据备注自行核算后修改对应的排放量。
- particles (PM2.5 - PM10): 0
  the Technical of end-of-pipe management technology for pollution particles (PM2.5 - PM10)isHigh-efficiency bag filter + others (wet desulfurization synergy)①，Its Technical efficiency of end-of-pipe management0.0006Aar+99.972.The original article describes the pollution production coefficients as 9.36Aar+10.44。Please revise the corresponding emissions after accounting for them according to the notes.。.The original article describes the pollution production coefficients as 9.36Aar+10.44. Please revise the corresponding emissions after accounting for them according to the notes.
  污染物指标颗粒物的末端治理技术是高效袋式除尘+其他（湿法脱硫协同）①，其效率为0.0006Aar+99.972，末端治理设施实际运行率（k值）计算公式为除尘设施年实际运行小时数/机组年实际运行小时数，①高效颗粒物末端治理技术：采取高效电源供电、低低温电除尘、超净电袋、高效袋式除尘、湿法脱硫协同、湿式电除尘等技术，满足《燃煤电厂超低排放烟气
  治理工程技术规范》（HJ2053-2102）相关要求。
  。原文件中描述污染物类别为废气，污染物指标为颗粒物，此处对其进行了匹配工作，将其匹配到LCAflow库里面相最符合的流，污染物指标备注为颗粒物原文描述的产污系数为 9.36Aar+10.44。请根据备注自行核算后修改对应的排放量。
- particles (PM2.5 - PM10): 0
  the Technical of end-of-pipe management technology for pollution particles (PM2.5 - PM10)isHigh-efficiency bag filter + others (wet electrostatic precipitator)①，Its Technical efficiency of end-of-pipe management0.0003Aar+99.986.The original article describes the pollution production coefficients as 9.36Aar+10.44。Please revise the corresponding emissions after accounting for them according to the notes.。.The original article describes the pollution production coefficients as 9.36Aar+10.44. Please revise the corresponding emissions after accounting for them according to the notes.
  污染物指标颗粒物的末端治理技术是高效袋式除尘+其他（湿式电除尘）①，其效率为0.0003Aar+99.986，末端治理设施实际运行率（k值）计算公式为除尘设施年实际运行小时数/机组年实际运行小时数，①高效颗粒物末端治理技术：采取高效电源供电、低低温电除尘、超净电袋、高效袋式除尘、湿法脱硫协同、湿式电除尘等技术，满足《燃煤电厂超低排放烟气
  治理工程技术规范》（HJ2053-2105）相关要求。
  。原文件中描述污染物类别为废气，污染物指标为颗粒物，此处对其进行了匹配工作，将其匹配到LCAflow库里面相最符合的流，污染物指标备注为颗粒物原文描述的产污系数为 9.36Aar+10.44。请根据备注自行核算后修改对应的排放量。
- particles (PM2.5 - PM10): 0
  the Technical of end-of-pipe management technology for pollution particles (PM2.5 - PM10)isHigh-efficiency bag filter①，Its Technical efficiency of end-of-pipe management0.0015Aar+99.93.The original article describes the pollution production coefficients as 9.36Aar+10.44。Please revise the corresponding emissions after accounting for them according to the notes.。.The original article describes the pollution production coefficients as 9.36Aar+10.44. Please revise the corresponding emissions after accounting for them according to the notes.
  污染物指标颗粒物的末端治理技术是高效袋式除尘①，其效率为0.0015Aar+99.93，末端治理设施实际运行率（k值）计算公式为除尘设施年实际运行小时数/机组年实际运行小时数，①高效颗粒物末端治理技术：采取高效电源供电、低低温电除尘、超净电袋、高效袋式除尘、湿法脱硫协同、湿式电除尘等技术，满足《燃煤电厂超低排放烟气
  治理工程技术规范》（HJ2053-2099）相关要求。
  。原文件中描述污染物类别为废气，污染物指标为颗粒物，此处对其进行了匹配工作，将其匹配到LCAflow库里面相最符合的流，污染物指标备注为颗粒物原文描述的产污系数为 9.36Aar+10.44。请根据备注自行核算后修改对应的排放量。
- particles (PM2.5 - PM10): 0
  the Technical of end-of-pipe management technology for pollution particles (PM2.5 - PM10)isHigh-efficiency electric-bag composite precipitator + others (wet desulfurization synergy) + others (wet electrostatic precipitator)①，Its Technical efficiency of end-of-pipe management0.000128Aar+99.9942.The original article describes the pollution production coefficients as 9.36Aar+10.44。Please revise the corresponding emissions after accounting for them according to the notes.。.The original article describes the pollution production coefficients as 9.36Aar+10.44. Please revise the corresponding emissions after accounting for them according to the notes.
  污染物指标颗粒物的末端治理技术是高效电袋组合+其他（湿法脱硫协同）+其他（湿式电除尘）①，其效率为0.000128Aar+99.9942，末端治理设施实际运行率（k值）计算公式为除尘设施年实际运行小时数/机组年实际运行小时数，①高效颗粒物末端治理技术：采取高效电源供电、低低温电除尘、超净电袋、高效袋式除尘、湿法脱硫协同、湿式电除尘等技术，满足《燃煤电厂超低排放烟气
  治理工程技术规范》（HJ2053-2107）相关要求。
  。原文件中描述污染物类别为废气，污染物指标为颗粒物，此处对其进行了匹配工作，将其匹配到LCAflow库里面相最符合的流，污染物指标备注为颗粒物原文描述的产污系数为 9.36Aar+10.44。请根据备注自行核算后修改对应的排放量。
- particles (PM2.5 - PM10): 0
  the Technical of end-of-pipe management technology for pollution particles (PM2.5 - PM10)isHigh-efficiency electric-bag composite precipitator + others (wet desulfurization synergy)①，Its Technical efficiency of end-of-pipe management0.00064Aar+99.9712.The original article describes the pollution production coefficients as 9.36Aar+10.44。Please revise the corresponding emissions after accounting for them according to the notes.。.The original article describes the pollution production coefficients as 9.36Aar+10.44. Please revise the corresponding emissions after accounting for them according to the notes.
  污染物指标颗粒物的末端治理技术是高效电袋组合+其他（湿法脱硫协同）①，其效率为0.00064Aar+99.9712，末端治理设施实际运行率（k值）计算公式为除尘设施年实际运行小时数/机组年实际运行小时数，①高效颗粒物末端治理技术：采取高效电源供电、低低温电除尘、超净电袋、高效袋式除尘、湿法脱硫协同、湿式电除尘等技术，满足《燃煤电厂超低排放烟气
  治理工程技术规范》（HJ2053-2101）相关要求。
  。原文件中描述污染物类别为废气，污染物指标为颗粒物，此处对其进行了匹配工作，将其匹配到LCAflow库里面相最符合的流，污染物指标备注为颗粒物原文描述的产污系数为 9.36Aar+10.44。请根据备注自行核算后修改对应的排放量。
- particles (PM2.5 - PM10): 0
  the Technical of end-of-pipe management technology for pollution particles (PM2.5 - PM10)isHigh-efficiency electric-bag composite precipitator + others (wet electrostatic precipitator)①，Its Technical efficiency of end-of-pipe management0.00032Aar+99.9856.The original article describes the pollution production coefficients as 9.36Aar+10.44。Please revise the corresponding emissions after accounting for them according to the notes.。.The original article describes the pollution production coefficients as 9.36Aar+10.44. Please revise the corresponding emissions after accounting for them according to the notes.
  污染物指标颗粒物的末端治理技术是高效电袋组合+其他（湿式电除尘）①，其效率为0.00032Aar+99.9856，末端治理设施实际运行率（k值）计算公式为除尘设施年实际运行小时数/机组年实际运行小时数，①高效颗粒物末端治理技术：采取高效电源供电、低低温电除尘、超净电袋、高效袋式除尘、湿法脱硫协同、湿式电除尘等技术，满足《燃煤电厂超低排放烟气
  治理工程技术规范》（HJ2053-2104）相关要求。
  。原文件中描述污染物类别为废气，污染物指标为颗粒物，此处对其进行了匹配工作，将其匹配到LCAflow库里面相最符合的流，污染物指标备注为颗粒物原文描述的产污系数为 9.36Aar+10.44。请根据备注自行核算后修改对应的排放量。
- particles (PM2.5 - PM10): 0
  the Technical of end-of-pipe management technology for pollution particles (PM2.5 - PM10)isHigh-efficiency electric-bag composite precipitator①，Its Technical efficiency of end-of-pipe management0.0016Aar+99.928.The original article describes the pollution production coefficients as 9.36Aar+10.44。Please revise the corresponding emissions after accounting for them according to the notes.。.The original article describes the pollution production coefficients as 9.36Aar+10.44. Please revise the corresponding emissions after accounting for them according to the notes.
  污染物指标颗粒物的末端治理技术是高效电袋组合①，其效率为0.0016Aar+99.928，末端治理设施实际运行率（k值）计算公式为除尘设施年实际运行小时数/机组年实际运行小时数，①高效颗粒物末端治理技术：采取高效电源供电、低低温电除尘、超净电袋、高效袋式除尘、湿法脱硫协同、湿式电除尘等技术，满足《燃煤电厂超低排放烟气
  治理工程技术规范》（HJ2053-2098）相关要求。
  。原文件中描述污染物类别为废气，污染物指标为颗粒物，此处对其进行了匹配工作，将其匹配到LCAflow库里面相最符合的流，污染物指标备注为颗粒物原文描述的产污系数为 9.36Aar+10.44。请根据备注自行核算后修改对应的排放量。
- particles (PM2.5 - PM10): 0
  the Technical of end-of-pipe management technology for pollution particles (PM2.5 - PM10)isHigh-efficiency electrostatic precipitation + others (wet desulfurization synergy) + others (wet electrostatic precipitator)①，Its Technical efficiency of end-of-pipe management0.000136Aar+99.9934.The original article describes the pollution production coefficients as 9.36Aar+10.44。Please revise the corresponding emissions after accounting for them according to the notes.。.The original article describes the pollution production coefficients as 9.36Aar+10.44. Please revise the corresponding emissions after accounting for them according to the notes.
  污染物指标颗粒物的末端治理技术是高效静电除尘+其他（湿法脱硫协同）+其他（湿式电除尘）①，其效率为0.000136Aar+99.9934，末端治理设施实际运行率（k值）计算公式为除尘设施年实际运行小时数/机组年实际运行小时数，①高效颗粒物末端治理技术：采取高效电源供电、低低温电除尘、超净电袋、高效袋式除尘、湿法脱硫协同、湿式电除尘等技术，满足《燃煤电厂超低排放烟气
  治理工程技术规范》（HJ2053-2106）相关要求。
  。原文件中描述污染物类别为废气，污染物指标为颗粒物，此处对其进行了匹配工作，将其匹配到LCAflow库里面相最符合的流，污染物指标备注为颗粒物原文描述的产污系数为 9.36Aar+10.44。请根据备注自行核算后修改对应的排放量。
- particles (PM2.5 - PM10): 0
  the Technical of end-of-pipe management technology for pollution particles (PM2.5 - PM10)isHigh-efficiency electrostatic precipitation + others (wet desulfurization synergy)①，Its Technical efficiency of end-of-pipe management0.00068Aar+99.9672.The original article describes the pollution production coefficients as 9.36Aar+10.44。Please revise the corresponding emissions after accounting for them according to the notes.。.The original article describes the pollution production coefficients as 9.36Aar+10.44. Please revise the corresponding emissions after accounting for them according to the notes.
  污染物指标颗粒物的末端治理技术是高效静电除尘+其他（湿法脱硫协同）①，其效率为0.00068Aar+99.9672，末端治理设施实际运行率（k值）计算公式为除尘设施年实际运行小时数/机组年实际运行小时数，①高效颗粒物末端治理技术：采取高效电源供电、低低温电除尘、超净电袋、高效袋式除尘、湿法脱硫协同、湿式电除尘等技术，满足《燃煤电厂超低排放烟气
  治理工程技术规范》（HJ2053-2100）相关要求。
  。原文件中描述污染物类别为废气，污染物指标为颗粒物，此处对其进行了匹配工作，将其匹配到LCAflow库里面相最符合的流，污染物指标备注为颗粒物原文描述的产污系数为 9.36Aar+10.44。请根据备注自行核算后修改对应的排放量。
- particles (PM2.5 - PM10): 0
  the Technical of end-of-pipe management technology for pollution particles (PM2.5 - PM10)isHigh-efficiency electrostatic precipitation + others (wet electrostatic precipitator)①，Its Technical efficiency of end-of-pipe management0.00034Aar+99.9836.The original article describes the pollution production coefficients as 9.36Aar+10.44。Please revise the corresponding emissions after accounting for them according to the notes.。.The original article describes the pollution production coefficients as 9.36Aar+10.44. Please revise the corresponding emissions after accounting for them according to the notes.
  污染物指标颗粒物的末端治理技术是高效静电除尘+其他（湿式电除尘）①，其效率为0.00034Aar+99.9836，末端治理设施实际运行率（k值）计算公式为除尘设施年实际运行小时数/机组年实际运行小时数，①高效颗粒物末端治理技术：采取高效电源供电、低低温电除尘、超净电袋、高效袋式除尘、湿法脱硫协同、湿式电除尘等技术，满足《燃煤电厂超低排放烟气
  治理工程技术规范》（HJ2053-2103）相关要求。
  。原文件中描述污染物类别为废气，污染物指标为颗粒物，此处对其进行了匹配工作，将其匹配到LCAflow库里面相最符合的流，污染物指标备注为颗粒物原文描述的产污系数为 9.36Aar+10.44。请根据备注自行核算后修改对应的排放量。
- particles (PM2.5 - PM10): 0
  the Technical of end-of-pipe management technology for pollution particles (PM2.5 - PM10)isHigh-efficiency electrostatic precipitation①，Its Technical efficiency of end-of-pipe management0.0017Aar+99.918.The original article describes the pollution production coefficients as 9.36Aar+10.44。Please revise the corresponding emissions after accounting for them according to the notes.。.The original article describes the pollution production coefficients as 9.36Aar+10.44. Please revise the corresponding emissions after accounting for them according to the notes.
  污染物指标颗粒物的末端治理技术是高效静电除尘①，其效率为0.0017Aar+99.918，末端治理设施实际运行率（k值）计算公式为除尘设施年实际运行小时数/机组年实际运行小时数，①高效颗粒物末端治理技术：采取高效电源供电、低低温电除尘、超净电袋、高效袋式除尘、湿法脱硫协同、湿式电除尘等技术，满足《燃煤电厂超低排放烟气
  治理工程技术规范》（HJ2053-2097）相关要求。
  。原文件中描述污染物类别为废气，污染物指标为颗粒物，此处对其进行了匹配工作，将其匹配到LCAflow库里面相最符合的流，污染物指标备注为颗粒物原文描述的产污系数为 9.36Aar+10.44。请根据备注自行核算后修改对应的排放量。
- sulfur dioxide: 0
  the Technical of end-of-pipe management technology for pollution sulfur dioxideisAmmonia method，Its Technical efficiency of end-of-pipe management0.8571Sar+96.The original article describes the pollution production coefficients as 16.78Sar。Please revise the corresponding emissions after accounting for them according to the notes.。.The original article describes the pollution production coefficients as 16.78Sar. Please revise the corresponding emissions after accounting for them according to the notes.
  污染物指标二氧化硫的末端治理技术是氨法，其效率为0.8571Sar+96，末端治理设施实际运行率（k值）计算公式为脱硫设施年实际运行小时数/机组年实际运行小时数。原文件中描述污染物类别为废气，污染物指标为二氧化硫，此处对其进行了匹配工作，将其匹配到LCAflow库里面相最符合的流，污染物指标备注为二氧化硫原文描述的产污系数为 16.78Sar。请根据备注自行核算后修改对应的排放量。
- sulfur dioxide: 0
  the Technical of end-of-pipe management technology for pollution sulfur dioxideisDouble alkali process，Its Technical efficiency of end-of-pipe management1.8571Sar+94.29.The original article describes the pollution production coefficients as 16.78Sar。Please revise the corresponding emissions after accounting for them according to the notes.。.The original article describes the pollution production coefficients as 16.78Sar. Please revise the corresponding emissions after accounting for them according to the notes.
  污染物指标二氧化硫的末端治理技术是双碱法，其效率为1.8571Sar+94.29，末端治理设施实际运行率（k值）计算公式为脱硫设施年实际运行小时数/机组年实际运行小时数。原文件中描述污染物类别为废气，污染物指标为二氧化硫，此处对其进行了匹配工作，将其匹配到LCAflow库里面相最符合的流，污染物指标备注为二氧化硫原文描述的产污系数为 16.78Sar。请根据备注自行核算后修改对应的排放量。
- sulfur dioxide: 0
  the Technical of end-of-pipe management technology for pollution sulfur dioxideisFlue gas circulating fluidized bed method，Its Technical efficiency of end-of-pipe management2.7143Sar+92.86.The original article describes the pollution production coefficients as 16.78Sar。Please revise the corresponding emissions after accounting for them according to the notes.。.The original article describes the pollution production coefficients as 16.78Sar. Please revise the corresponding emissions after accounting for them according to the notes.
  污染物指标二氧化硫的末端治理技术是烟气循环流化床法，其效率为2.7143Sar+92.86，末端治理设施实际运行率（k值）计算公式为脱硫设施年实际运行小时数/机组年实际运行小时数。原文件中描述污染物类别为废气，污染物指标为二氧化硫，此处对其进行了匹配工作，将其匹配到LCAflow库里面相最符合的流，污染物指标备注为二氧化硫原文描述的产污系数为 16.78Sar。请根据备注自行核算后修改对应的排放量。
- sulfur dioxide: 0
  the Technical of end-of-pipe management technology for pollution sulfur dioxideisHigh-efficiency ammonia method②，Its Technical efficiency of end-of-pipe management0.3Sar+98.6.The original article describes the pollution production coefficients as 16.78Sar。Please revise the corresponding emissions after accounting for them according to the notes.。.The original article describes the pollution production coefficients as 16.78Sar. Please revise the corresponding emissions after accounting for them according to the notes.
  污染物指标二氧化硫的末端治理技术是高效氨法②，其效率为0.3Sar+98.6，末端治理设施实际运行率（k值）计算公式为脱硫设施年实际运行小时数/机组年实际运行小时数，②高效二氧化硫末端治理技术：采取空塔提效、强化气液传质、改善pH值分区等措施，满足《燃煤电厂超低排放烟气治理工程技术规范》（HJ2053-2064）相
  关要求。
  。原文件中描述污染物类别为废气，污染物指标为二氧化硫，此处对其进行了匹配工作，将其匹配到LCAflow库里面相最符合的流，污染物指标备注为二氧化硫原文描述的产污系数为 16.78Sar。请根据备注自行核算后修改对应的排放量。
- sulfur dioxide: 0
  the Technical of end-of-pipe management technology for pollution sulfur dioxideisHigh-efficiency double alkali process②，Its Technical efficiency of end-of-pipe management0.65Sar+98.The original article describes the pollution production coefficients as 16.78Sar。Please revise the corresponding emissions after accounting for them according to the notes.。.The original article describes the pollution production coefficients as 16.78Sar. Please revise the corresponding emissions after accounting for them according to the notes.
  污染物指标二氧化硫的末端治理技术是高效双碱法②，其效率为0.65Sar+98，末端治理设施实际运行率（k值）计算公式为脱硫设施年实际运行小时数/机组年实际运行小时数，②高效二氧化硫末端治理技术：采取空塔提效、强化气液传质、改善pH值分区等措施，满足《燃煤电厂超低排放烟气治理工程技术规范》（HJ2053-2068）相
  关要求。
  。原文件中描述污染物类别为废气，污染物指标为二氧化硫，此处对其进行了匹配工作，将其匹配到LCAflow库里面相最符合的流，污染物指标备注为二氧化硫原文描述的产污系数为 16.78Sar。请根据备注自行核算后修改对应的排放量。
- sulfur dioxide: 0
  the Technical of end-of-pipe management technology for pollution sulfur dioxideisHigh-efficiency flue gas circulating fluidized bed method②，Its Technical efficiency of end-of-pipe management0.95Sar+97.5.The original article describes the pollution production coefficients as 16.78Sar。Please revise the corresponding emissions after accounting for them according to the notes.。.The original article describes the pollution production coefficients as 16.78Sar. Please revise the corresponding emissions after accounting for them according to the notes.
  污染物指标二氧化硫的末端治理技术是高效烟气循环流化床法②，其效率为0.95Sar+97.5，末端治理设施实际运行率（k值）计算公式为脱硫设施年实际运行小时数/机组年实际运行小时数，②高效二氧化硫末端治理技术：采取空塔提效、强化气液传质、改善pH值分区等措施，满足《燃煤电厂超低排放烟气治理工程技术规范》（HJ2053-2069）相
  关要求。
  。原文件中描述污染物类别为废气，污染物指标为二氧化硫，此处对其进行了匹配工作，将其匹配到LCAflow库里面相最符合的流，污染物指标备注为二氧化硫原文描述的产污系数为 16.78Sar。请根据备注自行核算后修改对应的排放量。
- sulfur dioxide: 0
  the Technical of end-of-pipe management technology for pollution sulfur dioxideisHigh-efficiency lime/gypsum method②，Its Technical efficiency of end-of-pipe management0.5Sar+98.3.The original article describes the pollution production coefficients as 16.78Sar。Please revise the corresponding emissions after accounting for them according to the notes.。.The original article describes the pollution production coefficients as 16.78Sar. Please revise the corresponding emissions after accounting for them according to the notes.
  污染物指标二氧化硫的末端治理技术是高效石灰石/石膏法②，其效率为0.5Sar+98.3，末端治理设施实际运行率（k值）计算公式为脱硫设施年实际运行小时数/机组年实际运行小时数，②高效二氧化硫末端治理技术：采取空塔提效、强化气液传质、改善pH值分区等措施，满足《燃煤电厂超低排放烟气治理工程技术规范》（HJ2053-2061）相
  关要求。
  。原文件中描述污染物类别为废气，污染物指标为二氧化硫，此处对其进行了匹配工作，将其匹配到LCAflow库里面相最符合的流，污染物指标备注为二氧化硫原文描述的产污系数为 16.78Sar。请根据备注自行核算后修改对应的排放量。
- sulfur dioxide: 0
  the Technical of end-of-pipe management technology for pollution sulfur dioxideisHigh-efficiency lime/gypsum method②，Its Technical efficiency of end-of-pipe management0.5Sar+98.3.The original article describes the pollution production coefficients as 16.78Sar。Please revise the corresponding emissions after accounting for them according to the notes.。.The original article describes the pollution production coefficients as 16.78Sar. Please revise the corresponding emissions after accounting for them according to the notes.
  污染物指标二氧化硫的末端治理技术是高效石灰/石膏法②，其效率为0.5Sar+98.3，末端治理设施实际运行率（k值）计算公式为脱硫设施年实际运行小时数/机组年实际运行小时数，②高效二氧化硫末端治理技术：采取空塔提效、强化气液传质、改善pH值分区等措施，满足《燃煤电厂超低排放烟气治理工程技术规范》（HJ2053-2062）相
  关要求。
  。原文件中描述污染物类别为废气，污染物指标为二氧化硫，此处对其进行了匹配工作，将其匹配到LCAflow库里面相最符合的流，污染物指标备注为二氧化硫原文描述的产污系数为 16.78Sar。请根据备注自行核算后修改对应的排放量。
- sulfur dioxide: 0
  the Technical of end-of-pipe management technology for pollution sulfur dioxideisHigh-efficiency magnesium oxide method②，Its Technical efficiency of end-of-pipe management0.5Sar+98.2.The original article describes the pollution production coefficients as 16.78Sar。Please revise the corresponding emissions after accounting for them according to the notes.。.The original article describes the pollution production coefficients as 16.78Sar. Please revise the corresponding emissions after accounting for them according to the notes.
  污染物指标二氧化硫的末端治理技术是高效氧化镁法②，其效率为0.5Sar+98.2，末端治理设施实际运行率（k值）计算公式为脱硫设施年实际运行小时数/机组年实际运行小时数，②高效二氧化硫末端治理技术：采取空塔提效、强化气液传质、改善pH值分区等措施，满足《燃煤电厂超低排放烟气治理工程技术规范》（HJ2053-2067）相
  关要求。
  。原文件中描述污染物类别为废气，污染物指标为二氧化硫，此处对其进行了匹配工作，将其匹配到LCAflow库里面相最符合的流，污染物指标备注为二氧化硫原文描述的产污系数为 16.78Sar。请根据备注自行核算后修改对应的排放量。
- sulfur dioxide: 0
  the Technical of end-of-pipe management technology for pollution sulfur dioxideisHigh-efficiency seawater desulfurization method ②，Its Technical efficiency of end-of-pipe management0.6Sar+97.8.The original article describes the pollution production coefficients as 16.78Sar。Please revise the corresponding emissions after accounting for them according to the notes.。.The original article describes the pollution production coefficients as 16.78Sar. Please revise the corresponding emissions after accounting for them according to the notes.
  污染物指标二氧化硫的末端治理技术是高效海水脱硫法②，其效率为0.6Sar+97.8，末端治理设施实际运行率（k值）计算公式为脱硫设施年实际运行小时数/机组年实际运行小时数，②高效二氧化硫末端治理技术：采取空塔提效、强化气液传质、改善pH值分区等措施，满足《燃煤电厂超低排放烟气治理工程技术规范》（HJ2053-2063）相
  关要求。
  。原文件中描述污染物类别为废气，污染物指标为二氧化硫，此处对其进行了匹配工作，将其匹配到LCAflow库里面相最符合的流，污染物指标备注为二氧化硫原文描述的产污系数为 16.78Sar。请根据备注自行核算后修改对应的排放量。
- sulfur dioxide: 0
  the Technical of end-of-pipe management technology for pollution sulfur dioxideisLime/gypsum method，Its Technical efficiency of end-of-pipe management1.4286Sar+95.14.The original article describes the pollution production coefficients as 16.78Sar。Please revise the corresponding emissions after accounting for them according to the notes.。.The original article describes the pollution production coefficients as 16.78Sar. Please revise the corresponding emissions after accounting for them according to the notes.
  污染物指标二氧化硫的末端治理技术是石灰/石膏法，其效率为1.4286Sar+95.14，末端治理设施实际运行率（k值）计算公式为脱硫设施年实际运行小时数/机组年实际运行小时数。原文件中描述污染物类别为废气，污染物指标为二氧化硫，此处对其进行了匹配工作，将其匹配到LCAflow库里面相最符合的流，污染物指标备注为二氧化硫原文描述的产污系数为 16.78Sar。请根据备注自行核算后修改对应的排放量。
- sulfur dioxide: 0
  the Technical of end-of-pipe management technology for pollution sulfur dioxideisLimestone/gypsum method，Its Technical efficiency of end-of-pipe management1.4286Sar+95.14.The original article describes the pollution production coefficients as 16.78Sar。Please revise the corresponding emissions after accounting for them according to the notes.。.The original article describes the pollution production coefficients as 16.78Sar. Please revise the corresponding emissions after accounting for them according to the notes.
  污染物指标二氧化硫的末端治理技术是石灰石/石膏法，其效率为1.4286Sar+95.14，末端治理设施实际运行率（k值）计算公式为脱硫设施年实际运行小时数/机组年实际运行小时数。原文件中描述污染物类别为废气，污染物指标为二氧化硫，此处对其进行了匹配工作，将其匹配到LCAflow库里面相最符合的流，污染物指标备注为二氧化硫原文描述的产污系数为 16.78Sar。请根据备注自行核算后修改对应的排放量。
- sulfur dioxide: 0
  the Technical of end-of-pipe management technology for pollution sulfur dioxideisMagnesium oxide method，Its Technical efficiency of end-of-pipe management1.4286Sar+94.86.The original article describes the pollution production coefficients as 16.78Sar。Please revise the corresponding emissions after accounting for them according to the notes.。.The original article describes the pollution production coefficients as 16.78Sar. Please revise the corresponding emissions after accounting for them according to the notes.
  污染物指标二氧化硫的末端治理技术是氧化镁法，其效率为1.4286Sar+94.86，末端治理设施实际运行率（k值）计算公式为脱硫设施年实际运行小时数/机组年实际运行小时数。原文件中描述污染物类别为废气，污染物指标为二氧化硫，此处对其进行了匹配工作，将其匹配到LCAflow库里面相最符合的流，污染物指标备注为二氧化硫原文描述的产污系数为 16.78Sar。请根据备注自行核算后修改对应的排放量。
- sulfur dioxide: 0
  the Technical of end-of-pipe management technology for pollution sulfur dioxideisOthers (carbide slag method)，Its Technical efficiency of end-of-pipe management2.1429Sar+93.71.The original article describes the pollution production coefficients as 16.78Sar。Please revise the corresponding emissions after accounting for them according to the notes.。.The original article describes the pollution production coefficients as 16.78Sar. Please revise the corresponding emissions after accounting for them according to the notes.
  污染物指标二氧化硫的末端治理技术是其他（电石渣法），其效率为2.1429Sar+93.71，末端治理设施实际运行率（k值）计算公式为脱硫设施年实际运行小时数/机组年实际运行小时数。原文件中描述污染物类别为废气，污染物指标为二氧化硫，此处对其进行了匹配工作，将其匹配到LCAflow库里面相最符合的流，污染物指标备注为二氧化硫原文描述的产污系数为 16.78Sar。请根据备注自行核算后修改对应的排放量。
- sulfur dioxide: 0
  the Technical of end-of-pipe management technology for pollution sulfur dioxideisOthers (high-efficiency carbide slag method) ②，Its Technical efficiency of end-of-pipe management0.75Sar+97.8.The original article describes the pollution production coefficients as 16.78Sar。Please revise the corresponding emissions after accounting for them according to the notes.。.The original article describes the pollution production coefficients as 16.78Sar. Please revise the corresponding emissions after accounting for them according to the notes.
  污染物指标二氧化硫的末端治理技术是其他（高效电石渣法）②，其效率为0.75Sar+97.8，末端治理设施实际运行率（k值）计算公式为脱硫设施年实际运行小时数/机组年实际运行小时数，②高效二氧化硫末端治理技术：采取空塔提效、强化气液传质、改善pH值分区等措施，满足《燃煤电厂超低排放烟气治理工程技术规范》（HJ2053-2065）相
  关要求。
  。原文件中描述污染物类别为废气，污染物指标为二氧化硫，此处对其进行了匹配工作，将其匹配到LCAflow库里面相最符合的流，污染物指标备注为二氧化硫原文描述的产污系数为 16.78Sar。请根据备注自行核算后修改对应的排放量。
- sulfur dioxide: 0
  the Technical of end-of-pipe management technology for pollution sulfur dioxideisOthers (high-efficiency sodium alkali method) ②，Its Technical efficiency of end-of-pipe management0.65Sar+98.The original article describes the pollution production coefficients as 16.78Sar。Please revise the corresponding emissions after accounting for them according to the notes.。.The original article describes the pollution production coefficients as 16.78Sar. Please revise the corresponding emissions after accounting for them according to the notes.
  污染物指标二氧化硫的末端治理技术是其他（高效钠碱法）②，其效率为0.65Sar+98，末端治理设施实际运行率（k值）计算公式为脱硫设施年实际运行小时数/机组年实际运行小时数，②高效二氧化硫末端治理技术：采取空塔提效、强化气液传质、改善pH值分区等措施，满足《燃煤电厂超低排放烟气治理工程技术规范》（HJ2053-2066）相
  关要求。
  。原文件中描述污染物类别为废气，污染物指标为二氧化硫，此处对其进行了匹配工作，将其匹配到LCAflow库里面相最符合的流，污染物指标备注为二氧化硫原文描述的产污系数为 16.78Sar。请根据备注自行核算后修改对应的排放量。
- sulfur dioxide: 0
  the Technical of end-of-pipe management technology for pollution sulfur dioxideisOthers (sodium alkali method)，Its Technical efficiency of end-of-pipe management1.8571Sar+94.29.The original article describes the pollution production coefficients as 16.78Sar。Please revise the corresponding emissions after accounting for them according to the notes.。.The original article describes the pollution production coefficients as 16.78Sar. Please revise the corresponding emissions after accounting for them according to the notes.
  污染物指标二氧化硫的末端治理技术是其他（钠碱法），其效率为1.8571Sar+94.29，末端治理设施实际运行率（k值）计算公式为脱硫设施年实际运行小时数/机组年实际运行小时数。原文件中描述污染物类别为废气，污染物指标为二氧化硫，此处对其进行了匹配工作，将其匹配到LCAflow库里面相最符合的流，污染物指标备注为二氧化硫原文描述的产污系数为 16.78Sar。请根据备注自行核算后修改对应的排放量。
- sulfur dioxide: 0
  the Technical of end-of-pipe management technology for pollution sulfur dioxideisSeawater desulfurization process，Its Technical efficiency of end-of-pipe management1.7143Sar+93.71.The original article describes the pollution production coefficients as 16.78Sar。Please revise the corresponding emissions after accounting for them according to the notes.。.The original article describes the pollution production coefficients as 16.78Sar. Please revise the corresponding emissions after accounting for them according to the notes.
  污染物指标二氧化硫的末端治理技术是海水脱硫法，其效率为1.7143Sar+93.71，末端治理设施实际运行率（k值）计算公式为脱硫设施年实际运行小时数/机组年实际运行小时数。原文件中描述污染物类别为废气，污染物指标为二氧化硫，此处对其进行了匹配工作，将其匹配到LCAflow库里面相最符合的流，污染物指标备注为二氧化硫原文描述的产污系数为 16.78Sar。请根据备注自行核算后修改对应的排放量。

## Use advice
This dataset is derived from the Pollution Source Census Report and contains information on pollution emissions and related products. However, it does not include data on energy or chemical consumption, nor does it provide information on waste or co-product generation. When utilizing this dataset, please supplement the missing data based on actual conditions before use
该数据集来源于污染源普查报告，包含污染物排放及相关产品信息，但不包含能源或化学品消耗数据，也不提供废弃物或共生产物产生信息。在使用该数据集时，请根据实际情况补充缺失数据后再使用。

## Review details
Inventory: The internal review was done by several iteration steps concerning raw data validation, raw data documentation, representativity, completeness and consistency of modelling with regard to ISO 14040 and 14044.
清单： 内部审查通过几个迭代步骤完成，涉及原始数据验证、原始数据记录、代表性、完整性、与 ISO 14040 和 14044 有关的建模的一致性。

## Data sources
- 第二次全国污染源普查产排污核算系数手册（试用版）,四级代码4411、4412文件，在完整版文件中第5275页
