# LIB Pyrometallurgy--Traditional roasting(Process A)

Dataset: ILCD process, Unit process, single operation
Geography: CN
Reference year: 2013
Valid until: 2017
Classification: Unit processes / End-of-life treatment / Material recycling
Functional unit: FU is a typical type of LIB electrode material of 100 kg
Generated by: maqingyuan, m1120498928@163.com
Owner: Tiangong LCI Data Working Group
Review: Dependent internal review by Tiangong LCI Data Working Group
Amounts: no units in this file; such an amount is in the reference unit of its flow, which a separate flow dataset defines
copyright: false
licenseType: Free of charge for all users and uses

## General comment
The dismantled electrode materials are directly calcined at a temperature of more than 1200 oC, which removes the graphite in the electrodes and organic materials such as diaphragms, and the metals such as Fe, Mn, Ni and Co are melted into manganese-iron alloys.

## Time period
Data source: 2013-2017

## Technical purpose
Process A of Pyrometallurgy, or traditional roasting, is intended for the direct calcination of dismantled electrode materials in the recycling of Lithium-ion batteries (LIB). The process involves heating the materials at temperatures above 1200 °C to remove organic constituents such as graphite and diaphragms, producing manganese-iron alloys from metals like Fe, Mn, Ni, and Co.

## Reference product
- Electrolyte: 100; input; missing unimportant
  Electrode paste

## Inputs
- water,water: 130; missing unimportant
- Raw coal: 49; missing unimportant
- Electricity: 33.12; missing unimportant

## Outputs
All rows: missing unimportant
- Al/Cu foil: 1.2
- Nickel salt: 1
  Ni salt、metal
- Cobalt salt: 2
  Co salt、metal
- Alloy (Ni, Fe, Al, etc.): 36
- Slags: 17.9
- Metal Fumes: 7.11
- carbon dioxide (fossil): 147
  The original text does not distinguish between bio and fossil, and according to experts, it is fossil here
- sulfur dioxide: 0.2
- Coke: 110

## Data selection and combination
The input-output of the process comes from the average results of the data reported in the literature review, reflecting the representative process from "tomb" to "cradle". This study does not consider the recycling or treatment of plastic and metal shells, and labor costs, factory construction costs, and their impact on the environment are also not included in this analysis.

## Data treatment and extrapolations
It is worth noting that the EU's data is not specific to a specific industry, and some import and export data and recycling information are not suitable for China's situation. Therefore, the improved CRMs evaluation method also combines official Chinese data, literature reports, and data from other interest groups such as trade/industry associations to conduct the best estimation of data from major LIB manufacturers, recycling companies, official management agencies in China, and other stakeholders. In terms of data timeliness, the reference period used in the evaluation of CRMs is based on the latest 4-year average (i.e. 2013-2016).

## Use advice
Users of this data set should note that the provided input-output information is an average derived from literature reviews specific to the period from 2013 to 2017. As this process is a representation from 'tomb' to 'cradle,' it does not account for the recycling or treatment of non-metallic elements such as plastics or metallic casings. Additionally, labor and construction costs, as well as environmental impacts from such, are excluded. The adaptability for China has been enhanced by integrating data from Chinese official sources and industry associations, but EU data might not be fully transferrable due to differing market and regulatory conditions. The Functional Unit (FU) referenced is 100 kg of a typical LIB electrode material.

## Review details
Inventory: The internal review was done by several iteration steps concerning raw data validation, raw data documentation, representativity, completeness and consistency of modelling with regard to ISO 14040 and 14044.

## Data sources
- 宋佳丽. 面向能源金属高效回收的资源关键性评价模型与应用. (天津大学, 2019).
