# Zinc oxide (hypo zinc oxide) ; Zinc baking sand, zinc soot and other zinc-containing materials ; Smoking furnace process ; All sizes; NESPS2 / 氧化锌（次氧化锌） ; 锌焙砂、锌烟尘等含锌物料 ; 烟化炉窑工艺 ; 所有规模 ; 全国第二次污染普查数据

Dataset: ILCD process, Unit process, single operation
Geography: CN
Reference year: 2019
Classification: Reference Parameters / Materials production / Inorganic chemicals
Generated by: The data was created by the Office of the Second National Pollution Source Census of the Ministry of Ecology and Environment, and the data was organized by the TianGong Plan team for ILCD format / 生态环境部第二次全国污染源普查工作办公室创建数据，天工计划团队常慧敏整理数据为ILCD格式
Owner: Tiangong LCI Data Working Group / 天工LCI数据工作小组
Review: Dependent internal review by Tiangong LCI Data Working Group / 天工LCI数据工作小组
Amounts: no units in this file; such an amount is in the reference unit of its flow, which a separate flow dataset defines
copyright: false
licenseType: Free of charge for all users and uses

## General comment
the Technical of end-of-pipe management technology for pollution chemical oxygen demandisRedox process + chemical precipitation，Its Technical efficiency of end-of-pipe management36

## Technical purpose
该数据集代表了使用末端处理技术管理工业废水污染物的多种工艺。主要应用领域为锌氧化物生产设施，处理如锌焙砂和锌烟尘等含锌材料。治理方法专注于降低废水中的化学需氧量（COD）、氨氮、总磷、有机结合氮、铅、砷、镉和汞等污染物，确保满足环境标准。铅、砷、镉和汞去除最有效的处理方法包括中和、氧化还原过程、化学沉淀和膜分离的组合。

## Reference product
- Zinc oxide: 1000; calculated
  源文件中描述为为氧化锌（次氧化锌），此处对其进行了匹配工作，将其匹配到LCAflow库里面相最符合的流，污染物指标备注为工业废水量

## Outputs
All rows: calculated
- Mercury: 5.155e-6
  the Technical of end-of-pipe management technology for pollution MercuryisNeutralization + redox process + chemical precipitation + membrane separation，Its Technical efficiency of end-of-pipe management99.5
  污染物指标汞的末端治理技术是中和法+氧化还原法+化学沉淀法+膜分离法，其效率为99.5，末端治理设施实际运行率（k值）计算公式为K=废水处理设施正常运行时间（小时/年）/企业正常生产时间（小时/年）。原文件中描述污染物类别为废水，污染物指标为汞，此处对其进行了匹配工作，将其匹配到LCAflow库里面相最符合的流，污染物指标备注为汞
- Mercury: 1.031e-5
  the Technical of end-of-pipe management technology for pollution MercuryisNeutralization + redox process + chemical precipitation，Its Technical efficiency of end-of-pipe management99
  污染物指标汞的末端治理技术是中和法+氧化还原法+化学沉淀法，其效率为99，末端治理设施实际运行率（k值）计算公式为K=废水处理设施正常运行时间（小时/年）/企业正常生产时间（小时/年）。原文件中描述污染物类别为废水，污染物指标为汞，此处对其进行了匹配工作，将其匹配到LCAflow库里面相最符合的流，污染物指标备注为汞
- cadmium: 1.757e-5
  the Technical of end-of-pipe management technology for pollution cadmiumisNeutralization + redox process + chemical precipitation + membrane separation，Its Technical efficiency of end-of-pipe management99.5
  污染物指标镉的末端治理技术是中和法+氧化还原法+化学沉淀法+膜分离法，其效率为99.5，末端治理设施实际运行率（k值）计算公式为K=废水处理设施正常运行时间（小时/年）/企业正常生产时间（小时/年）。原文件中描述污染物类别为废水，污染物指标为镉，此处对其进行了匹配工作，将其匹配到LCAflow库里面相最符合的流，污染物指标备注为镉
- Mercury: 2.062e-5
  the Technical of end-of-pipe management technology for pollution MercuryisNeutralization + chemical precipitation，Its Technical efficiency of end-of-pipe management98
  污染物指标汞的末端治理技术是中和法+化学沉淀法，其效率为98，末端治理设施实际运行率（k值）计算公式为K=废水处理设施正常运行时间（小时/年）/企业正常生产时间（小时/年）。原文件中描述污染物类别为废水，污染物指标为汞，此处对其进行了匹配工作，将其匹配到LCAflow库里面相最符合的流，污染物指标备注为汞
- Mercury: 2.062e-5
  the Technical of end-of-pipe management technology for pollution MercuryisRedox process + chemical precipitation，Its Technical efficiency of end-of-pipe management98
  污染物指标汞的末端治理技术是氧化还原法+化学沉淀法，其效率为98，末端治理设施实际运行率（k值）计算公式为K=废水处理设施正常运行时间（小时/年）/企业正常生产时间（小时/年）。原文件中描述污染物类别为废水，污染物指标为汞，此处对其进行了匹配工作，将其匹配到LCAflow库里面相最符合的流，污染物指标备注为汞
- cadmium: 3.514e-5
  the Technical of end-of-pipe management technology for pollution cadmiumisNeutralization + redox process + chemical precipitation，Its Technical efficiency of end-of-pipe management99
  污染物指标镉的末端治理技术是中和法+氧化还原法+化学沉淀法，其效率为99，末端治理设施实际运行率（k值）计算公式为K=废水处理设施正常运行时间（小时/年）/企业正常生产时间（小时/年）。原文件中描述污染物类别为废水，污染物指标为镉，此处对其进行了匹配工作，将其匹配到LCAflow库里面相最符合的流，污染物指标备注为镉
- cadmium: 7.028e-5
  the Technical of end-of-pipe management technology for pollution cadmiumisNeutralization + chemical precipitation，Its Technical efficiency of end-of-pipe management98
  污染物指标镉的末端治理技术是中和法+化学沉淀法，其效率为98，末端治理设施实际运行率（k值）计算公式为K=废水处理设施正常运行时间（小时/年）/企业正常生产时间（小时/年）。原文件中描述污染物类别为废水，污染物指标为镉，此处对其进行了匹配工作，将其匹配到LCAflow库里面相最符合的流，污染物指标备注为镉
- cadmium: 7.028e-5
  the Technical of end-of-pipe management technology for pollution cadmiumisRedox process + chemical precipitation，Its Technical efficiency of end-of-pipe management98
  污染物指标镉的末端治理技术是氧化还原法+化学沉淀法，其效率为98，末端治理设施实际运行率（k值）计算公式为K=废水处理设施正常运行时间（小时/年）/企业正常生产时间（小时/年）。原文件中描述污染物类别为废水，污染物指标为镉，此处对其进行了匹配工作，将其匹配到LCAflow库里面相最符合的流，污染物指标备注为镉
- arsenic: 0.00010321
  the Technical of end-of-pipe management technology for pollution arsenicisNeutralization + redox process + chemical precipitation + membrane separation，Its Technical efficiency of end-of-pipe management99.5
  污染物指标砷的末端治理技术是中和法+氧化还原法+化学沉淀法+膜分离法，其效率为99.5，末端治理设施实际运行率（k值）计算公式为K=废水处理设施正常运行时间（小时/年）/企业正常生产时间（小时/年）。原文件中描述污染物类别为废水，污染物指标为砷，此处对其进行了匹配工作，将其匹配到LCAflow库里面相最符合的流，污染物指标备注为砷
- lead: 0.00010401
  the Technical of end-of-pipe management technology for pollution leadisNeutralization + redox process + chemical precipitation + membrane separation，Its Technical efficiency of end-of-pipe management99.5
  污染物指标铅的末端治理技术是中和法+氧化还原法+化学沉淀法+膜分离法，其效率为99.5，末端治理设施实际运行率（k值）计算公式为K=废水处理设施正常运行时间（小时/年）/企业正常生产时间（小时/年）。原文件中描述污染物类别为废水，污染物指标为铅，此处对其进行了匹配工作，将其匹配到LCAflow库里面相最符合的流，污染物指标备注为铅
- arsenic: 0.00020642
  the Technical of end-of-pipe management technology for pollution arsenicisNeutralization + redox process + chemical precipitation，Its Technical efficiency of end-of-pipe management99
  污染物指标砷的末端治理技术是中和法+氧化还原法+化学沉淀法，其效率为99，末端治理设施实际运行率（k值）计算公式为K=废水处理设施正常运行时间（小时/年）/企业正常生产时间（小时/年）。原文件中描述污染物类别为废水，污染物指标为砷，此处对其进行了匹配工作，将其匹配到LCAflow库里面相最符合的流，污染物指标备注为砷
- lead: 0.00020802
  the Technical of end-of-pipe management technology for pollution leadisNeutralization + redox process + chemical precipitation，Its Technical efficiency of end-of-pipe management99
  污染物指标铅的末端治理技术是中和法+氧化还原法+化学沉淀法，其效率为99，末端治理设施实际运行率（k值）计算公式为K=废水处理设施正常运行时间（小时/年）/企业正常生产时间（小时/年）。原文件中描述污染物类别为废水，污染物指标为铅，此处对其进行了匹配工作，将其匹配到LCAflow库里面相最符合的流，污染物指标备注为铅
- arsenic: 0.00041284
  the Technical of end-of-pipe management technology for pollution arsenicisNeutralization + chemical precipitation，Its Technical efficiency of end-of-pipe management98
  污染物指标砷的末端治理技术是中和法+化学沉淀法，其效率为98，末端治理设施实际运行率（k值）计算公式为K=废水处理设施正常运行时间（小时/年）/企业正常生产时间（小时/年）。原文件中描述污染物类别为废水，污染物指标为砷，此处对其进行了匹配工作，将其匹配到LCAflow库里面相最符合的流，污染物指标备注为砷
- arsenic: 0.00041284
  the Technical of end-of-pipe management technology for pollution arsenicisRedox process + chemical precipitation，Its Technical efficiency of end-of-pipe management98
  污染物指标砷的末端治理技术是氧化还原法+化学沉淀法，其效率为98，末端治理设施实际运行率（k值）计算公式为K=废水处理设施正常运行时间（小时/年）/企业正常生产时间（小时/年）。原文件中描述污染物类别为废水，污染物指标为砷，此处对其进行了匹配工作，将其匹配到LCAflow库里面相最符合的流，污染物指标备注为砷
- lead: 0.00041604
  the Technical of end-of-pipe management technology for pollution leadisNeutralization + chemical precipitation，Its Technical efficiency of end-of-pipe management98
  污染物指标铅的末端治理技术是中和法+化学沉淀法，其效率为98，末端治理设施实际运行率（k值）计算公式为K=废水处理设施正常运行时间（小时/年）/企业正常生产时间（小时/年）。原文件中描述污染物类别为废水，污染物指标为铅，此处对其进行了匹配工作，将其匹配到LCAflow库里面相最符合的流，污染物指标备注为铅
- lead: 0.00041604
  the Technical of end-of-pipe management technology for pollution leadisRedox process + chemical precipitation，Its Technical efficiency of end-of-pipe management98
  污染物指标铅的末端治理技术是氧化还原法+化学沉淀法，其效率为98，末端治理设施实际运行率（k值）计算公式为K=废水处理设施正常运行时间（小时/年）/企业正常生产时间（小时/年）。原文件中描述污染物类别为废水，污染物指标为铅，此处对其进行了匹配工作，将其匹配到LCAflow库里面相最符合的流，污染物指标备注为铅
- phosphorus, total: 0.0005943
  the Technical of end-of-pipe management technology for pollution phosphorus, totalisNeutralization + redox process + chemical precipitation + membrane separation，Its Technical efficiency of end-of-pipe management70
  污染物指标总磷的末端治理技术是中和法+氧化还原法+化学沉淀法+膜分离法，其效率为70，末端治理设施实际运行率（k值）计算公式为K=废水处理设施正常运行时间（小时/年）/企业正常生产时间（小时/年）。原文件中描述污染物类别为废水，污染物指标为总磷，此处对其进行了匹配工作，将其匹配到LCAflow库里面相最符合的流，污染物指标备注为总磷
- phosphorus, total: 0.00075278
  the Technical of end-of-pipe management technology for pollution phosphorus, totalisNeutralization + redox process + chemical precipitation，Its Technical efficiency of end-of-pipe management62
  污染物指标总磷的末端治理技术是中和法+氧化还原法+化学沉淀法，其效率为62，末端治理设施实际运行率（k值）计算公式为K=废水处理设施正常运行时间（小时/年）/企业正常生产时间（小时/年）。原文件中描述污染物类别为废水，污染物指标为总磷，此处对其进行了匹配工作，将其匹配到LCAflow库里面相最符合的流，污染物指标备注为总磷
- phosphorus, total: 0.00095088
  the Technical of end-of-pipe management technology for pollution phosphorus, totalisNeutralization + chemical precipitation，Its Technical efficiency of end-of-pipe management52
  污染物指标总磷的末端治理技术是中和法+化学沉淀法，其效率为52，末端治理设施实际运行率（k值）计算公式为K=废水处理设施正常运行时间（小时/年）/企业正常生产时间（小时/年）。原文件中描述污染物类别为废水，污染物指标为总磷，此处对其进行了匹配工作，将其匹配到LCAflow库里面相最符合的流，污染物指标备注为总磷
- phosphorus, total: 0.00126784
  the Technical of end-of-pipe management technology for pollution phosphorus, totalisRedox process + chemical precipitation，Its Technical efficiency of end-of-pipe management36
  污染物指标总磷的末端治理技术是氧化还原法+化学沉淀法，其效率为36，末端治理设施实际运行率（k值）计算公式为K=废水处理设施正常运行时间（小时/年）/企业正常生产时间（小时/年）。原文件中描述污染物类别为废水，污染物指标为总磷，此处对其进行了匹配工作，将其匹配到LCAflow库里面相最符合的流，污染物指标备注为总磷
- Waste water: 1605
  the Technical of end-of-pipe management technology for pollution Waste wateris/
  污染物指标工业废水量的末端治理技术是/，末端治理设施实际运行率（k值）计算公式为K=废水处理设施正常运行时间（小时/年）/企业正常生产时间（小时/年）。原文件中描述污染物类别为废水，污染物指标为工业废水量，此处对其进行了匹配工作，将其匹配到LCAflow库里面相最符合的流，污染物指标备注为工业废水量
- Ammonia Nitrogen: 0.0038181
  the Technical of end-of-pipe management technology for pollution Ammonia NitrogenisNeutralization + redox process + chemical precipitation + membrane separation，Its Technical efficiency of end-of-pipe management70
  污染物指标氨氮的末端治理技术是中和法+氧化还原法+化学沉淀法+膜分离法，其效率为70，末端治理设施实际运行率（k值）计算公式为K=废水处理设施正常运行时间（小时/年）/企业正常生产时间（小时/年）。原文件中描述污染物类别为废水，污染物指标为氨氮，此处对其进行了匹配工作，将其匹配到LCAflow库里面相最符合的流，污染物指标备注为氨氮
- Ammonia Nitrogen: 0.00483626
  the Technical of end-of-pipe management technology for pollution Ammonia NitrogenisNeutralization + redox process + chemical precipitation，Its Technical efficiency of end-of-pipe management62
  污染物指标氨氮的末端治理技术是中和法+氧化还原法+化学沉淀法，其效率为62，末端治理设施实际运行率（k值）计算公式为K=废水处理设施正常运行时间（小时/年）/企业正常生产时间（小时/年）。原文件中描述污染物类别为废水，污染物指标为氨氮，此处对其进行了匹配工作，将其匹配到LCAflow库里面相最符合的流，污染物指标备注为氨氮
- Ammonia Nitrogen: 0.00610896
  the Technical of end-of-pipe management technology for pollution Ammonia NitrogenisNeutralization + chemical precipitation，Its Technical efficiency of end-of-pipe management52
  污染物指标氨氮的末端治理技术是中和法+化学沉淀法，其效率为52，末端治理设施实际运行率（k值）计算公式为K=废水处理设施正常运行时间（小时/年）/企业正常生产时间（小时/年）。原文件中描述污染物类别为废水，污染物指标为氨氮，此处对其进行了匹配工作，将其匹配到LCAflow库里面相最符合的流，污染物指标备注为氨氮
- Ammonia Nitrogen: 0.00814528
  the Technical of end-of-pipe management technology for pollution Ammonia NitrogenisRedox process + chemical precipitation，Its Technical efficiency of end-of-pipe management36
  污染物指标氨氮的末端治理技术是氧化还原法+化学沉淀法，其效率为36，末端治理设施实际运行率（k值）计算公式为K=废水处理设施正常运行时间（小时/年）/企业正常生产时间（小时/年）。原文件中描述污染物类别为废水，污染物指标为氨氮，此处对其进行了匹配工作，将其匹配到LCAflow库里面相最符合的流，污染物指标备注为氨氮
- Nitrogen, organic bound: 0.0103332
  the Technical of end-of-pipe management technology for pollution Nitrogen, organic boundisNeutralization + redox process + chemical precipitation + membrane separation，Its Technical efficiency of end-of-pipe management70
  污染物指标总氮的末端治理技术是中和法+氧化还原法+化学沉淀法+膜分离法，其效率为70，末端治理设施实际运行率（k值）计算公式为K=废水处理设施正常运行时间（小时/年）/企业正常生产时间（小时/年）。原文件中描述污染物类别为废水，污染物指标为总氮，此处对其进行了匹配工作，将其匹配到LCAflow库里面相最符合的流，污染物指标备注为总氮
- Nitrogen, organic bound: 0.0130887
  the Technical of end-of-pipe management technology for pollution Nitrogen, organic boundisNeutralization + redox process + chemical precipitation，Its Technical efficiency of end-of-pipe management62
  污染物指标总氮的末端治理技术是中和法+氧化还原法+化学沉淀法，其效率为62，末端治理设施实际运行率（k值）计算公式为K=废水处理设施正常运行时间（小时/年）/企业正常生产时间（小时/年）。原文件中描述污染物类别为废水，污染物指标为总氮，此处对其进行了匹配工作，将其匹配到LCAflow库里面相最符合的流，污染物指标备注为总氮
- Nitrogen, organic bound: 0.0165331
  the Technical of end-of-pipe management technology for pollution Nitrogen, organic boundisNeutralization + chemical precipitation，Its Technical efficiency of end-of-pipe management52
  污染物指标总氮的末端治理技术是中和法+化学沉淀法，其效率为52，末端治理设施实际运行率（k值）计算公式为K=废水处理设施正常运行时间（小时/年）/企业正常生产时间（小时/年）。原文件中描述污染物类别为废水，污染物指标为总氮，此处对其进行了匹配工作，将其匹配到LCAflow库里面相最符合的流，污染物指标备注为总氮
- Nitrogen, organic bound: 0.0220442
  the Technical of end-of-pipe management technology for pollution Nitrogen, organic boundisRedox process + chemical precipitation，Its Technical efficiency of end-of-pipe management36
  污染物指标总氮的末端治理技术是氧化还原法+化学沉淀法，其效率为36，末端治理设施实际运行率（k值）计算公式为K=废水处理设施正常运行时间（小时/年）/企业正常生产时间（小时/年）。原文件中描述污染物类别为废水，污染物指标为总氮，此处对其进行了匹配工作，将其匹配到LCAflow库里面相最符合的流，污染物指标备注为总氮
- chemical oxygen demand: 0.04362
  the Technical of end-of-pipe management technology for pollution chemical oxygen demandisNeutralization + redox process + chemical precipitation + membrane separation，Its Technical efficiency of end-of-pipe management70
  污染物指标化学需氧量的末端治理技术是中和法+氧化还原法+化学沉淀法+膜分离法，其效率为70，末端治理设施实际运行率（k值）计算公式为K=废水处理设施正常运行时间（小时/年）/企业正常生产时间（小时/年）。原文件中描述污染物类别为废水，污染物指标为化学需氧量，此处对其进行了匹配工作，将其匹配到LCAflow库里面相最符合的流，污染物指标备注为化学需氧量
- chemical oxygen demand: 0.055252
  the Technical of end-of-pipe management technology for pollution chemical oxygen demandisNeutralization + redox process + chemical precipitation，Its Technical efficiency of end-of-pipe management62
  污染物指标化学需氧量的末端治理技术是中和法+氧化还原法+化学沉淀法，其效率为62，末端治理设施实际运行率（k值）计算公式为K=废水处理设施正常运行时间（小时/年）/企业正常生产时间（小时/年）。原文件中描述污染物类别为废水，污染物指标为化学需氧量，此处对其进行了匹配工作，将其匹配到LCAflow库里面相最符合的流，污染物指标备注为化学需氧量
- chemical oxygen demand: 0.069792
  the Technical of end-of-pipe management technology for pollution chemical oxygen demandisNeutralization + chemical precipitation，Its Technical efficiency of end-of-pipe management52
  污染物指标化学需氧量的末端治理技术是中和法+化学沉淀法，其效率为52，末端治理设施实际运行率（k值）计算公式为K=废水处理设施正常运行时间（小时/年）/企业正常生产时间（小时/年）。原文件中描述污染物类别为废水，污染物指标为化学需氧量，此处对其进行了匹配工作，将其匹配到LCAflow库里面相最符合的流，污染物指标备注为化学需氧量
- chemical oxygen demand: 0.093056
  the Technical of end-of-pipe management technology for pollution chemical oxygen demandisRedox process + chemical precipitation，Its Technical efficiency of end-of-pipe management36
  污染物指标化学需氧量的末端治理技术是氧化还原法+化学沉淀法，其效率为36，末端治理设施实际运行率（k值）计算公式为K=废水处理设施正常运行时间（小时/年）/企业正常生产时间（小时/年）。原文件中描述污染物类别为废水，污染物指标为化学需氧量，此处对其进行了匹配工作，将其匹配到LCAflow库里面相最符合的流，污染物指标备注为化学需氧量

## Use advice
This dataset is derived from the Pollution Source Census Report and contains information on pollution emissions and related products. However, it does not include data on energy or chemical consumption, nor does it provide information on waste or co-product generation. When utilizing this dataset, please supplement the missing data based on actual conditions before use
该数据集来源于污染源普查报告，包含污染物排放及相关产品信息，但不包含能源或化学品消耗数据，也不提供废弃物或共生产物产生信息。在使用该数据集时，请根据实际情况补充缺失数据后再使用。

## Review details
Inventory: The internal review was done by several iteration steps concerning raw data validation, raw data documentation, representativity, completeness and consistency of modelling with regard to ISO 14040 and 14044.
清单： 内部审查通过几个迭代步骤完成，涉及原始数据验证、原始数据记录、代表性、完整性、与 ISO 14040 和 14044 有关的建模的一致性。

## Data sources
- 第二次全国污染源普查产排污核算系数手册（试用版）,四级代码3212文件，在完整版文件中第4878页
