# Pelletizing;Pellet;Pellet

Dataset: ILCD process, Unit process, single operation
Geography: CN
Classification: Unit processes / Materials production / Other mineralic materials
Generated by: Fuxiang, 1162850692@qq.com
Owner: Tiangong LCI Data Working Group
Review: Dependent internal review by Tiangong LCI Data Working Group
Amounts: no units in this file; such an amount is in the reference unit of its flow, which a separate flow dataset defines
copyright: false
licenseType: Free of charge for all users and uses

## General comment
The technical usage of the described industrial process involves the production of pelletized iron ore, commonly referred to as pellets. These pellets are used in Direct Reduction (DR) processes to produce sponge iron, which is then used in steelmaking. The data set provided relates specifically to the Life Cycle Inventory (LCI) of Coal-Based Direct Reduction (Coal-DR) of iron ore pellets, with additional reference to Coke Oven Gas (COG-DR) and Hydrogen-Based Direct Reduction (H-DR) pathways, which are not yet scaled-up in China.

## Geography
The LCI of Coal-DR is obtained, as shown in Table 9, based on the statistics of the demonstration project in China.

## Reference product
- Pellet: 1394.1; calculated

## Inputs
All rows: calculated
- Iron ore: 1505.6
  Iron ore (Import)
- dolomite: 14.2
- quicklime: 2.2
  Quicklime
- freshwater,freshwater: 200
- Circulating water: 700
- bentonite: 22.6
- Raw coal: 44.9
- Electricity: 129.24

## Outputs
- particles (> PM10): 0.3; calculated

## Data treatment and extrapolations
LCI of COG-DR and H-DR routes, which is not scaled-up in China are estimated based on Coal-DR routes combined with literature data from simulations, laboratory tests, and process modeling in Table 9 [49,50]. The LCI of Coal-DR is obtai

## Use advice
Users of this LCA data should take into account that the Life Cycle Inventory for Coal-DR is based on statistics from demonstration projects in China. For the estimation of LCI data for COG-DR and H-DR, users should note that these are derived from the Coal-DR routes but adjusted according to simulations, laboratory tests, and process modeling from referenced literature. As these processes are not fully scaled-up in China, caution should be exercised in applying this data to different geographical contexts or to scaled-up industrial scenarios. Cross-checking with additional datasets or updated information is highly recommended for application in different technological applicability scenarios.

## Review details
Inventory: The internal review was done by several iteration steps concerning raw data validation, raw data documentation, representativity, completeness and consistency of modelling with regard to ISO 14040 and 14044.

## Data sources
- The carbon reduction potential of hydrogen in the low carbon transition of the iron and steel industry: The case of China
