# Propylene Production ; Propylene ; Steam Cracking Route ; Naphtha

Dataset: ILCD process, Unit process, black box
Geography: DL-LN-CN
Reference year: 2018
Classification: Unit processes / Materials production / Organic chemicals
Functional unit: A functional unit is defined as 1 ton of propylene product
LCI method principle: Attributional
LCI method approaches: Allocation - mass
Generated by: Yanan Ren, renyn15@tsinghua.org.cn
Owner: Tiangong LCI Data Working Group
Review: Dependent internal review by Tiangong LCI Data Working Group
Amounts: no units in this file; such an amount is in the reference unit of its flow, which a separate flow dataset defines
copyright: false
licenseType: Free of charge for all users and uses

## General comment
The steam cracking process mainly includes ethylene cracking unit, dry gas recovery unit (ROG), waste alkali oxidation unit (WAO), pressure swing adsorption hydrogen production (PSA) unit and cryogenic storage tank area. Key parameters input for this project include raw materials (naphtha, refinery dry gas, n-butane), energy sources (electricity, steam, fresh water). The process supplies products including hydrogen, ethylene, propylene, mixed C4, pyrolysis gasoline, pyrolysis fuel oil.

## Geography
The process case factory is Hengli Petrochemical Chemical Co., Ltd. The company is located in Dalian City, Liaoning Province. Its steam cracking process was built in 2018, and its propylene production capacity is 400,000 tons per year.

## Time period
Craft built in 2018

## Technology and included processes
The factory is an integrated refining and chemical system, that is, an integrated production model that combines oil refining and naphtha cracking to produce chemicals. Therefore, the main raw materials (naphtha, refinery dry gas, n-butane, n-pentane) for steam cracking process to produce propylene are provided by the petrochemical plant as intermediate products, so the life cycle assessment model ignores the environment of its raw material transportation stage Influence.

## Technical purpose
The steam cracking process is used for the production of propylene and other chemical by-products, such as hydrogen, ethylene, mixed C4, pyrolysis gasoline, and pyrolysis fuel oil. Propylene is a key feedstock in the chemical industry, utilized in the manufacturing of polypropylene plastics, acrylonitrile, propylene oxide, and glycols. The chemicals produced by this process are essential components widely used in various industrial applications such as the production of plastics, textiles, and other synthetic materials.

## Model description
The consumption of raw materials, energy, electricity, steam, water and auxiliary chemicals involved in each sub-stage is considered, and the output considers propylene and by-products (such as C4 products produced by the propane dehydrogenation process. The mass distribution method is used to quantify the products The environmental load between propylene and by-products. In addition, this model also considers the waste discharge of each process. This study focuses on the environmental impact analysis of different propylene production processes. Therefore, the utilization of propylene hydrocarbons and the end-of-life treatment of their products, as well as infrastructure Construction and equipment maintenance are outside the scope of this assessment.

## Reference product
- propene (propylene): 1000; measured
  Acrylic

## Inputs
All rows: measured
- Refinery Gas: 2680
  Refinery dry gas
- naphtha: 2970
  light naphtha
- Butane: 1520
  n-butane
- C5 Hydrocarbon Mixture: 1250
  C5+
- Methanol: 0.08247
- sodium hydroxide: 23.9153
- Dimethyl disulfide: 0.63398
  dimethyl disulfide
- Phosphate: 0.13621
- natural gas: 1230
  fuel gas
- process steam: 3660
  steam
- freshwater: 9050
  fresh water
- Electricity: 721.08
  electricity

## Outputs
All rows: measured
- ethene (ethylene): 3710
  Ethylene
- Pyrolysis gasoline: 920
  pyrolysis gasoline
- Cracked fuel oil: 120
  cracked fuel oil
- C4 Hydrocarbon Mixture: 610
  C4+
- Hydrogen: 170
  hydrogen
- Methane: 2080
- carbon dioxide (fossil): 3560
  CO2
- sulfur dioxide: 0.30451
  SO2
- nitrous oxide: 2.58821
  NOx
- particles (> PM10): 0.30451
  particulates
- chemical oxygen demand: 5.08618
  COD

## Deviations from the LCI method approaches
Quantification of environmental load between product propylene and by-products using mass distribution method

## Data selection and combination
The detailed input-output data of the propylene production process comes from the company's public environmental impact assessment report, including the input of raw materials and auxiliary materials, energy and resource consumption, and discharge of waste gas, wastewater and solid waste.

## Use advice
When utilizing this LCA data set, users should adhere to the defined functional unit of 1 ton of propylene product for comparative purposes. The environmental impacts associated with raw material transportation are excluded due to the integrated production model and close proximity of raw material sources. The mass distribution method should be used to quantify the environmental load shared between propylene and any by-products. The given data set is representative of the specific technology and capacity outlined for Hengli Petrochemical Chemical Co., Ltd. Users should consider this context when applying the data to other scenarios and should not include the impacts of product end-of-life, infrastructure construction, or equipment maintenance as they are beyond the defined boundaries of this assessment.

## Review details
Inventory: The internal review was done by several iteration steps concerning raw data validation, raw data documentation, representativity, completeness and consistency of modelling with regard to ISO 14040 and 14044.

## Data sources
- 吕琳. 丙烯产品环境负荷及温室气体减排的碳税政策. (大连理工大学, 2022).
