# Beneficiation of Rare Earth Oxides (REO) Rare earth oxide;Rare earth oxide process;Bayan Obo

Dataset: ILCD process, Unit process, single operation
Geography: NMG-CN
Reference year: 2014
Classification: Unit processes / Materials production / Non-energetic raw materials
Functional unit: The scope of the LCA is cradle-to-gate and the functional unit was chosen as 1 kg of REO.
LCI method principle: Attributional
LCI method approaches: Allocation - market value; Allocation - exergetic content
Generated by: Tao Wang, twang@iue.ac.cn
Owner: Tiangong LCI Data Working Group
Review: Dependent internal review by Tiangong LCI Data Working Group
Amounts: no units in this file; such an amount is in the reference unit of its flow, which a separate flow dataset defines
copyright: false
licenseType: Free of charge for all users and uses

## General comment
The technical use of this dataset is to describe the process chain for the production of rare earth oxides (REOs) from the Bayan Obo mine in China. The Bayan Obo mine's crude ore, consisting of monazite and bastnasite, is subject to a series of processes including mining, beneficiation, calcination, extraction, and roasting for REO production. This dataset can be used to understand the environmental impact and process efficiency of producing rare earth elements essential for manufacturing electronics, clean energy technologies, and various high-tech applications.

## Geography
Bayan Obo (China)

## Technology and included processes
The process chain for REO production includes mining followed by beneficiation, calcination, extraction, and roasting stages, see Figure 2. The first step in REO production is mining, wherein crude ore is blasted and transported for further refining. Crude ore abstracted from the Bayan Obo mine is composed of both monazite and bastnasite.

## Reference product
- ammonia: 0.002; measured

## Inputs
All rows: measured
- water: 76.344
- Sodium silicate: 0.163
- Sodium carbonate: 0.022
  Soda ash
- Fatty acid: 0.011
- ammonia: 0.041
- Electricity: 0.128
  Separation
- electricity from hydroelectric power plant: 0.054

## Outputs
- nitrogen: 0.003; measured

## Deviations from the LCI method approaches
Life cycle data was obtained from the Ecoinvent database, and mass-based-allocation was performed to partition the environmental impacts among crude ore and REO, as well as allocate the environmental impact among light, medium, heavy, and neodymium REOs. Two alternative allocations schemes, (I) market-based and (II) exegetic-based allocation, were considered as a means to partition the environmental impacts among REOs. The results for market- as well as exergetic-based allocation are provided in the Supporting Information. It is important to note that allocation based on market-value is the preferred method of the metals industry.23 When possible, Chinese-specificlifecycledatawas considered in the analysis; otherwise, European life cycle inventory (LCI) databases were used. The LCA results for REO production presented in this study provide a conservative benchmark for the environmental profile of REE. Furthermore, the LCI and LCA results can be extended/applied to evaluate the production of individual REE and REE-based technologies and products.

## Use advice
Users of this dataset should apply the mass-based allocation method for assessing the environmental impacts associated with the production of crude ore and REOs. Moreover, the dataset provides both market-based and exergetic-based allocation schemes for partitioning the environmental impacts among different REOs (light, medium, heavy, and neodymium). Preferably, the market-value-based allocation should be used, as favored by the metals industry. When analyzing the environmental profile of REEs, consideration of Chinese-specific life cycle data is recommended, when available. Otherwise, European life cycle inventory (LCI) data may be used. The scope of the LCA is cradle-to-gate with a functional unit of 1 kg of REO. The data thus can be extended to evaluate individual REE production and applications in REE-based technology and products.

## Review details
Inventory: The internal review was done by several iteration steps concerning raw data validation, raw data documentation, representativity, completeness and consistency of modelling with regard to ISO 14040 and 14044.

## Data sources
- Zaimes, G. G., Hubler, B. J., Wang, S. & Khanna, V. Environmental Life Cycle Perspective on Rare Earth Oxide Production. ACS Sustainable Chem. Eng. 3, 237–244 (2015).
