# secondary copper production;Refined copper;NerinGutai-Lu (NGL) scrap refining technology;copper scrap

Dataset: ILCD process, Unit process, single operation
Geography: JX-CN
Reference year: 2022
Classification: Unit processes / Materials production / Metals and semimetals
Functional unit: the production of 1 ton of refined copper is taken as the functional unit.
LCI method principle: Attributional
LCI method approaches: Allocation - market value
Generated by: Peng Wang, 2867919560@qq.com
Owner: Tiangong LCI Data Working Group
Review: Dependent internal review by Tiangong LCI Data Working Group
Amounts: no units in this file; such an amount is in the reference unit of its flow, which a separate flow dataset defines
copyright: false
licenseType: Free of charge for all users and uses

## General comment
Refined copper produced through the NerinGutai-Lu (NGL) scrap refining technology is utilized in applications requiring high-purity copper, such as in electrical components, construction, and various industrial processes. This technology recycles copper scrap, converting it into a purer form of copper that is suitable for producing high-conductivity cables, copper rods and tubes, and electronic product components.

## Geography
Life Cycle Inventory (LCI) data of refined copper were derived from on-site surveys and annual monitoring report of several copper production enterprises located in Anhui province and Jiangxi province of China.

## Technology and included processes
Critical processes of this technology include classification and compression of copper scrap, top blown converting of copper scrap, “NGL” refining and casting of crude copper, and electrolysis of anode copper.

## Reference product
- Refined copper: 1000; measured
  Refined copper needs to be supplemented

## Inputs
- Copper scrap（Cu 95%）,Copper scrap（Cu 95%）: 1200; measured
  Copper scrap needs to be supplemented
- quartz sand: 40.2; software or database
  Quartz sand
- Quicklime: 0; software or database
  Quick lime needs to be replenished
- freshwater,freshwater: 2.93; software or database
  Fresh water needs to be replenished
- Limestone: 20.1; software or database
- Hydrochloric acid: 0.151; software or database
  Hydrochloric acid needs to be supplemented
- Sulfuric acid(98%): 5.21; software or database
  Sulfuric acid needs to be supplemented with resourse
- Gelatin: 0.045; software or database
  Gelatin needs supplementation
- Thiourea: 0.075; software or database
  Thiourea needs to replenish the resource
- barium sulfate: 60.3; software or database
  Barium sulfate
- natural gas,natural gas,natural gas: 115; software or database
  Natural gas
- Electricity: 3121.2; measured

## Outputs
All rows: software or database
- chemical oxygen demand: 0.036
  COD needs to be supplemented
- ammonium: 0.00573
  Ammonia nitrogen needs to be supplemented
- sulfur dioxide: 0.0637
  Sulfur dioxide
- nitrous oxide: 0.296
  Nitrogen oxide
- particles (PM2.5 - PM10): 0.0603
- lead: 0.00195
  Lead
- mercury: 0
  Mercury
- arsenic: 0.000219
  Arsenic
- cadmium: 1.92e-5
  Cadmium
- chromium: 2.17e-5
  Chromium
- fluorine: 0
  Fluoride

## Deviations from the LCI method approaches
This study selects the ReCiPe model for LCIA since it is widely applied.

## Data selection and combination
data of refined copper were derived from on-site surveys and annual monitoring report of several copper production enterprises located in Anhui province and Jiangxi province of China.Other material production data for this LCA analysis were derived from Eco-invent database.

## Use advice
When utilizing the Life Cycle Inventory (LCI) data for refined copper, ensure that the system boundaries are clearly defined, particularly if integrating with other datasets. It is vital to account for the geographical specificity (Anhui and Jiangxi provinces, China) of the data as environmental impacts might differ in other regions. When recycling scenarios are considered, ensure that appropriate end-of-life modeling is used. If applying the ReCiPe model for Life Cycle Impact Assessment (LCIA), consider the method's regionalized characterization factors for more accurate impact assessment.

## Review details
Inventory: The internal review was done by several iteration steps concerning raw data validation, raw data documentation, representativity, completeness and consistency of modelling with regard to ISO 14040 and 14044.

## Data sources
- Zhang, J., Tian, X., Chen, W., Geng, Y. & Wilson, J. Measuring environmental impacts from primary and secondary copper production under the upgraded technologies in key Chinese enterprises. Environmental Impact Assessment Review 96, 106855 (2022).
