# Wastepaper pulp to make paper;cardboard

Dataset: ILCD process, Unit process, black box
Geography: CN
Classification: Unit processes / Materials production / Paper and cardboards
Functional unit: In this study, 1000 kg of cardboard product was selected as the functional unit.
LCI method principle: Attributional
Generated by: Yixiang Gao, 22210740040@m.fudan.edu.cn
Owner: Tiangong LCI Data Working Group
Review: Dependent internal review by Tiangong LCI Data Working Group
Amounts: no units in this file; such an amount is in the reference unit of its flow, which a separate flow dataset defines
copyright: false
licenseType: Free of charge for all users and uses

## General comment
The life cycle of boxboard starts from the collection of waste paper, through pulping of waste paper, copying, rewinding, packaging and warehousing of boxboard, until it is delivered to the user or distributor, and it also includes the unit processes of energy production, chemical production, and transport, etc. Since boxboard products are the raw materials for downstream enterprises to produce products, the properties of boxboard have been changed after forming products. Since boxboard products are the raw materials for downstream enterprises to produce products, the formation of products has changed the properties of boxboard, and the use of products and the treatment of waste after use are not within the system boundary of this study, i.e., the "cradle-to-gate" approach. Fuel extraction, transport and infrastructure production are not included in the scope of this study.

## Technology and included processes
废纸在收集、分类过程中需进行运输、分拣、打包等过程，会产生 GHG 排放。

## Technical purpose
The process described pertains to the production of recycled cardboard, beginning with the collection of waste paper. The lifecycle of recycled cardboard includes the manufacturing stages such as pulping of waste paper, creation of the cardboard, rewinding, packaging, and storage. Once it is delivered to the users or distributors, it serves as raw material for downstream manufacturing industries, effectively transforming the nature of the cardboard. The usage of cardboard is widespread in the production of boxes and packaging materials used by various industries. This dataset specifically covers a 'cradle-to-gate' scenario, which includes all the stages up until the product is ready to be shipped to the consumer, but excludes the use and end-of-life treatment of the product. The extraction of fuels, production of vehicles, and construction of infrastructure are excluded from this study. The unit process assessments in this dataset can provide guidance for carbon accounting and reduction in China's papermaking industry.

## Reference product
- Cardboard: 1000; measured
  cardboard(papermaking stage)

## Outputs
All rows: calculated
- Greenhouse Gases: 139.9
  GHG(Waste paper collection phase)
- Greenhouse Gases: 345.3
  GHG(Pulping stage)
- Greenhouse Gases: 1111.6
  GHG(papermaking stage)
- Greenhouse Gases: 20.2
  GHG(Scrap paper stage)
- Greenhouse Gases: 130.7
  GHG(Transportation stage)
- Greenhouse Gases: 50.9
  GHG(Sewege treatment stage)

## Deviations from the LCI method approaches
According to the research of the enterprise, the waste paper used comes from the United States, Europe and China, so the emissions generated by different modes of transport are allocated according to the amount of waste paper from the source and the mode of transport. 2. During the production process, the allocation of steam, electricity and other energy consumption is based on the output of the products, and the allocation of pollutants emitted in the process of energy production is based on the amount of energy consumed in the various units of the process.

## Data selection and combination
In this study, the activity data of the boxboard factory for one year was collected, analysed, filtered and calculated to get the input and output data for each tonne of boxboard produced. During the data calculation process, primary activity level data could not be obtained due to some reasons such as a process not under organisational control, high cost of data research, etc. In cases where primary activity level data is not available, secondary level data is sought to fill the gap. The main sources of secondary activity data in this study were the ecoinvent database and data from the literature.

## Use advice
When using this data for Life Cycle Assessment, pay close attention to the system boundaries and exclusions, such as the exclusion of equipment and building-related production and maintenance processes. The data set focuses on cardboard production within a defined boundary and excludes post-consumer use and waste treatment. GHG emissions related to the collection, sorting, and baling of waste paper should be accounted for. The methodology used for allocation of emissions from transportation should reflect the amount of waste paper sourced from different locations and the mode of transport. Energy use from steam and electricity during production should also be appropriately allocated based on output. Data gaps from primary activities have been filled with secondary data, primarily from the ecoinvent database and literature sources. The study sets a cutoff rule for trivial emission sources constituting less than 1% of the total, with an overall allowance of omitted sources not exceeding 5% of the product's carbon footprint. To comply with PAS 2050, emissions from the production of capital goods should not be included in the product's lifecycle GHG emissions. The functional unit chosen for the study is 1000 kg of cardboard product.

## Review details
Inventory: The internal review was done by several iteration steps concerning raw data validation, raw data documentation, representativity, completeness and consistency of modelling with regard to ISO 14040 and 14044.

## Data sources
- 张清文 & 陈曦. 100%OCC生产的箱纸板碳足迹评价. 中国造纸 34, 20–24 (2015).
