# Remediated groundwater ; Groundwater pump and treatment

Dataset: ILCD process, Unit process, single operation
Geography: UM
Reference year: 2009
Classification: Other Services / Repair and maintenance
Generated by: Yang Xintong, yangxt@caep.org.cn
Owner: Tiangong LCI Data Working Group
Review: Dependent internal review by Tiangong LCI Data Working Group
Amounts: no units in this file; such an amount is in the reference unit of its flow, which a separate flow dataset defines
copyright: false
licenseType: Free of charge for all users and uses

## General comment
PTS removes the contaminated groundwater by pumping and use of aboveground treatment facilities. A PTS provides quick initial reductions in contaminant concentrations, but often results in a slow, steady reduction for the long-term.

## Geography
The case study was conducted using publicly available design documents for two remediation strategies designed by Battelle for Dover Air Force Base (AFB) in Dover, DE

## Technology and included processes
The PTS was modeled with five subsystems: extraction wells, air-stripping unit (ASU), catalytic oxidation unit (COU), granular activated carbon (GAC) unit, and treatment facilities.Following construction and assembly, the system operated using electricity obtained from the U.S. grid. The only maintenance activity considered for the model PTS was the replacement of GAC filter units every 10 years.

## Technical purpose
The groundwater pump and treatment (PTS) process described is intended for the remediation of contaminated groundwater. It is applied in settings such as military bases, industrial sites, or any location where groundwater has been polluted. This process is particularly relevant for sites requiring both immediate and long-term reduction of pollutant concentrations in groundwater.

## Reference product
- Remediated groundwater: 1; measured

## Inputs
All rows: measured
- contaminated groundwater: 1
- Energy, unspecified: 35300
  Extraction Well Operation Energy per year and per well is 35.3 GJ
- Energy, unspecified: 70500
  Catalytic Oxidation Unit Operating Encrgy is 70.5 GJ per year
- Energy, unspecified: 23600
  Air Suipping Unil Operaling Energy is 23.6 GJ per year
- Extraction wel: 1
- Air stripping unit,Catalytic oxidation unit: 1
- Air stripping unit: 1
- Granular active carbon unit: 1
- Treatment facilities: 1

## Use advice
When utilizing this data set for Life Cycle Assessment, it is crucial to ensure the inclusion of all relevant subsystems—extraction wells, air-stripping unit (ASU), catalytic oxidation unit (COU), granular activated carbon (GAC) unit, and treatment facilities. Take note of the electricity source, as the system operates using power from the U.S. grid. The replacement frequency of the GAC filter units, every 10 years, should be factored into the maintenance phase of the lifecycle. Any inputs or emissions not covered in the database should be carefully estimated or calculated using appropriate scientific methods or omitted with justified reasoning.

## Review details
Inventory: The internal review was done by several iteration steps concerning raw data validation, raw data documentation, representativity, completeness and consistency of modelling with regard to ISO 14040 and 14044.

## Data sources
- Life-Cycle Case Study Comparison of Permeable Reactive Barrier versus Pump-and-Treat Remediation
