# Gypsum powder production ; Gypsum powder products ; Crushing and screening method, CN

Dataset: ILCD process
Geography: CN
Classification: Unit processes / Materials production / Other mineralic materials
Generated by: Jiaqi Lu, wilsherelu@foxmail.com
Owner: Tiangong LCI Data Working Group
Review: Dependent internal review by Tiangong LCI Data Working Group
Amounts: no units in this file; such an amount is in the reference unit of its flow, which a separate flow dataset defines
copyright: false
licenseType: Free of charge for all users and uses

## General comment
The gypsum powder produced through this industrial process is mainly intended for use in the construction industry as a material for producing drywall, plaster, and other building materials. It can also be used as a soil amendment to improve soil structure and as a setting retardant in cement.

## Reference product
- Gypsum Powder: 1000; missing unimportant
  Gypsum powder products

## Inputs
All rows: missing unimportant
- Limestone: 400
  limestone
- gypsum: 880
  natural gypsum
- Cellulose: 8
  cellulose
- water: 110
- Electricity: 180.36
- process steam: 720
  steam

## Outputs
- nitrous oxide: 1700; missing unimportant
  Nitrogen oxides [emission to atmosphere (unspecified type)]
- sulfur dioxide: 20870; missing unimportant
  Sulfur dioxide [emission to atmosphere (unspecified type)]
- Particles (PM0.2 - PM2.5): 25330; missing unimportant
  Total particulate matter [emitted to the atmosphere (unspecified type)]

## Use advice
When utilizing this data set for Life Cycle Assessment (LCA), ensure you include the impacts from raw material extraction (e.g., mining of gypsum), production processes, and any transportation related to the production. Exclude any end-of-life recycling or treatment unless your assessment scope specifically includes downstream processing. Pay attention to geographical relevance as the data represent Chinese production context, and adjust for technological variations if applying to different regions.

## Review details
Inventory: The internal review was done by several iteration steps concerning raw data validation, raw data documentation, representativity, completeness and consistency of modelling with regard to ISO 14040 and 14044.

## Data sources
- 永平县石膏粉厂年产 150000 吨双飞粉生产线技改扩建项目环评报告公示
