# Crude oil extraction ; normal crude oil; self injection oil recovery method

Dataset: ILCD process
Geography: CN
Reference year: 2006
Classification: Unit processes / Energy carriers and technologies / Crude oil based fuels
Functional unit: 1kg crude oil production
Generated by: Xiaohua Liu, lxh01311@163.com
Owner: Tiangong LCI Data Working Group
Review: Dependent internal review by Tiangong LCI Data Working Group
Amounts: no units in this file; such an amount is in the reference unit of its flow, which a separate flow dataset defines
copyright: false
licenseType: Free of charge for all users and uses

## General comment
This dataset represents the process of extracting normal crude oil using the self-injection oil recovery method. It is applicable to the energy sector, particularly in the upstream segment where crude oil is produced. The extracted crude oil may be used as a raw material for fuel production, petrochemical manufacturing, and as a feedstock for various industrial processes.

## Reference product
- Fuel Oil: 1000; measured
  crude oil

## Inputs
- Raw coal: 0.56287; measured
  raw coal
- Crude oil: 5.30924; measured
  crude oil
- natural gas,natural gas: 0.00714301; measured
  natural gas

## Outputs
All rows: measured
- carbon dioxide (fossil): 1.5104
  carbon dioxide The original text did not distinguish between bio and fossil，according to expert judgment, this is carbon dioxide (fossil)
- sulfur dioxide: 0.008076
- Nitrogen oxides: 0.00731
  nitrogen oxide
- carbon monoxide (fossil): 0.00156577
  carbon monoxide The original text did not distinguish between bio and fossil，according to expert judgment, this is carbon monoxide(fossil)
- methane (fossil): 0.00296586
  methane The original text did not distinguish between bio and fossil,according to expert judgment, this is carbon methane (fossil)
- fume: 0.0056896
- Wastewater: 4.089
  liquid waste
- Solid Waste: 0.11839
  solid waste

## Use advice
Users of this dataset should consider the geographical and technological specificity of the crude oil extraction process when integrating the data into their Life Cycle Assessment models. The self-injection oil recovery method might have different environmental impacts compared to other extraction methods; hence, the user must ensure the data's relevance to the assessed system. Also, users must account for transportation, refining, and potential co-product allocation when applying this dataset.

## Review details
Inventory: The internal review was done by several iteration steps concerning raw data validation, raw data documentation, representativity, completeness and consistency of modelling with regard to ISO 14040 and 14044.

## Data sources
- 聚碳酸酯和聚乳酸的生命周期评价
