# cement production;cement, ordinary portland cement, 42.5MPa;new dry process;mixed solid wastes

Dataset: ILCD process, Unit process, black box
Geography: HLJ-CN
Reference year: 2008
Classification: Materials production / Other mineralic materials
Generated by: Siqi Yang, ysqsophia@gmail.com
Owner: Tiangong LCI Data Working Group
Review: Dependent internal review by Tiangong LCI Data Working Group
Amounts: no units in this file; such an amount is in the reference unit of its flow, which a separate flow dataset defines
copyright: false
licenseType: Free of charge for all users and uses

## General comment
Laboratory data. Carbide slag replaces limestone for cement production. The proportion of carbide slag in the raw material is 30%. The cement is produced by burning carbide slag generated by the acetylene industry in Heilongjiang. A pre-drying, dry grinding, and dry burning process developed by the Hefei Cement Research & Design Institute is used, which is currently an advanced dry process for producing cement using carbide slag. This process can increase the proportion of carbide slag in the raw material to over 60%, and the substitution rate of limestone can reach over 80%, and the stable formula increases the stability of carbide slag in the mill.

## Technology and included processes
The use of carbide slag to produce cement clinker in my country began in the 1970s, when traditional wet kilns were mainly used for production [5]. Subsequently, semi-wet process, wet grinding and dry burning process and direct grinding, dry grinding and dry burning process gradually appeared [57]. Due to the shortcomings of the above process such as low calcium carbide slag content (or limestone replacement rate), large production load, and high energy consumption, even if non-renewable limestone resources are saved to a certain extent, the overall environmental load caused by cement production is still at a high level. , which is detrimental to the sustainable development of the cement industry. With the technological advancement of cement production technology and the in-depth research on calcium carbide slag, the technology of using calcium carbide slag to produce cement clinker is also constantly improving. In 2005, Hefei Cement Research and Design Institute developed a pre-drying, dry grinding and dry-burning process, which is currently a relatively advanced new dry process for producing cement using calcium carbide slag [58]. This process can make calcium carbide slag be used in raw material preparation. The ratio increased to more than 60%, the limestone replacement rate reached more than 80%, and the relatively stable ingredients improved the stability of carbide slag into the grinding mill.This section selects the above process and uses calcium carbide slag produced by the Heilongjiang Yikuai chemical industry to burn cement to improve the environmental coordination of the Heilongjiang cement industry and promote the sustainable development of the cement industry. The process flow of pre-drying, dry grinding and dry burning is shown in Figure 5-1.

## Technical purpose
This dataset describes the process for producing ordinary Portland cement with a 28-day compressive strength of 42.5MPa using the new dry process that incorporates mixed solid wastes, specifically carbide slag from the acetylene chemical industry in Heilongjiang as a substitute for limestone. This novel production technique developed by Hefei Cement Research & Design Institute allows the carbide slag proportion in raw materials to exceed 60%, replacing over 80% of limestone, thereby promoting environmental sustainability in the cement industry. This cement is applicable in construction projects requiring high-strength building materials.

## Model description
The functional unit is the performance of 1kg cement with a 28-day compressive strength of 42.5MPa, that is, 1Fu=42.5kgMPa. The scope of evaluation is raw meal preparation, clinker calcination and cement preparation. The environmental load caused by the consumption of clay resources is not considered for the time being. Iron powder is an iron correction material, and its environmental impact will not be considered. The wastes considered to be emitted at the output end of the product system mainly include nitrogen oxides, sulfur dioxide, carbon dioxide and dust.

## Reference product
- cement, ordinary portland cement, 42.5MPa: 1000
  42.5 Ordinary silicate cement

## Inputs
- limestone, crushed, for mill: 588.5
  Limestone
- Carbide slag: 349.1
  Carbide slag. In the raw material, the carbide slag ratio is 30%.
- gypsum stone (CaSO4-dihydrate): 51.3
  Gypsum
- ash: 98.7
  Fly ash
- hard coal: 125.927
  Standard coal. The original data is 0.117kg standard coal, here converted to hard coal, the conversion formula is 1kg hard coal = 0.929kg standard coal.
- electricity, medium voltage: 388.8
  Electricity

## Outputs
- particles (> PM10): 0.324
  Dust, with an unspecified particle size, is treated as PM > 10 micrometers in diameter.
- sulfur dioxide: 0.3893
  Sulfur dioxide
- Nitrogen oxides: 1.557
- carbon dioxide: 597.9
  Carbon dioxide

## Use advice
Users of this dataset should apply it specifically to scenarios where ordinary Portland cement produced using the carbide slag substitution method is relevant. It is necessary to take into account the increased stability and substitute rate of limestone when comparing to traditional cement production processes. Considerations regarding the environmental impact should focus on the reduction of limestone extraction and possible alterations in the emission profile, including assessment of nitrogen oxides, sulfur dioxide, carbon dioxide, and dust emissions. This data is not suitable for processes that do not use carbide slag or for scenarios where the unique characteristics of the new dry process are not considered.

## Review details
Inventory: The internal review was done by several iteration steps concerning raw data validation, raw data documentation, representativity, completeness and consistency of modelling with regard to ISO 14040 and 14044.

## Data sources
- 于淼. (2008). 黑龙江水泥工业可持续发展研究 [硕士, 哈尔滨工业大学].
