# Dismantling;PV waste;disassemble mechanically

Dataset: ILCD process, Unit process, single operation
Geography: CN
Classification: Unit processes / End-of-life treatment / Material recycling
Generated by: Nan Wang, 1209824595@qq.com
Owner: Tiangong LCI Data Working Group
Review: Dependent internal review by Tiangong LCI Data Working Group
Amounts: no units in this file; such an amount is in the reference unit of its flow, which a separate flow dataset defines
copyright: false
licenseType: Free of charge for all users and uses

## General comment
The edge of aluminum frame is first cut at the recycling process. Plastic parts separated fromcables are afterwards treated. The waste panels without frameand cable are introduced into a glass separation process.

## Technical purpose
The mentioned industrial process is intended for the recycling of end-of-life photovoltaic (PV) modules. Specifically, it involves the mechanical disassembly of multi-Si PV components, where the aluminum frames are cut, plastic parts from cables are separated for further processing, and the remaining waste panels are subjected to glass separation. This process is essential for material recovery and supports the sustainable end-of-life management of photovoltaic systems, ultimately serving the growing renewable energy industry.

## Reference product
- PV Module Waste: 84; input; software or database

## Outputs
- Glass for recovery (shards): 47.5; software or database
- Ethylene-vinyl acetate copolymer,Ethylene-vinyl acetate copolymer,Ethylene-vinyl acetate copolymer: 15.4; software or database
  EVA
- aluminium: 12.7; software or database

## Data selection and combination
The inventory data of the multi-Si PV modules are collected from several sources: (1) Literatures including Fu (2013), which contain material inventory of several photovoltaic enterprises in Jiangsu province; Diao and Shi (2011), which contain material inventory of two photovoltaic enterprises in Beijing; He (2013), which contain material inventory of four photovoltaic enterprises in Gansu and Sichuan province. (2) Environment Impact Assessment Statements (EIAS) of multi-Si PV production companies from Sichuan (EIAS-Sichuan, 2008), Henan (EIAS-Henan, 2009) and Chongqing (EIAS-Chongqing, 2008). (3) Industry report of market foresight and investment prospect for China’s photovoltaic development (2014) and Industrial report of market foresight and investment prospect for China’s polysilicon development (2014). The mean value is applied when there are different data sources for specific materials.

## Use advice
When utilizing the life cycle assessment data of this industrial process, it is critical to consider the average values provided from the different sources for particular materials to ensure accurate representation of the multi-Si PV module recycling process. Methodological attention should be given to the inclusion of data from various Environmental Impact Assessment Statements (EIAS) and industry reports to capture the full scope of material inventory from different PV enterprises. This data should be integrated carefully into the broader context of PV recycling and environmental sustainability assessments.

## Review details
Inventory: The internal review was done by several iteration steps concerning raw data validation, raw data documentation, representativity, completeness and consistency of modelling with regard to ISO 14040 and 14044.

## Data sources
- Huang, B. et al. Environmental influence assessment of China’s multi-crystalline silicon (multi-Si) photovoltaic modules considering recycling process. Solar Energy 143, 132–141 (2017).
