# End-of-life LFP battery Existing pyrometallurgy process

Dataset: ILCD process, Unit process, single operation
Geography: CN
Reference year: 2018
Classification: Unit processes / End-of-life treatment / Material recycling
Functional unit: using 1 kWh as the functionalunit
Generated by: Pengfei, pengfei24@email.ncu.edu.cn
Owner: Tiangong LCI Data Working Group
Review: Dependent internal review by Tiangong LCI Data Working Group
Amounts: no units in this file; such an amount is in the reference unit of its flow, which a separate flow dataset defines
copyright: false
licenseType: Free of charge for all users and uses

## General comment
Fully discharged EoL LFP batteries are first disassembled and crushed. The battery material is then processed through a 1400℃ smelting (or sintering) process. This is followed by acid leaching and solvent extraction. Finally, oxidation and roasting at 900℃ to obtain LiCoO2.

## Technology and included processes
The organic binder is removed by calcination, the lithium iron phosphate powder is separated from the aluminum foil, and the lithium iron phosphate material is obtained, and then an appropriate amount of raw material is added to it to obtain the required molar ratio of lithium, iron and phosphorus, and a new lithium iron phosphate is synthesized by high temperature solid phase method.

## Technical purpose
The pyrometallurgical process described is utilized for the recycling of end-of-life (EoL) lithium iron phosphate (LFP) batteries. This specific procedure, involving disassembly, crushing, high-temperature sintering at 1400℃, acid leaching, solvent extraction, and a final roasting step at 900℃, is targeted at recovering valuable materials, particularly lithium and cobalt, in the form of lithium cobalt oxide (LiCoO2). The recovered compounds are vital for manufacturing new batteries or for other applications requiring these materials.

## Reference product
- EoL LFP battery: 3.6; input; software or database

## Inputs
All rows: software or database
- Limestone: 1.36
  Limestone, gravel, production mix、EU-28
- Sulphuric acid: 4.39
  Sulphuric acid, production mix、EU-28
- sodium hydroxide: 3
  Sodium hydroxide, production mix、EU-28
- hydrogen peroxide: 0.25
  Hydrogen peroxide
- Electricity: 0.074
- natural gas: 6.84

## Outputs
- Carbon dioxide (fossil): 10.32; software or database
  The original text does not distinguish between bio and fossil, and according to experts, it is fossil here
- copper: 0.98; software or database
- iron: 0.91; software or database
- aluminium: 0.14; software or database

## Data selection and combination
The data come from multiple papers and are difficult to distinguish.

## Use advice
When using the data set for life cycle assessment of the described pyrometallurgy recycling process, ensure that the functional unit is consistent with 1 kWh of battery capacity. This data must be distinguished from other recycling processes, and it should be noted that the information provided is derived from multiple papers. Attention should be given to methodological consistencies, such as system boundaries, assumptions on the efficiency of the recovery process, energy inputs, as well as emissions during the recycling steps. Users must ensure that the technological applicability is compatible with similar end-of-life battery treatments and is representative of the actual recycling practices.

## Review details
Inventory: The internal review was done by several iteration steps concerning raw data validation, raw data documentation, representativity, completeness and consistency of modelling with regard to ISO 14040 and 14044.

## Data sources
- Wang, Y. et al. Environmental impact assessment of second life and recycling for LiFePO4 power batteries in China. Journal of Environmental Management 314, 115083 (2022).
