# Silica production ; Total of all wind farm

Dataset: ILCD process, Unit process, single operation
Geography: SH-CN
Reference year: 2009
Classification: Materials production / Inorganic chemicals
Functional unit: The functional unit is 1 kWh on-grid electricity provision.
LCI method principle: Attributional
LCI method approaches: Allocation
Generated by: Yunzhi Zhao, ll10088@163.com
Owner: Tiangong LCI Data Working Group
Review: Dependent internal review by Tiangong LCI Data Working Group
Amounts: no units in this file; such an amount is in the reference unit of its flow, which a separate flow dataset defines
copyright: false
licenseType: Free of charge for all users and uses

## General comment
The technical usage of the data set pertains to life cycle assessment of offshore wind farm energy production, specifically focusing on the Donghai Bridge Offshore Wind Farm (DBOWF) in China. This involves studying the wind farm from construction to decommissioning, including manufacturing, transportation, installation, operation, and maintenance of wind turbines, foundations, and cables. It is intended for assessment of the environmental impact and energy use of renewable energy sources, particularly for the provision of on-grid electricity.

## Geography
The studied wind farm, the Donghai Bridge Offshore Wind Farm (DBOWF), is China's first offshore wind farm within the jurisdiction of Shanghai, as well as the first offshore wind farm outside Europe. The project has two-phases of construction, located on each side of the Donghai bridge (Fig. 1).

## Reference product
- silicon,silicon: 16400; article inperiodical

## Inputs
- Energy, geothermal, converted: 2.73e6; software or database

## Outputs
- carbon dioxide: 1.17e8; software or database
  GHG
- particles (PM2.5): 20; software or database
- sulfur dioxide: 440; software or database
- nitrous oxide: 180; software or database

## Deviations from the LCI method approaches
The present study employed the PLCA modeling approach to calculate the energy and environmental emissions of a typical offshore wind farm in China. The cradle-to-grave process includes four stages, materials and equipment manufacturing, transportation and installation, operation and maintenance, and dismantling and recycling (Fig. 2).

## Data selection and combination
The technical parameters of wind turbines, foundations and cables are obtained from the design documents of the DBOWF (Table 2). The energy and emissions factors (i.e., the energy consumption and environmental emissions of per unit material and component production) are derived from the Ecoinvent 2.2 dataset (Ecoinvent Centre, 2009), and the coefficients of China's practices were preferentially referred. For key materials and equipment, their sea transportation energy is calculated from the transportation load and shipping energy intensity. The facility installation energy and emissions were estimated based on the construction plan. The wind farm's operation and maintenance data, such as the frequency and working time of maintenance, were obtained from site investigations with engineers and technicians. The uncertainties associated with model parameters and input data are illustrated in the sensitivity analysis section of this paper.

## Use advice
Data users should apply this dataset within the context of a comprehensive life cycle assessment, ensuring they consider the manufacturing, transportation and installation, operation, and maintenance, and dismantling and recycling stages to fully capture the environmental impact and energy usage of the DBOWF. The dataset relies on the Ecoinvent 2.2 database for assumptions on energy and emissions factors; hence, users should update these factors according to the latest regional data and practices for better accuracy. Sensitivity analyses addressing uncertainties within model parameters and input data should be conducted to improve confidence in the LCA outcomes.

## Review details
Inventory: The internal review was done by several iteration steps concerning raw data validation, raw data documentation, representativity, completeness and consistency of modelling with regard to ISO 14040 and 14044.

## Data sources
- Yang, J. et al. The life-cycle energy and environmental emissions of a typical offshore wind farm in China. Journal of Cleaner Production 180, 316–324 (2018).
