# Bio-based ethylene production ; Ethylene ; Bio-ethanol to ethylene route (BETE) ; Corn stover

Dataset: ILCD process, Unit process, black box
Geography: AH-CN
Classification: Energy carriers and technologies / Renewable fuels
Functional unit: The functional unit was defined as one metric ton of ethylene product in 99.9% purity.
LCI method principle: Attributional
LCI method approaches: Allocation - mass
Generated by: Zirui Tang, tangzirui123@gmail.com
Owner: Tiangong LCI Data Working Group
Review: Dependent internal review by Tiangong LCI Data Working Group
Amounts: no units in this file; such an amount is in the reference unit of its flow, which a separate flow dataset defines
copyright: false
licenseType: Free of charge for all users and uses

## General comment
These processes include fermentation to ethanol and dehydration and pressurization of ethanol to ethylene.

## Geography
The case factory for the BETE route was selected from a corn ethanol plant in Anhui province, built in 2005.

## Technology and included processes
Firstly, the corn stover or kernels are treated by bio-fermentation technology to produce ethanol. Ethanol dehydration follows this to ethylene, where the bioethanol is processed through a distillation and dehydration unit. Finally, olefins are produced by quenching and pressurizing to produce ethylene products.

## Technical purpose
This bio-based ethylene production process is intended for the manufacturing of high-purity ethylene predominantly used as a feedstock in the production of various plastics, elastomers, and other organic chemicals. The ethylene derived from the bio-ethanol to ethylene route (BETE) using corn stover may serve a similar market to fossil-based ethylene but with potentially reduced environmental impact through the utilization of biomass.

## Reference product
- ethene (ethylene): 1000; article inperiodical

## Inputs
All rows: article inperiodical
- sodium hydroxide: 0.6
- Corn: 3110
- Liquefaction enzymes: 0.00162
- Glycolytic enzymes: 0.0024
- Yeast: 0.1
- tall oil,sulphuric acid: 1.5
- calcium chloride: 0.5
- Ethanol: 1710
- Light fuel oil: 85
  Fuel oil
- process steam: 1200
  Medium pressure steam
- process steam: 3400
  Low pressure steam
- Electricity: 2026.8
- water: 7800
  Desalted water

## Outputs
- carbon dioxide: 300.8; article inperiodical

## Deviations from the LCI method approaches
The mass method was used to allocate the quantified environmental loads between ethylene and propylene co-product.

## Data selection and combination
We obtained the real-world foreground data of the four ethylene routes from the publicly available official environmental impact assessment reports for chemical companies. Literature and company research data were also reviewed as a supplement. Background data on feedstock (corn) and energy (electricity, industrial water, steam) for the life-cycle models of the four ethylene production routes were obtained from the CLCD and Ecoinvent databases.

## Data treatment and extrapolations
For the feedstock to produce ethanol in the BETE route, maize production inventory was linked to the Ecoinvent database to represent the average status of China's market.

## Use advice
To ensure accurate environmental impact assessment using this dataset, users should include the allocation of environmental loads between ethylene and propylene co-production when modeling the system based on the mass allocation method. The background data should be sourced from the CLCD and Ecoinvent databases, with the understanding that these represent the average conditions in the Chinese market for maize production. Additionally, assumptions concerning energy inputs like electricity, industrial water, and steam should be verified against the specific regional context.

## Review details
Inventory: The internal review was done by several iteration steps concerning raw data validation, raw data documentation, representativity, completeness and consistency of modelling with regard to ISO 14040 and 14044.

## Data sources
- Qian, H., Zhao, Y., Qin, F. & Song, G. Life-cycle environmental burdens of ethylene production in the context of China’s chemical feedstock transition from naphtha to coal and shale gas by-product of ethane. Environmental Impact Assessment Review 101, 107152 (2023).
