# Electricity production ; Thermal power ; Shanxi

Dataset: ILCD process, Unit process, single operation
Geography: SX-CN
Reference year: 2019
Classification: Unit processes / Energy carriers and technologies / Electricity
Generated by: Ruoxi Xiong, xiongrx0126@163.com
Owner: Tiangong LCI Data Working Group
Review: Dependent internal review by Tiangong LCI Data Working Group
Amounts: no units in this file; such an amount is in the reference unit of its flow, which a separate flow dataset defines
copyright: false
licenseType: Free of charge for all users and uses

## General comment
Thermal power generation includes seventeen fossil fuels such as raw coal, washed coal, oil and natural gas. The process only considers the direct power generation process, not the upstream raw material extraction and processing and the downstream power consumption

## Time period
Calculated based on data from the 2019 Energy Statistics Yearbook

## Technical purpose
The data set represents the thermal power generation process in Shanxi province, which utilizes various fossil fuels including raw coal, washed coal, petroleum, and natural gas. This process is focused on direct electricity generation meant for regional power supply and possibly national grid integration. It is primarily applicable in contexts where the electricity produced is required for immediate distribution and consumption, without delving into the lifecycle stages of fuel extraction, processing, or end-user consumption of the generated power.

## Reference product
- electricity for thermal power: 3.6; calculated

## Inputs
All rows: calculated
- Raw coal: 0.386859
- Other Washed Coal: 0.0885188
- Gangue, in ground: 0.0250331
- Coke oven gas: 0.010858
- blast furnace gas: 0.045309
- Converter gas: 0.003996
- Diesel: 2.286e-5
- fuel oil, unspecified: 8.19e-6
- natural gas: 0.007473

## Outputs
- carbon dioxide (fossil): 0.864; calculated
- sulfur dioxide: 0.000166; calculated
- Nitrogen oxides: 0.000264; calculated
- particles (> PM10): 3.3e-5; calculated

## Data treatment and extrapolations
For the accounting method, please refer to the "Enterprise Greenhouse Gas Emissions Accounting Methods and Reporting Guidelines for Power Generation Facilities". Different forms of power generation and fuel consumption come from Chapter 3 (Energy Production) and Chapter 6 (Regional Energy Balance Sheet) in the "China Energy Statistical Yearbook 2020". The fuel parameters such as low calorific value and carbon content per unit calorific value used to calculate the carbon dioxide emission factor come from the "2019 China Regional Power Grid Carbon Dioxide Baseline Emission Factor Calculation Instructions OM" and the "Enterprise Greenhouse Gas Emission Accounting Method and Reporting Guide for Power Generation Facilities" 》

## Use advice
When utilizing this data set, users should note that it exclusively covers the direct power generation phase in Shanxi province, using the specific fossil fuels listed. Users must exclude the upstream and downstream stages of the power lifecycle such as raw material extraction, processing, and the power consumption by end-users from their assessments. For methodological consistency, users should refer to guidelines from 'Enterprise Greenhouse Gas Emissions Accounting Methods and Reporting Guidelines for Power Generation Facilities' and relevant chapters from the 'China Energy Statistical Yearbook 2020' to ensure accurate representation of thermal power generation emissions. Adherence to the provided regional carbon dioxide baseline emission factors and other fuel parameters is crucial for reliability in enumerating the environmental impact and in conducting a comprehensive Life Cycle Assessment.

## Review details
Inventory: The internal review was done by several iteration steps concerning raw data validation, raw data documentation, representativity, completeness and consistency of modelling with regard to ISO 14040 and 14044.

## Data sources
- 熊若熙. 中国电力生产和消费二氧化碳与污染物排放因子核算. (清华大学, 2023).
