# Electricity production ; Thermal power ; Sichuan

Dataset: ILCD process, Unit process, single operation
Geography: SC-CN
Reference year: 2019
Classification: Unit processes / Energy carriers and technologies / Electricity
Generated by: Ruoxi Xiong, xiongrx0126@163.com
Owner: Tiangong LCI Data Working Group
Review: Dependent internal review by Tiangong LCI Data Working Group
Amounts: no units in this file; such an amount is in the reference unit of its flow, which a separate flow dataset defines
copyright: false
licenseType: Free of charge for all users and uses

## General comment
Thermal power generation includes seventeen fossil fuels such as raw coal, washed coal, oil and natural gas. The process only considers the direct power generation process, not the upstream raw material extraction and processing and the downstream power consumption

## Time period
Calculated based on data from the 2019 Energy Statistics Yearbook

## Technical purpose
This dataset is relevant for stakeholders involved in the thermal power industry in Sichuan, China. It details power generation utilizing a variety of fossil fuels, including raw coal, washed coal, oil, and natural gas. The data is focused on the direct power generation process and does not account for the environmental impacts related to the extraction and processing of raw materials or the end use of electricity.

## Reference product
- electricity for thermal power: 3.6; calculated

## Inputs
All rows: calculated
- Raw coal: 0.342546
- Other Washed Coal: 0.00429093
- Gangue, in ground: 0.0270706
- Coke oven gas: 0.015609
- blast furnace gas: 0.217131
- Converter gas: 0.025865
- Diesel: 0.00013332
- fuel oil, unspecified: 0.00033433
- refinery gas: 0.00035074
- natural gas: 0.010584

## Outputs
- carbon dioxide (fossil): 0.913778; calculated
- sulfur dioxide: 0.000146293; calculated
- Nitrogen oxides: 0.000241552; calculated
- particles (> PM10): 3.3639e-5; calculated

## Data treatment and extrapolations
For the accounting method, please refer to the "Enterprise Greenhouse Gas Emissions Accounting Methods and Reporting Guidelines for Power Generation Facilities". Different forms of power generation and fuel consumption come from Chapter 3 (Energy Production) and Chapter 6 (Regional Energy Balance Sheet) in the "China Energy Statistical Yearbook 2020". The fuel parameters such as low calorific value and carbon content per unit calorific value used to calculate the carbon dioxide emission factor come from the "2019 China Regional Power Grid Carbon Dioxide Baseline Emission Factor Calculation Instructions OM" and the "Enterprise Greenhouse Gas Emission Accounting Method and Reporting Guide for Power Generation Facilities" 》

## Use advice
When utilizing this dataset for life cycle assessment or other environmental impact studies, users should carefully consider the boundaries of the dataset, which only includes the direct generation of electricity. Impacts from upstream and downstream processes are excluded. To ensure methodological consistency, users should refer to the 'Enterprise Greenhouse Gas Emissions Accounting Methods and Reporting Guidelines for Power Generation Facilities,' as well as the 'China Energy Statistical Yearbook 2020' and the '2019 China Regional Power Grid Carbon Dioxide Baseline Emission Factor Calculation Instructions OM.'

## Review details
Inventory: The internal review was done by several iteration steps concerning raw data validation, raw data documentation, representativity, completeness and consistency of modelling with regard to ISO 14040 and 14044.

## Data sources
- 熊若熙. 中国电力生产和消费二氧化碳与污染物排放因子核算. (清华大学, 2023).
