# Aluminum ingot casting ; Primary aluminum ingot ; Liquid primary aluminum ; 2016

Dataset: ILCD process, Unit process, single operation
Geography: CN
Reference year: 2021
Classification: Unit processes / Materials production / Metals and semimetals
Generated by: Zimeng Cai, caizm6178@163.com
Owner: Tiangong LCI Data Working Group
Review: Dependent internal review by Tiangong LCI Data Working Group
Amounts: no units in this file; such an amount is in the reference unit of its flow, which a separate flow dataset defines
copyright: false
licenseType: Free of charge for all users and uses

## General comment
The primary aluminum ingot casting process described in this dataset is used to produce raw aluminum ingots from liquid primary aluminum. This process is essential for the creation of high-purity aluminum products that are used in various applications including automotive, aerospace, construction, and electronics industries. The ingots formed from this process can be further processed to manufacture aluminum components and parts.

## Time period
Date of publication

## Reference product
- aluminium, primary, ingot: 1000; software or database

## Inputs
- aluminium, primary, liquid: 1025.67; software or database

## Data selection and combination
The data in this study refers to the LCA data of PA, SA, electricity, and other background data. The PA data were obtained from statistical data sources, and the SA data were mainly obtained from the literatures. The background data were mainly derived from the Chinese localization LCA database CAS RCEES 2018, which was established by the Research Center for Eco-Environmental Sciences, Chinese Academy of Sciences and covers LCA data for energy, materials, transportation, waste management etc.

## Use advice
Users of this data set should take into account the specific year of the data (2016) and the scope of the life cycle assessment. The data for primary aluminum (PA), secondary aluminum (SA), electricity, and other background information draw from statistical data sources and literatures, with additional background data from the Chinese localization LCA database CAS RCEES 2018. It is crucial to ensure methodological consistency when applying this data to LCA studies. Considerations should include the geographic relevance of the data, potential changes in production technology since 2016, and alignment with the goal and scope of the LCA being conducted. Users might need to account for potential variations in the quality of aluminum, as well as adapt the dataset for specific purposes by including or excluding certain life cycle stages or processes based on relevant methodological choices.

## Review details
Inventory: The internal review was done by several iteration steps concerning raw data validation, raw data documentation, representativity, completeness and consistency of modelling with regard to ISO 14040 and 14044.

## Data sources
- Ding, N., Liu, N., Lu, B. & Yang, J. Life cycle greenhouse gas emissions of aluminum based on regional industrial transfer in China. J. Ind. Ecol. 25, 1657–1672 (2021).
