# coal mining; underground fully mechanized coal mining

Dataset: ILCD process, Unit process, black box
Geography: ZZ-SD-CN
Reference year: 2022
Classification: Unit processes / Energy carriers and technologies / Energetic raw materials
Generated by: Linlin Yin, yinlinlin0623@163.com
Owner: Tiangong LCI Data Working Group
Review: Dependent internal review by Tiangong LCI Data Working Group
Amounts: no units in this file; such an amount is in the reference unit of its flow, which a separate flow dataset defines
licenseType: Free of charge for all users and uses

## General comment
This paper uses the life cycle idea to determine the carbon emission boundary of the fully mechanized process under different geological conditions.The purpose of this study was to calculate the amount of CO2 released by each source of carbon emissions throughout the underground coal mining process.

## Geography
The Fifth-II mining area of the Jinda Coal Mine is located in Tengzhou City, Shandong Province, China . The average east–west width of the Fifth-II mining area is about 0.66 km, the average north–south length is about 2.9 km, and the total area is about 1.94 km^2.

## Technology and included processes
The fully mechanized mining process consists of four specific processes: falling and mining coal, transporting coal, roof support, and treatment of the coal mine gob area.

## Technical purpose
The coal extracted from the Fifth-II mining area of the Jinda Coal Mine located in Tengzhou City, Shandong Province, China, is intended for energy production and various industrial applications. The fully mechanized underground mining process ensures efficient retrieval of coal suitable for use in power plants, manufacturing processes, and as a feedstock for chemicals production. The region-specific characteristics, such as the dimensions and mining technology employed, influence the quality and applicability of the coal extracted.

## Reference product
- Hard coal, at consumer EU-27: 1.42728e6; uniform; estimated
  The amount of coal mined in the whole fully mechanized mining ( 4 process flows ) process in the 5-2 coal mining area.

## Inputs
- Hard coal, at consumer EU-27: 1.42728e6; uniform; estimated
  The literature does not explain the amount of coal input. Assume : the amount of coal input : output = 1 : 1.

## Outputs
- carbon dioxide (fossil): 4.1671e7; uniform; calculated
  5-2 coal mining area of the whole fully mechanized mining ( 4 process flow ) process of CO2 emissions ; the original text does not distinguish the flow of bio and fossil, and it is judged by experts to be fossil.

## Data selection and combination
Collect the relevant data on carbon emissions in the mining process of the Jinda Coal Mine, and the B-R model is used to obtain the carbon emissions in the mining process of this mining area.

## Use advice
When utilizing the LCA data from the Jinda Coal Mine's Fifth-II mining area, it is important to consider the specific conditions of the mining process, such as technological level, geological conditions, and employed mining techniques. Ensure accurate representation of carbon emissions by using the B-R model, which has been specifically adapted to the mining processes of this area. Note that the data set does not include input flows and focuses on output flows of coal and CO2. The data should not be used for comparing with mines that employ different mining methods or technological setups without proper normalization.

## Review details
Inventory: The internal review was done by several iteration steps concerning raw data validation, raw data documentation, representativity, completeness and consistency of modelling with regard to ISO 14040 and 14044.

## Data sources
- Li, B. et al. Research on a Carbon Emission Calculation Model and Method for an Underground Fully Mechanized Mining Process. Energies 15, 2871 (2022).
