# Bioethanol ; Solvent-based ; Collection and transportation

Dataset: ILCD process
Geography: GLO
Classification: Unit processes / Energy carriers and technologies / Renewable fuels
Generated by: Jiayi Yuan, jiayi_y@mail.bnu.edu.cn
Owner: Tiangong LCI Data Working Group
Review: Dependent internal review by Tiangong LCI Data Working Group
Amounts: no units in this file; such an amount is in the reference unit of its flow, which a separate flow dataset defines
copyright: false
licenseType: Free of charge for all users and uses

## General comment
This dataset represents the life cycle inventory (LCI) of bioethanol production including collection and transportation, focusing specifically on solvent-based pretreatment technologies. The bioethanol produced is suitable for combustion in vehicles as a renewable fuel alternative to fossil fuels. It can be implemented in scenarios where low-carbon footprint fuels are required, especially within the automotive industry where the shift towards sustainable energy sources is crucial.

## Technology and included processes
Through data quality evaluation, 141 datasets with high completeness and consistency were selected from the reported 561 datasets in 474 published papers and classified into eight technological configurations determined by the pretreatment technology. The technological steps following pretreatment were all the same, although actual flows and parameter values vary, as observed in the literature

## Inputs
- Diesel: 0.0006
  L/kg

## Data selection and combination
Global datasets were used where possible, since the study does not apply to any specific region. LCI data for one external process named “Combustion of bioethanol in car” were obtained from the GREET database

## Data treatment and extrapolations
We assessed the robustness of the modeling results through uncertainty propagation (Monte Carlo), discernibility analysis, global sensitivity analysis, and scenario variation.

## Use advice
Data set users should note that the chosen datasets were selected based on high completeness and consistency from numerous sources, and the modeling results have been verified through various analytical methods, including uncertainty propagation and sensitivity analysis. However, since global data sets were used and the study is not region-specific, users need to adjust the data according to local parameters when applying it to specific geographical contexts. Careful consideration should be given to the inclusion/exclusion of recycling processes, and the use phase of the bioethanol. Additional scenario variations should be explored to contextualize the data appropriately within the framework of specific LCA studies.

## Review details
Inventory: The internal review was done by several iteration steps concerning raw data validation, raw data documentation, representativity, completeness and consistency of modelling with regard to ISO 14040 and 14044.
