# Corn-based ethylene glycol production ; Ethylene glycol ; Catalytical reaction ; Miscanthus

Dataset: ILCD process, Unit process, black box
Geography: CN
Classification: Materials production / Organic chemicals
Functional unit: The functional unit was defined as the production of 1 metric ton of EG in China.
LCI method principle: Attributional
Generated by: Zirui Tang, tangzirui123@gmail.com
Owner: Tiangong LCI Data Working Group
Review: Dependent internal review by Tiangong LCI Data Working Group
Amounts: no units in this file; such an amount is in the reference unit of its flow, which a separate flow dataset defines
copyright: false
licenseType: Free of charge for all users and uses

## General comment
The designed bio-EG production model includes feedstock supply logistics, feedstock pretreatment, reaction, product separation, wastewater treatment and utility.

## Geography
The functional unit was defined as the production of 1 metric ton of EG in China.

## Technology and included processes
Miscanthus passes the pretreatment unit to liberate cellulose and hemicellulose, which are converted into EG under certain conditions in the reaction unit. Raw product flow includes EG, propanediol (PDO), butanediol (BDO), water, and other by-products, and is purified in the following product separation unit. In addition, feedstock supply logistics, utility generation, and wastewater treatment units are designed to support sufficient raw materials and energy, recover valuable components, and dispose of unusable substances.

## Technical purpose
The biomass ethylene glycol (bio-EG) production process described is intended for producing industrial-grade ethylene glycol using corn stover and Miscanthus as raw materials. This ethylene glycol can be used in various applications such as polyester fiber production, antifreeze formulations, and as a solvent in industries.

## Reference product
- Ethylene glycol: 1000; article inperiodical

## Inputs
All rows: article inperiodical
- Miscanthus sinensis: 7200
- Diesel: 100
- water: 104600
- sodium hydroxide: 700
- Hydrogen: 100
- Limestone: 100
  Lime
- Tungstic acid: 300
- Diisobutyl Ketone: 40
- Electricity: 1440

## Outputs
- waste water - untreated: 104800; article inperiodical
- Production residues (unspecified): 1800; article inperiodical
  includes diols (0.3 t), heavy fraction (0.8 t), and light fraction (0.7 t).

## Data selection and combination
The whole production system excluding feedstock supply logistics was developed through steady-state simulation of Aspen Plus, while feedstock supply logistics unit was estimated according to previous work [44].

## Use advice
This life cycle assessment data set should be utilized considering the specific context of the bio-EG production from corn stover and Miscanthus in China. Users must take into account the methodology used for simulation in Aspen Plus, as well as the assumptions made for feedstock supply logistics. The data is most relevant for scenarios involving the production of 1 metric ton of EG. For studies with a broader or different scope, adaptations may be needed. It is advised to take note of other by-products such as propanediol (PDO) and butanediol (BDO) generated during the process and include their environmental impacts in the assessment.

## Review details
Inventory: The internal review was done by several iteration steps concerning raw data validation, raw data documentation, representativity, completeness and consistency of modelling with regard to ISO 14040 and 14044.

## Data sources
- Zhao, Z., Jiang, J., Zheng, M. & Wang, F. Advancing development of biochemicals through the comprehensive evaluation of bio-ethylene glycol. Chemical Engineering Journal 411, 128516 (2021).
