# Other carbamate pesticides ; Raw materials ; Synthesis ; All sizes; NESPS2 / 其他氨基甲酸酯类农药① ; 原料 ; 合成 ; 所有规模 ; 全国第二次污染普查数据

Dataset: ILCD process, Unit process, single operation
Geography: CN
Reference year: 2019
Classification: Reference Parameters / Materials production / Organic chemicals
Generated by: The data was created by the Office of the Second National Pollution Source Census of the Ministry of Ecology and Environment, and the data was organized by the TianGong Plan team for ILCD format / 生态环境部第二次全国污染源普查工作办公室创建数据，天工计划团队常慧敏整理数据为ILCD格式
Owner: Tiangong LCI Data Working Group / 天工LCI数据工作小组
Review: Dependent internal review by Tiangong LCI Data Working Group / 天工LCI数据工作小组
Amounts: no units in this file; such an amount is in the reference unit of its flow, which a separate flow dataset defines
copyright: false
licenseType: Free of charge for all users and uses

## General comment
the Technical of end-of-pipe management technology for pollution volatile organic compoundisRTO，Its Technical efficiency of end-of-pipe management99.9，The formula for calculating the actual operation rate (k-value) of the end-of-pipe treatment facility is k = operating time of terminal treatment facilities (hours/year) / normal production time (hours/year)

## Technical purpose
所述的工业过程涉及合成各种其他氨基甲酸酯类农药，这类农药通常在农业中作为有效的害虫控制剂使用。它们是一类化学品，可以用作除草剂、杀虫剂或杀菌剂，具体取决于它们的配方和目标害虫。

## Reference product
- Amino Acid Ester Pesticides: 1000; calculated
  源文件中描述为为其他氨基甲酸酯类农药①，此处对其进行了匹配工作，将其匹配到LCAflow库里面相最符合的流，污染物指标备注为工业废水量

## Outputs
All rows: calculated
- volatile organic compound: 0.36
  the Technical of end-of-pipe management technology for pollution volatile organic compoundis(Adsorption + steam desorption)/(adsorption + nitrogen/air desorption)，Its Technical efficiency of end-of-pipe management97，The formula for calculating the actual operation rate (k-value) of the end-of-pipe treatment facility is /
  污染物指标挥发性有机物的末端治理技术是（吸附+蒸汽解析）/（吸附+氮气/空气解析），其效率为97，末端治理设施实际运行率（k值）计算公式为k=治理设施耗电量（千瓦时）/（治理设施运行时数（小时）*治理设施额定功率(千瓦)）。原文件中描述污染物类别为废水，污染物指标为挥发性有机物，此处对其进行了匹配工作，将其匹配到LCAflow库里面相最符合的流，污染物指标备注为挥发性有机物
- phenol: 0.004
  the Technical of end-of-pipe management technology for pollution phenolisRedox process + A2/O process，Its Technical efficiency of end-of-pipe management98，The formula for calculating the actual operation rate (k-value) of the end-of-pipe treatment facility is k = annual operating time of wastewater treatment facilities (hours/year) / annual normal production time of enterprises (hours/year)
  污染物指标挥发酚的末端治理技术是氧化还原法+A2/O工艺，其效率为98，末端治理设施实际运行率（k值）计算公式为k=治理设施耗电量（千瓦时）/（治理设施运行时数（小时）*治理设施额定功率(千瓦)）。原文件中描述污染物类别为废水，污染物指标为挥发酚，此处对其进行了匹配工作，将其匹配到LCAflow库里面相最符合的流，污染物指标备注为挥发酚
- Ammonia Nitrogen: 0.00448
  the Technical of end-of-pipe management technology for pollution Ammonia NitrogenisAnaerobic hydrolysis + chemical precipitation + activated sludge process + redox process，Its Technical efficiency of end-of-pipe management84，The formula for calculating the actual operation rate (k-value) of the end-of-pipe treatment facility is k = operating time of terminal treatment facilities (hours/year) / normal production time (hours/year)
  污染物指标氨氮的末端治理技术是厌氧水解类+化学沉淀法+活性污泥法+氧化还原法，其效率为84，末端治理设施实际运行率（k值）计算公式为k=治理设施耗电量（千瓦时）/（治理设施运行时数（小时）*治理设施额定功率(千瓦)）。原文件中描述污染物类别为废水，污染物指标为氨氮，此处对其进行了匹配工作，将其匹配到LCAflow库里面相最符合的流，污染物指标备注为氨氮
- Ammonia Nitrogen: 0.00784
  the Technical of end-of-pipe management technology for pollution Ammonia NitrogenisRedox process + A2/O process，Its Technical efficiency of end-of-pipe management72，The formula for calculating the actual operation rate (k-value) of the end-of-pipe treatment facility is k = operating time of terminal treatment facilities (hours/year) / normal production time (hours/year)
  污染物指标氨氮的末端治理技术是氧化还原法+A2/O工艺，其效率为72，末端治理设施实际运行率（k值）计算公式为k=治理设施耗电量（千瓦时）/（治理设施运行时数（小时）*治理设施额定功率(千瓦)）。原文件中描述污染物类别为废水，污染物指标为氨氮，此处对其进行了匹配工作，将其匹配到LCAflow库里面相最符合的流，污染物指标备注为氨氮
- phenol: 0.01
  the Technical of end-of-pipe management technology for pollution phenolisAnaerobic hydrolysis + chemical precipitation + activated sludge process + redox process，Its Technical efficiency of end-of-pipe management95，The formula for calculating the actual operation rate (k-value) of the end-of-pipe treatment facility is k = operating time of wastewater treatment facilities (hours/year) / annual normal production time of enterprise (hours/year)
  污染物指标挥发酚的末端治理技术是厌氧水解类+化学沉淀法+活性污泥法+氧化还原法，其效率为95，末端治理设施实际运行率（k值）计算公式为k=治理设施耗电量（千瓦时）/（治理设施运行时数（小时）*治理设施额定功率(千瓦)）。原文件中描述污染物类别为废水，污染物指标为挥发酚，此处对其进行了匹配工作，将其匹配到LCAflow库里面相最符合的流，污染物指标备注为挥发酚
- Nitrogen, organic bound: 0.01335
  the Technical of end-of-pipe management technology for pollution Nitrogen, organic boundisAnaerobic hydrolysis + chemical precipitation + activated sludge process + redox process，Its Technical efficiency of end-of-pipe management85，The formula for calculating the actual operation rate (k-value) of the end-of-pipe treatment facility is k = operating time of terminal treatment facilities (hours/year) / normal production time (hours/year)
  污染物指标总氮的末端治理技术是厌氧水解类+化学沉淀法+活性污泥法+氧化还原法，其效率为85，末端治理设施实际运行率（k值）计算公式为k=治理设施耗电量（千瓦时）/（治理设施运行时数（小时）*治理设施额定功率(千瓦)）。原文件中描述污染物类别为废水，污染物指标为总氮，此处对其进行了匹配工作，将其匹配到LCAflow库里面相最符合的流，污染物指标备注为总氮
- Nitrogen, organic bound: 0.03115
  the Technical of end-of-pipe management technology for pollution Nitrogen, organic boundisRedox process + A2/O process，Its Technical efficiency of end-of-pipe management65，The formula for calculating the actual operation rate (k-value) of the end-of-pipe treatment facility is k = operating time of wastewater treatment facilities (hours/year) / annual normal production time of enterprise (hours/year)
  污染物指标总氮的末端治理技术是氧化还原法+A2/O工艺，其效率为65，末端治理设施实际运行率（k值）计算公式为k=治理设施耗电量（千瓦时）/（治理设施运行时数（小时）*治理设施额定功率(千瓦)）。原文件中描述污染物类别为废水，污染物指标为总氮，此处对其进行了匹配工作，将其匹配到LCAflow库里面相最符合的流，污染物指标备注为总氮
- Waste water: 40000
  the Technical of end-of-pipe management technology for pollution Waste wateris/，Its Technical efficiency of end-of-pipe management0，The formula for calculating the actual operation rate (k-value) of the end-of-pipe treatment facility is /
  污染物指标工业废水量的末端治理技术是/，其效率为0。原文件中描述污染物类别为废水，污染物指标为工业废水量，此处对其进行了匹配工作，将其匹配到LCAflow库里面相最符合的流，污染物指标备注为工业废水量
- chemical oxygen demand: 0.1226
  the Technical of end-of-pipe management technology for pollution chemical oxygen demandisAnaerobic hydrolysis + chemical precipitation + activated sludge process + redox process，Its Technical efficiency of end-of-pipe management98，The formula for calculating the actual operation rate (k-value) of the end-of-pipe treatment facility is k = operating time of terminal treatment facilities (hours/year) / normal production time (hours/year)
  污染物指标化学需氧量的末端治理技术是厌氧水解类+化学沉淀法+活性污泥法+氧化还原法，其效率为98，末端治理设施实际运行率（k值）计算公式为k=治理设施耗电量（千瓦时）/（治理设施运行时数（小时）*治理设施额定功率(千瓦)）。原文件中描述污染物类别为废水，污染物指标为化学需氧量，此处对其进行了匹配工作，将其匹配到LCAflow库里面相最符合的流，污染物指标备注为化学需氧量
- chemical oxygen demand: 0.5517
  the Technical of end-of-pipe management technology for pollution chemical oxygen demandisRedox process + A2/O process，Its Technical efficiency of end-of-pipe management91，The formula for calculating the actual operation rate (k-value) of the end-of-pipe treatment facility is /
  污染物指标化学需氧量的末端治理技术是氧化还原法+A2/O工艺，其效率为91，末端治理设施实际运行率（k值）计算公式为k=治理设施耗电量（千瓦时）/（治理设施运行时数（小时）*治理设施额定功率(千瓦)）。原文件中描述污染物类别为废水，污染物指标为化学需氧量，此处对其进行了匹配工作，将其匹配到LCAflow库里面相最符合的流，污染物指标备注为化学需氧量
- Exhaust gas: 10000
  the Technical of end-of-pipe management technology for pollution Exhaust gasis/，Its Technical efficiency of end-of-pipe management0，The formula for calculating the actual operation rate (k-value) of the end-of-pipe treatment facility is k = annual operating time of wastewater treatment facilities (hours/year) / annual normal production time of enterprises (hours/year)
  污染物指标工业废气量的末端治理技术是/，其效率为0。原文件中描述污染物类别为废水，污染物指标为工业废气量，此处对其进行了匹配工作，将其匹配到LCAflow库里面相最符合的流，污染物指标备注为工业废气量
- volatile organic compound: 0
  the Technical of end-of-pipe management technology for pollution volatile organic compoundisRTO，Its Technical efficiency of end-of-pipe management99.9，The formula for calculating the actual operation rate (k-value) of the end-of-pipe treatment facility is k = operating time of terminal treatment facilities (hours/year) / normal production time (hours/year).The original article describes the pollution production coefficients as 。Please revise the corresponding emissions after accounting for them according to the notes.。.The original article describes the pollution production coefficients as . Please revise the corresponding emissions after accounting for them according to the notes.
  污染物指标挥发性有机物的末端治理技术是RTO，其效率为99.9，末端治理设施实际运行率（k值）计算公式为k=治理设施耗电量（千瓦时）/（治理设施运行时数（小时）*治理设施额定功率(千瓦)）。原文件中描述污染物类别为废水，污染物指标为挥发性有机物，此处对其进行了匹配工作，将其匹配到LCAflow库里面相最符合的流，污染物指标备注为挥发性有机物原文描述的产污系数为 。请根据备注自行核算后修改对应的排放量。

## Use advice
This dataset is derived from the Pollution Source Census Report and contains information on pollution emissions and related products. However, it does not include data on energy or chemical consumption, nor does it provide information on waste or co-product generation. When utilizing this dataset, please supplement the missing data based on actual conditions before use
该数据集来源于污染源普查报告，包含污染物排放及相关产品信息，但不包含能源或化学品消耗数据，也不提供废弃物或共生产物产生信息。在使用该数据集时，请根据实际情况补充缺失数据后再使用。

## Review details
Inventory: The internal review was done by several iteration steps concerning raw data validation, raw data documentation, representativity, completeness and consistency of modelling with regard to ISO 14040 and 14044.
清单： 内部审查通过几个迭代步骤完成，涉及原始数据验证、原始数据记录、代表性、完整性、与 ISO 14040 和 14044 有关的建模的一致性。

## Data sources
- 第二次全国污染源普查产排污核算系数手册（试用版）,二级代码26,三级代码263.0文件，在完整版文件中第2936页
