# Rare Earth reduction;Rare Earth;Molten Salt Electrolysis;NdFeB Magnet Scrap

Dataset: ILCD process, Unit process, single operation
Geography: CN
Reference year: 2013
Valid until: 2016
Classification: Unit processes / Materials production / Metals and semimetals
Functional unit: The functional unit of this analysis was chosen as the production of one kg Nd–Pr alloy through extraction from NdFeB magnet scrap
LCI method principle: Attributional
LCI method approaches: Allocation - market value
Generated by: Tao Wang, twang@iue.ac.cn
Owner: Tiangong LCI Data Working Group
Review: Dependent internal review by Tiangong LCI Data Working Group
Amounts: no units in this file; such an amount is in the reference unit of its flow, which a separate flow dataset defines
copyright: false
licenseType: Free of charge for all users and uses

## General comment
This process relates to the recovery and recycling of rare earth metals, specifically the Nd–Pr alloy, from NdFeB magnet scrap. The application is targeted for the reclamation of neodymium and praseodymium, which are critical in the manufacturing of new high-strength permanent magnets commonly used in various technologies, including electric motors, wind turbine generators, and hard disk drives.

## Technology and included processes
The one-step recycling process to extract rare earth metals from scrap magnets is being developed on a laboratory scale at TU Delft. Nonmagnetized, uncoated magnet samples were used in the experiment. The magnets were ball milled under inert atmosphere to increase the surface area to facilitate the electrochemical reactions, and the powder was inserted into the salt bath.

## Reference product
- Rare Earth Oxides: 1; calculated

## Inputs
- Electricity: 39.6; min 32.4; max 46.8; uniform; calculated
  Reduction of rare earth oxides in molten salts: Energy consumption during electro-lysis,

## Outputs
- HFC-116: 0.00151516; min 3.031e-5; max 0.003; uniform; calculated
  Reduction of rare earth oxides in molten salts
- FC-14: 0.0300069; min 6.905e-6; max 0.03; uniform; calculated
  Reduction of rare earth oxides in molten salts

## Deviations from the LCI method approaches
The allocation of environmental flows to Nd and Pr was updated. Value allocation was used to share the process impacts from both multi-output stages, reflecting prices from recent years (2013–2016). There are two stages in the primary production of rare earths for which assumptions regarding coproductions are necessary: the beneficiation stage, where concentrated iron ore and rare earth concentrate are separated, and the solvent extraction stage undertaken to separate individual rare earths.

## Use advice
Users of this dataset should take note that the life cycle assessment data is based on a one-step laboratory scale process for the extraction of rare earth metals developed by TU Delft, hence it may not directly reflect industrial scale operations. It is important to consider that this data should be used for initial assessments and theoretical evaluations, and careful attention should be given to scaling factors when applying this data to larger production scenarios. Users should also account for the allocation of environmental impacts between Nd and Pr based on the updated value allocation reflecting prices from recent years (2013–2016), particularly at the beneficiation stage and the solvent extraction stage.

## Review details
Inventory: The internal review was done by several iteration steps concerning raw data validation, raw data documentation, representativity, completeness and consistency of modelling with regard to ISO 14040 and 14044.

## Data sources
- Schulze, R., Abbasalizadeh, A., Bulach, W., Schebek, L. & Buchert, M. An Ex-ante LCA Study of Rare Earth Extraction from NdFeB Magnet Scrap Using Molten Salt Electrolysis. J. Sustain. Metall. 4, 493–505 (2018).
