# Electricity/electrical energy + heat energy ; Fuel oil ; Boiler/burner ; All sizes; NESPS2 / 电能/电能+热能 ; 燃油 ; 锅炉/燃机 ; 所有规模 ; 全国第二次污染普查数据

Dataset: ILCD process, Unit process, single operation
Geography: CN
Reference year: 2019
Classification: Reference Parameters / Energy carriers and technologies / Electricity
Generated by: The data was created by the Office of the Second National Pollution Source Census of the Ministry of Ecology and Environment, and the data was organized by the TianGong Plan team for ILCD format / 生态环境部第二次全国污染源普查工作办公室创建数据，天工计划团队常慧敏整理数据为ILCD格式
Owner: Tiangong LCI Data Working Group / 天工LCI数据工作小组
Review: Dependent internal review by Tiangong LCI Data Working Group / 天工LCI数据工作小组
Amounts: no units in this file; such an amount is in the reference unit of its flow, which a separate flow dataset defines
copyright: false
licenseType: Free of charge for all users and uses

## General comment
the Technical of end-of-pipe management technology for pollution mercuryisOthers (direct discharge)

## Technical purpose
提供的数据集描述了在工业环境中应用各种末端污染物管理技术。技术包括产生电力和热量的燃油锅炉，以及处理废水，化学需氧量，氨氮，废气，颗粒物(PM2.5 - PM10)，二氧化硫和氮氧化物的先进方法。预期应用包括寻求通过高效污染控制技术减少排放并满足监管标准的大型工业厂。

## Reference product
- Heavy fuel oil (1.0 wt.% S): 1000; input; calculated
  源文件中描述为为燃油，此处对其进行了匹配工作，将其匹配到LCAflow库里面相最符合的流，污染物指标备注为工业废水量

## Outputs
All rows: calculated
- volatile organic compound: 0
  the Technical of end-of-pipe management technology for pollution volatile organic compoundis/
  污染物指标挥发性有机物的末端治理技术是/。原文件中描述污染物类别为废气，污染物指标为挥发性有机物，此处对其进行了匹配工作，将其匹配到LCAflow库里面相最符合的流，污染物指标备注为挥发性有机物
- particles (PM2.5 - PM10): 0.007
  the Technical of end-of-pipe management technology for pollution particles (PM2.5 - PM10)isHigh-efficiency bag filter + others (wet desulfurization synergy) + others (wet electrostatic precipitator)①，Its Technical efficiency of end-of-pipe management97.2
  污染物指标颗粒物的末端治理技术是高效袋式除尘+其他（湿法脱硫协同）+其他（湿式电除尘）①，其效率为97.2，末端治理设施实际运行率（k值）计算公式为除尘设施年实际运行小时数/机组年实际运行小时数，①高效颗粒物末端治理技术：采取高效电源供电、低低温电除尘、超净电袋、高效袋式除尘、湿法脱硫协同、湿式电除尘等技术，满足《燃煤电厂超低排放烟气
  治理工程技术规范》（HJ2053-2267）相关要求。
  。原文件中描述污染物类别为废气，污染物指标为颗粒物，此处对其进行了匹配工作，将其匹配到LCAflow库里面相最符合的流，污染物指标备注为颗粒物
- particles (PM2.5 - PM10): 0.007
  the Technical of end-of-pipe management technology for pollution particles (PM2.5 - PM10)isHigh-efficiency electric-bag composite precipitator + others (wet desulfurization synergy) + others (wet electrostatic precipitator)①，Its Technical efficiency of end-of-pipe management97.2
  污染物指标颗粒物的末端治理技术是高效电袋组合+其他（湿法脱硫协同）+其他（湿式电除尘）①，其效率为97.2，末端治理设施实际运行率（k值）计算公式为除尘设施年实际运行小时数/机组年实际运行小时数，①高效颗粒物末端治理技术：采取高效电源供电、低低温电除尘、超净电袋、高效袋式除尘、湿法脱硫协同、湿式电除尘等技术，满足《燃煤电厂超低排放烟气
  治理工程技术规范》（HJ2053-2266）相关要求。
  。原文件中描述污染物类别为废气，污染物指标为颗粒物，此处对其进行了匹配工作，将其匹配到LCAflow库里面相最符合的流，污染物指标备注为颗粒物
- particles (PM2.5 - PM10): 0.007
  the Technical of end-of-pipe management technology for pollution particles (PM2.5 - PM10)isHigh-efficiency electrostatic precipitation + others (wet desulfurization synergy) + others (wet electrostatic precipitator)①，Its Technical efficiency of end-of-pipe management97.2
  污染物指标颗粒物的末端治理技术是高效静电除尘+其他（湿法脱硫协同）+其他（湿式电除尘）①，其效率为97.2，末端治理设施实际运行率（k值）计算公式为除尘设施年实际运行小时数/机组年实际运行小时数，①高效颗粒物末端治理技术：采取高效电源供电、低低温电除尘、超净电袋、高效袋式除尘、湿法脱硫协同、湿式电除尘等技术，满足《燃煤电厂超低排放烟气
  治理工程技术规范》（HJ2053-2265）相关要求。
  。原文件中描述污染物类别为废气，污染物指标为颗粒物，此处对其进行了匹配工作，将其匹配到LCAflow库里面相最符合的流，污染物指标备注为颗粒物
- particles (PM2.5 - PM10): 0.0175
  the Technical of end-of-pipe management technology for pollution particles (PM2.5 - PM10)isHigh-efficiency bag filter + others (wet electrostatic precipitator)①，Its Technical efficiency of end-of-pipe management93
  污染物指标颗粒物的末端治理技术是高效袋式除尘+其他（湿式电除尘）①，其效率为93，末端治理设施实际运行率（k值）计算公式为除尘设施年实际运行小时数/机组年实际运行小时数，①高效颗粒物末端治理技术：采取高效电源供电、低低温电除尘、超净电袋、高效袋式除尘、湿法脱硫协同、湿式电除尘等技术，满足《燃煤电厂超低排放烟气
  治理工程技术规范》（HJ2053-2264）相关要求。
  。原文件中描述污染物类别为废气，污染物指标为颗粒物，此处对其进行了匹配工作，将其匹配到LCAflow库里面相最符合的流，污染物指标备注为颗粒物
- particles (PM2.5 - PM10): 0.0175
  the Technical of end-of-pipe management technology for pollution particles (PM2.5 - PM10)isHigh-efficiency electric-bag composite precipitator + others (wet electrostatic precipitator)①，Its Technical efficiency of end-of-pipe management93
  污染物指标颗粒物的末端治理技术是高效电袋组合+其他（湿式电除尘）①，其效率为93，末端治理设施实际运行率（k值）计算公式为除尘设施年实际运行小时数/机组年实际运行小时数，①高效颗粒物末端治理技术：采取高效电源供电、低低温电除尘、超净电袋、高效袋式除尘、湿法脱硫协同、湿式电除尘等技术，满足《燃煤电厂超低排放烟气
  治理工程技术规范》（HJ2053-2263）相关要求。
  。原文件中描述污染物类别为废气，污染物指标为颗粒物，此处对其进行了匹配工作，将其匹配到LCAflow库里面相最符合的流，污染物指标备注为颗粒物
- particles (PM2.5 - PM10): 0.0175
  the Technical of end-of-pipe management technology for pollution particles (PM2.5 - PM10)isHigh-efficiency electrostatic precipitation + others (wet electrostatic precipitator)①，Its Technical efficiency of end-of-pipe management93
  污染物指标颗粒物的末端治理技术是高效静电除尘+其他（湿式电除尘）①，其效率为93，末端治理设施实际运行率（k值）计算公式为除尘设施年实际运行小时数/机组年实际运行小时数，①高效颗粒物末端治理技术：采取高效电源供电、低低温电除尘、超净电袋、高效袋式除尘、湿法脱硫协同、湿式电除尘等技术，满足《燃煤电厂超低排放烟气
  治理工程技术规范》（HJ2053-2262）相关要求。
  。原文件中描述污染物类别为废气，污染物指标为颗粒物，此处对其进行了匹配工作，将其匹配到LCAflow库里面相最符合的流，污染物指标备注为颗粒物
- particles (PM2.5 - PM10): 0.035
  the Technical of end-of-pipe management technology for pollution particles (PM2.5 - PM10)isHigh-efficiency bag filter + others (wet desulfurization synergy)①，Its Technical efficiency of end-of-pipe management86
  污染物指标颗粒物的末端治理技术是高效袋式除尘+其他（湿法脱硫协同）①，其效率为86，末端治理设施实际运行率（k值）计算公式为除尘设施年实际运行小时数/机组年实际运行小时数，①高效颗粒物末端治理技术：采取高效电源供电、低低温电除尘、超净电袋、高效袋式除尘、湿法脱硫协同、湿式电除尘等技术，满足《燃煤电厂超低排放烟气
  治理工程技术规范》（HJ2053-2261）相关要求。
  。原文件中描述污染物类别为废气，污染物指标为颗粒物，此处对其进行了匹配工作，将其匹配到LCAflow库里面相最符合的流，污染物指标备注为颗粒物
- particles (PM2.5 - PM10): 0.035
  the Technical of end-of-pipe management technology for pollution particles (PM2.5 - PM10)isHigh-efficiency electric-bag composite precipitator + others (wet desulfurization synergy)①，Its Technical efficiency of end-of-pipe management86
  污染物指标颗粒物的末端治理技术是高效电袋组合+其他（湿法脱硫协同）①，其效率为86，末端治理设施实际运行率（k值）计算公式为除尘设施年实际运行小时数/机组年实际运行小时数，①高效颗粒物末端治理技术：采取高效电源供电、低低温电除尘、超净电袋、高效袋式除尘、湿法脱硫协同、湿式电除尘等技术，满足《燃煤电厂超低排放烟气
  治理工程技术规范》（HJ2053-2260）相关要求。
  。原文件中描述污染物类别为废气，污染物指标为颗粒物，此处对其进行了匹配工作，将其匹配到LCAflow库里面相最符合的流，污染物指标备注为颗粒物
- particles (PM2.5 - PM10): 0.035
  the Technical of end-of-pipe management technology for pollution particles (PM2.5 - PM10)isHigh-efficiency electrostatic precipitation + others (wet desulfurization synergy)①，Its Technical efficiency of end-of-pipe management86
  污染物指标颗粒物的末端治理技术是高效静电除尘+其他（湿法脱硫协同）①，其效率为86，末端治理设施实际运行率（k值）计算公式为除尘设施年实际运行小时数/机组年实际运行小时数，①高效颗粒物末端治理技术：采取高效电源供电、低低温电除尘、超净电袋、高效袋式除尘、湿法脱硫协同、湿式电除尘等技术，满足《燃煤电厂超低排放烟气
  治理工程技术规范》（HJ2053-2259）相关要求。
  。原文件中描述污染物类别为废气，污染物指标为颗粒物，此处对其进行了匹配工作，将其匹配到LCAflow库里面相最符合的流，污染物指标备注为颗粒物
- particles (PM2.5 - PM10): 0.0875
  the Technical of end-of-pipe management technology for pollution particles (PM2.5 - PM10)isHigh-efficiency bag filter①，Its Technical efficiency of end-of-pipe management65
  污染物指标颗粒物的末端治理技术是高效袋式除尘①，其效率为65，末端治理设施实际运行率（k值）计算公式为除尘设施年实际运行小时数/机组年实际运行小时数，①高效颗粒物末端治理技术：采取高效电源供电、低低温电除尘、超净电袋、高效袋式除尘、湿法脱硫协同、湿式电除尘等技术，满足《燃煤电厂超低排放烟气
  治理工程技术规范》（HJ2053-2258）相关要求。
  。原文件中描述污染物类别为废气，污染物指标为颗粒物，此处对其进行了匹配工作，将其匹配到LCAflow库里面相最符合的流，污染物指标备注为颗粒物
- particles (PM2.5 - PM10): 0.0875
  the Technical of end-of-pipe management technology for pollution particles (PM2.5 - PM10)isHigh-efficiency electric-bag composite precipitator①，Its Technical efficiency of end-of-pipe management65
  污染物指标颗粒物的末端治理技术是高效电袋组合①，其效率为65，末端治理设施实际运行率（k值）计算公式为除尘设施年实际运行小时数/机组年实际运行小时数，①高效颗粒物末端治理技术：采取高效电源供电、低低温电除尘、超净电袋、高效袋式除尘、湿法脱硫协同、湿式电除尘等技术，满足《燃煤电厂超低排放烟气
  治理工程技术规范》（HJ2053-2257）相关要求。
  。原文件中描述污染物类别为废气，污染物指标为颗粒物，此处对其进行了匹配工作，将其匹配到LCAflow库里面相最符合的流，污染物指标备注为颗粒物
- particles (PM2.5 - PM10): 0.0875
  the Technical of end-of-pipe management technology for pollution particles (PM2.5 - PM10)isHigh-efficiency electrostatic precipitation①，Its Technical efficiency of end-of-pipe management65
  污染物指标颗粒物的末端治理技术是高效静电除尘①，其效率为65，末端治理设施实际运行率（k值）计算公式为除尘设施年实际运行小时数/机组年实际运行小时数，①高效颗粒物末端治理技术：采取高效电源供电、低低温电除尘、超净电袋、高效袋式除尘、湿法脱硫协同、湿式电除尘等技术，满足《燃煤电厂超低排放烟气
  治理工程技术规范》（HJ2053-2256）相关要求。
  。原文件中描述污染物类别为废气，污染物指标为颗粒物，此处对其进行了匹配工作，将其匹配到LCAflow库里面相最符合的流，污染物指标备注为颗粒物
- sulfur dioxide: 0.2105
  the Technical of end-of-pipe management technology for pollution sulfur dioxideisHigh-efficiency ammonia method②，Its Technical efficiency of end-of-pipe management95
  污染物指标二氧化硫的末端治理技术是高效氨法②，其效率为95，末端治理设施实际运行率（k值）计算公式为脱硫设施年实际运行小时数/机组年实际运行小时数，②高效二氧化硫末端治理技术：采取空塔提效、强化气液传质、改善pH值分区等措施，满足《燃煤电厂超低排放烟气治理工程技术规范》（HJ2053-2243）相
  关要求。
  。原文件中描述污染物类别为废气，污染物指标为二氧化硫，此处对其进行了匹配工作，将其匹配到LCAflow库里面相最符合的流，污染物指标备注为二氧化硫
- sulfur dioxide: 0.2105
  the Technical of end-of-pipe management technology for pollution sulfur dioxideisHigh-efficiency double alkali process②，Its Technical efficiency of end-of-pipe management95
  污染物指标二氧化硫的末端治理技术是高效双碱法②，其效率为95，末端治理设施实际运行率（k值）计算公式为脱硫设施年实际运行小时数/机组年实际运行小时数，②高效二氧化硫末端治理技术：采取空塔提效、强化气液传质、改善pH值分区等措施，满足《燃煤电厂超低排放烟气治理工程技术规范》（HJ2053-2246）相
  关要求。
  。原文件中描述污染物类别为废气，污染物指标为二氧化硫，此处对其进行了匹配工作，将其匹配到LCAflow库里面相最符合的流，污染物指标备注为二氧化硫
- sulfur dioxide: 0.2105
  the Technical of end-of-pipe management technology for pollution sulfur dioxideisHigh-efficiency flue gas circulating fluidized bed method②，Its Technical efficiency of end-of-pipe management95
  污染物指标二氧化硫的末端治理技术是高效烟气循环流化床法②，其效率为95，末端治理设施实际运行率（k值）计算公式为脱硫设施年实际运行小时数/机组年实际运行小时数，②高效二氧化硫末端治理技术：采取空塔提效、强化气液传质、改善pH值分区等措施，满足《燃煤电厂超低排放烟气治理工程技术规范》（HJ2053-2248）相
  关要求。
  。原文件中描述污染物类别为废气，污染物指标为二氧化硫，此处对其进行了匹配工作，将其匹配到LCAflow库里面相最符合的流，污染物指标备注为二氧化硫
- sulfur dioxide: 0.2105
  the Technical of end-of-pipe management technology for pollution sulfur dioxideisHigh-efficiency lime/gypsum method②，Its Technical efficiency of end-of-pipe management95
  污染物指标二氧化硫的末端治理技术是高效石灰石/石膏法②，其效率为95，末端治理设施实际运行率（k值）计算公式为脱硫设施年实际运行小时数/机组年实际运行小时数，②高效二氧化硫末端治理技术：采取空塔提效、强化气液传质、改善pH值分区等措施，满足《燃煤电厂超低排放烟气治理工程技术规范》（HJ2053-2240）相
  关要求。
  。原文件中描述污染物类别为废气，污染物指标为二氧化硫，此处对其进行了匹配工作，将其匹配到LCAflow库里面相最符合的流，污染物指标备注为二氧化硫
- sulfur dioxide: 0.2105
  the Technical of end-of-pipe management technology for pollution sulfur dioxideisHigh-efficiency lime/gypsum method②，Its Technical efficiency of end-of-pipe management95
  污染物指标二氧化硫的末端治理技术是高效石灰/石膏法②，其效率为95，末端治理设施实际运行率（k值）计算公式为脱硫设施年实际运行小时数/机组年实际运行小时数，②高效二氧化硫末端治理技术：采取空塔提效、强化气液传质、改善pH值分区等措施，满足《燃煤电厂超低排放烟气治理工程技术规范》（HJ2053-2241）相
  关要求。
  。原文件中描述污染物类别为废气，污染物指标为二氧化硫，此处对其进行了匹配工作，将其匹配到LCAflow库里面相最符合的流，污染物指标备注为二氧化硫
- sulfur dioxide: 0.2105
  the Technical of end-of-pipe management technology for pollution sulfur dioxideisHigh-efficiency magnesium oxide method②，Its Technical efficiency of end-of-pipe management95
  污染物指标二氧化硫的末端治理技术是高效氧化镁法②，其效率为95，末端治理设施实际运行率（k值）计算公式为脱硫设施年实际运行小时数/机组年实际运行小时数，②高效二氧化硫末端治理技术：采取空塔提效、强化气液传质、改善pH值分区等措施，满足《燃煤电厂超低排放烟气治理工程技术规范》（HJ2053-2247）相
  关要求。
  。原文件中描述污染物类别为废气，污染物指标为二氧化硫，此处对其进行了匹配工作，将其匹配到LCAflow库里面相最符合的流，污染物指标备注为二氧化硫
- sulfur dioxide: 0.2105
  the Technical of end-of-pipe management technology for pollution sulfur dioxideisHigh-efficiency seawater desulfurization method ②，Its Technical efficiency of end-of-pipe management95
  污染物指标二氧化硫的末端治理技术是高效海水脱硫法②，其效率为95，末端治理设施实际运行率（k值）计算公式为脱硫设施年实际运行小时数/机组年实际运行小时数，②高效二氧化硫末端治理技术：采取空塔提效、强化气液传质、改善pH值分区等措施，满足《燃煤电厂超低排放烟气治理工程技术规范》（HJ2053-2242）相
  关要求。
  。原文件中描述污染物类别为废气，污染物指标为二氧化硫，此处对其进行了匹配工作，将其匹配到LCAflow库里面相最符合的流，污染物指标备注为二氧化硫
- sulfur dioxide: 0.2105
  the Technical of end-of-pipe management technology for pollution sulfur dioxideisOthers (high-efficiency carbide slag method) ②，Its Technical efficiency of end-of-pipe management95
  污染物指标二氧化硫的末端治理技术是其他（高效电石渣法）②，其效率为95，末端治理设施实际运行率（k值）计算公式为脱硫设施年实际运行小时数/机组年实际运行小时数，②高效二氧化硫末端治理技术：采取空塔提效、强化气液传质、改善pH值分区等措施，满足《燃煤电厂超低排放烟气治理工程技术规范》（HJ2053-2244）相
  关要求。
  。原文件中描述污染物类别为废气，污染物指标为二氧化硫，此处对其进行了匹配工作，将其匹配到LCAflow库里面相最符合的流，污染物指标备注为二氧化硫
- sulfur dioxide: 0.2105
  the Technical of end-of-pipe management technology for pollution sulfur dioxideisOthers (high-efficiency sodium alkali method) ②，Its Technical efficiency of end-of-pipe management95
  污染物指标二氧化硫的末端治理技术是其他（高效钠碱法）②，其效率为95，末端治理设施实际运行率（k值）计算公式为脱硫设施年实际运行小时数/机组年实际运行小时数，②高效二氧化硫末端治理技术：采取空塔提效、强化气液传质、改善pH值分区等措施，满足《燃煤电厂超低排放烟气治理工程技术规范》（HJ2053-2245）相
  关要求。
  。原文件中描述污染物类别为废气，污染物指标为二氧化硫，此处对其进行了匹配工作，将其匹配到LCAflow库里面相最符合的流，污染物指标备注为二氧化硫
- sulfur dioxide: 0.2105
  the Technical of end-of-pipe management technology for pollution sulfur dioxideisOthers (integration of high-efficiency wet desulfurization and precipitation) ②，Its Technical efficiency of end-of-pipe management95
  污染物指标二氧化硫的末端治理技术是其他（高效湿法脱硫除尘一体化）②，其效率为95，末端治理设施实际运行率（k值）计算公式为脱硫设施年实际运行小时数/机组年实际运行小时数，②高效二氧化硫末端治理技术：采取空塔提效、强化气液传质、改善pH值分区等措施，满足《燃煤电厂超低排放烟气治理工程技术规范》（HJ2053-2249）相
  关要求。
  。原文件中描述污染物类别为废气，污染物指标为二氧化硫，此处对其进行了匹配工作，将其匹配到LCAflow库里面相最符合的流，污染物指标备注为二氧化硫
- particles (PM2.5 - PM10): 0.25
  the Technical of end-of-pipe management technology for pollution particles (PM2.5 - PM10)isBag filter + others (wet desulfurization synergy) + others (wet electrostatic precipitator)，Its Technical efficiency of end-of-pipe management0
  污染物指标颗粒物的末端治理技术是袋式除尘+其他（湿法脱硫协同）+其他（湿式电除尘），其效率为0，末端治理设施实际运行率（k值）计算公式为除尘设施年实际运行小时数/机组年实际运行小时数。原文件中描述污染物类别为废气，污染物指标为颗粒物，此处对其进行了匹配工作，将其匹配到LCAflow库里面相最符合的流，污染物指标备注为颗粒物
- particles (PM2.5 - PM10): 0.25
  the Technical of end-of-pipe management technology for pollution particles (PM2.5 - PM10)isBag filter + others (wet desulfurization synergy)，Its Technical efficiency of end-of-pipe management0
  污染物指标颗粒物的末端治理技术是袋式除尘+其他（湿法脱硫协同），其效率为0，末端治理设施实际运行率（k值）计算公式为除尘设施年实际运行小时数/机组年实际运行小时数。原文件中描述污染物类别为废气，污染物指标为颗粒物，此处对其进行了匹配工作，将其匹配到LCAflow库里面相最符合的流，污染物指标备注为颗粒物
- particles (PM2.5 - PM10): 0.25
  the Technical of end-of-pipe management technology for pollution particles (PM2.5 - PM10)isBag filter + others (wet electrostatic precipitator)，Its Technical efficiency of end-of-pipe management0
  污染物指标颗粒物的末端治理技术是袋式除尘+其他（湿式电除尘），其效率为0，末端治理设施实际运行率（k值）计算公式为除尘设施年实际运行小时数/机组年实际运行小时数。原文件中描述污染物类别为废气，污染物指标为颗粒物，此处对其进行了匹配工作，将其匹配到LCAflow库里面相最符合的流，污染物指标备注为颗粒物
- particles (PM2.5 - PM10): 0.25
  the Technical of end-of-pipe management technology for pollution particles (PM2.5 - PM10)isBag filter，Its Technical efficiency of end-of-pipe management0
  污染物指标颗粒物的末端治理技术是袋式除尘，其效率为0，末端治理设施实际运行率（k值）计算公式为除尘设施年实际运行小时数/机组年实际运行小时数。原文件中描述污染物类别为废气，污染物指标为颗粒物，此处对其进行了匹配工作，将其匹配到LCAflow库里面相最符合的流，污染物指标备注为颗粒物
- particles (PM2.5 - PM10): 0.25
  the Technical of end-of-pipe management technology for pollution particles (PM2.5 - PM10)isElectric-bag composite precipitator + others (wet desulfurization synergy) + others (wet electrostatic precipitator)，Its Technical efficiency of end-of-pipe management0
  污染物指标颗粒物的末端治理技术是电袋组合+其他（湿法脱硫协同）+其他（湿式电除尘），其效率为0，末端治理设施实际运行率（k值）计算公式为除尘设施年实际运行小时数/机组年实际运行小时数。原文件中描述污染物类别为废气，污染物指标为颗粒物，此处对其进行了匹配工作，将其匹配到LCAflow库里面相最符合的流，污染物指标备注为颗粒物
- particles (PM2.5 - PM10): 0.25
  the Technical of end-of-pipe management technology for pollution particles (PM2.5 - PM10)isElectric-bag composite precipitator + others (wet desulfurization synergy)，Its Technical efficiency of end-of-pipe management0
  污染物指标颗粒物的末端治理技术是电袋组合+其他（湿法脱硫协同），其效率为0，末端治理设施实际运行率（k值）计算公式为除尘设施年实际运行小时数/机组年实际运行小时数。原文件中描述污染物类别为废气，污染物指标为颗粒物，此处对其进行了匹配工作，将其匹配到LCAflow库里面相最符合的流，污染物指标备注为颗粒物
- particles (PM2.5 - PM10): 0.25
  the Technical of end-of-pipe management technology for pollution particles (PM2.5 - PM10)isElectric-bag composite precipitator + others (wet electrostatic precipitator)，Its Technical efficiency of end-of-pipe management0
  污染物指标颗粒物的末端治理技术是电袋组合+其他（湿式电除尘），其效率为0，末端治理设施实际运行率（k值）计算公式为除尘设施年实际运行小时数/机组年实际运行小时数。原文件中描述污染物类别为废气，污染物指标为颗粒物，此处对其进行了匹配工作，将其匹配到LCAflow库里面相最符合的流，污染物指标备注为颗粒物
- particles (PM2.5 - PM10): 0.25
  the Technical of end-of-pipe management technology for pollution particles (PM2.5 - PM10)isElectric-bag composite precipitator，Its Technical efficiency of end-of-pipe management0
  污染物指标颗粒物的末端治理技术是电袋组合，其效率为0，末端治理设施实际运行率（k值）计算公式为除尘设施年实际运行小时数/机组年实际运行小时数。原文件中描述污染物类别为废气，污染物指标为颗粒物，此处对其进行了匹配工作，将其匹配到LCAflow库里面相最符合的流，污染物指标备注为颗粒物
- particles (PM2.5 - PM10): 0.25
  the Technical of end-of-pipe management technology for pollution particles (PM2.5 - PM10)isElectrostatic precipitation + others (wet desulfurization synergy) + others (wet electrostatic precipitator)，Its Technical efficiency of end-of-pipe management0
  污染物指标颗粒物的末端治理技术是静电除尘+其他（湿法脱硫协同）+其他（湿式电除尘），其效率为0，末端治理设施实际运行率（k值）计算公式为除尘设施年实际运行小时数/机组年实际运行小时数。原文件中描述污染物类别为废气，污染物指标为颗粒物，此处对其进行了匹配工作，将其匹配到LCAflow库里面相最符合的流，污染物指标备注为颗粒物
- particles (PM2.5 - PM10): 0.25
  the Technical of end-of-pipe management technology for pollution particles (PM2.5 - PM10)isElectrostatic precipitation + others (wet desulfurization synergy)，Its Technical efficiency of end-of-pipe management0
  污染物指标颗粒物的末端治理技术是静电除尘+其他（湿法脱硫协同），其效率为0，末端治理设施实际运行率（k值）计算公式为除尘设施年实际运行小时数/机组年实际运行小时数。原文件中描述污染物类别为废气，污染物指标为颗粒物，此处对其进行了匹配工作，将其匹配到LCAflow库里面相最符合的流，污染物指标备注为颗粒物
- particles (PM2.5 - PM10): 0.25
  the Technical of end-of-pipe management technology for pollution particles (PM2.5 - PM10)isElectrostatic precipitation + others (wet electrostatic precipitator)，Its Technical efficiency of end-of-pipe management0
  污染物指标颗粒物的末端治理技术是静电除尘+其他（湿式电除尘），其效率为0，末端治理设施实际运行率（k值）计算公式为除尘设施年实际运行小时数/机组年实际运行小时数。原文件中描述污染物类别为废气，污染物指标为颗粒物，此处对其进行了匹配工作，将其匹配到LCAflow库里面相最符合的流，污染物指标备注为颗粒物
- particles (PM2.5 - PM10): 0.25
  the Technical of end-of-pipe management technology for pollution particles (PM2.5 - PM10)isElectrostatic precipitation，Its Technical efficiency of end-of-pipe management0
  污染物指标颗粒物的末端治理技术是静电除尘，其效率为0，末端治理设施实际运行率（k值）计算公式为除尘设施年实际运行小时数/机组年实际运行小时数。原文件中描述污染物类别为废气，污染物指标为颗粒物，此处对其进行了匹配工作，将其匹配到LCAflow库里面相最符合的流，污染物指标备注为颗粒物
- sulfur dioxide: 0.59782
  the Technical of end-of-pipe management technology for pollution sulfur dioxideisAmmonia method，Its Technical efficiency of end-of-pipe management85.8
  污染物指标二氧化硫的末端治理技术是氨法，其效率为85.8，末端治理设施实际运行率（k值）计算公式为脱硫设施年实际运行小时数/机组年实际运行小时数。原文件中描述污染物类别为废气，污染物指标为二氧化硫，此处对其进行了匹配工作，将其匹配到LCAflow库里面相最符合的流，污染物指标备注为二氧化硫
- sulfur dioxide: 0.59782
  the Technical of end-of-pipe management technology for pollution sulfur dioxideisDouble alkali process，Its Technical efficiency of end-of-pipe management85.8
  污染物指标二氧化硫的末端治理技术是双碱法，其效率为85.8，末端治理设施实际运行率（k值）计算公式为脱硫设施年实际运行小时数/机组年实际运行小时数。原文件中描述污染物类别为废气，污染物指标为二氧化硫，此处对其进行了匹配工作，将其匹配到LCAflow库里面相最符合的流，污染物指标备注为二氧化硫
- sulfur dioxide: 0.59782
  the Technical of end-of-pipe management technology for pollution sulfur dioxideisFlue gas circulating fluidized bed method，Its Technical efficiency of end-of-pipe management85.8
  污染物指标二氧化硫的末端治理技术是烟气循环流化床法，其效率为85.8，末端治理设施实际运行率（k值）计算公式为脱硫设施年实际运行小时数/机组年实际运行小时数。原文件中描述污染物类别为废气，污染物指标为二氧化硫，此处对其进行了匹配工作，将其匹配到LCAflow库里面相最符合的流，污染物指标备注为二氧化硫
- sulfur dioxide: 0.59782
  the Technical of end-of-pipe management technology for pollution sulfur dioxideisLime/gypsum method，Its Technical efficiency of end-of-pipe management85.8
  污染物指标二氧化硫的末端治理技术是石灰/石膏法，其效率为85.8，末端治理设施实际运行率（k值）计算公式为脱硫设施年实际运行小时数/机组年实际运行小时数。原文件中描述污染物类别为废气，污染物指标为二氧化硫，此处对其进行了匹配工作，将其匹配到LCAflow库里面相最符合的流，污染物指标备注为二氧化硫
- sulfur dioxide: 0.59782
  the Technical of end-of-pipe management technology for pollution sulfur dioxideisLimestone/gypsum method，Its Technical efficiency of end-of-pipe management85.8
  污染物指标二氧化硫的末端治理技术是石灰石/石膏法，其效率为85.8，末端治理设施实际运行率（k值）计算公式为脱硫设施年实际运行小时数/机组年实际运行小时数。原文件中描述污染物类别为废气，污染物指标为二氧化硫，此处对其进行了匹配工作，将其匹配到LCAflow库里面相最符合的流，污染物指标备注为二氧化硫
- sulfur dioxide: 0.59782
  the Technical of end-of-pipe management technology for pollution sulfur dioxideisMagnesium oxide method，Its Technical efficiency of end-of-pipe management85.8
  污染物指标二氧化硫的末端治理技术是氧化镁法，其效率为85.8，末端治理设施实际运行率（k值）计算公式为脱硫设施年实际运行小时数/机组年实际运行小时数。原文件中描述污染物类别为废气，污染物指标为二氧化硫，此处对其进行了匹配工作，将其匹配到LCAflow库里面相最符合的流，污染物指标备注为二氧化硫
- sulfur dioxide: 0.59782
  the Technical of end-of-pipe management technology for pollution sulfur dioxideisOthers (carbide slag method)，Its Technical efficiency of end-of-pipe management85.8
  污染物指标二氧化硫的末端治理技术是其他（电石渣法），其效率为85.8，末端治理设施实际运行率（k值）计算公式为脱硫设施年实际运行小时数/机组年实际运行小时数。原文件中描述污染物类别为废气，污染物指标为二氧化硫，此处对其进行了匹配工作，将其匹配到LCAflow库里面相最符合的流，污染物指标备注为二氧化硫
- sulfur dioxide: 0.59782
  the Technical of end-of-pipe management technology for pollution sulfur dioxideisOthers (integration of wet desulfurization and precipitation)，Its Technical efficiency of end-of-pipe management85.8
  污染物指标二氧化硫的末端治理技术是其他（湿法脱硫除尘一体化），其效率为85.8，末端治理设施实际运行率（k值）计算公式为脱硫设施年实际运行小时数/机组年实际运行小时数。原文件中描述污染物类别为废气，污染物指标为二氧化硫，此处对其进行了匹配工作，将其匹配到LCAflow库里面相最符合的流，污染物指标备注为二氧化硫
- sulfur dioxide: 0.59782
  the Technical of end-of-pipe management technology for pollution sulfur dioxideisOthers (sodium alkali method)，Its Technical efficiency of end-of-pipe management85.8
  污染物指标二氧化硫的末端治理技术是其他（钠碱法），其效率为85.8，末端治理设施实际运行率（k值）计算公式为脱硫设施年实际运行小时数/机组年实际运行小时数。原文件中描述污染物类别为废气，污染物指标为二氧化硫，此处对其进行了匹配工作，将其匹配到LCAflow库里面相最符合的流，污染物指标备注为二氧化硫
- sulfur dioxide: 0.59782
  the Technical of end-of-pipe management technology for pollution sulfur dioxideisSeawater desulfurization process，Its Technical efficiency of end-of-pipe management85.8
  污染物指标二氧化硫的末端治理技术是海水脱硫法，其效率为85.8，末端治理设施实际运行率（k值）计算公式为脱硫设施年实际运行小时数/机组年实际运行小时数。原文件中描述污染物类别为废气，污染物指标为二氧化硫，此处对其进行了匹配工作，将其匹配到LCAflow库里面相最符合的流，污染物指标备注为二氧化硫
- Nitrogen oxides: 0.682
  the Technical of end-of-pipe management technology for pollution Nitrogen oxidesisHigh-efficiency SCR③，Its Technical efficiency of end-of-pipe management80
  污染物指标氮氧化物（低氮燃烧法）的末端治理技术是高效选择性催化还原法（SCR）③，其效率为80，③高效氮氧化物末端治理技术：采取高效低氮燃烧技术、增设脱硝催化剂层数等措施，满足《燃煤电厂超低排放烟气治理工程技术规范》（HJ2053-2115）相关
  要求。。原文件中描述污染物类别为废气，污染物指标为氮氧化物（低氮燃烧法），此处对其进行了匹配工作，将其匹配到LCAflow库里面相最符合的流，污染物指标备注为氮氧化物（低氮燃烧法）
- Waste water: 740
  the Technical of end-of-pipe management technology for pollution Waste waterisOthers (direct discharge)
  污染物指标工业废水量的末端治理技术是其他（直排）。原文件中描述污染物类别为废水，污染物指标为工业废水量，此处对其进行了匹配工作，将其匹配到LCAflow库里面相最符合的流，污染物指标备注为工业废水量
- Waste water: 740
  the Technical of end-of-pipe management technology for pollution Waste waterisOthers (reuse)
  污染物指标工业废水量的末端治理技术是其他（重复利用）。原文件中描述污染物类别为废水，污染物指标为工业废水量，此处对其进行了匹配工作，将其匹配到LCAflow库里面相最符合的流，污染物指标备注为工业废水量
- Waste water: 740
  the Technical of end-of-pipe management technology for pollution Waste waterisOthers (utilization + direct discharge)
  污染物指标工业废水量的末端治理技术是其他（利用+直排）。原文件中描述污染物类别为废水，污染物指标为工业废水量，此处对其进行了匹配工作，将其匹配到LCAflow库里面相最符合的流，污染物指标备注为工业废水量
- Nitrogen oxides: 1.023
  the Technical of end-of-pipe management technology for pollution Nitrogen oxidesisSCR，Its Technical efficiency of end-of-pipe management70
  污染物指标氮氧化物（低氮燃烧法）的末端治理技术是选择性催化还原法（SCR），其效率为70。原文件中描述污染物类别为废气，污染物指标为氮氧化物（低氮燃烧法），此处对其进行了匹配工作，将其匹配到LCAflow库里面相最符合的流，污染物指标备注为氮氧化物（低氮燃烧法）
- Ammonia Nitrogen: 0.001596
  the Technical of end-of-pipe management technology for pollution Ammonia NitrogenisOthers (physical treatment + chemical treatment)，Its Technical efficiency of end-of-pipe management72
  污染物指标氨氮的末端治理技术是其他（物理处理法+化学处理法），其效率为72，末端治理设施实际运行率（k值）计算公式为（机组年实际运行小时数-废水总排口年事故排放小时数）/机组年实际运行小时数。原文件中描述污染物类别为废水，污染物指标为氨氮，此处对其进行了匹配工作，将其匹配到LCAflow库里面相最符合的流，污染物指标备注为氨氮
- Nitrogen oxides: 3.41
  the Technical of end-of-pipe management technology for pollution Nitrogen oxidesisOthers (direct discharge)
  污染物指标氮氧化物（低氮燃烧法）的末端治理技术是其他（直排）。原文件中描述污染物类别为废气，污染物指标为氮氧化物（低氮燃烧法），此处对其进行了匹配工作，将其匹配到LCAflow库里面相最符合的流，污染物指标备注为氮氧化物（低氮燃烧法）
- chemical oxygen demand: 0.0180243
  the Technical of end-of-pipe management technology for pollution chemical oxygen demandisOthers (physical treatment + chemical treatment)，Its Technical efficiency of end-of-pipe management92.92
  污染物指标化学需氧量的末端治理技术是其他（物理处理法+化学处理法），其效率为92.92，末端治理设施实际运行率（k值）计算公式为（机组年实际运行小时数-废水总排口年事故排放小时数）/机组年实际运行小时数。原文件中描述污染物类别为废水，污染物指标为化学需氧量，此处对其进行了匹配工作，将其匹配到LCAflow库里面相最符合的流，污染物指标备注为化学需氧量
- Exhaust gas: 11152
  the Technical of end-of-pipe management technology for pollution Exhaust gasisOthers (direct discharge)
  污染物指标工业废气量的末端治理技术是其他（直排）。原文件中描述污染物类别为废气，污染物指标为工业废气量，此处对其进行了匹配工作，将其匹配到LCAflow库里面相最符合的流，污染物指标备注为工业废气量
- mercury: 0
  the Technical of end-of-pipe management technology for pollution mercuryisOthers (direct discharge).The original article describes the pollution production coefficients as 0.000995MHgar。Please revise the corresponding emissions after accounting for them according to the notes.。.The original article describes the pollution production coefficients as 0.000995MHgar. Please revise the corresponding emissions after accounting for them according to the notes.
  污染物指标汞及其化合物的末端治理技术是其他（直排）。原文件中描述污染物类别为废气，污染物指标为汞及其化合物，此处对其进行了匹配工作，将其匹配到LCAflow库里面相最符合的流，污染物指标备注为汞及其化合物原文描述的产污系数为 0.000995MHgar。请根据备注自行核算后修改对应的排放量。

## Use advice
This dataset is derived from the Pollution Source Census Report and contains information on pollution emissions and related products. However, it does not include data on energy or chemical consumption, nor does it provide information on waste or co-product generation. When utilizing this dataset, please supplement the missing data based on actual conditions before use
该数据集来源于污染源普查报告，包含污染物排放及相关产品信息，但不包含能源或化学品消耗数据，也不提供废弃物或共生产物产生信息。在使用该数据集时，请根据实际情况补充缺失数据后再使用。

## Review details
Inventory: The internal review was done by several iteration steps concerning raw data validation, raw data documentation, representativity, completeness and consistency of modelling with regard to ISO 14040 and 14044.
清单： 内部审查通过几个迭代步骤完成，涉及原始数据验证、原始数据记录、代表性、完整性、与 ISO 14040 和 14044 有关的建模的一致性。

## Data sources
- 第二次全国污染源普查产排污核算系数手册（试用版）,四级代码4411、4412文件，在完整版文件中第5333页
