# Copper slag Recycling;Cement;production of cement after Electric Furnace treatment;Copper slag

Dataset: ILCD process, Unit process, single operation
Geography: CN
Reference year: 2010
Classification: Unit processes / Materials production / Inorganic chemicals
Functional unit: The functional unit was defined as the recycling of 1 ton of copper slag from copper smelting process.
LCI method principle: Attributional
LCI method approaches: Substitution
Generated by: Peng Wang, 2867919560@qq.com
Owner: Tiangong LCI Data Working Group
Review: Dependent internal review by Tiangong LCI Data Working Group
Amounts: no units in this file; such an amount is in the reference unit of its flow, which a separate flow dataset defines
copyright: false
licenseType: Free of charge for all users and uses

## General comment
This data set represents four copper slag recycling scenarios for a leading copper company in China, and it applies to the construction and building materials industry. Specifically, it is used for the evaluation of environmental impacts in the production of cement and unfired bricks, where the copper slag serves as a raw material or additive in different treatment processes including direct application, Electric Furnace treatment, and Floatation.

## Geography
a dominant copper company in China.

## Time period
were obtained from internal report of relevant company in 2010.

## Technology and included processes
four scenarios of copper slag recycling were developed in terms of technological availability: (1) production of cement directly, (2) production of cement after Electric Furnace treatment, (3) production of cement after Floatation, and (4) production of unfired brick after Floatation.

## Reference product
- Refined copper: 1000; measured

## Inputs
- hard coal,hard coal,hard coal: 1648.3; measured
  Hard coal
- crude oil; 42.3 MJ/kg: 46.6; measured
  Crude oil
- natural gas; 44.1 MJ/kg: 38.2; measured
  Natural gas
- Limestone: 6567.7; measured
- clay: 1315.1; measured
  Clay
- gypsum: 400.9; measured
  Gypsum
- Scrap: 1000

## Outputs
All rows: measured
- carbon dioxide (fossil): 5265.9
  原文未区分bio和fossil，根据专家判断此处为fossil
- carbon monoxide,carbon monoxide (fossil): 3.5
  原文未区分bio和fossil，根据专家判断此处为fossil
- sulfur dioxide: 19.2
  SO2
- hard coal,hard coal,hard coal: 17
  NOx needs to be supplemented
- particles (PM2.5 - PM10): 23.3
  Dust needs to be replenished

## Deviations from the LCI method approaches
characterization, normalization and weighting, after the allocation procedure by using the avoided burdens method.

## Data selection and combination
The data of copper slag treatment were mainly derived from a dominant copper company in China. The production data of cement and brick mostly came from real plant that adopts advanced equipment and processes, supplemented by published literature.

## Data treatment and extrapolations
GaBi 4 software was used to model the copper recycling system and determine the environmental impacts in this study. The Eco-Indicator 99 (EI99) was applied for the life cycle impact assessment

## Use advice
Users should employ GaBi 4 software or equivalent to model the respective copper slag recycling scenarios according to the data provided for proper life cycle impact assessment using the Eco-Indicator 99 (EI99) methodology. Special attention should be given to the methodological specifics such as the avoided burdens approach after allocation procedures within the life cycle assessment. The reference flow for the life cycle assessment should be based on the functional unit of recycling 1 ton of copper slag from the copper smelting process.

## Review details
Inventory: The internal review was done by several iteration steps concerning raw data validation, raw data documentation, representativity, completeness and consistency of modelling with regard to ISO 14040 and 14044.

## Data sources
- Song, X. L., Yang, J. X., Wang, J. W. & Wu, W. J. Assessing the Life Cycle Environmental and Economic Performance of Copper Slag Recycling. AMR 878, 219–225 (2014).
