# Aluminum electrolysis ; Liquid primary aluminum ; Prebaking ; Alumina for metallurgy ; 2011

Dataset: ILCD process, Unit process, single operation
Geography: CN
Reference year: 2021
Classification: Unit processes / Materials production / Metals and semimetals
Generated by: Zimeng Cai, caizm6178@163.com
Owner: Tiangong LCI Data Working Group
Review: Dependent internal review by Tiangong LCI Data Working Group
Amounts: no units in this file; such an amount is in the reference unit of its flow, which a separate flow dataset defines
copyright: false
licenseType: Free of charge for all users and uses

## General comment
The aluminum electrolysis process described is specifically designed for producing liquid primary aluminum through a prebaking step using alumina for metallurgy. This primary aluminum is typically used for manufacturing various aluminum products, such as construction materials, automotive parts, electrical components, and packaging. The specific year of the data indicates that this process applies to technologies and methodologies used in 2011.

## Time period
Date of publication

## Reference product
- aluminium, primary, liquid: 1000; software or database

## Inputs
All rows: software or database
- Integrated AC power consumption: 48705.1
- aluminium oxide, metallurgical: 1918.82
- fluoride salt: 21.89
- anode, prebake, for aluminium electrolysis: 424.39
- Water, unspecified natural origin: 2.76

## Data selection and combination
The data in this study refers to the LCA data of PA, SA, electricity, and other background data. The PA data were obtained from statistical data sources, and the SA data were mainly obtained from the literatures. The background data were mainly derived from the Chinese localization LCA database CAS RCEES 2018, which was established by the Research Center for Eco-Environmental Sciences, Chinese Academy of Sciences and covers LCA data for energy, materials, transportation, waste management etc.

## Use advice
Users of this LCA data should note that the primary aluminum (PA) data sourced from statistical data and secondary aluminum (SA) data primarily derived from literature must be contextualized within the technological framework of 2011. Background data from the Chinese localized LCA database CAS RCEES 2018 should be used with an understanding that it reflects the environmental impacts associated with energy, materials, transportation, and waste management specific to the Chinese context. It is recommended to account for any changes in technology or environmental regulations when applying this data to current scenarios.

## Review details
Inventory: The internal review was done by several iteration steps concerning raw data validation, raw data documentation, representativity, completeness and consistency of modelling with regard to ISO 14040 and 14044.

## Data sources
- Ding, N., Liu, N., Lu, B. & Yang, J. Life cycle greenhouse gas emissions of aluminum based on regional industrial transfer in China. J. Ind. Ecol. 25, 1657–1672 (2021).
