# cement milling;cement, modified granulated copper slag 31%, 42.9MPa;modified granulated copper slag

Dataset: ILCD process, Unit process, single operation
Geography: CS-HUN-CN
Classification: Materials production / Other mineralic materials
Generated by: Siqi Yang, ysqsophia@gmail.com
Owner: Tiangong LCI Data Working Group
Review: Dependent internal review by Tiangong LCI Data Working Group
Amounts: no units in this file; such an amount is in the reference unit of its flow, which a separate flow dataset defines
copyright: false
licenseType: Free of charge for all users and uses

## General comment
Blended Cement Production. Modified granulated copper slag (MGCS) is utilized as an supplementary cementitious material (SCM) (30 wt.%). The clinker that formed in the kiln was cooled down using air quenching devices, where additional heat was recovered into the pre-heater and cyclone separators. The clinker was subsequently blended with gypsum to form a mixture that was ground with about 30 wt.% of modified granulated copper slag (MGCS) at the cement mill. Finally, a fine grey powder was obtained from the cement mill, and then placed in silos.MGCS preparation is a crucial phase. The original copper slag was procured from a smelter of Boliden Mineral AB, Stockholm, Sweden. This was ground in the raw mill to form granulated copper slag (GCS) with a particle size lower than 0.60 mm. The CaO (99.9% pure) was supplied by Changsha Danuo Building Materials Co., Ltd., Changsha, China. The procedure of MGCS production is as follows. The GCS and CaO (20 wt.%) were charged in the furnace while the heating temperature was raised to approximately 1550 ◦C, at which point the mixtures were completely molten. The water-quenching method was then adopted to form the MGCS. The entire process was carried out within a nitrogen atmosphere with a flow rate of 150 mL/min. This procedure was conducted in the Changsha Research Institute of Mining and Metallurgy Co., Ltd., Changsha, China. The produced MGCS was eventually transported by trucks to the cement plant, which uses electricity as the main energy source.

## Geography
A typical cement plant in Changsha, Hunan Province, China

## Technology and included processes
MGCS preparation is a crucial phase. The original copper slag was procured from a smelter of Boliden Mineral AB, Stockholm, Sweden. This was ground in the raw mill to form GCS with a particle size lower than 0.60 mm. The CaO (99.9% pure) was supplied by Changsha Danuo Building Materials Co., Ltd., Changsha, China. The procedure of MGCS production is as follows. The GCS and CaO (20 wt.%) were charged in the furnace while the heating temperature was raised to approximately 1550 ◦C, at which point the mixtures were completely molten [23]. The water-quenching method was then adopted to form the MGCS. The entire process was carried out within a nitrogen atmosphere with a flow rate of 150 mL/min [24]. This procedure was conducted in the Changsha Research Institute of Mining and Metallurgy Co., Ltd., Changsha, China. The produced MGCS was eventually transported by trucks to the cement plant, which uses electricity as the main energy source.

## Technical purpose
The described process is involved in the production of blended cement using Modified Granulated Copper Slag (MGCS) as a supplementary cementitious material (SCM). MGCS constitutes approximately 30% by weight of the final cement product and is used to enhance the compressive strength of the cement, which achieves a performance characteristic of 42.9 MPa. This specialized cement blend is likely used in construction applications where higher compressive strength and durability are required.

## Model description
A functional unit (FU) is defined as 1 kg of mixed cement with a compressive strength of 42.9 MPa.

## Reference product
- cement, modified granulated copper slag 31%, 42.9 MPa: 1000
  Blended cement 42.9 MPa

## Inputs
- clinker: 657
  Clinker
- gypsum stone (CaSO4-dihydrate): 47.3
  Gypsum
- Modified granulated copper slag: 310
  Modified granulated copper slag (MGCS)
- electricity, medium voltage: 259.92
  Electricity. Electricity is generated from thermal power.

## Outputs
- particles (> PM10): 1.69e-5
  PM. The particle size is not specified. Here we treat it as PM>10.

## Deviations from the LCI method approaches
Some data related to the background system were obtained from the Ecoinvent 3.1 database.

## Data selection and combination
Inventory data for the Prospect system is collected directly from cement plants located in Changsha, Hunan Province, China.

## Use advice
When integrating this process data into a Life Cycle Assessment (LCA), ensure that the role of MGCS as an SCM is accurately represented in the system boundary. Include the required energy and material inputs for the MGCS preparation, such as the heating to 1550 °C and the nitrogen atmosphere used in the water-quenching process. Transport of raw materials and the final product should also be accounted for. Data should be cross-referenced with the Ecoinvent 3.1 database for background system information. For the assessment of environmental impact, pay special attention to the energy sources, particularly electricity consumption at the cement plant. Use this data with a clear definition of the functional unit (FU), which in this case is 1 kg of mixed cement with a compressive strength of 42.9 MPa.

## Review details
Inventory: The internal review was done by several iteration steps concerning raw data validation, raw data documentation, representativity, completeness and consistency of modelling with regard to ISO 14040 and 14044.

## Data sources
- Qinli Zhang, Bingyi Zhang, & Daolin Wang. (2022). Environmental Benefit Assessment of Blended Cement with Modified Granulated Copper Slag. MATERIALS, 15(15).
