# Tapwater|Surfacewater|Coagulationandsedimentation(orclarification)filtrationanddisinfectionprocesses|greater than or equal to0.3 million t/d / 自来水|地表水|混凝沉淀（或澄清）过滤消毒工艺|大于等于30万吨／日

Dataset: ILCD process, Unit process, single operation
Geography: CN
Reference year: 2019
Classification: Materials production / Water
Generated by: The data was created by the Office of the Second National Pollution Source Census of the Ministry of Ecology and Environment, and the data was organized by the TianGong Plan team for ILCD format / 生态环境部第二次全国污染源普查工作办公室创建数据，天工计划团队常慧敏整理数据为ILCD格式
Owner: Tiangong LCI Data Working Group / 天工LCI数据工作小组
Amounts: no units in this file; such an amount is in the reference unit of its flow, which a separate flow dataset defines
copyright: false
licenseType: Free of charge for all users and uses

## Technology and included processes
the Technical of end-of-pipe management technology for pollution phosphorus, totalisMembrane separation，Its Technical efficiency of end-of-pipe management90

## Reference product
- Tap Water: 1000; calculated
  源文件中描述为为自来水，此处对其进行了匹配工作，将其匹配到LCAflow库里面相最符合的流，污染物指标备注为废水量

## Outputs
All rows: calculated
- Waste water: 30.4
  污染物指标废水量的末端治理技术是/，其效率为0。原文件中描述污染物类别为废水，污染物指标为废水量，此处对其进行了匹配工作，将其匹配到LCAflow库里面相最符合的流，污染物指标备注为废水量
- Waste water: 29.792
  污染物指标废水量的末端治理技术是沉淀分离，其效率为2，末端治理设施实际运行率（k值）计算公式为废水治理设施运行时间（小时/年）/企业正常生产时间（小时/年）。原文件中描述污染物类别为废水，污染物指标为废水量，此处对其进行了匹配工作，将其匹配到LCAflow库里面相最符合的流，污染物指标备注为废水量
- Waste water: 2.432
  污染物指标废水量的末端治理技术是膜分离，其效率为92，末端治理设施实际运行率（k值）计算公式为废水治理设施运行时间（小时/年）/企业正常生产时间（小时/年）。原文件中描述污染物类别为废水，污染物指标为废水量，此处对其进行了匹配工作，将其匹配到LCAflow库里面相最符合的流，污染物指标备注为废水量
- chemical oxygen demand: 0.0011
  污染物指标化学需氧量的末端治理技术是/，其效率为0。原文件中描述污染物类别为废水，污染物指标为化学需氧量，此处对其进行了匹配工作，将其匹配到LCAflow库里面相最符合的流，污染物指标备注为化学需氧量
- chemical oxygen demand: 0.00055
  污染物指标化学需氧量的末端治理技术是沉淀分离，其效率为50，末端治理设施实际运行率（k值）计算公式为废水治理设施运行时间（小时/年）/企业正常生产时间（小时/年）。原文件中描述污染物类别为废水，污染物指标为化学需氧量，此处对其进行了匹配工作，将其匹配到LCAflow库里面相最符合的流，污染物指标备注为化学需氧量
- chemical oxygen demand: 0.00066
  污染物指标化学需氧量的末端治理技术是膜分离，其效率为40，末端治理设施实际运行率（k值）计算公式为废水治理设施运行时间（小时/年）/企业正常生产时间（小时/年）。原文件中描述污染物类别为废水，污染物指标为化学需氧量，此处对其进行了匹配工作，将其匹配到LCAflow库里面相最符合的流，污染物指标备注为化学需氧量
- Ammonia Nitrogen: 1.771e-5
  污染物指标氨氮的末端治理技术是沉淀分离，其效率为30，末端治理设施实际运行率（k值）计算公式为废水治理设施运行时间（小时/年）/企业正常生产时间（小时/年）。原文件中描述污染物类别为废水，污染物指标为氨氮，此处对其进行了匹配工作，将其匹配到LCAflow库里面相最符合的流，污染物指标备注为氨氮
- Ammonia Nitrogen: 2.53e-5
  污染物指标氨氮的末端治理技术是/，其效率为0。原文件中描述污染物类别为废水，污染物指标为氨氮，此处对其进行了匹配工作，将其匹配到LCAflow库里面相最符合的流，污染物指标备注为氨氮
- Ammonia Nitrogen: 1.771e-5
  污染物指标氨氮的末端治理技术是膜分离，其效率为30，末端治理设施实际运行率（k值）计算公式为废水治理设施运行时间（小时/年）/企业正常生产时间（小时/年）。原文件中描述污染物类别为废水，污染物指标为氨氮，此处对其进行了匹配工作，将其匹配到LCAflow库里面相最符合的流，污染物指标备注为氨氮
- Nitrogen, organic bound: 0.00012
  污染物指标总氮的末端治理技术是沉淀分离，其效率为60，末端治理设施实际运行率（k值）计算公式为废水治理设施运行时间（小时/年）/企业正常生产时间（小时/年）。原文件中描述污染物类别为废水，污染物指标为总氮，此处对其进行了匹配工作，将其匹配到LCAflow库里面相最符合的流，污染物指标备注为总氮
- Nitrogen, organic bound: 0.0003
  污染物指标总氮的末端治理技术是/，其效率为0。原文件中描述污染物类别为废水，污染物指标为总氮，此处对其进行了匹配工作，将其匹配到LCAflow库里面相最符合的流，污染物指标备注为总氮
- Nitrogen, organic bound: 0.00018
  污染物指标总氮的末端治理技术是膜分离，其效率为40，末端治理设施实际运行率（k值）计算公式为废水治理设施运行时间（小时/年）/企业正常生产时间（小时/年）。原文件中描述污染物类别为废水，污染物指标为总氮，此处对其进行了匹配工作，将其匹配到LCAflow库里面相最符合的流，污染物指标备注为总氮
- phosphorus, total: 1.97e-5
  污染物指标总磷的末端治理技术是/，其效率为0。原文件中描述污染物类别为废水，污染物指标为总磷，此处对其进行了匹配工作，将其匹配到LCAflow库里面相最符合的流，污染物指标备注为总磷
- phosphorus, total: 9.85e-7
  污染物指标总磷的末端治理技术是沉淀分离，其效率为95，末端治理设施实际运行率（k值）计算公式为废水治理设施运行时间（小时/年）/企业正常生产时间（小时/年）。原文件中描述污染物类别为废水，污染物指标为总磷，此处对其进行了匹配工作，将其匹配到LCAflow库里面相最符合的流，污染物指标备注为总磷
- phosphorus, total: 1.97e-6
  污染物指标总磷的末端治理技术是膜分离，其效率为90，末端治理设施实际运行率（k值）计算公式为废水治理设施运行时间（小时/年）/企业正常生产时间（小时/年）。原文件中描述污染物类别为废水，污染物指标为总磷，此处对其进行了匹配工作，将其匹配到LCAflow库里面相最符合的流，污染物指标备注为总磷

## Data sources
- 第二次全国污染源普查产排污核算系数手册（试用版）,四级代码4610文件，在完整版文件中第5492页
