# Catalytic oxidation unit ; Groundwater pump and treatment

Dataset: ILCD process, Unit process, single operation
Geography: UM
Reference year: 2009
Classification: Other Services / Repair and maintenance
Generated by: Yang Xintong, yangxt@caep.org.cn
Owner: Tiangong LCI Data Working Group
Review: Dependent internal review by Tiangong LCI Data Working Group
Amounts: no units in this file; such an amount is in the reference unit of its flow, which a separate flow dataset defines
copyright: false
licenseType: Free of charge for all users and uses

## General comment
PTS removes the contaminated groundwater by pumping and use of aboveground treatment facilities. A PTS provides quick initial reductions in contaminant concentrations, but often results in a slow, steady reduction for the long-term.

## Geography
The case study was conducted using publicly available design documents for two remediation strategies designed by Battelle for Dover Air Force Base (AFB) in Dover, DE

## Technology and included processes
The PTS was modeled with five subsystems: extraction wells, air-stripping unit (ASU), catalytic oxidation unit (COU), granular activated carbon (GAC) unit, and treatment facilities.The model ASU was composed of an aluminum tower, packed with polyethylene pall ring packing, and a 0.75 kW (1 hp) blower.

## Technical purpose
Technical Usage: The Pump and Treat System (PTS) is primarily used for the remediation of contaminated groundwater. It involves extracting the polluted water and treating it using above-ground facilities. Specifically, this process is applicable in environmental cleanup projects, such as military bases and industrial sites where soil and groundwater have been contaminated. This system, studied at the Dover Air Force Base in the U.S., provides a way to address contamination through a series of treatment stages, including air-stripping, catalytic oxidation, and granular activated carbon filtration.

## Reference product
- Air stripping unit,Catalytic oxidation unit: 1; measured

## Inputs
- Aluminium and aluminium alloy products: 50; measured
  Calalylic Oxidalion Unil Aluminum
- Steel: 50; measured
  Catalytic Oxidation Unit Steel

## Use advice
Data Use Instructions: When applying this dataset for Life Cycle Assessment (LCA), users should consider the completeness and representativeness of the provided data. Any unit processes with inputs or emissions not included in the databases should be carefully estimated based on analogous processes or scientific literature. This data should be used within the technological applicability limitations as described for the air-stripping, catalytic oxidation, and GAC units. The omission of certain inputs or outputs should be transparently documented, and sensitivity analyses should be conducted to assess their potential impact on the LCA results.

## Review details
Inventory: The internal review was done by several iteration steps concerning raw data validation, raw data documentation, representativity, completeness and consistency of modelling with regard to ISO 14040 and 14044.

## Data sources
- Life-Cycle Case Study Comparison of Permeable Reactive Barrier versus Pump-and-Treat Remediation
