# Dry distillation section ; Shale crude oil ; Oil shale block ; SJ square furnace technology process ; All sizes; NESPS2 / 干馏工段 ; 页岩原油 ; 油页岩块 ; SJ方炉技术工艺 ; 所有规模 ; 全国第二次污染普查数据

Dataset: ILCD process, Unit process, single operation
Geography: CN
Reference year: 2019
Classification: Reference Parameters / Energy carriers and technologies / Other non-renewable fuels
Generated by: The data was created by the Office of the Second National Pollution Source Census of the Ministry of Ecology and Environment, and the data was organized by the TianGong Plan team for ILCD format / 生态环境部第二次全国污染源普查工作办公室创建数据，天工计划团队常慧敏整理数据为ILCD格式
Owner: Tiangong LCI Data Working Group / 天工LCI数据工作小组
Review: Dependent internal review by Tiangong LCI Data Working Group / 天工LCI数据工作小组
Amounts: no units in this file; such an amount is in the reference unit of its flow, which a separate flow dataset defines
copyright: false
licenseType: Free of charge for all users and uses

## General comment
the Technical of end-of-pipe management technology for pollution Exhaust gasis/

## Technical purpose
此描述的工艺包括使用SJ方炉技术对油页岩块进行干馏，以生产页岩原油。该技术适用于所有规模的油页岩蒸馏操作。此外，该工艺还涉及特定的末端处理技术，用于解决废水、化学需氧量、氨氮、石油相关废物、氰化物、苯酚、废气、颗粒物（PM2.5 - PM10）、挥发性有机化合物和氨的污染问题。这些技术包括气浮分离、沉淀分离、生化处理及气体成分的光解。末端管理技术的技术效率为79%。

## Reference product
- Oil Shale: 1000; input; calculated
  源文件中描述为为油页岩块，此处对其进行了匹配工作，将其匹配到LCAflow库里面相最符合的流，污染物指标备注为工业废水量

## Outputs
All rows: calculated
- cyanide: 0.000109
  the Technical of end-of-pipe management technology for pollution cyanideisFloating separation + precipitation separation + biochemical treatment
  污染物指标氰化物的末端治理技术是上浮分离+沉淀分离+生化处理，末端治理设施实际运行率（k值）计算公式为/。原文件中描述污染物类别为废水，污染物指标为氰化物，此处对其进行了匹配工作，将其匹配到LCAflow库里面相最符合的流，污染物指标备注为氰化物
- ammonia: 0.00033
  the Technical of end-of-pipe management technology for pollution ammoniais/
  污染物指标氨的末端治理技术是/，末端治理设施实际运行率（k值）计算公式为/。原文件中描述污染物类别为废气，污染物指标为氨，此处对其进行了匹配工作，将其匹配到LCAflow库里面相最符合的流，污染物指标备注为氨
- Petroleum-related waste: 0.000792
  the Technical of end-of-pipe management technology for pollution Petroleum-related wasteisFloating separation + precipitation separation + biochemical treatment
  污染物指标石油类的末端治理技术是上浮分离+沉淀分离+生化处理，末端治理设施实际运行率（k值）计算公式为/。原文件中描述污染物类别为废水，污染物指标为石油类，此处对其进行了匹配工作，将其匹配到LCAflow库里面相最符合的流，污染物指标备注为石油类
- phenol: 0.000818
  the Technical of end-of-pipe management technology for pollution phenolisFloating separation + precipitation separation + biochemical treatment
  污染物指标挥发酚的末端治理技术是上浮分离+沉淀分离+生化处理，末端治理设施实际运行率（k值）计算公式为/。原文件中描述污染物类别为废水，污染物指标为挥发酚，此处对其进行了匹配工作，将其匹配到LCAflow库里面相最符合的流，污染物指标备注为挥发酚
- particles (PM2.5 - PM10): 0.00149
  the Technical of end-of-pipe management technology for pollution particles (PM2.5 - PM10)is/
  污染物指标颗粒物的末端治理技术是/，末端治理设施实际运行率（k值）计算公式为/。原文件中描述污染物类别为废气，污染物指标为颗粒物，此处对其进行了匹配工作，将其匹配到LCAflow库里面相最符合的流，污染物指标备注为颗粒物
- volatile organic compound: 0.007161
  the Technical of end-of-pipe management technology for pollution volatile organic compoundisPhotolysis，Its Technical efficiency of end-of-pipe management79
  污染物指标挥发性有机物的末端治理技术是光解，其效率为79，末端治理设施实际运行率（k值）计算公式为k=废气治理设施运行时间（小时/年）/正常生产时间（小时/年）。原文件中描述污染物类别为废气，污染物指标为挥发性有机物，此处对其进行了匹配工作，将其匹配到LCAflow库里面相最符合的流，污染物指标备注为挥发性有机物
- Ammonia Nitrogen: 0.0182
  the Technical of end-of-pipe management technology for pollution Ammonia NitrogenisFloating separation + precipitation separation + biochemical treatment
  污染物指标氨氮的末端治理技术是上浮分离+沉淀分离+生化处理，末端治理设施实际运行率（k值）计算公式为/。原文件中描述污染物类别为废水，污染物指标为氨氮，此处对其进行了匹配工作，将其匹配到LCAflow库里面相最符合的流，污染物指标备注为氨氮
- chemical oxygen demand: 0.0505
  the Technical of end-of-pipe management technology for pollution chemical oxygen demandisFloating separation + precipitation separation + biochemical treatment
  污染物指标化学需氧量的末端治理技术是上浮分离+沉淀分离+生化处理，末端治理设施实际运行率（k值）计算公式为/。原文件中描述污染物类别为废水，污染物指标为化学需氧量，此处对其进行了匹配工作，将其匹配到LCAflow库里面相最符合的流，污染物指标备注为化学需氧量
- Waste water: 31.2
  the Technical of end-of-pipe management technology for pollution Waste wateris/
  污染物指标工业废水量的末端治理技术是/，末端治理设施实际运行率（k值）计算公式为/。原文件中描述污染物类别为废水，污染物指标为工业废水量，此处对其进行了匹配工作，将其匹配到LCAflow库里面相最符合的流，污染物指标备注为工业废水量
- Exhaust gas: 126
  the Technical of end-of-pipe management technology for pollution Exhaust gasis/
  污染物指标工业废气量的末端治理技术是/，末端治理设施实际运行率（k值）计算公式为/。原文件中描述污染物类别为废气，污染物指标为工业废气量，此处对其进行了匹配工作，将其匹配到LCAflow库里面相最符合的流，污染物指标备注为工业废气量

## Use advice
This dataset is derived from the Pollution Source Census Report and contains information on pollution emissions and related products. However, it does not include data on energy or chemical consumption, nor does it provide information on waste or co-product generation. When utilizing this dataset, please supplement the missing data based on actual conditions before use
该数据集来源于污染源普查报告，包含污染物排放及相关产品信息，但不包含能源或化学品消耗数据，也不提供废弃物或共生产物产生信息。在使用该数据集时，请根据实际情况补充缺失数据后再使用。

## Review details
Inventory: The internal review was done by several iteration steps concerning raw data validation, raw data documentation, representativity, completeness and consistency of modelling with regard to ISO 14040 and 14044.
清单： 内部审查通过几个迭代步骤完成，涉及原始数据验证、原始数据记录、代表性、完整性、与 ISO 14040 和 14044 有关的建模的一致性。

## Data sources
- 第二次全国污染源普查产排污核算系数手册（试用版）,二级代码25,四级代码2519文件，在完整版文件中第4111页
