# Frozen vegetables ; Roots and tubers, potatoes, eggplants, squash ; Washing + quick freezing ; All sizes; NESPS2 / 速冻蔬菜 ; 根茎类、薯类、茄果类、瓜菜类 ; 水洗+速冻 ; 所有规模 ; 全国第二次污染普查数据

Dataset: ILCD process, Unit process, single operation
Geography: CN
Reference year: 2019
Classification: Reference Parameters / Materials production / Food and renewable raw materials
Generated by: The data was created by the Office of the Second National Pollution Source Census of the Ministry of Ecology and Environment, and the data was organized by the TianGong Plan team for ILCD format / 生态环境部第二次全国污染源普查工作办公室创建数据，天工计划团队常慧敏整理数据为ILCD格式
Owner: Tiangong LCI Data Working Group / 天工LCI数据工作小组
Review: Dependent internal review by Tiangong LCI Data Working Group / 天工LCI数据工作小组
Amounts: no units in this file; such an amount is in the reference unit of its flow, which a separate flow dataset defines
copyright: false
licenseType: Free of charge for all users and uses

## General comment
the treatment technology for the pollution of Waste waterdidn't offered

## Technical purpose
该数据集代表了一个工业加工过程，用于生产包括根茎类、薯类、茄果类和瓜类在内的各种速冻蔬菜。该过程包括清洗原始蔬菜并采用快速冷冻方法。这样可以在保持蔬菜的营养价值和味道的同时保鲜。这个过程被用来准备冷冻蔬菜，随后可以在超市销售并在食品服务行业中使用。该方法加工出的蔬菜可用于从家庭烹饪到商业食品准备的广泛烹饪应用。

## Reference product
- Quick-frozen vegetables: 1000; calculated
  源文件中描述为为速冻蔬菜，此处对其进行了匹配工作，将其匹配到LCAflow库里面相最符合的流

## Outputs
- Waste water: 5400; calculated
  the treatment technology for the pollution of Waste waterdidn't offered
  污染物指标工业废水量的末端治理技术未说明。原文件中描述污染物类别为废水，污染物指标为工业废水量，此处对其进行了匹配工作，将其匹配到LCAflow库里面相最符合的流

## Use advice
This dataset is derived from the Pollution Source Census Report and contains information on pollution emissions and related products. However, it does not include data on energy or chemical consumption, nor does it provide information on waste or co-product generation. When utilizing this dataset, please supplement the missing data based on actual conditions before use
该数据集来源于污染源普查报告，包含污染物排放及相关产品信息，但不包含能源或化学品消耗数据，也不提供废弃物或共生产物产生信息。在使用该数据集时，请根据实际情况补充缺失数据后再使用。

## Review details
Inventory: The internal review was done by several iteration steps concerning raw data validation, raw data documentation, representativity, completeness and consistency of modelling with regard to ISO 14040 and 14044.
清单： 内部审查通过几个迭代步骤完成，涉及原始数据验证、原始数据记录、代表性、完整性、与 ISO 14040 和 14044 有关的建模的一致性。

## Data sources
- 第二次全国污染源普查产排污核算系数手册（试用版）,四级代码1371文件，在完整版文件中第2623页
