# Production of aluminum electrolytic capacitors ; Cathodes for aluminum electrolysis ; Cathode foil slitting ; Aluminum coils of 0.05 mm cathode-etched aluminum foil

Dataset: ILCD process, Unit process, single operation
Geography: JS-CN
Reference year: 2020
Classification: Unit processes / Materials production / Metals and semimetals
Generated by: Huimin Chang, huiminchang@tsinghua.edu.cn
Owner: Tiangong LCI Data Working Group
Review: Dependent internal review by Tiangong LCI Data Working Group
Amounts: no units in this file; such an amount is in the reference unit of its flow, which a separate flow dataset defines
copyright: false
licenseType: Free of charge for all users and uses

## General comment
阴极箔分切 ; 铝电解电容器 (AEC) 生产 ; 420V 680uf

## Time period
The investigated manufacturer produced about 1.183 billion AECs of all kinds in 2020.

## Technical purpose
The described industrial process involves the production of aluminum electrolytic capacitors, specifically the creation of the cathodes used in aluminum electrolysis. The process includes slitting cathode foil and manufacturing aluminum coils with 0.05 mm cathode-etched aluminum foil. These components are crucial for fabricating 420V 680uf capacitor units, which are utilized in various electronics for energy storage and filtering. The capacitors produced are suitable for a wide range of applications that require durable and reliable electronic components.

## Reference product
- cathode, for aluminium electrolysis: 361.173; measured
  Cathode etched foil [kg]

## Inputs
- electricity, high voltage, aluminium industry: 6.5232; measured
  Electricity [kWh]
- Al coil of 0.05mm cathode etched foil: 373.885; measured
  Al coil of 0.05mm cathode etcthed foil [kg]

## Outputs
- cathode, for aluminium electrolysis: 12.712; measured
  Scraps of cathode etched foil [kg]

## Data selection and combination
The inventory data of capacitor production come from the AECs’ production factory in Jiangsu Province, China. The cut-off criteria of LCI data collection for each process is coverage of at least 95% of the mass and energy of the input and output flows. The inventory data of anode foil production and cathode foil production is obtained based on the analysis of the manufacturing processes and corresponding process parameters. The upstream data (i.e., aluminum ingots, separator paper, transport, electricity, and water) are acquired from the Gabi software (Version: 10.6.1.35). In detail, the profile of Chineses electricity grid from the China Electric Power Yearbook adopts the reference year 2016. The reference year of aluminum ingot production is 2015. The inaccessible data about ammonium citrate, ammonium pentaborate, NH4H2PO4, and HBO3 are estimated based on chemical equations using the existing materials (reactants) in the Gabi software. The use and end-of-life stage inventory data are obtained based on analysis and calculation.

## Use advice
When using the provided Life Cycle Inventory (LCI) data relevant to aluminum electrolytic capacitor production, it is essential to observe the specified cut-off criteria, ensuring coverage of at least 95% of the mass and energy of the input and output flows. Data users should be aware that the reference years for the electricity grid and aluminum ingot production are 2016 and 2015, respectively. For elements like ammonium citrate, ammonium pentaborate, NH4H2PO4, and HBO3, where data is inaccessible, users should apply estimations based on chemical equations using reactants available within the Gabi software. Data on use and end-of-life stages are derived from analysis and calculation and should be applied accordingly during LCA studies.

## Review details
Inventory: The internal review was done by several iteration steps concerning raw data validation, raw data documentation, representativity, completeness and consistency of modelling with regard to ISO 14040 and 14044.

## Data sources
- Zhang, C., Jing, J., Yun, L., Zheng, Y. & Huang, H. A cradle-to-grave life cycle assessment of high-voltage aluminum electrolytic capacitors in China. J. Clean. Prod. 370, (2022).
