# Transformer manufacture ; Box-type Transformer (30) manufacture

Dataset: ILCD process, Unit process, single operation
Geography: NMG-CN
Reference year: 2017
Classification: Systems / Other machines
Functional unit: The functional unit is 1.5 MW wind turbine
LCI method principle: Attributional
LCI method approaches: Allocation
Generated by: Yunzhi Zhao, ll10088@163.com
Owner: Tiangong LCI Data Working Group
Review: Dependent internal review by Tiangong LCI Data Working Group
Amounts: no units in this file; such an amount is in the reference unit of its flow, which a separate flow dataset defines
copyright: false
licenseType: Free of charge for all users and uses

## General comment
The box-type transformers manufactured in this process are utilized within wind turbine power systems for wind farms. These transformers are specifically designed to handle the power requirements of 1.5 megawatts (MW) wind turbines, making them suitable for large-scale wind power projects, such as the one referenced in Inner Mongolia. The transformers are integral for transforming the electrical output from the wind turbines to a voltage that is suitable for the grid.

## Geography
The data regarding the parameters of wind power has been collected from Wang (2012). A wind farm equipped with 33 domestic 1.5 megawatts (MW) wind turbines is regarded as a case study to analyze the environmental impact and its substitution effects. The wind farm is located in the northeast of Inner Mongolia, the province in which most of China’s wind power is installed (Xia and Song, 2017).

## Reference product
- Transformer: 30; article inperiodical

## Inputs
- copper: 78000; article inperiodical
- iron: 312000; article inperiodical
  Steel and iron

## Deviations from the LCI method approaches
The life cycle inventory for wind power is illustrated as follows. The production and manufacturing stage include the production of wind turbines, substations, and cables, which consume a large amount of energy and emit pollutants (Xue et al., 2015).

## Use advice
When using the data set for life cycle assessment of the wind power system, users should consider the specific environmental impacts associated with the manufacture of the 30 box-type transformers. The assessment should include the energy consumption and emissions generated during the production of transformers, taking into account the unique energy mix and environmental policies within Inner Mongolia. Substitution effects should also be evaluated to understand the displacement of conventional energy sources by wind power. These methodological aspects are critical for accurately depicting the environmental benefits and impacts of wind power infrastructure.

## Review details
Inventory: The internal review was done by several iteration steps concerning raw data validation, raw data documentation, representativity, completeness and consistency of modelling with regard to ISO 14040 and 14044.

## Data sources
- Li, H., Jiang, H.-D., Dong, K.-Y., Wei, Y.-M. & Liao, H. A comparative analysis of the life cycle environmental emissions from wind and coal power: Evidence from China. Journal of Cleaner Production 248, 119192 (2020).
