# Electricity production ; Thermal power ; Beijing

Dataset: ILCD process, Unit process, single operation
Geography: BJ-CN
Reference year: 2019
Classification: Unit processes / Energy carriers and technologies / Electricity
Generated by: Ruoxi Xiong, xiongrx0126@163.com
Owner: Tiangong LCI Data Working Group
Review: Dependent internal review by Tiangong LCI Data Working Group
Amounts: no units in this file; such an amount is in the reference unit of its flow, which a separate flow dataset defines
copyright: false
licenseType: Free of charge for all users and uses

## General comment
Thermal power generation includes seventeen fossil fuels such as raw coal, washed coal, oil and natural gas. The process only considers the direct power generation process, not the upstream raw material extraction and processing and the downstream power consumption

## Time period
Calculated based on data from the 2019 Energy Statistics Yearbook

## Technical purpose
Thermal power generation as referenced in the data set is primarily geared towards electricity production for public and industrial power supply in Beijing. It utilizes a variety of fossil fuels, including raw coal, washed coal, oil, and natural gas, to generate electric power.

## Reference product
- electricity for thermal power: 3.6; calculated

## Inputs
All rows: calculated
- Raw coal: 0.00810121
- Diesel: 4.514e-5
- Petroleum Coke: 0.00145592
- liquefied petroleum gas: 1.806e-5
- refinery gas: 2.709e-5
- natural gas: 0.156562

## Outputs
- carbon dioxide (fossil): 0.358976; calculated
- sulfur dioxide: 2.11162e-5; calculated
- Nitrogen oxides: 3.75833e-5; calculated
- particles (> PM10): 7.91104e-6; calculated
  原文描述为Dust，由于flow库中没有dust，此处选择为Particles（>PM10）

## Data treatment and extrapolations
For the accounting method, please refer to the "Enterprise Greenhouse Gas Emissions Accounting Methods and Reporting Guidelines for Power Generation Facilities". Different forms of power generation and fuel consumption come from Chapter 3 (Energy Production) and Chapter 6 (Regional Energy Balance Sheet) in the "China Energy Statistical Yearbook 2020". The fuel parameters such as low calorific value and carbon content per unit calorific value used to calculate the carbon dioxide emission factor come from the "2019 China Regional Power Grid Carbon Dioxide Baseline Emission Factor Calculation Instructions OM" and the "Enterprise Greenhouse Gas Emission Accounting Method and Reporting Guide for Power Generation Facilities" 》

## Use advice
When using this data set, consider that it exclusively accounts for the direct generation of electricity in thermal power plants located in Beijing. It does not include the environmental impacts of upstream processes like the extraction and processing of fossil fuels nor the downstream use of the generated electricity. Users should refer to the 'Enterprise Greenhouse Gas Emissions Accounting Methods and Reporting Guidelines for Power Generation Facilities' for methodology. For further specifics on power generation and fuel consumption data, as well as parameters for calculating the CO2 emission factor, users are directed to Chapters 3 and 6 of the 'China Energy Statistical Yearbook 2020' and supporting documents, such as the '2019 China Regional Power Grid Carbon Dioxide Baseline Emission Factor Calculation Instructions OM'.

## Review details
Inventory: The internal review was done by several iteration steps concerning raw data validation, raw data documentation, representativity, completeness and consistency of modelling with regard to ISO 14040 and 14044.

## Data sources
- 企业温室气体排放核算方法与报告指南 发电设施.
