# Aluminum foil production ; Battery aluminum foil ; Cradle

Dataset: ILCD process, Unit process, black box
Geography: AH-CN
Reference year: 2019
Classification: Unit processes / Materials production / Metals and semimetals
Generated by: Jinliang Xie, jinliang.research@gmail.com
Owner: Tiangong LCI Data Working Group
Review: Dependent internal review by Tiangong LCI Data Working Group
Amounts: no units in this file; such an amount is in the reference unit of its flow, which a separate flow dataset defines
copyright: false
licenseType: Free of charge for all users and uses

## General comment
This dataset describes the manufacturing process of aluminum foil specifically designed for use in batteries. The aluminum foil produced is suitable for various types of batteries, including lithium-ion batteries commonly used in portable electronics, electric vehicles, and renewable energy storage systems.

## Time period
Dissertation publishing year

## Reference product
- aluminum foil: 1; measured
  Aluminum foil

## Inputs
- transport, freight, lorry 16-32 metric ton, unregulated: 0.209; measured
  Lorry, 30t
- electricity, high voltage, aluminium industry: 2.6172; measured
  Electricity
- aluminium: 1.11; measured
  Aluminum，居然没有flow？
- Lubricating oil,Lubricating Oil: 0.0267; measured
  Lubricant oil

## Outputs
- non-methane volatile organic compounds: 0.00044; measured
  NMVOC
- chemical oxygen demand: 7.9e-5; measured
  COD

## Use advice
When using this dataset for Life Cycle Assessment, attention should be paid to the scope of the data which is from 'cradle' meaning from raw material extraction to production of the battery aluminum foil. Users should account for subsequent life cycle stages such as distribution, use phase, and end-of-life management based on their specific application. The dataset is a unit process (black box) and is defined by the year of the dissertation publication that presents the research. Make sure to adjust your LCA model if newer production technologies or methodologies are available since the publication date.

## Review details
Inventory: The internal review was done by several iteration steps concerning raw data validation, raw data documentation, representativity, completeness and consistency of modelling with regard to ISO 14040 and 14044.

## Data sources
- Yin, R., Hu, S. & Yang, Y. Life cycle inventories of the commonly used materials for lithium-ion batteries in China. J. Clean. Prod. 227, 960–971 (2019).
