# Remediated soil ; Soil remediation ; In situ remediation ; Bioremediation ; Enhanced reductive dechlorination (ERD)

Dataset: ILCD process, Unit process, black box
Geography: DK
Reference year: 2010
Classification: Unit processes / Other Services / Repair and maintenance
Functional unit: The functional unit provided by all options compared in this study is the treatment of the 700 m3 of contaminated soil with a 98% removal of the contaminant mass within this volume. The estimated mass of TCE in the ap proximately 700 m3 of contaminated soil is 40 kg.
Generated by: Yang Xintong, yangxt@caep.org.cn
Owner: Tiangong LCI Data Working Group
Review: Dependent internal review by Tiangong LCI Data Working Group
Amounts: no units in this file; such an amount is in the reference unit of its flow, which a separate flow dataset defines
copyright: false
licenseType: Free of charge for all users and uses

## General comment
Enhanced reductive dechlorination (ERD) aims to enhance microbial degradation via the anaerobic reductive dechlorination pathway, which sequen tially degrades trichloroethene (TCE) to cis-dichloroethene (cis-DCE), vinyl chloride (VC), and finally to ethene/ethane. The enhancement is done via the injection of a bioculture containing specific degrader organisms together with a fermentable substrate.

## Geography
A TCE-contaminated site in central Copenhagen is situated within the catchment of a water supply

## Technical purpose
The soil remediation process described is intended to treat TCE-contaminated soil through Enhanced Reductive Dechlorination (ERD). It is applied for in situ treatment within water supply catchment areas to degrade TCE to less harmful compounds such as cis-DCE, VC, and ultimately ethene/ethane. This technique is relevant for environmental remediation projects aiming to reduce chlorinated solvent contamination in soils, particularly where containment and extraction are impractical or undesirable.

## Reference product
- Remediated soil: 700; measured

## Inputs
All rows: measured
- bentonite: 456
  Installation—6 monitoring wells in upper aquifer (5 m deep); Bentonite use per well in upper aquifer (4.5 m depth, Ø150 mm, density 950 kg/m3): 76 kg
- sand: 198
  Installation—6 monitoring wells in upper aquifer (5 m deep); Screen sand use per well in upper aquifer (1.5 m screen): 33 kg
- Steel: 30
  Installation—6 monitoring wells in upper aquifer (5 m deep); Steel use per well cover plate: 5 kg
- bentonite: 444
  Installation—4 monitoring wells in regional aquifer (10meter deep); Bentonite use per well in regional aquifer (8 m depth, Ø150 mm, density 950 kg/m3): 111 kg
- sand: 176
  Installation—4 monitoring wells in regional aquifer (10meter deep); Screen sand use per well in regional aquifer (2 m screen): 44 kg
- Steel: 20
  Installation—4 monitoring wells in regional aquifer (10meter deep); Steel use per well cover plate: 5 kg
- Road Transport,Road Transport: 450000, 3.15e6, 4.68e6 (3 entries)
  Distance of round trip for consultants for supervision and monitoring is set to 90 km based on the actual distance between the site and the consultant.
- White Granulated Sugar: 5000
  5000 kg sugar canemolasses transported by ship from Brazil
- Biological Medium: 6700
  6700 kg bioculture by truck from the Netherlands
- Electricity: 28944
  Bioculture production: 1.2 kWh per liter of culture. Density of bioculture: 1 kg/L
- Groundwater sample and TVOC analysis: 232
  Monitoring
- Soil Sample: 50
  Monitoring
- Electricity: 576.288
  Estimated electricity use for groundwater sampling (0.65 kw, 0.6 h): 0.39 kWh/per screen
- Diesel,Diesel: 0.35
  Geoprobe diesel use for injection: 10 L/day . (with injections at 25 cm intervals from 3-8 meters below surface).5 days per injection round, 7 injection rounds
- contaminated soil: 700

## Use advice
When using this data set for Life Cycle Assessment, it is crucial to ensure the functional unit of the study matches the defined treatment volume and contaminant mass removal rate. The data is specific to the treatment of 700 m3 of TCE-contaminated soil with a 98% efficiency. Users must account for all related phases including raw materials acquisition, materials production, use stage, and end-of-life processes in their calculations. If applied to different contaminant concentrations or volumes, adjustments are necessary. The methodology is also conditioned to the presence of specific degrader organisms and a suitable fermentable substrate; hence these conditions must be met in application.

## Review details
Inventory: The internal review was done by several iteration steps concerning raw data validation, raw data documentation, representativity, completeness and consistency of modelling with regard to ISO 14040 and 14044.

## Data sources
- Gitte L ,Z M H ,Julie C , et al. Environmental impacts of remediation of a trichloroethene-contaminated site: life cycle assessment of remediation alternatives. Environmental science & technology, 2010, 44 (23): 9163-9.
