# Dry distillation section ; Shale crude oil ; Oil shale block ; Full cycle dry distillation furnace technology ; All sizes; NESPS2 / 干馏工段 ; 页岩原油 ; 油页岩块 ; 全循环干馏炉技术工艺 ; 所有规模 ; 全国第二次污染普查数据

Dataset: ILCD process, Unit process, single operation
Geography: CN
Reference year: 2019
Classification: Reference Parameters / Energy carriers and technologies / Other non-renewable fuels
Generated by: The data was created by the Office of the Second National Pollution Source Census of the Ministry of Ecology and Environment, and the data was organized by the TianGong Plan team for ILCD format / 生态环境部第二次全国污染源普查工作办公室创建数据，天工计划团队常慧敏整理数据为ILCD格式
Owner: Tiangong LCI Data Working Group / 天工LCI数据工作小组
Review: Dependent internal review by Tiangong LCI Data Working Group / 天工LCI数据工作小组
Amounts: no units in this file; such an amount is in the reference unit of its flow, which a separate flow dataset defines
copyright: false
licenseType: Free of charge for all users and uses

## General comment
the Technical of end-of-pipe management technology for pollution Exhaust gasis/

## Technical purpose
干馏工段将油页岩块中的页岩原油通过全循环干馏炉技术工艺转换成可用产品，适用于所有规模的生产。这个过程特别用于提取页岩油作为能源生产或石化工业的原料。所描述的尾气治理技术旨在处理包括废水、化学需氧量、氨氮、石油相关废弃物、氰化物、苯酚和废气在内的废物流。它特别适用于需要遵守严格环境法规并寻求最小化排放和废水影响的设施。

## Reference product
- Oil Shale: 1000; input; calculated
  源文件中描述为为油页岩块，此处对其进行了匹配工作，将其匹配到LCAflow库里面相最符合的流，污染物指标备注为工业废水量

## Outputs
All rows: calculated
- cyanide: 1.2e-7
  the Technical of end-of-pipe management technology for pollution cyanideisFloating separation + biochemical treatment + catalytic oxidation
  污染物指标氰化物的末端治理技术是上浮分离+生化处理+催化氧化，末端治理设施实际运行率（k值）计算公式为/。原文件中描述污染物类别为废水，污染物指标为氰化物，此处对其进行了匹配工作，将其匹配到LCAflow库里面相最符合的流，污染物指标备注为氰化物
- Petroleum-related waste: 0.000219
  the Technical of end-of-pipe management technology for pollution Petroleum-related wasteisFloating separation + biochemical treatment + catalytic oxidation
  污染物指标石油类的末端治理技术是上浮分离+生化处理+催化氧化，末端治理设施实际运行率（k值）计算公式为/。原文件中描述污染物类别为废水，污染物指标为石油类，此处对其进行了匹配工作，将其匹配到LCAflow库里面相最符合的流，污染物指标备注为石油类
- ammonia: 0.000615
  the Technical of end-of-pipe management technology for pollution ammoniaisActivated carbon adsorption，Its Technical efficiency of end-of-pipe management70
  污染物指标氨的末端治理技术是活性炭吸附，其效率为70，末端治理设施实际运行率（k值）计算公式为k=废气治理设施运行时间（小时/年）/正常生产时间（小时/年）。原文件中描述污染物类别为废气，污染物指标为氨，此处对其进行了匹配工作，将其匹配到LCAflow库里面相最符合的流，污染物指标备注为氨
- phenol: 0.00519
  the Technical of end-of-pipe management technology for pollution phenolisFloating separation + biochemical treatment + catalytic oxidation
  污染物指标挥发酚的末端治理技术是上浮分离+生化处理+催化氧化，末端治理设施实际运行率（k值）计算公式为/。原文件中描述污染物类别为废水，污染物指标为挥发酚，此处对其进行了匹配工作，将其匹配到LCAflow库里面相最符合的流，污染物指标备注为挥发酚
- volatile organic compound: 0.01023
  the Technical of end-of-pipe management technology for pollution volatile organic compoundisActivated carbon adsorption，Its Technical efficiency of end-of-pipe management70
  污染物指标挥发性有机物的末端治理技术是活性炭吸附，其效率为70，末端治理设施实际运行率（k值）计算公式为k=废气治理设施运行时间（小时/年）/正常生产时间（小时/年）。原文件中描述污染物类别为废气，污染物指标为挥发性有机物，此处对其进行了匹配工作，将其匹配到LCAflow库里面相最符合的流，污染物指标备注为挥发性有机物
- Nitrogen oxides: 0.02
  the Technical of end-of-pipe management technology for pollution Nitrogen oxidesisOthers (direct discharge)，Its Technical efficiency of end-of-pipe management0
  污染物指标氮氧化物的末端治理技术是其他（直接排放），其效率为0，末端治理设施实际运行率（k值）计算公式为/。原文件中描述污染物类别为废气，污染物指标为氮氧化物，此处对其进行了匹配工作，将其匹配到LCAflow库里面相最符合的流，污染物指标备注为氮氧化物
- sulfur dioxide: 0.04
  the Technical of end-of-pipe management technology for pollution sulfur dioxideisOthers (direct discharge)，Its Technical efficiency of end-of-pipe management0
  污染物指标二氧化硫的末端治理技术是其他（直接排放），其效率为0，末端治理设施实际运行率（k值）计算公式为/。原文件中描述污染物类别为废气，污染物指标为二氧化硫，此处对其进行了匹配工作，将其匹配到LCAflow库里面相最符合的流，污染物指标备注为二氧化硫
- chemical oxygen demand: 0.106
  the Technical of end-of-pipe management technology for pollution chemical oxygen demandisFloating separation + biochemical treatment + catalytic oxidation
  污染物指标化学需氧量的末端治理技术是上浮分离+生化处理+催化氧化，末端治理设施实际运行率（k值）计算公式为/。原文件中描述污染物类别为废水，污染物指标为化学需氧量，此处对其进行了匹配工作，将其匹配到LCAflow库里面相最符合的流，污染物指标备注为化学需氧量
- Ammonia Nitrogen: 0.193
  the Technical of end-of-pipe management technology for pollution Ammonia NitrogenisFloating separation + biochemical treatment + catalytic oxidation
  污染物指标氨氮的末端治理技术是上浮分离+生化处理+催化氧化，末端治理设施实际运行率（k值）计算公式为/。原文件中描述污染物类别为废水，污染物指标为氨氮，此处对其进行了匹配工作，将其匹配到LCAflow库里面相最符合的流，污染物指标备注为氨氮
- particles (PM2.5 - PM10): 1.46
  the Technical of end-of-pipe management technology for pollution particles (PM2.5 - PM10)isOthers (direct discharge)，Its Technical efficiency of end-of-pipe management0
  污染物指标颗粒物的末端治理技术是其他（直接排放），其效率为0，末端治理设施实际运行率（k值）计算公式为/。原文件中描述污染物类别为废气，污染物指标为颗粒物，此处对其进行了匹配工作，将其匹配到LCAflow库里面相最符合的流，污染物指标备注为颗粒物
- Waste water: 31.2
  the Technical of end-of-pipe management technology for pollution Waste wateris/
  污染物指标工业废水量的末端治理技术是/，末端治理设施实际运行率（k值）计算公式为/。原文件中描述污染物类别为废水，污染物指标为工业废水量，此处对其进行了匹配工作，将其匹配到LCAflow库里面相最符合的流，污染物指标备注为工业废水量
- Exhaust gas: 158
  the Technical of end-of-pipe management technology for pollution Exhaust gasis/
  污染物指标工业废气量的末端治理技术是/，末端治理设施实际运行率（k值）计算公式为/。原文件中描述污染物类别为废气，污染物指标为工业废气量，此处对其进行了匹配工作，将其匹配到LCAflow库里面相最符合的流，污染物指标备注为工业废气量

## Use advice
This dataset is derived from the Pollution Source Census Report and contains information on pollution emissions and related products. However, it does not include data on energy or chemical consumption, nor does it provide information on waste or co-product generation. When utilizing this dataset, please supplement the missing data based on actual conditions before use
该数据集来源于污染源普查报告，包含污染物排放及相关产品信息，但不包含能源或化学品消耗数据，也不提供废弃物或共生产物产生信息。在使用该数据集时，请根据实际情况补充缺失数据后再使用。

## Review details
Inventory: The internal review was done by several iteration steps concerning raw data validation, raw data documentation, representativity, completeness and consistency of modelling with regard to ISO 14040 and 14044.
清单： 内部审查通过几个迭代步骤完成，涉及原始数据验证、原始数据记录、代表性、完整性、与 ISO 14040 和 14044 有关的建模的一致性。

## Data sources
- 第二次全国污染源普查产排污核算系数手册（试用版）,二级代码25,四级代码2519文件，在完整版文件中第4111页
