# refined copper production;Refined copper;copper pyrometallurgy;copper ore

Dataset: ILCD process, Unit process, single operation
Geography: CN
Reference year: 2011
Classification: Unit processes / Materials production / Metals and semimetals
Functional unit: The function unit is defined as 1000kg of refined copper.
LCI method principle: Attributional
Generated by: Peng Wang, 2867919560@qq.com
Owner: Tiangong LCI Data Working Group
Review: Dependent internal review by Tiangong LCI Data Working Group
Amounts: no units in this file; such an amount is in the reference unit of its flow, which a separate flow dataset defines
copyright: false
licenseType: Free of charge for all users and uses

## General comment
This data set describes the process of producing refined copper via pyrometallurgical methods, starting from copper ore. The refined copper is typically used for electrical wiring, roofing, plumbing, and as a component in various metal alloys. It is also applied in the production of industrial machinery and thermal and electrical conductors.

## Geography
the background data of copper smelting come from China nonferrous metals industry yearbook 2011

## Reference product
- Refined copper: 1000; software or database
  Need to add refined copper

## Inputs
All rows: missing unimportant
- pyrite: 10
  Pyrite
- Copper ore: 195000
- Sandstone: 6040
  Sandstone needs to be replenished
- iron: 389
  Iron ore
- Crude coal: 3780
  Crude coal needs to be replenished
- crude oil; 42.3 MJ/kg: 573
  Crude oil
- natural gas; 44.1 MJ/kg: 0
  Natural gas

## Outputs
- carbon dioxide (fossil): 6720; software or database
  原文未区分bio和fossil，根据专家判断此处为fossil
- carbon monoxide,carbon monoxide (fossil): 44.6; software or database
  原文未区分bio和fossil，根据专家判断此处为fossil
- non-methane volatile organic compounds: 8.57; software or database
- methane (fossil): 17.1; software or database
  原文未区分bio和fossil，根据专家判断此处为fossil
- sulfur oxides: 47.6; software or database
  SO2
- nitrous oxide: 30.7; software or database
  NOX
- particles (PM2.5 - PM10): 1010; software or database
- chemical oxygen demand: 0; software or database
  COD needs to be supplemented
- cadmium: 0.00193; software or database
  Cd
- lead: 0.0103; software or database
- Waste liquid: 221000; missing unimportant
  Waste liquid needs to be replenished
- Waste solid: 2280; missing unimportant
  Waste solid needs to be replenished

## Deviations from the LCI method approaches
The impact potential was quantified by CML methodology.

## Data selection and combination
In terms of environmental data collection, the background data of copper smelting come from China nonferrous metals industry yearbook 2011The LCI of energy generation including power generation, coal and coke production were all derived from Sinocenter database . All of these data were calculated based on national statistical data which can reflect the average level of energy production in China. The data related to copper ore and limestone mining was also sited from Sinocenter database , while the inventories of sandstone mining were from Ecoinvent database

## Use advice
Users of this data set should note that the background data for the copper smelting process is sourced from the China nonferrous metals industry yearbook 2011, which may not reflect the current state of technology or environmental impact. Life Cycle Inventory (LCI) data for energy generation is derived from the Sinocenter database and should be considered as representing an average level of energy production in China. For modeling the LCA of products using this data, it is crucial to include all related upstream processes such as mining of copper ore and limestone, and to apply the CML (Centre of Environmental Science, Leiden University) methodology for quantifying impact potential. The functional unit is defined as 1000kg of refined copper.

## Review details
Inventory: The internal review was done by several iteration steps concerning raw data validation, raw data documentation, representativity, completeness and consistency of modelling with regard to ISO 14040 and 14044.

## Data sources
- Wang, H. T. et al. Life Cycle Assessment of Metallic Copper Produced by the Pyrometallurgical Technology of China. MSF 814, 559–563 (2015).
