# Extraction well ; Soil in-situ remediation ; SVE system ; Well constraction

Dataset: ILCD process, Unit process, single operation
Geography: KR
Reference year: 2011
Classification: Unit processes / Other Services / Repair and maintenance
Generated by: Zhang Jianbin, zhangjb@caep.org.cn
Owner: Tiangong LCI Data Working Group
Review: Dependent internal review by Tiangong LCI Data Working Group
Amounts: no units in this file; such an amount is in the reference unit of its flow, which a separate flow dataset defines
copyright: false
licenseType: Free of charge for all users and uses

## General comment
3 wells

## Technology and included processes
PVC 45 kg Sand 0.3 m3 , Bentonite 211 kg - Mortar 2,291 kg - drilling equipment diesel 11 L

## Technical purpose
The data set describes the construction of three extraction wells, which are part of an in-situ soil remediation project, specifically for a soil vapor extraction (SVE) system designed to treat contaminated soil. Such wells are typically used in environmental remediation to reduce concentrations of volatile contaminants, commonly in industrial sites where chemical spills may have occurred.

## Reference product
- Extraction wel: 3; measured
  3 wells

## Inputs
- Polyvinyl chloride: 45; measured
- sand: 0.3; measured
- bentonite: 211; measured
- Mortar: 2291; measured
- Diesel,Diesel: 0.011; measured
- Equipment and Materials Arriving on Site: 25000
  文中给出修复工程总的材料使用量为99.8吨，但基础设施建设和建井两个环节材料用量没有单独统计重量，此处25吨为填报人根据经验估算得到的结果。

## Use advice
Users of this data set should note that it includes comprehensive inputs and outputs for the construction of soil remediation extraction wells. These include major raw materials such as PVC, sand, bentonite, and mortar, as well as essential energy consumption such as diesel for drilling equipment. When using this data for life cycle assessment, ensure that similar construction processes and conditions, like the type of contaminants and soil properties, are taken into account. Furthermore, when modeling the use phase, considerations of maintenance and operation of the SVE system should be integrated.

## Review details
Inventory: The internal review was done by several iteration steps concerning raw data validation, raw data documentation, representativity, completeness and consistency of modelling with regard to ISO 14040 and 14044.

## Data sources
- Jeong, S.-W. & Suh, S.-W. Assessment of Environmental Impacts and CO 2 Emissions from Soil Remediation Technologies using Life Cycle Assessment - Case Studies on SVE and Biopile Systems -. Journal of Korean Society of Environmental Engineers 33, 267–274 (2011).
