# cement production;cement, portland cement, 42.5MPa;shaft kiln

Dataset: ILCD process, Unit process, black box
Geography: HLJ-CN
Reference year: 2008
Classification: Materials production / Other mineralic materials
Generated by: Siqi Yang, ysqsophia@gmail.com
Owner: Tiangong LCI Data Working Group
Review: Dependent internal review by Tiangong LCI Data Working Group
Amounts: no units in this file; such an amount is in the reference unit of its flow, which a separate flow dataset defines
copyright: false
licenseType: Free of charge for all users and uses

## General comment
Shaft kiln is used for the production of portland cement. A study was conducted on the process flow and operating parameters of the rotary kiln technology currently available in the cement industry in Heilongjiang Province, and input and output data of the established product system were collected and calculated and quantified.

## Technical purpose
This specific portland cement, characterized by a 28-day compressive strength of 42.5MPa, is suited for general construction purposes including infrastructure, buildings, and civil engineering projects that require a high grade of structural integrity. Its production process using a shaft kiln is particularly relevant to the region of Heilongjiang Province in the context of the current technological capabilities of the cement industry.

## Model description
The functional unit is the performance of 1kg cement with a 28-day compressive strength of 42.5MPa, that is, 1Fu=42.5kgMPa. The scope of evaluation is raw meal preparation, clinker calcination and cement preparation. The environmental load caused by the consumption of clay resources is not considered for the time being. Iron powder is an iron correction material, and its environmental impact will not be considered. The wastes considered to be emitted at the output end of the product system mainly include nitrogen oxides, sulfur dioxide, carbon dioxide and dust.

## Reference product
- cement, portland cement, 42.5MPa: 1000
  1kg of Portland cement with a strength grade of 42.5.

## Inputs
- limestone, crushed, for mill: 1137.5
  Limestone
- gypsum stone (CaSO4-dihydrate): 59.3
  Gypsum
- hard coal: 204.82
  Standard coal. The original data is 0.1903kg standard coal, here converted to hard coal, the conversion formula is 1kg hard coal = 0.929kg standard coal.
- electricity, medium voltage: 357.48
  Electricity

## Outputs
- particles (> PM10): 0.64
  Dust, with an unspecified particle size, is treated as PM > 10 micrometers in diameter.
- sulfur dioxide: 0.4662
  Sulfur dioxide.
- Nitrogen oxides: 1.602
- carbon dioxide: 1092.8
  Carbon dioxide

## Use advice
When utilizing this data set, LCA practitioners should base their analysis on the functional unit of 1kg of cement with a 28-day compressive strength of 42.5MPa. Users should include emissions such as nitrogen oxides, sulfur dioxide, carbon dioxide, and dust in their impact assessment. The environmental impact of clay resource consumption and iron powder used as a corrective material should be omitted from the analysis at this stage. The methodological boundary includes raw meal preparation, clinker calcination, and cement production, and users should carefully consider the technological applicability of the shaft kiln which is specific to this regional industry.

## Review details
Inventory: The internal review was done by several iteration steps concerning raw data validation, raw data documentation, representativity, completeness and consistency of modelling with regard to ISO 14040 and 14044.

## Data sources
- 于淼. (2008). 黑龙江水泥工业可持续发展研究 [硕士, 哈尔滨工业大学].
