# Copper foil production ; Copper foil ; Lubricating oil, copper, sulfuric acid

Dataset: ILCD process, Unit process, single operation
Geography: AH-CN
Classification: Materials production / Metals and semimetals
Functional unit: Produce 1kg of copper foil
LCI method principle: Attributional
Generated by: Xin Chen, xinchen@mail.nankai.edu.cn
Owner: Tiangong LCI Data Working Group
Review: Dependent internal review by Tiangong LCI Data Working Group
Amounts: no units in this file; such an amount is in the reference unit of its flow, which a separate flow dataset defines
copyright: false
licenseType: Free of charge for all users and uses

## General comment
The production process involves smelting, ingot casting, annealing, component analysis, cleaning, post-processing and other processes

## Geography
Anhui Zhongyuan New Material Co., Ltd

## Technology and included processes
The production process involves smelting, ingot casting, annealing, component analysis, cleaning, post-processing and other processes.

## Technical purpose
The copper foil produced by Anhui Zhongyuan New Material Co., Ltd. is utilized in a variety of applications including printed circuit boards (PCBs), electromagnetic shielding, and thermal conduction pathways in electronic devices. The high precision and purity of the copper foil make it suitable for advanced electronic components that require reliable conductivity and durability.

## Reference product
- copper foil: 1
  Data comes from the environmental performance report of Anhui Zhongyuan New Materials Co., Ltd.

## Inputs
- copper(99%): 1
  (same comment as for copper foil)
- lubricating oil: 1
  (same comment as for copper foil)
- Sulfuric acid: 0.0003
  (same comment as for copper foil)
- Electricity: 0.0011988
  (same comment as for copper foil)
- transport in t*km: 0.184
  (same comment as for copper foil)

## Outputs
- chemical oxygen demand: 6.73e-5
  (same comment as for copper foil)
- biological oxygen demand: 1.83e-5
  (same comment as for copper foil)
- ammonium: 3e-6
  (same comment as for copper foil)
- Suspended solids, unspecified: 5.45e-5
  (same comment as for copper foil)

## Data selection and combination
Data comes from environmental performance assessment reports

## Use advice
When using the data set for Life Cycle Assessment, it is important to consider the specific context of the copper foil application. Users should account for the potential recycling of the copper at the end of life and model the use phase behavior based on the actual electronic devices into which the copper foil is integrated. It is also recommended to reflect regional differences in environmental impacts for copper production and to ensure that the environmental performance assessment report data is consistent with the specific technological practices of Anhui Zhongyuan New Material Co., Ltd.

## Review details
Inventory: The internal review was done by several iteration steps concerning raw data validation, raw data documentation, representativity, completeness and consistency of modelling with regard to ISO 14040 and 14044.

## Data sources
- Yin, R., Hu, S. & Yang, Y. Life cycle inventories of the commonly used materials for lithium-ion batteries in China. Journal of Cleaner Production227, 960–971 (2019).
