# Mining of Rare Earth Oxides (REO) Rare Earth Oxides (REO);bastnaesite route;Rare Earth Elements (REE) containing ore

Dataset: ILCD process, Unit process, single operation
Geography: CN
Reference year: 2007
Valid until: 2020
Classification: Unit processes / Materials production / Non-energetic raw materials
Functional unit: The study considered 15 different functional units corresponding to different RE metals. The assessment included three main RE production sites in China: REO production in Bayan Obo, Sichuan, and IACs. Primary data were collected for foreground production processes from Chinese and further international scientific literature, industry reports, government and industry surveys. The authors assumed a baseline for aqueous and gaseous emissions using national discharge standards for industry from the Chinese Ministry of
LCI method principle: Attributional
LCI method approaches: Allocation
Generated by: Tao Wang, twang@iue.ac.cn
Owner: Tiangong LCI Data Working Group
Review: Dependent internal review by Tiangong LCI Data Working Group
Amounts: no units in this file; such an amount is in the reference unit of its flow, which a separate flow dataset defines
copyright: false
licenseType: Free of charge for all users and uses

## General comment
The REO mining process described is intended for the extraction of rare earth oxides from bastnaesite-containing ore in the Bayan Obo region, located in the Southern Provinces of China. The output from this process serves as a critical resource in various high-tech industries, including electronics, renewable energy technologies, and aerospace engineering. Specifically, the rare earth elements extracted are vital components in the manufacturing of permanent magnets, batteries, catalysts, and phosphors.

## Geography
Bayan Obo, Chinese Southern Provinces

## Technology and included processes
Because no primary mining data from Bayan Obo were available, LCI data in the studies (Sprecher, Arshi, Marx, Bailey (Classen et al., 2007)) are based on different data sources either from iron mining or in Althaus from phosphate rock mining. Main inputs are energy and blasting agent

## Reference product
- Primary energy: 56.1; input; calculated

## Inputs
- blasting: 12.75; calculated
  Blasting agent

## Outputs
- particles (PM10): 0.1; calculated

## Deviations from the LCI method approaches
Goal of this chapter is to identify the most important differences and uncertainties of crucial parameters in the LCIs and to link those directly to the affected LCIAs. However, comparability of LCIA results shown in Fig. 4 is limited due to different LCIA methods, as already mentioned in the chapter “methods”. All LCIA results are shown in Tables S1 and S3 (Supplementary material). It should also be mentioned that we calculated Althaus' LCIA data, as he provided only the LCI in the ecoinvent database. For this, we rebuilt Althaus' original process “rare earth oxide production from bastnasite” in the GaBi software and evaluated it with two LCIA methods for comparison (Table S1).

## Use advice
Users of this LCI data should consider the methodological variations and uncertainties highlighted in the comparison of the LCIA results. It is recommended to apply consistent LCIA methods when using this data set for comparative purposes. Prior to utilization, users should confirm that the assumed baseline for aqueous and gaseous emissions aligns with current standards. This data set is adapted from proxy sources such as iron and phosphate rock mining; therefore, users must factor in the inherent differences when applying the data to specific rare earth mining contexts.

## Review details
Inventory: The internal review was done by several iteration steps concerning raw data validation, raw data documentation, representativity, completeness and consistency of modelling with regard to ISO 14040 and 14044.

## Data sources
- Schreiber, A., Marx, J. & Zapp, P. Life Cycle Assessment studies of rare earths production - Findings from a systematic review. Science of The Total Environment 791, 148257 (2021).
