# Tire production;Blended compound;Cutting and forming; Fiber fabric,Steel fabric

Dataset: ILCD process, Unit process, single operation
Geography: CN
Reference year: 2014
Classification: Unit processes / Materials production / Non-energetic raw materials
Generated by: Cui, di, 2806553850@qq.com
Owner: Tiangong LCI Data Working Group
Review: Dependent internal review by Tiangong LCI Data Working Group
Amounts: no units in this file; such an amount is in the reference unit of its flow, which a separate flow dataset defines
copyright: false
licenseType: Free of charge for all users and uses

## General comment
the production stage is quite complex andincludes the processes of compound blending, rolling, extrusion, packet ring production, cutting and forming, vulcanizing, and testing. We combined closely related processes toavoid allocation. The following four main production processes were identified: compound blending, rolling and extrusion,cutting and forming, and vulcanizing and testin

## Time period
“Data collected onsite in 2014 by one of the largest Chinese tire companies were used in the assessment. ”The article has stated that the data is related to 2014, but there is no specific time, so the time is set on January 1, 2014.

## Technical purpose
The detailed LCA data set pertains to the complex process of tire production in the industrial sector. It is particularly applicable to manufacturing practices involving compound blending, rolling and extrusion, cutting and forming, vulcanization, and testing. These processes are integral in producing tires equipped with fiber and steel fabrics for automotive vehicles. The product resulting from these processes is used extensively in the automotive industry for a variety of vehicles, delivering essential performance and safety features.

## Reference product
- Tire: 9.497; measured

## Inputs
- Electricity: 1.7; measured
- steam: 0.39; measured

## Outputs
- Waste wire cord fabric,Waste steel wire: 0.015, 0.003 (2 entries); measured
- Waste rubber,Waste fiber fabric: 0.02; measured

## Data selection and combination
The data on the raw materials used in the investigated tire product were sourced from on-site investigations of one of the largest Chinese tire companies. The data were collected in 2014 during the manufacture of the target tire product.Other materials, such as active clay, zinc oxide, stearic acid, processing agent, and lubricating oil, were also considered.Life cycle background data on these other materials were obtained from the global average LCI data of Ecoinvent 3.0

## Use advice
When utilizing this LCA data, users should note that the dataset represents processes closely related to tire production, and therefore allocation has been avoided by combining relevant procedures. The provided data were collected on site in 2014 by a major Chinese tire manufacturer, and only pertains to activities conducted within that year. Background data for secondary materials such as active clay, zinc oxide, stearic acid, processing agents, and lubricating oil are sourced from the global average of Ecoinvent 3.0 LCI datasets. It is imperative that users not extrapolate this date-set to other time periods without appropriate adjustments for technological changes and market variations.

## Review details
Inventory: The internal review was done by several iteration steps concerning raw data validation, raw data documentation, representativity, completeness and consistency of modelling with regard to ISO 14040 and 14044.

## Data sources
- Sun X, Liu J, Hong J, et al. Life cycle assessment of Chinese radial passenger vehicle tire[J]. The International Journal of Life Cycle Assessment, 2016, 21: 1749-1758.
