# LFP hydrometallurgical recycling

Dataset: ILCD process, Unit process, single operation
Geography: CN
Reference year: 2020
Classification: Unit processes / End-of-life treatment / Material recycling
Functional unit: The product systems evaluated in this study are EB batteries. The service provided by these batteries is the distance driven; thus, the functional unit in this study is defined as an overall 100-km driving distance of a typical EB driven by a group of batteries (4 × 12 V, 20 Ah). According to the data of EB manufacturers, LFP, and NCM batteries can support a typical EB to travel for approximately 45 km and 50 km with one charge, the calculated lifetime distance is of 36, 000 km, and 30,000 km, respectively.
Generated by: maqingyuan, m1120498928@163.com
Owner: Tiangong LCI Data Working Group
Review: Dependent internal review by Tiangong LCI Data Working Group
Amounts: no units in this file; such an amount is in the reference unit of its flow, which a separate flow dataset defines
copyright: false
licenseType: Free of charge for all users and uses

## General comment
The mainstream recovery process of LFP batteries is to recover lithium carbonate and iron phosphate through a hydrometallurgical process (hydrochloric acid leaching-hydrogen peroxide oxidation-soda ash adjustment of pH)

## Technical purpose
The LFP (Lithium Iron Phosphate) hydrometallurgical recycling process described is used to recover lithium carbonate and iron phosphate, which are critical materials for the production of LFP batteries. These LFP batteries are designed to power electric bicycles (EBs). The LFP and NCM (Nickel Cobalt Manganese) batteries mentioned provide the necessary energy for EBs to operate over significant distances, with a typical unit offering a range of 45 km and 50 km per charge for LFP and NCM batteries, respectively.

## Reference product
- Lithium carbonate: 0.508; measured

## Inputs
All rows: measured
- Hydrochloric acid (30%): 7.92
- Sodium hydroxide（30%）: 5.83
- Hydrogen peroxide (30%): 1.32
- Sodium carbonate: 1.21
- magnesium chloride: 0.008
- potassium chloride: 0.00085
- sodium chloride: 0.00099
- Coke: 0.005
- carbon: 0.0002
  Activated carbon
- Heavy oil: 0.04
- silicon: 0.042
- Light gas oil: 0.025
- process steam: 0.143
  Steam (coal conversion)
- Water for industrial use: 2.2
- Electricity: 0.0576

## Outputs
All rows: measured
- Ferric pyrophosphate: 3.3
- Secondary Aluminum: 2.708
- Secondary copper: 0.809
- Separator scrap: 0.352
  Waste diaphragm
- Waste Graphite: 0.004
- hydrogen chloride: 0.000616
- Total particulate matter: 0.00019
- sulfur dioxide: 1e-5
- nitrogen monoxide: 3.8e-5
- 2,3,7,8-tetrachlorodibenzo-p-dioxin: 1.41e-14
- fluorine: 7.06e-8
- chemical oxygen demand: 0.0049
- Ammonia Nitrogen: 4.05e-8
- copper: 8.18e-7
- lithium: 0.000458
- zinc: 8.18e-7

## Data selection and combination
The life cycle inventories of NCM and LFP batteries were established based on the survey data from 2018 to 2019, representing the current status of the lithium-ion battery technology.

## Sampling procedure
The LCI of battery recycling is established based on the survey data of several battery recyclers in China, including Chunxing, Yuguang Gold Lead (for LABs), GEM, and Brunp (for LIBs). The distance from the waste battery collection site to the battery recycling plant is assumed to be 100 km.

## Use advice
The provided LCA data set represents the technological status of lithium-ion batteries between 2018-2019 and should be used with consideration for any technological advances made after this period. Users are advised to regard the data as specific to the recycling processes and practices of the mentioned Chinese battery recyclers. The assumptions included, such as the 100 km transport distance from waste collection to recycling facilities, should be adapted if applying the data to different geographical or logistical scenarios. Additionally, when evaluating the environmental impact of EB batteries, it is crucial to model the use phase behavior based on the expected service life using the provided lifetime distances for LFP and NCM batteries.

## Review details
Inventory: The internal review was done by several iteration steps concerning raw data validation, raw data documentation, representativity, completeness and consistency of modelling with regard to ISO 14040 and 14044.

## Data sources
- Liu, W., Liu, H., Liu, W. & Cui, Z. Life cycle assessment of power batteries used in electric bicycles in China. RENEWABLE & SUSTAINABLE ENERGY REVIEWS 139, (2021).
