# Lithium Hydroxide Production ; Battery Grade Lithium Hydroxide Monohydrate ; Lithium Sulfate ; Canada Lithium Spodumene Concentrate

Dataset: ILCD process, Unit process, single operation
Geography: CA
Reference year: 2013
Classification: Unit processes / Materials production / Inorganic chemicals
Generated by: Sun Xin, xs389@cornell.edu
Owner: Tiangong LCI Data Working Group
Review: Dependent internal review by Tiangong LCI Data Working Group
Amounts: no units in this file; such an amount is in the reference unit of its flow, which a separate flow dataset defines
licenseType: Free of charge for all users and uses

## General comment
The future supply routes reviewed in this study are based on data gathered from technical reports and environmental impact assessment reports of several lithium mining and processing companies (Lithium Americas Corp., Minera Salar Blanco, Nemaska Lithium Inc., and Keliber Oy) that are at various stages of developing their lithium assets. These are considered future supply routes as they are not yet active but areexpected to be operational in 5–10 years. The lower lithium concentrations at these brine-based sources also reflect the possible future lithium grades of current supply routes from brines, whose lithium concentrations will likely decrease over the years due to extraction

## Technology and included processes
The future supply routes for spodumene are described in technical reports of operations at the Whabouchi site, Canada and the Central Ostrobothnia region, Finland. While neither Canada nor Finland are among the countries with the largest lithium reserves (USGS, 2021), they represent examples of new lithium supplies that might become exploited in response to increased lithium demand. The average lithium concentration in spodumene at the Whabouchi site is about 0.7% and in Central Ostrobothnia region it is 0.6%. In these future supply routes, concentrated spodumene is directly converted to LiOH⋅H2O without producing Li2CO3 as an intermediate. The datasets representing mining operations in Canada and Finland are based on the technical reports prepared for Nemaska Lithium Inc. (Golder Associates, 2013; Laferri´ere et al., 2012; Nemaska Lithium Inc., 2013; SENES Consultants Ltd., 2013) and Keliber Oy (Keliber Oy, 2020a, b; Sweco, 2016), respectively. Specific data for chemical inputs was not available for the LiOH⋅H2O production unit process (from concentrated spodumene) in the Nemaska Lithium reports. Therefore, the chemical usage in the Keliber Oy reports were used as proxy data when comparing the different lithium supplies.

## Technical purpose
This dataset pertains to the production of battery-grade lithium hydroxide monohydrate using the lithium sulfate process, which is sourced from Canadian lithium spodumene concentrate. This high-purity chemical is crucial for the manufacture of lithium-ion batteries that are used in various applications, including electric vehicles, portable electronics, and energy storage systems.

## Reference product
- Lithium Hydroxide Monohydrate: 1000; measured

## Inputs
All rows: measured
- Spodumene concentrate (7.6% Li2O): 5810
- Electricity: 43920, 5364 (2 entries)
- Natural gas, at consumer EU-27: 42500, 20700 (2 entries)
- sodium hydroxide: 112, 1120 (2 entries)
- sodium carbonate: 1580, 1580 (2 entries)
- hydrogen chloride: 72, 72 (2 entries)
- Calcium carbonate (> 63 microns): 1820, 1820 (2 entries)
- freshwater,freshwater: 76.9, 74.9 (2 entries)

## Use advice
When utilizing this dataset, users must acknowledge that the production processes for raw materials and the energy flows contributing less than 1% are excluded from this data set. Hence, this dataset is suitable for LCA studies where such minor flows can be justifiably omitted. Care should be taken when comparing this dataset to others where such exclusions are not made, as it can result in an underrepresentation of environmental impacts or resource use associated with these small-scale inputs.

## Review details
Inventory: The internal review was done by several iteration steps concerning raw data validation, raw data documentation, representativity, completeness and consistency of modelling with regard to ISO 14040 and 14044.

## Data sources
- Chordia, M., Wickerts, S., Nordelöf, A. & Arvidsson, R. Life cycle environmental impacts of current and future battery-grade lithium supply from brine and spodumene. Resources, Conservation and Recycling 187, 106634 (2022).
