# Lime ; Lime production ; Agricultural land remediation ; In-situ stabilization

Dataset: ILCD process, Unit process, black box
Geography: HZ-GD-CN
Reference year: 2021
Classification: Unit processes / Other Services / Repair and maintenance
Functional unit: Limestone undergoes processes such as crushing, screening, calcination, hydration, and grading to produce 800kg of lime.
Generated by: Yang Xintong, yangxt@caep.org.cn
Owner: Tiangong LCI Data Working Group
Review: Dependent internal review by Tiangong LCI Data Working Group
Amounts: no units in this file; such an amount is in the reference unit of its flow, which a separate flow dataset defines
copyright: false
licenseType: Free of charge for all users and uses

## General comment
Lime is an air hardening inorganic cementitious material mainly composed of calcium oxide.

## Geography
The study site is a paddy field contaminated by Cd, located inGongzhuang town, Huizhou city of the Pearl River Delta, Southern China.

## Technology and included processes
The lime production process includes crushing and screening, calcination, and hydration and classification

## Technical purpose
Lime has various applications such as in agricultural land remediation for treating heavy metal contaminated soils, particularly for in-situ stabilization of fields affected by cadmium (Cd) pollution. It's also used in various industrial processes including water treatment, construction, and as a neutralizing agent in waste management. The lime produced in Gongzhuang town, Huizhou city, is particularly used for the treatment and stabilization of cadmium-contaminated paddy fields in the region.

## Reference product
- Lime,Lime: 800; measured
  由于我国南方有早稻和晚稻两个生长季节，修复剂的施用量为3000公斤/公顷，施用频率为每年2次。从2017年到2018年，每个场景的整个修复时间为2年。总施加剂量=3000kg/ha*0.07ha*2次/年*2年≈800kg

## Inputs
All rows: measured
- Limestone: 2500
- Tap Water: 320
- Electricity: 18
- natural gas,natural gas: 700
- Diesel,Diesel: 220

## Outputs
- carbon dioxide (fossil): 683; measured
  原表给出的仅为二氧化碳排放，我们通过分析，选择二氧化碳由化石燃料，即柴油燃烧产生
- nitrogen dioxide: 915; measured

## Use advice
When applying this LCA data set for lime production, users should account for all life cycle stages, ensuring the inclusion of inputs and outputs at each stage - materials, energy, resources, emissions, and carbon. Additionally, users must consider the geographical specificity of the data as it pertains to the Pearl River Delta, Southern China. When modeling use phase behavior, particularly for agricultural applications like in-situ soil stabilization, the local environmental conditions, and type of contamination should be taken into account for accurate LCA results.

## Review details
Inventory: The internal review was done by several iteration steps concerning raw data validation, raw data documentation, representativity, completeness and consistency of modelling with regard to ISO 14040 and 14044.

## Data sources
- Kai L ,Liping F ,Fangbai L , et al. Sustainability assessment and carbon budget of chemical stabilization based multi-objective remediation of Cd contaminated paddy field. The Science of the total environment, 2021, 819 152022-152022.
