# Aluminum Recycling ; Recycled Aluminum Ingots ; Scrap Aluminum ; 2016

Dataset: ILCD process, Unit process, single operation
Geography: CN
Reference year: 2021
Classification: Unit processes / Materials production / Metals and semimetals
Generated by: Zimeng Cai, caizm6178@163.com
Owner: Tiangong LCI Data Working Group
Review: Dependent internal review by Tiangong LCI Data Working Group
Amounts: no units in this file; such an amount is in the reference unit of its flow, which a separate flow dataset defines
copyright: false
licenseType: Free of charge for all users and uses

## General comment
This dataset represents the process of recycling aluminum to create recycled aluminum ingots from scrap aluminum. The recycled ingots can be used across various industries, including but not limited to automotive, construction, electronics, packaging, and aerospace industries. The ingots can be processed further to manufacture aluminum products such as sheets, plates, wires, and tubes that are used in the production of components and structures that benefit from the lightweight properties of aluminum.

## Time period
Date of publication

## Reference product
- secondary aluminium ingot: 1000; missing unimportant
  ingot

## Inputs
- electricity, high voltage, aluminium industry: 1148.4; missing unimportant
  electricity
- aluminium scrap, unspecified: 1180; missing unimportant
  aluminum scrap

## Data selection and combination
The data in this study refers to the LCA data of PA, SA, electricity, and other background data. The PA data were obtained from statistical data sources, and the SA data were mainly obtained from the literatures. The background data were mainly derived from the Chinese localization LCA database CAS RCEES 2018, which was established by the Research Center for Eco-Environmental Sciences, Chinese Academy of Sciences and covers LCA data for energy, materials, transportation, waste management etc.

## Use advice
The LCA data users should consider the technological applicability and methodological advice pertinent to aluminum recycling. It is essential to note that the primary aluminum (PA) and secondary aluminum (SA) data sourced from statistical data and literature respectively should be accurately attributed to the relevant product systems. Furthermore, data users should consider the background data from the CAS RCEES 2018 database with caution, ensuring the temporal relevance (i.e., the year 2016 for this dataset) and geographical specificity to the Chinese context. Any extrapolation or modification of data should account for changes in the industrial processes or technological improvements that have occurred since the publication date.

## Review details
Inventory: The internal review was done by several iteration steps concerning raw data validation, raw data documentation, representativity, completeness and consistency of modelling with regard to ISO 14040 and 14044.

## Data sources
- Ding, N., Liu, N., Lu, B. & Yang, J. Life cycle greenhouse gas emissions of aluminum based on regional industrial transfer in China. J. Ind. Ecol. 25, 1657–1672 (2021).
