# Electricity production ; Electricity mix ; Guangxi

Dataset: ILCD process, Unit process, single operation
Geography: GX-CN
Reference year: 2019
Classification: Unit processes / Energy carriers and technologies / Electricity
Generated by: Ruoxi Xiong, xiongrx0126@163.com
Owner: Tiangong LCI Data Working Group
Review: Dependent internal review by Tiangong LCI Data Working Group
Amounts: no units in this file; such an amount is in the reference unit of its flow, which a separate flow dataset defines
copyright: false
licenseType: Free of charge for all users and uses

## General comment
Electricity mix includes thermal, hydro, wind, nuclear and solar generation

## Technical purpose
The electricity mix data set represents the comprehensive profile of electric power generation in the Guangxi Zhuang Autonomous Region. The mix includes power produced by thermal, hydro, wind, nuclear, and solar means. This mix is crucial for understanding the environmental impact of power consumption in the region and for services, products, or processes that rely on the regional grid. Examples include electricity consumption of factories, residential buildings, and infrastructure projects that utilize the public power supply.

## Reference product
- Electricity: 3.6; missing unimportant
  [{'text': '能量', 'type': 'text'}]

## Inputs
All rows: missing unimportant
- electricity for thermal power: 1.96232
  [{'text': '能量', 'type': 'text'}]
- electricity from hydroelectric power plant: 1.15613
  [{'text': '能量', 'type': 'text'}]
- electricity for nuclear power: 0.335336
  [{'text': '能量', 'type': 'text'}]
- electricity from wind power: 0.118926
  [{'text': '能量', 'type': 'text'}]
- electricity for solar power: 0.0272952
  [{'text': '能量', 'type': 'text'}]

## Use advice
When using this data set, users should take into account the proportion of the various power generation methods within the mix when assessing environmental impact, since each source has a different environmental footprint. The data is suitable for regional life cycle assessments and should be used to represent the average electricity supply in Guangxi. If the assessment is aimed at specific types of electricity consumption, users should modify the mix according to actual consumption profiles if detailed data is available. Consider the time boundary of the data and update it periodically to reflect changes in the energy mix.

## Review details
Inventory: The internal review was done by several iteration steps concerning raw data validation, raw data documentation, representativity, completeness and consistency of modelling with regard to ISO 14040 and 14044.

## Data sources
- 能源统计年鉴2020
