# Soil remediation ; ex situ remediation ; soil leaching ; soil column leaching ; Rhamnolipid foam leaching

Dataset: ILCD process, Unit process, single operation
Geography: CN
Reference year: 2023
Classification: Unit processes / Other Services / Repair and maintenance
Generated by: Huang Yue, huangyue@caep.org.cn
Owner: Tiangong LCI Data Working Group
Review: Dependent internal review by Tiangong LCI Data Working Group
Amounts: no units in this file; such an amount is in the reference unit of its flow, which a separate flow dataset defines
copyright: false
licenseType: Free of charge for all users and uses

## General comment
Remediated soil columns were obtained by washing contaminated soil columns with rhamnolipid foam

## Technical purpose
The described process is used for ex situ soil remediation, specifically employing rhamnolipid biosurfactant foam in soil leaching techniques to decontaminate soil columns. This remediation approach is applicable in environmental engineering and waste management industries for restoring polluted soil, thereby making it suitable for reuse in various applications including agriculture, landscape restoration, and construction.

## Reference product
- Remediated soil columns: 0.0008

## Inputs
- rhamnolipid: 0.00018
- Nitrogen: 0.0131
- Activated Carbon: 0.03354
- Methanol: 0.00018
- Tap Water: 0.00525
- Electricity: 0.396
- Contaminated soil columns: 0.0008

## Outputs
- quartz sand: 0.09
- polycyclic aromatic hydrocarbons: 0.00036, 0.0331 (2 entries)

## Use advice
Data set users should ensure that all methodological considerations such as the delineation of system boundaries for soil remediation, the assessment of energy and material inputs, and the evaluation of environmental impacts are fully addressed. Appropriate allocation procedures for recycling and energy recovery must be in place if incorporated into the life cycle. Users should also account for the technological applicability limitations and ensure the use of correct soil column characteristics that reflect the specific soil type and contamination level being remediated.

## Review details
Inventory: The internal review was done by several iteration steps concerning raw data validation, raw data documentation, representativity, completeness and consistency of modelling with regard to ISO 14040 and 14044.

## Data sources
- 张雅鑫 et al. 基于生命周期评价的焦化污染土壤 淋洗技术环境影响研究. 安全、健康和环境 23, (2023).
