# Molten iron production;Molten iron;BF;Pellets(Outsourcing)

Dataset: ILCD process, Unit process, single operation
Geography: CN
Reference year: 2014
Classification: Unit processes / Materials production / Metals and semimetals
Generated by: Fuxiang, 1162850692@qq.com
Owner: Tiangong LCI Data Working Group
Review: Dependent internal review by Tiangong LCI Data Working Group
Amounts: no units in this file; such an amount is in the reference unit of its flow, which a separate flow dataset defines
copyright: false
licenseType: Free of charge for all users and uses

## General comment
This data set represents the production of molten iron using a Blast Furnace (BF) process, specifically focusing on the use of outsourced iron ore pellets. It is applicable to industrial settings such as steel manufacturing plants, where this high-temperature metallurgical process is the first step in producing steel from iron ore.

## Time period
基于 A 钢厂 2014 年的生产数据进行计算和分析对比。

## Reference product
- Molten Iron: 977; measured
  molten iron

## Inputs
All rows: measured
- hard coal,hard coal: 168.93
- Pellet: 421
  Pellets
- Electricity: 61.2
- oxygen: 28
- coke,Coke: 367.5
  Coke
- Sinter: 1211
- Coke oven gas: 17
  coke oven gas
- Electricity: 133.2
  TRT residual pressure power generation (self-produced)

## Outputs
All rows: measured
- Electricity: 133.2
  TRT residual pressure power generation (self-use)
- Blast furnace gas: 1681
  blast furnace gas
- carbon dioxide (fossil): 822500
  原文未区分bio和fossil，根据专家判断此处为fossil
- methane: 30
- nitrous oxide: 2

## Use advice
When utilizing this data set for Life Cycle Assessment, users should take into account that it is based on the production data from a specific steel plant in the year 2014. Consideration should be given to technological advancements and changes in production methods or raw material sourcing that may have occurred since then. Users should ensure that these processing parameters closely align with those of the assessed system. If recycling processes are involved, the system boundary definitions must clearly delineate the stages at which recycled materials are included or excluded.

## Review details
Inventory: The internal review was done by several iteration steps concerning raw data validation, raw data documentation, representativity, completeness and consistency of modelling with regard to ISO 14040 and 14044.

## Data sources
- 刘宏强, 付建勋, 刘思雨, 谢欣悦, & 杨笑楹. 钢铁生产过程二氧化碳排放计算方法与实践. 钢铁 51, 74–82 (2016).
