# Extraction Stage ; Oil ; Utilizing carbon dioxide Reservoir Extraction, Treatment, and Separation

Dataset: ILCD process, Unit process, single operation
Geography: UM
Reference year: 2001
Classification: Unit processes / Energy carriers and technologies / Crude oil based fuels
LCI method principle: Attributional
LCI method approaches: Consequential
Generated by: zimeng li, 1577978537@qq.com
Owner: Tiangong LCI Data Working Group
Review: Dependent internal review by Tiangong LCI Data Working Group
Amounts: no units in this file; such an amount is in the reference unit of its flow, which a separate flow dataset defines
copyright: false
licenseType: Free of charge for all users and uses

## General comment
This industrial process is intended for use in enhanced oil recovery (EOR) operations. Specifically, it is applied within the petroleum industry for extracting oil from the San Andres dolomite reservoirs in the Permian Basin of West Texas. The process includes the utilization of CO2 for long-term storage and additional oil extraction after initial waterflooding, where CO2 serves as a miscible gas to increase the recovery of oil from reservoirs with certain characteristics such as porosity, permeability, and depth.

## Geography
the Permian Basin of West Texas,Although all emissions and discharges should be included in a full LCA, this study focused on greenhouse gas emissions (CO2, CH4, and N2O) only. The analysis was limited to the boundary of the facility and included the extraction of the oil and associated gas from the oil reservoir, the processing of the associated gas for separation of the different components (water, hydrogen sulfide -H2S, CO2, CH4, natural gas liquids), the compression of the separated CO2 stream destined for injection, and the transport and injection of the CO2 in the oil reservoir for extraction of additional oil and for long-term storage. Figure 1 shows a schematic of this process. The extraction and transport of the CO2 from the natural reservoir is not part of the analysis.The reservoir we investigated in this study is situated in the Permian Basin of West Texas. It is a layered dolomite with an average porosity of 8.5% and an average permeability of 1.5 md. Production is from the San Andres dolomite at an average depth of 1585 m, and the thickness of the producing layer varies from 15 to 70 m. The unit contains 13 130 producing acres, which have already undergone waterflooding and are now under enhanced oil recovery production using CO2. The minimum miscibility pressure to be maintained for injection of CO2 is 85 atm

## Time period
Publication time of the paper

## Technology and included processes
Chemicals. CO2-based synthetic fuels may refer to methane, methanol, gasoline, and aviation fuels. CO2 captured at power plant exhausts could be used directly in catalytic processes for the generation of synthetic gas. Syngas, as a mixture of CO and H2, is a crucial component in the production of hydrogen, ammonia, methanol, and synthetic hydrocarbon fuels. As an intermediate, it can be used in the production of synthetic petroleum by the Fischer–Tropsch process [1,16].

## Reference product
- LPG - liquefied petroleum gas: 1; uniform; missing unimportant
  The amount of oil recovered, specific to each reservoir, depends on the percentage of pore space occupied by oil and the expected pore space swept by carbon dioxide.

## Inputs
- carbon dioxide (fossil): 5.5; uniform; missing unimportant
  There was no discussion on the performance of CO2 mixed phase production process, nor was there special consideration given to the problems caused by injecting acidic gas into the formation. The amount of carbon dioxide that needs to be injected is the expected cumulative carbon dioxide utilization rate, representing the past daily injection amount and future daily predictions, standardized as the 40 year lifecycle of the EOR oil production project. This quantity is important because it shows how much carbon dioxide needs to be supplied during the oil recovery process. It ultimately emphasizes the demand for carbon dioxide in projects aimed at improving oil recovery,
- methane (fossil): 0.29; uniform; missing unimportant
  Methane consumption

## Outputs
- methane (fossil): 0.0015; uniform; missing unimportant
  Methane emissions
- carbon dioxide (fossil): 0.4; uniform; missing unimportant
  The amount of carbon dioxide emitted

## Use advice
When using this data set for life cycle assessment, it is crucial to include all emissions and discharges in order to achieve a comprehensive view, even though this particular study focuses on greenhouse gas emissions (CO2, CH4, N2O) solely. Users should strictly delimit the system's boundaries to the facility in question, encompassing oil extraction, gas processing, and the associated transport and injection operations for CO2. The unit's geological characteristics, such as porosity and permeability, along with the minimum miscibility pressure for CO2 injection, which is 85 atm, should also be factored into the assessment. The transport of CO2 from external sources to the reservoir is not covered in this dataset and should be considered separately if applicable.

## Review details
Inventory: The internal review was done by several iteration steps concerning raw data validation, raw data documentation, representativity, completeness and consistency of modelling with regard to ISO 14040 and 14044.

## Data sources
- Aycaguer, A.-C., Lev-On, M., & Winer, A. M. (2001). Reducing Carbon Dioxide Emissions with Enhanced Oil Recovery Projects: A Life Cycle Assessment Approach. Energy & Fuels, 15(2), 303–308.
