# Livestock and poultry breeding ; feed processing stage ; laying chicken breeding area

Dataset: ILCD process, Unit process, single operation
Geography: CN
Reference year: 2014
Classification: Unit processes / Materials production / Agricultural production means
Functional unit: 1kg eggs
Generated by: Rui Yang, 1632707028@qq.com
Owner: Tiangong LCI Data Working Group
Review: Dependent internal review by Tiangong LCI Data Working Group
Amounts: no units in this file; such an amount is in the reference unit of its flow, which a separate flow dataset defines
copyright: false
licenseType: Free of charge for all users and uses

## General comment
Livestock and poultry feed processing mainly consumes electricity and coal.

## Geography
This study was conducted from 2014 to 2015, aiming at livestock and poultry feeding cycle, meat ratio, feed formula, feed consumption, coal and electricity consumption, etc. Has been to Shandong Gaomi Zhengda pig farm, Laixi City Zhishuang dairy farm, Jimo city Duan Bolan town Jiangjiapo village pig farm, Jimo City Liujiazhuang town livestock farm, Rizhao City Changling town Guanzhuang village, Juxian County Zhailihe town Dongxing Agriculture and animal husbandry company, Juxian Qiaoshan town east Chen dairy farm, Juxian Qiaoshan town Liu Jiayi water pig farm, Zhucheng Foreign Trade Co., LTD. Phoenix parents breeding duck farm, Xinjiang Fukang Hongfa Breeding professional cooperative, Jiuyun Street Town Xuhong laying Chicken cooperative, Jiuyun Street Town Liuyun Village self-contained breeding farm, China Australia Holding Group Co., LTD., Dezhou City Qingyun County Wayu Village, Shandong Province Qingyun County four Liu community beef cattle breeding base, Dezhou City Qingyun Qingnian chicken breeding base, Qingyun County Yongli Poultry layer breeding company, Qingyun County Xingchen youth chicken breeding Field research was carried out by professional breeding cooperatives, Qingyun Dongtai broiler breeding cooperatives, Hebei Yanshan Boyuan Feed Co., LTD., Yanshan Da Chinese Feed Co., LTD., Wudi Liuhe Feed Co., LTD., and China-Australia Oriental Hope Feed Co., LTD.

## Technology and included processes
In this paper, the life cycle of livestock and poultry farming is divided into six stages: feed crop planting, feed processing, livestock and poultry raising, manure treatment, slaughter and transportation. The specific life cycle process of livestock and poultry breeding is shown in Figure 2-1. Due to the lack of some data and the limitations of basic conditions, the production, transportation and use of pesticides, mulch and feed additives have not been analyzed, and the environmental impact caused by other related infrastructure construction, transport production and labor costs is no longer considered.

## Technical purpose
The data set represents the livestock and poultry breeding process, specifically in the feed processing stage for laying chicken breeding areas. It encompasses energy consumption for generating feed used in the production of chicken eggs and meat products. This feed is formulated for the feed-to-meat efficiency in various types of farms, including pig, dairy, and chicken farms in different regions of China.

## Reference product
- feed: 1.91582; calculated

## Inputs
- Electricity: 0.172424; calculated
- hard coal: 0.0229899; calculated
- maize grain: 1.4; measured
- soybean: 0.55; measured
- wheat: 0.54; measured

## Outputs
- carbon dioxide (fossil),carbon dioxide (fossil): 0.09589; measured
  Laying hen breeding community
- sulfur dioxide: 0.00168; measured
  Laying hen breeding community
- nitrogen, total (excluding N2): 0.00027; measured
  Laying hen breeding community
- carbon monoxide (fossil): 4.3e-5; measured
  Laying hen breeding community

## Use advice
When utilizing this data set for Life Cycle Assessment (LCA), users should consider the technological relevance to the specific geographical context of the farms mentioned in the study. Attention should be paid to the year of the study and potential changes in energy consumption patterns over time. The functional unit is based on 1kg of chicken eggs; thus, for different functional units, conversions are necessary. Additionally, the impact of coal and electricity usage on environmental emissions should be appropriately accounted for when modeling the feed processing stage.

## Review details
Inventory: The internal review was done by several iteration steps concerning raw data validation, raw data documentation, representativity, completeness and consistency of modelling with regard to ISO 14040 and 14044.

## Data sources
- 周景月. 基于生命周期评价的畜禽养殖环境影响分析. (青岛科技大学, 2017).
