# Concrete production ; High-performance marine concrete (C40) ; Total of all wind farm

Dataset: ILCD process, Unit process, single operation
Geography: SH-CN
Reference year: 2009
Classification: Materials production / Other mineralic materials
Functional unit: The functional unit is 1 kWh on-grid electricity provision.
LCI method principle: Attributional
LCI method approaches: Allocation
Generated by: Yunzhi Zhao, ll10088@163.com
Owner: Tiangong LCI Data Working Group
Review: Dependent internal review by Tiangong LCI Data Working Group
Amounts: no units in this file; such an amount is in the reference unit of its flow, which a separate flow dataset defines
copyright: false
licenseType: Free of charge for all users and uses

## General comment
The high-performance marine concrete (C40) described in this dataset is specifically tailored for the construction of offshore wind farms like the Donghai Bridge Offshore Wind Farm (DBOWF) in China. Its superior properties make it suitable for the harsh maritime environment and the significant structural demands of wind turbine foundations as well as other infrastructural components necessary for large scale offshore wind energy production.

## Geography
The studied wind farm, the Donghai Bridge Offshore Wind Farm (DBOWF), is China's first offshore wind farm within the jurisdiction of Shanghai, as well as the first offshore wind farm outside Europe. The project has two-phases of construction, located on each side of the Donghai bridge (Fig. 1).

## Reference product
- Concrete: 43000; article inperiodical

## Inputs
- Energy, geothermal, converted: 5.94e7; software or database

## Outputs
- carbon dioxide: 9.93e6; software or database
- particles (PM2.5): 2020; software or database
- sulfur dioxide: 9550; software or database
- nitrous oxide: 23200; software or database

## Deviations from the LCI method approaches
The present study employed the PLCA modeling approach to calculate the energy and environmental emissions of a typical offshore wind farm in China. The cradle-to-grave process includes four stages, materials and equipment manufacturing, transportation and installation, operation and maintenance, and dismantling and recycling (Fig. 2).

## Data selection and combination
The technical parameters of wind turbines, foundations and cables are obtained from the design documents of the DBOWF (Table 2). The energy and emissions factors (i.e., the energy consumption and environmental emissions of per unit material and component production) are derived from the Ecoinvent 2.2 dataset (Ecoinvent Centre, 2009), and the coefficients of China's practices were preferentially referred. For key materials and equipment, their sea transportation energy is calculated from the transportation load and shipping energy intensity. The facility installation energy and emissions were estimated based on the construction plan. The wind farm's operation and maintenance data, such as the frequency and working time of maintenance, were obtained from site investigations with engineers and technicians. The uncertainties associated with model parameters and input data are illustrated in the sensitivity analysis section of this paper.

## Use advice
Users of this dataset should note that the information provided is based on the specific case study of the Donghai Bridge Offshore Wind Farm (DBOWF) and therefore may reflect region-specific practices. Energy and emissions factors are derived from Ecoinvent 2.2 and should be referenced or adapted with consideration for local practice variations. For the transportation of key materials and equipment, apply the provided sea transportation energy calculations. Installation energy consumption and emissions, operation and maintenance details must reflect the actual construction and operational conditions of the project in question. When applying this data in LCA models, users should pay special attention to the sensitivity analysis section for any associated uncertainties and ensure proper adjustment for their context.

## Review details
Inventory: The internal review was done by several iteration steps concerning raw data validation, raw data documentation, representativity, completeness and consistency of modelling with regard to ISO 14040 and 14044.

## Data sources
- Yang, J. et al. The life-cycle energy and environmental emissions of a typical offshore wind farm in China. Journal of Cleaner Production 180, 316–324 (2018).
