# Rare earth filtrate precipitation and HCl leaching;Dysprosium;IAC;REE containing ore

Dataset: ILCD process, Unit process, single operation
Geography: CN
Reference year: 2010
Valid until: 2019
Classification: Materials production / Inorganic chemicals
Functional unit: The goal of this investigation is to compare environmental impacts related to the production of 1 kg Dy (functional unit) from IAC (Southern China), from B/M ore (Bayan Obo), and from an eudialyte deposit (Norra Kärr) using the LCA method
LCI method principle: Attributional
LCI method approaches: Allocation - mass
Generated by: Tao Wang, twang@iue.ac.cn
Owner: Tiangong LCI Data Working Group
Review: Dependent internal review by Tiangong LCI Data Working Group
Amounts: no units in this file; such an amount is in the reference unit of its flow, which a separate flow dataset defines
copyright: false
licenseType: Free of charge for all users and uses

## General comment
The technical use of the process involves the production of Dysprosium (Dy) through the precipitation of rare earth elements from a filtrate and subsequent leaching with hydrochloric acid (HCl). This process is specific to the extraction and refinement of dysprosium from REE containing ores in Southern China and Bayan Obo regions. Dysprosium is a rare earth element commonly used in permanent magnets, which are essential components of modern electronics, electric vehicles, and wind-turbine generators, among other high-tech applications.

## Geography
Southern China and Bayan Obo

## Technology and included processes
The goal of this investigation is to compare environmental impacts related to the production of 1 kg Dy (functional unit) from IAC (Southern China), from B/M ore (Bayan Obo), and from an eudialyte deposit (Norra Kärr) using the LCA method

## Reference product
- Leaching solution: 208; article inperiodical
  Leaching solution. Input for next process: Solvent extraction

## Inputs
- Electricity: 1.62; calculated
  Estimated on base of throughput in solvent extractio, electricity mix 2014
- Ammonium bicarbonate: 5.4; calculated
  Ammonium bicarbonate. Stoichiometric calculation with 25 % excess, ammonium bicarbonate, at plant
- sulphuric acid: 0.66; min 0.26; max 1.06; uniform; measured
  For adjusting a pH value of 5 for further processing, sulphuric acid, liquid, at plant. Average
- Lime: 1.885; min 0.74; max 3.03; uniform; measured
  Lime production, hydrated, packe, for adjusting a pH value of 10 to separate impurities. Average
- hydrogen chloride: 11.48; measured
  Hydrochloric acid, 36 % in H2O, from reacting propylene and chlorine, for adjusting a pH value of 4 for REE chloride solution
- water: 197; measured
  For dilution of HCl
- transport in t*km,transport in t*km: 2.565; min 2.07; max 3.06; uniform; software or database
  Chemicals: 320 km average distance deposit -Guangzhou, carbonate: 200 km deposit - Shaoguan, HCl: 230 km Guangzhou - Shaoguan. Market for transport, freight, lorry >32 metric ton, EURO3, average

## Outputs
- Sludge: 5.14
  Assumed to be dumped at the deposit area
- aluminium: 0.000146; article inperiodical
  Aluminium [Inorganic emissions to fresh water]
- calcium: 0.000808; article inperiodical
  Calcium [Inorganic emissions to fresh water]
- iron: 1.7e-6; article inperiodical
  Iron [Heavy metals to fresh water]
- magnesium: 7.07e-5; article inperiodical
  Magnesium [Inorganic emissions to fresh water]
- manganese: 2.31e-5; article inperiodical
  Manganese [Heavy metals to fresh water
- potassium: 6.72; article inperiodical
  Potassium [Inorganic emissions to fresh water]
- Activated silica: 0.000147; article inperiodical
  Activated silica. Silicon dioxide (silica) [Particles to air]
- sodium: 0.000105; article inperiodical
  Sodium [Inorganic emissions to fresh water]

## Deviations from the LCI method approaches
In this study, an allocation method based on the mass of produced REEs combined with their market prices (based on an international metals market analysis and pricing index company ) are considered, as usual for metals with strongly different prices. As the ores have different compositions, the allocation factor has to be assessed individually for each site.

## Use advice
When using this data in Life Cycle Assessment (LCA), it is important to consider the allocation method based on the mass of produced Rare Earth Elements (REEs) along with their market prices. Environmental impacts should be compared for the production of 1 kg Dysprosium across different sources, including IAC (Southern China), B/M ore (Bayan Obo), and eudialyte (Norra Kärr). Due to varying compositions of the ores, the allocation factor must be assessed individually for each site. It is also necessary to account for site-specific technological applicability and processing efficiencies in the LCA model.

## Review details
Inventory: The internal review was done by several iteration steps concerning raw data validation, raw data documentation, representativity, completeness and consistency of modelling with regard to ISO 14040 and 14044.

## Data sources
- Zapp, P., Marx, J., Schreiber, A., Friedrich, B. & Voßenkaul, D. Comparison of dysprosium production from different resources by life cycle assessment. Resources, Conservation and Recycling 130, 248–259 (2018).
