# Refined tea ; Woolen tea ; Refined processing ; All sizes; NESPS2 / 精制茶 ; 毛茶 ; 精制加工 ; 所有规模 ; 全国第二次污染普查数据

Dataset: ILCD process, Unit process, single operation
Geography: CN
Reference year: 2019
Classification: Reference Parameters / Materials production / Food and renewable raw materials
Generated by: The data was created by the Office of the Second National Pollution Source Census of the Ministry of Ecology and Environment, and the data was organized by the TianGong Plan team for ILCD format / 生态环境部第二次全国污染源普查工作办公室创建数据，天工计划团队常慧敏整理数据为ILCD格式
Owner: Tiangong LCI Data Working Group / 天工LCI数据工作小组
Review: Dependent internal review by Tiangong LCI Data Working Group / 天工LCI数据工作小组
Amounts: no units in this file; such an amount is in the reference unit of its flow, which a separate flow dataset defines
copyright: false
licenseType: Free of charge for all users and uses

## General comment
the treatment technology for the pollution of Tea Refiningdidn't offered，Its Technical efficiency of end-of-pipe management65

## Technical purpose
该数据集所描述的粗茶精制过程产出的精制茶适用于不同生产规模，可以在饮料行业内的不同适用范围使用，包括但不限于用作包装茶产品的混合茶基底，作为调味茶的基料，或作为高品质单品茶叶销售。

## Reference product
- Tea Refining: 1000; calculated
  源文件中描述为为精制茶，此处对其进行了匹配工作，将其匹配到LCAflow库里面相最符合的流

## Outputs
- Flue dust: 0.08; calculated
  the Technical of end-of-pipe management technology for pollution Flue dustisBag filter，Its Technical efficiency of end-of-pipe management92
  污染物指标茶粉尘的末端治理技术是袋式除尘，其效率为92，末端治理设施实际运行率（k值）计算公式为k=除尘设备运行时间（小时）/精制茶生产时间（小时）。原文件中描述污染物类别为废气，污染物指标为茶粉尘，此处对其进行了匹配工作，将其匹配到LCAflow库里面相最符合的流
- Flue dust: 0.12; calculated
  the Technical of end-of-pipe management technology for pollution Flue dustisCyclone dust removal，Its Technical efficiency of end-of-pipe management88
  污染物指标茶粉尘的末端治理技术是旋风除尘，其效率为88，末端治理设施实际运行率（k值）计算公式为k=除尘设备运行时间（小时）/精制茶生产时间（小时）。原文件中描述污染物类别为废气，污染物指标为茶粉尘，此处对其进行了匹配工作，将其匹配到LCAflow库里面相最符合的流
- Flue dust: 0.35; calculated
  the treatment technology for the pollution of Flue dustdidn't offered，Its Technical efficiency of end-of-pipe management65
  污染物指标茶粉尘的末端治理技术是/(室内自然沉降)，其效率为65，末端治理设施实际运行率（k值）计算公式为k=1。原文件中描述污染物类别为废气，污染物指标为茶粉尘，此处对其进行了匹配工作，将其匹配到LCAflow库里面相最符合的流

## Use advice
This dataset is derived from the Pollution Source Census Report and contains information on pollution emissions and related products. However, it does not include data on energy or chemical consumption, nor does it provide information on waste or co-product generation. When utilizing this dataset, please supplement the missing data based on actual conditions before use
该数据集来源于污染源普查报告，包含污染物排放及相关产品信息，但不包含能源或化学品消耗数据，也不提供废弃物或共生产物产生信息。在使用该数据集时，请根据实际情况补充缺失数据后再使用。

## Review details
Inventory: The internal review was done by several iteration steps concerning raw data validation, raw data documentation, representativity, completeness and consistency of modelling with regard to ISO 14040 and 14044.
清单： 内部审查通过几个迭代步骤完成，涉及原始数据验证、原始数据记录、代表性、完整性、与 ISO 14040 和 14044 有关的建模的一致性。

## Data sources
- 第二次全国污染源普查产排污核算系数手册（试用版）,三级代码153.0文件，在完整版文件中第2689页
