# modified granulated copper slag production;modified granulated copper slag

Dataset: ILCD process, Unit process, single operation
Geography: CS-HUN-CN
Classification: Materials production / Other mineralic materials
Generated by: Siqi Yang, ysqsophia@gmail.com
Owner: Tiangong LCI Data Working Group
Review: Dependent internal review by Tiangong LCI Data Working Group
Amounts: no units in this file; such an amount is in the reference unit of its flow, which a separate flow dataset defines
copyright: false
licenseType: Free of charge for all users and uses

## General comment
Modified granulated copper slag (MGCS).MGCS preparation is a crucial phase. The original copper slag was procured from a smelter of Boliden Mineral AB, Stockholm, Sweden. This was ground in the raw mill to form GCS with a particle size lower than 0.60 mm. The CaO (99.9% pure) was supplied by Changsha Danuo Building Materials Co., Ltd., Changsha, China. The procedure of MGCS production is as follows. The granulated copper slag (GCS) and CaO (20 wt.%) were charged in the furnace while the heating temperature was raised to approximately 1550 ◦C, at which point the mixtures were completely molten. The water-quenching method was then adopted to form the MGCS. The entire process was carried out within a nitrogen atmosphere with a flow rate of 150 mL/min. This procedure was conducted in the Changsha Research Institute of Mining and Metallurgy Co., Ltd., Changsha, China. The produced MGCS was eventually transported by trucks to the cement plant, which uses electricity as the main energy source.

## Geography
A typical cement plant in Changsha, Hunan Province, China

## Technology and included processes
MGCS preparation is a crucial phase. The original copper slag was procured from a smelter of Boliden Mineral AB, Stockholm, Sweden. This was ground in the raw mill to form GCS with a particle size lower than 0.60 mm. The CaO (99.9% pure) was supplied by Changsha Danuo Building Materials Co., Ltd., Changsha, China. The procedure of MGCS production is as follows. The GCS and CaO (20 wt.%) were charged in the furnace while the heating temperature was raised to approximately 1550 ◦C, at which point the mixtures were completely molten [23]. The water-quenching method was then adopted to form the MGCS. The entire process was carried out within a nitrogen atmosphere with a flow rate of 150 mL/min [24]. This procedure was conducted in the Changsha Research Institute of Mining and Metallurgy Co., Ltd., Changsha, China. The produced MGCS was eventually transported by trucks to the cement plant, which uses electricity as the main energy source.

## Technical purpose
Modified granulated copper slag (MGCS) is primarily utilized in the construction industry as a supplementary cementitious material, due to its pozzolanic properties. This material can be incorporated into cement production to enhance certain properties of the resulting concrete, such as increased durability and reduced permeability. MGCS is also valuable in applications where sustainability is a focus, as it repurposes a byproduct from the metal smelting industry and can potentially reduce carbon emissions associated with cement manufacturing.

## Model description
A functional unit (FU) is defined as 1 kg of mixed cement with a compressive strength of 42.9 MPa.

## Reference product
- Modified granulated copper slag: 1000
  Modified granulated copper slag (MGCS)

## Inputs
- calcium oxide: 190.968
  CaO
- Granulated copper slag: 954.839
  Granulated copper slag (GCS)
- electricity, medium voltage: 1800
  Electricity

## Outputs
- particles (> PM10): 1.17742
  PM. The particle size is not specified. Here we treat it as PM>10.

## Deviations from the LCI method approaches
Some data related to the background system were obtained from the Ecoinvent 3.1 database.

## Data selection and combination
Inventory data for the Prospect system is collected directly from cement plants located in Changsha, Hunan Province, China.

## Use advice
When using this dataset for life cycle assessment or similar purposes, it is critical to ensure that the impact of the origin copper slag preparation is excluded, as per EU directives which consider copper slag to be a waste product with no allocated environmental burden. Focus should be given to the environmental impacts incurred during the grinding and modification processes of granulated copper slag (GCS). Additionally, users should verify that any energy consumption data and transport emissions encapsulate the complete supply chain from the raw material procurement to the delivery of MGCS to the cement plant.

## Review details
Inventory: The internal review was done by several iteration steps concerning raw data validation, raw data documentation, representativity, completeness and consistency of modelling with regard to ISO 14040 and 14044.

## Data sources
- Qinli Zhang, Bingyi Zhang, & Daolin Wang. (2022). Environmental Benefit Assessment of Blended Cement with Modified Granulated Copper Slag. MATERIALS, 15(15).
