# Remediated soil ; Soil in-situ remediation ; SVE system ; SVE system operation for 2.05 years

Dataset: ILCD process, Unit process, single operation
Geography: KR
Reference year: 2011
Classification: Unit processes / Other Services / Repair and maintenance
Generated by: Zhang Jianbin, zhangjb@caep.org.cn
Owner: Tiangong LCI Data Working Group
Review: Dependent internal review by Tiangong LCI Data Working Group
Amounts: no units in this file; such an amount is in the reference unit of its flow, which a separate flow dataset defines
copyright: false
licenseType: Free of charge for all users and uses

## General comment
Electricity 148,748 kwh

## Technology and included processes
SVE operation - Electricity 148,748 kwh

## Technical purpose
The data represents an in-situ soil remediation process using a Soil Vapor Extraction (SVE) system for a duration of 2.05 years. This remediation technology is typically applied to contaminated soils to remove volatile and some semi-volatile contaminants. The SVE system is operated for 750 days, during which high purity soil is obtained as an output. This treated soil can be used for various purposes depending on the remediation goals, such as residential or commercial development, agriculture, or habitat restoration. The specified consumption of electricity (148,748 kWh) is indicative of the energy used during the SVE operation.

## Reference product
- Remediated soil: 1000; measured

## Inputs
- Electricity: 535493; measured
- contaminated soil: 1000; measured
- Activated Carbon: 18000; measured

## Outputs
- Exhaust gas: 1; estimated

## Use advice
When using this data set, ensure that the context of the soil remediation process aligns with your project's parameters. The electricity consumption data is specific to this SVE system operating for 2.05 years, and it should be scaled accordingly for different operational durations. Consider regional electricity grid mixes as this will affect the environmental impact of the energy consumed. Ensure that the inputs and outputs are comparable with other data used in the life cycle assessment and account for any potential variations in technology or operational efficiency.

## Review details
Inventory: The internal review was done by several iteration steps concerning raw data validation, raw data documentation, representativity, completeness and consistency of modelling with regard to ISO 14040 and 14044.

## Data sources
- Jeong, S.-W. & Suh, S.-W. Assessment of Environmental Impacts and CO 2 Emissions from Soil Remediation Technologies using Life Cycle Assessment - Case Studies on SVE and Biopile Systems -. Journal of Korean Society of Environmental Engineers 33, 267–274 (2011).
