# Caisson-based gate ; 2.4 m diameter ; In-situ groundwater remediation ; PRB ; Funnel-and-gate configuration PRB

Dataset: ILCD process, Unit process, single operation
Geography: US
Reference year: 2011
Classification: Unit processes / Other Services / Repair and maintenance
Generated by: Zhang Jianbin, zhangjb@caep.org.cn
Owner: Tiangong LCI Data Working Group
Review: Dependent internal review by Tiangong LCI Data Working Group
Amounts: no units in this file; such an amount is in the reference unit of its flow, which a separate flow dataset defines
copyright: false
licenseType: Free of charge for all users and uses

## General comment
The gate is one of the components of the groundwater PRB system. The impermeable funnel guides or collects polluted groundwater flow into the gate. The gate is filled with active materials to dispose of the groundwater flowing through it. Caisson-based gate refers to a gate installed using the caisson-based method.

## Geography
PRB is assumed to be installed at a simulated site

## Technical purpose
The caisson-based gate described is employed as a component within a permeable reactive barrier (PRB) system for in-situ groundwater remediation. Its function is to direct contaminated groundwater through an impermeable funnel into the gate, where it is then treated by passing through reactive materials within the gate. The term 'caisson-based' refers to the installation process of the gate, which involves the use of the caisson method, a technique that allows for the construction of the gate in an underwater environment.

## Reference product
- Caisson-based gate: 4; estimated

## Inputs
All rows: estimated
- Zero-valent Iron: 139000
  Assume Fe0 is mixed with quartz sand in 1:1 (w:w)
- quartz sand: 139000
  Assume Fe0 is mixed with quartz sand in 1:1 (w:w)
- transport in t*km: 44480
  Transport distance of the materials to the site is assumed to be 160 km (100 mile)
- Electricity: 483000
  Reactive media construction. Replacement of reactive media is assumed to occur three times.
- Steel: 37200
  Gate (caisson) steel 9300 kg/gate (caisson)
- sand: 72100
- transport in t*km: 17488
- Electricity: 731000
  Gate (caisson) construction energy 182.7 GJ/ gate (caisson), including ① Soil excavation energy 1.151 GJ/m3 soil and ② Backfilling energy 1.74 MJ/kg backfills
- quartz sand: 21400
  Backfilling the pretreatment and post-treatment zones with quartz sand

## Use advice
When using this dataset, ensure to model the in-situ groundwater remediation process accurately by considering the unique installation methodology of the caisson-based gate, its diameter, and the nature of the reactive materials used within the gate. The dataset includes all major raw materials and essential energy consumption, which should be accounted for in the life cycle assessment. Users should note the functional unit of the process – a single operation – and its application to a simulated polluted site for PRB installation.

## Review details
Inventory: The internal review was done by several iteration steps concerning raw data validation, raw data documentation, representativity, completeness and consistency of modelling with regard to ISO 14040 and 14044.

## Data sources
- Mark S. H. Mak and Irene M. C. Lo.Environmental Life Cycle Assessment of Permeable Reactive Barriers: Effects of Construction Methods, Reactive Materials and Groundwater Constituents[J].Environmental Science & Technology 2011, 45, 23, 10148-10154
