# Metallurgical silicon smelting ; Silicon (99%) ; Carbon-thermal reduction

Dataset: ILCD process, Unit process, single operation
Geography: CN
Reference year: 2014
Classification: Unit processes / Materials production / Metals and semimetals
Functional unit: The functional unit of the LCA study was 1 kWh based on a multi-Si PV module
LCI method principle: Attributional
LCI method approaches: Allocation
Generated by: Jinfeng Yang, yjfzfshn@163.com
Owner: Tiangong LCI Data Working Group
Review: Dependent internal review by Tiangong LCI Data Working Group
Amounts: no units in this file; such an amount is in the reference unit of its flow, which a separate flow dataset defines
copyright: false
licenseType: Free of charge for all users and uses

## General comment
Multi-Si

## Geography
This study performs a life-cycle assessment for a photovoltaic (PV) system with multi crystalline silicon (multi-Si) modules in China

## Time period
Available online

## Technical purpose
Metallurgical silicon smelting described in this data set is utilized for the production of multi-crystalline silicon, which is an essential component in photovoltaic (PV) systems for solar energy capture and conversion. This process specifically refers to the carbon-thermal reduction method to produce silicon with a purity of 99%. The multi-crystalline silicon (or multi-Si) is subsequently used in the production of various photovoltaic components including wafers, ingots, cells, and modules for solar panel assembly.

## Reference product
- Metallurgical silicon: 6.08; measured
  Silicon (99%)

## Inputs
- quartz sand: 20.48; measured
  Quartz sand
- hard coal: 45.4; measured
  Standard coal

## Outputs
All rows: measured
- carbon dioxide (fossil): 132.91
  Carbon dioxide
- carbon monoxide,carbon monoxide (fossil): 1.7
  Carbon monoxide
- Slag: 4.38
- Nitrogen oxides: 279.55
- Silicon dioxide: 1.7
- sulfur dioxide: 0.79
  Sulfur dioxide

## Deviations from the LCI method approaches
The goal of this study was to quantitatively assess the life-cycle environmental impacts of PV systems in China and provide a scientific basis for policy-making regarding the sustainable development of Chinese PV industry.

## Data selection and combination
The inventory data, including the material consumption andenvironmental emissions involved in the production of solar-grade silicon, wafers, ingots, cells, and modules, were mainly collected from companies that represent the current domain multi-Si PV technologies in China. The energy consumption data referred to the report “Clean Production ofSolar PV in China” (Li and Chang, 2012). The data of MG-Si production was from literature about MG-Si produced in China

## Use advice
When using this data set, users should consider the methodological framework provided by the Life Cycle Assessment (LCA) of a PV system with multi-crystalline silicon modules in China. Users should ensure to reference the appropriate scope of the study, which focuses on material consumption, environmental emissions, and energy usage from the Chinese PV industry perspective. When applicable, users must also take into account the technological applicability of the data, particularly when projecting the LCA study results for policy making or in different geographical contexts. Recycling and end-of-life considerations should also be included where relevant.

## Review details
Inventory: The internal review was done by several iteration steps concerning raw data validation, raw data documentation, representativity, completeness and consistency of modelling with regard to ISO 14040 and 14044.

## Data sources
- Fu, Y., Liu, X. & Yuan, Z. Life-cycle assessment of multi-crystalline photovoltaic (PV) systems in China. Journal of Cleaner Production 86, 180–190 (2015).
