# Lithium Battery Production | 1GWh of Lithium Iron Phosphate Battery | Lithium Battery Production Assembly

Dataset: ILCD process, Unit process, black box
Geography: YB-SC-CN
Reference year: 2022
Classification: Materials production / Other mineralic materials
Functional unit: 1 GWh Lithium Iron Phosphate Battery
LCI method principle: Attributional
LCI method approaches: Allocation - mass
Generated by: Bingqian Zhang, zhangbq22@mails.tsinghua.edu.cn
Review: Dependent internal review by Tiangong LCI Data Working Group
Amounts: no units in this file; such an amount is in the reference unit of its flow, which a separate flow dataset defines
copyright: false

## General comment
Using traditional lithium-ion battery technology

## Time period
Lithium Battery Production Data for the Jiang'an Industrial Park in Yibin, Sichuan, in 2022

## Reference product
- Battery: 3.6e6; normal; measured

## Inputs
All rows: normal; measured
- Ammonium phosphate dibasic: 1.73e6
- Graphite Anode: 1.5e6
- Lithium Hydroxide: 25000
- Nitric acid: 3.06e6
- Manganese Iron Powder: 211000
- Butane-1,4-diol: 1.67e6
- POLYACRYLATE-2: 8100
- Carboxymethyl cellulose: 1260
- N,N-Dimethylacetamide: 387
- Polyvinylidene fluoride: 6960
- Alumina: 78300
- Tributyl phosphate: 329
- Polyvinyl pyrrolidone: 360
- Polyolefin: 163000
- Vinylene Carbonate: 21200
- Ethyl methyl carbonate: 317000
- Dimethyl carbonate: 353000
- 1,3-Propane sultone: 28300
- Propyl acetate: 70500
- Diethyl carbonate: 3950
- Propylene carbonate: 55000
- Ethylene carbonate: 283000
- 2,2-Difluoroethanol: 43600
- Lithium fluoride: 34000
- Anhydrous Hydrogen Fluoride: 132000
- Sodium carbonate: 1.31e6

## Outputs
All rows: normal; measured
- Ammonia Nitrogen: 300
- Chemical Oxygen Demand: 6160
- nitrogen: 469
- sodium hydroxide: 267000
- calcium carbonate: 390000
- carbon dioxide: 167000
- freshwater: 4.66e7
- hydrated lime dry slaked: 270000
- phosphorus trichloride: 179000
- chlorine: 92300
- Iron scrap: 633000
- process steam: 163000
- electricity mix: 5.94e7
- natural gas: 2.51e6
- dichloromethane: 331
- sulfur dioxide: 1410
- nitrous oxide: 11300
- ammonia: 113
- phosphorus, total: 90.6
- sulfate: 397
- hydrogen chloride: 59.6

## Deviations from the LCI method approaches
Unit process data is obtained through material flow analysis in the industrial park

## Data selection and combination
The data represents material flow data for lithium battery production in the Jiang'an Industrial Park in Yibin, Sichuan

## Data treatment and extrapolations
The data is all based on the average values

## Sampling procedure
The real-world data is sourced from lithium battery production in Jiang'an, Yibin, Sichuan

## Review details
Inventory: The internal review was done by several iteration steps concerning raw data validation, raw data documentation, representativity, completeness and consistency of modelling with regard to ISO 14040 and 14044.; Documentation: The review of the documentation was performed by Ecobilan and is in compliance with ISO 14040 and 14044. The data set documentation is correct in view of the appropriateness of the information provided. It includes all relevant information in view of data quality and scope of application of the respective LCI result.

## Data sources
- 四川宜宾项目数据
