# Coke production;Coke;Coking(Z08)

Dataset: ILCD process, Unit process, single operation
Geography: CN
Reference year: 1998
Classification: Energy carriers and technologies / Energetic raw materials
Generated by: Fuxiang, 1162850692@qq.com
Owner: Tiangong LCI Data Working Group
Review: Dependent internal review by Tiangong LCI Data Working Group
Amounts: no units in this file; such an amount is in the reference unit of its flow, which a separate flow dataset defines
copyright: false
licenseType: Free of charge for all users and uses

## General comment
来自表 4-16 Z08 钢厂生产吨材环境负荷编目表

## Time period
论文提到钢铁企业环境总体数据为1998年的吨钢环境基础数据。

## Technical purpose
The coke produced in this process is intended for use in the steel industry. It serves as a critical source of carbon and heat during the iron-making process in blast furnaces, enabling the reduction of iron ore to produce pig iron.

## Reference product
- coke,Coke: 635.5; measured
  Coke

## Inputs
- Energy, geothermal, converted: 3231.43; measured
- water: 17915; measured

## Outputs
All rows: measured
- Dust (unspecified, from stack): 0.066
  soot
- Dust (unspecified, from stack): 0.217
- sulfur dioxide: 0.836
- cyanide: 0.000117
- phenol: 0.00028
  Volatile phenol
- Hydrocarbons, aliphatic, alkanes, unspecified: 0.008439
  Petro
- Suspended solids, unspecified: 0.124971
- chemical oxygen demand: 0.192747
- Dust (unspecified, from stack): 5.618
  dust collection
- Spoil (deposited, hibernating in ground, non elementary flow): 0.127

## Use advice
Users of this data set should note that the environmental load figures pertain to technology and practices from the year 1998. Significant advancements in coke production technology may have occurred since then, potentially altering environmental impacts. Users should ensure the technological applicability of the data by making adjustments to reflect current technologies or by validating the relevance to modern coke production processes.

## Review details
Inventory: The internal review was done by several iteration steps concerning raw data validation, raw data documentation, representativity, completeness and consistency of modelling with regard to ISO 14040 and 14044.

## Data sources
- 周和敏. 钢铁材料生产过程环境协调性评价研究. (北京工业大学, 2001).
