# Blast furnace ironmaking ; pellet sinter ; pig iron

Dataset: ILCD process, Unit process, single operation
Geography: HUN-CN
Reference year: 2013
Classification: Unit processes / Materials production / Metals and semimetals
Generated by: Wanghuanyu, wanghuanyu00@126.com
Owner: Tiangong LCI Data Working Group
Review: Dependent internal review by Tiangong LCI Data Working Group
Amounts: no units in this file; such an amount is in the reference unit of its flow, which a separate flow dataset defines
copyright: false
licenseType: Free of charge for all users and uses

## General comment
The dataset describes the process of blast furnace ironmaking using pellet sinter to produce pig iron, an intermediate product used in steel making. This process is typically employed by the iron and steel industry for the mass production of steel components used in construction, transportation, appliances, and various types of machinery.

## Geography
湖南华菱湘潭钢铁有限公司

## Reference product
- Molten Iron: 950; measured
  pig iron

## Inputs
- Sinter: 1000; measured
- Pellet: 1000; measured
  Pellets

## Use advice
Users of this dataset should consider technological advancements and fluctuations in the quality of pellet sinter when applying the data to life cycle assessments. Caution should be exercised regarding the specificity of the data, which originates from Hunan Valin Xiangtan Iron & Steel Co., Ltd. The dataset is site-specific and reflects the technology and practices employed at this facility. Users should not generalize these results to other facilities without consideration of local conditions and technologies. Additionally, inclusion or exclusion of downstream processes such as steel making, casting, rolling, and potential end-of-life recycling should be clearly delineated based on the scope of the specific LCA study.

## Review details
Inventory: The internal review was done by several iteration steps concerning raw data validation, raw data documentation, representativity, completeness and consistency of modelling with regard to ISO 14040 and 14044.

## Data sources
- 1.
