# Aluminum Electrolysis Carbon Anode Production ; Carbon Anode ; Petroleum Coke ; 2014

Dataset: ILCD process, Unit process, single operation
Geography: CN
Reference year: 2021
Classification: Unit processes / Materials production / Non-energetic raw materials
Generated by: Zimeng Cai, caizm6178@163.com
Owner: Tiangong LCI Data Working Group
Review: Dependent internal review by Tiangong LCI Data Working Group
Amounts: no units in this file; such an amount is in the reference unit of its flow, which a separate flow dataset defines
copyright: false
licenseType: Free of charge for all users and uses

## General comment
The Carbon Anode produced through Aluminum Electrolysis using Petroleum Coke is primarily utilized for applications within the aluminum smelting industry. Due to its electrical conductivity, it serves as a critical component in the extraction of aluminum from its ore. As such, it is suited for industries where aluminum is a key material, including automotive, aerospace, packaging, and construction industries.

## Time period
Date of publication

## Reference product
- anode, for metal electrolysis: 1000; software or database
  anode

## Inputs
All rows: software or database
- electricity, high voltage, aluminium industry: 748.8
  electricty
- heavy fuel oil: 65
  fuel oil
- coal tar: 214
  coal tar pitch
- Petroleum Coke: 1089
  petroleum coak
- coal gas: 1277

## Data selection and combination
The data in this study refers to the LCA data of PA, SA, electricity, and other background data. The PA data were obtained from statistical data sources, and the SA data were mainly obtained from the literatures. The background data were mainly derived from the Chinese localization LCA database CAS RCEES 2018, which was established by the Research Center for Eco-Environmental Sciences, Chinese Academy of Sciences and covers LCA data for energy, materials, transportation, waste management etc.

## Use advice
When utilizing this LCA data for Carbon Anode production, it is essential to consider that the data set is based on statistics and literature from the year 2014. Users should take into account the potential changes in technology and market conditions when applying this data to current situations. Additionally, the background data from the CAS RCEES 2018 should be adapted for updates or specific contexts. For methodologies that involve recycling or life-cycle stages beyond production (such as use and end-of-life), adjustments need to be made to reflect relevant system boundaries and environmental impacts accurately.

## Review details
Inventory: The internal review was done by several iteration steps concerning raw data validation, raw data documentation, representativity, completeness and consistency of modelling with regard to ISO 14040 and 14044.

## Data sources
- Ding, N., Liu, N., Lu, B. & Yang, J. Life cycle greenhouse gas emissions of aluminum based on regional industrial transfer in China. J. Ind. Ecol. 25, 1657–1672 (2021).
