# Corn-based ethanol production ; Ethanol ; Fermentation ; Corn

Dataset: ILCD process, Unit process, single operation
Geography: GX-CN
Classification: Energy carriers and technologies / Renewable fuels
Functional unit: The functional unit is 1.7 tonne of ethanol production.
LCI method principle: Attributional
LCI method approaches: Allocation - mass
Generated by: Zirui Tang, tangzirui123@gmail.com
Owner: Tiangong LCI Data Working Group
Review: Dependent internal review by Tiangong LCI Data Working Group
Amounts: no units in this file; such an amount is in the reference unit of its flow, which a separate flow dataset defines
copyright: false
licenseType: Free of charge for all users and uses

## General comment
Two alternative ethanol production scenarios, corn-based and cassava-based, were tested for ethylene production.

## Geography
Data related to the operation process (e.g., electricity, steam, water, chemicals, raw material consumption, and direct emissions) from the cassava-based ethanol and corn-based ethylene production plants in the Guangxi and Anhui Provinces in China were used [20], [21].

## Technology and included processes
Processes included in present study are summarized as follows:1) Corn and cassava production at farm; 2) Ethanol and ethylene production.

## Technical purpose
The collected data pertains to corn-based ethanol production which is utilized primarily for the production of ethylene. Ethylene produced from this process is vital for various industrial applications, including the synthesis of polymers, chemicals, and as a precursor in the production of plastics, detergents, and other organic compounds. The process detailed in this dataset specifically evaluates the production scenarios by utilizing corn stover, with a primary focus on the fermentation phase to derive ethanol, a key intermediate in ethylene synthesis.

## Reference product
- Ethanol: 1700; article inperiodical

## Inputs
All rows: article inperiodical
- Straw: 5400
- Glucoamylase: 3.8
- Calcium hydroxide: 18.3
- Amylase: 4.97, 4.8 (2 entries)
- Dipotassium Phosphate: 1.8
- Diammonium phosphate: 1.6
- Sulfuric acid: 9.3
- calcium chloride: 0.9
- Alkali: 31.4
- Urea: 0.96
- water: 48800
- process steam: 6960
- electricity: 2580.84

## Outputs
- Protein Feed: 1740; article inperiodical

## Deviations from the LCI method approaches
Co-product allocation based on product mass was performed.

## Data selection and combination
Data related to the operation process (e.g., electricity, steam, water, chemicals, raw material consumption, and direct emissions) from the cassava-based ethanol and corn-based ethylene production plants in the Guangxi and Anhui Provinces in China were used.2. The data related to corn and cassava production at farms, coal-based electricity generation, and road transport processes were taken from the references.3. Moreover, data on chemical production and relevant background data from Europe were used [26] because of the lack of information for China.

## Use advice
When using this dataset for life cycle assessments, users should note that the data includes inputs and outputs related to the corn-based ethanol production process intended for ethylene synthesis. This includes the consumption of raw materials, energy use, and emissions from various stages such as cultivation, drying, transport, and waste treatment. Co-product allocation has been performed based on product mass. The functional unit for the analysis is defined as the production of 1.7 tonnes of ethanol. For application consistency, users should ensure that conditions of the study align with their assessment goals—particularly in geographic and technological contexts. Imported data from references or other regions (e.g., European chemical production data) may not accurately reflect local practices in China and should be used with caution.

## Review details
Inventory: The internal review was done by several iteration steps concerning raw data validation, raw data documentation, representativity, completeness and consistency of modelling with regard to ISO 14040 and 14044.

## Data sources
- Hong, J., Zhang, Y., Xu, X. & Li, X. Life cycle assessment of corn- and cassava-based ethylene production. Biomass and Bioenergy 67, 304–311 (2014).
