# Soil remediation;soil vapor extraction;in-situ;operation;GAC replacement;

Dataset: ILCD process, Unit process, single operation
Geography: KR
Reference year: 2011
Classification: Other Services / Repair and maintenance
Generated by: Lei Qiushuang, leiqs@caep.org.cn
Owner: Tiangong LCI Data Working Group
Review: Dependent internal review by Tiangong LCI Data Working Group
Amounts: no units in this file; such an amount is in the reference unit of its flow, which a separate flow dataset defines
copyright: false
licenseType: Free of charge for all users and uses

## General comment
The given industrial process is intended for in-situ soil remediation, specifically within the operation phase involving soil vapor extraction (SVE) using granular activated carbon (GAC). This unit process (single operation) is crucial for the treatment of contaminated soil, allowing for the physical removal of volatile and semi-volatile organic compounds through extraction and adsorption.

## Reference product
- Activated Carbon: 18000; input; measured
  颗粒活性炭

## Outputs
- Activated Carbon: 18000
  废弃的颗粒活性炭

## Use advice
When utilizing this data set, users should ensure accurate representation of the GAC replacement frequency and capacity, accounting for the specific contaminants and soil properties. It is essential to integrate data from actual operating conditions, such as airflow rate and temperature, to reflect the efficiency of the SVE system accurately. Pay attention to the end-of-life treatment of spent GAC and consider potential secondary pollution. Methodological consistency with the overall LCA framework for soil remediation must be maintained.

## Review details
Inventory: The internal review was done by several iteration steps concerning raw data validation, raw data documentation, representativity, completeness and consistency of modelling with regard to ISO 14040 and 14044.

## Data sources
- Assessment of Environmental Impacts and CO2 Emissions from Soil Remediation Technologies using Life cycle Assessment - Case Studies on SVE and Biopile Systems
