# Starter lead batteries ; Lead, sulfuric acid glass fiber (or PVC) ; Internalized polar plates manufacturing + assembly ; greater than or equal to0.5 million kVA; NESPS2 / 起动型铅蓄电池 ; 铅、硫酸玻璃纤维（或PVC） ; 内化成极板制造+组装 ; 大于等于50万千伏安时 ; 全国第二次污染普查数据

Dataset: ILCD process, Unit process, single operation
Geography: CN
Reference year: 2019
Classification: Reference Parameters / Energy carriers and technologies / Electricity
Generated by: The data was created by the Office of the Second National Pollution Source Census of the Ministry of Ecology and Environment, and the data was organized by the TianGong Plan team for ILCD format / 生态环境部第二次全国污染源普查工作办公室创建数据，天工计划团队常慧敏整理数据为ILCD格式
Owner: Tiangong LCI Data Working Group / 天工LCI数据工作小组
Review: Dependent internal review by Tiangong LCI Data Working Group / 天工LCI数据工作小组
Amounts: no units in this file; such an amount is in the reference unit of its flow, which a separate flow dataset defines
copyright: false
licenseType: Free of charge for all users and uses

## General comment
the treatment technology for the pollution of Exhaust gasdidn't offered

## Technical purpose
所描述的工业过程是制造和组装启动用铅蓄电池，包括铅、硫酸和玻璃纤维（或PVC）等极板组件，容量大于或等于50万千伏安。这些电池通常用于汽车及其他需要高能量启动的电力存储应用。

## Reference product
- Power storage battery: 3.6; calculated
  源文件中描述为为起动型铅蓄电池，此处对其进行了匹配工作，将其匹配到LCAflow库里面相最符合的流，污染物指标备注为工业废水量，单位说明为文件中记录的单位是千伏安时，为匹配LCA单位库，将其改为kWh，依据如下：千伏安时（kVAh）和千瓦时（kWh）都是用于测量电能的单位，但是它们之间有一些区别。千伏安时（kVAh）：这个单位考虑了系统的总功率，包括有用功率（实功率）和无用功率（虚功率）。它是由电压（V）和电流（A）的乘积得到的，不考虑功率因数。千瓦时（kWh）：这个单位只考虑了系统的有用功率，即实际做功的部分。它是实际消耗或产生的电能的单位。这两个单位之间的关系可以通过功率因数（PF）来表示：kWh=kVAh×PF，其中，PF 是功率因数，是一个无单位的值，表示实功率和总功率之间的比例，其值范围是 0 到 1。如果系统只有有用功率，没有无用功率，那么功率因数就是 1，此时 kVAh 和 kWh 是相等的。如果系统有无用功率，那么功率因数就小于 1，此时 kVAh 会大于 kWh。

## Outputs
All rows: calculated
- lead: 3.32e-6, 2.21e-5 (2 entries)
  the Technical of end-of-pipe management technology for pollution leadisMembrane separation，Its Technical efficiency of end-of-pipe management90
  污染物指标总铅的末端治理技术是膜分离，其效率为90，末端治理设施实际运行率（k值）计算公式为k=废水处理设备正常运转时间（小时/年）/正常生产时间（小时/年）。原文件中描述污染物类别为废水，污染物指标为总铅，此处对其进行了匹配工作，将其匹配到LCAflow库里面相最符合的流，污染物指标备注为总铅
- lead: 3.32e-6, 2.21e-5 (2 entries)
  the Technical of end-of-pipe management technology for pollution leadisNeutralization method, others (chemical flocculation precipitation) membrane separation，Its Technical efficiency of end-of-pipe management90
  污染物指标总铅的末端治理技术是中和法、其他（化学凝絮沉淀法）膜分离，其效率为90，末端治理设施实际运行率（k值）计算公式为k=废水处理设备正常运转时间（小时/年）/正常生产时间（小时/年）。原文件中描述污染物类别为废水，污染物指标为总铅，此处对其进行了匹配工作，将其匹配到LCAflow库里面相最符合的流，污染物指标备注为总铅
- Waste water: 0.0107, 0.071 (2 entries)
  the treatment technology for the pollution of Waste waterdidn't offered
  污染物指标工业废水量的末端治理技术是－。原文件中描述污染物类别为废水，污染物指标为工业废水量，此处对其进行了匹配工作，将其匹配到LCAflow库里面相最符合的流，污染物指标备注为工业废水量
- lead: 2.96e-5, 0.0001976 (2 entries)
  the Technical of end-of-pipe management technology for pollution leadisBag filter + spray tower/water shock bath，Its Technical efficiency of end-of-pipe management98
  污染物指标铅的末端治理技术是袋式除尘+喷淋塔/水冲击浴，其效率为98，末端治理设施实际运行率（k值）计算公式为k=废气处理设备耗电量（千瓦时/年）/(废气处理设备额定功率（千瓦）×废气处理设备运行时间（小时/年）)。原文件中描述污染物类别为废气，污染物指标为铅，此处对其进行了匹配工作，将其匹配到LCAflow库里面相最符合的流，污染物指标备注为铅
- lead: 2.96e-5, 0.0001976 (2 entries)
  the Technical of end-of-pipe management technology for pollution leadisElectric-bag composite precipitator + spray tower/water shock bath，Its Technical efficiency of end-of-pipe management98
  污染物指标铅的末端治理技术是电袋组合+喷淋塔/水冲击浴，其效率为98，末端治理设施实际运行率（k值）计算公式为k=废气处理设备耗电量（千瓦时/年）/(废气处理设备额定功率（千瓦）×废气处理设备运行时间（小时/年）)。原文件中描述污染物类别为废气，污染物指标为铅，此处对其进行了匹配工作，将其匹配到LCAflow库里面相最符合的流，污染物指标备注为铅
- lead: 2.96e-5, 0.0001976 (2 entries)
  the Technical of end-of-pipe management technology for pollution leadisSpray tower/water shock bath + others (filter cartridge high-efficiency dust removal method)，Its Technical efficiency of end-of-pipe management98
  污染物指标铅的末端治理技术是喷淋塔/水冲击浴、其他（滤筒高效除尘法），其效率为98，末端治理设施实际运行率（k值）计算公式为k=废气处理设备耗电量（千瓦时/年）/(废气处理设备额定功率（千瓦）×废气处理设备运行时间（小时/年）)。原文件中描述污染物类别为废气，污染物指标为铅，此处对其进行了匹配工作，将其匹配到LCAflow库里面相最符合的流，污染物指标备注为铅
- chemical oxygen demand: 0.000432, 0.00288 (2 entries)
  the Technical of end-of-pipe management technology for pollution chemical oxygen demandisMembrane separation，Its Technical efficiency of end-of-pipe management60
  污染物指标化学需氧量的末端治理技术是膜分离，其效率为60，末端治理设施实际运行率（k值）计算公式为k=废水处理设备正常运转时间（小时/年）/正常生产时间（小时/年）。原文件中描述污染物类别为废水，污染物指标为化学需氧量，此处对其进行了匹配工作，将其匹配到LCAflow库里面相最符合的流，污染物指标备注为化学需氧量
- chemical oxygen demand: 0.000432, 0.00288 (2 entries)
  the Technical of end-of-pipe management technology for pollution chemical oxygen demandisNeutralization method, others (chemical flocculation precipitation) membrane separation，Its Technical efficiency of end-of-pipe management60
  污染物指标化学需氧量的末端治理技术是中和法、其他（化学凝絮沉淀法）膜分离，其效率为60，末端治理设施实际运行率（k值）计算公式为k=废水处理设备正常运转时间（小时/年）/正常生产时间（小时/年）。原文件中描述污染物类别为废水，污染物指标为化学需氧量，此处对其进行了匹配工作，将其匹配到LCAflow库里面相最符合的流，污染物指标备注为化学需氧量
- Exhaust gas: 439, 1980 (2 entries)
  the treatment technology for the pollution of Exhaust gasdidn't offered
  污染物指标工业废气量的末端治理技术是－。原文件中描述污染物类别为废气，污染物指标为工业废气量，此处对其进行了匹配工作，将其匹配到LCAflow库里面相最符合的流，污染物指标备注为工业废气量

## Use advice
This dataset is derived from the Pollution Source Census Report and contains information on pollution emissions and related products. However, it does not include data on energy or chemical consumption, nor does it provide information on waste or co-product generation. When utilizing this dataset, please supplement the missing data based on actual conditions before use
该数据集来源于污染源普查报告，包含污染物排放及相关产品信息，但不包含能源或化学品消耗数据，也不提供废弃物或共生产物产生信息。在使用该数据集时，请根据实际情况补充缺失数据后再使用。

## Review details
Inventory: The internal review was done by several iteration steps concerning raw data validation, raw data documentation, representativity, completeness and consistency of modelling with regard to ISO 14040 and 14044.
清单： 内部审查通过几个迭代步骤完成，涉及原始数据验证、原始数据记录、代表性、完整性、与 ISO 14040 和 14044 有关的建模的一致性。

## Data sources
- 第二次全国污染源普查产排污核算系数手册（试用版）,二级代码38,四级代码3843文件，在完整版文件中第3413页
