# NGH mining ; Methane hydrate ; LCA and LCC analysis

Dataset: ILCD process, Unit process, single operation
Geography: GD-CN
Reference year: 2009
Classification: Unit processes / Energy carriers and technologies / Other non-renewable fuels
LCI method principle: Attributional
LCI method approaches: Consequential
Generated by: Shikang Kang, 908798159@qq.com
Owner: Tiangong LCI Data Working Group
Review: Dependent internal review by Tiangong LCI Data Working Group
Amounts: no units in this file; such an amount is in the reference unit of its flow, which a separate flow dataset defines
copyright: false
licenseType: Free of charge for all users and uses

## General comment
In this paper, LCA analysis of hydrate mining is carried out, and the most important process links and impact categories that affect the environment in its life cycle are obtained, the causes are analyzed, and reasonable improvement opinions are put forward

## Geography
Data development site

## Time period
Publication time of literature

## Technology and included processes
Using life cycle assessment (LCA) and life cycle cost analysis (LCC), the environmental effects and economic benefits of marine NGH exploitation are systematically analyzed and compared with those of natural gas (NG) exploitation. The results show that the acid gas emission from NGH mining is close to zero and the greenhouse gas emission is relatively small, and the life cycle cost of NGH mining is lower than that of NG mining.

## Technical purpose
Methane hydrate, extracted via NGH mining, is mainly used as an alternative energy source to natural gas. Its extraction process, which has been demonstrated as economically viable and environmentally less impactful in comparison to conventional natural gas production, is suitable for regions with identified high-grade, shallow, and concentrated NGH deposits. The methane produced can be utilized for energy generation, heating, and as feedstock in various chemical processes.

## Reference product
- methane (biogenic): 0.31; input; log-normal
  The original text has been distinguished as bio. Mining project cost, the data is distribution, the data filled in the quantity is the result of averaging (taking the median value)

## Outputs
All rows: log-normal
- methane (biogenic): 0.000623; measured
  The original text has been distinguished as bio. Exploitation engineering, the data is distribution, and the data filled in the quantity is the result of averaging (median value)
- methane (biogenic): 0.001; measured
  The original text has been distinguished as bio. Drilling engineering, the data is distribution, and the data filled in the quantity is the result of averaging (median value)
- methane (biogenic): 0.00099; measured
  The original text has been distinguished as bio. Surface engineering, the data is distribution, and the data filled in the quantity is the result of averaging (median value)
- methane (biogenic): 0.481; measured
  The original text has been distinguished as bio. Mining engineering, the data is distribution, and the data filled in the quantity is the result of averaging (median value)
- methane (biogenic): 0.484; calculated
  The original text has been distinguished as bio. Total, the data is distribution, and the data filled in the amount is the result of averaging (median value)

## Data selection and combination
Guangzhou Marine Geological Survey has carried out special hydrate investigation in Dongsha, Shenhu, Xisha and Qiongdongnan in the northern South China Sea for 9 years, and completed comprehensive investigation and research for 18 voyages. It has found a large number of cold spring carbonates and methane bacteria biota that live on natural gas. To a great extent, it can be judged that there are large leakage NGH deposits [5], which are characterized by high grade, shallow burial and concentrated distribution.

## Data treatment and extrapolations
The environmental and economic performance of NGH mining are comprehensively evaluated by using the life cycle method. Effective identification of key emissions and environmental impact potential, find out the most important environmental costs, and provide quantitative scientific basis for the selection of technical schemes. It shows that the mining of NGH is feasible.

## Use advice
When utilizing data from the LCA and LCC analysis of NGH mining, consider the context of the dataset's origin, including the environmental conditions of the Northern South China Sea, technological applicability, and specific geographical factors. Comparison to regional natural gas mining practices may be necessary to fully understand environmental and economic benefits. Methodological advice includes ensuring the inclusion of critical emissions and environmental impact potentials of NGH mining in environmental cost calculations, and considering these data points when making decisions on energy and resource utilization strategies.

## Review details
Inventory: The internal review was done by several iteration steps concerning raw data validation, raw data documentation, representativity, completeness and consistency of modelling with regard to ISO 14040 and 14044.

## Data sources
- 樊栓狮;梁华杰;郎雪梅;王燕鸿; 天然气水合物开采的全生命周期分析. 天然气化工(C1化学与化工) 73–78 (2010).
