# Soil remediation;soil vapor extraction;in-situ;construction;transportation;

Dataset: ILCD process, Unit process, single operation
Geography: KR
Reference year: 2011
Classification: Other Services / Repair and maintenance
Generated by: Lei Qiushuang, leiqs@caep.org.cn
Owner: Tiangong LCI Data Working Group
Review: Dependent internal review by Tiangong LCI Data Working Group
Amounts: no units in this file; such an amount is in the reference unit of its flow, which a separate flow dataset defines
copyright: false
licenseType: Free of charge for all users and uses

## General comment
All materials 99.8 ton, 30km round

## Technical purpose
The process described is intended for in-situ soil remediation using soil vapor extraction (SVE) techniques. This particular data set could be applied to environmental engineering projects that aim to clean contaminated land. The SVE method is often used where volatile organic compounds (VOCs) are present. The construction phase and transportation of materials are specific to projects that require the on-site setup of SVE systems and equipment.

## Reference product
- Equipment and Materials Arriving on Site: 99800; measured
  运输到场地的材料

## Inputs
- transport in t*km: 2994; measured

## Use advice
Users should consider the scope of their environmental remediation project when applying this data. It is essential to account for the transportation distance (30km round trip) and the mass of all materials (99.8 tons) when calculating the environmental impact. The data is only applicable to the construction phase of the SVE setup, and users should ensure compatibility with the relevant local environmental regulations and standards. The methodological advice includes considering the system boundaries to include or exclude upstream activities such as material production and downstream processes like maintenance.

## Review details
Inventory: The internal review was done by several iteration steps concerning raw data validation, raw data documentation, representativity, completeness and consistency of modelling with regard to ISO 14040 and 14044.

## Data sources
- Assessment of Environmental Impacts and CO2 Emissions from Soil Remediation Technologies using Life cycle Assessment - Case Studies on SVE and Biopile Systems
