# Soil remediation ; ex situ remediation ; soil leaching ; soil column leaching ; Humic Acid solution leaching

Dataset: ILCD process, Unit process, single operation
Geography: CN
Reference year: 2023
Classification: Unit processes / Other Services / Repair and maintenance
Generated by: Huang Yue, huangyue@caep.org.cn
Owner: Tiangong LCI Data Working Group
Review: Dependent internal review by Tiangong LCI Data Working Group
Amounts: no units in this file; such an amount is in the reference unit of its flow, which a separate flow dataset defines
copyright: false
licenseType: Free of charge for all users and uses

## General comment
Remediated soil columns were obtained by drenching the contaminated soil columns with a solution of muriatic acid

## Technical purpose
This industrial process is used for the purpose of soil remediation, specifically employing ex situ soil column leaching. A humic acid solution is used for leaching contaminated soil columns to obtain remediated soil. The method is typically applied in environmental engineering for cleaning soil that has been contaminated by pollutants or hazardous waste, making it suitable for safe disposal or reuse.

## Reference product
- Remediated soil columns: 0.0008

## Inputs
- Humic Acid: 0.0018
- Activated Carbon: 0.0251
- Tap Water: 0.00553
- Electricity: 0.432
- Contaminated soil columns: 0.0008

## Outputs
- quartz sand: 0.09
- polycyclic aromatic hydrocarbons: 0.00042, 0.0246 (2 entries)

## Use advice
When utilizing this dataset for Life Cycle Assessment, users must ensure that all major raw materials and energy consumption related to the process are adequately accounted for. Considerations should be given to the source of the humic acid solution and its effects on the overall environmental impact. If the remediation process yields by-products, their subsequent management must also be included in the assessment. Data users should model the use phase behavior considering the specific characteristics of the contaminants and the effectiveness of the remediation for different types of soil.

## Review details
Inventory: The internal review was done by several iteration steps concerning raw data validation, raw data documentation, representativity, completeness and consistency of modelling with regard to ISO 14040 and 14044.

## Data sources
- 张雅鑫 et al. 基于生命周期评价的焦化污染土壤 淋洗技术环境影响研究. 安全、健康和环境 23, (2023).
