# Urea ; Liquid ammonia, CO2 ; CO2 vapor extraction method, NH3 vapor extraction method ; All sizes; NESPS2 / 尿素 ; 液氨、CO2 ; CO2汽提法、NH3汽提法 ; 所有规模 ; 全国第二次污染普查数据

Dataset: ILCD process, Unit process, single operation
Geography: CN
Reference year: 2019
Classification: Reference Parameters / Materials production / Inorganic chemicals
Generated by: The data was created by the Office of the Second National Pollution Source Census of the Ministry of Ecology and Environment, and the data was organized by the TianGong Plan team for ILCD format / 生态环境部第二次全国污染源普查工作办公室创建数据，天工计划团队常慧敏整理数据为ILCD格式
Owner: Tiangong LCI Data Working Group / 天工LCI数据工作小组
Review: Dependent internal review by Tiangong LCI Data Working Group / 天工LCI数据工作小组
Amounts: no units in this file; such an amount is in the reference unit of its flow, which a separate flow dataset defines
copyright: false
licenseType: Free of charge for all users and uses

## General comment
the Technical of end-of-pipe management technology for pollution Ureais/，Its Technical efficiency of end-of-pipe management0

## Technical purpose
该数据集表示利用尿素以及液氨和二氧化碳(CO2)作为涉及汽提法的工业过程的一部分。包括CO2和NH3汽提法。适用于所有规模的氨和尿素生产单位。数据还包括针对废水控制的尾端管理技术，特别是对氨氮和有机结合氮。它表明使用水解吸附处理作为污染控制措施，并遵守化工制造厂等工业环境中的高技术效率标准。

## Reference product
- Urea: 1000; calculated
  源文件中描述为为尿素，此处对其进行了匹配工作，将其匹配到LCAflow库里面相最符合的流，污染物指标备注为工业废水量

## Outputs
- Nitrogen, organic bound: 0.0348; calculated
  the Technical of end-of-pipe management technology for pollution Nitrogen, organic boundisHydrolysis desorption treatment，Its Technical efficiency of end-of-pipe management99.92
  污染物指标总氮的末端治理技术是水解解吸处理法，其效率为99.92，末端治理设施实际运行率（k值）计算公式为k=治理设施运行时间(小时/年)/正常生产时间(小时/年)。原文件中描述污染物类别为废水，污染物指标为总氮，此处对其进行了匹配工作，将其匹配到LCAflow库里面相最符合的流，污染物指标备注为总氮
- Ammonia Nitrogen: 0.04488; calculated
  the Technical of end-of-pipe management technology for pollution Ammonia NitrogenisHydrolysis desorption treatment，Its Technical efficiency of end-of-pipe management99.89
  污染物指标氨氮的末端治理技术是水解解吸处理法，其效率为99.89，末端治理设施实际运行率（k值）计算公式为k=治理设施运行时间(小时/年)/正常生产时间(小时/年)。原文件中描述污染物类别为废水，污染物指标为氨氮，此处对其进行了匹配工作，将其匹配到LCAflow库里面相最符合的流，污染物指标备注为氨氮
- Waste water: 0.55; calculated
  the Technical of end-of-pipe management technology for pollution Waste wateris/，Its Technical efficiency of end-of-pipe management0
  污染物指标工业废水量的末端治理技术是/，其效率为0。原文件中描述污染物类别为废水，污染物指标为工业废水量，此处对其进行了匹配工作，将其匹配到LCAflow库里面相最符合的流，污染物指标备注为工业废水量

## Use advice
This dataset is derived from the Pollution Source Census Report and contains information on pollution emissions and related products. However, it does not include data on energy or chemical consumption, nor does it provide information on waste or co-product generation. When utilizing this dataset, please supplement the missing data based on actual conditions before use
该数据集来源于污染源普查报告，包含污染物排放及相关产品信息，但不包含能源或化学品消耗数据，也不提供废弃物或共生产物产生信息。在使用该数据集时，请根据实际情况补充缺失数据后再使用。

## Review details
Inventory: The internal review was done by several iteration steps concerning raw data validation, raw data documentation, representativity, completeness and consistency of modelling with regard to ISO 14040 and 14044.
清单： 内部审查通过几个迭代步骤完成，涉及原始数据验证、原始数据记录、代表性、完整性、与 ISO 14040 和 14044 有关的建模的一致性。

## Data sources
- 第二次全国污染源普查产排污核算系数手册（试用版）,二级代码26,四级代码2621文件，在完整版文件中第4111页
