# cement production;cement, common portland cement;dry rotary kiln, >4000 t/d;mixed solid wastes

Dataset: ILCD process, Unit process, black box
Geography: SD-CN
Classification: Materials production / Other mineralic materials
Generated by: Siqi Yang, ysqsophia@gmail.com
Owner: Tiangong LCI Data Working Group
Review: Dependent internal review by Tiangong LCI Data Working Group
Amounts: no units in this file; such an amount is in the reference unit of its flow, which a separate flow dataset defines
copyright: false
licenseType: Free of charge for all users and uses

## General comment
Large (dry rotary kiln with a production capacity higher than 4000 tons clinker/day).100% cement dust was recycled. 100% wastewater was reused on site.

## Geography
Shenfeng Cement Co., Ltd. (Shandong, China)

## Technical purpose
The data set describes a large-scale dry rotary kiln operation for the production of common Portland cement. This process is mainly applied for the generation of clinker at a rate higher than 4000 tons daily. The recycled cement dust and reused wastewater underscore an environmentally considerate manufacturing practice. The cement produced here is typically used in construction, and is the predominant form of cement in the Chinese market, comprising about 98% of the total cement production.

## Model description
Taking the production of 1 ton of ordinary Portland cement as a functional unit, this type of cement accounts for approximately 98% of total production in China.Dry rotary kiln system boundary. Three stages are usually considered, namely raw material crushing, clinker generation and cement mill. The clinker generation stage includes homogenization, preheating and precalcining as well as firing in the kiln. Each process takes into account raw materials, energy consumption, road transport, direct emissions (i.e. carbon dioxide, sulfur dioxide, nitrogen oxides and particulate matter) and infrastructure.

## Reference product
- cement, common portland cement: 1000
  Common Portland cement

## Inputs
- calcium carbonate: 1050
  Limestone
- gypsum: 50.51
  Gypsum
- water: 360
  Water
- sandstone: 54.81
  Sandstone
- Pyrite cinder: 14.64
- ash: 241.39
  Fly ash
- hard coal; 26.3 MJ/kg: 101.94
  Coal
- electricity, medium voltage: 294.948
  Electricity

## Outputs
- carbon dioxide: 620
  CO2. CO2 emission was calculated according to Eq.(Wu et al., 2006): E = 3:67a x k x Mcoal x Q + 0.38 x Mlimestone, where E, a, k, Mcoal, Q, and Mlimestone represent the amount of CO2 emission per ton of cement production, carbon oxygenation efficiency of coal (0.93, National Development and Reform Commission, 2011), carbon emission factor of coal (26.1 x 10-3, National Development and Reform Commission, 2011), mass of coal consumption per ton of cement production, caloric value of coal, and mass of limestone consumption per ton of cement production, respectively. The caloric value of coal considered in the present study was 24.48 MJ/kg.
- electricity, medium voltage: 0.023
  SO2. Direct air emission data were obtained from the Hongda Cement Plant (Yunnan, China).
- Nitrogen oxides: 0.19
  NOx. Direct air emission data were obtained from the Hongda Cement Plant (Yunnan, China).
- particles (> PM10): 0.065
  Particulates. The particle size is not specified. Here we treat it as PM>10. Direct air emission data were obtained from the Hongda Cement Plant (Yunnan, China).

## Data selection and combination
For the large-scale production scenario, annual statistical and monitoring data from Shenfeng Cement Co., Ltd. in Shandong Province, China, were used. Due to the lack of information on the former, direct atmospheric emission data come from Yunnan Hongda Cement Plant.

## Use advice
When using this data set for Life Cycle Assessment (LCA), ensure to include the complete system boundary spanning raw material crushing, clinker generation, and cement milling stages. Pay special attention to the allocation of environmental loads regarding the 100% recycling of cement dust and reuse of wastewater on-site. Methodological considerations should cover the sourcing of emission data due to reported information gaps, and adjustments may be required based on the technological differences between referenced facilities (Shenfeng Cement Co., Ltd. and Yunnan Hongda Cement Plant).

## Review details
Inventory: The internal review was done by several iteration steps concerning raw data validation, raw data documentation, representativity, completeness and consistency of modelling with regard to ISO 14040 and 14044.

## Data sources
- Wei Chen, Jinglan Hong, & Changqing Xu. (2015). Pollutants generated by cement production in China, their impacts, and the potential for environmental improvement. JOURNAL OF CLEANER PRODUCTION, 103, 61–69.
