# Steel products ; steel ; Primary steel production

Dataset: ILCD process, Unit process, single operation
Geography: JL-CN
Reference year: 2016
Classification: Unit processes / Materials production / Metals and semimetals
Generated by: Wanghuanyu, wanghuanyu00@126.com
Owner: Tiangong LCI Data Working Group
Review: Dependent internal review by Tiangong LCI Data Working Group
Amounts: no units in this file; such an amount is in the reference unit of its flow, which a separate flow dataset defines
copyright: false
licenseType: Free of charge for all users and uses

## General comment
This dataset represents the process of primary steel production, which involves the conversion of raw materials such as iron ore, limestone, and coke into crude steel. The steel products obtained from this process are used for a wide range of applications including construction, automobile manufacturing, shipbuilding, infrastructure, and the production of household appliances and machinery.

## Reference product
- iron: 1000; measured
  Steel

## Inputs
- Energy, geothermal, converted: 20491.9; measured
  standard coal

## Outputs
- phenol,Sulphur oxides (as SO2): 1.227; measured
- nitrogen monoxide: 2.324; measured

## Use advice
When using this dataset for Life Cycle Assessment, users should consider the specific technology and energy sources used in the primary steel production process, as they can significantly influence the environmental impacts. It's important to note whether the data reflects a specific geographical region and time period to ensure accuracy in LCA modeling. Recycling of steel should be accounted for, depending on the end-of-life scenario modeled. Users should be aware of the potential allocation procedures for co-products and by-products to ensure consistent and fair accounting in their environmental analyses.

## Review details
Inventory: The internal review was done by several iteration steps concerning raw data validation, raw data documentation, representativity, completeness and consistency of modelling with regard to ISO 14040 and 14044.

## Data sources
- 王宪恩, 栾天阳, 陈英姿, & 段海燕. 基于LCA的废旧资源循环利用节能减排效果评估模式与方法研究——以吉林省某钢铁企业为例. 中国人口·资源与环境 26, 69–77 (2016).
