# Watermelon production

Dataset: ILCD process, Unit process, black box
Geography: IR
Reference year: 2012
Valid until: 2013
Classification: Unit processes / Materials production / Agricultural production means
Functional unit: One hectare of watermelon land
Generated by: zhu xian, zzhu0918@163.com
Owner: Tiangong LCI Data Working Group
Review: Dependent internal review by Tiangong LCI Data Working Group
Amounts: no units in this file; such an amount is in the reference unit of its flow, which a separate flow dataset defines
copyright: false
licenseType: Free of charge for all users and uses

## General comment
The preparation of watermelon seeds and materials before planting, the process of sowing and watering and fertilization after planting, as well as the harvest of watermelon.

## Geography
Kerman province,central Iran. specifically in the city of Jiroft in the south of the province

## Technical purpose
The data set describes the cultivation process of watermelons in Jiroft city, Kerman province, central Iran. It encompasses the entire cultivation cycle including preparation of watermelon seeds and materials before planting, sowing, watering, and fertilization post-planting, as well as the harvesting of watermelons from one hectare of land. This information is applicable for agricultural scientists, horticulturists, and environmental analysts interested in the life cycle assessment of watermelon production for research, agricultural planning, and environmental impact studies.

## Reference product
- Watermelon: 19945; measured

## Inputs
All rows: measured
- Nitrogenous fertilizer: 159.3
- Phosphate fertilizer: 145.5
- Potassium fertilizer: 148.8
- Farmyard manure: 162.5
- Electricity: 32570.3
- Labor: 10.7208
- diesel oil: 0.0626
- waste incineration of plastics (rigid PVC): 84.1
- Seeds: 1.5

## Use advice
When utilizing this data set for Life Cycle Assessment, users should take into account the specific agricultural practices of the Jiroft region within the Kerman province. The data is representative for large-scale watermelon cultivation in arid regions, but adjustments may be necessary to align with local agricultural conditions elsewhere. Pay attention to the system boundaries: Data includes practices from pre-planting preparation to harvest but excludes post-harvest processing and distribution. When modeling system expansion or substitution, include potential co-products or waste treatment methods specific to this region's practices.

## Review details
Inventory: The internal review was done by several iteration steps concerning raw data validation, raw data documentation, representativity, completeness and consistency of modelling with regard to ISO 14040 and 14044.
