# Electro-silver ; Anode clay ; Combined beneficiation and metallurgy method ; All sizes; NESPS2 / 电银 ; 阳极泥 ; 选冶联合法 ; 所有规模 ; 全国第二次污染普查数据

Dataset: ILCD process, Unit process, single operation
Geography: CN
Reference year: 2019
Classification: Reference Parameters / Materials production / Metals and semimetals
Generated by: The data was created by the Office of the Second National Pollution Source Census of the Ministry of Ecology and Environment, and the data was organized by the TianGong Plan team for ILCD format / 生态环境部第二次全国污染源普查工作办公室创建数据，天工计划团队常慧敏整理数据为ILCD格式
Owner: Tiangong LCI Data Working Group / 天工LCI数据工作小组
Review: Dependent internal review by Tiangong LCI Data Working Group / 天工LCI数据工作小组
Amounts: no units in this file; such an amount is in the reference unit of its flow, which a separate flow dataset defines
copyright: false
licenseType: Free of charge for all users and uses

## General comment
the Technical of end-of-pipe management technology for pollution Exhaust gasis/

## Technical purpose
本工艺涉及综合银提取及纯化工业程序，包括选冶两个步骤，适用于各种规模的操作。数据集代表了一种用于处理废水和废气末端管理技术，通过化学沉淀、化学混凝、碱喷雾、（双）碱过程、石灰/石膏法、石灰石/石膏法、湿式沉淀（包含喷雾塔和动力波）、静电沉淀和组合除尘技术去除污染物，如化学需氧量(COD)、氨氮、有机氮、镉、铅、砷、氮氧化物、二氧化硫和颗粒物(PM2.5 - PM10)。这项技术在确保银提取行业符合环境标准方面至关重要。

## Reference product
- Telegraphic Transfer: 1000; calculated
  源文件中描述为为电银，此处对其进行了匹配工作，将其匹配到LCAflow库里面相最符合的流，污染物指标备注为工业废水量

## Outputs
All rows: calculated
- particles (PM2.5 - PM10): 2.39955
  the Technical of end-of-pipe management technology for pollution particles (PM2.5 - PM10)isCombined dust removal (two-stage dynamic wave + wet demisting)，Its Technical efficiency of end-of-pipe management99.5
  污染物指标颗粒物的末端治理技术是组合除尘（二级动力波+湿式除雾），其效率为99.5，末端治理设施实际运行率（k值）计算公式为k=废气治理设施年正常运行时间（小时）/企业年正常生产时间（小时）。原文件中描述污染物类别为废气，污染物指标为颗粒物，此处对其进行了匹配工作，将其匹配到LCAflow库里面相最符合的流，污染物指标备注为颗粒物
- cadmium: 0.002592
  the Technical of end-of-pipe management technology for pollution cadmiumisChemical coagulation，Its Technical efficiency of end-of-pipe management95
  污染物指标镉的末端治理技术是化学混凝法，其效率为95，末端治理设施实际运行率（k值）计算公式为k=废水治理设施年正常运行时间（小时）/企业年正常生产时间（小时）。原文件中描述污染物类别为废水，污染物指标为镉，此处对其进行了匹配工作，将其匹配到LCAflow库里面相最符合的流，污染物指标备注为镉
- Nitrogen oxides: 3.15
  the Technical of end-of-pipe management technology for pollution Nitrogen oxidesis/
  污染物指标氮氧化物的末端治理技术是/，末端治理设施实际运行率（k值）计算公式为k=废气治理设施年正常运行时间（小时）/企业年正常生产时间（小时）。原文件中描述污染物类别为废气，污染物指标为氮氧化物，此处对其进行了匹配工作，将其匹配到LCAflow库里面相最符合的流，污染物指标备注为氮氧化物
- sulfur dioxide: 4.01
  the Technical of end-of-pipe management technology for pollution sulfur dioxideisDouble alkali process，Its Technical efficiency of end-of-pipe management90
  污染物指标二氧化硫的末端治理技术是双碱法，其效率为90，末端治理设施实际运行率（k值）计算公式为k=废气治理设施年正常运行时间（小时）/企业年正常生产时间（小时）。原文件中描述污染物类别为废气，污染物指标为二氧化硫，此处对其进行了匹配工作，将其匹配到LCAflow库里面相最符合的流，污染物指标备注为二氧化硫
- sulfur dioxide: 4.01
  the Technical of end-of-pipe management technology for pollution sulfur dioxideisOthers (alkali spray)，Its Technical efficiency of end-of-pipe management90
  污染物指标二氧化硫的末端治理技术是其它（碱喷淋），其效率为90，末端治理设施实际运行率（k值）计算公式为k=废气治理设施年正常运行时间（小时）/企业年正常生产时间（小时）。原文件中描述污染物类别为废气，污染物指标为二氧化硫，此处对其进行了匹配工作，将其匹配到LCAflow库里面相最符合的流，污染物指标备注为二氧化硫
- particles (PM2.5 - PM10): 4.7991
  the Technical of end-of-pipe management technology for pollution particles (PM2.5 - PM10)isWet precipitation (dynamic wave)，Its Technical efficiency of end-of-pipe management99
  污染物指标颗粒物的末端治理技术是湿法除尘（动力波），其效率为99，末端治理设施实际运行率（k值）计算公式为k=废气治理设施年正常运行时间（小时）/企业年正常生产时间（小时）。原文件中描述污染物类别为废气，污染物指标为颗粒物，此处对其进行了匹配工作，将其匹配到LCAflow库里面相最符合的流，污染物指标备注为颗粒物
- sulfur dioxide: 6.015
  the Technical of end-of-pipe management technology for pollution sulfur dioxideisLime/gypsum method，Its Technical efficiency of end-of-pipe management85
  污染物指标二氧化硫的末端治理技术是石灰/石膏法，其效率为85，末端治理设施实际运行率（k值）计算公式为k=废气治理设施年正常运行时间（小时）/企业年正常生产时间（小时）。原文件中描述污染物类别为废气，污染物指标为二氧化硫，此处对其进行了匹配工作，将其匹配到LCAflow库里面相最符合的流，污染物指标备注为二氧化硫
- cadmium: 0.007776
  the Technical of end-of-pipe management technology for pollution cadmiumisChemical precipitation，Its Technical efficiency of end-of-pipe management85
  污染物指标镉的末端治理技术是化学沉淀法，其效率为85，末端治理设施实际运行率（k值）计算公式为k=废水治理设施年正常运行时间（小时）/企业年正常生产时间（小时）。原文件中描述污染物类别为废水，污染物指标为镉，此处对其进行了匹配工作，将其匹配到LCAflow库里面相最符合的流，污染物指标备注为镉
- sulfur dioxide: 8.02
  the Technical of end-of-pipe management technology for pollution sulfur dioxideisLimestone/gypsum method，Its Technical efficiency of end-of-pipe management80
  污染物指标二氧化硫的末端治理技术是石灰石/石膏法，其效率为80，末端治理设施实际运行率（k值）计算公式为k=废气治理设施年正常运行时间（小时）/企业年正常生产时间（小时）。原文件中描述污染物类别为废气，污染物指标为二氧化硫，此处对其进行了匹配工作，将其匹配到LCAflow库里面相最符合的流，污染物指标备注为二氧化硫
- particles (PM2.5 - PM10): 23.9955
  the Technical of end-of-pipe management technology for pollution particles (PM2.5 - PM10)isElectrostatic precipitation (wet demisting)，Its Technical efficiency of end-of-pipe management95
  污染物指标颗粒物的末端治理技术是静电除尘（湿式除雾），其效率为95，末端治理设施实际运行率（k值）计算公式为k=废气治理设施年正常运行时间（小时）/企业年正常生产时间（小时）。原文件中描述污染物类别为废气，污染物指标为颗粒物，此处对其进行了匹配工作，将其匹配到LCAflow库里面相最符合的流，污染物指标备注为颗粒物
- arsenic: 0.0468505
  the Technical of end-of-pipe management technology for pollution arsenicisChemical coagulation，Its Technical efficiency of end-of-pipe management95
  污染物指标砷的末端治理技术是化学混凝法，其效率为95，末端治理设施实际运行率（k值）计算公式为k=废水治理设施年正常运行时间（小时）/企业年正常生产时间（小时）。原文件中描述污染物类别为废水，污染物指标为砷，此处对其进行了匹配工作，将其匹配到LCAflow库里面相最符合的流，污染物指标备注为砷
- particles (PM2.5 - PM10): 47.991
  the Technical of end-of-pipe management technology for pollution particles (PM2.5 - PM10)isWet precipitation (spray tower)，Its Technical efficiency of end-of-pipe management90
  污染物指标颗粒物的末端治理技术是湿法除尘（喷淋塔），其效率为90，末端治理设施实际运行率（k值）计算公式为k=废气治理设施年正常运行时间（小时）/企业年正常生产时间（小时）。原文件中描述污染物类别为废气，污染物指标为颗粒物，此处对其进行了匹配工作，将其匹配到LCAflow库里面相最符合的流，污染物指标备注为颗粒物
- lead: 0.053457
  the Technical of end-of-pipe management technology for pollution leadisChemical coagulation，Its Technical efficiency of end-of-pipe management95
  污染物指标铅的末端治理技术是化学混凝法，其效率为95，末端治理设施实际运行率（k值）计算公式为k=废水治理设施年正常运行时间（小时）/企业年正常生产时间（小时）。原文件中描述污染物类别为废水，污染物指标为铅，此处对其进行了匹配工作，将其匹配到LCAflow库里面相最符合的流，污染物指标备注为铅
- Waste water: 116930
  the Technical of end-of-pipe management technology for pollution Waste wateris/
  污染物指标工业废水量的末端治理技术是/，末端治理设施实际运行率（k值）计算公式为k=废水治理设施年正常运行时间（小时）/企业年正常生产时间（小时）。原文件中描述污染物类别为废水，污染物指标为工业废水量，此处对其进行了匹配工作，将其匹配到LCAflow库里面相最符合的流，污染物指标备注为工业废水量
- arsenic: 0.140551
  the Technical of end-of-pipe management technology for pollution arsenicisChemical precipitation，Its Technical efficiency of end-of-pipe management85
  污染物指标砷的末端治理技术是化学沉淀法，其效率为85，末端治理设施实际运行率（k值）计算公式为k=废水治理设施年正常运行时间（小时）/企业年正常生产时间（小时）。原文件中描述污染物类别为废水，污染物指标为砷，此处对其进行了匹配工作，将其匹配到LCAflow库里面相最符合的流，污染物指标备注为砷
- lead: 0.160371
  the Technical of end-of-pipe management technology for pollution leadisChemical precipitation，Its Technical efficiency of end-of-pipe management85
  污染物指标铅的末端治理技术是化学沉淀法，其效率为85，末端治理设施实际运行率（k值）计算公式为k=废水治理设施年正常运行时间（小时）/企业年正常生产时间（小时）。原文件中描述污染物类别为废水，污染物指标为铅，此处对其进行了匹配工作，将其匹配到LCAflow库里面相最符合的流，污染物指标备注为铅
- Ammonia Nitrogen: 0.608048
  the Technical of end-of-pipe management technology for pollution Ammonia NitrogenisChemical coagulation，Its Technical efficiency of end-of-pipe management20
  污染物指标氨氮的末端治理技术是化学混凝法，其效率为20，末端治理设施实际运行率（k值）计算公式为k=废水治理设施年正常运行时间（小时）/企业年正常生产时间（小时）。原文件中描述污染物类别为废水，污染物指标为氨氮，此处对其进行了匹配工作，将其匹配到LCAflow库里面相最符合的流，污染物指标备注为氨氮
- Ammonia Nitrogen: 0.684054
  the Technical of end-of-pipe management technology for pollution Ammonia NitrogenisChemical precipitation，Its Technical efficiency of end-of-pipe management10
  污染物指标氨氮的末端治理技术是化学沉淀法，其效率为10，末端治理设施实际运行率（k值）计算公式为k=废水治理设施年正常运行时间（小时）/企业年正常生产时间（小时）。原文件中描述污染物类别为废水，污染物指标为氨氮，此处对其进行了匹配工作，将其匹配到LCAflow库里面相最符合的流，污染物指标备注为氨氮
- chemical oxygen demand: 1.00795
  the Technical of end-of-pipe management technology for pollution chemical oxygen demandisChemical coagulation，Its Technical efficiency of end-of-pipe management70
  污染物指标化学需氧量的末端治理技术是化学混凝法，其效率为70，末端治理设施实际运行率（k值）计算公式为k=废水治理设施年正常运行时间（小时）/企业年正常生产时间（小时）。原文件中描述污染物类别为废水，污染物指标为化学需氧量，此处对其进行了匹配工作，将其匹配到LCAflow库里面相最符合的流，污染物指标备注为化学需氧量
- Nitrogen, organic bound: 1.10664
  the Technical of end-of-pipe management technology for pollution Nitrogen, organic boundisChemical coagulation，Its Technical efficiency of end-of-pipe management20
  污染物指标总氮的末端治理技术是化学混凝法，其效率为20，末端治理设施实际运行率（k值）计算公式为k=废水治理设施年正常运行时间（小时）/企业年正常生产时间（小时）。原文件中描述污染物类别为废水，污染物指标为总氮，此处对其进行了匹配工作，将其匹配到LCAflow库里面相最符合的流，污染物指标备注为总氮
- Nitrogen, organic bound: 1.24497
  the Technical of end-of-pipe management technology for pollution Nitrogen, organic boundisChemical precipitation，Its Technical efficiency of end-of-pipe management10
  污染物指标总氮的末端治理技术是化学沉淀法，其效率为10，末端治理设施实际运行率（k值）计算公式为k=废水治理设施年正常运行时间（小时）/企业年正常生产时间（小时）。原文件中描述污染物类别为废水，污染物指标为总氮，此处对其进行了匹配工作，将其匹配到LCAflow库里面相最符合的流，污染物指标备注为总氮
- chemical oxygen demand: 2.0159
  the Technical of end-of-pipe management technology for pollution chemical oxygen demandisChemical precipitation，Its Technical efficiency of end-of-pipe management40
  污染物指标化学需氧量的末端治理技术是化学沉淀法，其效率为40，末端治理设施实际运行率（k值）计算公式为k=废水治理设施年正常运行时间（小时）/企业年正常生产时间（小时）。原文件中描述污染物类别为废水，污染物指标为化学需氧量，此处对其进行了匹配工作，将其匹配到LCAflow库里面相最符合的流，污染物指标备注为化学需氧量
- Exhaust gas: 121426
  the Technical of end-of-pipe management technology for pollution Exhaust gasis/
  污染物指标工业废气量的末端治理技术是/，末端治理设施实际运行率（k值）计算公式为k=废气治理设施年正常运行时间（小时）/企业年正常生产时间（小时）。原文件中描述污染物类别为废气，污染物指标为工业废气量，此处对其进行了匹配工作，将其匹配到LCAflow库里面相最符合的流，污染物指标备注为工业废气量

## Use advice
This dataset is derived from the Pollution Source Census Report and contains information on pollution emissions and related products. However, it does not include data on energy or chemical consumption, nor does it provide information on waste or co-product generation. When utilizing this dataset, please supplement the missing data based on actual conditions before use
该数据集来源于污染源普查报告，包含污染物排放及相关产品信息，但不包含能源或化学品消耗数据，也不提供废弃物或共生产物产生信息。在使用该数据集时，请根据实际情况补充缺失数据后再使用。

## Review details
Inventory: The internal review was done by several iteration steps concerning raw data validation, raw data documentation, representativity, completeness and consistency of modelling with regard to ISO 14040 and 14044.
清单： 内部审查通过几个迭代步骤完成，涉及原始数据验证、原始数据记录、代表性、完整性、与 ISO 14040 和 14044 有关的建模的一致性。

## Data sources
- 第二次全国污染源普查产排污核算系数手册（试用版）,四级代码3222文件，在完整版文件中第5093页
