# Soil and Groundwater Remediation;In Situ;Soil Bioventilation;Remediated soil

Dataset: ILCD process, Unit process, single operation
Geography: US
Reference year: 2009
Classification: Unit processes / Other Services / Repair and maintenance
Generated by: Wang Ning, wang_ning@caep.org.cn
Owner: Tiangong LCI Data Working Group
Review: Dependent internal review by Tiangong LCI Data Working Group
Amounts: no units in this file; such an amount is in the reference unit of its flow, which a separate flow dataset defines
copyright: false
licenseType: Free of charge for all users and uses

## General comment
Remediation of contaminated soil using electricity to run a bioventilation system

## Technology and included processes
Remediation of contaminated soil using electrically powered soil aeration systems

## Technical purpose
This industrial process is specifically designed for environmental restoration purposes. It is applied in situ for the remediation of contaminated soils through bioventilation, utilizing electrically powered systems to achieve soil decontamination. This process is commonly used in environmental engineering fields where soil pollution is a concern and remediation is necessary to recover the soil's natural state and functionality.

## Reference product
- Remediated soil: 1; estimated

## Inputs
- Electricity: 63072; estimated
- contaminated soil: 1; estimated
- injection well: 1; estimated

## Use advice
When utilizing this dataset for Life Cycle Assessment, it is crucial to ensure that the scope of the assessment includes the electrical energy consumption during the bioventilation remediation process. Users must account for the quality and source of the input electricity. Additionally, it is essential to consider the state of the contaminated soil before remediation and its potential uses after being treated. The dataset should not be used for processes that involve different remediation technologies or differ significantly from the described bioventilation approach. End-of-life treatments or recycling of materials should also be considered if applicable.

## Review details
Inventory: The internal review was done by several iteration steps concerning raw data validation, raw data documentation, representativity, completeness and consistency of modelling with regard to ISO 14040 and 14044.

## Data sources
- Dhaliwal, H. Sustainable site remediation : a life cycle assessment approach.
