# clinker production;clinker;precalciner kiln

Dataset: ILCD process, Unit process, single operation
Geography: CN
Classification: Unit processes / Materials production / Other mineralic materials
Generated by: #REF!, ysqsophia@gmail.com
Owner: Tiangong LCI Data Working Group
Review: Dependent internal review by Tiangong LCI Data Working Group
Amounts: no units in this file; such an amount is in the reference unit of its flow, which a separate flow dataset defines
copyright: false
licenseType: Free of charge for all users and uses

## General comment
The precalciner kiln is taken as the research object.

## Technical purpose
The data set represents the process of cement clinker production using a common precalciner kiln. The cement clinker produced is typically used in the construction industry as a raw material in the production of cement, which is a fundamental ingredient in concrete, mortar, and other building materials.

## Model description
The functional unit is 1 ton of cement clinker. Research scope: cement calcination.

## Reference product
- clinker: 1000
  Clinker

## Inputs
- limestone, crushed, for mill: 1207.3
  Limestone
- clay: 282.4
  Clay
- iron, powder: 28.2
  Iron powder
- hard coal; 26.3 MJ/kg: 133.3
  Coal-fired. The energy consumption data comes from the literature. The coal -fired thermal value is calculated at 5500kcal/kg, and the fixed carbon is calculated at 50%.
- Electricity: 312.66
  Electric. The energy consumption data comes from the literature.

## Outputs
- carbon dioxide (fossil): 752.53
  CO2. Coal-generated CO2 is calculated based on fixed carbon, while raw material CO2 is calculated based on calcium carbonate (CaO) content at 50%.
- carbon monoxide (fossil): 4.5
  CO. Due to lack of sources, other pollution data is obtained by reference to coal-fired power plants converted by energy consumption.
- sulfur dioxide: 0.0869
  SO2. NOx and SO2 levels are calculated based on average emission factors in the building materials industry.
- Nitrogen oxides: 0.5545
  NOx. NOx and SO2 levels are calculated based on average emission factors in the building materials industry.
- hydrocarbons (unspecified): 0.0226
  CxHy. Due to lack of sources, other pollution data is obtained by reference to coal-fired power plants converted by energy consumption.

## Use advice
Users of this data set should account for the specific conditions and emissions associated with the use of a precalciner kiln for clinker production when modeling environmental impacts. The functional unit is defined as 1 ton of cement clinker; users should ensure their calculations are normalized to this functional unit. Note that any subsequent processes such as grinding, blending, and other additives mixing post-clinker production should be considered separately if included in the scope of the Life Cycle Assessment.

## Review details
Inventory: The internal review was done by several iteration steps concerning raw data validation, raw data documentation, representativity, completeness and consistency of modelling with regard to ISO 14040 and 14044.

## Data sources
- 刘顺妮. (2003). 水泥-混凝土体系环境影响评价及其应用研究 [博士, 武汉理工大学].
