# Electricity production ; Electricity mix ; Henan

Dataset: ILCD process, Unit process, single operation
Geography: HEN-CN
Reference year: 2019
Classification: Unit processes / Energy carriers and technologies / Electricity
Generated by: Ruoxi Xiong, xiongrx0126@163.com
Owner: Tiangong LCI Data Working Group
Review: Dependent internal review by Tiangong LCI Data Working Group
Amounts: no units in this file; such an amount is in the reference unit of its flow, which a separate flow dataset defines
copyright: false
licenseType: Free of charge for all users and uses

## General comment
Electricity mix includes thermal, hydro, wind, nuclear and solar generation

## Technical purpose
The electricity mix from Henan is utilized for a diverse array of applications including residential, commercial, and industrial purposes. The mix encompasses various forms of generation such as thermal (coal, gas, oil), hydroelectric, wind, nuclear, and solar power, reflecting the comprehensive nature of the power generation in this region. This dataset represents the electricity profile of Henan and can be used to evaluate the environmental impact of consuming electricity in this province for different end-uses.

## Reference product
- Electricity: 3.6; missing unimportant
  [{'text': '能量', 'type': 'text'}]

## Inputs
All rows: missing unimportant
- electricity for thermal power: 3.18248
  [{'text': '能量', 'type': 'text'}]
- electricity from hydroelectric power plant: 0.180716
  [{'text': '能量', 'type': 'text'}]
- electricity for nuclear power: 0
  [{'text': '能量', 'type': 'text'}]
- electricity from wind power: 0.109678
  [{'text': '能量', 'type': 'text'}]
- electricity for solar power: 0.127123
  [{'text': '能量', 'type': 'text'}]

## Use advice
When applying this dataset in a Life Cycle Assessment (LCA), users should account for the average energy mix of Henan as represented by the data. It is important to note regional variations of energy sources may lead to differences in environmental impacts. Consider the temporal aspects that may influence energy mix, such as seasonal availability of hydroelectric power. If the assessment is focused on a specific sector, align the use of this dataset with sector-specific energy consumption patterns. For methodological consistency, users should also consider the technology and energy efficiencies relative to the year the data was collected.

## Review details
Inventory: The internal review was done by several iteration steps concerning raw data validation, raw data documentation, representativity, completeness and consistency of modelling with regard to ISO 14040 and 14044.

## Data sources
- 能源统计年鉴2020
