# Soil Remediation;In-situ Remediation;Thermal Desorption;Case 2;Contaminated Soil Excavation;Excavated Soil

Dataset: ILCD process, Unit process, single operation
Geography: FI
Reference year: 2017
Classification: Unit processes / Other Services / Repair and maintenance
Generated by: Wang Ning, wang_ning@caep.org.cn
Owner: Tiangong LCI Data Working Group
Review: Dependent internal review by Tiangong LCI Data Working Group
Amounts: no units in this file; such an amount is in the reference unit of its flow, which a separate flow dataset defines
copyright: false
licenseType: Free of charge for all users and uses

## General comment
Use of excavators to dig out contaminated soil

## Technology and included processes
The volume of contaminated soil free site is 45,916 m3, the efficiency of the excavator is 44.6 m3/h, and the fuel consumption is 22l/h.

## Technical purpose
The process described is used for environmental remediation, specifically for the excavation and thermal desorption of contaminated soil in situations where in-situ treatment is not feasible or effective. This process is typically applied in case of significant soil contamination, requiring the excavation of large volumes of soil for subsequent decontamination. The excavated soil is then treated using thermal desorption techniques to remove pollutants before the soil is considered clean and potentially reusable.

## Reference product
- Excavated soil,Excavated soil: 45916; measured

## Inputs
- Diesel,Diesel: 22.6492; measured

## Use advice
Users of this dataset should ensure that the LCA data appropriately represents the process of excavating and treating contaminated soil from a similar site with comparable levels of pollution and soil volume. It is crucial to account for all energy inputs, including fuel consumption of the excavators, and any additional transportation or energy required for the thermal desorption phase. When incorporating this data into a broader LCA model, users should consider the potential for material recovery and the environmental impact of the final disposal of the decontaminated soil. The technological applicability of the data should be reviewed to ensure compliance with local environmental regulations and treatment standards.

## Review details
Inventory: The internal review was done by several iteration steps concerning raw data validation, raw data documentation, representativity, completeness and consistency of modelling with regard to ISO 14040 and 14044.

## Data sources
- Song, Y. et al. Environmental and socio-economic sustainability appraisal of contaminated land remediation strategies: A case study at a mega-site in China. Science of The Total Environment 610–611, 391–401 (2018).
