# Steel rolling ; crude steel ; hot rolling

Dataset: ILCD process, Unit process, single operation
Geography: CN
Reference year: 2020
Classification: Unit processes / Materials production / Metals and semimetals
Generated by: Jiwei, 1299801467@qq.com
Owner: Tiangong LCI Data Working Group
Review: Dependent internal review by Tiangong LCI Data Working Group
Amounts: no units in this file; such an amount is in the reference unit of its flow, which a separate flow dataset defines
copyright: false
licenseType: Free of charge for all users and uses

## General comment
The data set represents the hot rolling process of crude steel in steel manufacturing. It is typically applied in the initial phase of steel production where crude steel is processed into semi-finished products such as plates, sheets, or strips through the hot rolling technique. These semi-finished steel products are subsequently used in various industries for the fabrication of construction materials, automotive components, pipelines, and machinery manufacturing.

## Time period
论文提到钢铁企业环境总体数据为1998年的吨钢环境基础数据。

## Reference product
- Steel hot rolled coil: 1000; calculated

## Inputs
All rows: calculated
- freshwater,freshwater: 600
- compressed air: 20
- Refractory: 0.6
- oxygen: 0.1
- Electricity: 432
- Blast furnace gas: 74

## Outputs
- carbon dioxide (fossil): 70.2; calculated
  原文未区分bio和fossil，根据专家判断此处为carbon dioxide (fossil)
- sulfur dioxide: 0.15; calculated
- Nitrogen oxides: 0.13; calculated
- Sinter / Pellet Dust: 0.02; calculated

## Use advice
When using this data set for Life Cycle Assessment (LCA), users should pay attention to the base year of the environmental data which is 1998. This reflects the technological practices and environmental impacts associated with that time period. Users must consider the temporal relevance of the data and update the data to reflect current technology and environmental regulations if necessary. Additionally, for an accurate LCA, users should include energy consumption, emissions, and waste generated from the hot rolling process. It is also critical to account for potential co-product allocation and recycling practices within the steel production life cycle.

## Review details
Inventory: The internal review was done by several iteration steps concerning raw data validation, raw data documentation, representativity, completeness and consistency of modelling with regard to ISO 14040 and 14044.

## Data sources
- 梁田. 基于生命周期评价的典型钢铁企业环境影响评估及绿色发展研究. (郑州大学, 2020).
