# East China (Hentai) Corn Production ; Corn Cultivation (N1)

Dataset: ILCD process, Partly terminated system
Geography: ZB-SD-CN
Reference year: 2003
Valid until: 2004
Classification: Unit processes / Materials production / Food and renewable raw materials
Functional unit: 1t
Generated by: Haoran Zhang, hrzhang@whu.edu.cn
Owner: Tiangong LCI Data Working Group
Review: Dependent internal review by Tiangong LCI Data Working Group
Amounts: no units in this file; such an amount is in the reference unit of its flow, which a separate flow dataset defines
copyright: false
licenseType: Free of charge for all users and uses

## General comment
This paper divides the research object into three stages , that is, raw material mining and transportation stage, agricultural chemical production and transportation stage and summer maize interfield planting stage , which are respectively referred to as raw material stage, agricultural material stage and planting stage. The impact of raw material stage includes energy and resource consumption and pollution emission caused by mineral and fossil energy exploitation. The effects of the agricultural phase include the large energy consumption and the discharge of waste water, waste gas and pollutants caused by the production of agricultural chemicals; The effects of planting stage include fuel, electricity and water consumption caused by management measures such as land preparation, irrigation, fertilization and pest control, and pollutant discharge from runoff, leaching and volatilization. The main influence of the transport process at each stage is fuel consumption and the resulting exhaust emissions.

## Geography
Hengtai County

## Technology and included processes
According to the LCA principles and framework proposed by ISO (2006) the LCA consists of four interrelated phases : Goal definition and scoping, inventory analysis, impactassessment and life cycle interpretation

## Technical purpose
The data set provided pertains to corn cultivation in Hengtai County, East China, with an emphasis on a life cycle assessment of the environmental impacts during the raw material, agricultural input, and planting stages. It is intended for use in environmental performance evaluation, policy-making, and optimization of agricultural practices, particularly focusing on the consumption of resources and emissions of pollutants such as SO2, CH4, CO2, CO, N2O, COD, NH3, and NOx during corn production.

## Reference product
- maize grain: 1000; measured

## Outputs
All rows: measured
- water: 192
  N1
- carbon monoxide (fossil): 0.21
  N1
- Nitrogen oxides: 0.18, 2.13 (2 entries)
  N1
- carbon dioxide (fossil),carbon dioxide (fossil): 979.07
  N1
- methane (fossil),methane (fossil): 0.67
  N1
- sulfur dioxide: 1.5
  N1
- ammonia: 2.06
  N1
- nitrate: 0.5
  N1
- ammonium: 0.26
  N1
- nitrogen, total (excluding N2): 0.02
  N1
- phosphorus, total: 0.03
  N1
- chemical oxygen demand: 0.19
  N1

## Deviations from the LCI method approaches
The study starts from the mining of ores and energy related to the life cycle of summer maize. The termination boundary is the output of pollutants and agricultural products during crop planting management." "The accounting system boundary i

## Data selection and combination
The energy and water consumption in the raw material and agricultural input stages are based on the 'China Statistical Yearbook' (2005-2008), 'China Environmental Yearbook' (2004-2006), and 'China Energy Statistical Yearbook' (2004-2006). The data related to the planting stage comes from field records. Main atmospheric pollutants and water pollutants include SO2, CH4, CO2, CO, N2O, COD, NH3, and NOx, etc. The emission coefficients come from domestic publicly published literature

## Data treatment and extrapolations
Divided into three steps: characterization, normalization, and weighted assessment."

## Sampling procedure
Four nitrogen application treatments from the fertilizer experiment of summer maize in 2003-2004 at the Shandong Hantai Experimental Station of China Agricultural University were selected as typical research subjects. The four nitrogen fertilizer application rates were 0, 100, 200, 300 kg·hm-2·a-1, represented as N0, N1, N2, N3 respectively.

## Use advice
When utilizing this data for Life Cycle Assessment (LCA) of East China's corn production, users must consider the specified nitrogen application rates (N0, N1, N2, N3) as part of the methodological boundary. It is crucial to include emissions from mining, agrochemical production, and various stages of cultivation. Ensure the adoption of the emission coefficients from cited sources for accurate assessment. The methodology should follow the three steps of characterization, normalization, and weighted assessment, acknowledging the energy, water, and emissions as described.

## Review details
Inventory: The internal review was done by several iteration steps concerning raw data validation, raw data documentation, representativity, completeness and consistency of modelling with regard to ISO 14040 and 14044.

## Data sources
- 王明新,吴文良,夏训峰. 2010. 华北高产粮区夏玉米生命周期环境影响评价 [J]. 环境科学学报 30(6): 1339—1344
