# Canned soybeans in ketchup ; Soybeans ; Soaking + pre-cooking + exhaust + sealing and sterilization + tank storage ; All sizes; NESPS2 / 茄汁黄豆罐头 ; 黄豆 ; 浸泡+预煮+排气+密封杀菌+罐藏 ; 所有规模 ; 全国第二次污染普查数据

Dataset: ILCD process, Unit process, single operation
Geography: CN
Reference year: 2019
Classification: Reference Parameters / Materials production / Food and renewable raw materials
Generated by: The data was created by the Office of the Second National Pollution Source Census of the Ministry of Ecology and Environment, and the data was organized by the TianGong Plan team for ILCD format / 生态环境部第二次全国污染源普查工作办公室创建数据，天工计划团队常慧敏整理数据为ILCD格式
Owner: Tiangong LCI Data Working Group / 天工LCI数据工作小组
Review: Dependent internal review by Tiangong LCI Data Working Group / 天工LCI数据工作小组
Amounts: no units in this file; such an amount is in the reference unit of its flow, which a separate flow dataset defines
copyright: false
licenseType: Free of charge for all users and uses

## General comment
the Technical of end-of-pipe management technology for pollution chemical oxygen demandisChemical treatment + aerobic biological treatment，Its Technical efficiency of end-of-pipe management84.5

## Technical purpose
该数据集代表番茄酱黄豆罐头的生产过程，包括浸泡、预煮、排气、密封、杀菌和储罐等步骤。此产品适合在各种市场上消费和零售，并且可以作为食品服务应用中的食材或直接食用。此外，该过程采用了排放尾气污染管理技术，包括化学处理和好氧生物处理，以最小化废水污染物，如化学需氧量（COD）、有机结合氮、总磷和氨氮。

## Reference product
- Soybean in tomato sauce/juice: 1000; calculated
  源文件中描述为为茄汁黄豆罐头，此处对其进行了匹配工作，将其匹配到LCAflow库里面相最符合的流，污染物指标备注为工业废水量

## Outputs
All rows: calculated
- Waste water: 12500
  the Technical of end-of-pipe management technology for pollution Waste wateris/，Its Technical efficiency of end-of-pipe management0
  污染物指标工业废水量的末端治理技术是/，其效率为0。原文件中描述污染物类别为废水，污染物指标为工业废水量，此处对其进行了匹配工作，将其匹配到LCAflow库里面相最符合的流，污染物指标备注为工业废水量
- phosphorus, total: 0.0135912, 0.0135912 (2 entries)
  the Technical of end-of-pipe management technology for pollution phosphorus, totalisChemical treatment + aerobic biological treatment，Its Technical efficiency of end-of-pipe management65.24
  污染物指标总磷的末端治理技术是化学处理法+好氧生物处理法，其效率为65.24，末端治理设施实际运行率（k值）计算公式为k=污水处理设施年耗电量（千瓦时）/(总额定功率(千瓦)×年运行时间(小时)。原文件中描述污染物类别为废水，污染物指标为总磷，此处对其进行了匹配工作，将其匹配到LCAflow库里面相最符合的流，污染物指标备注为总磷
- Ammonia Nitrogen: 0.185755
  the Technical of end-of-pipe management technology for pollution Ammonia NitrogenisChemical treatment + aerobic biological treatment，Its Technical efficiency of end-of-pipe management62.47
  污染物指标氨氮的末端治理技术是化学处理法+好氧生物处理法，其效率为62.47，末端治理设施实际运行率（k值）计算公式为k=污水处理设施年耗电量（千瓦时）/(总额定功率(千瓦)×年运行时间(小时)。原文件中描述污染物类别为废水，污染物指标为氨氮，此处对其进行了匹配工作，将其匹配到LCAflow库里面相最符合的流，污染物指标备注为氨氮
- Nitrogen, organic bound: 0.287742
  the Technical of end-of-pipe management technology for pollution Nitrogen, organic boundisChemical treatment + aerobic biological treatment，Its Technical efficiency of end-of-pipe management56.6
  污染物指标总氮的末端治理技术是化学处理法+好氧生物处理法，其效率为56.6，末端治理设施实际运行率（k值）计算公式为k=污水处理设施年耗电量（千瓦时）/(总额定功率(千瓦)×年运行时间(小时)。原文件中描述污染物类别为废水，污染物指标为总氮，此处对其进行了匹配工作，将其匹配到LCAflow库里面相最符合的流，污染物指标备注为总氮
- chemical oxygen demand: 1.44464
  the Technical of end-of-pipe management technology for pollution chemical oxygen demandisChemical treatment + aerobic biological treatment，Its Technical efficiency of end-of-pipe management84.5
  污染物指标化学需氧量的末端治理技术是化学处理法+好氧生物处理法，其效率为84.5，末端治理设施实际运行率（k值）计算公式为k=污水处理设施年耗电量（千瓦时）/(总额定功率(千瓦)×年运行时间(小时)。原文件中描述污染物类别为废水，污染物指标为化学需氧量，此处对其进行了匹配工作，将其匹配到LCAflow库里面相最符合的流，污染物指标备注为化学需氧量

## Use advice
This dataset is derived from the Pollution Source Census Report and contains information on pollution emissions and related products. However, it does not include data on energy or chemical consumption, nor does it provide information on waste or co-product generation. When utilizing this dataset, please supplement the missing data based on actual conditions before use
该数据集来源于污染源普查报告，包含污染物排放及相关产品信息，但不包含能源或化学品消耗数据，也不提供废弃物或共生产物产生信息。在使用该数据集时，请根据实际情况补充缺失数据后再使用。

## Review details
Inventory: The internal review was done by several iteration steps concerning raw data validation, raw data documentation, representativity, completeness and consistency of modelling with regard to ISO 14040 and 14044.
清单： 内部审查通过几个迭代步骤完成，涉及原始数据验证、原始数据记录、代表性、完整性、与 ISO 14040 和 14044 有关的建模的一致性。

## Data sources
- 第二次全国污染源普查产排污核算系数手册（试用版）,二级代码14,四级代码1459文件，在完整版文件中第3413页
