# cement production;cement, portland cement, 52.5RMPa;modern dry process, rotary kiln, 5000 t/d

Dataset: ILCD process, Unit process, black box
Geography: DL-LN-CN
Classification: Materials production / Other mineralic materials
Generated by: Siqi Yang, ysqsophia@gmail.com
Owner: Tiangong LCI Data Working Group
Review: Dependent internal review by Tiangong LCI Data Working Group
Amounts: no units in this file; such an amount is in the reference unit of its flow, which a separate flow dataset defines
copyright: false
licenseType: Free of charge for all users and uses

## General comment
The company currently has a modern dry process production line with a capacity of 5000t/d. The raw material mill adopts an advanced vertical four-roller mill from Germany's Loesche, with specifications of LM60.4. Advanced new technology is employed for the clinker calcination using an external decomposition kiln.

## Geography
Dalian Cement Company

## Technology and included processes
The company currently has a modern dry production line with a capacity of 5000t/d, as shown in Figure 6.5. The raw material mill adopts the advanced vertical four-roller mill of Loesche Company of Germany, with specification of LM60.4, as shown in Figure 6.6. Clinker burning adopts advanced new kiln decomposition technology.

## Technical purpose
The cement produced by Dalian Cement Company (DCGC) with a modern dry process and a rotary kiln is used for the construction of infrastructure and buildings, suitable for general construction works that require high-strength cement, such as large-scale industrial projects, high-rise buildings, and large infrastructure projects including bridges and dams. The specific high-strength products, such as 52.5RMPa Portland cement, may also be used for special applications such as oil well cements and sulfide-resistant cements in aggressive environments.

## Model description
LCA method was not used for modeling.

## Reference product
- cement, portland cement, 52.5RMPa: 1000
  Cement, PⅡ 52.5R

## Inputs
- limestone, crushed, for mill: 1159
  Limestone
- clay: 216.5
  Clay
- iron, powder: 45.2
  Iron powder
- gypsum stone (CaSO4-dihydrate): 30
  Gupsum
- electricity, medium voltage: 418.824
  Electricity
- hard coal: 147.5
  Coal

## Outputs
- sulfur dioxide: 0.3372
  SO2. The main source of SO2 emissions in the production of building materials is from sulfides contained in fuels and raw materials.
- Nitrogen oxides: 0.2069
  NOX. The emissions of NOx in the production of building materials come from two main sources. The first is the combination of N and O2 in the air at high temperatures, which is directly related to the temperature. The second is the low-temperature combination of N and O2 in the fuel, which is related to the concentration of O2.
- carbon dioxide: 756.339
  CO2. The main sources of CO2 emissions in the building materials industry are from fuel combustion and raw material decomposition.
- particles (> PM10): 0.4509
  Dust, with an unspecified particle size, is treated as PM > 10 micrometers in diameter. The production of dust in the production of building materials is related to the content of powdered materials in the raw materials.
- chemical oxygen demand: 4.7163e-5
  COD (chemical oxygen demand) (mg/l). Chemical oxygen demand (COD) refers to the amount of oxidant consumed when treating wastewater with a strong oxidant. It is used to measure the degree of organic pollution in wastewater. The larger the COD value, the more severe the wastewater pollution.
- Suspended solids, unspecified: 1.641e-5
  SS (suspended solids) (mg/l). The suspended solids in the wastewater discharged from the building materials industry mainly refer to inorganic substances, organic substances, sediment, clay, microorganisms, and other substances that are insoluble in water.
- Oils, unspecified: 2.43e-8
  Petroleum (mg/l). Oil pollution in wastewater mainly comes from production enterprises such as steel, coking, and petrochemicals. According to the size of the oil droplet diameter, there are three forms of oil substances in wastewater: floating oil, dispersed oil, and emulsified oil, and the difficulty of separation from wastewater increases in that order.conversion method is used to obtain the data.
- particles (> PM10): 87.2125
  Solid waste refers to the solid waste generated during the production process, such as dust (with an unspecified particle size, is treated as PM > 10 micrometers in diameter).

## Data selection and combination
Cement product evaluation index data is obtained through on-site surveys at cement production enterprises, and the index data comes from enterprise production process data.Due to the lack of specific industrial pollutant emission statistics, the data collection process is very difficult, and some data cannot be obtained directly, so it is obtained by converting related energy and raw materials.

## Sampling procedure
DCGC was founded in 1907 and is one of the key national cement enterprises. The production line has a designed production capacity of 5,500 tons of clinker per day and an annual output of more than 2 million tons of cement. The main products include "Seagull Brand" PO32.5R type, PO42.5R type ordinary Portland cement, A-grade oil well cement, G-grade medium and high sulfur-resistant oil well cement, and dam cement. "Wuyang Brand" Portland cement: "Ocean Brand" PO32.5R type, PO42.5R type ordinary Portland cement, PS32.5R type cement. DCGC has a registered capital of RMB 4.89 billion and a factory area of ​​370,000 square meters. The company currently has 434 employees. The annual output of clinker is 155 tons and the annual output of cement is 1.82 million tons.

## Use advice
When using the data from DCGC's cement production for life cycle assessment or other environmental analyses, consider the specific characteristics and emissions of the modern dry process production line and rotary kiln technology. Be aware that direct pollutant emission data is not available and the provided data is based on energy and raw material conversion rates. Due to this indirect method of data collection, the accuracy of the environmental impacts may be limited. It is advisable to supplement this data with updated and region-specific information when available. LCA modeling has not been employed for this data set, so users may need to apply their own LCA models to gauge environmental performance accurately.

## Review details
Inventory: The internal review was done by several iteration steps concerning raw data validation, raw data documentation, representativity, completeness and consistency of modelling with regard to ISO 14040 and 14044.

## Data sources
- 李礼. (2012). 建筑材料绿色性的6E综合评价体系研究 [博士, 大连理工大学].
