# Chrome yellow ; Lead nitrate, sodium dichromate, liquid soda ; Synthesis method ; All sizes; NESPS2 / 铬黄 ; 硝酸铅，重铬酸钠，液碱 ; 合成法 ; 所有规模 ; 全国第二次污染普查数据

Dataset: ILCD process, Unit process, single operation
Geography: CN
Reference year: 2019
Classification: Reference Parameters / Materials production / Inorganic chemicals
Generated by: The data was created by the Office of the Second National Pollution Source Census of the Ministry of Ecology and Environment, and the data was organized by the TianGong Plan team for ILCD format / 生态环境部第二次全国污染源普查工作办公室创建数据，天工计划团队常慧敏整理数据为ILCD格式
Owner: Tiangong LCI Data Working Group / 天工LCI数据工作小组
Review: Dependent internal review by Tiangong LCI Data Working Group / 天工LCI数据工作小组
Amounts: no units in this file; such an amount is in the reference unit of its flow, which a separate flow dataset defines
copyright: false
licenseType: Free of charge for all users and uses

## General comment
the Technical of end-of-pipe management technology for pollution Nitrogen, organic boundisPrecipitation separation，Its Technical efficiency of end-of-pipe management20

## Technical purpose
该工业流程用于生产含有硝酸铅和重铬酸钠的铬黄颜料。该颜料通过液碱合成法生产，适用于各种规模的生产。主要用于涂料、塑料和建筑行业，为材料提供颜色。此数据集特别代表一种化学过程，其中采用多种管末污染管理技术来控制和减少废水和废气排放。

## Reference product
- Zinc Yellow: 1000; calculated
  源文件中描述为为铬黄，此处对其进行了匹配工作，将其匹配到LCAflow库里面相最符合的流，污染物指标备注为工业废水量

## Outputs
All rows: calculated
- lead: 0.02
  the Technical of end-of-pipe management technology for pollution leadisBag filter，Its Technical efficiency of end-of-pipe management99
  污染物指标总铅的末端治理技术是袋式除尘，其效率为99，末端治理设施实际运行率（k值）计算公式为k=设施年耗电量千瓦时/年生产运行时间小时数×设备额定功率千瓦。原文件中描述污染物类别为废气，污染物指标为总铅，此处对其进行了匹配工作，将其匹配到LCAflow库里面相最符合的流，污染物指标备注为总铅
- particles (PM2.5 - PM10): 0.17
  the Technical of end-of-pipe management technology for pollution particles (PM2.5 - PM10)isBag filter，Its Technical efficiency of end-of-pipe management99
  污染物指标颗粒物的末端治理技术是袋式除尘，其效率为99，末端治理设施实际运行率（k值）计算公式为k=设施年耗电量千瓦时/年生产运行时间小时数×设备额定功率千瓦。原文件中描述污染物类别为废气，污染物指标为颗粒物，此处对其进行了匹配工作，将其匹配到LCAflow库里面相最符合的流，污染物指标备注为颗粒物
- Nitrogen oxides: 0.5
  the Technical of end-of-pipe management technology for pollution Nitrogen oxidesisOxidation/absorption method，Its Technical efficiency of end-of-pipe management95
  污染物指标氮氧化物的末端治理技术是氧化/吸收法，其效率为95，末端治理设施实际运行率（k值）计算公式为k=设施年耗电量千瓦时/年生产运行时间小时数×设备额定功率千瓦。原文件中描述污染物类别为废气，污染物指标为氮氧化物，此处对其进行了匹配工作，将其匹配到LCAflow库里面相最符合的流，污染物指标备注为氮氧化物
- phosphorus, total: 0.002
  the Technical of end-of-pipe management technology for pollution phosphorus, totalisDirect discharge，Its Technical efficiency of end-of-pipe management0
  污染物指标总磷的末端治理技术是直排，其效率为0。原文件中描述污染物类别为废水，污染物指标为总磷，此处对其进行了匹配工作，将其匹配到LCAflow库里面相最符合的流，污染物指标备注为总磷
- lead: 0.00424
  the Technical of end-of-pipe management technology for pollution leadisChemical precipitation + adsorption，Its Technical efficiency of end-of-pipe management98
  污染物指标总铅的末端治理技术是化学沉淀+吸附，其效率为98，末端治理设施实际运行率（k值）计算公式为k=设施年耗电量千瓦时/年生产运行时间小时数×设备额定功率千瓦。原文件中描述污染物类别为废水，污染物指标为总铅，此处对其进行了匹配工作，将其匹配到LCAflow库里面相最符合的流，污染物指标备注为总铅
- Chromium: 0.00548
  the Technical of end-of-pipe management technology for pollution ChromiumisChemical precipitation，Its Technical efficiency of end-of-pipe management99
  污染物指标总铬的末端治理技术是化学沉淀法，其效率为99，末端治理设施实际运行率（k值）计算公式为k=设施年耗电量千瓦时/年生产运行时间小时数×设备额定功率千瓦。原文件中描述污染物类别为废水，污染物指标为总铬，此处对其进行了匹配工作，将其匹配到LCAflow库里面相最符合的流，污染物指标备注为总铬
- Waste water: 24000
  the Technical of end-of-pipe management technology for pollution Waste wateris/，Its Technical efficiency of end-of-pipe management0
  污染物指标工业废水量的末端治理技术是/，其效率为0。原文件中描述污染物类别为废水，污染物指标为工业废水量，此处对其进行了匹配工作，将其匹配到LCAflow库里面相最符合的流，污染物指标备注为工业废水量
- Ammonia Nitrogen: 0.0816
  the Technical of end-of-pipe management technology for pollution Ammonia NitrogenisPrecipitation separation，Its Technical efficiency of end-of-pipe management20
  污染物指标氨氮的末端治理技术是沉淀分离，其效率为20，末端治理设施实际运行率（k值）计算公式为k=设施年耗电量千瓦时/年生产运行时间小时数×设备额定功率千瓦。原文件中描述污染物类别为废水，污染物指标为氨氮，此处对其进行了匹配工作，将其匹配到LCAflow库里面相最符合的流，污染物指标备注为氨氮
- chemical oxygen demand: 1.9076
  the Technical of end-of-pipe management technology for pollution chemical oxygen demandisPrecipitation separation + redox process，Its Technical efficiency of end-of-pipe management62
  污染物指标化学需氧量的末端治理技术是沉淀分离+氧化还原法，其效率为62，末端治理设施实际运行率（k值）计算公式为k=设施年耗电量千瓦时/年生产运行时间小时数×设备额定功率千瓦。原文件中描述污染物类别为废水，污染物指标为化学需氧量，此处对其进行了匹配工作，将其匹配到LCAflow库里面相最符合的流，污染物指标备注为化学需氧量
- Exhaust gas: 20200
  the Technical of end-of-pipe management technology for pollution Exhaust gasis/，Its Technical efficiency of end-of-pipe management0
  污染物指标工业废气量的末端治理技术是/，其效率为0。原文件中描述污染物类别为废气，污染物指标为工业废气量，此处对其进行了匹配工作，将其匹配到LCAflow库里面相最符合的流，污染物指标备注为工业废气量
- Nitrogen, organic bound: 68
  the Technical of end-of-pipe management technology for pollution Nitrogen, organic boundisPrecipitation separation，Its Technical efficiency of end-of-pipe management20
  污染物指标总氮的末端治理技术是沉淀分离，其效率为20，末端治理设施实际运行率（k值）计算公式为k=设施年耗电量千瓦时/年生产运行时间小时数×设备额定功率千瓦。原文件中描述污染物类别为废水，污染物指标为总氮，此处对其进行了匹配工作，将其匹配到LCAflow库里面相最符合的流，污染物指标备注为总氮

## Use advice
This dataset is derived from the Pollution Source Census Report and contains information on pollution emissions and related products. However, it does not include data on energy or chemical consumption, nor does it provide information on waste or co-product generation. When utilizing this dataset, please supplement the missing data based on actual conditions before use
该数据集来源于污染源普查报告，包含污染物排放及相关产品信息，但不包含能源或化学品消耗数据，也不提供废弃物或共生产物产生信息。在使用该数据集时，请根据实际情况补充缺失数据后再使用。

## Review details
Inventory: The internal review was done by several iteration steps concerning raw data validation, raw data documentation, representativity, completeness and consistency of modelling with regard to ISO 14040 and 14044.
清单： 内部审查通过几个迭代步骤完成，涉及原始数据验证、原始数据记录、代表性、完整性、与 ISO 14040 和 14044 有关的建模的一致性。

## Data sources
- 第二次全国污染源普查产排污核算系数手册（试用版）,二级代码26,四级代码2643文件，在完整版文件中第4111页
