# Liquid Aluminum Electrolytic Capacitors (LAEC) Shipping ; Liquid Aluminum Electrolytic Capacitors (LAEC)

Dataset: ILCD process, Unit process, single operation
Geography: CN
Reference year: 2022
Classification: Unit processes / Transport services / Other transport
Generated by: Yuzhen Feng, fyz22
Owner: Tiangong LCI Data Working Group
Review: Dependent internal review by Tiangong LCI Data Working Group
Amounts: no units in this file; such an amount is in the reference unit of its flow, which a separate flow dataset defines
copyright: false
licenseType: Free of charge for all users and uses

## General comment
接着48，待定，不知道什么是Total freight volume

## Time period
Literature published on 2022-11-15 in the literature The reference year of the elementary data (alumminum ingots, separator paper, tansport, electricity, and water) is around 2016 and qcruired from the Gabi database (Version: 10.6.1.35)

## Technical purpose
Liquid Aluminum Electrolytic Capacitors (LAEC) are utilized in a wide range of electronic devices due to their high capacitance and voltage ratings. These capacitors are commonly employed in power supplies, audio applications, and as filtering devices in electrical circuits. The process described pertains to the transportation of LAECs, which is a critical step from the manufacturing sites to various customers including electronics manufacturers and wholesalers.

## Reference product
- capacitor, electrolyte type, > 2cm height: 1e6; measured

## Inputs
- transport, freight, lorry 16-32 metric ton, unregulated: 691.38; missing unimportant
- capacitor, electrolyte type, > 2cm height: 1e6; measured

## Data selection and combination
The material information and performance parameters of the three types of AECs are from the investigated manufacturer. Moreover, through the field research of several factories in the AEC industry, the original data on aluminum blank foil fabrication (made from aluminum ingots), anode/cathode foil fabrication (made from aluminum blank foil), and capacitor fabrication were obtained. Due to technical confidentiality, the LCI data of the fabrication of the cathode foil for PHAECs cannot be obtained directly from the supplier. Therefore, the manufacturing LCI of aluminum cathode foil in PHAECs is adjusted according to the coating process data of cathode foil of PAECs, considering their similarity. In the transportation stage, the data of the main raw materials from the material origin to the capacitor manufacturer and the data of the manufactured capacitor products from the manufacturer to the customers are from the supply chain system of the manufacturer. The energy consumption in the use stage is calculated based on the physical equations and the electrical parameters of the AECs. To ensure the completeness of the analysis, the data of the end-of-life stage is obtained based on the analysis and calculation.The reference year of the elementary data is around 2016. The elementary data (i.e., aluminum ingots, separator paper, transport, electricity, and water) are acquired from the Gabi database (Version: 10.6.1.35). In addition, some background data, including 3, 4-ethylene dioxythiophene (EDOT), ammonium adipate, ammonium citrate, etc., are not available in the Gabi database. They are estimated based on the chemical reactions with the material preparation process from the existing raw materials in the Gabi database. The data on the preparation process of the dispersive solution (PEDOT:PSS, 1%wt) for PHAECs' fabrication are scaled from the lab data. The detailed LCI data of the three types of AEC and unit impact of the substance flow is provided in Sheets 5–7 and Sheet 2 of Supporting Info B.

## Use advice
Users of the Life Cycle Assessment (LCA) data for LAEC transportation should note the reference year of elementary data is around 2016. Due to technology advancements and changes in production processes over time, users must consider the temporal relevance of the data. For any materials or processes not included in the Gabi database, users should derive estimates based on similar chemical reactions or consult alternative databases or literature for appropriate proxy data. Special attention should be paid to the confidentiality-adjusted manufacturing LCI data for cathode foils in PHAECs. When utilizing the transport stage data within a supply chain context, ensure that transportation distances and modes are representative of current practices. Lastly, while using energy consumption data in the use stage, users should update these figures according to the latest electrical parameters and physical equations applicable to current AEC models.

## Review details
Inventory: The internal review was done by several iteration steps concerning raw data validation, raw data documentation, representativity, completeness and consistency of modelling with regard to ISO 14040 and 14044.

## Data sources
- Zhang, C., Zheng, Y., Jing, J., Liu, Y. & Huang, H. A comparative LCA study on aluminum electrolytic capacitors: From liquid-state electrolyte, solid-state polymer to their hybrid. J. Clean. Prod. 375, (2022).
