# PVC Wood Plastic Board Production ; PVC Wood Plastic Board ; Raw Material Outsourcing Stirring - Extrusion Forming - Cooling - Printing - Traction - Cutting - Finished Product ,CN

Dataset: ILCD process
Geography: CN
Classification: Unit processes / Materials production / Plastics
Generated by: Jiaqi Lu, wilsherelu@foxmail.com
Owner: Tiangong LCI Data Working Group
Review: Dependent internal review by Tiangong LCI Data Working Group
Amounts: no units in this file; such an amount is in the reference unit of its flow, which a separate flow dataset defines
copyright: false
licenseType: Free of charge for all users and uses

## General comment
This PVC wood-plastic board production describes the manufacturing process for creating composite materials composed of thermoplastics, wood flour or fiber, and additives. These boards are commonly used for decking, railing, fences, landscaping timbers, cladding and siding, park benches, molding and trim, window and door frames, and indoor furniture.

## Reference product
- PVC Wood Plastic Composite: 1000; missing unimportant
  PVC wood plastic board products

## Inputs
All rows: missing unimportant
- Bis(2-ethylhexyl) terephthalate: 5.2
  Dioctyl terephthalate
- Antioxidant: 0.26
  Antioxidants
- Magnesium Aluminide: 3.4
  magnesium aluminum compound
- Wood: 102.57
  wood flour
- calcium carbonate: 359.3
- Zinc stearate: 21.58
  zinc stearate
- polyvinylchloride resin (E-PVC): 506.86
  PVC resin
- stearoyl benzoyl methane: 0.52
  β-diketone
- Electricity: 873.684
  Power consumption
- water: 399.21
  water consumption

## Outputs
All rows: missing unimportant
- Nitrogenous Matter (unspecified, as N): 0.00526
  Ammonia nitrogen [discharge to water (unspecified type)
- 1,2-dichloroethane: 0.000535
  Ethylene dichloride [emitted to atmosphere (unspecified type)]
- chemical oxygen demand: 0.05
  Chemical oxygen demand [discharge to water (unspecified type)]
- hydrogen chloride: 0.009
  Hydrogen chloride [emitted to atmosphere (unspecified type)]
- Particles (PM0.2 - PM2.5): 0.12
  Total particulate matter [emitted to the atmosphere (unspecified type)]
- phosphorus, total: 0.0006
  Total phosphorus [discharge to water (unspecified type)]

## Use advice
Users of this data set should consider the specific stages of the lifecycle of PVC wood-plastic boards when conducting their assessment. This includes raw material acquisition, production, transportation, usage, and end-of-life treatment. Special attention should be paid to the potential for recycling of the material, as well as the environmental impact of the additives used in the product. It is crucial to apply regional data for energy consumption and raw material sourcing to accurately assess the product's impact.

## Review details
Inventory: The internal review was done by several iteration steps concerning raw data validation, raw data documentation, representativity, completeness and consistency of modelling with regard to ISO 14040 and 14044.

## Data sources
- 年生产PVC木塑板线条1000吨项目环评报告公示
