# Soil In Situ Remediation ; Soil Bioventilation ; Remediated Soil

Dataset: ILCD process, Unit process, single operation
Geography: CA
Reference year: 2007
Classification: Unit processes / Other Services / Repair and maintenance
Generated by: Wang Ning, wang_ning@caep.org.cn
Owner: Tiangong LCI Data Working Group
Review: Dependent internal review by Tiangong LCI Data Working Group
Amounts: no units in this file; such an amount is in the reference unit of its flow, which a separate flow dataset defines
copyright: false
licenseType: Free of charge for all users and uses

## General comment
Contaminated soil remediated by using electricity to run a bioventilation system

## Geography
The contaminated area was located 600 m from a river shore in the northern part of the prov-ince of Quebec， Canada.

## Technology and included processes
Remediation of contaminated soil using electrically powered soil aeration systems

## Technical purpose
The described process is an environmental remediation technology focusing on soil in situ remediation, particularly bioventing. This process utilizes an electrical bioventilation system to treat contaminated soil by enhancing the activity of indigenous microbial populations. It is commonly applied in the reclamation of land affected by chemical pollutants, making the soil suitable again for various uses such as agriculture, construction, or natural habitat.

## Reference product
- Remediated soil: 1; estimated
  得到修复的土壤

## Inputs
- Electricity: 174000; estimated
  生物通风系统运行所消耗的电力
- contaminated soil: 1; estimated
  受污染的土壤
- injection well: 1; estimated
- Treatment facilities: 1; estimated

## Use advice
To effectively use this LCA data set, users must pay attention to several factors. The dataset is specifically designed for bioventilation remediation projects and may not be appropriate for other forms of soil remediation. Data users should ensure the context of the data set matches their intended application, considering the geographical location (near a river shore in the northern part of the province of Quebec, Canada) and the type of contaminants present in the soil. When modeling the treatment's impact, account for the local electricity grid's mix as it affects the overall environmental footprint of the remediation process. Additionally, if considering the inclusion of recycling in the life cycle assessment, factor in the specific end-of-life scenarios for the treated soil.

## Review details
Inventory: The internal review was done by several iteration steps concerning raw data validation, raw data documentation, representativity, completeness and consistency of modelling with regard to ISO 14040 and 14044.

## Data sources
- Cadotte, M., Deschênes, L. & Samson, R. Selection of a remediation scenario for a diesel-contaminated site using LCA. Int J Life Cycle Assess 12, 239–251 (2007).
