# Alumina production ; Alumina for metallurgy ; Bauxite ; 2017

Dataset: ILCD process, Unit process, single operation
Geography: CN
Reference year: 2021
Classification: Unit processes / Materials production / Non-energetic raw materials
Generated by: Zimeng Cai, caizm6178@163.com
Owner: Tiangong LCI Data Working Group
Review: Dependent internal review by Tiangong LCI Data Working Group
Amounts: no units in this file; such an amount is in the reference unit of its flow, which a separate flow dataset defines
copyright: false
licenseType: Free of charge for all users and uses

## General comment
氧化铝生产2017

## Time period
Date of publication

## Technical purpose
The alumina produced in this referenced process is specifically intended for metallurgical applications. It is used as a precursor for the production of aluminium metal through the electrolytic Hall-Héroult process. The metallurgical grade alumina is utilized in the production of aluminium ingots, sheets, foils, and other aluminium products in the metal casting and rolling industries.

## Reference product
- aluminium oxide, metallurgical: 1000; software or database
  alumina

## Inputs
All rows: software or database
- soda ash, dense: 162.85
  soda ash
- Petroleum Coke: 853.311
  Energy sources proportion of energy consumption is coal: fuel oil: coke: natural gas: coke even gas=46.0%: 11.0%: 7.1%: 14.1%: 21.7%
- coal gas: 2608.01
  (same comment as for Petroleum Coke)
- natural gas, high pressure: 1694.6
  (same comment as for Petroleum Coke)
- fuel oil, unspecified: 1322.03
  (same comment as for Petroleum Coke)
- hard coal: 5528.49
  (same comment as for Petroleum Coke)
- Water, unspecified natural origin: 1.53
  water consumption

## Data selection and combination
The data in this study refers to the LCA data of PA, SA, electricity, and other background data. The PA data were obtained from statistical data sources, and the SA data were mainly obtained from the literatures. The background data were mainly derived from the Chinese localization LCA database CAS RCEES 2018, which was established by the Research Center for Eco-Environmental Sciences, Chinese Academy of Sciences and covers LCA data for energy, materials, transportation, waste management etc.

## Use advice
When applying this LCA data on alumina production, users should ensure they are considering the intended metallurgical application. It is critical to verify that the recycling of materials is accurately accounted for within the life cycle stages, in line with the technological applicability mentioned. Furthermore, users must refer to the defined background data sources, particularly focusing on the year 2017, and may need to update or adjust these data points if applying the LCA to a different temporal context. If the production process has evolved, or newer technologies are applied, the LCA data will need to be amended accordingly to represent the current state.

## Review details
Inventory: The internal review was done by several iteration steps concerning raw data validation, raw data documentation, representativity, completeness and consistency of modelling with regard to ISO 14040 and 14044.

## Data sources
- Ding, N., Liu, N., Lu, B. & Yang, J. Life cycle greenhouse gas emissions of aluminum based on regional industrial transfer in China. J. Ind. Ecol. 25, 1657–1672 (2021).
