# Alkali method ; Pharmaceutical gelatin ; Skimmed beef bone, pork bone particles, etc. as raw materials ; Alkali method ; >1500 t/a; NESPS2 / 碱法 ; 药用明胶 ; 脱脂牛骨、猪骨骨粒等为原料 ; 碱法 ; 大于1500吨/年 ; 全国第二次污染普查数据

Dataset: ILCD process, Unit process, single operation
Geography: CN
Reference year: 2019
Classification: Reference Parameters / Materials production / Organic chemicals
Generated by: The data was created by the Office of the Second National Pollution Source Census of the Ministry of Ecology and Environment, and the data was organized by the TianGong Plan team for ILCD format / 生态环境部第二次全国污染源普查工作办公室创建数据，天工计划团队常慧敏整理数据为ILCD格式
Owner: Tiangong LCI Data Working Group / 天工LCI数据工作小组
Review: Dependent internal review by Tiangong LCI Data Working Group / 天工LCI数据工作小组
Amounts: no units in this file; such an amount is in the reference unit of its flow, which a separate flow dataset defines
copyright: false
licenseType: Free of charge for all users and uses

## General comment
the Technical of end-of-pipe management technology for pollution chemical oxygen demandisAnaerobic hydrolysis，Its Technical efficiency of end-of-pipe management70，The formula for calculating the actual operation rate (k-value) of the end-of-pipe treatment facility is k = operating time of wastewater treatment facilities (hours) / annual normal production time of enterprise (hours)

## Technical purpose
此工业过程利用碱法从脱脂牛骨、猪骨骨粒等原料生产药用明胶，年产量超过1500吨。该高纯度明胶可能用于医药领域，其纯度和质量至关重要。

## Reference product
- Gelatin: 1000; calculated
  源文件中描述为为药用明胶，此处对其进行了匹配工作，将其匹配到LCAflow库里面相最符合的流，污染物指标备注为工业废水量

## Outputs
All rows: calculated
- volatile organic compound: 0.0512
  the Technical of end-of-pipe management technology for pollution volatile organic compoundisAdsorption + steam desorption，Its Technical efficiency of end-of-pipe management36，The formula for calculating the actual operation rate (k-value) of the end-of-pipe treatment facility is k = operating time of waste gas treatment facilities (hours) / annual normal production time of enterprise (hours)
  污染物指标挥发性有机物的末端治理技术是吸附+蒸气解析，其效率为36，末端治理设施实际运行率（k值）计算公式为k=设备耗电量（千瓦时）/(设备额定功率（千瓦）×设备运行时间（小时）)。原文件中描述污染物类别为废气，污染物指标为挥发性有机物，此处对其进行了匹配工作，将其匹配到LCAflow库里面相最符合的流，污染物指标备注为挥发性有机物
- volatile organic compound: 0.0512
  the Technical of end-of-pipe management technology for pollution volatile organic compoundisAdsorption/catalytic combustion method，Its Technical efficiency of end-of-pipe management36，The formula for calculating the actual operation rate (k-value) of the end-of-pipe treatment facility is k = operating time of waste gas treatment facilities (hours) / annual normal production time of enterprise (hours)
  污染物指标挥发性有机物的末端治理技术是吸附/催化燃烧法，其效率为36，末端治理设施实际运行率（k值）计算公式为k=设备耗电量（千瓦时）/(设备额定功率（千瓦）×设备运行时间（小时）)。原文件中描述污染物类别为废气，污染物指标为挥发性有机物，此处对其进行了匹配工作，将其匹配到LCAflow库里面相最符合的流，污染物指标备注为挥发性有机物
- ammonia: 0.06
  the Technical of end-of-pipe management technology for pollution ammoniaisBiological filtration method，Its Technical efficiency of end-of-pipe management50，The formula for calculating the actual operation rate (k-value) of the end-of-pipe treatment facility is k = operating time of waste gas treatment facilities (hours) / annual normal production time of enterprise (hours)
  污染物指标氨的末端治理技术是生物过滤法，其效率为50，末端治理设施实际运行率（k值）计算公式为k=设备耗电量（千瓦时）/(设备额定功率（千瓦）×设备运行时间（小时）)。原文件中描述污染物类别为废气，污染物指标为氨，此处对其进行了匹配工作，将其匹配到LCAflow库里面相最符合的流，污染物指标备注为氨
- ammonia: 0.06
  the Technical of end-of-pipe management technology for pollution ammoniaisPhysical adsorption，Its Technical efficiency of end-of-pipe management50，The formula for calculating the actual operation rate (k-value) of the end-of-pipe treatment facility is k = operating time of waste gas treatment facilities (hours) / annual normal production time of enterprise (hours)
  污染物指标氨的末端治理技术是物理吸附法，其效率为50，末端治理设施实际运行率（k值）计算公式为k=设备耗电量（千瓦时）/(设备额定功率（千瓦）×设备运行时间（小时）)。原文件中描述污染物类别为废气，污染物指标为氨，此处对其进行了匹配工作，将其匹配到LCAflow库里面相最符合的流，污染物指标备注为氨
- volatile organic compound: 0.0608
  the Technical of end-of-pipe management technology for pollution volatile organic compoundisPhotolysis，Its Technical efficiency of end-of-pipe management24，The formula for calculating the actual operation rate (k-value) of the end-of-pipe treatment facility is k = operating time of waste gas treatment facilities (hours) / annual normal production time of enterprise (hours)
  污染物指标挥发性有机物的末端治理技术是光解，其效率为24，末端治理设施实际运行率（k值）计算公式为k=设备耗电量（千瓦时）/(设备额定功率（千瓦）×设备运行时间（小时）)。原文件中描述污染物类别为废气，污染物指标为挥发性有机物，此处对其进行了匹配工作，将其匹配到LCAflow库里面相最符合的流，污染物指标备注为挥发性有机物
- volatile organic compound: 0.0656
  the Technical of end-of-pipe management technology for pollution volatile organic compoundisLow temperature plasma，Its Technical efficiency of end-of-pipe management18，The formula for calculating the actual operation rate (k-value) of the end-of-pipe treatment facility is k = operating time of waste gas treatment facilities (hours) / annual normal production time of enterprise (hours)
  污染物指标挥发性有机物的末端治理技术是低温等离子体，其效率为18，末端治理设施实际运行率（k值）计算公式为k=设备耗电量（千瓦时）/(设备额定功率（千瓦）×设备运行时间（小时）)。原文件中描述污染物类别为废气，污染物指标为挥发性有机物，此处对其进行了匹配工作，将其匹配到LCAflow库里面相最符合的流，污染物指标备注为挥发性有机物
- particles (PM2.5 - PM10): 1.075
  the Technical of end-of-pipe management technology for pollution particles (PM2.5 - PM10)isBag filter，Its Technical efficiency of end-of-pipe management95，The formula for calculating the actual operation rate (k-value) of the end-of-pipe treatment facility is k = operating time of waste gas treatment facilities (hours) / annual normal production time of enterprise (hours)
  污染物指标颗粒物的末端治理技术是袋式除尘，其效率为95，末端治理设施实际运行率（k值）计算公式为k=设备耗电量（千瓦时）/(设备额定功率（千瓦）×设备运行时间（小时）)。原文件中描述污染物类别为废气，污染物指标为颗粒物，此处对其进行了匹配工作，将其匹配到LCAflow库里面相最符合的流，污染物指标备注为颗粒物
- particles (PM2.5 - PM10): 1.075
  the Technical of end-of-pipe management technology for pollution particles (PM2.5 - PM10)isCyclone dust removal + bag filter，Its Technical efficiency of end-of-pipe management95，The formula for calculating the actual operation rate (k-value) of the end-of-pipe treatment facility is k = operating time of waste gas treatment facilities (hours) / annual normal production time of enterprise (hours)
  污染物指标颗粒物的末端治理技术是旋风+布袋，其效率为95，末端治理设施实际运行率（k值）计算公式为k=设备耗电量（千瓦时）/(设备额定功率（千瓦）×设备运行时间（小时）)。原文件中描述污染物类别为废气，污染物指标为颗粒物，此处对其进行了匹配工作，将其匹配到LCAflow库里面相最符合的流，污染物指标备注为颗粒物
- Waste water: 850000
  the Technical of end-of-pipe management technology for pollution Waste wateris/，The formula for calculating the actual operation rate (k-value) of the end-of-pipe treatment facility is k = operating time of waste gas treatment facilities (hours) / annual normal production time of enterprise (hours)
  污染物指标工业废水量的末端治理技术是/，末端治理设施实际运行率（k值）计算公式为/。原文件中描述污染物类别为废水，污染物指标为工业废水量，此处对其进行了匹配工作，将其匹配到LCAflow库里面相最符合的流，污染物指标备注为工业废水量
- phosphorus, total: 5.2482
  the Technical of end-of-pipe management technology for pollution phosphorus, totalisChemical precipitation，Its Technical efficiency of end-of-pipe management70，The formula for calculating the actual operation rate (k-value) of the end-of-pipe treatment facility is k = operating time of waste gas treatment facilities (hours) / annual normal production time of enterprise (hours)
  污染物指标总磷的末端治理技术是化学沉淀法，其效率为70，末端治理设施实际运行率（k值）计算公式为k=设备耗电量（千瓦时）/(设备额定功率（千瓦）×设备运行时间（小时）)。原文件中描述污染物类别为废水，污染物指标为总磷，此处对其进行了匹配工作，将其匹配到LCAflow库里面相最符合的流，污染物指标备注为总磷
- Ammonia Nitrogen: 5.64675
  the Technical of end-of-pipe management technology for pollution Ammonia NitrogenisBio-contact oxidation process，Its Technical efficiency of end-of-pipe management75，The formula for calculating the actual operation rate (k-value) of the end-of-pipe treatment facility is k = operating time of wastewater treatment facilities (hours) / annual normal production time of enterprise (hours)
  污染物指标氨氮的末端治理技术是生物接触氧化法，其效率为75，末端治理设施实际运行率（k值）计算公式为k=设备耗电量（千瓦时）/(设备额定功率（千瓦）×设备运行时间（小时）)。原文件中描述污染物类别为废水，污染物指标为氨氮，此处对其进行了匹配工作，将其匹配到LCAflow库里面相最符合的流，污染物指标备注为氨氮
- Ammonia Nitrogen: 5.64675
  the Technical of end-of-pipe management technology for pollution Ammonia NitrogenisSBR，Its Technical efficiency of end-of-pipe management75，The formula for calculating the actual operation rate (k-value) of the end-of-pipe treatment facility is k = operating time of wastewater treatment facilities (hours) / annual normal production time of enterprise (hours)
  污染物指标氨氮的末端治理技术是SBR类，其效率为75，末端治理设施实际运行率（k值）计算公式为k=设备耗电量（千瓦时）/(设备额定功率（千瓦）×设备运行时间（小时）)。原文件中描述污染物类别为废水，污染物指标为氨氮，此处对其进行了匹配工作，将其匹配到LCAflow库里面相最符合的流，污染物指标备注为氨氮
- Ammonia Nitrogen: 6.7761
  the Technical of end-of-pipe management technology for pollution Ammonia NitrogenisA2/O process，Its Technical efficiency of end-of-pipe management70，The formula for calculating the actual operation rate (k-value) of the end-of-pipe treatment facility is k = operating time of wastewater treatment facilities (hours) / annual normal production time of enterprise (hours)
  污染物指标氨氮的末端治理技术是A2/O工艺，其效率为70，末端治理设施实际运行率（k值）计算公式为k=设备耗电量（千瓦时）/(设备额定功率（千瓦）×设备运行时间（小时）)。原文件中描述污染物类别为废水，污染物指标为氨氮，此处对其进行了匹配工作，将其匹配到LCAflow库里面相最符合的流，污染物指标备注为氨氮
- Ammonia Nitrogen: 6.7761
  the Technical of end-of-pipe management technology for pollution Ammonia NitrogenisAnaerobic hydrolysis，Its Technical efficiency of end-of-pipe management70，The formula for calculating the actual operation rate (k-value) of the end-of-pipe treatment facility is k = operating time of waste gas treatment facilities (hours) / annual normal production time of enterprise (hours)
  污染物指标氨氮的末端治理技术是厌氧水解类，其效率为70，末端治理设施实际运行率（k值）计算公式为k=设备耗电量（千瓦时）/(设备额定功率（千瓦）×设备运行时间（小时）)。原文件中描述污染物类别为废水，污染物指标为氨氮，此处对其进行了匹配工作，将其匹配到LCAflow库里面相最符合的流，污染物指标备注为氨氮
- Nitrogen, organic bound: 7.4545
  the Technical of end-of-pipe management technology for pollution Nitrogen, organic boundisBio-contact oxidation process，Its Technical efficiency of end-of-pipe management75
  污染物指标总氮的末端治理技术是生物接触氧化法，其效率为75，末端治理设施实际运行率（k值）计算公式为k=设备耗电量（千瓦时）/(设备额定功率（千瓦）×设备运行时间（小时）)。原文件中描述污染物类别为废水，污染物指标为总氮，此处对其进行了匹配工作，将其匹配到LCAflow库里面相最符合的流，污染物指标备注为总氮
- Nitrogen, organic bound: 7.4545
  the Technical of end-of-pipe management technology for pollution Nitrogen, organic boundisSBR，Its Technical efficiency of end-of-pipe management75
  污染物指标总氮的末端治理技术是SBR类，其效率为75，末端治理设施实际运行率（k值）计算公式为k=设备耗电量（千瓦时）/(设备额定功率（千瓦）×设备运行时间（小时）)。原文件中描述污染物类别为废水，污染物指标为总氮，此处对其进行了匹配工作，将其匹配到LCAflow库里面相最符合的流，污染物指标备注为总氮
- Nitrogen, organic bound: 8.9454
  the Technical of end-of-pipe management technology for pollution Nitrogen, organic boundisA2/O process，Its Technical efficiency of end-of-pipe management70，The formula for calculating the actual operation rate (k-value) of the end-of-pipe treatment facility is k = operating time of waste gas treatment facilities (hours) / annual normal production time of enterprise (hours)
  污染物指标总氮的末端治理技术是A2/O工艺，其效率为70，末端治理设施实际运行率（k值）计算公式为k=设备耗电量（千瓦时）/(设备额定功率（千瓦）×设备运行时间（小时）)。原文件中描述污染物类别为废水，污染物指标为总氮，此处对其进行了匹配工作，将其匹配到LCAflow库里面相最符合的流，污染物指标备注为总氮
- Nitrogen, organic bound: 8.9454
  the Technical of end-of-pipe management technology for pollution Nitrogen, organic boundisAnaerobic hydrolysis，Its Technical efficiency of end-of-pipe management70，The formula for calculating the actual operation rate (k-value) of the end-of-pipe treatment facility is k = operating time of wastewater treatment facilities (hours) / annual normal production time of enterprise (hours)
  污染物指标总氮的末端治理技术是厌氧水解类，其效率为70，末端治理设施实际运行率（k值）计算公式为k=设备耗电量（千瓦时）/(设备额定功率（千瓦）×设备运行时间（小时）)。原文件中描述污染物类别为废水，污染物指标为总氮，此处对其进行了匹配工作，将其匹配到LCAflow库里面相最符合的流，污染物指标备注为总氮
- phosphorus, total: 10.4964
  the Technical of end-of-pipe management technology for pollution phosphorus, totalisA2/O process，Its Technical efficiency of end-of-pipe management40，The formula for calculating the actual operation rate (k-value) of the end-of-pipe treatment facility is k = operating time of waste gas treatment facilities (hours) / annual normal production time of enterprise (hours)
  污染物指标总磷的末端治理技术是A2/O工艺，其效率为40，末端治理设施实际运行率（k值）计算公式为k=设备耗电量（千瓦时）/(设备额定功率（千瓦）×设备运行时间（小时）)。原文件中描述污染物类别为废水，污染物指标为总磷，此处对其进行了匹配工作，将其匹配到LCAflow库里面相最符合的流，污染物指标备注为总磷
- phosphorus, total: 10.4964
  the Technical of end-of-pipe management technology for pollution phosphorus, totalisAnaerobic hydrolysis，Its Technical efficiency of end-of-pipe management40，The formula for calculating the actual operation rate (k-value) of the end-of-pipe treatment facility is k = operating time of waste gas treatment facilities (hours) / annual normal production time of enterprise (hours)
  污染物指标总磷的末端治理技术是厌氧水解类，其效率为40，末端治理设施实际运行率（k值）计算公式为k=设备耗电量（千瓦时）/(设备额定功率（千瓦）×设备运行时间（小时）)。原文件中描述污染物类别为废水，污染物指标为总磷，此处对其进行了匹配工作，将其匹配到LCAflow库里面相最符合的流，污染物指标备注为总磷
- phosphorus, total: 10.4964
  the Technical of end-of-pipe management technology for pollution phosphorus, totalisBio-contact oxidation process，Its Technical efficiency of end-of-pipe management40，The formula for calculating the actual operation rate (k-value) of the end-of-pipe treatment facility is k = operating time of waste gas treatment facilities (hours) / annual normal production time of enterprise (hours)
  污染物指标总磷的末端治理技术是生物接触氧化法，其效率为40，末端治理设施实际运行率（k值）计算公式为k=设备耗电量（千瓦时）/(设备额定功率（千瓦）×设备运行时间（小时）)。原文件中描述污染物类别为废水，污染物指标为总磷，此处对其进行了匹配工作，将其匹配到LCAflow库里面相最符合的流，污染物指标备注为总磷
- phosphorus, total: 10.4964
  the Technical of end-of-pipe management technology for pollution phosphorus, totalisSBR，Its Technical efficiency of end-of-pipe management40，The formula for calculating the actual operation rate (k-value) of the end-of-pipe treatment facility is k = operating time of waste gas treatment facilities (hours) / annual normal production time of enterprise (hours)
  污染物指标总磷的末端治理技术是SBR类，其效率为40，末端治理设施实际运行率（k值）计算公式为k=设备耗电量（千瓦时）/(设备额定功率（千瓦）×设备运行时间（小时）)。原文件中描述污染物类别为废水，污染物指标为总磷，此处对其进行了匹配工作，将其匹配到LCAflow库里面相最符合的流，污染物指标备注为总磷
- Exhaust gas: 33259
  the Technical of end-of-pipe management technology for pollution Exhaust gasis/，The formula for calculating the actual operation rate (k-value) of the end-of-pipe treatment facility is k = operating time of wastewater treatment facilities (hours) / annual normal production time of enterprise (hours)
  污染物指标工业废气量的末端治理技术是/，末端治理设施实际运行率（k值）计算公式为/。原文件中描述污染物类别为废气，污染物指标为工业废气量，此处对其进行了匹配工作，将其匹配到LCAflow库里面相最符合的流，污染物指标备注为工业废气量
- chemical oxygen demand: 222.416
  the Technical of end-of-pipe management technology for pollution chemical oxygen demandisBio-contact oxidation process，Its Technical efficiency of end-of-pipe management75，The formula for calculating the actual operation rate (k-value) of the end-of-pipe treatment facility is k = operating time of wastewater treatment facilities (hours) / annual normal production time of enterprise (hours)
  污染物指标化学需氧量的末端治理技术是生物接触氧化法，其效率为75，末端治理设施实际运行率（k值）计算公式为k=设备耗电量（千瓦时）/(设备额定功率（千瓦）×设备运行时间（小时）)。原文件中描述污染物类别为废水，污染物指标为化学需氧量，此处对其进行了匹配工作，将其匹配到LCAflow库里面相最符合的流，污染物指标备注为化学需氧量
- chemical oxygen demand: 222.416
  the Technical of end-of-pipe management technology for pollution chemical oxygen demandisSBR，Its Technical efficiency of end-of-pipe management75，The formula for calculating the actual operation rate (k-value) of the end-of-pipe treatment facility is k = operating time of wastewater treatment facilities (hours) / annual normal production time of enterprise (hours)
  污染物指标化学需氧量的末端治理技术是SBR类，其效率为75，末端治理设施实际运行率（k值）计算公式为k=设备耗电量（千瓦时）/(设备额定功率（千瓦）×设备运行时间（小时）)。原文件中描述污染物类别为废水，污染物指标为化学需氧量，此处对其进行了匹配工作，将其匹配到LCAflow库里面相最符合的流，污染物指标备注为化学需氧量
- chemical oxygen demand: 266.899
  the Technical of end-of-pipe management technology for pollution chemical oxygen demandisA2/O process，Its Technical efficiency of end-of-pipe management70，The formula for calculating the actual operation rate (k-value) of the end-of-pipe treatment facility is k = operating time of wastewater treatment facilities (hours) / annual normal production time of enterprise (hours)
  污染物指标化学需氧量的末端治理技术是A2/O工艺，其效率为70，末端治理设施实际运行率（k值）计算公式为k=设备耗电量（千瓦时）/(设备额定功率（千瓦）×设备运行时间（小时）)。原文件中描述污染物类别为废水，污染物指标为化学需氧量，此处对其进行了匹配工作，将其匹配到LCAflow库里面相最符合的流，污染物指标备注为化学需氧量
- chemical oxygen demand: 266.899
  the Technical of end-of-pipe management technology for pollution chemical oxygen demandisAnaerobic hydrolysis，Its Technical efficiency of end-of-pipe management70，The formula for calculating the actual operation rate (k-value) of the end-of-pipe treatment facility is k = operating time of wastewater treatment facilities (hours) / annual normal production time of enterprise (hours)
  污染物指标化学需氧量的末端治理技术是厌氧水解类，其效率为70，末端治理设施实际运行率（k值）计算公式为k=设备耗电量（千瓦时）/(设备额定功率（千瓦）×设备运行时间（小时）)。原文件中描述污染物类别为废水，污染物指标为化学需氧量，此处对其进行了匹配工作，将其匹配到LCAflow库里面相最符合的流，污染物指标备注为化学需氧量

## Use advice
This dataset is derived from the Pollution Source Census Report and contains information on pollution emissions and related products. However, it does not include data on energy or chemical consumption, nor does it provide information on waste or co-product generation. When utilizing this dataset, please supplement the missing data based on actual conditions before use
该数据集来源于污染源普查报告，包含污染物排放及相关产品信息，但不包含能源或化学品消耗数据，也不提供废弃物或共生产物产生信息。在使用该数据集时，请根据实际情况补充缺失数据后再使用。

## Review details
Inventory: The internal review was done by several iteration steps concerning raw data validation, raw data documentation, representativity, completeness and consistency of modelling with regard to ISO 14040 and 14044.
清单： 内部审查通过几个迭代步骤完成，涉及原始数据验证、原始数据记录、代表性、完整性、与 ISO 14040 和 14044 有关的建模的一致性。

## Data sources
- 第二次全国污染源普查产排污核算系数手册（试用版）,二级代码27,四级代码2780文件，在完整版文件中第3258页
