# Sinter production ; sinter ; sinter ; powder ore

Dataset: ILCD process, Unit process, single operation
Geography: CN
Reference year: 2006
Classification: Unit processes / Materials production / Metals and semimetals
Generated by: Wanghuanyu, wanghuanyu00@126.com
Owner: Tiangong LCI Data Working Group
Review: Dependent internal review by Tiangong LCI Data Working Group
Amounts: no units in this file; such an amount is in the reference unit of its flow, which a separate flow dataset defines
copyright: false
licenseType: Free of charge for all users and uses

## General comment
The sinter production industrial process is primarily utilized for the pre-treatment of iron ore fines to form sinter, which is an input material for blast furnaces. The sintering process involves the heating of powder ore to the point of partial melting, resulting in the agglomeration of the iron ore particles into a lumpy porous mass known as sinter. This process is critical for the efficient operation in the iron and steelmaking industry, as it improves the blast furnace performance with better gas permeability and a higher yield from the input iron ore.

## Geography
Z12工厂同一名称的工艺过程

## Reference product
- Sinter / Pellet Dust: 0.3472; measured
  z13

## Inputs
- iron: 928; measured
  Iron-containing raw materials
- anthracite: 69; measured
  solid fuel/anthracite
- Energy, geothermal, converted: 2315.3; measured
  z13

## Outputs
- phenol,Sulphur oxides (as SO2): 0.043; measured
  z13
- Flue dust: 0.64; measured
  z13

## Use advice
Users of this Life Cycle Assessment (LCA) data set for sinter production should consider the technological applicability and context of the sintering process in relation to their specific project needs. It is critical to ensure that the system boundaries and assumptions used in the analysis match the actual conditions of the sinter production being assessed. Users should also take care to model the emissions and energy consumption associated with the sintering process accurately, including any upstream and downstream environmental impacts. Additionally, if the system under assessment includes recycling, users need to apply the appropriate methodology to account for the benefits and burdens of the material recycling.

## Review details
Inventory: The internal review was done by several iteration steps concerning raw data validation, raw data documentation, representativity, completeness and consistency of modelling with regard to ISO 14040 and 14044.

## Data sources
- 刘微. LCI数据质量体系中的分析方法研究. (北京工业大学, 2006).
