# Pet feed ; Protein-based raw materials (soybean meal, etc.), corn, vitamins, trace elements and other raw and auxiliary materials ; Crushing+mixing+granulating+dust removal ; All sizes; NESPS2 / 宠物饲料 ; 蛋白质类原料（豆粕等）、玉米、维生素、微量元素等原辅料 ; 粉碎+混合+制粒+除尘 ; 所有规模 ; 全国第二次污染普查数据

Dataset: ILCD process, Unit process, single operation
Geography: CN
Reference year: 2019
Classification: Reference Parameters / Materials production / Food and renewable raw materials
Generated by: The data was created by the Office of the Second National Pollution Source Census of the Ministry of Ecology and Environment, and the data was organized by the TianGong Plan team for ILCD format / 生态环境部第二次全国污染源普查工作办公室创建数据，天工计划团队常慧敏整理数据为ILCD格式
Owner: Tiangong LCI Data Working Group / 天工LCI数据工作小组
Review: Dependent internal review by Tiangong LCI Data Working Group / 天工LCI数据工作小组
Amounts: no units in this file; such an amount is in the reference unit of its flow, which a separate flow dataset defines
copyright: false
licenseType: Free of charge for all users and uses

## General comment
the Technical of end-of-pipe management technology for pollution Assorted Feedis/，The formula for calculating the actual operation rate (k-value) of the end-of-pipe treatment facility is (After the wastewater is directly discharged into the relevant sewage pipe network, it will be uniformly treated by the industrial park or relevant municipal sewage treatment plants)

## Technical purpose
该工艺用于宠物饲料的生产。使用蛋白质类原料（例如豆粕）、玉米、维生素和微量元素。生产流程包括粉碎、混合、制粒和除尘阶段，适用于各种规模的宠物饲料设施。此外，采用末端治理技术处理PM2.5至PM10的颗粒污染物。

## Reference product
- Assorted Feed: 1000; calculated
  源文件中描述为为宠物饲料，此处对其进行了匹配工作，将其匹配到LCAflow库里面相最符合的流

## Outputs
- particles (PM2.5 - PM10): 0.099; calculated
  the Technical of end-of-pipe management technology for pollution particles (PM2.5 - PM10)is/，The formula for calculating the actual operation rate (k-value) of the end-of-pipe treatment facility is Operating time of waste gas purification equipment (hours) / total production time (hours)
  污染物指标颗粒物的末端治理技术是/，末端治理设施实际运行率（k值）计算公式为/。原文件中描述污染物类别为废气，污染物指标为颗粒物，此处对其进行了匹配工作，将其匹配到LCAflow库里面相最符合的流

## Use advice
This dataset is derived from the Pollution Source Census Report and contains information on pollution emissions and related products. However, it does not include data on energy or chemical consumption, nor does it provide information on waste or co-product generation. When utilizing this dataset, please supplement the missing data based on actual conditions before use
该数据集来源于污染源普查报告，包含污染物排放及相关产品信息，但不包含能源或化学品消耗数据，也不提供废弃物或共生产物产生信息。在使用该数据集时，请根据实际情况补充缺失数据后再使用。

## Review details
Inventory: The internal review was done by several iteration steps concerning raw data validation, raw data documentation, representativity, completeness and consistency of modelling with regard to ISO 14040 and 14044.
清单： 内部审查通过几个迭代步骤完成，涉及原始数据验证、原始数据记录、代表性、完整性、与 ISO 14040 和 14044 有关的建模的一致性。

## Data sources
- 第二次全国污染源普查产排污核算系数手册（试用版）,三级代码132.0文件，在完整版文件中第2527页
