# Electricity production ; Electricity ; Thermal power (76.1%) + hydropower (7.2%) + wind power (12.4%) + solar power (4.3%)

Dataset: ILCD process, Partly terminated system
Geography: JL-CN
Reference year: 2019
Classification: Energy carriers and technologies / Electricity
LCI method principle: Other
Generated by: Ruoxi Xiong, xiongrx0126@163.com
Owner: Tiangong LCI Data Working Group
Review: Dependent internal review by Tiangong LCI Data Working Group
Amounts: no units in this file; such an amount is in the reference unit of its flow, which a separate flow dataset defines
copyright: false
licenseType: Free of charge for all users and uses

## General comment
Forms of electricity generation include thermal power, hydropower, wind power and solar power

## Time period
Calculated based on data from the 2019 Energy Statistics Yearbook

## Technical purpose
This electricity production data set encompasses a mix of thermal (coal, gas, oil), hydropower, wind power, and solar power generation facilities. The proportion of each type of power generation is 76.1% for thermal power, 7.2% for hydropower, 12.4% for wind power, and 4.3% for solar power. It is intended for use in the energy sector for providing electricity to residential, commercial, industrial, and public services. This diverse energy mix is useful for understanding the environmental impact of electricity consumption within regions that utilize these varying electricity generation methods.

## Reference product
- Electricity: 3.6; calculated

## Outputs
- carbon dioxide: 0.828; calculated
- sulfur dioxide: 0.000142; calculated
- Nitrogen oxides: 0.000223724; calculated
- Dust (unspecified, from stack): 2.7533e-5; calculated

## Data treatment and extrapolations
For the accounting method, please refer to the "Enterprise Greenhouse Gas Emissions Accounting Methods and Reporting Guidelines for Power Generation Facilities". Different forms of power generation and fuel consumption come from Chapter 3 (Energy Production) and Chapter 6 (Regional Energy Balance Sheet) in the "China Energy Statistical Yearbook 2020". The fuel parameters such as low calorific value and carbon content per unit calorific value used to calculate the carbon dioxide emission factor come from the "2019 China Regional Power Grid Carbon Dioxide Baseline Emission Factor Calculation Instructions OM" and the "Enterprise Greenhouse Gas Emission Accounting Method and Reporting Guide for Power Generation Facilities" 》

## Use advice
When utilizing this data set for Life Cycle Assessment (LCA), it is important to accurately reflect the regional energy mix as indicated. The emissions factors should be applied based on this proportional representation of electricity generation sources. Methodological attention must be given to the scope of the LCA, ensuring that the electricity consumption in the analyzed system adheres to this power generation distribution. Any updates or changes in the energy mix or technology should be considered and the data should be adjusted accordingly. The data should not be used for single-source energy generation assessments unless the specific source matches one of the profile's proportions. Users are advised to consult the referenced 'Enterprise Greenhouse Gas Emissions Accounting Methods and Reporting Guidelines for Power Generation Facilities' for calculating greenhouse gas emissions.

## Review details
Inventory: The internal review was done by several iteration steps concerning raw data validation, raw data documentation, representativity, completeness and consistency of modelling with regard to ISO 14040 and 14044.

## Data sources
- 熊若熙. 中国电力生产和消费二氧化碳与污染物排放因子核算. (清华大学, 2023).
