# cement production;cement, portland cement;post-combustion CO2 capture

Dataset: ILCD process, Unit process, black box
Geography: CN
Reference year: 2008
Classification: Unit processes / Materials production / Other mineralic materials
Generated by: #REF!, ysqsophia@gmail.com
Owner: Tiangong LCI Data Working Group
Review: Dependent internal review by Tiangong LCI Data Working Group
Amounts: no units in this file; such an amount is in the reference unit of its flow, which a separate flow dataset defines
copyright: false
licenseType: Free of charge for all users and uses

## General comment
Cement production with post-combustion carbon capture and storage (CCS).For post-combustion CO2 capture technology, a CO2 separation process is added before the fluegas is discharged to the atmosphere. The separated high-purity CO2, after being compressed, canthen be transported and stored. Chemical absorption is currently the most widely used method forcapturing CO2 from low pressure and low concentration flue gases, and MonoEthanolAmine (MEA) is the most widely useochemical adsorbent. Therefore, the MEA adsorption method was selected as a case study forpost-combustion CO2 capture technology. Extra energy is required for MEA CO2 capture because MEA has to be regenerated by a large amount of low-pressure steam after the CO2 has been absorbed in the MEA. We assumed that steam will be supplied by an onsite combined heat and power (CHP) plantand that the plant can also meet the power requirements of the post-combustion capture process ancother production processes in the cement plant. NOx and SO2 in the kiln flue gas can have negativeimpacts on the MEA absorption process, so they have to be reduced to the required level before theflue gas is passed to the CO2 capture unit. A selective catalytic reduction (SCR) unit isconsidered to eliminate NOx and a flue gas desulphurization (FDG) unit is considered to remove SO2 from the flue gas.

## Geography
http://documents.ieaghg.org/index.php/s/YKm6B7zikUpPgGA?path=%2F2008

## Technology and included processes
For post-combustion CO, capture technology, a CO, separation process is added before the fluegas is discharged to the atmosphere. The separated high-purity CO,, after being compressed, canthen be transported and stored. Chemical absorption is currently the most widely used method forcapturing CO, from low pressure and low concentration flue gases, and MEA is the most widely useochemical adsorbent (191. Therefore, the MEA adsorption method was selected as a case study forpost-combustion CO, capture technology. Extra energy is required for MEA CO, capture because MEAhas to be regenerated by a large amount of low-pressure steam after the CO, has been absorbed in theMEA. We assumed that steam will be supplied by an onsite combined heat and power (CHP) plantand that the plant can also meet the power requirements of the post-combustion capture process ancother production processes in the cement plant. NOx and SO, in the kiln flue gas can have negativeimpacts on the MEA absorption process, so they have to be reduced to the required level before theflue gas is passed to the CO capture unit. In this study, a selective catalytic reduction (SCR) unit isconsidered to eliminate NO and a flue gas desulphurization (FDG) unit is considered to remove SOfrom the flue gas.

## Technical purpose
The Portland cement production process described is intended for the manufacturing of cement with a production capacity of 1 million tons per year. The process incorporates post-combustion carbon capture and storage (CCS) to mitigate CO2 emissions, utilizing MonoEthanolAmine (MEA) as the chemical adsorbent. It is specifically engineered for applications where CO2 emission reduction is targeted, such as in environments with strict emission regulations. The cement produced, with 91% clinker content, is suitable for construction purposes with considerations of reduced environmental impact.

## Reference product
- cement, portland cement: 1000
  Cement products. Data taken from the technical report, IEA Greenhous Gas R&D Programme (IEA GHG). CO2 Capture in the Cement Industry. 2008. Available online: http://documents.ieaghg.org/index.php/s/YKm6B7zikUpPgGA?path=%2F2008 (accessed on 5 September 2017).

## Inputs
- hard coal; 26.3 MJ/kg: 291.6
  Coal. Data taken from the technical report, IEA Greenhous Gas R&D Programme (IEA GHG). CO2 Capture in the Cement Industry. 2008. Available online: http://documents.ieaghg.org/index.php/s/YKm6B7zikUpPgGA?path=%2F2008 (accessed on 5 September 2017).
- Petroleum Coke: 31.9
  Petroleum coke. Data taken from the technical report, IEA Greenhous Gas R&D Programme (IEA GHG). CO2 Capture in the Cement Industry. 2008. Available online: http://documents.ieaghg.org/index.php/s/YKm6B7zikUpPgGA?path=%2F2008 (accessed on 5 September 2017).
- Electricity: -81.828
  Electricity. Data taken from the technical report, IEA Greenhous Gas R&D Programme (IEA GHG). CO2 Capture in the Cement Industry. 2008. Available online: http://documents.ieaghg.org/index.php/s/YKm6B7zikUpPgGA?path=%2F2008 (accessed on 5 September 2017).
- limestone, crushed, for mill: 1258.51
  Limestone. Data taken from the technical report, IEA Greenhous Gas R&D Programme (IEA GHG). CO2 Capture in the Cement Industry. 2008. Available online: http://documents.ieaghg.org/index.php/s/YKm6B7zikUpPgGA?path=%2F2008 (accessed on 5 September 2017).
- ferric oxide: 7.47
  Iron oxide. Data taken from the technical report, IEA Greenhous Gas R&D Programme (IEA GHG). CO2 Capture in the Cement Industry. 2008. Available online: http://documents.ieaghg.org/index.php/s/YKm6B7zikUpPgGA?path=%2F2008 (accessed on 5 September 2017).
- gypsum stone (CaSO4-dihydrate): 23.63
  Gypsum. Data taken from the technical report, IEA Greenhous Gas R&D Programme (IEA GHG). CO2 Capture in the Cement Industry. 2008. Available online: http://documents.ieaghg.org/index.php/s/YKm6B7zikUpPgGA?path=%2F2008 (accessed on 5 September 2017).
- ammonia, anhydrous, liquid: 1.85
  Ammonia. Data taken from the technical report, IEA Greenhous Gas R&D Programme (IEA GHG). CO2 Capture in the Cement Industry. 2008. Available online: http://documents.ieaghg.org/index.php/s/YKm6B7zikUpPgGA?path=%2F2008 (accessed on 5 September 2017).
- Ethanolamine: 2.24
  MonoEthanolAmine (MEA). Data taken from the technical report, IEA Greenhous Gas R&D Programme (IEA GHG). CO2 Capture in the Cement Industry. 2008. Available online: http://documents.ieaghg.org/index.php/s/YKm6B7zikUpPgGA?path=%2F2008 (accessed on 5 September 2017).

## Outputs
- carbon dioxide (fossil): 1067.73
  CO2 captured. Data taken from the technical report, IEA Greenhous Gas R&D Programme (IEA GHG). CO2 Capture in the Cement Industry. 2008. Available online: http://documents.ieaghg.org/index.php/s/YKm6B7zikUpPgGA?path=%2F2008 (accessed on 5 September 2017).
- carbon dioxide (fossil): 188.42
  CO2 emitted. Data taken from the technical report, IEA Greenhous Gas R&D Programme (IEA GHG). CO2 Capture in the Cement Industry. 2008. Available online: http://documents.ieaghg.org/index.php/s/YKm6B7zikUpPgGA?path=%2F2008 (accessed on 5 September 2017).
- particles (PM2.5): 0.0109
  Particulates, <2.5um. Data taken from ecoinvent database, Ecoinvent Database v3. Available online: http://www.ecoinvent.org/database/ecoinvent-33/ecoinvent-33.html (accessed on 15 April 2018). There was a 50% reduction in particulates for the post-combustion case due to the additional flue gas desulfurization (FDG) and selective catalytic reduction (SCR) processes.
- particles (> PM10): 0.0026
  Particulates, >10um. Data taken from ecoinvent database, Ecoinvent Database v3. Available online: http://www.ecoinvent.org/database/ecoinvent-33/ecoinvent-33.html (accessed on 15 April 2018). There was a 50% reduction in particulates for the post-combustion case due to the additional flue gas desulfurization (FDG) and selective catalytic reduction (SCR) processes.
- particles (PM2.5 - PM10): 0.0036
  Particulates, >2.5 um, and <10 um. Data taken from ecoinvent database, Ecoinvent Database v3. Available online: http://www.ecoinvent.org/database/ecoinvent-33/ecoinvent-33.html (accessed on 15 April 2018). There was a 50% reduction in particulates for the post-combustion case due to the additional flue gas desulfurization (FDG) and selective catalytic reduction (SCR) processes.

## Sampling procedure
The production capacity is set to produce 1 million tons of cement per year, with the proportion of clinker in cement products being 91%.

## Use advice
When using this data set for life cycle assessment, it is crucial to consider that the captured CO2 and the additional energy input required for the MEA regeneration process should be accounted for separately. The surplus electricity generated by the on-site Combined Heat and Power (CHP) plant is exported to the grid, and its environmental offsets are not accounted for in this data. Therefore, users must handle these aspects according to their specific methodological framework. Additionally, the impacts of NOx and SO2 on the MEA absorption process are indicated, recommending that these emissions be controlled before entering the CO2 capture unit. Use this data carefully within the context of the technological applicability and operational conditions stated.

## Review details
Inventory: The internal review was done by several iteration steps concerning raw data validation, raw data documentation, representativity, completeness and consistency of modelling with regard to ISO 14040 and 14044.

## Data sources
- Jing An, Richard S. Middleton, & Yingnan Li. (2019). Environmental Performance Analysis of Cement Production with CO2 Capture and Storage Technology in a Life-Cycle Perspective. Sustainability 11, 2626.
