# Polyethylene production ; polyethylene ; low-pressure gas-phase fluidized bed 550000t/a

Dataset: ILCD process, Unit process, black box
Geography: CN
Reference year: 2009
Classification: Unit processes / Materials production / Plastics
Functional unit: 1 ton of polythene
Generated by: Xiaoyu Cheng, xiaoyucheng@email.ncu.edu.cn
Owner: Tiangong LCI Data Working Group
Review: Dependent internal review by Tiangong LCI Data Working Group
Amounts: no units in this file; such an amount is in the reference unit of its flow, which a separate flow dataset defines
copyright: false
licenseType: Free of charge for all users and uses

## General comment
According to the low-pressure gas-phase fluidized bed polymerization polyethylene production process, the lifecycle stages of the polyethylene production process are divided into the following substages: crude oil extraction and transportation, distillation and refining, ethylene manufacturing, and polyethylene manufacturing.

## Geography
A large petrochemical enterprise in Northeast China

## Time period
Publication time of literature

## Technical purpose
The polyethylene produced by the low-pressure gas-phase fluidized bed process is used for manufacturing a variety of products such as packaging materials, containers, pipes, and automotive components. This polyethylene can be applied in both industrial and consumer products that require durable, lightweight, and flexible plastic materials.

## Reference product
- Polyethylene: 1000; measured

## Inputs
All rows: measured
- energy (recovered): 32300
- Gasoline (regular): 85.05
- Diesel: 56.81
- crude oil; 42.3 MJ/kg: 2326.28
- Light Hydrocarbon: 459.17
- naphtha: 1392.77
- Complement component 3 (C3): 72.48
- C4,C4: 442.87
- Hydrocracking Tail Oil: 565.13
- ethylene: 958.93
- butene: 37.07
- hexane: 20.07
- Butane: 2.4
- hydrogen: 0.11

## Outputs
All rows: measured
- carbon dioxide (fossil): 91.07
  原文未区分bio和fossil，根据专家判断此处为fossil
- sulfur dioxide: 0.63
- Nitrogen oxides: 1.03
- carbon monoxide (fossil): 2.64
  原文未区分bio和fossil，根据专家判断此处为fossil
- hydrocarbons (unspecified): 7.1
- Total Suspended Particles: 4.96
- waste water - untreated: 7.22
- Waste (solid): 77.53

## Data treatment and extrapolations
Necessary supplements and corrections

## Use advice
When using this LCA data for the polyethylene production process, it is important to consider the full lifecycle stages, including crude oil extraction and transportation, distillation and refining, ethylene manufacturing, and polyethylene manufacturing. Ensure that all environmental impacts associated with these stages are included, and perform necessary adjustments based on specific geographic and technological factors relevant to the process implementation. Updates and corrections to the dataset should be taken into account to maintain accuracy, with attention to the publication date of the literature for the currentness of the data.

## Review details
Inventory: The internal review was done by several iteration steps concerning raw data validation, raw data documentation, representativity, completeness and consistency of modelling with regard to ISO 14040 and 14044.

## Data sources
- 李蔓, 王震 & 孙德智. 聚乙烯生产生命周期评价的研究. 环境科学与技术 191–195 (2009).
