# Painting ; Coated parts ; Primer ; Soaked primer drying ; All sizes; NESPS2 / 涂装 ; 涂装件 ; 底漆 ; 浸底漆烘干 ; 所有规模 ; 全国第二次污染普查数据

Dataset: ILCD process, Unit process, single operation
Geography: CN
Reference year: 2019
Classification: Reference Parameters / Systems / Paints and chemical preparations
Generated by: The data was created by the Office of the Second National Pollution Source Census of the Ministry of Ecology and Environment, and the data was organized by the TianGong Plan team for ILCD format / 生态环境部第二次全国污染源普查工作办公室创建数据，天工计划团队常慧敏整理数据为ILCD格式
Owner: Tiangong LCI Data Working Group / 天工LCI数据工作小组
Review: Dependent internal review by Tiangong LCI Data Working Group / 天工LCI数据工作小组
Amounts: no units in this file; such an amount is in the reference unit of its flow, which a separate flow dataset defines
copyright: false
licenseType: Free of charge for all users and uses

## General comment
the treatment technology for the pollution of Exhaust gasdidn't offered，The formula for calculating the actual operation rate (k-value) of the end-of-pipe treatment facility is k = power consumption of wastewater treatment facilities (kWh/year) / operating time of wastewater treatment facilities (hours/year) / total power of wastewater treatment facilities (kW)

## Technical purpose
该描述的工艺适用于需要底漆基础的工业涂装和涂层操作。底漆浸渍及后续烘干是所有尺寸的涂层零件准备阶段的一部分。尾端管理技术包括直接燃烧、热燃烧、再生热燃烧、催化燃烧、再生催化燃烧、吸附/热燃烧、吸附/催化燃烧、低温等离子、光解和光催化，用于处理这些工艺产生的挥发性有机化合物（VOCs）污染。根据所需的技术效率（从30％到95％不等），这些技术在不同的工业应用中找到了它们的用途。还提到了直接排放作为VOC处理的另一种形式，但通常与控制较少的过程相关。

## Reference product
- Undercoat: 1000; input; calculated
  源文件中描述为为底漆，此处对其进行了匹配工作，将其匹配到LCAflow库里面相最符合的流

## Outputs
All rows: calculated
- volatile organic compound: 19.75
  the Technical of end-of-pipe management technology for pollution volatile organic compoundisCatalytic combustion method，Its Technical efficiency of end-of-pipe management95，The formula for calculating the actual operation rate (k-value) of the end-of-pipe treatment facility is k = power consumption of wastewater treatment facilities (kWh/year) / operating time of wastewater treatment facilities (hours/year) / total power of wastewater treatment facilities (kW)
  污染物指标挥发性有机物的末端治理技术是催化燃烧法，其效率为95，末端治理设施实际运行率（k值）计算公式为k=工艺废气净化装置耗电量（千瓦时）/(工艺废气净化装置额定功率（千瓦）×工艺废气净化装置运行时间（小时）)。原文件中描述污染物类别为废气，污染物指标为挥发性有机物，此处对其进行了匹配工作，将其匹配到LCAflow库里面相最符合的流
- volatile organic compound: 19.75
  the Technical of end-of-pipe management technology for pollution volatile organic compoundisDirect combustion，Its Technical efficiency of end-of-pipe management95，The formula for calculating the actual operation rate (k-value) of the end-of-pipe treatment facility is k = power consumption of wastewater treatment facilities (kWh/year) / operating time of wastewater treatment facilities (hours/year) / total power of wastewater treatment facilities (kW)
  污染物指标挥发性有机物的末端治理技术是直接燃烧法，其效率为95，末端治理设施实际运行率（k值）计算公式为k=工艺废气净化装置耗电量（千瓦时）/(工艺废气净化装置额定功率（千瓦）×工艺废气净化装置运行时间（小时）)。原文件中描述污染物类别为废气，污染物指标为挥发性有机物，此处对其进行了匹配工作，将其匹配到LCAflow库里面相最符合的流
- volatile organic compound: 19.75
  the Technical of end-of-pipe management technology for pollution volatile organic compoundisRegenerative catalytic combustion method，Its Technical efficiency of end-of-pipe management95，The formula for calculating the actual operation rate (k-value) of the end-of-pipe treatment facility is /
  污染物指标挥发性有机物的末端治理技术是蓄热式催化燃烧法，其效率为95，末端治理设施实际运行率（k值）计算公式为k=工艺废气净化装置耗电量（千瓦时）/(工艺废气净化装置额定功率（千瓦）×工艺废气净化装置运行时间（小时）)。原文件中描述污染物类别为废气，污染物指标为挥发性有机物，此处对其进行了匹配工作，将其匹配到LCAflow库里面相最符合的流
- volatile organic compound: 19.75
  the Technical of end-of-pipe management technology for pollution volatile organic compoundisRegenerative thermal combustion method，Its Technical efficiency of end-of-pipe management95，The formula for calculating the actual operation rate (k-value) of the end-of-pipe treatment facility is k = power consumption of wastewater treatment facilities (kWh/year) / operating time of wastewater treatment facilities (hours/year) / total power of wastewater treatment facilities (kW)
  污染物指标挥发性有机物的末端治理技术是蓄热式热力燃烧法，其效率为95，末端治理设施实际运行率（k值）计算公式为k=工艺废气净化装置耗电量（千瓦时）/(工艺废气净化装置额定功率（千瓦）×工艺废气净化装置运行时间（小时）)。原文件中描述污染物类别为废气，污染物指标为挥发性有机物，此处对其进行了匹配工作，将其匹配到LCAflow库里面相最符合的流
- volatile organic compound: 19.75
  the Technical of end-of-pipe management technology for pollution volatile organic compoundisThermal combustion，Its Technical efficiency of end-of-pipe management95，The formula for calculating the actual operation rate (k-value) of the end-of-pipe treatment facility is k = power consumption of wastewater treatment facilities (kWh/year) / operating time of wastewater treatment facilities (hours/year) / total power of wastewater treatment facilities (kW)
  污染物指标挥发性有机物的末端治理技术是热力燃烧法，其效率为95，末端治理设施实际运行率（k值）计算公式为k=工艺废气净化装置耗电量（千瓦时）/(工艺废气净化装置额定功率（千瓦）×工艺废气净化装置运行时间（小时）)。原文件中描述污染物类别为废气，污染物指标为挥发性有机物，此处对其进行了匹配工作，将其匹配到LCAflow库里面相最符合的流
- volatile organic compound: 59.25
  the Technical of end-of-pipe management technology for pollution volatile organic compoundisAdsorption/catalytic combustion method，Its Technical efficiency of end-of-pipe management85
  污染物指标挥发性有机物的末端治理技术是吸附/催化燃烧法，其效率为85，末端治理设施实际运行率（k值）计算公式为k=工艺废气净化装置耗电量（千瓦时）/(工艺废气净化装置额定功率（千瓦）×工艺废气净化装置运行时间（小时）)。原文件中描述污染物类别为废气，污染物指标为挥发性有机物，此处对其进行了匹配工作，将其匹配到LCAflow库里面相最符合的流
- volatile organic compound: 59.25
  the Technical of end-of-pipe management technology for pollution volatile organic compoundisAdsorption/thermal combustion method，Its Technical efficiency of end-of-pipe management85，The formula for calculating the actual operation rate (k-value) of the end-of-pipe treatment facility is k = power consumption of wastewater treatment facilities (kWh/year) / operating time of wastewater treatment facilities (hours/year) / total power of wastewater treatment facilities (kW)
  污染物指标挥发性有机物的末端治理技术是吸附/热力燃烧法，其效率为85，末端治理设施实际运行率（k值）计算公式为k=工艺废气净化装置耗电量（千瓦时）/(工艺废气净化装置额定功率（千瓦）×工艺废气净化装置运行时间（小时）)。原文件中描述污染物类别为废气，污染物指标为挥发性有机物，此处对其进行了匹配工作，将其匹配到LCAflow库里面相最符合的流
- volatile organic compound: 158
  the Technical of end-of-pipe management technology for pollution volatile organic compoundisOthers (adsorption)，Its Technical efficiency of end-of-pipe management60，The formula for calculating the actual operation rate (k-value) of the end-of-pipe treatment facility is /
  污染物指标挥发性有机物的末端治理技术是其他（吸附法），其效率为60，末端治理设施实际运行率（k值）计算公式为k=工艺废气净化装置耗电量（千瓦时）/(工艺废气净化装置额定功率（千瓦）×工艺废气净化装置运行时间（小时）)。原文件中描述污染物类别为废气，污染物指标为挥发性有机物，此处对其进行了匹配工作，将其匹配到LCAflow库里面相最符合的流
- volatile organic compound: 276.5
  the Technical of end-of-pipe management technology for pollution volatile organic compoundisLow temperature plasma，Its Technical efficiency of end-of-pipe management30，The formula for calculating the actual operation rate (k-value) of the end-of-pipe treatment facility is /
  污染物指标挥发性有机物的末端治理技术是低温等离子体，其效率为30，末端治理设施实际运行率（k值）计算公式为k=工艺废气净化装置耗电量（千瓦时）/(工艺废气净化装置额定功率（千瓦）×工艺废气净化装置运行时间（小时）)。原文件中描述污染物类别为废气，污染物指标为挥发性有机物，此处对其进行了匹配工作，将其匹配到LCAflow库里面相最符合的流
- volatile organic compound: 276.5
  the Technical of end-of-pipe management technology for pollution volatile organic compoundisPhotocatalysis，Its Technical efficiency of end-of-pipe management30，The formula for calculating the actual operation rate (k-value) of the end-of-pipe treatment facility is /
  污染物指标挥发性有机物的末端治理技术是光催化，其效率为30，末端治理设施实际运行率（k值）计算公式为k=工艺废气净化装置耗电量（千瓦时）/(工艺废气净化装置额定功率（千瓦）×工艺废气净化装置运行时间（小时）)。原文件中描述污染物类别为废气，污染物指标为挥发性有机物，此处对其进行了匹配工作，将其匹配到LCAflow库里面相最符合的流
- volatile organic compound: 276.5
  the Technical of end-of-pipe management technology for pollution volatile organic compoundisPhotolysis，Its Technical efficiency of end-of-pipe management30
  污染物指标挥发性有机物的末端治理技术是光解，其效率为30，末端治理设施实际运行率（k值）计算公式为k=工艺废气净化装置耗电量（千瓦时）/(工艺废气净化装置额定功率（千瓦）×工艺废气净化装置运行时间（小时）)。原文件中描述污染物类别为废气，污染物指标为挥发性有机物，此处对其进行了匹配工作，将其匹配到LCAflow库里面相最符合的流
- volatile organic compound: 395
  the Technical of end-of-pipe management technology for pollution volatile organic compoundisDirect discharge，The formula for calculating the actual operation rate (k-value) of the end-of-pipe treatment facility is k = power consumption of wastewater treatment facilities (kWh/year) / operating time of wastewater treatment facilities (hours/year) / total power of wastewater treatment facilities (kW)
  污染物指标挥发性有机物的末端治理技术是直排，末端治理设施实际运行率（k值）计算公式为k=工艺废气净化装置耗电量（千瓦时）/(工艺废气净化装置额定功率（千瓦）×工艺废气净化装置运行时间（小时）)。原文件中描述污染物类别为废气，污染物指标为挥发性有机物，此处对其进行了匹配工作，将其匹配到LCAflow库里面相最符合的流
- Exhaust gas: 197328
  the treatment technology for the pollution of Exhaust gasdidn't offered，The formula for calculating the actual operation rate (k-value) of the end-of-pipe treatment facility is k = power consumption of wastewater treatment facilities (kWh/year) / operating time of wastewater treatment facilities (hours/year) / total power of wastewater treatment facilities (kW)
  污染物指标工业废气量的末端治理技术未说明。原文件中描述污染物类别为废气，污染物指标为工业废气量，此处对其进行了匹配工作，将其匹配到LCAflow库里面相最符合的流

## Use advice
This dataset is derived from the Pollution Source Census Report and contains information on pollution emissions and related products. However, it does not include data on energy or chemical consumption, nor does it provide information on waste or co-product generation. When utilizing this dataset, please supplement the missing data based on actual conditions before use
该数据集来源于污染源普查报告，包含污染物排放及相关产品信息，但不包含能源或化学品消耗数据，也不提供废弃物或共生产物产生信息。在使用该数据集时，请根据实际情况补充缺失数据后再使用。

## Review details
Inventory: The internal review was done by several iteration steps concerning raw data validation, raw data documentation, representativity, completeness and consistency of modelling with regard to ISO 14040 and 14044.
清单： 内部审查通过几个迭代步骤完成，涉及原始数据验证、原始数据记录、代表性、完整性、与 ISO 14040 和 14044 有关的建模的一致性。

## Data sources
- 第二次全国污染源普查产排污核算系数手册（试用版）,二级代码33-37文件，在完整版文件中第1003页
