# Soil remediation ; ex-situ remediation ; thermal desorption remediation ; engineering implementation ; ex-situ thermal desorption main treatment

Dataset: ILCD process, Unit process, single operation
Geography: SH-CN
Classification: Other Services / Repair and maintenance
Generated by: Wang Feng, wangfeng@caep.org.cn
Owner: Tiangong LCI Data Working Group
Review: Dependent internal review by Tiangong LCI Data Working Group
Amounts: no units in this file; such an amount is in the reference unit of its flow, which a separate flow dataset defines
copyright: false
licenseType: Free of charge for all users and uses

## General comment
Remediation of 1 cubic meter of contaminated soil by ectopic thermal desorption, the contaminated soil is transported to the rotary kiln through the feeder and the conveying device, and the contaminated soil is transported to the rotary kiln through the natural gas.

## Geography
我国华东区域5 个污染土壤异位热脱附修复工程案例

## Technology and included processes
Through the feeding machine and the transmission device, the contaminated soil is transported to the rotary kiln, and the natural gas is introduced to the contaminated soil.

## Technical purpose
The process described pertains to the ex situ thermal desorption remediation of 1 cubic meter of contaminated soil. Contaminated soil is conveyed to a rotary kiln via a feeding machine and conveyor system, where natural gas is introduced to uniformly heat the soil to a set temperature. The soil is then transported at a predetermined rate towards the tail of the kiln and into the discharge hopper. In the rotary kiln, the contaminants in the soil are volatilized and gasified. This process is implemented in five case studies of soil contamination remediation projects in the East China region. The data set is applicable for environmental engineering firms focusing on soil remediation as well as for researchers studying the efficacy of thermal desorption methods for soil decontamination.

## Reference product
- Soil treated with ex-situ thermal desorption primary treatment: 1; measured

## Inputs
- Diesel: 0.0002; measured
- Steel sections: 0.08; measured
- Natural gas, at consumer EU-27: 35; measured
- Electricity: 5.4; measured

## Use advice
When utilizing this data set, ensure that the environmental conditions of the use case closely align with those of the East China region case studies, given the regional specificity of the processes described. Users should account for variations in soil composition, contaminant types, and local regulations which may affect the applicability and effectiveness of the thermal desorption process. Additionally, consider the efficiency, energy requirements, and potential emissions associated with the use of natural gas in the heating process. Methodologically, this data should be used with considerations for the boundary conditions of the LCA, specifically whether the scope includes or excludes the consequences of the gasification and volatilization of contaminants.

## Review details
Inventory: The internal review was done by several iteration steps concerning raw data validation, raw data documentation, representativity, completeness and consistency of modelling with regard to ISO 14040 and 14044.

## Data sources
- 刘爽,陈盼,宋慧敏等.我国华东地区污染土壤异位热脱附修复碳排放及减排策略[J].环境工程学报,2022,16(08):2663-2671.
