# Shale gas production;Site preparation stage;Pad construction

Dataset: ILCD process, Unit process, black box
Geography: SC-CN
Reference year: 2014
Valid until: 2016
Classification: Unit processes / Energy carriers and technologies / Natural gas based fuels
Generated by: Pu Hong, 15695258655@163.com
Owner: Tiangong LCI Data Working Group
Review: Dependent internal review by Tiangong LCI Data Working Group
Amounts: no units in this file; such an amount is in the reference unit of its flow, which a separate flow dataset defines
copyright: false
licenseType: Free of charge for all users and uses

## General comment
The data set represents the pad construction phase during the site preparation for shale gas production. This specific process is applicable to the industry involving the extraction of shale gas, focusing on the initial steps required to prepare the site for drilling and future extraction. Typically, this involves the construction of a stable platform or 'pad' which serves as a foundation for the drilling rig and associated equipment. This data set is relevant for companies and entities dealing with shale gas operations in the Sichuan and Chongqing regions of China.

## Geography
China's shale gas extraction work is currently concentrated in the Sichuan and Chongqing areas, and the data from Sichuan and Chongqing are selected for LCA calculations.

## Time period
Raw data dates between 2014-2016

## Reference product
- Well pad: 8100; min 7350; max 9600; uniform; measured
  场地准备阶段--建成井场的面积

## Inputs
- gravel: 1.005e6; min 912000; max 1.191e6; uniform; measured
  Gravel used in well site construction
- Diesel: 4122; min 3741; max 4886; uniform; measured
  Transportation of equipment and gravel

## Use advice
For life cycle assessment calculations, use the provided data set specifically for scenarios applicable to shale gas site preparation in Sichuan and Chongqing. Given the regional focus of the data, it is important to ensure its applicability to local geological and infrastructural conditions when using it in models. Users should consider the temporal relevance of the raw data from 2014-2016 and update it if necessary to reflect current practices. The pad construction stage is key to site stability and future production efficiency; thus, attention should be paid to accurate representation within the model. Exclude recycling processes, as this data set pertains to initial construction without consideration of end-of-life stages.

## Review details
Inventory: The internal review was done by several iteration steps concerning raw data validation, raw data documentation, representativity, completeness and consistency of modelling with regard to ISO 14040 and 14044.

## Data sources
- Wang, J., Liu, M., McLellan, B. C., Tang, X. & Feng, L. Environmental impacts of shale gas development in China: A hybrid life cycle analysis. Resources, Conservation and Recycling 120, 38–45 (2017).
