# Milk production ; cow production stage

Dataset: ILCD process, Unit process, single operation
Geography: HLJ-CN
Reference year: 2012
Classification: Unit processes / Materials production / Agricultural production means
Functional unit: In this study, the functional unit was set to 1 ton FPCM (fat-protein corrected milk).
Generated by: Rui Yang, 1632707028@qq.com
Owner: Tiangong LCI Data Working Group
Review: Dependent internal review by Tiangong LCI Data Working Group
Amounts: no units in this file; such an amount is in the reference unit of its flow, which a separate flow dataset defines
copyright: false
licenseType: Free of charge for all users and uses

## General comment
The breed of dairy cows is Holstein dairy cows, which are raised with scattered words. The average weight of dairy cows is 539kg, the average milk yield is 6073.71kg/head/year, the milk fat ratio is 3.8%, and the milk protein ratio is 3.1%.

## Geography
In this paper, LCA method was used to assess the environmental impact of dairy farm production system in Heilongjiang Province.

## Technology and included processes
In this study, the production of dairy cows was divided into four stages, namely, pick-up period, breeding period, lactation period and dry milk period, without considering the pollution emission during pick-up period

## Technical purpose
This data set describes the milk production process at the cow production stage, specifically for Holstein dairy cows. The described application is relevant to agricultural operations focused on dairy farming and milk production, including the management and care of dairy cows through various stages such as breeding, lactation, and dry periods. This information is particularly useful for dairy farms, agricultural researchers, and food industry stakeholders who aim to understand and optimize milk production, as well as assess the environmental impact of dairy farming operations in Heilongjiang Province.

## Reference product
- milk: 1000; measured
  1t FPCM

## Inputs
- maize grain: 348.79
- soybean: 211.75; measured
- wheat: 474.92; measured
- alfalfa: 2650; measured
- silage corn: 16290; measured

## Outputs
All rows: measured
- carbon monoxide (fossil): 0.23135
  原文未区分bio和fossil，根据专家判断此处为fossil
- nitrogen, total (excluding N2): 1.33257
  1 NOx
- carbon dioxide (biogenic): 591.132
- nitrous oxide: 0.13
- methane (fossil): 18.62
- sulfur oxides: 0.80381
  1Sulfur oxides
- ammonia: 0.64501

## Use advice
Users applying this data set for Life Cycle Assessment (LCA) purposes should carefully model the dairy farming system by considering the distinct stages of dairy cow production: breeding, lactation, and dry periods. The pollution emissions from the pick-up period are excluded in this study and should be taken into account if relevant. The functional unit for the study is 1 ton of FPCM (fat-protein corrected milk), which should be consistently applied when modeling the environmental impact. This data set should be used to assess the environmental impact of dairy production in Heilongjiang Province and may require regional adaptation when applied to different locations.

## Review details
Inventory: The internal review was done by several iteration steps concerning raw data validation, raw data documentation, representativity, completeness and consistency of modelling with regard to ISO 14040 and 14044.

## Data sources
- 曹正纲. 黑龙江省奶牛场生命周期评价. (东北农业大学, 2012).
