# Aluminum ingot casting ; Primary aluminum ingot ; Liquid primary aluminum ; 2014

Dataset: ILCD process, Unit process, single operation
Geography: CN
Reference year: 2021
Classification: Unit processes / Materials production / Metals and semimetals
Generated by: Zimeng Cai, caizm6178@163.com
Owner: Tiangong LCI Data Working Group
Review: Dependent internal review by Tiangong LCI Data Working Group
Amounts: no units in this file; such an amount is in the reference unit of its flow, which a separate flow dataset defines
copyright: false
licenseType: Free of charge for all users and uses

## General comment
This dataset represents the process of aluminum ingot casting using liquid primary aluminum, specifically for the production of primary aluminum ingots. The material data is relevant for the manufacturing of aluminum products used across various industries such as aerospace, construction, packaging, and the automotive sector, as well as for electrical applications due to its high conductivity.

## Time period
Date of publication

## Reference product
- aluminium, primary, ingot: 1000; software or database

## Inputs
- aluminium, primary, liquid: 1028.78; software or database

## Data selection and combination
The data in this study refers to the LCA data of PA, SA, electricity, and other background data. The PA data were obtained from statistical data sources, and the SA data were mainly obtained from the literatures. The background data were mainly derived from the Chinese localization LCA database CAS RCEES 2018, which was established by the Research Center for Eco-Environmental Sciences, Chinese Academy of Sciences and covers LCA data for energy, materials, transportation, waste management etc.

## Use advice
When using this LCA dataset, it is important to consider the specific year of data collection (2014), as changes in technology or efficiency may have occurred since then. The dataset is sourced from statistical data for primary aluminum (PA), secondary aluminum (SA), and electricity usage along with other background data. For accurate results, the scope of the assessment should align with the geographical and technological context of the data source, refer to CAS RCEES 2018 for Chinese background data, and consider methodological differences when applying this dataset in a global context or in conjunction with data from other regions.

## Review details
Inventory: The internal review was done by several iteration steps concerning raw data validation, raw data documentation, representativity, completeness and consistency of modelling with regard to ISO 14040 and 14044.

## Data sources
- Ding, N., Liu, N., Lu, B. & Yang, J. Life cycle greenhouse gas emissions of aluminum based on regional industrial transfer in China. J. Ind. Ecol. 25, 1657–1672 (2021).
