# Electricity Generation｜electricity｜biomass boiler（6MW）

Dataset: ILCD process, Unit process, single operation
Geography: CN
Reference year: 2010
Classification: Unit processes / Energy carriers and technologies / Electricity
Functional unit: 1 ton of straw as a functional unit (0% moisture content).
LCI method principle: Consequential
Generated by: Chaoshuo Liu, liucs22@mails.jlu.edu.cn
Owner: Tiangong LCI Data Working Group
Review: Dependent internal review by Tiangong LCI Data Working Group
Amounts: no units in this file; such an amount is in the reference unit of its flow, which a separate flow dataset defines
copyright: false
licenseType: Free of charge for all users and uses

## General comment
The electricity generated from this process is intended for general supply to the grid or direct usage where a renewable energy source is preferred. The process, involving a biomass boiler of 6MW capacity, uses dry straw with 0% moisture content as the fuel source. This energy production method can be applied in areas where straw is abundantly available from agricultural activities and is suitable for facilities aiming for sustainable or carbon-neutral operations.

## Reference product
- electricity from waste incineration: 3600; measured

## Inputs
- Crop straw: 1000; measured

## Outputs
All rows: measured
- sulfur dioxide: 1.38
- carbon monoxide,carbon monoxide (fossil): 0.025
- nitrous oxide: 5.27, 0.00083 (2 entries)
- hydrocarbons (unspecified): 0.65
- particles (> PM10),particles (> PM10): 1.84
- carbon dioxide (biogenic),carbon dioxide (biogenic): 1367.7
  The expert notes that the original text does not differentiate between biogenic and fossil sources of emissions, and in their opinion, the emissions in question are biogenic.
- carbon monoxide (biogenic): 1.316
  (same comment as for carbon dioxide (biogenic),carbon dioxide (biogenic))

## Use advice
Users of this data should consider the geographic and climatic conditions of the region when applying the process data to their evaluations. Specific attention should be paid to the availability of straw and its moisture content, as the functional unit is based on dry straw with 0% moisture content. Variations in moisture content can affect the heat value of the biomass and therefore the efficiency of the boiler. Additionally, the implications of straw removal for soil health and the sustainability of agricultural practices should be assessed.

## Review details
Inventory: The internal review was done by several iteration steps concerning raw data validation, raw data documentation, representativity, completeness and consistency of modelling with regard to ISO 14040 and 14044.

## Data sources
- Lu, W. & Zhang, T. Life-Cycle Implications of Using Crop Residues for Various Energy Demands in China. Environ. Sci. Technol. 44, 4026–4032 (2010).
