# cement production;cement, portland cement, 42.5MPa;wet process

Dataset: ILCD process, Unit process, black box
Geography: CN
Reference year: 2004
Classification: Materials production / Other mineralic materials
Generated by: Siqi Yang, ysqsophia@gmail.com
Owner: Tiangong LCI Data Working Group
Review: Dependent internal review by Tiangong LCI Data Working Group
Amounts: no units in this file; such an amount is in the reference unit of its flow, which a separate flow dataset defines
copyright: false
licenseType: Free of charge for all users and uses

## General comment
Typical cement production process.

## Technical purpose
The 42.5MPa Portland cement manufactured through the wet process is primarily intended for construction applications where moderate to high strength concrete is required. It is suitable for residential and commercial construction, bridges, pavements, and precast concrete products.

## Model description
The study used 1kg of 42.5 grade Portland cement as the functional unit for evaluation. The scope of evaluation is defined as the in-plant production process of cement products and its surrounding environment. Among them, the in-plant production process refers to the entire production process in which raw materials undergo pretreatment, raw meal grinding, calcination, clinker mill and cement homogenization in sequence and finally become cement products. The surrounding environment of the cement production process refers to the input of external resources and energy and the emission of pollutants.

## Reference product
- cement, portland cement, 42.5MPa: 1000
  1kg42.5 MPa Portland cement

## Inputs
- limestone, crushed, for mill: 1224.1
  Limestone
- clay: 199
  Clay
- gypsum stone (CaSO4-dihydrate): 44.4
  Gupsum
- iron, powder: 26.3
  Iron powder
- hard coal: 208.802
  Standard coal. The original data is 0.1940kg standard coal, here converted to hard coal, the conversion formula is 1kg hard coal = 0.929kg standard coal.
- electricity, medium voltage: 400.32
  Electricity

## Outputs
- particles (> PM10): 0.343
  Particulates, with an unspecified particle size, is treated as PM > 10 micrometers in diameter.
- sulfur dioxide: 0.9033
  SO2
- Nitrogen oxides: 2.262
  NOx
- carbon dioxide: 1127
  CO2

## Use advice
When utilizing this LCA data for 42.5MPa Portland cement, take into account that the functional unit is 1kg of cement. Ensure to include all processes from raw material pretreatment to cement homogenization as defined within the in-plant production process. Consider both energy consumption (electricity and coal) and pollutant emissions (particulate matter, SO2, NOx, CO2, etc.) within the factory boundaries. External resource inputs and pollution outputs should also be included as part of the surrounding environmental scope. This dataset is not intended for assessments of downstream use phases or end-of-life scenarios and does not account for potential recycling or recovery activities.

## Review details
Inventory: The internal review was done by several iteration steps concerning raw data validation, raw data documentation, representativity, completeness and consistency of modelling with regard to ISO 14040 and 14044.

## Data sources
- 朱天乐, 何炜, 曾小岚, 黄新, & 马保国. (2006). 中国水泥生产环境负荷研究. 环境科学, 10, 2135–2138.
