# the production of indigo in an anaerobic environment at laboratory and pilot level

Dataset: ILCD process, Unit process, black box
Geography: SD-CN
Reference year: 2022
Classification: Unit processes / Materials production / Organic chemicals
Functional unit: the production of 1 ton indigo
Generated by: Kailingli Liao, calinly@163.com
Owner: Tiangong LCI Data Working Group
Review: Dependent internal review by Tiangong LCI Data Working Group
Amounts: no units in this file; such an amount is in the reference unit of its flow, which a separate flow dataset defines
copyright: false
licenseType: Free of charge for all users and uses

## General comment
without flow chart

## Geography
S. cusia was collected from the Guizhou Province and was provided by Shandong Yunqing Biotechnology Co., Ltd., Shandong Province, China.

## Time period
Publication date

## Technology and included processes
phytoextraction ; Strobilanthes cusia

## Technical purpose
The indigo produced from Strobilanthes cusia in an anaerobic environment is intended for applications that require a dye with a purity of 45.2%. This could include textile manufacturing, particularly for coloring fabrics where a specific purity level of indigo is required. The process has been tested at laboratory and pilot scales to ensure feasibility and potential scalability for larger production volumes. The indigo extraction process is designed for production facilities equipped to handle large reactors with centralized nitrogen supply and processes for sedimentation, extraction, and drying.

## Reference product
- indigo: 1000
  indigo, purity 45.2%

## Inputs
- Water for industrial use: 333000
  industrial water
- biomass; 14.7 MJ/kg: 333300
  biomass

## Data selection and combination
In the 500 dm3 pilot test, approximately 5 kg of indigo with a purity of 45.2% was produced(Table 2). Therefore,to produce a 0.5 ton of indigo per day, 10 sets of 5,000 dm 3 reactors would be required with a centralized nitrogen supply device and subsequent sedimentation, extraction, and drying.

## Sampling procedure
Strobilanthes cusia was collected from the Guizhou Province and was provided by Shandong Yunqing Biotechnology Co., Ltd., Shandong Province, China.

## Use advice
When using the provided Life Cycle Assessment data for the production of indigo, please note that the data set includes production information based on a pilot scale of 500 dm3 reactors. Users should be aware that scaling up to commercial production levels may require additional data and adjustments to the methodology. Since the data set does not include information on energy, water, transportation, and raw material inputs, users should integrate this information from other sources to construct a comprehensive LCA. Consideration of the regional sourcing of S. cusia and the specific conditions of the anaerobic process are critical. Always refer to the publication date to assess the data's timeliness.

## Review details
Inventory: The internal review was done by several iteration steps concerning raw data validation, raw data documentation, representativity, completeness and consistency of modelling with regard to ISO 14040 and 14044.

## Data sources
- Jin, Z. et al. Integrated process for the production of indigo and indirubin in an anaerobic environment at laboratory and pilot level. Journal of Cleaner Production 364, 132610 (2022).
