# Pig production ; farmers in Penzhoushan area free-range ; feed raw materials production

Dataset: ILCD process, Unit process, single operation
Geography: SC-CN
Reference year: 2006
Classification: Unit processes / Materials production / Agricultural production means
Functional unit: In this study, the functional unit (FU) was defined as "1kg pig carcass", which included skin, bone and fat. Foreign studies generally only considered lean meat, but in China's consumption mode, skin and viscera were also fully utilized as edible foods. The concept of carcass was adopted in this study. Although the bone included in this study is an inedible part, it can play a certain compensative role because it does not contain internal organs. In addition, the current data can be easily converted into carcass weight, so it is more in line with the actual situation.
Generated by: Rui Yang, 1632707028@qq.com
Owner: Tiangong LCI Data Working Group
Review: Dependent internal review by Tiangong LCI Data Working Group
Amounts: no units in this file; such an amount is in the reference unit of its flow, which a separate flow dataset defines
copyright: false
licenseType: Free of charge for all users and uses

## General comment
In Sichuan, farmers provide about 79.5% of the commercial pigs, which has an important position in Sichuan pig industry. The main scenario states and parameters were set as follows: (1) the feed was mainly composed of self-planted corn, vegetables and other agricultural by-products, supplemented with a small amount of concentrated feed (soybean meal 70%, rapeseed meal 10%), and the insufficient part was collected as feed supplement. The cultivated land area is assumed to be 0.2067 square hectares per household. (2) The average number of pigs is 3 / household, most of the varieties are soil mixed pigs (local sows and foreign breeding pigs cross, a few are Chinese local breeds) the average slaughter rate is 70%; (3) Extensive feeding and management methods, long feeding period, the average pig feeding day is about 240d, the average weight of the yard is 100kg; (4) Manure treatment and utilization: The anaerobic manure tank is used for storage,80% of which is returned to the field, 48% of which is directly returned to the field in the busy season, and the long-term storage accounts for 32% (irregular return to the field). 20% of the fecal water is leaking in the manure tank or when returning to the field, and the COD of the seepage water is 50mg/L.

## Geography
Since the agricultural resource consumption is allocated according to the occupied land, the specific crop yield is no longer considered in scenario A, and the concentrated feed and the full-priced feed under various scenarios are converted into equivalent land area according to the corresponding average yield of main grains in the whole country or Sichuan province according to the set two situations.

## Time period
The average level of energy consumption and the amount of fertilizer, pesticide and mulch used in feed raw materials production in Sichuan Province was calculated according to China Statistical Yearbook 2006.

## Technology and included processes
Soybean meal (70%) and rapeseed meal (10%) were analyzed in concentrate, and other components were not considered. The components of the full price feed are mainly corn based grains (70%) and soybean meal (25%), and the other components are not considered. Minerals, disinfectants and various small equipment facilities are not included.

## Technical purpose
The described process refers to a small-scale, free-range pig farming operation within the Penzhoushan region in Sichuan, China. The pigs are raised primarily on a diet of self-grown corn, vegetables, and agricultural by-products, with a supplement of concentrated feed composed of soybean and rapeseed meal. This method of pig production is significant within the Sichuan pig industry and is crucial in contributing to the local food supply. The pigs are a mixture of local and foreign breeds, with an average slaughter rate of 70%. The pig manure is managed using an anaerobic manure storage system, with a large portion returned to the fields as fertilizer. This type of farming could be relevant for regions looking to implement sustainable and localized agricultural practices, contributing to environmental conservation and rural economic development.

## Reference product
- pig: 1; estimated
  作为参考定量，非实际输出

## Inputs
- nitrogen: 0.1074; measured
  Scenario A
- phosphorus: 0.0334; measured
  Scenario A
- polyvinylchloride resin (E-PVC): 0.0073; measured
  Scenario A
- hard coal: 1.57382; calculated
  Scenario A
- Gasoline (regular): 0.155037; calculated
  Scenario A
- Diesel: 1.24909; calculated
  Scenario A
- Electricity: 0.073269; calculated
  Scenario A

## Deviations from the LCI method approaches
This study combined LCA methodology and scenario analysis method to conduct systematic environmental impact assessment for three typical pig production scenarios in Sichuan, explore the specific algorithms applied to the current environmental impact assessment of pig production, and reveal the environmentally friendly and unfavorable aspects of various pig production systems and their non-renewable energy utilization efficiency. The results are helpful to the understanding of environmental impact of pig industry and provide reference for the establishment of sustainable development model of pig industry.

## Data selection and combination
1) The basic situation of Sichuan pig industry and the setting of various scenarios in this study, on the one hand, the opinions of a number of pig experts in Sichuan Province were solicited, and on the other hand, field investigations were carried out. 2) The relevant data in crop production are mainly from the 2005 statistics given in the annual yearbook. The production data of feed raw materials in Sichuan and the national average data are used to distinguish the two cases of raw materials coming from within the province and outside the province.

## Data treatment and extrapolations
The production data of feed raw materials in Sichuan and the national average data are used to distinguish the two cases of raw materials coming from within the province and outside the province. The consumption of agricultural materials is calculated according to the corresponding raw material consumption and the average yield of main grains in the whole country or Sichuan Province, and then calculated according to the area. Due to the large differences in the feed formulations used in the three scenarios, the assumption of the proportion of main raw material consumption was made, and then adjusted according to the sample survey data.

## Use advice
When utilizing the data from this pig production process for a Life Cycle Assessment (LCA), users should account for the localized nature of the raw material production and manure management system. Special attention should be given to the agricultural resource consumption allocated according to the occupied land rather than specific crop yield in scenario A. For feed production, the assumed proportions of self-cultivated crops and agricultural by-products plus concentrated feeds need to be reflected in the LCA. The environmental impact from feed should be derived from the 2005 statistics for crop production and use levels of fertilizer, pesticide, and mulch, as well as the average energy consumption for raw material production. It is important to use the definition of the functional unit as 1 kg of pig carcass, including skin, bones, and fat, as is customary in China, rather than lean meat only. Any LCA employing this data should adapt the functional unit accordingly and note the environmental advantages or disadvantages specific to this farming system and the non-renewable energy efficiencies involved.

## Review details
Inventory: The internal review was done by several iteration steps concerning raw data validation, raw data documentation, representativity, completeness and consistency of modelling with regard to ISO 14040 and 14044.

## Data sources
- 白林. 四川养猪业清洁生产系统LCA及猪粪资源化利用关键技术研究. (四川农业大学, 2007).
