# Dyeing ; Printing and dyeing chemical fiber fabric type ; Chemical fiber fabric ; Jigger dyeing ; All sizes; NESPS2 / 染色 ; 印染化纤布类 ; 化纤布类 ; 卷染染色 ; 所有规模 ; 全国第二次污染普查数据

Dataset: ILCD process, Unit process, single operation
Geography: CN
Reference year: 2019
Classification: Reference Parameters / Materials production / Organic chemicals
Generated by: The data was created by the Office of the Second National Pollution Source Census of the Ministry of Ecology and Environment, and the data was organized by the TianGong Plan team for ILCD format / 生态环境部第二次全国污染源普查工作办公室创建数据，天工计划团队常慧敏整理数据为ILCD格式
Owner: Tiangong LCI Data Working Group / 天工LCI数据工作小组
Review: Dependent internal review by Tiangong LCI Data Working Group / 天工LCI数据工作小组
Amounts: no units in this file; such an amount is in the reference unit of its flow, which a separate flow dataset defines
copyright: false
licenseType: Free of charge for all users and uses

## General comment
the Technical of end-of-pipe management technology for pollution chemical oxygen demandisChemical coagulation + anaerobic biological treatment + aerobic biological treatment，Its Technical efficiency of end-of-pipe management92.99，The formula for calculating the actual operation rate (k-value) of the end-of-pipe treatment facility is k = operating time of wastewater treatment facilities (hours) / normal production time (hours)

## Technical purpose
该数据集描述了纺织行业中应用的综合废物处理技术，特别是化纤织物的染色和印染。这包括不同规模生产的卷染染色。概述的末端处理技术用于处理染色过程中产生的废水中的污染物，如氨氮、有机结合氮、化学需氧量（COD）和总磷。

## Reference product
- Textile Printing: 1000; calculated
  源文件中描述为为印染化纤布类，此处对其进行了匹配工作，将其匹配到LCAflow库里面相最符合的流

## Outputs
All rows: calculated
- phosphorus, total: 0.000925405
  the Technical of end-of-pipe management technology for pollution phosphorus, totalisChemical coagulation + anaerobic biological treatment + aerobic biological treatment + chemical treatment，Its Technical efficiency of end-of-pipe management97.01，The formula for calculating the actual operation rate (k-value) of the end-of-pipe treatment facility is k = operating time of wastewater treatment facilities (hours) / normal production time (hours)
  污染物指标总磷的末端治理技术是化学混凝法+厌氧生物处理法+好氧生物处理法+化学处理法，其效率为97.01，末端治理设施实际运行率（k值）计算公式为k=污水治理设施运行时间/正常生产时间。原文件中描述污染物类别为废水，污染物指标为总磷，此处对其进行了匹配工作，将其匹配到LCAflow库里面相最符合的流
- phosphorus, total: 0.00103682
  the Technical of end-of-pipe management technology for pollution phosphorus, totalisChemical coagulation + anaerobic biological treatment + aerobic biological treatment，Its Technical efficiency of end-of-pipe management96.65，The formula for calculating the actual operation rate (k-value) of the end-of-pipe treatment facility is k = operating time of waste gas treatment facilities (hours) / normal production time (hours)
  污染物指标总磷的末端治理技术是化学混凝法+厌氧生物处理法+好氧生物处理法，其效率为96.65，末端治理设施实际运行率（k值）计算公式为k=污水治理设施运行时间/正常生产时间。原文件中描述污染物类别为废水，污染物指标为总磷，此处对其进行了匹配工作，将其匹配到LCAflow库里面相最符合的流
- Ammonia Nitrogen: 0.00338647
  the Technical of end-of-pipe management technology for pollution Ammonia NitrogenisChemical coagulation + anaerobic biological treatment + aerobic biological treatment + chemical treatment，Its Technical efficiency of end-of-pipe management90.53，The formula for calculating the actual operation rate (k-value) of the end-of-pipe treatment facility is k = operating time of wastewater treatment facilities (hours) / normal production time (hours)
  污染物指标氨氮的末端治理技术是化学混凝法+厌氧生物处理法+好氧生物处理法+化学处理法，其效率为90.53，末端治理设施实际运行率（k值）计算公式为k=污水治理设施运行时间/正常生产时间。原文件中描述污染物类别为废水，污染物指标为氨氮，此处对其进行了匹配工作，将其匹配到LCAflow库里面相最符合的流
- Ammonia Nitrogen: 0.00524242
  the Technical of end-of-pipe management technology for pollution Ammonia NitrogenisChemical coagulation + anaerobic biological treatment + aerobic biological treatment，Its Technical efficiency of end-of-pipe management85.34，The formula for calculating the actual operation rate (k-value) of the end-of-pipe treatment facility is k = operating time of wastewater treatment facilities (hours) / normal production time (hours)
  污染物指标氨氮的末端治理技术是化学混凝法+厌氧生物处理法+好氧生物处理法，其效率为85.34，末端治理设施实际运行率（k值）计算公式为k=污水治理设施运行时间/正常生产时间。原文件中描述污染物类别为废水，污染物指标为氨氮，此处对其进行了匹配工作，将其匹配到LCAflow库里面相最符合的流
- Nitrogen, organic bound: 0.0222708
  the Technical of end-of-pipe management technology for pollution Nitrogen, organic boundisChemical coagulation + anaerobic biological treatment + aerobic biological treatment + chemical treatment，Its Technical efficiency of end-of-pipe management88.92
  污染物指标总氮的末端治理技术是化学混凝法+厌氧生物处理法+好氧生物处理法+化学处理法，其效率为88.92，末端治理设施实际运行率（k值）计算公式为k=污水治理设施运行时间/正常生产时间。原文件中描述污染物类别为废水，污染物指标为总氮，此处对其进行了匹配工作，将其匹配到LCAflow库里面相最符合的流
- Nitrogen, organic bound: 0.0356976
  the Technical of end-of-pipe management technology for pollution Nitrogen, organic boundisChemical coagulation + anaerobic biological treatment + aerobic biological treatment，Its Technical efficiency of end-of-pipe management82.24，The formula for calculating the actual operation rate (k-value) of the end-of-pipe treatment facility is k = operating time of wastewater treatment facilities (hours) / normal production time (hours)
  污染物指标总氮的末端治理技术是化学混凝法+厌氧生物处理法+好氧生物处理法，其效率为82.24，末端治理设施实际运行率（k值）计算公式为k=污水治理设施运行时间/正常生产时间。原文件中描述污染物类别为废水，污染物指标为总氮，此处对其进行了匹配工作，将其匹配到LCAflow库里面相最符合的流
- Waste water: 36.23
  the treatment technology for the pollution of Waste waterdidn't offered，The formula for calculating the actual operation rate (k-value) of the end-of-pipe treatment facility is k = operating time of waste gas treatment facilities (hours) / normal production time (hours)
  污染物指标工业废水量的末端治理技术未说明。原文件中描述污染物类别为废水，污染物指标为工业废水量，此处对其进行了匹配工作，将其匹配到LCAflow库里面相最符合的流
- chemical oxygen demand: 1.41664
  the Technical of end-of-pipe management technology for pollution chemical oxygen demandisChemical coagulation + anaerobic biological treatment + aerobic biological treatment + chemical treatment，Its Technical efficiency of end-of-pipe management95.34，The formula for calculating the actual operation rate (k-value) of the end-of-pipe treatment facility is k = operating time of waste gas treatment facilities (hours) / normal production time (hours)
  污染物指标化学需氧量的末端治理技术是化学混凝法+厌氧生物处理法+好氧生物处理法+化学处理法，其效率为95.34，末端治理设施实际运行率（k值）计算公式为k=污水治理设施运行时间/正常生产时间。原文件中描述污染物类别为废水，污染物指标为化学需氧量，此处对其进行了匹配工作，将其匹配到LCAflow库里面相最符合的流
- chemical oxygen demand: 2.13104
  the Technical of end-of-pipe management technology for pollution chemical oxygen demandisChemical coagulation + anaerobic biological treatment + aerobic biological treatment，Its Technical efficiency of end-of-pipe management92.99，The formula for calculating the actual operation rate (k-value) of the end-of-pipe treatment facility is k = operating time of wastewater treatment facilities (hours) / normal production time (hours)
  污染物指标化学需氧量的末端治理技术是化学混凝法+厌氧生物处理法+好氧生物处理法，其效率为92.99，末端治理设施实际运行率（k值）计算公式为k=污水治理设施运行时间/正常生产时间。原文件中描述污染物类别为废水，污染物指标为化学需氧量，此处对其进行了匹配工作，将其匹配到LCAflow库里面相最符合的流

## Use advice
This dataset is derived from the Pollution Source Census Report and contains information on pollution emissions and related products. However, it does not include data on energy or chemical consumption, nor does it provide information on waste or co-product generation. When utilizing this dataset, please supplement the missing data based on actual conditions before use
该数据集来源于污染源普查报告，包含污染物排放及相关产品信息，但不包含能源或化学品消耗数据，也不提供废弃物或共生产物产生信息。在使用该数据集时，请根据实际情况补充缺失数据后再使用。

## Review details
Inventory: The internal review was done by several iteration steps concerning raw data validation, raw data documentation, representativity, completeness and consistency of modelling with regard to ISO 14040 and 14044.
清单： 内部审查通过几个迭代步骤完成，涉及原始数据验证、原始数据记录、代表性、完整性、与 ISO 14040 和 14044 有关的建模的一致性。

## Data sources
- 第二次全国污染源普查产排污核算系数手册（试用版）,二级代码17,三级代码175.0,四级代码1752文件，在完整版文件中第281页
