# Shale gas production;Site preparation stage;Wastewater sink construction

Dataset: ILCD process
Geography: SC-CN
Reference year: 2014
Valid until: 2016
Classification: Systems / Construction
Generated by: Pu Hong, 15695258655@163.com
Owner: Tiangong LCI Data Working Group
Review: Dependent internal review by Tiangong LCI Data Working Group
Amounts: no units in this file; such an amount is in the reference unit of its flow, which a separate flow dataset defines
licenseType: Free of charge for all users and uses

## General comment
The dataset represents the environmental impact of the construction phase for wastewater sinks specifically designed for the shale gas extraction sites in Sichuan and Chongqing, China. This data is relevant for the assessment of infrastructure required for shale gas production and can be applicable to environmental studies and planning of similar extraction sites.

## Geography
China's shale gas extraction work is currently concentrated in the Sichuan and Chongqing areas, and the data from Sichuan and Chongqing are selected for LCA calculations.

## Time period
Raw data dates between 2014-2016

## Reference product
- Retention pond: 2200; min 3200; max 1200; uniform; measured
  场地准备阶段--废水池体积

## Inputs
All rows: uniform; measured
- #325 cement: 164000; min 110000; max 220000
  Components of C30 concrete
- sand: 281000; min 189000; max 377000
  Components of C30 concrete
- gravel: 485000; min 327000; max 651000
  Components of C30 concrete
- freshwater: 77000; min 52000; max 103000
  Components of C30 concrete
- Diesel: 3791; min 2382; max 5238
  Used for material transportation, etc.
- Electricity: 1519.2; min 1022.4; max 2037.6
  Used for concrete mixing, etc.

## Use advice
Users should note that the temporal range of the raw data is from 2014 to 2016, and it may not reflect changes in construction practices or regulations that occurred after this period. When applying this data to current or future projects, users must account for potential changes in environmental impact due to technological advancements or updated environmental legislation. The dataset specifically pertains to the Sichuan and Chongqing regions; therefore, caution should be taken when extrapolating to other geographical locations due to differences in environmental, technological, and regulatory contexts.

## Review details
Inventory: The internal review was done by several iteration steps concerning raw data validation, raw data documentation, representativity, completeness and consistency of modelling with regard to ISO 14040 and 14044.

## Data sources
- Wang, J., Liu, M., McLellan, B. C., Tang, X. & Feng, L. Environmental impacts of shale gas development in China: A hybrid life cycle analysis. Resources, Conservation and Recycling 120, 38–45 (2017).
