# Metallurgical ash production;Metallurgical ash;Mining and burning(Z08)

Dataset: ILCD process, Unit process, single operation
Geography: CN
Reference year: 1998
Classification: Materials production / Metals and semimetals
Generated by: Fuxiang, 1162850692@qq.com
Owner: Tiangong LCI Data Working Group
Review: Dependent internal review by Tiangong LCI Data Working Group
Amounts: no units in this file; such an amount is in the reference unit of its flow, which a separate flow dataset defines
copyright: false
licenseType: Free of charge for all users and uses

## General comment
来自表 4-16 Z08 钢厂生产吨材环境负荷编目表

## Time period
论文提到钢铁企业环境总体数据为1998年的吨钢环境基础数据。

## Technical purpose
Metallurgical ash, also known as white ash or lime, is primarily used in the steel industry for processes such as pH regulation, as a fluxing agent to purify steel during the smelting process, and in flue gas desulfurization.

## Reference product
- Metallurgical ash: 57.2; measured
  Metallurgical white ash

## Inputs
- Energy, geothermal, converted: 260.603; measured

## Outputs
- Dust (unspecified, from stack): 0.063; measured
- sulfur dioxide: 0.069; measured
- Suspended solids, unspecified: 0.020981; measured
- Spoil (deposited, hibernating in ground, non elementary flow): 2.345; measured

## Use advice
When using this data set for Life Cycle Assessment, ensure it aligns with the production year's technology level (data is based on environmental loads from steel production for the year 1998). Adjustments may be necessary for current environmental impact assessments given technological advances since that time. Consider inclusion/exclusion of subsequent recycling processes and adapt the data accordingly for specific smelting processes within the steel industry.

## Review details
Inventory: The internal review was done by several iteration steps concerning raw data validation, raw data documentation, representativity, completeness and consistency of modelling with regard to ISO 14040 and 14044.

## Data sources
- 周和敏. 钢铁材料生产过程环境协调性评价研究. (北京工业大学, 2001).
