# Hot air furnace ; Potassium nitrate ; Potassium chloride, nitric acid ; Ion exchange method ; All sizes; NESPS2 / 热风炉 ; 硝酸钾 ; 氯化钾、硝酸 ; 离子交换法 ; 所有规模 ; 全国第二次污染普查数据

Dataset: ILCD process, Unit process, single operation
Geography: CN
Reference year: 2019
Classification: Reference Parameters / Energy carriers and technologies / Heat and steam
Generated by: The data was created by the Office of the Second National Pollution Source Census of the Ministry of Ecology and Environment, and the data was organized by the TianGong Plan team for ILCD format / 生态环境部第二次全国污染源普查工作办公室创建数据，天工计划团队常慧敏整理数据为ILCD格式
Owner: Tiangong LCI Data Working Group / 天工LCI数据工作小组
Review: Dependent internal review by Tiangong LCI Data Working Group / 天工LCI数据工作小组
Amounts: no units in this file; such an amount is in the reference unit of its flow, which a separate flow dataset defines
copyright: false
licenseType: Free of charge for all users and uses

## General comment
the Technical of end-of-pipe management technology for pollution Exhaust gasis/，Its Technical efficiency of end-of-pipe management0

## Technical purpose
该工业过程涉及使用离子交换法将氯化钾与硝酸反应以生产硝酸钾。此过程适用于所有规模的生产。通过此过程产生的硝酸钾可用于多种应用，例如作为农业肥料，在食品保存中，以及在制造炸药和烟火中。

## Reference product
- sodium nitrate: 1000; calculated
  源文件中描述为为硝酸钾，此处对其进行了匹配工作，将其匹配到LCAflow库里面相最符合的流，污染物指标备注为工业废水量

## Outputs
All rows: calculated
- chemical oxygen demand: 0.012
  the Technical of end-of-pipe management technology for pollution chemical oxygen demandis/，Its Technical efficiency of end-of-pipe management0
  污染物指标化学需氧量的末端治理技术是/，其效率为0。原文件中描述污染物类别为废水，污染物指标为化学需氧量，此处对其进行了匹配工作，将其匹配到LCAflow库里面相最符合的流，污染物指标备注为化学需氧量
- sulfur dioxide: 0.03
  the Technical of end-of-pipe management technology for pollution sulfur dioxideis/，Its Technical efficiency of end-of-pipe management0
  污染物指标二氧化硫（天然气）的末端治理技术是/，其效率为0。原文件中描述污染物类别为废气，污染物指标为二氧化硫（天然气），此处对其进行了匹配工作，将其匹配到LCAflow库里面相最符合的流，污染物指标备注为二氧化硫（天然气）
- particles (PM2.5 - PM10): 0.0798
  the Technical of end-of-pipe management technology for pollution particles (PM2.5 - PM10)isCyclone dust removal + bag filter，Its Technical efficiency of end-of-pipe management99
  污染物指标颗粒物的末端治理技术是旋风+布袋，其效率为99，末端治理设施实际运行率（k值）计算公式为k=处理设施运行时间(小时/年)/正常生产时间(小时/年)。原文件中描述污染物类别为废气，污染物指标为颗粒物，此处对其进行了匹配工作，将其匹配到LCAflow库里面相最符合的流，污染物指标备注为颗粒物
- Nitrogen oxides: 0.083
  the Technical of end-of-pipe management technology for pollution Nitrogen oxidesis/，Its Technical efficiency of end-of-pipe management0
  污染物指标氮氧化物（天然气）的末端治理技术是/，其效率为0。原文件中描述污染物类别为废气，污染物指标为氮氧化物（天然气），此处对其进行了匹配工作，将其匹配到LCAflow库里面相最符合的流，污染物指标备注为氮氧化物（天然气）
- Ammonia Nitrogen: 0.097
  the Technical of end-of-pipe management technology for pollution Ammonia Nitrogenis/，Its Technical efficiency of end-of-pipe management0
  污染物指标氨氮的末端治理技术是/，其效率为0。原文件中描述污染物类别为废水，污染物指标为氨氮，此处对其进行了匹配工作，将其匹配到LCAflow库里面相最符合的流，污染物指标备注为氨氮
- Waste water: 4.2
  the Technical of end-of-pipe management technology for pollution Waste wateris/，Its Technical efficiency of end-of-pipe management0
  污染物指标工业废水量的末端治理技术是/，其效率为0。原文件中描述污染物类别为废水，污染物指标为工业废水量，此处对其进行了匹配工作，将其匹配到LCAflow库里面相最符合的流，污染物指标备注为工业废水量
- Exhaust gas: 700, 4000 (2 entries)
  the Technical of end-of-pipe management technology for pollution Exhaust gasis/，Its Technical efficiency of end-of-pipe management0
  污染物指标工业废气量的末端治理技术是/，其效率为0。原文件中描述污染物类别为废气，污染物指标为工业废气量，此处对其进行了匹配工作，将其匹配到LCAflow库里面相最符合的流，污染物指标备注为工业废气量

## Use advice
This dataset is derived from the Pollution Source Census Report and contains information on pollution emissions and related products. However, it does not include data on energy or chemical consumption, nor does it provide information on waste or co-product generation. When utilizing this dataset, please supplement the missing data based on actual conditions before use
该数据集来源于污染源普查报告，包含污染物排放及相关产品信息，但不包含能源或化学品消耗数据，也不提供废弃物或共生产物产生信息。在使用该数据集时，请根据实际情况补充缺失数据后再使用。

## Review details
Inventory: The internal review was done by several iteration steps concerning raw data validation, raw data documentation, representativity, completeness and consistency of modelling with regard to ISO 14040 and 14044.
清单： 内部审查通过几个迭代步骤完成，涉及原始数据验证、原始数据记录、代表性、完整性、与 ISO 14040 和 14044 有关的建模的一致性。

## Data sources
- 第二次全国污染源普查产排污核算系数手册（试用版）,二级代码26,四级代码2623文件，在完整版文件中第4111页
