# East China Rice-Winter Wheat Production ; Agricultural Production (Rice)

Dataset: ILCD process, Unit process, single operation
Geography: NJ-JS-CN
Reference year: 2015
Valid until: 2015
Classification: Unit processes / Materials production / Agricultural production means
Functional unit: 1 ton of rice and 1 ton of winter wheat
Generated by: Haoran Zhang, hrzhang@whu.edu.cn
Owner: Tiangong LCI Data Working Group
Review: Dependent internal review by Tiangong LCI Data Working Group
Amounts: no units in this file; such an amount is in the reference unit of its flow, which a separate flow dataset defines
copyright: false
licenseType: Free of charge for all users and uses

## General comment
The energy consumption of agricultural production system is mainly calculated as the energy consumption generated by the use of diesel oil and pesticides. In this study, the energy consumption of agricultural materials and agricultural production system is mainly calculated through formula 1, and the consumption of fuel oil and electric power resources in the production stage of agricultural materials is referred to McDougall [22] et al. (Table 2 and Table 3). According to the research of Liu Hongtao et al. [23] (Table 4), the energy consumption of 1t urea (pure N) can be calculated. According to the urea (pure N) consumed per unit crop yield, the energy consumption of nitrogen fertilizer production in agricultural production system can be obtained. For the folding energy coefficients of diesel oil and pesticides in the agricultural stage, refer to the research results of Yuan Baorong et al. [24] (the folding energy coefficients of diesel oil and pesticide (kg·hm-2) are 42.55 and 1005.5 MJ·kg-1, respectively).

## Technology and included processes
Using 1t rice and 1t winter wheat as functional units, the resource consumption and environmental impact of 1t rice and 1t winter wheat production in rice-wheat rotation system in this region were studied. The initial boundary of the life cycle of agricultural products is the extraction of energy raw materials related to the life cycle of rice and wheat, and the end boundary is the output of crop products and emission of waste gas through crop planting and cultivation to harvest, including two systems of agricultural material production and agricultural production

## Technical purpose
This industrial process data represents the agricultural production of rice and winter wheat in the Jiangning District of Nanjing, Jiangsu Province. The data covers a two-year period and includes the cultivation practices of 82 farm households. This life cycle assessment data is valuable for stakeholders interested in the environmental impacts of rice and winter wheat production. The data is pertinent for assessing the use of resources such as compound fertilizers, urea, insecticides (imidacloprid and chlorpyrifos), and herbicides (butachlor and haloxyfop), as well as the practice of returning mechanically crushed straw to the field.

## Reference product
- rice: 9360; measured

## Inputs
All rows: measured
- Diesel: 27.8
  rice
- heavy fuel oil: 33.1
  rice
- nitrogen: 300
  rice
- phosphorus: 120
  rice
- potassium chloride: 120
  rice
- Bactericide: 2
  rice
- Rice Seeds: 3.9
  rice
- Insecticide: 0.1
  rice
- Electricity: 263.16
  rice

## Deviations from the LCI method approaches
The starting boundary of the life cycle of agricultural products is the extraction of energy raw materials related to the life cycle of rice and wheat. The terminal boundary is the output of agricultural crop products and the emission of waste gases after the planting and cultivation of crops.

## Data selection and combination
The research data mainly come from the sampling survey results of the input-output of 82 households in Jiangning District, Nanjing City, Jiangsu Province over the past two years. The fertilizers mainly include compound fertilizers and urea, insecticides include imidacloprid and chlorpyrifos, and herbicides include butachlor and haloxyfop, etc. All straw in the field is mechanically crushed and returned to the field.

## Data treatment and extrapolations
For the entire lifecycle of the product system, all input and output processes, as well as computational processes, generally include categorization and characterization, normalization, and weighted assessment

## Sampling procedure
The results of a two-year input-output sampling survey of 82 households in Jiangning District, Nanjing City, Jiangsu Province.

## Use advice
When using this LCA data, it is important to consider the geographical specificity of the data and its relevance to similar agricultural practices. The data should be used to understand the material and energy flows involved in the production of rice and winter wheat and to evaluate the potential environmental impacts. It is essential to account for regional practices, such as the types of fertilizers and pesticides used, as well as cultural practices like returning straw to the field. Users should integrate the data with baseline assumptions about the crop cultivation processes for proper evaluation within a broader agricultural LCA. Be aware of the methodological framework applied: categorization and characterization, normalization, and weighted assessment of the inputs and outputs.

## Review details
Inventory: The internal review was done by several iteration steps concerning raw data validation, raw data documentation, representativity, completeness and consistency of modelling with regard to ISO 14040 and 14044.

## Data sources
- 胡乃娟,陈倩,朱利群.长江中下游稻-麦轮作系统生命周期环境影响评价——以江苏南京为例[J].长江流域资源与环境,2019,28(05):1111-1120.
