# Milk production ; production

Dataset: ILCD process, Unit process, single operation
Geography: CC-JL-CN
Reference year: 2006
Classification: Unit processes / Materials production / Food and renewable raw materials
Functional unit: 1t milk
Generated by: Rui Yang, 1632707028@qq.com
Owner: Tiangong LCI Data Working Group
Review: Dependent internal review by Tiangong LCI Data Working Group
Amounts: no units in this file; such an amount is in the reference unit of its flow, which a separate flow dataset defines
copyright: false
licenseType: Free of charge for all users and uses

## General comment
According to the research scope of this paper, the milk production life cycle is divided into the following two subsystems: production and packaging. Due to the relatively concentrated production workshop inside the enterprise, the environmental impact caused by material transportation is negligible.

## Geography
The research object of this paper is the ordinary bagged milk sold in a city in Changchun area

## Technology and included processes
This paper considers only the processes directly related to the purpose of the study and the functional units, and does not consider the various stages outside the plant that generate environmental loads

## Technical purpose
Bagged milk from the Changchun area is intended for consumer use as a food product. It undergoes production and packaging stages within the life cycle. The milk serves as a daily nutritional staple and is distributed for sale in local markets.

## Reference product
- milk: 1000; measured

## Inputs
- milk: 887.9; measured
  raw milk
- Electricity: 168.12; measured
- water: 8099; measured
- process steam: 223.6; measured

## Outputs
All rows: measured
- carbon dioxide (fossil),carbon dioxide (fossil): 180
- carbon monoxide (fossil): 0.05
- sulfur dioxide: 1.46
- nitrogen, total (excluding N2): 0.7
  Nitrogen oxides
- ammonia: 0.067
- particles (> PM10): 0.65
- municipal solid waste deposition: 2.5

## Deviations from the LCI method approaches
In this paper, according to the relevant ISO standards, LCA method was used to analyze the consumption and environmental emissions at each stage of milk production, establish the basic database of milk production life cycle, identify the relative size of the environmental impact of each stage of milk, and find out the main factors of environmental impact. Therefore, it provides opportunities and ways for milk enterprises to implement clean production and improve the environmental performance of milk production.

## Use advice
When using the LCA data for bagged milk production, consider only the processes directly related to the purpose of the study and the functional unit. Do not include external factory environmental loads. Utilize this data to identify key environmental impact factors in the production and packaging stages and apply it for improving environmental performance in milk production operations, in accordance with ISO standards for LCA.

## Review details
Inventory: The internal review was done by several iteration steps concerning raw data validation, raw data documentation, representativity, completeness and consistency of modelling with regard to ISO 14040 and 14044.

## Data sources
- 秦凤贤. 生命周期评价在牛奶生产中的应用研究. 乳业科学与技术 224–226 (2006).
