# Pesticide Manufacturing ; IDA Method - Iminodiacetonitrile Bis-Glyphosate Process + Glyphosate Synthesis

Dataset: ILCD process, Unit process, black box
Geography: CN
Reference year: 2021
Classification: Materials production / Organic chemicals
Functional unit: producing 1 ton glyphosate
Generated by: Kailingli Liao, calinly@163.com
Owner: Tiangong LCI Data Working Group
Review: Dependent internal review by Tiangong LCI Data Working Group
Amounts: no units in this file; such an amount is in the reference unit of its flow, which a separate flow dataset defines
copyright: false
licenseType: Free of charge for all users and uses

## General comment
No flowchart

## Technical purpose
The technical usage of glyphosate synthesized by this IDA Method is for the production of herbicides. Glyphosate is a widely used non-selective systematic herbicide, applied to eliminate weeds and grasses that compete with crops. This particular industrial process is suitable for the manufacturing of large volumes of glyphosate intended for agricultural use.

## Reference product
- glyphosate: 1000; software or database
  Glyphosate

## Outputs
All rows: software or database
- Exhaust gas: 9830
  exhaust gas
- waste water - untreated: 47550
  Industrial waste
- chemical oxygen demand: 23.8
  Cod
- Ammonia Nitrogen: 1.19
  Ammonia nitrogen
- nitrogen, total (excluding N2): 1.92
  total nitrogen
- phosphorus, total: 4.76
  total phosphorus
- volatile organic compound: 102
  volatile organic compounds
- hazardous waste (unspecified): 1000
  Hazardous Waste

## Use advice
Users of this dataset should be aware that while it provides information on the emissions associated with the production of 1 ton of glyphosate using the IDA method, it lacks comprehensive lifecycle data. There is no information on the input of raw materials, energy, water, and transportation. Therefore, when incorporating this data into a Life Cycle Assessment, it is necessary to account for these additional inputs and their related environmental impacts separately. Extra caution should be taken to ensure any assumptions made about these inputs are as accurate as possible to avoid skewing the assessment results.

## Review details
Inventory: The internal review was done by several iteration steps concerning raw data validation, raw data documentation, representativity, completeness and consistency of modelling with regard to ISO 14040 and 14044.

## Data sources
- 生态环境部. 263农药制造行业系数手册.pdf. (2021).
