# Brick production ; concrete pavement brick ; Extrusion process

Dataset: ILCD process, Unit process, single operation
Geography: JNA-SD-CN
Reference year: 2018
Classification: Unit processes / Materials production / Other mineralic materials
Functional unit: The functional unit is the area of 1 m2 brick products.
Generated by: Wang xiangjin, r99rt4@163.com
Owner: Tiangong LCI Data Working Group
Review: Dependent internal review by Tiangong LCI Data Working Group
Amounts: no units in this file; such an amount is in the reference unit of its flow, which a separate flow dataset defines
copyright: false
licenseType: Free of charge for all users and uses

## General comment
Non sintering process of concrete pavement bricks

## Technical purpose
The concrete pavement brick produced through the extrusion process is designed for use in the construction of durable surfaces, such as roads, sidewalks, and public squares. Its application primarily lies in outdoor environments where high resistance to wear and weather conditions is required.

## Reference product
- Clay Body: 102; measured
  Rough blank

## Inputs
- brickbat aggregate: 102; measured
- brick dust: 14; measured
- Electricity: 1.75176; measured

## Outputs
- particles (PM10): 0.000152; measured

## Deviations from the LCI method approaches
ReCiPe midpoint (H) model is applied in this study.

## Data selection and combination
In this study, the production energy consumption of concrete pavement brick and permeable brick as well as the relevant data of all kinds of raw materials and energy input and exhaust emissions are collected from Jinan Shunde Cement Products Co. Ltd. Shandong Province.

## Sampling procedure
Most data of raw materials, energy input and waste discharge were collected from the site investigation of manufacturer. Water reducer is also called water reducing agent, whose chemical constituents is the sodium salt of the sulfonate formaldehyde condensation

## Use advice
Users of this Life Cycle Assessment data should carefully consider the scope of the data which includes the energy consumption of concrete pavement brick and permeable brick production, the input of raw materials and energy, and the exhaust emissions related data provided by Jinan Shunde Cement Products Co., Ltd. The sensitivity analysis included in this study considers a 5% variation in inputs and outputs for key processes and should be taken into account when applying the data to other scenarios. The ReCiPe midpoint (H) model used in this study is also a critical aspect to be conscious of in terms of methodological consistency when integrating this data into broader assessments.

## Review details
Inventory: The internal review was done by several iteration steps concerning raw data validation, raw data documentation, representativity, completeness and consistency of modelling with regard to ISO 14040 and 14044.

## Data sources
- Yuan, X. et al. Environmental and economic impacts assessment of concrete pavement brick and permeable brick production process - A case study in China. Journal of Cleaner Production 171, 198–208 (2018).
