# Remediated soil ; Solidification and stabilization ; In situ replacement ; Mixing and backfilling after excavation ; 3:1 paper ash

Dataset: ILCD process, Unit process, black box
Geography: SI
Reference year: 2018
Classification: Unit processes / Other Services / Repair and maintenance
Functional unit: The functional unit was the management of 1.0 m3 of contaminated soil at the Old Zinc-Works site. A time horizon of 100 years was assumed.
Generated by: Yang Xintong, yangxt@caep.org.cn
Owner: Tiangong LCI Data Working Group
Review: Dependent internal review by Tiangong LCI Data Working Group
Amounts: no units in this file; such an amount is in the reference unit of its flow, which a separate flow dataset defines
copyright: false
licenseType: Free of charge for all users and uses

## General comment
Solidification/stabilization is a technology that mixes contaminated soil with binders that can aggregate into solids, thereby capturing or fixing pollutants in solid structures.

## Geography
This study refers to the reclamation activities that were per formed at the Old Zinc-Works site in the town of Celje (in eastern Slovenia).

## Technology and included processes
The excavated soil was sieved by a mobile screener to a gradation of less than 16 mm. A temporary depot was constructed on site from horizontal layers of the prepared material. This material was then moved from the depot by means of an excavator, in such a way that it scooped up the prepared material perpendicular to the layers. In this way, the greatest possible homogeneity of the contaminated soil was achieved. Paper ash, which was used as an additive. The soil and the additive were mixed together in a dry mass ratio of 3:1 in the mobile mixing plant, followed by adding water in order to reach an optimal water content (22 ± 2 wt %). The produced composite was spread over the excavation area in layers, each having a thickness of 30 cm. These layers were separately compacted by means of a heavy roller up to 98% of the reference dry density. The procedure was repeated until a fill had been constructed (average thickness of approximately 3 m), in which the contaminants were immobilized by means of physical and chemical mechanisms. Finally, a layer of waste rock was spread on top of the fill to a thickness of 0.9 m using a bulldozer, in order to ensure sufficient resistance of the composite to freezing/thawing conditions. A heavy roller was then used to compact this layer.

## Technical purpose
The remediation process of the Old Zinc-Works site in Celje, Slovenia, employs soil solidification and stabilization to manage the contaminated land onsite. The technique involves mixing contaminated soil with paper ash as a binder in a 3:1 dry mass ratio and compacting the mixed material onsite to rehabilitate the area for future use. This method is applicable to industrial site reclamation where the contaminated soil needs to be treated in place or where off-site treatment is not feasible.

## Reference product
- Remediated soil: 1; measured

## Inputs
All rows: measured
- Paper Ash: 467.5
  Remediation process (production of the geotechnical composite)
- Tap Water: 0.1607
  Remediation process (production of the geotechnical composite)
- Waste rock: 0.3
  Covering material for thermal protection against freezing/thawing effects
- Diesel,Diesel: 0.00169
  Excavation of the contaminated soil
- Diesel,Diesel: 0.00066
  Pre-treatment of the soil and production of the geotechnical composite
- Diesel,Diesel: 0.00063
  Placing of the composite at the excavation site
- Diesel,Diesel: 0.00048
  Delivery of paper ash (70 km)
- Diesel,Diesel: 0.00022
  Delivery of covering material (waste rock) (35 km)
- Diesel,Diesel: 0.00017
  Spreading and compacting of the covering material (top layer)
- contaminated soil: 1
  Waste to be remediated

## Use advice
When using this data set, it is crucial to apply it to similar contexts of industrial site remediation where in situ soil solidification and stabilization are performed. Ensure alignment with the functional unit of managing 1.0 m3 of contaminated soil on a 100-year time horizon. This protocol is designed for scenarios where the distance between the excavation/installation location and the remediation process is negligible. Users should consider regional differences, such as climate conditions that affect the freeze/thaw resistance of the stabilized soil, and adjust the use of materials and methods accordingly.

## Review details
Inventory: The internal review was done by several iteration steps concerning raw data validation, raw data documentation, representativity, completeness and consistency of modelling with regard to ISO 14040 and 14044.

## Data sources
- Pranjić M A ,Oprčkal P ,Mladenovič A , et al. Comparative Life Cycle Assessment of possible methods for the treatment of contaminated soil at an environmentally degraded site. Journal of Environmental Management, 2018, 218 497-508.
