# Soil Remediation;In Situ Remediation;Bioventilation;Remediated soil

Dataset: ILCD process, Unit process, single operation
Geography: CN
Reference year: 2022
Classification: Other Services / Repair and maintenance
Generated by: Wang Ning, wang_ning@caep.org.cn
Owner: Tiangong LCI Data Working Group
Review: Dependent internal review by Tiangong LCI Data Working Group
Amounts: no units in this file; such an amount is in the reference unit of its flow, which a separate flow dataset defines
copyright: false
licenseType: Free of charge for all users and uses

## General comment
The air injection and extraction system operates to pass air into the soil and extract the exhaust gases, and the soil is remediated

## Geography
案例焦化厂位于我国北方中纬度地带

## Technology and included processes
Operation of soil ventilation systems using electricity, etc.

## Technical purpose
The soil remediation process described is utilized for in-situ bioremediation through aeration. This involves injecting air into the soil and extracting waste gases as part of a single operation unit process. A case example would be the application in a coking plant located in the mid-latitudes of Northern China.

## Reference product
- Remediated soil: 110067; measured
  得到修复的土壤

## Inputs
- contaminated soil: 110067; measured
  受污染的土壤
- Electricity: 1.728e6; measured
  生物通风系统运行所消耗的电力

## Use advice
When utilizing this data set, ensure that the process is compatible with the type of contamination and soil conditions of the project site. Consideration should be given to the scale of the operation and the effectiveness of the aeration technique used for the specific type of soil and contaminant. Additionally, it is important to assess the potential environmental impact of extracted waste gases and to include necessary controls for emissions.

## Review details
Inventory: The internal review was done by several iteration steps concerning raw data validation, raw data documentation, representativity, completeness and consistency of modelling with regard to ISO 14040 and 14044.

## Data sources
- 刘文晓,夏天翔,张丽娜等.基于修复效果的污染土壤修复工程环境足迹分析[J].环境科学研究,2022,35(10):2367-2377.DOI:10.13198/j.issn.1001-6929.2022.07.05.
