# Collection｜straw｜baling ｜no process

Dataset: ILCD process, Unit process, single operation
Geography: CN
Reference year: 2020
Classification: Unit processes / Materials production / Agricultural production means
Functional unit: Taking the production of 10,000KWh of electric energy as the functional unit (consumption of straw is 1.4kg/kwh)
LCI method principle: Consequential
Generated by: Chaoshuo Liu, liucs22@mails.jlu.edu.cn
Owner: Tiangong LCI Data Working Group
Review: Dependent internal review by Tiangong LCI Data Working Group
Amounts: no units in this file; such an amount is in the reference unit of its flow, which a separate flow dataset defines
copyright: false
licenseType: Free of charge for all users and uses

## General comment
The described industrial process involves the collection and baling of straw for the purpose of electricity generation. This process is an integral part of a biomass energy conversion system, where straw is used as a feedstock to produce electricity. The functional unit of electricity production in this context is 10,000 kWh, with an input requirement of 1.4 kg of straw per kWh of electric energy produced. This process is typically used in biomass power plants and may also serve as a source of renewable energy in grid-tied systems.

## Reference product
- Crop straw: 14000; measured

## Outputs
All rows: measured
- carbon dioxide (fossil): 58.8743
  The expert notes that the original text does not differentiate between biogenic and fossil sources of emissions, and in their opinion, the emissions in question are fossil.
- carbon monoxide,carbon monoxide (fossil): 0.33739
  (same comment as for carbon dioxide (fossil))
- nitrous oxide: 0.78723, 0.00153 (2 entries)
- hydrocarbons (unspecified): 0.10346
- sulfur dioxide: 0.01323
- particles (> PM10),particles (> PM10): 0.16596
- methane (fossil): 0.00335
  (same comment as for carbon dioxide (fossil))

## Use advice
When utilizing this dataset for Life Cycle Assessment (LCA), users should ensure that the data is representative of the geographic region and the specific technology employed for straw collection and baling. It is essential to verify the congruence of the functional unit and the electricity generation efficiency with the studied system. Users should also consider the boundary conditions like inclusion or exclusion of downstream processing stages such as transportation, storage, and combustion of baled straw. Methodological consistency with guidelines for biomass-based energy assessments should be maintained. Notably, the absence of process flow parameters necessitates cautious interpretation or the need for supplementary data to account for potential environmental impacts.

## Review details
Inventory: The internal review was done by several iteration steps concerning raw data validation, raw data documentation, representativity, completeness and consistency of modelling with regard to ISO 14040 and 14044.

## Data sources
- Wang, Z. et al. Sustainability assessment of straw direct combustion power generation in China: From the environmental and economic perspectives of straw substitute to coal. Journal of Cleaner Production 273, 122890 (2020).
