# Aluminum Electrolysis Carbon Anode Production ; Carbon Anode ; Petroleum Coke ; 2017

Dataset: ILCD process, Unit process, single operation
Geography: CN
Reference year: 2021
Classification: Unit processes / Materials production / Non-energetic raw materials
Generated by: Zimeng Cai, caizm6178@163.com
Owner: Tiangong LCI Data Working Group
Review: Dependent internal review by Tiangong LCI Data Working Group
Amounts: no units in this file; such an amount is in the reference unit of its flow, which a separate flow dataset defines
copyright: false
licenseType: Free of charge for all users and uses

## General comment
The carbon anode produced from the electrolysis process utilizing petroleum coke as an input material is specifically designed for use in aluminium production. The high temperature electrolytic process involves extracting aluminium from its oxide within the smelting industry, where carbon anodes are crucial as they serve as a key component in cell reactions.

## Time period
Date of publication

## Reference product
- anode, for metal electrolysis: 1000; software or database
  anode

## Inputs
All rows: software or database
- electricity, high voltage, aluminium industry: 748.8
  electricty
- heavy fuel oil: 65
  fuel oil
- coal tar: 214
  coal tar pitch
- Petroleum Coke: 1089
  petroleum coak
- coal gas: 1277

## Data selection and combination
The data in this study refers to the LCA data of PA, SA, electricity, and other background data. The PA data were obtained from statistical data sources, and the SA data were mainly obtained from the literatures. The background data were mainly derived from the Chinese localization LCA database CAS RCEES 2018, which was established by the Research Center for Eco-Environmental Sciences, Chinese Academy of Sciences and covers LCA data for energy, materials, transportation, waste management etc.

## Use advice
Users should note that the LCA data set for aluminum electrolysis carbon anode production is based on statistics and literature published in 2017. The Product Analysis (PA) data is derived from official statistical sources, while the Supporting Activities (SA) information comes from academic research. Background data should be cross-referenced with the CAS RCEES 2018 LCA database localized for China, provided by the Research Center for Eco-Environmental Sciences of the Chinese Academy of Sciences. Pay attention to the technological specificity of the data when applying it in LCA models, and consider potential updates or regional variations where applicable.

## Review details
Inventory: The internal review was done by several iteration steps concerning raw data validation, raw data documentation, representativity, completeness and consistency of modelling with regard to ISO 14040 and 14044.

## Data sources
- Ding, N., Liu, N., Lu, B. & Yang, J. Life cycle greenhouse gas emissions of aluminum based on regional industrial transfer in China. J. Ind. Ecol. 25, 1657–1672 (2021).
