# Aluminum electrolytic carbon anode production ; Aluminum electrolytic carbon anode ; Aluminum alloy wheel manufacturing process ; Alumina for metallurgy

Dataset: ILCD process, Unit process, single operation
Geography: CN
Reference year: 2018
Classification: Unit processes / Materials production / Metals and semimetals
Generated by: Chenling Fu, fu-chenling@tsinghua.edu.cn
Owner: Tiangong LCI Data Working Group
Review: Dependent internal review by Tiangong LCI Data Working Group
Amounts: no units in this file; such an amount is in the reference unit of its flow, which a separate flow dataset defines
copyright: false
licenseType: Free of charge for all users and uses

## General comment
氧化铝生产 ; 铝合金轮毂制造工艺

## Time period
Dissertation Web Publishing Date

## Technical purpose
The data represents the production process of aluminum electrolytic carbon anodes used in the electrolysis stage of primary aluminum production, as well as the manufacturing process of aluminum alloy wheels. The alumina referred to is specifically for metallurgical applications, indicating its use in the smelting process to produce aluminum.

## Reference product
- anode, for metal electrolysis: 52.95

## Inputs
All rows: missing unimportant
- electricity, high voltage, aluminium industry: 47.7
- Petroleum Coke: 60.42
- pitch: 11.66
- heavy fuel oil: 3.33
- Gas, mine, off-gas, process, coal mining: 68.37

## Outputs
All rows: missing unimportant
- carbon dioxide (fossil),carbon dioxide (fossil): 59.89
- carbon monoxide (fossil),carbon monoxide (fossil): 47.49
- sulfur dioxide: 0.21
- Nitrogen oxides: 0.15
- methane (fossil): 0.03
- hydrogen fluoride: 0.002
  HF
- Polycyclic Aromatic Hydrocarbon (PAH): 0.006
  PAHs
- particles, unspecified: 0.04

## Use advice
Users should ensure the inclusion of this data for life cycle inventory assessments of aluminum products where electrolytic carbon anodes are a primary input. Care should be taken to model the use phase behaviour accurately, taking into account the efficiency and lifetime of the anodes and wheels. Additionally, the technological applicability of the data should be reviewed, ensuring it matches the specific manufacturing technology and methodology of the product being assessed.

## Review details
Inventory: The internal review was done by several iteration steps concerning raw data validation, raw data documentation, representativity, completeness and consistency of modelling with regard to ISO 14040 and 14044.

## Data sources
- Yi Qiu-ping & Tang Chang-ping. Environmental impact assessment of magnesium alloy automobile hub based on life cycle assessment. JOURNAL OF CENTRAL SOUTH UNIVERSITY 25, 1870–1878 (2018).
