# clinker production;clinker;new dry, 5000 t/d;fly ash

Dataset: ILCD process, Unit process, black box
Geography: HAIN-CN
Classification: Unit processes / Materials production / Other mineralic materials
Generated by: #REF!, ysqsophia@gmail.com
Owner: Tiangong LCI Data Working Group
Review: Dependent internal review by Tiangong LCI Data Working Group
Amounts: no units in this file; such an amount is in the reference unit of its flow, which a separate flow dataset defines
copyright: false
licenseType: Free of charge for all users and uses

## General comment
Conventional production.

## Technical purpose
The data set represents the conventional production of cement from clinker utilizing the new dry process at a capacity of 5,000 tons/day, with fly ash as one of the components. It is intended for use in the construction industry for creating various types of building materials where cement is a primary binding ingredient.

## Model description
Functional unit definition: Define 1 ton of cement clinker as a functional unit. System boundary setting: The raw materials of the plant are set as the starting point of the life cycle, and the output of clinker cement is set as the end point.

## Reference product
- clinker: 1000
  Clinker

## Inputs
- limestone, crushed, for mill: 1360
  Limestone
- clay: 95
  Clay
- ash: 65
  Fly ash
- iron ore: 35
  Ironstone
- hard coal; 26.3 MJ/kg: 111
  Coal
- Electricity: 306
  Power average consumption

## Outputs
- carbon dioxide (fossil): 276
  m-CO2. The CO2 emissions of coal burning (mc) are calculated with the heat carbon equivalent method. mc=standard coal x 2.93x10^7x 8.494x10^-8 = standard coal x 2.489 where the CO2 of 1 J heat releasing is equivalent to 8.494 × 10^-8 kg. 1 kg of standard coal is equivalent to 2.93 × 10^7 J of heat (calorific value).
- carbon dioxide (fossil): 539
  n-CO2. The CO2 emissions of limestone decomposition (nc) are calculated with Eq. nc = Limestone consumption x 90% x 44% = Limestone consumption x 0.396 where the percent of CaCO3 in the limestone is 90% according to its quality. The percent of CO2 in the CaCO3 is 44%.
- sulfur dioxide: 1.02
  SO2. The data of SO2 emission mainly came from the online monitoring system of the plant.
- Nitrogen oxides: 1.81
  NOx. The data of NOx emission mainly came from the online monitoring system of the plant.
- particles (> PM10): 0.06
  Dust. The particle size is not specified. Here we treat it as PM>10. The data of dust emission mainly came from the online monitoring system of the plant.

## Data selection and combination
Other raw materials for cement production come from a mine in Hainan.

## Sampling procedure
A cement plant with a 5,000 tons/day new dry process cement production line was selected in a city in Hainan Province and tested.

## Use advice
When applying this data set, users should note that the functional unit is defined as 1 ton of cement clinker. The system boundaries are set from the extraction of raw materials from a mine in Hainan to the final production of clinker cement. Users should ensure that all relevant processes and energy inputs within these boundaries are included in the assessment. It is also pertinent to consider the environmental impacts of transporting raw materials and the use of fly ash. For complete life cycle assessment, downstream processes such as transportation of the clinker, cement making, and potential recycling scenarios should be incorporated separately.

## Review details
Inventory: The internal review was done by several iteration steps concerning raw data validation, raw data documentation, representativity, completeness and consistency of modelling with regard to ISO 14040 and 14044.

## Data sources
- Kan Fu, Xiao Yu Ren, Jin Quan Lin, & Ping Yue. (2013). Comparative Analysis of Environmental Impacts between Dregs Disposal and Conventional Cement Production by Life Cycle Assessment (LCA). Advanced Materials Research 777, 461–466.
