# cement production;cement, portland-composite cement;new dry process, cement kiln co-processing of industrial solid waste;mixed solid wastes

Dataset: ILCD process, Unit process, black box
Geography: CN
Reference year: 2012
Classification: Unit processes / Materials production / Other mineralic materials
Generated by: #REF!, ysqsophia@gmail.com
Owner: Tiangong LCI Data Working Group
Review: Dependent internal review by Tiangong LCI Data Working Group
Amounts: no units in this file; such an amount is in the reference unit of its flow, which a separate flow dataset defines
copyright: false
licenseType: Free of charge for all users and uses

## General comment
The company is equipped with a 4500t/d new dry process cement clinker production line. The case study focuses on the cement production system that has adopted the cement kiln co-processing technology for industrial solid waste treatment.

## Geography
A cement factory in Northeast

## Technical purpose
The Portland-composite cement produced through this industrial process is used in a variety of construction projects ranging from residential to commercial infrastructure. The incorporation of co-processing industrial solid waste in the cement kiln during the production process aligns with sustainable waste management practices and adds value to the end product by recycling materials.

## Model description
The system boundary is the cement production system of the cement plant.

## Reference product
- cement, portland-composite cement: 1000
  Cement products

## Inputs
- limestone, crushed, for mill: 1128.05
  Limestone
- shale: 1.23171
  Shale
- silica stone: 17.8049
  Silica
- iron, powder: 27.3171
  Iron powder
- gypsum stone (CaSO4-dihydrate): 52.2561
  Gupsum
- ash: 124.39
  Fly ash
- blast furnace slag: 204.268
  Blast furnace slag
- waste clay: 1.04878
  Scrap white soil
- Coating slag: 0.160366
  Coating residue
- refinery sludge: 5.26829
  Scrap override
- Catalyst waste: 2.11585
  Abolition catalyst
- soil, contaminated: 5.26829
  Pollution soil
- digester sludge: 15.7927
  Digestive sludge
- hard coal; 26.3 MJ/kg: 98.4146
  Coal. Annual coal consumption energy = (1.614E+8) kg x (2.149E+7) J/kg (average low heating value) = (3.7E+15) J.
- Diesel oil: 4.18659
  Diesel. Diesel = (6.866E+6) kg x (46.04) MJ/kg (combustion value) = (3.16E+8) MJ.
- Electricity: 338.488
  Total electricity consumption. Annual electricity consumption energy = (1.542E+8) kWh x (3.60E+6) J/kWh = (5.55E+14) J.
- tap water: 251.22
  The original text is "total water amount", which refers to tap water.

## Outputs
- carbon dioxide (fossil): 884.146
  CO2
- sulfur dioxide: 0.328659
  SO2
- Nitrogen oxides: 1.11585
  NOx
- particles (> PM10): 0.853659
  Dust, with an unspecified particle size, is treated as PM > 10 micrometers in diameter.

## Use advice
When utilizing the data set for this industrial process, users should account for the use-phase behavior of the cement in different construction environments. Attention should be paid to the specific characteristics of the Portland-composite cement, especially how the co-processed waste affects the final product's performance, durability, and environmental impact. Consideration should also be given to any regional regulations regarding the use of industrial solid waste in cement production and the need for the careful characterization of waste streams.

## Review details
Inventory: The internal review was done by several iteration steps concerning raw data validation, raw data documentation, representativity, completeness and consistency of modelling with regard to ISO 14040 and 14044.

## Data sources
- 邵帅. (2016). 基于Emergy和Em-LCA的水泥企业可持续发展水平评价 [硕士, 大连理工大学].
