# Fattening pig production ; manure treatment

Dataset: ILCD process, Unit process, single operation
Geography: LN-CN
Reference year: 2010
Classification: Unit processes / Materials production / Agricultural production means
Functional unit: The evaluation unit was 1000 fattening pigs
Generated by: Rui Yang, 1632707028@qq.com
Owner: Tiangong LCI Data Working Group
Review: Dependent internal review by Tiangong LCI Data Working Group
Amounts: no units in this file; such an amount is in the reference unit of its flow, which a separate flow dataset defines
copyright: false
licenseType: Free of charge for all users and uses

## General comment
The main gases emitted during the treatment of pig feces are CH4, NH3 and N2O, mainly from the volatilization of pig feces and urine.

## Geography
The yield per hectare of corn, soybean and wheat in Liaoning Province in 2010 was ··

## Time period
The yield per hectare of corn, soybean and wheat in Liaoning Province in 2010 was respectively

## Technology and included processes
The content of evaluation is: pollutant emission from fecal volatilization and loss during fecal treatment.

## Technical purpose
The data set provides information on the environmental impacts associated with the production process of fattening pigs, specifically focusing on CH4, NH3, and N2O emissions resulting from manure treatment. It is intended for assessing the contributions to global warming, acidification, and eutrophication from large-scale chemical fattening pig farms. This LCA data set is relevant for researchers, environmental analysts, and agricultural planners involved in optimizing animal husbandry processes and mitigating environmental impacts.

## Reference product
- pig: 1000; input; measured
  1,000 fattening pigs

## Outputs
All rows: measured
- methane (biogenic): 3.78
- ammonia: 1020.8
- nitrous oxide: 61.71
- nitrogen, total (excluding N2): 10032
- phosphorus, total: 4320

## Deviations from the LCI method approaches
In this study, LCA method was applied to evaluate the environmental impact of fattening pig production on large-scale chemical fattening pig farms in Liaoning Province

## Data selection and combination
The data in this paper were collected from 36 large-scale chemical fattening pig farms in Liaoning province. The potential impacts of global warming, environmental acidification and eutrophication in the process of fattening pig production were calculated with reference to the relevant data provided by Liaoning Statistical Yearbook.

## Data treatment and extrapolations
Refer to IPCC2006

## Use advice
Users of this data set should pay attention to the specific regional context (Liaoning Province, 2010) and the scale (36 large-scale fattening pig farms) from which the data were collected. The environmental impacts should be interpreted within the scope of the provided reference year and location. When using the data, incorporate appropriate handling for methodological consistency regarding emissions from fecal volatilization and loss. Consider the technological applicability pertaining to pig manure treatment processes, and carefully reference the IPCC2006 guidelines for emission factors. Use the evaluation unit of 1000 fattening pigs as the basis for comparing and scaling results.

## Review details
Inventory: The internal review was done by several iteration steps concerning raw data validation, raw data documentation, representativity, completeness and consistency of modelling with regard to ISO 14040 and 14044.

## Data sources
- 刘鸣达, 赵妍, 刘显军, & 王耀晶. 辽宁省育肥猪生产环境影响的生命周期评价. 农业环境科学学报 31, 1250–1255 (2012).
