# Molybdenum oxide production ; Molybdenum oxide ; Molybdenum concentrate ; Rotary kiln oxidation roasting method (without acid production) ; All sizes; NESPS2 / 氧化钼生产 ; 氧化钼 ; 钼精矿 ; 回转窑氧化焙烧法（未制酸） ; 所有规模 ; 全国第二次污染普查数据

Dataset: ILCD process, Unit process, single operation
Geography: CN
Reference year: 2019
Classification: Reference Parameters / Materials production / Inorganic chemicals
Generated by: The data was created by the Office of the Second National Pollution Source Census of the Ministry of Ecology and Environment, and the data was organized by the TianGong Plan team for ILCD format / 生态环境部第二次全国污染源普查工作办公室创建数据，天工计划团队常慧敏整理数据为ILCD格式
Owner: Tiangong LCI Data Working Group / 天工LCI数据工作小组
Review: Dependent internal review by Tiangong LCI Data Working Group / 天工LCI数据工作小组
Amounts: no units in this file; such an amount is in the reference unit of its flow, which a separate flow dataset defines
copyright: false
licenseType: Free of charge for all users and uses

## General comment
the Technical of end-of-pipe management technology for pollution Exhaust gasis/

## Technical purpose
通过回转窑氧化焙烧法生产的氧化钼在行业内的各种规模应用中均有使用。这包括需要高纯度氧化钼的合金制造、电子产品和催化剂的生产。末端治理技术适用于需要有效控制诸如二氧化硫、氮氧化物和颗粒物的工业过程。

## Reference product
- Molybdenum Oxide: 1000; calculated
  源文件中描述为为氧化钼，此处对其进行了匹配工作，将其匹配到LCAflow库里面相最符合的流，污染物指标备注为工业废气量

## Outputs
All rows: calculated
- particles (PM2.5 - PM10): 0.3106
  the Technical of end-of-pipe management technology for pollution particles (PM2.5 - PM10)isCyclone dust removal + bag filter + spray tower (without acid production)，Its Technical efficiency of end-of-pipe management99
  污染物指标颗粒物的末端治理技术是旋风+布袋+喷淋塔（未制酸），其效率为99，末端治理设施实际运行率（k值）计算公式为k=废气治理设施年正常运行时间（小时）/企业年正常生产时间（小时）。原文件中描述污染物类别为废气，污染物指标为颗粒物，此处对其进行了匹配工作，将其匹配到LCAflow库里面相最符合的流，污染物指标备注为颗粒物
- Nitrogen oxides: 0.38
  the Technical of end-of-pipe management technology for pollution Nitrogen oxidesis/
  污染物指标氮氧化物的末端治理技术是/，末端治理设施实际运行率（k值）计算公式为k=废气治理设施年正常运行时间（小时）/企业年正常生产时间（小时）。原文件中描述污染物类别为废气，污染物指标为氮氧化物，此处对其进行了匹配工作，将其匹配到LCAflow库里面相最符合的流，污染物指标备注为氮氧化物
- particles (PM2.5 - PM10): 0.6212
  the Technical of end-of-pipe management technology for pollution particles (PM2.5 - PM10)isBag filter，Its Technical efficiency of end-of-pipe management98
  污染物指标颗粒物的末端治理技术是布袋除尘，其效率为98，末端治理设施实际运行率（k值）计算公式为k=废气治理设施年正常运行时间（小时）/企业年正常生产时间（小时）。原文件中描述污染物类别为废气，污染物指标为颗粒物，此处对其进行了匹配工作，将其匹配到LCAflow库里面相最符合的流，污染物指标备注为颗粒物
- particles (PM2.5 - PM10): 1.553
  the Technical of end-of-pipe management technology for pollution particles (PM2.5 - PM10)isCyclone dust removal + multi-stage spray tower (without acid production)，Its Technical efficiency of end-of-pipe management95
  污染物指标颗粒物的末端治理技术是旋风+多级喷淋塔（未制酸），其效率为95，末端治理设施实际运行率（k值）计算公式为k=废气治理设施年正常运行时间（小时）/企业年正常生产时间（小时）。原文件中描述污染物类别为废气，污染物指标为颗粒物，此处对其进行了匹配工作，将其匹配到LCAflow库里面相最符合的流，污染物指标备注为颗粒物
- sulfur dioxide: 5.83905
  the Technical of end-of-pipe management technology for pollution sulfur dioxideisMulti-stage alkali spray (without acid production)，Its Technical efficiency of end-of-pipe management99.3
  污染物指标二氧化硫的末端治理技术是多级碱喷淋（未制酸），其效率为99.3，末端治理设施实际运行率（k值）计算公式为k=废气治理设施年正常运行时间（小时）/企业年正常生产时间（小时）。原文件中描述污染物类别为废气，污染物指标为二氧化硫，此处对其进行了匹配工作，将其匹配到LCAflow库里面相最符合的流，污染物指标备注为二氧化硫
- particles (PM2.5 - PM10): 15.53
  the Technical of end-of-pipe management technology for pollution particles (PM2.5 - PM10)isCyclone dust removal，Its Technical efficiency of end-of-pipe management50
  污染物指标颗粒物的末端治理技术是旋风除尘，其效率为50，末端治理设施实际运行率（k值）计算公式为k=废气治理设施年正常运行时间（小时）/企业年正常生产时间（小时）。原文件中描述污染物类别为废气，污染物指标为颗粒物，此处对其进行了匹配工作，将其匹配到LCAflow库里面相最符合的流，污染物指标备注为颗粒物
- particles (PM2.5 - PM10): 21.742
  the Technical of end-of-pipe management technology for pollution particles (PM2.5 - PM10)isSpray tower (with acid production)，Its Technical efficiency of end-of-pipe management30
  污染物指标颗粒物的末端治理技术是喷淋塔（制酸），其效率为30，末端治理设施实际运行率（k值）计算公式为k=废气治理设施年正常运行时间（小时）/企业年正常生产时间（小时）。原文件中描述污染物类别为废气，污染物指标为颗粒物，此处对其进行了匹配工作，将其匹配到LCAflow库里面相最符合的流，污染物指标备注为颗粒物
- sulfur dioxide: 33.366
  the Technical of end-of-pipe management technology for pollution sulfur dioxideisMulti-stage alkali spray (with acid production)，Its Technical efficiency of end-of-pipe management96
  污染物指标二氧化硫的末端治理技术是多级碱喷淋（制酸），其效率为96，末端治理设施实际运行率（k值）计算公式为k=废气治理设施年正常运行时间（小时）/企业年正常生产时间（小时）。原文件中描述污染物类别为废气，污染物指标为二氧化硫，此处对其进行了匹配工作，将其匹配到LCAflow库里面相最符合的流，污染物指标备注为二氧化硫
- sulfur dioxide: 83.415
  the Technical of end-of-pipe management technology for pollution sulfur dioxideisAlkali spray，Its Technical efficiency of end-of-pipe management90
  污染物指标二氧化硫的末端治理技术是碱喷淋，其效率为90，末端治理设施实际运行率（k值）计算公式为k=废气治理设施年正常运行时间（小时）/企业年正常生产时间（小时）。原文件中描述污染物类别为废气，污染物指标为二氧化硫，此处对其进行了匹配工作，将其匹配到LCAflow库里面相最符合的流，污染物指标备注为二氧化硫
- sulfur dioxide: 100.098
  the Technical of end-of-pipe management technology for pollution sulfur dioxideisDouble alkali process，Its Technical efficiency of end-of-pipe management88
  污染物指标二氧化硫的末端治理技术是双碱法，其效率为88，末端治理设施实际运行率（k值）计算公式为k=废气治理设施年正常运行时间（小时）/企业年正常生产时间（小时）。原文件中描述污染物类别为废气，污染物指标为二氧化硫，此处对其进行了匹配工作，将其匹配到LCAflow库里面相最符合的流，污染物指标备注为二氧化硫
- Exhaust gas: 26133
  the Technical of end-of-pipe management technology for pollution Exhaust gasis/
  污染物指标工业废气量的末端治理技术是/，末端治理设施实际运行率（k值）计算公式为k=废气治理设施年正常运行时间（小时）/企业年正常生产时间（小时）。原文件中描述污染物类别为废气，污染物指标为工业废气量，此处对其进行了匹配工作，将其匹配到LCAflow库里面相最符合的流，污染物指标备注为工业废气量

## Use advice
This dataset is derived from the Pollution Source Census Report and contains information on pollution emissions and related products. However, it does not include data on energy or chemical consumption, nor does it provide information on waste or co-product generation. When utilizing this dataset, please supplement the missing data based on actual conditions before use
该数据集来源于污染源普查报告，包含污染物排放及相关产品信息，但不包含能源或化学品消耗数据，也不提供废弃物或共生产物产生信息。在使用该数据集时，请根据实际情况补充缺失数据后再使用。

## Review details
Inventory: The internal review was done by several iteration steps concerning raw data validation, raw data documentation, representativity, completeness and consistency of modelling with regard to ISO 14040 and 14044.
清单： 内部审查通过几个迭代步骤完成，涉及原始数据验证、原始数据记录、代表性、完整性、与 ISO 14040 和 14044 有关的建模的一致性。

## Data sources
- 第二次全国污染源普查产排污核算系数手册（试用版）,四级代码3231文件，在完整版文件中第5117页
