# Bauxite Mining ; Bauxite ; Cradle

Dataset: ILCD process, Unit process, single operation
Geography: CN
Reference year: 2020
Classification: Unit processes / Materials production / Non-energetic raw materials
Generated by: Ruoxi Xiong, xiongrx0126@163.com
Owner: Tiangong LCI Data Working Group
Review: Dependent internal review by Tiangong LCI Data Working Group
Amounts: no units in this file; such an amount is in the reference unit of its flow, which a separate flow dataset defines
copyright: false
licenseType: Free of charge for all users and uses

## General comment
铝土矿开采｜耐火废料生产

## Time period
Date of publication

## Technical purpose
This dataset describes the process of bauxite mining specifically adapted for the conditions in China. Bauxite, extracted through this process, is primarily used as a raw material for the production of alumina, which subsequently can be refined into aluminum metal. This aluminum is utilized across various industries including automotive, construction, electronics, packaging, and aerospace. Particular to China, this dataset accounts for regional energy mix and fuel types predominantly used during the extraction phase.

## Reference product
- bauxite: 1; log-normal; software or database

## Inputs
All rows: software or database
- mine infrastructure, bauxite: 5e-11; log-normal
  Capital equipment
- Occupation, mineral extraction site: 0.000419; log-normal
- electricity, high voltage, aluminium industry: 0.003312; log-normal
- aluminium: 0.2126; log-normal
- Gangue, Bauxite: 2.26; log-normal
  备注呢？？？？？
- blasting: 0.000195; log-normal
  Explosives
- Coal, brown, in ground: 0.0178
  Coal fuel
- Water, salt, ocean: 0.00066; log-normal
- Water, unspecified natural origin: 0.0005; log-normal
- Transformation, from annual crop: 0.000134; log-normal
- Transformation, from cropland fallow (non-use): 4.26e-5; log-normal
- Transformation, from forest, extensive: 3.34e-5; log-normal
- Transformation, to mineral extraction site: 0.00021; log-normal
- recultivation, bauxite mine: 0.0002; log-normal
  Mine restoration

## Outputs
- particles (PM2.5): 8.36e-6; log-normal; software or database
- particles (> PM10): 8.64e-5; log-normal; software or database
- particles (PM2.5 - PM10): 7.52e-5; log-normal; software or database
- inert waste: 6.2e-5; log-normal; software or database
  Solid waste

## Data selection and combination
The inventory for this activity in the ecoinvent database constitutes a globally-averaged data set, based on a survey by the International Aluminium Institute (IAI 2013). We adapted this data set for Chinese conditions by replacing the global average electricity mix by the Chinese national mix and replacing diesel and heavy fuel oil inputs by coal, given that the latter is the main type fuel used in Chinese bauxite mining

## Use advice
When utilizing this dataset for Life Cycle Assessment (LCA), take note to accurately represent Chinese energy consumption patterns in bauxite mining operations – namely the use of coal as a primary energy source instead of diesel or heavy fuel oil, and the use of the Chinese national electricity mix over a global average. This will ensure a better regional specificity in LCA results. Also, consider the technological applicability and any systemic differences between the reference global data and the conditions within China before applying the data to other contexts.

## Review details
Inventory: The internal review was done by several iteration steps concerning raw data validation, raw data documentation, representativity, completeness and consistency of modelling with regard to ISO 14040 and 14044.

## Data sources
- Muñoz, I., Soto, A., Maza, D. & Bayón, F. Life cycle assessment of refractory waste management in a Spanish steel works. Waste Manage. 111, 1–9 (2020).
