# Heap leaching-extraction ; Electroplated copper ; Copper ore ; Heap leaching - extraction - electrowinning ; All sizes; NESPS2 / 堆浸-萃取 ; 电积铜 ; 铜矿石 ; 堆浸-萃取-电积 ; 所有规模 ; 全国第二次污染普查数据

Dataset: ILCD process, Unit process, single operation
Geography: CN
Reference year: 2019
Classification: Reference Parameters / Materials production / Metals and semimetals
Generated by: The data was created by the Office of the Second National Pollution Source Census of the Ministry of Ecology and Environment, and the data was organized by the TianGong Plan team for ILCD format / 生态环境部第二次全国污染源普查工作办公室创建数据，天工计划团队常慧敏整理数据为ILCD格式
Owner: Tiangong LCI Data Working Group / 天工LCI数据工作小组
Review: Dependent internal review by Tiangong LCI Data Working Group / 天工LCI数据工作小组
Amounts: no units in this file; such an amount is in the reference unit of its flow, which a separate flow dataset defines
copyright: false
licenseType: Free of charge for all users and uses

## General comment
the Technical of end-of-pipe management technology for pollution chemical oxygen demandisPhysicochemical treatment，Its Technical efficiency of end-of-pipe management30

## Technical purpose
所描述的工艺用于通过堆浸、萃取和电积方法生产电镀铜。此工艺适用于铜矿石加工的所有规模的生产，并在铜矿产业中对从矿石生成纯铜至关重要。所指示的末端管理技术适用于此过程产生的废水污染控制，特别是针对化学需氧量、氨氮及重金属（如铅、砷、汞、镉、铜和铬）的高效去除。

## Reference product
- Electrodeposited Copper: 1000; calculated
  源文件中描述为为电积铜，此处对其进行了匹配工作，将其匹配到LCAflow库里面相最符合的流，污染物指标备注为工业废水量

## Outputs
All rows: calculated
- Mercury: 0.000135
  the Technical of end-of-pipe management technology for pollution MercuryisPhysicochemical treatment，Its Technical efficiency of end-of-pipe management95
  污染物指标汞的末端治理技术是物理化学法，其效率为95，末端治理设施实际运行率（k值）计算公式为k=废水治理设施年运行时间（小时）/企业年正常生产时间（小时）。原文件中描述污染物类别为废水，污染物指标为汞，此处对其进行了匹配工作，将其匹配到LCAflow库里面相最符合的流，污染物指标备注为汞
- Chromium: 0.000275
  the Technical of end-of-pipe management technology for pollution ChromiumisPhysicochemical treatment，Its Technical efficiency of end-of-pipe management95
  污染物指标铬的末端治理技术是物理化学法，其效率为95，末端治理设施实际运行率（k值）计算公式为k=废水治理设施年运行时间（小时）/企业年正常生产时间（小时）。原文件中描述污染物类别为废水，污染物指标为铬，此处对其进行了匹配工作，将其匹配到LCAflow库里面相最符合的流，污染物指标备注为铬
- cadmium: 0.046
  the Technical of end-of-pipe management technology for pollution cadmiumisPhysicochemical treatment，Its Technical efficiency of end-of-pipe management95
  污染物指标镉的末端治理技术是物理化学法，其效率为95，末端治理设施实际运行率（k值）计算公式为k=废水治理设施年运行时间（小时）/企业年正常生产时间（小时）。原文件中描述污染物类别为废水，污染物指标为镉，此处对其进行了匹配工作，将其匹配到LCAflow库里面相最符合的流，污染物指标备注为镉
- lead: 0.21
  the Technical of end-of-pipe management technology for pollution leadisPhysicochemical treatment，Its Technical efficiency of end-of-pipe management95
  污染物指标铅的末端治理技术是物理化学法，其效率为95，末端治理设施实际运行率（k值）计算公式为k=废水治理设施年运行时间（小时）/企业年正常生产时间（小时）。原文件中描述污染物类别为废水，污染物指标为铅，此处对其进行了匹配工作，将其匹配到LCAflow库里面相最符合的流，污染物指标备注为铅
- Waste water: 260000
  the Technical of end-of-pipe management technology for pollution Waste wateris/，Its Technical efficiency of end-of-pipe management0
  污染物指标工业废水量的末端治理技术是/，其效率为0。原文件中描述污染物类别为废水，污染物指标为工业废水量，此处对其进行了匹配工作，将其匹配到LCAflow库里面相最符合的流，污染物指标备注为工业废水量
- arsenic: 0.5165
  the Technical of end-of-pipe management technology for pollution arsenicisPhysicochemical treatment，Its Technical efficiency of end-of-pipe management95
  污染物指标砷的末端治理技术是物理化学法，其效率为95，末端治理设施实际运行率（k值）计算公式为k=废水治理设施年运行时间（小时）/企业年正常生产时间（小时）。原文件中描述污染物类别为废水，污染物指标为砷，此处对其进行了匹配工作，将其匹配到LCAflow库里面相最符合的流，污染物指标备注为砷
- Copper: 0.771
  the Technical of end-of-pipe management technology for pollution CopperisPhysicochemical treatment，Its Technical efficiency of end-of-pipe management95
  污染物指标铜的末端治理技术是物理化学法，其效率为95，末端治理设施实际运行率（k值）计算公式为k=废水治理设施年运行时间（小时）/企业年正常生产时间（小时）。原文件中描述污染物类别为废水，污染物指标为铜，此处对其进行了匹配工作，将其匹配到LCAflow库里面相最符合的流，污染物指标备注为铜
- Ammonia Nitrogen: 1.1484
  the Technical of end-of-pipe management technology for pollution Ammonia NitrogenisPhysicochemical treatment，Its Technical efficiency of end-of-pipe management10
  污染物指标氨氮的末端治理技术是物理化学法，其效率为10，末端治理设施实际运行率（k值）计算公式为k=废水治理设施年运行时间（小时）/企业年正常生产时间（小时）。原文件中描述污染物类别为废水，污染物指标为氨氮，此处对其进行了匹配工作，将其匹配到LCAflow库里面相最符合的流，污染物指标备注为氨氮
- chemical oxygen demand: 5.5041
  the Technical of end-of-pipe management technology for pollution chemical oxygen demandisPhysicochemical treatment，Its Technical efficiency of end-of-pipe management30
  污染物指标化学需氧量的末端治理技术是物理化学法，其效率为30，末端治理设施实际运行率（k值）计算公式为k=废水治理设施年运行时间（小时）/企业年正常生产时间（小时）。原文件中描述污染物类别为废水，污染物指标为化学需氧量，此处对其进行了匹配工作，将其匹配到LCAflow库里面相最符合的流，污染物指标备注为化学需氧量

## Use advice
This dataset is derived from the Pollution Source Census Report and contains information on pollution emissions and related products. However, it does not include data on energy or chemical consumption, nor does it provide information on waste or co-product generation. When utilizing this dataset, please supplement the missing data based on actual conditions before use
该数据集来源于污染源普查报告，包含污染物排放及相关产品信息，但不包含能源或化学品消耗数据，也不提供废弃物或共生产物产生信息。在使用该数据集时，请根据实际情况补充缺失数据后再使用。

## Review details
Inventory: The internal review was done by several iteration steps concerning raw data validation, raw data documentation, representativity, completeness and consistency of modelling with regard to ISO 14040 and 14044.
清单： 内部审查通过几个迭代步骤完成，涉及原始数据验证、原始数据记录、代表性、完整性、与 ISO 14040 和 14044 有关的建模的一致性。

## Data sources
- 第二次全国污染源普查产排污核算系数手册（试用版）,四级代码3211文件，在完整版文件中第4866页
