# Granite board production ; Granite board ; Cutting, polishing, and forming; 1.8*0.6*0.2 m2, CN

Dataset: ILCD process
Geography: CN
Classification: Unit processes / Materials production / Other mineralic materials
Generated by: Jiaqi Lu, wilsherelu@foxmail.com
Owner: Tiangong LCI Data Working Group
Review: Dependent internal review by Tiangong LCI Data Working Group
Amounts: no units in this file; such an amount is in the reference unit of its flow, which a separate flow dataset defines
copyright: false
licenseType: Free of charge for all users and uses

## General comment
Granite slabs of the specified dimensions (1.8*0.6*0.2 meters) are commonly used for construction purposes, including flooring, countertops, and as decorative interior and exterior walls and surfaces in both residential and commercial buildings.

## Reference product
- Granite slab product: 1; missing unimportant
  Granite slab products

## Inputs
- granite: 3543.75; missing unimportant
  granite blank
- water: 4984.46; missing unimportant
- Electricity: 1.5984e6; missing unimportant

## Outputs
- Nitrogenous Matter (unspecified, as N): 2.15; missing unimportant
  Ammonia nitrogen [discharge to water (unspecified type)
- chemical oxygen demand: 20; missing unimportant
  Chemical oxygen demand [discharge to water (unspecified type)]
- Particles (PM0.2 - PM2.5): 940; missing unimportant
  Total particulate matter [emitted to the atmosphere (unspecified type)]
- Sludge (from processing): 576880; missing unimportant

## Use advice
When using this life cycle assessment data for granite slabs production, it is important to consider the geographical location, as the data provided is specific to China (CN). Additionally, users should account for variations in production practices and should be aware of whether the data includes or excludes end-of-life scenarios, such as recycling or disposal of the materials.

## Review details
Inventory: The internal review was done by several iteration steps concerning raw data validation, raw data documentation, representativity, completeness and consistency of modelling with regard to ISO 14040 and 14044.

## Data sources
- 年加工30万m2花岗岩板材项目环评报告
