# Alumina production ; Alumina for metallurgy ; Bauxite ; 2014

Dataset: ILCD process, Unit process, single operation
Geography: CN
Reference year: 2021
Classification: Unit processes / Materials production / Non-energetic raw materials
Generated by: Yuzhen Feng, fyz22
Owner: Tiangong LCI Data Working Group
Review: Dependent internal review by Tiangong LCI Data Working Group
Amounts: no units in this file; such an amount is in the reference unit of its flow, which a separate flow dataset defines
copyright: false
licenseType: Free of charge for all users and uses

## General comment
The industrial process described pertains to the production of metallurgical-grade alumina, which is typically used for metal aluminum production by the aluminum industry. This high-purity alumina is produced from bauxite and is an essential raw material for the fabrication of aluminum metals, especially in large-scale smelting operations.

## Time period
Date of publication

## Reference product
- aluminium oxide, metallurgical: 1000; software or database
  alumina

## Inputs
All rows: software or database
- soda ash, dense: 158.22
  soda ash
- Petroleum Coke: 972.085
  Energy sources proportion of energy consumption is coal: fuel oil: coke: natural gas: coke even gas=46.0%: 11.0%: 7.1%: 14.1%: 21.7%
- coal gas: 2971.02
  (same comment as for Petroleum Coke)
- natural gas, high pressure: 1930.48
  (same comment as for Petroleum Coke)
- fuel oil, unspecified: 1506.05
  (same comment as for Petroleum Coke)
- hard coal: 6298.02
  (same comment as for Petroleum Coke)
- Water, unspecified natural origin: 2.22
  water consumption

## Data selection and combination
The data in this study refers to the LCA data of PA, SA, electricity, and other background data. The PA data were obtained from statistical data sources, and the SA data were mainly obtained from the literatures. The background data were mainly derived from the Chinese localization LCA database CAS RCEES 2018, which was established by the Research Center for Eco-Environmental Sciences, Chinese Academy of Sciences and covers LCA data for energy, materials, transportation, waste management etc.

## Use advice
Users of this LCA data set should note that the PA (Process Attributional) data was sourced from statistical data, while the SA (Site Attributional) data comes predominantly from literature. Background data are mainly derived from the CAS RCEES 2018 Chinese localized LCA database. When incorporating this data into LCA studies, special attention should be given to the origin and quality of data, representativeness of the data for the process under study, and the alignment with the methodological choices made in the LCA model. The technological scope should reflect the production year (2014) and the specific technological processes in place at that time in order to ensure temporal accuracy.

## Review details
Inventory: The internal review was done by several iteration steps concerning raw data validation, raw data documentation, representativity, completeness and consistency of modelling with regard to ISO 14040 and 14044.

## Data sources
- Ding, N., Liu, N., Lu, B. & Yang, J. Life cycle greenhouse gas emissions of aluminum based on regional industrial transfer in China. J. Ind. Ecol. 25, 1657–1672 (2021).
