# Production stage ; Drilling fluid ; Low permeability gas field ; Waste drilling fluid drilling

Dataset: ILCD process, Unit process, single operation
Geography: EEDS-NMG-CN
Reference year: 2014
Classification: Materials production / Non-energetic raw materials
LCI method principle: Attributional
LCI method approaches: Consequential
Generated by: zimeng li, 1577978537@qq.com
Owner: Tiangong LCI Data Working Group
Review: Dependent internal review by Tiangong LCI Data Working Group
Amounts: no units in this file; such an amount is in the reference unit of its flow, which a separate flow dataset defines
copyright: false
licenseType: Free of charge for all users and uses

## General comment
No solid phase and liquid phase falling to the ground during the whole well drilling. The technology of drilling fluid not falling to the ground reduces the workload of the Mud Pit, realizes zero discharge of the waste drilling fluid in the drilling process, reduces the environmental damage caused by the waste drilling fluid, and the ground is completely restored to the pre-drilling state after the completion of drilling The reuse of waste drilling fluid can also greatly reduce the cost of drilling

## Geography
Daniu gas field is located in the border area of Shaanxi and Mongolia, belonging to the Ordos Basin. It is one of the development areas of the north China branch of the Sinopec. During the period of “Fifteen” in Daniu gas field, 723 horizontal wells are planned to be deployed, with a new gas production capacity of 66.5 × 108 m3 and a gas production capacity of 214 × 108 m3. In 2012, the DANIU gas field produced 30 × 108 m3 of natural gas per year, completed 119 horizontal wells, with an average depth of 3992.21 m and an average length of 1131.13 m, it is the first low permeability gas field to realize horizontal well scale development in China.

## Technical purpose
The industrial process pertains to the extraction phase in a low permeability gas field, specifically focusing on the use of drilling fluid in the drilling operation. The state-of-the-art technology ensures no waste drilling fluid is discharged to the ground, applying a non-landfall technique that enhances environmental protection by avoiding soil and groundwater contamination and allows for the site to be restored post-drilling. Additionally, the reuse of the drilling fluid significantly diminishes operational costs. The data represents practices from the Daniu gas field which demonstrates large-scale horizontal well development and advances in natural gas extraction methodology in China.

## Reference product
- LPG - liquefied petroleum gas: 1.0845e6; uniform; article inperiodical
  Waste drilling fluid produced during the “Twelfth Five-Year Plan” of Daniudi Gas Field

## Inputs
- LPG - liquefied petroleum gas: 1.446e8; uniform; article inperiodical
  The Daniudi Gas Field’s “Twelfth Five-Year Plan” plan consumes 14.46×104t of chemicals

## Use advice
Data users should consider this dataset specific to the DANIU gas field and it's not necessarily a representation of other fields. While appreciating the environmental benefits and cost savings of the non-landfall drilling fluid technology, users need to ensure that the context of their study aligns with the conditions and technological applicability observed in this scenario. Methodological adjustments must be made when trying to extrapolate these results to different geological or operational contexts. The reuse of drilling fluid should also be factored into lifecycle analyses as an integral part of reducing waste and resource utilization.

## Review details
Inventory: The internal review was done by several iteration steps concerning raw data validation, raw data documentation, representativity, completeness and consistency of modelling with regard to ISO 14040 and 14044.

## Data sources
- 邓红琳,赵文彬,袁立鹤.钻井液不落地技术在大牛地气田的应用[J].断块油气田,2014,21(01):97-99.
