# Highly Concentrated Brine Production ; Highly Concentrated Brine (6% Lithium) ; Solar Pond Evaporation ; Salar de Maricunga, Chile (0.09% Lithium)

Dataset: ILCD process, Unit process, single operation
Geography: CL
Reference year: 2022
Classification: Unit processes / Materials production / Inorganic chemicals
Generated by: Sun Xin, xs389@cornell.edu
Owner: Tiangong LCI Data Working Group
Review: Dependent internal review by Tiangong LCI Data Working Group
Amounts: no units in this file; such an amount is in the reference unit of its flow, which a separate flow dataset defines
licenseType: Free of charge for all users and uses

## General comment
The future supply routes reviewed in this study are based on data gathered from technical reports and environmental impact assessment reports of several lithium mining and processing companies (Lithium Americas Corp., Minera Salar Blanco, Nemaska Lithium Inc., and Keliber Oy) that are at various stages of developing their lithium assets. These are considered future supply routes as they are not yet active but areexpected to be operational in 5–10 years. The lower lithium concentrations at these brine-based sources also reflect the possible future lithium grades of current supply routes from brines, whose lithium concentrations will likely decrease over the years due to extraction

## Technology and included processes
The brine-based future supply routes for production of LiOH⋅H2O are similar to the current supply routes and represent operations at Salar de Cauchari, Argentina and Salar de Maricunga, Chile. These are two other locations within the “lithium triangle”, where considerable lithium reserves exist. The average lithium concentrations at Cauchari and Maricunga are 0.05% and 0.09%, respectively. This influences the energy and chemical use, and to some extent the technical process designs at these facilities. The process information for the brine extraction operations in Salar de Cauchari was gathered from several technical reports prepared for Lithium Americas Corporation (Burga et al., 2020; Worley Parsons, 2011). Similarly, process information for operations in the Salar de Maricunga was derived from technical reports prepared for Minera Salar Blanco (Atacama Water Consultants, 2022). When impacts from these future supply datasets for the brine route were calculated for comparative purposes, data from the specific reviewed sources were used until Li2CO3 production. After that step, Ecoinvent v3.8′ s unit process for converting Li2CO3 to LiOH⋅H2O was again used to model the final production step, and thereby fill the data gaps in the complete production process, for comparability with the other datasets modeled in the study.

## Technical purpose
The described process refers to the production of highly concentrated brine with a lithium content of 6%, using the solar pond evaporation method from a natural lithium source, Salar de Maricunga in Chile, which has a lithium concentration of 0.09%. This highly concentrated lithium brine is commonly used in the lithium industry for the production of lithium compounds, which are essential in manufacturing batteries for electric vehicles, portable electronics, and energy storage systems.

## Reference product
- Concentrated brine (0.9%): 1000; measured

## Inputs
- freshwater,freshwater: 270; measured
- Electricity: 101.16; measured
- Diesel: 657; measured

## Outputs
- Water (evapotranspiration): 7140; measured

## Use advice
When utilizing this LCA data set, it is advised to take into consideration that the production processes for raw materials and any energy flows contributing less than 1% have been excluded. Therefore, the dataset is suitable for direct use in assessing the environmental impact of the evaporation process and the production of high-concentration lithium brine. However, if a more comprehensive life cycle assessment is needed, additional data on raw materials and minor energy flows should be collected and included to ensure a complete analysis.

## Review details
Inventory: The internal review was done by several iteration steps concerning raw data validation, raw data documentation, representativity, completeness and consistency of modelling with regard to ISO 14040 and 14044.

## Data sources
- Chordia, M., Wickerts, S., Nordelöf, A. & Arvidsson, R. Life cycle environmental impacts of current and future battery-grade lithium supply from brine and spodumene. Resources, Conservation and Recycling 187, 106634 (2022).
