# Ethylene production ; Ethylene ; Coal-based methanol to ethylene route ; Coal-based methanol

Dataset: ILCD process, Unit process, black box
Geography: EEDS-NMG-CN
Reference year: 2021
Classification: Energy carriers and technologies / Energetic raw materials
Functional unit: Define 1t of industrial grade ethylene product as a functional unit
LCI method principle: Attributional
LCI method approaches: Allocation - mass
Generated by: Yanan Ren, renyn15@tsinghua.org.cn
Owner: Tiangong LCI Data Working Group
Review: Dependent internal review by Tiangong LCI Data Working Group
Amounts: no units in this file; such an amount is in the reference unit of its flow, which a separate flow dataset defines
copyright: false
licenseType: Free of charge for all users and uses

## General comment
CPI and Total coal-to-polyolefin project, 800,000 tons/year olefin, methanol-to-olefin technology

## Geography
Ordos City Industrial Park, Inner Mongolia Autonomous Region

## Time period
Not mentioned, replaced by the publication time of the document

## Technology and included processes
In the model of coal-based methanol route to ethylene, coal gasification synthesis gas is used to generate methanol, and then the process of producing ethylene through MTO is adopted. Qualified pulverized coal is prepared from the raw coal through the pulverized coal preparation device. In the coal gasification unit, the pulverized coal and the oxygen from the air separation unit are subjected to a pressurized gasification process of dry pulverized coal to generate crude gas. Most of the crude gas is sent to the carbon monoxide shifting device, and part of the CO in the raw gas is converted into H2 by using the shifting process, and the shifted gas is sent to the acid gas removal device, and the CO2 and H2S in the shifted gas are removed by the low-temperature methanol washing process Such as acid gas, the purified gas is sent to the methanol synthesis unit; the remaining part of the crude gas is directly sent to the acid gas removal unit, and after H2S is removed, it is sent to the thermal power station for power generation. The removed H2S is sent to the sulfur recovery unit for recovery, and part of the CO2 is returned to the coal gasification unit. The purification gas demethanol synthesis unit produces crude methanol, the synthesis gas dehydrogenation recovery unit recovers H2, and other parts circulate in the system or go to the fuel gas pipeline network of the whole plant. MTO grade methanol is obtained after the crude methanol passes through the methanol rectification unit. MTO-grade methanol enters the methanol-to-olefins unit to synthesize olefins, producing by-products such as ethylene, propylene, and C5.

## Technical purpose
The described industrial process involves the production of ethylene via a coal-based methanol to ethylene (MTO) route. This process is integral to a project aimed at generating olefins, particularly ethylene, propylene, and C5 by-products at a scale of 800,000 tons per year. The ethylene produced through this method sees its application in the manufacture of polyolefins and serves as a precursor for a variety of chemicals used in the plastics industry, packaging, and agriculture.

## Reference product
- ethene (ethylene): 1000; measured
  Ethylene

## Inputs
All rows: measured
- Methanol: 2690
  MTO grade methanol
- Hydrogen: 0.74
  hydrogen
- sodium hydroxide: 18.16
  sodium hydroxide solution
- Dimethyl disulfide: 0.07
  dimethyl disulfide
- Aluminum oxide (alumina): 0.000639
  Catalyst Al2O3
- palladium: 4.08e-5
  Catalyst Pd
- process steam: 3500
  steam
- Water (desalinated; deionized): 1710
  Medium pressure boiler feed water
- Water for industrial use: 50
  production water
- electricity mix: 862.092
  electricity

## Outputs
All rows: measured
- carbon dioxide: 60
  CO2
- nitrous oxide: 1e-5
  NOx
- non-methane volatile organic compounds: 1.54e-11
  NMVOC
- methane: 23.9
  CH4
- chemical oxygen demand: 0.23
  COD
- biological oxygen demand: 0.08
  BOD5
- Sodium hydroxide: 0.08
  NaOH
- waste water - untreated: 166.54
  MTO process wastewater
- Water (groundwater from technosphere, waste water): 1410.82
  Stripping purified water
- waste water - untreated: 21.9
  Alkaline wastewater
- Waste Alumina Catalyst: 0.000639
  Spent Al2O3 catalyst

## Deviations from the LCI method approaches
MTO grade methanol enters the methanol-to-olefins unit to synthesize olefins, and by-products such as ethylene, propylene, and C5 are produced. This study chooses mass distribution

## Data selection and combination
The inventory data comes from China Power Investment’s ethylene project with an annual output of 800,000 tons of polyolefins

## Use advice
When utilizing this LCA data, users should note that the inventory data is sourced from China Power Investment's ethylene project, which focuses on the annual production of 800,000 tons of polyolefins. The functional unit is defined as 1 ton of industrial-grade ethylene product. Mass allocation has been chosen for this study to distribute environmental loads among the main product and by-products. Users should ensure that they apply the same system boundaries, allocation methods, and functional units when comparing or integrating this data into broader assessments. Attention must also be given to technologically referential timeframes, which in this case is substituted by the publication time of the document due to the absence of specific mention.

## Review details
Inventory: The internal review was done by several iteration steps concerning raw data validation, raw data documentation, representativity, completeness and consistency of modelling with regard to ISO 14040 and 14044.

## Data sources
- 赵悦如. 基于生命周期方法的乙烯生产环境影响分析. (大连理工大学, 2021).
