# recycling LMO battery by hydrometallurgy

Dataset: ILCD process, Unit process, single operation
Geography: GZ-CN
Reference year: 2022
Classification: End-of-life treatment / Material recycling
Functional unit: LMO battery 4×12V, 12Ah
Generated by: Chen, Lipeng, lpchen07@163.com
Owner: Tiangong LCI Data Working Group
Review: Dependent internal review by Tiangong LCI Data Working Group
Amounts: no units in this file; such an amount is in the reference unit of its flow, which a separate flow dataset defines
copyright: false
licenseType: Free of charge for all users and uses

## General comment
Spent lithium manganate (LMO) batteries were managed to produce industrial-grade lithium carbonate, through high-temperature reduction, hydrolysis leaching, and crystallization transformation, which produce manganese oxide and sodium sulfat.

## Technical purpose
This hydrometallurgical recycling process is primarily intended for the recovery of valuable components from spent lithium manganate (LMO) batteries. The recovered industrial-grade lithium carbonate is commonly used in various industries, including the production of lithium-ion batteries, glass and ceramics, and as a flux in aluminum smelting. Manganese oxide produced can be utilized in manufacturing of soft ferrites for electronics, in the chemical industry or as a colorant in bricks and ceramics. Sodium sulfate is used in the detergent and textile industry, as well as in the manufacturing of paper and glass.

## Reference product
- EoL LMO battery: 1; input; measured
  LMO battery 4×12V, 12Ah

## Inputs
All rows: measured
- Sulfuric acid(98%): 5.634
- Sodium hydroxide（30%）: 3.024
- sodium carbonate: 1.962
- Liquid ammonia: 0.708
- hydrogen peroxide: 2.142
- Water (river water from technosphere, cooling water): 5.88
- Electricity: 29.16
- Water (evapotranspiration): 21.24
  pure water

## Outputs
All rows: measured
- Lithium carbonate: 0.3144
- sodium sulfate: 0.606
- aluminium: 0.1956
- Manganese dioxide: 1.2729
- Ammonia Nitrogen: 0.000252
- carbon dioxide: 2.82e-7
- sulfur dioxide: 2.496e-6
- nitrous oxide: 9.24e-6
- chemical oxygen demand: 1.68e-5
- phosphorus, total: 6.12e-6

## Use advice
When using this dataset for life cycle assessment, ensure that the boundary conditions of the recycling process match the intended application scenario. Consider the energy consumption and emissions associated with the high-temperature reduction, hydrolysis leaching, and crystallization stages when evaluating environmental impacts. Note that this dataset represents a single unit process for a 48V, 12Ah retired LMO battery. Users must adjust for scalability and technological applicability depending on the quantity and state of the LMO batteries to be recycled. Special attention should be given to regulatory compliance and potential implications for waste management strategies.

## Review details
Inventory: The internal review was done by several iteration steps concerning raw data validation, raw data documentation, representativity, completeness and consistency of modelling with regard to ISO 14040 and 14044.

## Data sources
- Liu, M. et al. Life cycle environmental and economic assessment of electric bicycles with different batteries in China. Journal of Cleaner Production 385, 135715 (2023).
