# Carbon steel ; steel scrap,iron(lump)，ferroalloy,slagging agent ; Converter method; NESPS2 / 碳钢 ; 废钢、铁水（块）、铁合金、造渣剂 ; 转炉法 ; 小于50吨① ; 全国第二次污染普查数据

Dataset: ILCD process, Unit process, single operation
Geography: CN
Reference year: 2019
Classification: Reference Parameters / Materials production / Metals and semimetals
Generated by: The data was created by the Office of the Second National Pollution Source Census of the Ministry of Ecology and Environment, and the data was organized by the TianGong Plan team for ILCD format / 生态环境部第二次全国污染源普查工作办公室创建数据，天工计划团队常慧敏整理数据为ILCD格式
Owner: Tiangong LCI Data Working Group / 天工LCI数据工作小组
Review: Dependent internal review by Tiangong LCI Data Working Group / 天工LCI数据工作小组
Amounts: no units in this file; such an amount is in the reference unit of its flow, which a separate flow dataset defines
copyright: false
licenseType: Free of charge for all users and uses

## General comment
the Technical of end-of-pipe management technology for pollution Exhaust gasis/，Its Technical efficiency of end-of-pipe management0

## Technical purpose
转炉法用于从碳钢废钢、铁水（块）、铁合金和造渣剂中生产不超过50吨的碳钢，适用于工业领域的小规模钢铁生产。所述尾气治理技术适用于控制钢铁生产过程中的废气和颗粒物（PM2.5至PM10范围）排放，以及废水和化学需氧量（COD）。采用袋式过滤器、干式除尘系统和湿式沉降方法以确保遵守环境法规并最小化对周围生态系统的影响。

## Reference product
- Medium Carbon Steel: 1000; calculated
  源文件中描述为为碳钢，此处对其进行了匹配工作，将其匹配到LCAflow库里面相最符合的流，污染物指标备注为转炉二次烟气废气量

## Outputs
All rows: calculated
- particles (PM2.5 - PM10): 0.03064
  the Technical of end-of-pipe management technology for pollution particles (PM2.5 - PM10)isBag filter，Its Technical efficiency of end-of-pipe management99.6②
  污染物指标一般排放口颗粒物的末端治理技术是布袋除尘，其效率为99.6②，末端治理设施实际运行率（k值）计算公式为k=除尘设备年正常运行小时数（小时）/生产系统年运行小时数（小时），①指单台转炉的公称炉容，单台转炉日产量校核标准为：小于1500吨；，②专指铁水预处理、上料系统、精炼炉等产生的废气治理技术对应的末端治理技术处理效率；。原文件中描述污染物类别为废气，污染物指标为一般排放口颗粒物，此处对其进行了匹配工作，将其匹配到LCAflow库里面相最符合的流，污染物指标备注为一般排放口颗粒物
- particles (PM2.5 - PM10): 0.03648
  the Technical of end-of-pipe management technology for pollution particles (PM2.5 - PM10)isBag filter，Its Technical efficiency of end-of-pipe management99.6
  污染物指标转炉二次烟气有组织颗粒物的末端治理技术是布袋除尘，其效率为99.6，末端治理设施实际运行率（k值）计算公式为k=除尘设备年正常运行小时数（小时）/生产系统年运行小时数（小时），①指单台转炉的公称炉容，单台转炉日产量校核标准为：小于1500吨；。原文件中描述污染物类别为废气，污染物指标为转炉二次烟气有组织颗粒物，此处对其进行了匹配工作，将其匹配到LCAflow库里面相最符合的流，污染物指标备注为转炉二次烟气有组织颗粒物
- Petroleum-related waste: 0.00021
  the Technical of end-of-pipe management technology for pollution Petroleum-related wasteisPrecipitation separation + floating separation + filter separation，Its Technical efficiency of end-of-pipe management90
  污染物指标石油类的末端治理技术是沉淀分离+上浮分离+过滤分离，其效率为90，末端治理设施实际运行率（k值）计算公式为k=废水治理设备年正常运行小时数（小时）/生产系统年运行小时数（小时），①指单台转炉的公称炉容，单台转炉日产量校核标准为：小于1500吨；。原文件中描述污染物类别为废水，污染物指标为石油类，此处对其进行了匹配工作，将其匹配到LCAflow库里面相最符合的流，污染物指标备注为石油类
- particles (PM2.5 - PM10): 0.3064
  the Technical of end-of-pipe management technology for pollution particles (PM2.5 - PM10)isDry dust removal，Its Technical efficiency of end-of-pipe management96③
  污染物指标一般排放口颗粒物的末端治理技术是干法除尘，其效率为96③，末端治理设施实际运行率（k值）计算公式为k=除尘设备年正常运行小时数（小时）/生产系统年运行小时数（小时），①指单台转炉的公称炉容，单台转炉日产量校核标准为：小于1500吨；，③专指转炉一次烟气干法除尘技术对应的末端治理技术处理效率；。原文件中描述污染物类别为废气，污染物指标为一般排放口颗粒物，此处对其进行了匹配工作，将其匹配到LCAflow库里面相最符合的流，污染物指标备注为一般排放口颗粒物
- particles (PM2.5 - PM10): 0.4596
  the Technical of end-of-pipe management technology for pollution particles (PM2.5 - PM10)isWet precipitation，Its Technical efficiency of end-of-pipe management94④
  污染物指标一般排放口颗粒物的末端治理技术是湿法除尘，其效率为94④，末端治理设施实际运行率（k值）计算公式为k=除尘设备年正常运行小时数（小时）/生产系统年运行小时数（小时），①指单台转炉的公称炉容，单台转炉日产量校核标准为：小于1500吨；，④专指转炉一次烟气新OG法除尘技术对应的末端治理技术处理效率。原文件中描述污染物类别为废气，污染物指标为一般排放口颗粒物，此处对其进行了匹配工作，将其匹配到LCAflow库里面相最符合的流，污染物指标备注为一般排放口颗粒物
- Waste water: 710
  the Technical of end-of-pipe management technology for pollution Waste wateris/，Its Technical efficiency of end-of-pipe management0
  污染物指标废水量的末端治理技术是/，其效率为0，①指单台转炉的公称炉容，单台转炉日产量校核标准为：小于1500吨；。原文件中描述污染物类别为废水，污染物指标为废水量，此处对其进行了匹配工作，将其匹配到LCAflow库里面相最符合的流，污染物指标备注为废水量
- chemical oxygen demand: 0.0036
  the Technical of end-of-pipe management technology for pollution chemical oxygen demandisPrecipitation separation + floating separation + filter separation，Its Technical efficiency of end-of-pipe management70
  污染物指标化学需氧量的末端治理技术是沉淀分离+上浮分离+过滤分离，其效率为70，末端治理设施实际运行率（k值）计算公式为k=废水治理设备年正常运行小时数（小时）/生产系统年运行小时数（小时），①指单台转炉的公称炉容，单台转炉日产量校核标准为：小于1500吨；。原文件中描述污染物类别为废水，污染物指标为化学需氧量，此处对其进行了匹配工作，将其匹配到LCAflow库里面相最符合的流，污染物指标备注为化学需氧量
- Exhaust gas: 4070
  the Technical of end-of-pipe management technology for pollution Exhaust gasis/，Its Technical efficiency of end-of-pipe management0
  污染物指标转炉二次烟气废气量的末端治理技术是/，其效率为0，①指单台转炉的公称炉容，单台转炉日产量校核标准为：小于1500吨；。原文件中描述污染物类别为废气，污染物指标为转炉二次烟气废气量，此处对其进行了匹配工作，将其匹配到LCAflow库里面相最符合的流，污染物指标备注为转炉二次烟气废气量
- Exhaust gas: 5671
  the Technical of end-of-pipe management technology for pollution Exhaust gasis/，Its Technical efficiency of end-of-pipe management0
  污染物指标一般排放口废气量的末端治理技术是/，其效率为0，①指单台转炉的公称炉容，单台转炉日产量校核标准为：小于1500吨；。原文件中描述污染物类别为废气，污染物指标为一般排放口废气量，此处对其进行了匹配工作，将其匹配到LCAflow库里面相最符合的流，污染物指标备注为一般排放口废气量

## Use advice
This dataset is derived from the Pollution Source Census Report and contains information on pollution emissions and related products. However, it does not include data on energy or chemical consumption, nor does it provide information on waste or co-product generation. When utilizing this dataset, please supplement the missing data based on actual conditions before use
该数据集来源于污染源普查报告，包含污染物排放及相关产品信息，但不包含能源或化学品消耗数据，也不提供废弃物或共生产物产生信息。在使用该数据集时，请根据实际情况补充缺失数据后再使用。

## Review details
Inventory: The internal review was done by several iteration steps concerning raw data validation, raw data documentation, representativity, completeness and consistency of modelling with regard to ISO 14040 and 14044.
清单： 内部审查通过几个迭代步骤完成，涉及原始数据验证、原始数据记录、代表性、完整性、与 ISO 14040 和 14044 有关的建模的一致性。

## Data sources
- 第二次全国污染源普查产排污核算系数手册（试用版）,四级代码3120文件，在完整版文件中第4111页
