# Shale gas production;Site preparation stage;Flare pit construction

Dataset: ILCD process, Unit process, black box
Geography: SC-CN
Reference year: 2014
Valid until: 2016
Classification: Unit processes / Energy carriers and technologies / Natural gas based fuels
Generated by: Pu Hong, 15695258655@163.com
Owner: Tiangong LCI Data Working Group
Review: Dependent internal review by Tiangong LCI Data Working Group
Amounts: no units in this file; such an amount is in the reference unit of its flow, which a separate flow dataset defines
copyright: false
licenseType: Free of charge for all users and uses

## General comment
The dataset represents the flare pit construction stage in shale gas production, crucial for safe and controlled burning of excess gas. This process is applicable in the construction and operational stages of shale gas extraction sites predominantly in the Sichuan and Chongqing regions of China. It is tailored for industry professionals focusing on safety and environmental standards during the site preparation phase of shale gas projects.

## Geography
China's shale gas extraction work is currently concentrated in the Sichuan and Chongqing areas, and the data from Sichuan and Chongqing are selected for LCA calculations.

## Time period
Raw data dates between 2014-2016

## Reference product
- Retention pond: 200; min 400; max 50; uniform; measured
  场地准备阶段--火炬坑体积

## Inputs
All rows: uniform; measured
- #325 cement: 23000; min 10000; max 36000
  Components of C30 concrete
- sand: 40000; min 16000; max 62000
  Components of C30 concrete
- gravel: 69000; min 28000; max 108000
  Components of C30 concrete
- freshwater: 11000; min 4000; max 17000
  Components of C30 concrete
- Diesel: 469; min 173; max 789
  Used for material transportation, etc.
- Electricity: 216; min 90; max 338.4
  Used for concrete mixing, etc.

## Use advice
Users of this LCA dataset should note that it reflects the technological practices and environmental impacts associated with flare pit construction between 2014-2016 exclusively in Sichuan and Chongqing. For accurate representation, the data should be contextualized within these temporal and geographical boundaries. Users must consider technological advancements and regional variations if applying this data to projects beyond the stated locations and time frame. Special attention should be given to methodological consistency when comparing with datasets from other regions or time periods.

## Review details
Inventory: The internal review was done by several iteration steps concerning raw data validation, raw data documentation, representativity, completeness and consistency of modelling with regard to ISO 14040 and 14044.

## Data sources
- Wang, J., Liu, M., McLellan, B. C., Tang, X. & Feng, L. Environmental impacts of shale gas development in China: A hybrid life cycle analysis. Resources, Conservation and Recycling 120, 38–45 (2017).
