# Groundwater ex-situ remediation ; Groundwater pump and treat ; Remediated groundwater

Dataset: ILCD process, Unit process, single operation
Geography: DK
Reference year: 2021
Classification: Unit processes / Other Services / Repair and maintenance
Generated by: Wang Ning, wang_ning@caep.org.cn
Owner: Tiangong LCI Data Working Group
Review: Dependent internal review by Tiangong LCI Data Working Group
Amounts: no units in this file; such an amount is in the reference unit of its flow, which a separate flow dataset defines
copyright: false
licenseType: Free of charge for all users and uses

## General comment
Operation of groundwater extraction treatment systems

## Technology and included processes
Groundwater remediation through the use of electricity to operate groundwater extraction and treatment systems

## Technical purpose
The provided LCA data describes a groundwater ex-situ remediation process, specifically illustrating the operation of groundwater extraction and treatment systems designed to remediate contaminated groundwater. This system is purposed for environmental rehabilitation activities and is typically deployed in areas where groundwater has been adversely affected by pollutants. The remediated groundwater can subsequently be utilized for a variety of uses such as, but not limited to, agricultural irrigation, industrial applications, and replenishing local water supplies.

## Reference product
- Remediated groundwater: 1; estimated

## Inputs
- Electricity: 35000; estimated
- contaminated groundwater: 1; estimated
- Extraction wel: 1; estimated
- Treatment facilities: 1; estimated

## Use advice
Users employing this LCA data for environmental impact evaluations should consider the entire life cycle of the groundwater remediation process, ensuring inclusion of the electricity consumption for the pump and treat system as well as any emissions associated with the generation of the power used. It is crucial to account for local electricity mix when calculating the environmental burden to accurately reflect the remediation's impact. Users should also consider end-of-life stages of the facility and equipment, and potential offsets from the improved quality of the remediated groundwater.

## Review details
Inventory: The internal review was done by several iteration steps concerning raw data validation, raw data documentation, representativity, completeness and consistency of modelling with regard to ISO 14040 and 14044.

## Data sources
- Sustainable remediation assessment of a chlorinated ethene plume: method evelopment, application, and assessment
