# Acid roasting of Rare Earth Elements (REE) Rare Earth Elements (REE);baseline;Rare Earth Elements (REE) containing ore

Dataset: ILCD process, Unit process, single operation
Geography: NMG-CN
Reference year: 2012
Classification: Unit processes / Materials production / Inorganic chemicals
Functional unit: Not Mentationed
LCI method principle: Attributional
LCI method approaches: Allocation - market value
Generated by: Tao Wang, twang@iue.ac.cn
Owner: Tiangong LCI Data Working Group
Review: Dependent internal review by Tiangong LCI Data Working Group
Amounts: no units in this file; such an amount is in the reference unit of its flow, which a separate flow dataset defines
copyright: false
licenseType: Free of charge for all users and uses

## General comment
This data set describes a conventional surface mining process used for the extraction of rare earth elements (REEs) from an open pit mine. The ore recovered is characterized by a rare earth oxide (REO) grade of 4.1%. The primary application of this process is to supply raw materials for the production of various REE-related products such as neodymium oxide, which is subsequently transformed into NdFeB magnets used in a wide range of technological applications including electric motors, wind turbines, and electronic devices.

## Technology and included processes
Ore is recovered from the open pit mine using conventional surface mining techniques such as drilling and blasting. The mine contains 750 million tons of ore at 4.1% REO

## Reference product
- Rare Earth Oxides: 1; software or database
  LANGUAGE

## Inputs
All rows: software or database
- transport in t*km,transport in t*km: 0.171
  lorry >16t
- transport in t*km,transport in t*km: 3.08
  freight, rail
- sulphuric acid: 1.55
- heavy fuel oil: 6.59
- Sulfidic tailing: 0.505
- Rare Earth Oxides: 1.11
  LANGUAGE

## Outputs
- carbon dioxide (fossil): 0.154; software or database
  Carbon dioxide, fossil
- sulfur dioxide: 0.00911; software or database

## Deviations from the LCI method approaches
In this section, we discuss the life cycle inventory (LCI) in detail. Each subsection discusses one process of the LCA. Section 3.1 describes the conventional method of rare earths in China from mineral sources. Section 3.2 describes the production process used to transform neodymium oxide into an NdFeB magnet. Finally, section 3.3 describes two alternative recycling processes that could be used. Detailed information on the LCI, assumptions, and allocation choices can be found in the Supporting Information.

## Use advice
When utilizing this data set within a Life Cycle Assessment (LCA), it is important to consider the specific technological context of the mining process. The data set reflects conventional drilling and blasting techniques and is representative of a baseline scenario with a 750 million ton ore reserve at a 4.1% REO grade. Users should take into account that the data provided pertains only to the extraction phase and does not include downstream processing or recycling processes. LCA practitioners should exercise caution when generalizing this data for other REE mining operations with different ore grades or mining techniques. Assumptions and allocation choices used in this LCI should be reviewed in the Supporting Information to ensure methodological consistency.

## Review details
Inventory: The internal review was done by several iteration steps concerning raw data validation, raw data documentation, representativity, completeness and consistency of modelling with regard to ISO 14040 and 14044.

## Data sources
- Sprecher, B. et al. Life Cycle Inventory of the Production of Rare Earths and the Subsequent Production of NdFeB Rare Earth Permanent Magnets. Environ. Sci. Technol. 48, 3951–3958 (2014).
