# Aluminum electrolysis and ingot casting ; Primary aluminum ingot ; Electrolysis 60kA self-baking tank process ; Alumina for metallurgy

Dataset: ILCD process, Unit process, black box
Geography: CN
Reference year: 2005
Classification: Unit processes / Materials production / Metals and semimetals
Generated by: Zimeng Cai, caizm6178@163.com
Owner: Tiangong LCI Data Working Group
Review: Dependent internal review by Tiangong LCI Data Working Group
Amounts: no units in this file; such an amount is in the reference unit of its flow, which a separate flow dataset defines
copyright: false
licenseType: Free of charge for all users and uses

## General comment
电解铝 ; 60kA自焙槽工艺

## Time period
Date of publication

## Technical purpose
The primary aluminum ingot produced by the 60kA self-baking tank electrolysis process is intended for use in applications requiring high-purity aluminum. This includes sectors such as the automotive, aerospace, electrical, and construction industries. The aluminum ingot serves as a raw material for the fabrication of components like engine blocks, aircraft structures, cables, and window frames.

## Reference product
- aluminium, primary, ingot: 1000; missing unimportant

## Inputs
All rows: missing unimportant
- hard coal: 8785
  煤
- anode, for metal electrolysis: 550
  碳阳极
- aluminium oxide, metallurgical: 2000
  氧化铝
- Fluoride: 50
  氟化物
- Oils, unspecified: 720
  油

## Outputs
- Sulfur dioxide: 67.225; missing unimportant
  SO2
- Fluorine: 15; missing unimportant
  氟化物（以氟计）
- PAH, polycyclic aromatic hydrocarbons: 30; missing unimportant
  PAH
- carbon dioxide (fossil),carbon dioxide (fossil): 18898; missing unimportant
  CO2

## Data selection and combination
The data were mainly obtained from relevant literature, but some data were also obtained from internal reports of the aluminum industry. The data are considered and referred to a large number of literature, so they are closer to the actual situation and have a certain degree of representativeness.

## Use advice
When utilizing the data set for the 60kA self-baking tank process of aluminum electrolysis and ingot casting, attention should be paid to the technological scope of the data provided. The data chiefly derives from relevant literature and internal industry reports, ensuring a close representation of actual operations, offering significance and reliability. It is advised to account for any technological updates or differences in operational practices that may have occurred since the date of publication, and users should consider potential variations in different geographic regions or manufacturing facilities.

## Review details
Inventory: The internal review was done by several iteration steps concerning raw data validation, raw data documentation, representativity, completeness and consistency of modelling with regard to ISO 14040 and 14044.

## Data sources
- 王小伍 & 华贲. 中国电解铝工业的多因素综合生命周期评价. 轻金属 3–6 (2005).
