# Municipal sludge treatment and disposal;wet sludge moisture content 80%;350℃ pyrolysis

Dataset: ILCD process, Unit process, single operation
Geography: CN
Classification: Unit processes / End-of-life treatment / Wastewater treatment
Functional unit: 1 t of sludge is selected as the functional unit, the moisture content of wet sludge is 80%.
Generated by: Jin Sitian, 2331276@tongji.edu.cn
Owner: Tiangong LCI Data Working Group
Review: Dependent internal review by Tiangong LCI Data Working Group
Amounts: no units in this file; such an amount is in the reference unit of its flow, which a separate flow dataset defines
copyright: ['opt4ROkqig']
licenseType: Free of charge for all users and uses

## General comment
Through experiments, the relevant data of the sludge pyrolysis treatment process under different working conditions are collected and distributed, and the input and output of materials and energy in each process are quantified, and the environmental pollutant emissions are quantified.

## Technology and included processes
The rated power of the tube furnace in the pyrolysis link is 4 kW, the no-load power is 1.4 kW, nitrogen is introduced for 2~3 minutes before the reaction to ensure an oxygen-free environment, the nitrogen flow rate is 30 ml/min, the heating rate of the tube furnace is 80 °C/min, and the final temperature of pyrolysis is maintained for 10min.

## Technical purpose
The data set represents the municipal sludge treatment and disposal process through pyrolysis at 350℃, focusing on handling wet sludge with a moisture content of 80%. This pyrolysis process is applicable for converting 1 ton of high-moisture sludge into a more stable form for disposal or for generating biochar, syngas, and bio-oil as by-products, which can then be used for various applications such as soil amendment, renewable energy sources, or raw materials in chemical production.

## Reference product
- Sludge: 1000; input; estimated
  The moisture content of 1t of wet sludge is 80%

## Inputs
- Electricity: 1080; calculated
- nitrogen: 5.63; calculated

## Outputs
- carbon monoxide (biogenic): 12.07; calculated
  The original text does not distinguish between biogenic and fossil, and according to experts, it is biogenic here.
- carbon dioxide (biogenic): 6.15; calculated
  (same comment as for carbon monoxide (biogenic))
- Heat treatment oil: 79.18; calculated
- Semi-coke: 100.32; calculated

## Use advice
Please ensure that the dataset for the municipal sludge pyrolysis process is used in accordance with the given functional unit of 1 ton of sludge with a moisture content of 80%. Considerations should include the potential energy recovery and utilization of by-products when assessing the life cycle impacts. Users must account for local regulations and environmental factors that may affect the applicability and impact of the process in various scenarios.

## Review details
Inventory: The internal review was done by several iteration steps concerning raw data validation, raw data documentation, representativity, completeness and consistency of modelling with regard to ISO 14040 and 14044.

## Data sources
- 王久兵. 污泥热解反应机制及其能源化工艺的全生命周期评价研究[D].浙江工业大学,2017.
