# Drilling operations ; Drilling fluid ; Ordinary gas well ; less than or equal to 2 km footage; NESPS2 / 钻井作业 ; 钻井液 ; 普通气井 ; 小于等于2千米进尺 ; 全国第二次污染普查数据

Dataset: ILCD process, Unit process, single operation
Geography: CN
Reference year: 2019
Classification: Reference Parameters / Energy carriers and technologies / Other non-renewable fuels
Generated by: The data was created by the Office of the Second National Pollution Source Census of the Ministry of Ecology and Environment, and the data was organized by the TianGong Plan team for ILCD format / 生态环境部第二次全国污染源普查工作办公室创建数据，天工计划团队常慧敏整理数据为ILCD格式
Owner: Tiangong LCI Data Working Group / 天工LCI数据工作小组
Review: Dependent internal review by Tiangong LCI Data Working Group / 天工LCI数据工作小组
Amounts: no units in this file; such an amount is in the reference unit of its flow, which a separate flow dataset defines
copyright: false
licenseType: Free of charge for all users and uses

## General comment
the Technical of end-of-pipe management technology for pollution chemical oxygen demandis①Filter separation/floating separation + chemical coagulation method，Its Technical efficiency of end-of-pipe management73*①

## Technical purpose
该数据集代表了深度小于等于2千米的普通气井钻井过程中使用的钻井液。它包括用于污染控制的各种尾端处理技术，专门针对化学需氧量和石油相关废物。这些技术适用于工业流程的环境管理部门，特别是石油和天然气行业。示例包括使用物理和化学方法与回注结合、过滤、浮选和混凝方法在环境排放前处理产出物。这些技术的效率也已详细说明，表明了它们在污染控制方面的有效性。

## Reference product
- Drilling Operation: 100; calculated
  源文件中描述为为钻井作业，此处对其进行了匹配工作，将其匹配到LCAflow库里面相最符合的流，污染物指标备注为化学需氧量

## Outputs
All rows: calculated
- chemical oxygen demand: 0
  the Technical of end-of-pipe management technology for pollution chemical oxygen demandis①Physical + chemical + reinjection，Its Technical efficiency of end-of-pipe management100
  污染物指标化学需氧量的末端治理技术是②物理+化学+回注，其效率为100，末端治理设施实际运行率（k值）计算公式为k=污水治理设施运行时间（小时/年）/正常生产时间（小时/年）。原文件中描述污染物类别为废水，污染物指标为化学需氧量，此处对其进行了匹配工作，将其匹配到LCAflow库里面相最符合的流，污染物指标备注为化学需氧量
- chemical oxygen demand: 0
  the Technical of end-of-pipe management technology for pollution chemical oxygen demandis③Physical + reinjection，Its Technical efficiency of end-of-pipe management100
  污染物指标化学需氧量的末端治理技术是③物理+回注，其效率为100，末端治理设施实际运行率（k值）计算公式为k=污水治理设施运行时间（小时/年）/正常生产时间（小时/年）。原文件中描述污染物类别为废水，污染物指标为化学需氧量，此处对其进行了匹配工作，将其匹配到LCAflow库里面相最符合的流，污染物指标备注为化学需氧量
- Petroleum-related waste: 0
  the Technical of end-of-pipe management technology for pollution Petroleum-related wasteis①Physical + chemical + reinjection，Its Technical efficiency of end-of-pipe management100
  污染物指标石油类的末端治理技术是②物理+化学+回注，其效率为100，末端治理设施实际运行率（k值）计算公式为k=污水治理设施运行时间（小时/年）/正常生产时间（小时/年）。原文件中描述污染物类别为废水，污染物指标为石油类，此处对其进行了匹配工作，将其匹配到LCAflow库里面相最符合的流，污染物指标备注为石油类
- Petroleum-related waste: 0
  the Technical of end-of-pipe management technology for pollution Petroleum-related wasteis③Physical + reinjection，Its Technical efficiency of end-of-pipe management100
  污染物指标石油类的末端治理技术是③物理+回注，其效率为100，末端治理设施实际运行率（k值）计算公式为k=污水治理设施运行时间（小时/年）/正常生产时间（小时/年）。原文件中描述污染物类别为废水，污染物指标为石油类，此处对其进行了匹配工作，将其匹配到LCAflow库里面相最符合的流，污染物指标备注为石油类
- Waste water: 54940
  the Technical of end-of-pipe management technology for pollution Waste wateris/
  污染物指标工业废水量的末端治理技术是/，末端治理设施实际运行率（k值）计算公式为/。原文件中描述污染物类别为废水，污染物指标为工业废水量，此处对其进行了匹配工作，将其匹配到LCAflow库里面相最符合的流，污染物指标备注为工业废水量
- Petroleum-related waste: 0.14287
  the Technical of end-of-pipe management technology for pollution Petroleum-related wasteis⑤Hydrocyclone + degassing and oil removal tank + open drain tank discharge②，Its Technical efficiency of end-of-pipe management87*
  污染物指标石油类的末端治理技术是⑤水力旋流器＋脱气除油罐＋开排沉箱排放②，其效率为87*，末端治理设施实际运行率（k值）计算公式为k=污水治理设施运行时间（小时/年）/正常生产时间（小时/年），②该治理技术只见于海上天然气开采。。原文件中描述污染物类别为废水，污染物指标为石油类，此处对其进行了匹配工作，将其匹配到LCAflow库里面相最符合的流，污染物指标备注为石油类
- Petroleum-related waste: 0.16485
  the Technical of end-of-pipe management technology for pollution Petroleum-related wasteis④Compact gas flotation machine + open drain tank discharge②，Its Technical efficiency of end-of-pipe management85*
  污染物指标石油类的末端治理技术是④紧凑式气体浮选机＋开排沉箱排放②，其效率为85*，末端治理设施实际运行率（k值）计算公式为k=污水治理设施运行时间（小时/年）/正常生产时间（小时/年），②该治理技术只见于海上天然气开采。。原文件中描述污染物类别为废水，污染物指标为石油类，此处对其进行了匹配工作，将其匹配到LCAflow库里面相最符合的流，污染物指标备注为石油类
- Petroleum-related waste: 0.28574
  the Technical of end-of-pipe management technology for pollution Petroleum-related wasteis①Filter separation/floating separation + chemical coagulation method，Its Technical efficiency of end-of-pipe management74*
  污染物指标石油类的末端治理技术是①过滤分离/上浮分离+化学混凝法，其效率为74*，末端治理设施实际运行率（k值）计算公式为k=污水治理设施运行时间（小时/年）/正常生产时间（小时/年）。原文件中描述污染物类别为废水，污染物指标为石油类，此处对其进行了匹配工作，将其匹配到LCAflow库里面相最符合的流，污染物指标备注为石油类
- chemical oxygen demand: 65.3008
  the Technical of end-of-pipe management technology for pollution chemical oxygen demandis①Filter separation/floating separation + chemical coagulation method，Its Technical efficiency of end-of-pipe management73*①
  污染物指标化学需氧量的末端治理技术是①过滤分离/上浮分离+化学混凝法，其效率为73*①，末端治理设施实际运行率（k值）计算公式为k=污水治理设施运行时间（小时/年）/正常生产时间（小时/年），①“*”表示该分类下的油田企业，当前资料没有关于使用该工艺的记录，数据为参考其他类型油气田得出。
  ，①“*”表示该分类下的油田企业，当前资料没有关于使用该工艺的记录，数据为参考其他类型油气田得出。。原文件中描述污染物类别为废水，污染物指标为化学需氧量，此处对其进行了匹配工作，将其匹配到LCAflow库里面相最符合的流，污染物指标备注为化学需氧量

## Use advice
This dataset is derived from the Pollution Source Census Report and contains information on pollution emissions and related products. However, it does not include data on energy or chemical consumption, nor does it provide information on waste or co-product generation. When utilizing this dataset, please supplement the missing data based on actual conditions before use
该数据集来源于污染源普查报告，包含污染物排放及相关产品信息，但不包含能源或化学品消耗数据，也不提供废弃物或共生产物产生信息。在使用该数据集时，请根据实际情况补充缺失数据后再使用。

## Review details
Inventory: The internal review was done by several iteration steps concerning raw data validation, raw data documentation, representativity, completeness and consistency of modelling with regard to ISO 14040 and 14044.
清单： 内部审查通过几个迭代步骤完成，涉及原始数据验证、原始数据记录、代表性、完整性、与 ISO 14040 和 14044 有关的建模的一致性。

## Data sources
- 第二次全国污染源普查产排污核算系数手册（试用版）,二级代码11,四级代码1120文件，在完整版文件中第3413页
