# Northeast rice planting ; fertilizer, pesticide production

Dataset: ILCD process, Unit process, single operation
Geography: SY-LN-CN
Reference year: 2016
Valid until: 2017
Classification: Unit processes / Materials production / Agricultural production means
Functional unit: 1t
LCI method principle: Attributional
LCI method approaches: Consequential
Generated by: Haoran Zhang, hrzhang@whu.edu.cn
Owner: Tiangong LCI Data Working Group
Review: Dependent internal review by Tiangong LCI Data Working Group
Amounts: no units in this file; such an amount is in the reference unit of its flow, which a separate flow dataset defines
copyright: false
licenseType: Free of charge for all users and uses

## General comment
Resource consumption and pollution emission in the production and transportation of fertilizers and pesticides

## Technology and included processes
With the production of 1 t of rice as the functional unit, the starting boundary is defined as the mining of ore and fossil energy for the production of chemical fertilizers and pesticides, and the ending boundary is the emission of pollutants in the rice planting stage

## Technical purpose
This dataset represents the production process of rice in Northeast China with a focus on the agricultural inputs. This can be used to gauge the environmental impact of rice cultivation practices, particularly concentrating on the use of chemical fertilizers and pesticides, fuel consumption for agriculture machinery, electricity consumption for production, and water volume for irrigation. It is applicable to environmental studies, modeling of agricultural processes, and optimization of rice production for reduced environmental impact.

## Reference product
- rice: 1000; measured

## Inputs
All rows: measured
- Hard coal, at consumer EU-27: 106.82
- Heavy fuel oil (1.0 wt.% S): 0.67
- Diesel: 2.25
- Natural gas, at consumer EU-27: 12.38
- Electricity: 239.256
- water: 29.3

## Outputs
All rows: measured
- carbon monoxide (fossil): 0.31
- carbon dioxide (fossil),carbon dioxide (fossil): 155.95
- nitrous oxide: 3.4
- sulfur dioxide: 0.63
- Nitrogen oxides: 0.41
- ammonium: 0.02
- methane (fossil),methane (fossil): 0.31
- phosphorus, total: 0.18
- chemical oxygen demand: 2.54
- ammonia: 0.5
- lead: 0.0001
- arsenic: 0.0001

## Deviations from the LCI method approaches
The stipulated starting boundary is the mining of ores and fossil energy for the production of fertilizers and pesticides. The termination boundary is the emission of pollutants during the rice planting phase.

## Data selection and combination
A total of 62 households were surveyed, with the investigation covering various aspects such as the types and quantities of fertilizers used, types and amounts of pesticides used, machinery fuel consumption, production electricity consumption, and irrigation water volume, among other related information

## Data treatment and extrapolations
The equivalent coefficient method is used to convert similar pollutants into the environmental impact potential of reference objects [22], to assess the environmental impact of rice production."

## Use advice
When using this dataset for Life Cycle Assessment (LCA) of rice production, users should consider the methodological boundaries set within the study. The scope starts from the extraction of minerals and fossil energy used in producing agricultural inputs, such as fertilizers and pesticides, and ends with the emissions related to the rice cultivation stage. When modeling, consider the validity of the equivalent coefficient method for assessing environmental impacts referenced here, and apply it appropriately for consistent and comparable results. Pay attention to the specific factors surveyed such as the types and quantities of materials and energy consumed, updating the data as necessary for your specific use case.

## Review details
Inventory: The internal review was done by several iteration steps concerning raw data validation, raw data documentation, representativity, completeness and consistency of modelling with regard to ISO 14040 and 14044.

## Data sources
- 常俊彦,宋明阳,于晓曼等.沈阳地区水稻生产的生态环境影响研究[J].农业环境科学学报,2018,37(08):1793-1801.
