# Cationic and amphoteric surfactants ; Fatty ammonia, hydrogen peroxide, chloromethane, etc.① ; Chemical synthesis (quaternization) ; All sizes; NESPS2 / 阳离子与两性表面活性剂 ; 脂肪氨、双氧水、氯甲烷等① ; 化学合成（季铵化） ; 所有规模 ; 全国第二次污染普查数据

Dataset: ILCD process, Unit process, single operation
Geography: CN
Reference year: 2019
Classification: Reference Parameters / Materials production / Organic chemicals
Generated by: The data was created by the Office of the Second National Pollution Source Census of the Ministry of Ecology and Environment, and the data was organized by the TianGong Plan team for ILCD format / 生态环境部第二次全国污染源普查工作办公室创建数据，天工计划团队常慧敏整理数据为ILCD格式
Owner: Tiangong LCI Data Working Group / 天工LCI数据工作小组
Review: Dependent internal review by Tiangong LCI Data Working Group / 天工LCI数据工作小组
Amounts: no units in this file; such an amount is in the reference unit of its flow, which a separate flow dataset defines
copyright: false
licenseType: Free of charge for all users and uses

## General comment
the Technical of end-of-pipe management technology for pollution chemical oxygen demandisPhysical + chemical + aerobic biological treatment，Its Technical efficiency of end-of-pipe management95，The formula for calculating the actual operation rate (k-value) of the end-of-pipe treatment facility is k = opreating time of treatment facilities (hours) / normal production time (hours)

## Technical purpose
该数据集描述了化学合成过程，具体是季铵化法，用于生产各种规模的阳离子和两性表面活性剂。这些表面活性剂普遍用于要求特定表面活性属性的个人护理产品、洗涤剂和工业清洁剂中。此外，该过程数据还关系到化工制造设施中处理废水的末端管理技术，以解决污染参数，如化学需氧量、氨氮、与石油相关的废物、有机氮、总磷和挥发性有机化合物。

## Reference product
- Cationics and Amphoteric Surfactants: 1000; calculated
  源文件中描述为为阳离子与两性表面活性剂，此处对其进行了匹配工作，将其匹配到LCAflow库里面相最符合的流，污染物指标备注为工业废水量

## Outputs
All rows: calculated
- phosphorus, total: 5e-5
  the Technical of end-of-pipe management technology for pollution phosphorus, totalisPhysical + chemical + aerobic biological treatment，Its Technical efficiency of end-of-pipe management95
  污染物指标总磷的末端治理技术是物理+化学＋好氧生物处理法，其效率为95，末端治理设施实际运行率（k值）计算公式为k=污水处理设施年耗电量（千瓦时/年）/（污水处理设施的所有耗电设备额定功率（千瓦×污水处理设施年运行时间（小时/年）），①由于表面活性剂生产中使用的原料品种较多，系数表单中列举了几种常用原料，实际生产时并不局限于此。。原文件中描述污染物类别为废水，污染物指标为总磷，此处对其进行了匹配工作，将其匹配到LCAflow库里面相最符合的流，污染物指标备注为总磷
- Waste water: 1000
  the Technical of end-of-pipe management technology for pollution Waste wateris/，The formula for calculating the actual operation rate (k-value) of the end-of-pipe treatment facility is k = opreating time of treatment facilities (hours/year) / normal production time (hours/year)
  污染物指标工业废水量的末端治理技术是/，末端治理设施实际运行率（k值）计算公式为/，①由于表面活性剂生产中使用的原料品种较多，系数表单中列举了几种常用原料，实际生产时并不局限于此。。原文件中描述污染物类别为废水，污染物指标为工业废水量，此处对其进行了匹配工作，将其匹配到LCAflow库里面相最符合的流，污染物指标备注为工业废水量
- Petroleum-related waste: 0.00351
  the Technical of end-of-pipe management technology for pollution Petroleum-related wasteisPhysical + chemical + aerobic biological treatment，Its Technical efficiency of end-of-pipe management73
  污染物指标石油类的末端治理技术是物理+化学＋好氧生物处理法，其效率为73，末端治理设施实际运行率（k值）计算公式为k=污水处理设施年耗电量（千瓦时/年）/（污水处理设施的所有耗电设备额定功率（千瓦×污水处理设施年运行时间（小时/年）），①由于表面活性剂生产中使用的原料品种较多，系数表单中列举了几种常用原料，实际生产时并不局限于此。。原文件中描述污染物类别为废水，污染物指标为石油类，此处对其进行了匹配工作，将其匹配到LCAflow库里面相最符合的流，污染物指标备注为石油类
- Ammonia Nitrogen: 0.0095
  the Technical of end-of-pipe management technology for pollution Ammonia NitrogenisPhysical + chemical + aerobic biological treatment，Its Technical efficiency of end-of-pipe management75，The formula for calculating the actual operation rate (k-value) of the end-of-pipe treatment facility is k = opreating time of treatment facilities (hours) / normal production time (hours)
  污染物指标氨氮的末端治理技术是物理+化学＋好氧生物处理法，其效率为75，末端治理设施实际运行率（k值）计算公式为k=污水处理设施年耗电量（千瓦时/年）/（污水处理设施的所有耗电设备额定功率（千瓦×污水处理设施年运行时间（小时/年）），①由于表面活性剂生产中使用的原料品种较多，系数表单中列举了几种常用原料，实际生产时并不局限于此。。原文件中描述污染物类别为废水，污染物指标为氨氮，此处对其进行了匹配工作，将其匹配到LCAflow库里面相最符合的流，污染物指标备注为氨氮
- Nitrogen, organic bound: 0.0096
  the Technical of end-of-pipe management technology for pollution Nitrogen, organic boundisPhysical + chemical + aerobic biological treatment，Its Technical efficiency of end-of-pipe management76，The formula for calculating the actual operation rate (k-value) of the end-of-pipe treatment facility is k = opreating time of treatment facilities (hours/year) / normal production time (hours/year)
  污染物指标总氮的末端治理技术是物理+化学＋好氧生物处理法，其效率为76，末端治理设施实际运行率（k值）计算公式为k=污水处理设施年耗电量（千瓦时/年）/（污水处理设施的所有耗电设备额定功率（千瓦×污水处理设施年运行时间（小时/年）），①由于表面活性剂生产中使用的原料品种较多，系数表单中列举了几种常用原料，实际生产时并不局限于此。。原文件中描述污染物类别为废水，污染物指标为总氮，此处对其进行了匹配工作，将其匹配到LCAflow库里面相最符合的流，污染物指标备注为总氮
- volatile organic compound: 0.02112
  the Technical of end-of-pipe management technology for pollution volatile organic compoundisSpray tower + activated carbon adsorption，Its Technical efficiency of end-of-pipe management76，The formula for calculating the actual operation rate (k-value) of the end-of-pipe treatment facility is k = opreating time of treatment facilities (hours/year) / normal production time (hours/year)
  污染物指标挥发性有机物的末端治理技术是喷淋塔+活性炭吸附，其效率为76，末端治理设施实际运行率（k值）计算公式为k=1.0，①由于表面活性剂生产中使用的原料品种较多，系数表单中列举了几种常用原料，实际生产时并不局限于此。。原文件中描述污染物类别为废气，污染物指标为挥发性有机物，此处对其进行了匹配工作，将其匹配到LCAflow库里面相最符合的流，污染物指标备注为挥发性有机物
- volatile organic compound: 0.02816
  the Technical of end-of-pipe management technology for pollution volatile organic compoundisDirect recycling，Its Technical efficiency of end-of-pipe management68
  污染物指标挥发性有机物的末端治理技术是直接回收法，其效率为68，末端治理设施实际运行率（k值）计算公式为k=1.0，①由于表面活性剂生产中使用的原料品种较多，系数表单中列举了几种常用原料，实际生产时并不局限于此。。原文件中描述污染物类别为废气，污染物指标为挥发性有机物，此处对其进行了匹配工作，将其匹配到LCAflow库里面相最符合的流，污染物指标备注为挥发性有机物
- chemical oxygen demand: 0.115
  the Technical of end-of-pipe management technology for pollution chemical oxygen demandisPhysical + chemical + aerobic biological treatment，Its Technical efficiency of end-of-pipe management95，The formula for calculating the actual operation rate (k-value) of the end-of-pipe treatment facility is k = opreating time of treatment facilities (hours) / normal production time (hours)
  污染物指标化学需氧量的末端治理技术是物理+化学＋好氧生物处理法，其效率为95，末端治理设施实际运行率（k值）计算公式为k=污水处理设施年耗电量（千瓦时/年）/（污水处理设施的所有耗电设备额定功率（千瓦×污水处理设施年运行时间（小时/年）），①由于表面活性剂生产中使用的原料品种较多，系数表单中列举了几种常用原料，实际生产时并不局限于此。。原文件中描述污染物类别为废水，污染物指标为化学需氧量，此处对其进行了匹配工作，将其匹配到LCAflow库里面相最符合的流，污染物指标备注为化学需氧量

## Use advice
This dataset is derived from the Pollution Source Census Report and contains information on pollution emissions and related products. However, it does not include data on energy or chemical consumption, nor does it provide information on waste or co-product generation. When utilizing this dataset, please supplement the missing data based on actual conditions before use
该数据集来源于污染源普查报告，包含污染物排放及相关产品信息，但不包含能源或化学品消耗数据，也不提供废弃物或共生产物产生信息。在使用该数据集时，请根据实际情况补充缺失数据后再使用。

## Review details
Inventory: The internal review was done by several iteration steps concerning raw data validation, raw data documentation, representativity, completeness and consistency of modelling with regard to ISO 14040 and 14044.
清单： 内部审查通过几个迭代步骤完成，涉及原始数据验证、原始数据记录、代表性、完整性、与 ISO 14040 和 14044 有关的建模的一致性。

## Data sources
- 第二次全国污染源普查产排污核算系数手册（试用版）,二级代码26,四级代码2681文件，在完整版文件中第3009页
