# Aluminum electrolytic capacitor production ; components before assembly ; soaking method ; components before soaking

Dataset: ILCD process, Unit process, single operation
Geography: JS-CN
Reference year: 2020
Classification: Unit processes / Materials production / Metals and semimetals
Generated by: Huimin Chang, huiminchang@tsinghua.edu.cn
Owner: Tiangong LCI Data Working Group
Review: Dependent internal review by Tiangong LCI Data Working Group
Amounts: no units in this file; such an amount is in the reference unit of its flow, which a separate flow dataset defines
copyright: false
licenseType: Free of charge for all users and uses

## General comment
浸泡法生产铝电解电容器（AEC） ; 420V 680uf

## Time period
The investigated manufacturer produced about 1.183 billion AECs of all kinds in 2020.

## Technical purpose
Aluminum electrolytic capacitors (AECs) produced using the soaking method are typically used in electronic devices for filtering, coupling and uncoupling signals, and energy storage. Such capacitors, with a specification of 420V 680uF, are commonly employed in power supplies, inverters, and other high voltage electronic applications.

## Reference product
- elements before assembly (from soak): 3755; measured
  Elements(before assembly) [pcs]

## Inputs
- electricity, high voltage, aluminium industry: 20.25; measured
  Electricity [kWh]
- ethylene glycol: 78.986; measured
  Electrolyte [kg]
- elements before soak (from winding): 3755; measured
  Elements (before soak) [pcs]

## Data selection and combination
The inventory data of capacitor production come from the AECs’ production factory in Jiangsu Province, China. The cut-off criteria of LCI data collection for each process is coverage of at least 95% of the mass and energy of the input and output flows. The inventory data of anode foil production and cathode foil production is obtained based on the analysis of the manufacturing processes and corresponding process parameters. The upstream data (i.e., aluminum ingots, separator paper, transport, electricity, and water) are acquired from the Gabi software (Version: 10.6.1.35). In detail, the profile of Chineses electricity grid from the China Electric Power Yearbook adopts the reference year 2016. The reference year of aluminum ingot production is 2015. The inaccessible data about ammonium citrate, ammonium pentaborate, NH4H2PO4, and HBO3 are estimated based on chemical equations using the existing materials (reactants) in the Gabi software. The use and end-of-life stage inventory data are obtained based on analysis and calculation.

## Use advice
When utilizing the inventory data of AEC production for Life Cycle Assessment, ensure to include all relevant mass and energy inputs and outputs. Coverage must be at least 95% to meet the cut-off criteria for LCI data collection. Appropriate allocation procedures should apply where necessary. The reference years for the input data of the Chinese electricity grid and aluminum ingots are 2016 and 2015, respectively. Due care should be taken when using estimated data for chemicals like ammonium citrate and ammonium pentaborate, ensuring it's aligned with the methodological guidance in the Gabi software. Additionally, this data set should be complemented with specific use phase behaviors and end-of-life scenarios relevant to the AECs in question, following I/O data analysis and calculation.

## Review details
Inventory: The internal review was done by several iteration steps concerning raw data validation, raw data documentation, representativity, completeness and consistency of modelling with regard to ISO 14040 and 14044.

## Data sources
- Zhang, C., Jing, J., Yun, L., Zheng, Y. & Huang, H. A cradle-to-grave life cycle assessment of high-voltage aluminum electrolytic capacitors in China. J. Clean. Prod. 370, (2022).
