# Remediated soil ; Soil in situ remediation ; In situ bioventing

Dataset: ILCD process, Unit process, black box
Geography: CN
Reference year: 2022
Classification: Unit processes / Other Services / Repair and maintenance
Functional unit: Low concentration VOCs polluted soil 110067 m3
Generated by: Yang Xintong, yangxt@caep.org.cn
Owner: Tiangong LCI Data Working Group
Review: Dependent internal review by Tiangong LCI Data Working Group
Amounts: no units in this file; such an amount is in the reference unit of its flow, which a separate flow dataset defines
copyright: false
licenseType: Free of charge for all users and uses

## General comment
Including the production and installation of ventilation shaft pipes, installation and operation of ventilation equipment, including air injection and extraction work

## Time period
Article submission time

## Technical purpose
The industrial process described is used for the in situ remediation of soil contaminated with low concentration Volatile Organic Compounds (VOCs). This process includes the creation and installation of ventilation shafts, as well as the set-up and operation of ventilation equipment necessary for bioventing, which involves injecting and extracting air to facilitate the biodegradation of pollutants in the soil.

## Reference product
- Remediated soil: 110067; measured

## Inputs
- Electricity: 1.728e6; measured
- Barrier layer: 1; measured
- contaminated soil: 110067; measured
- injection well: 1; measured

## Outputs
- Exhaust gas: 1; measured
  文中没有给出具体的废气产生量，因此使用项目为计量单位

## Use advice
When using this data set for Life Cycle Assessment, users should note that the dataset reflects an in situ bioventing process for soil with low concentration VOC contamination. It is essential to ensure that applicability is limited to similar conditions and that transferability of data to other regimes of contamination or different soil treatments is carefully evaluated. Detailed consideration should be given to the technological specifics and geographical relevance of the data, as well as the need to model the potential impacts of the remediation activity including energy consumption, emissions, and changes in soil properties. Additional methodological guidance regarding the treatment of potential by-products and the integration of this process with other land decontamination and land use practices should also be considered.

## Review details
Inventory: The internal review was done by several iteration steps concerning raw data validation, raw data documentation, representativity, completeness and consistency of modelling with regard to ISO 14040 and 14044.

## Data sources
- 刘文晓等.基于修复效果的污染土壤修复工程环境足迹分析[J].环境科学研究 35,2367-2377（2022）.
