# Large yellow croaker adult culture ; Large yellow croaker adult fish ;Cage culture;Only trash fish feeding

Dataset: ILCD process, Unit process, black box
Geography: ND-FJ-CN
Reference year: 2017
Valid until: 2018
Classification: Unit processes / Materials production / Food and renewable raw materials
Functional unit: 1 live-weight ton of large yellow croaker
LCI method principle: Attributional
LCI method approaches: Allocation - mass
Generated by: Kangni Wu, wukangni@xmu.stu.edu.cn
Owner: Tiangong LCI Data Working Group
Review: Dependent internal review by Tiangong LCI Data Working Group
Amounts: no units in this file; such an amount is in the reference unit of its flow, which a separate flow dataset defines
copyright: false
licenseType: Free of charge for all users and uses

## General comment
The system includes energy production (red), feed production (green), the main chain of aquaculture production (blue), and the production of other inputs (purple).

## Geography
The prefecture-level city of Ningde comprises a group of districts and counties, of which Fuding city (A), Xiapu County (B), Fu’an city (C), and Jiaocheng district (D) are next to the sea and were included in our assessment. A total of 321 households were randomly sampled in the area in August 2017 and January 2018, and we analyzed the data from 292 households that had mariculture production during 2016.

## Time period
The literature did not specify the sampling time. The researchers conducted household interviews in August 2017 and January 2018 in the coastal areas of Ningde City

## Technology and included processes
Large yellow croaker commercial fish cultivation technology, a single cage area of more than 60 m2, net depth of 6 m ~ 10 m, low tide cage bottom from the seabed more than 2 m. The mesh size is 15 mm ~ 50 mm. Fish species are released during neaps. The stocking density of 50 g/ tail fish is 100 tail /m3, and the stocking density is reduced with the increase of fish size, and the stocking density is 20 tail /m3 when the size is 500 g/ tail. Feed with fresh bait.

## Technical purpose
This dataset represents the process data for the culture of adult large yellow croakers in marine cages, where exclusively trash fish is used for feeding. It is applicable for assessments of mariculture practices within the aquaculture industry, specifically focusing on cage-grown large yellow croaker, which is a significant species in Chinese fisheries. The data set is relevant for studying the environmental impacts of large-scale aquaculture operations and their reliance on fish-based feed.

## Model description
The literature refers to the ecoinvent database (v.3.5). In order to account for the variability of the studied system, Monte Carlo simulations were performed in R software (v.3.3.2) to model the correlation between unit process variables in LCA using copula function, which solved the correlation between process variables.Monte Carlo simulations were used in R software, with each cell process represented by a set of input parameters, a correlation matrix of geographical location and growth stages, 2000 iterations were used in the simulation, and the variability of the cell process due to inherent uncertainty, dispersion and unrepresentativeness was considered. Inherent uncertainty is included by assuming a coefficient of variation of 5%, spreads are calculated from primary and secondary data, and a pedigree approach is used to address unrepresentativeness. Dependencies between process chains are included by using dependency sampling in each iteration, as well as dependencies between processes

## Reference product
- Large Yellow Croaker: 1000; measured
  The data comes from the average of 18 households in the actual survey

## Inputs
- Big juveniles of Large Yellow Croake: 3.5; measured
  The data comes from the average of 18 households in the actual survey
- Fuel: 33.6; measured
  The data comes from the average of 18 households in the actual survey
- trash fish: 4197.9; measured
  The data comes from the average of 18 households in the actual survey
- Chemicals (unspecified): 0.4; measured
  The data comes from the average of 18 households in the actual survey

## Deviations from the LCI method approaches
The allocation method used throughout the data analysis process is quality allocation, following the guidelines recommended by the British Standards Institution

## Data selection and combination
The data comes from the average of actual survey data

## Data treatment and extrapolations
Literature researchers constructed a life cycle inventory of mariculture production from both survey data and scientific literature. Primary and auxiliary data are collected for the growth stage to simulate other processes such as seed and juvenile production.

## Sampling procedure
In Ningde City, Fujian Province, China, 115 large yellow croaker farming households were investigated, of which 18 households were used in the model calculation of this data

## Use advice
When utilizing this data set for environmental impact assessments or life cycle assessments, ensure that the scope of your study includes the specific geographical regions of Ningde where the data was collected (specifically Fuding city, Xiapu County, Fu’an city, and Jiaocheng district). Pay special attention to the system boundaries, which include energy production, feed production, main aquaculture production chain, and production of other inputs, color-coded for organizational purposes within the dataset. Methodological considerations should also include the black-box unit process approach based on the household data collected in the specified period of 2016.

## Review details
Inventory: The internal review was done by several iteration steps concerning raw data validation, raw data documentation, representativity, completeness and consistency of modelling with regard to ISO 14040 and 14044.

## Data sources
- Marín, T. et al. Resource Use in Mariculture: A Case Study in Southeastern China. Sustainability 11, (2019).
