# Electricity production ; Thermal power ; Ningxia

Dataset: ILCD process, Unit process, single operation
Geography: NX-CN
Reference year: 2019
Classification: Unit processes / Energy carriers and technologies / Electricity
Generated by: Ruoxi Xiong, xiongrx0126@163.com
Owner: Tiangong LCI Data Working Group
Review: Dependent internal review by Tiangong LCI Data Working Group
Amounts: no units in this file; such an amount is in the reference unit of its flow, which a separate flow dataset defines
copyright: false
licenseType: Free of charge for all users and uses

## General comment
Thermal power generation includes seventeen fossil fuels such as raw coal, washed coal, oil and natural gas. The process only considers the direct power generation process, not the upstream raw material extraction and processing and the downstream power consumption

## Time period
Calculated based on data from the 2019 Energy Statistics Yearbook

## Technical purpose
The thermal power generation process described is intended for the production of electricity using a variety of fossil fuels such as raw coal, washed coal, oil, and natural gas. This electricity is generated within the Ningxia Hui Autonomous Region and could be utilized for various commercial, industrial, and residential purposes. The data set represents the direct generation of electricity without considering the life cycle stages of raw material extraction, processing, and downstream consumption.

## Reference product
- electricity for thermal power: 3.6; calculated

## Inputs
All rows: calculated
- Raw coal: 0.504562
- Other Washed Coal: 0.00371982
- Gangue, in ground: 0.00568364
- Coke oven gas: 0.000558
- blast furnace gas: 0.021246
- Diesel: 1.738e-5
- fuel oil, unspecified: 5.79e-6
- natural gas: 0.002621
- Natural gas, liquefied: 2.17e-6

## Outputs
- carbon dioxide (fossil): 0.95923; calculated
- sulfur dioxide: 0.000165855; calculated
- Nitrogen oxides: 0.000261863; calculated
- particles (> PM10): 3.1855e-5; calculated

## Data treatment and extrapolations
For the accounting method, please refer to the "Enterprise Greenhouse Gas Emissions Accounting Methods and Reporting Guidelines for Power Generation Facilities". Different forms of power generation and fuel consumption come from Chapter 3 (Energy Production) and Chapter 6 (Regional Energy Balance Sheet) in the "China Energy Statistical Yearbook 2020". The fuel parameters such as low calorific value and carbon content per unit calorific value used to calculate the carbon dioxide emission factor come from the "2019 China Regional Power Grid Carbon Dioxide Baseline Emission Factor Calculation Instructions OM" and the "Enterprise Greenhouse Gas Emission Accounting Method and Reporting Guide for Power Generation Facilities" 》

## Use advice
When using this data set, take into account that it solely reflects the direct power generation phase in the thermal power industry. It excludes upstream processes like extraction and processing of raw materials, as well as the downstream electricity consumption. The accounting methods are based on the 'Enterprise Greenhouse Gas Emissions Accounting Methods and Reporting Guidelines for Power Generation Facilities' and the 'China Energy Statistical Yearbook 2020'. For emissions calculations, refer to the specified guides for details regarding low calorific value and carbon content used in determining carbon dioxide emissions factors.

## Review details
Inventory: The internal review was done by several iteration steps concerning raw data validation, raw data documentation, representativity, completeness and consistency of modelling with regard to ISO 14040 and 14044.

## Data sources
- 熊若熙. 中国电力生产和消费二氧化碳与污染物排放因子核算. (清华大学, 2023).
