# Municipal Sewage Treatment ; Sewage ; AAO+MBR Treatment Process (Underground)

Dataset: ILCD process, Unit process, single operation
Geography: GZ-GD-CN
Classification: Unit processes / End-of-life treatment / Wastewater treatment
Generated by: HUANG Runyao, runyaoh@163.com
Owner: Tiangong LCI Data Working Group
Review: Dependent internal review by Tiangong LCI Data Working Group
Amounts: no units in this file; such an amount is in the reference unit of its flow, which a separate flow dataset defines
copyright: ['opt4ROkqig']
licenseType: Free of charge for all users and uses

## General comment
In municipal wastewater treatment, the underground AAO+MBR treatment process is an advanced sewage treatment technology. This process first utilizes AAO (Anaerobic-Anoxic-Oxic) system for biological degradation and ammonia nitrogen removal, followed by membrane filtration in MBR (Membrane Bioreactor) to thoroughly remove suspended solids and microorganisms. In the AAO process, wastewater comes into contact with biological membranes under aerobic conditions, where microorganisms degrade organic matter while oxidizing ammonia nitrogen. The MBR system utilizes microfiltration membranes to separate water from sludge, achieving efficient solid-liquid separation and microbial retention. This underground treatment process has advantages such as small footprint, high treatment efficiency, and stable effluent quality, making it suitable for sewage treatment needs in urban areas with limited underground space.

## Geography
广州市白云区沙太北路以东、犀牛南路以北地段

## Technology and included processes
In municipal wastewater treatment, the underground AAO+MBR treatment process exhibits the following technical characteristics:Subsurface Layout: The AAO+MBR treatment process is typically designed for subsurface layout, utilizing underground space to accommodate biological reactors and membrane modules, reducing surface footprint and protecting equipment from external environmental impacts.Membrane Bioreactor (MBR): This process employs membrane bioreactor (MBR) technology, effectively isolating water and microorganisms through microfiltration membranes to achieve solid-liquid separation. Membrane modules require regular cleaning and maintenance to ensure stable operation and long-term service life.Anaerobic-Anoxic-Oxic (AAO) Treatment Process: The AAO process combines aerobic and anoxic treatment zones to achieve removal of organic matter and nutrients such as nitrogen and phosphorus within a single system. Control of parameters such as oxygen supply, mixing rate, and gas-liquid ratio in aerobic and anoxic zones is necessary to maintain optimal microbial growth conditions and reaction efficiency.Operational Conditions: For the operation of the AAO+MBR treatment process, it is essential to periodically monitor and adjust membrane module flux, transmembrane pressure, and cleaning cycles to ensure stable operation and efficient treatment performance.Related Upstream and Downstream Processes: Upstream processes for this technology include wastewater pretreatment such as screening, grit removal, and sedimentation to remove large particles and settleable solids. Downstream processes may involve membrane module cleaning and maintenance, as well as additional treatment steps such as disinfection or advanced oxidation to ensure the final treated water quality meets discharge standards.

## Technical purpose
The process described refers to an Advanced Oxidation Process (AAO) combined with a Membrane Bioreactor (MBR) used for underground water treatment. This unit process is located in the area to the east of Shatai North Road and to the north of Xiniu South Road in Baiyun District, Guangzhou city. It is specialized for the treatment of municipal or industrial wastewater by effectively removing organic pollutants and pathogens, making the water suitable for reuse or safe release into the environment.

## Reference product
- Wastewater: 0.1; input; measured

## Inputs
All rows: measured
- Secondary Steel Making Slag: 3.888e6
- aerated concrete block: 44110
- Compost: 17846
- Electricity: 2.9592e7, 1.89e7 (2 entries)
- chemical oxygen demand: 0.00027
- biological oxygen demand: 0.00016
- nitrogen, total (excluding N2): 3.5e-5
- ammonia: 3e-5
- Phosphorus: 4.5e-6
- Suspended solids, unspecified,Suspended solids, unspecified,Suspended solids, unspecified: 0.00022
- primary energy from geothermics: 2.304
- sodium hypochlorite: 41.7
- Poly Aluminum Chloride，PAC: 2320
- Gasoline (regular): 735

## Outputs
All rows: measured
- chemical oxygen demand: 2e-5
- nitrogen trifluoride: 5e-6
- nitrogen monoxide: 1.17e-5
- nitrogen, total (excluding N2): 3.2e-7
- Phosphorus: 3e-7
- carbon dioxide (biogenic): 5e-7
  The original text does not provide information on biogenic and fossil sources. According to experts, it is classified as fossil.
- Sludge: 56260
- municipal solid waste deposition: 5.97e7
- steel rebar: 1.477e6

## Use advice
When utilizing the process data for Life Cycle Assessment, it is important to ensure that the boundary conditions match the intended application. For this specific underground AAO+MBR treatment process, users should take into account the geographic location and the characteristics of the wastewater treated. It's crucial to consider specific regional regulations, technology scale, and operational parameters for consistency in environmental impact assessment. Additionally, potential waste sludge treatment and energy consumption should be accounted for in the assessment to ensure a comprehensive analysis.

## Review details
Inventory: The internal review was done by several iteration steps concerning raw data validation, raw data documentation, representativity, completeness and consistency of modelling with regard to ISO 14040 and 14044.

## Data sources
- 郝晓地,于文波,王向阳等.地下式污水处理厂全生命周期综合效益评价[J].中国给水排水,2021,37(07):1-10.DOI:10.19853/j.zgjsps.1000-4602.2021.07.001.
