# Wet steaming cotton fabric dyeing and finishing ; printing and dyeing cotton fabric ; preshrinking

Dataset: ILCD process, Unit process, single operation
Geography: SZ-JS-CN
Reference year: 2012
Classification: Unit processes / Energy carriers and technologies / Heat and steam
Generated by: Yingfan Duan, 1300925579@qq.com
Owner: Tiangong LCI Data Working Group
Review: Dependent internal review by Tiangong LCI Data Working Group
Amounts: no units in this file; such an amount is in the reference unit of its flow, which a separate flow dataset defines
copyright: false
licenseType: Free of charge for all users and uses

## General comment
"Pre-shrinking is a treatment conducted during the fabric preparation process with the aim of inducing a preliminary contraction of the fabric before it is formally made into garments. This process is designed to minimize size changes in the fabric during subsequent washing, ensuring that the final product maintains the intended dimensions. Pre-shrinking typically involves inducing a brief contraction of the fabric using heat or other means during the processing stage to simulate the potential size changes that may occur during washing."

## Geography
The study focuses on a printing and dyeing enterprise in Jiangsu Province, located in Changshu within the Yangtze River Delta Economic Zone.

## Technical purpose
The process described refers to the dyeing and finishing of cotton fabric using a wet steaming method, along with preshrinking. This industrial process is commonly applied within the textile industry, particularly for the production of printed and dyed cotton fabrics that require a specific treatment to ensure color fastness and reduce shrinkage before they are made into final consumer products such as clothing, home textiles, and other cotton-based goods.

## Reference product
- Cotton Fabric: 167; measured

## Inputs
- Electricity: 47.6; measured
- Crude coal: 15.6; calculated
- Cleaned coal: 38.5; calculated
- Fuel Oil: 0.332; calculated
- heavy fuel oil: 0.1; calculated
- Diesel oil: 0.457; calculated
- Coke Oven Gas: 0.609; calculated
- natural gas: 0.0078; calculated
- freshwater: 0.742; measured

## Outputs
- carbon dioxide (fossil): 16.3; calculated
- carbon monoxide (fossil): 0.0393; calculated
- sulfur dioxide: 0.0137; calculated
- methane (fossil): 2.39e-5; calculated
- Nitrogen oxides: 0.0809; calculated
- nitrous oxide: 2.23e-5; measured
- particles (> PM10): 0.13; calculated
- ammonia: 8.6e-6; measured
- non-methane volatile organic compounds: 0.00097; measured
- chemical oxygen demand: 0.000411; calculated
- Suspended solids, unspecified,Suspended solids, unspecified: 0.00261; calculated
- lead: 1.22e-6; calculated
- mercury: 2.57e-8; calculated
- fluorine: 2.31e-7; calculated
- cadmium: 4.53e-8; calculated
- arsenic: 1.05e-6; calculated

## Use advice
When utilizing this data set for Life Cycle Assessment purposes, users should note that it specifically represents the wet steaming process for dyeing and finishing cotton fabric with preshrinking at a textile enterprise located in Changshu, within the Yangtze River Delta economic zone in Jiangsu Province. It is important to consider the geographical and technological context when applying this data to other scenarios. Limitations related to scale, technology level, and regional practices must be taken into account. If modeling for other regions, users should adjust the data to reflect local energy consumption patterns, water usage, chemical inputs, and environmental regulations.

## Review details
Inventory: The internal review was done by several iteration steps concerning raw data validation, raw data documentation, representativity, completeness and consistency of modelling with regard to ISO 14040 and 14044.

## Data sources
- 朱亚楠. 棉布连续轧染工艺生命周期环境影响评价. (南京大学, 2012).
