# Alumina regeneration ; Regenerated aluminum ; Alkali extraction method ; Secondary aluminum slag

Dataset: ILCD process, Unit process, single operation
Geography: CN
Reference year: 2021
Classification: Unit processes / Materials production / Metals and semimetals
Generated by: Jinliang Xie, jinliang.research@gmail.com
Owner: Tiangong LCI Data Working Group
Review: Dependent internal review by Tiangong LCI Data Working Group
Amounts: no units in this file; such an amount is in the reference unit of its flow, which a separate flow dataset defines
copyright: false
licenseType: Free of charge for all users and uses

## General comment
The parameters such as temperature and yield of these three processes were based on experimental results. Life cycle inventory data were from the average data of aluminum industries in China and calculation based on material balance. The electricity type in this study was coal based, which is in line with the actual situation of China’s aluminum industry. The metal aluminum in secondary aluminum dross (SAD) can be recovered until 1 wt % is left through grinding and sieving. Chlorides in the solution were recovered through concentration and crystallization. Calcium chloride was used to remove fluoride. Ammonia was absorbed by sulfuric acid and used to produce ammonium sulfate. Sodium hydroxide was used for the deactivation of active aluminum components and the dissolution of alumina at high temperature (using steam). After filtration and dilution, clear sodium aluminate solution is obtained. According to the characteristics of sodium aluminate, the solution can be diluted and induced to precipitate aluminum hydroxide. The remaining alkaline solution was recycled after salt recovery. After calcination, aluminum hydroxide was converted to alumina. The residue from filtration was landfilled. In this scenario, the active aluminum component was completely deactivated. The recovery rate of alumina was around 90%.

## Time period
Literature published September 2021

## Technical purpose
The described process deals with the reclamation of alumina from secondary aluminum dross (SAD) using the alkali extraction method. This reclaimed alumina is used in various applications, such as serving as a raw material for the aluminum smelting industry. The regeneration process is designed to minimize waste and recover valuable materials from aluminum slag, which can be used in the production of new aluminum products.

## Reference product
- Secondary Aluminum Dross: 1000; input; measured
  secondary aluminum dross

## Inputs
All rows: measured
- electricity, high voltage, aluminium industry: 681.516
- sodium hydroxide, without water, in 50% solution state: 54.36
- sulfuric acid: 237.67
- calcium chloride: 43.82
- Water, unspecified natural origin: 772.23
  water
- steam, in chemical industry: 1230

## Outputs
All rows: measured
- Residue from Filtration: 245.81
  residue from filtration
- Ammonia: 0.41
- basic oxygen furnace dust: 0.01
  dust
- aluminium: 45.9
  recycled aluminium
- ammonium sulfate: 320.2
- aluminium oxide, metallurgical: 629.65
  alumina
- carbon dioxide (fossil),carbon dioxide (fossil): 43.11
- sodium chloride, powder: 81.73
  sodium chloride
- potassium chloride: 22.49
- fluorspar: 30.82
  calcium fluoride

## Use advice
When utilizing the dataset for Life Cycle Assessment (LCA), users must take note of the methodological advice provided. The dataset should be used with consideration for the boundary settings, which only include the impacts of SAD recovery in the aluminum life cycle. Users should apply cut-off rules when accounting for material flows and incorporate the data with a cradle-to-grave perspective. It is critical to exclude transportation impacts from the LCA as this is not accounted for within the system boundaries. The dataset is best suited for evaluating the effectiveness of alumina recovery processes and should be used with a clear understanding of the Chinese aluminum industry's reliance on coal-based electricity.

## Review details
Inventory: The internal review was done by several iteration steps concerning raw data validation, raw data documentation, representativity, completeness and consistency of modelling with regard to ISO 14040 and 14044.

## Data sources
- Zhu, X. & Jin, Q. Comparison of Three Emerging Dross Recovery Processes in China’s Aluminum Industry from the Perspective of Life Cycle Assessment. ACS Sustainable Chem. Eng. 9, 6776–6787 (2021).
