# Municipal sludge treatment and disposal;wet sludge moisture content 80%;incineration

Dataset: ILCD process, Unit process, single operation
Geography: HAZ-ZJ-CN
Classification: Unit processes / End-of-life treatment / Waste water treatment
Functional unit: The system boundary is defined as the transport of wet sludge (80% moisture content) to the sludge treatment or disposal point to form a complete process route.
Generated by: Jin Sitian, 2331276@tongji.edu.cn
Owner: Tiangong LCI Data Working Group
Review: Dependent internal review by Tiangong LCI Data Working Group
Amounts: no units in this file; such an amount is in the reference unit of its flow, which a separate flow dataset defines
copyright: ['opt4ROkqig']
licenseType: Free of charge for all users and uses

## General comment
In the whole process route, the floor space, energy consumption, greenhouse gases, and gas pollutant emissions of each link are included in the scope of environmental impact assessment.

## Technology and included processes
Each ton of sludge is separately incinerated and disposed of.

## Technical purpose
This dataset describes the municipal sludge treatment and disposal process, specifically for wet sludge with an 80% moisture content that is transported to a treatment or disposal facility for incineration. This data is relevant for environmental and waste management professionals who are involved with the processing of high-moisture-content municipal waste sludge.

## Reference product
- Sludge: 1000; input; estimated
  Wet sludge (moisture content 80%)

## Inputs
- Diesel: 24.6; measured
  fuel
- Electricity: 50.4; measured

## Outputs
- carbon dioxide (biogenic): 227; measured
  The original text does not distinguish between biogenic and fossil, and according to experts, it is biogenic here.
- 2,3,7,8-tetrachlorodibenzo-p-dioxin: 1.87e-12; missing unimportant
- copper: 0.01004; calculated
- lead: 0.00188; calculated
- zinc: 0.03362; calculated
- chromium: 0.00189; calculated
- nickel: 0.00072; calculated

## Use advice
Users of this dataset should ensure that the system boundary is maintained as defined, which includes the transportation of wet sludge with an 80% moisture content to the treatment or disposal facility. It's important to consider the specific incineration technology when applying this data as it may impact the environmental outcomes. Users should also pay attention to local regulations and standards concerning sludge treatment and the handling of emissions from incineration.

## Review details
Inventory: The internal review was done by several iteration steps concerning raw data validation, raw data documentation, representativity, completeness and consistency of modelling with regard to ISO 14040 and 14044.

## Data sources
- 刘洪涛,郑海霞,陈俊,等. 城镇污水处理厂污泥处理处置工艺生命周期评价[J]. 中国给水排水,2013,29(6):11-13. DOI:10.3969/j.issn.1000-4602.2013.06.003.
