# Municipal sludge treatment and disposal;dry sludge;aerobic composting

Dataset: ILCD process, Unit process, single operation
Geography: CN
Classification: Unit processes / End-of-life treatment / Waste water treatment
Functional unit: The functional unit used for GHGs in this LCA is one dry ton (DT) of sludge.
Generated by: Jin Sitian, 2331276@tongji.edu.cn
Owner: Tiangong LCI Data Working Group
Review: Dependent internal review by Tiangong LCI Data Working Group
Amounts: no units in this file; such an amount is in the reference unit of its flow, which a separate flow dataset defines
copyright: ['opt4ROkqig']
licenseType: Free of charge for all users and uses

## General comment
The main data sources used in our study are as follows: 1) Energy consumption and material inputs are obtained from investigations in Tai Lake Watershed; 2) The energy use emission factor is obtained from our own calculation, IPCC, and the literature.3) The fugitive emissions during landfilling, incineration, and composting are mainly determined by the model given in the other study as well as by the IPCC factors (2006), except for the CH4 emission in landfilling, which is obtained from study.4) Data from theoretical calculations (see Incineration section).

## Geography
Tai Lake Watershed

## Technology and included processes
Dewatered sludge is first composted in an organic fertilizer plant, bought by the local government, and then used for urban green spaces as fertilizer and soil.

## Technical purpose
The data set describes the aerobic composting process of municipal sludge treatment and disposal within the Tai Lake Watershed area. It applies specifically to scenarios where dry sludge is processed into compost, which can be utilized in agricultural applications to improve soil quality and fertility.

## Reference product
- Sludge: 1000; input; estimated
  one dry ton (DT) of sludge

## Inputs
- Electricity: 432; measured
- Diesel: 0.02975; measured

## Use advice
When using this data set, special attention should be given to the context of its application within the Tai Lake Watershed. The single process unit of aerobic composting is represented as per one dry ton (DT) of sludge. This functional unit should be used to calculate GHG emissions consistently across similar life cycle assessments. Factors such as local climate, sludge composition, and composting practices should be considered for accurate impact assessment.

## Review details
Inventory: The internal review was done by several iteration steps concerning raw data validation, raw data documentation, representativity, completeness and consistency of modelling with regard to ISO 14040 and 14044.

## Data sources
- Liu, B., Wei, Q., Zhang, B. & Bi, J. Life cycle GHG emissions of sewage sludge treatment and disposal options in Tai Lake Watershed, China. Science of The Total Environment 447, 361–369 (2013).
