# cement production;cement, ordinary portland cement, 42.5MPa;dry process;mixed solid wastes

Dataset: ILCD process, Unit process, black box
Geography: CN
Reference year: 2004
Classification: Materials production / Other mineralic materials
Generated by: Siqi Yang, ysqsophia@gmail.com
Owner: Tiangong LCI Data Working Group
Review: Dependent internal review by Tiangong LCI Data Working Group
Amounts: no units in this file; such an amount is in the reference unit of its flow, which a separate flow dataset defines
copyright: false
licenseType: Free of charge for all users and uses

## General comment
Typical cement production process. Slag and fly ash replace clay for cement production.

## Technical purpose
This dataset describes the production of ordinary Portland cement with a strength class of 42.5MPa, using a dry process that incorporates mixed solid wastes, specifically slag and fly ash. Slag and fly ash are used as substitutes for clay in the cement production process. The described cement is applicable for general construction purposes including the construction of buildings, bridges, roads, and other infrastructure projects where high strength and durability are required.

## Model description
The study used 1kg of 42.5 grade Portland cement as the functional unit for evaluation. The scope of evaluation is defined as the in-plant production process of cement products and its surrounding environment. Among them, the in-plant production process refers to the entire production process in which raw materials undergo pretreatment, raw meal grinding, calcination, clinker mill, cement homogenization and other processes and finally become cement products. The surrounding environment of the cement production process refers to the input of external resources and energy and the emission of pollutants.

## Reference product
- cement, ordinary portland cement, 42.5MPa: 1000
  1kg42.5 MPa Portland cement

## Inputs
- limestone, crushed, for mill: 1073.7
  Limestone
- gypsum stone (CaSO4-dihydrate): 51.1
  Gupsum
- iron, powder: 28.5
  Iron powder
- ash: 98
  Fly ash
- blast furnace slag: 137.6
  Blast furnace slag
- hard coal: 100.957
  Standard coal. The original data is 0.0938kg standard coal, here converted to hard coal, the conversion formula is 1kg hard coal = 0.929kg standard coal.
- electricity, medium voltage: 347.76
  Electricity

## Outputs
- particles (> PM10): 0.255
  Particulates, with an unspecified particle size, is treated as PM > 10 micrometers in diameter.
- sulfur dioxide: 0.3501
  SO2
- Nitrogen oxides: 1.419
  NOx
- carbon dioxide: 807.3
  CO2

## Use advice
Users of this dataset should consider the inclusion of external resource input and pollutant emissions in their assessment. The dataset is based on a functional unit of 1kg of 42.5 grade Portland cement assessing the in-plant production process and its surrounding environment. Remember to account for the preprocessing of raw materials, raw meal grinding, calcination, clinker milling, and cement homogenization processes. The methodological applicability of using industrial by-products such as slag and fly ash in the input mix should be reflected accordingly.

## Review details
Inventory: The internal review was done by several iteration steps concerning raw data validation, raw data documentation, representativity, completeness and consistency of modelling with regard to ISO 14040 and 14044.

## Data sources
- 朱天乐, 何炜, 曾小岚, 黄新, & 马保国. (2006). 中国水泥生产环境负荷研究. 环境科学, 10, 2135–2138.
