# Xylene Production ; Xylene ; Naphtha Route ; Naphtha

Dataset: ILCD process, Unit process, black box
Geography: CN
Reference year: 2006
Classification: Unit processes / Materials production / Organic chemicals
Functional unit: A functional unit is defined as 1 ton of xylene product
LCI method principle: Attributional
LCI method approaches: Allocation - mass
Generated by: Yanan Ren, renyn15@tsinghua.org.cn
Owner: Tiangong LCI Data Working Group
Review: Dependent internal review by Tiangong LCI Data Working Group
Amounts: no units in this file; such an amount is in the reference unit of its flow, which a separate flow dataset defines
copyright: false
licenseType: Free of charge for all users and uses

## General comment
Aromatics Complex, Arosa Grammar Process

## Geography
On-site research and data collection were carried out on the operation status and environmental load of the p-xylene production process

## Time period
Not mentioned, replaced by the publication time of the document

## Technical purpose
The data set represents the process of p-xylene production through the naphtha route within an aromatics complex. The specific technology used is referred to as the Arosa Grammar Process. The xylene produced is a high-purity chemical mainly utilized in the manufacturing of polyethylene terephthalate (PET), which is a material commonly used in fibers for clothing, containers for liquids and foods, as well as in thermoforming applications. It is also used in the production of terephthalic acid and isophthalic acid, which are precursors to PET and other important industrial polymers.

## Reference product
- xylene: 1; measured

## Inputs
- naphtha: 0.68; measured
- light fuel oil: 0.27; measured
  fuel oil
- Electricity: 0.072; measured
  electricity

## Outputs
All rows: measured
- waste water - untreated: 0.11
  Total wastewater
- Oils, unspecified: 1e-5
  Petro
- chemical oxygen demand: 0.00124
  COD
- sulfur dioxide: 0.0018
  SO2
- nitrous oxide: 0.00413
  NOx
- carbon monoxide (fossil): 0.00363
  CO
- carbon dioxide (fossil): 0.74
  CO2
- particles (> PM10): 0.00189
  soot

## Deviations from the LCI method approaches
Study adopting product quality as allocation principle for inventory data

## Data treatment and extrapolations
Quantification of environmental load between products and by-products using mass allocation method

## Use advice
Users of this data set should note that the environmental load calculations are based on the mass allocation method, which quantifies the environmental burden between the xylene product and any by-products. It is essential to apply the mass allocation method consistently if comparing with other data sets. The allocation principle is based on product quality, hence the environmental load is attributed according to the quality and purity of the xylene produced. When this data is applied within a Life Cycle Assessment framework, it is advised for the data users to include the process description for transparency and consider the implications of the mass allocation method for the scope of their study. The defined functional unit is 1 ton of xylene product, which should be used as a reference point for scaling data in comparative assessments.

## Review details
Inventory: The internal review was done by several iteration steps concerning raw data validation, raw data documentation, representativity, completeness and consistency of modelling with regard to ISO 14040 and 14044.

## Data sources
- 马骕. 涤纶纺织品的生命周期评价. (东华大学, 2007).
