# Pretreatment stage｜wheat straw｜Chopping（no parameters）

Dataset: ILCD process, Unit process, single operation
Geography: CN
Reference year: 2020
Classification: Unit processes / Energy carriers and technologies / Mechanical energy
Functional unit: taking 1 ton of wheat straw as the functional unit
LCI method principle: Consequential
Generated by: Chaoshuo Liu, liucs22@mails.jlu.edu.cn
Owner: Tiangong LCI Data Working Group
Review: Dependent internal review by Tiangong LCI Data Working Group
Amounts: no units in this file; such an amount is in the reference unit of its flow, which a separate flow dataset defines
copyright: false
licenseType: Free of charge for all users and uses

## General comment
The pretreatment stage described involves the chopping of wheat straw to prepare it for subsequent processing steps. This material is typically used in the production of biofuels, bioplastics, and as a raw material in the paper manufacturing industry or biomass energy generation.

## Reference product
- Crop straw: 1000; measured

## Inputs
- Diesel: 0.835; measured

## Outputs
All rows: measured
- nitrous oxide: 1.1e-5
- nitrogen dioxide: 0.028
- hydrocarbons (unspecified): 0.004
- carbon dioxide (fossil): 2.705
  The expert notes that the original text does not differentiate between biogenic and fossil sources of emissions, and in their opinion, the emissions in question are fossil.
- carbon monoxide,carbon monoxide (fossil): 0.016
  (same comment as for carbon dioxide (fossil))

## Use advice
When utilizing the dataset for the pretreatment of wheat straw, ensure that the functional unit of 1 ton is consistently applied across the assessment. This dataset does not provide parameters for the chopping process, indicating assumptions or average values may need to be used. Pay attention to the system boundaries; exclude any downstream processing unless the assessment aims to evaluate a full lifecycle. If the subsequent utilization of the chopped straw involves recycling or energy recovery, these stages should be explicitly modeled with their respective datasets.

## Review details
Inventory: The internal review was done by several iteration steps concerning raw data validation, raw data documentation, representativity, completeness and consistency of modelling with regard to ISO 14040 and 14044.

## Data sources
- Cheng, G., Zhao, Y., Pan, S., Wang, X. & Dong, C. A comparative life cycle analysis of wheat straw utilization modes in China. Energy 194, 116914 (2020).
