# Contaminated Cd agricultural soil remediation;Phytoremediation;Sedum plumbizincicola;Seedling transportation and transplant;Plant seedlings

Dataset: ILCD process, Unit process, black box
Geography: CN
Reference year: 2021
Classification: Unit processes / Other Services / Repair and maintenance
Generated by: Sang Chunhui, sangch@mail.bnu.edu.cn
Owner: Tiangong LCI Data Working Group
Review: Dependent internal review by Tiangong LCI Data Working Group
Amounts: no units in this file; such an amount is in the reference unit of its flow, which a separate flow dataset defines
copyright: false
licenseType: Free of charge for all users and uses

## General comment
Transport Sedum plumbizincicola seedlings used for plant remediation to cadmium contaminated farmland using vehicles.

## Geography
Instead of clarifying specific locations, the paper indicated that contaminated agricultural field was located in Southern China.

## Time period
There is no clear start time for data collection in the literature, and the start time of the validity period is based on the publication time of the literature

## Technology and included processes
50 kg seeds per hectare contaminated soil. The transportation distance from Xiangtan, Hunan province, to the study site about 1050 km, The dosage of the seedling is 495 kg/ha per year.

## Technical purpose
The phytoremediation process described is applied for the remediation of cadmium (Cd) contaminated agricultural soil in Southern China. The specific plant used for remediation is Sedum plumbizincicola, a species known for its capacity to absorb and concentrate heavy metals from the soil. This process involves growing S. plumbizincicola seedlings and then transporting and transplanting them into the contaminated sites for phytoremediation purposes.

## Reference product
- Plant seedlings: 2475
  该处实际填写的是植物的幼苗，即从种子培育得到的幼苗，用于下一步的幼苗移栽

## Inputs
- Sedum plumbizincicola seed: 250
- Diesel oil,diesel oil: 492; measured
- Compound Fertilizer,Compound Fertilizer: 450
- fluazifop-p-butyl: 6.165
- Electricity: 5207.15; measured
- Road Transport,Road Transport: 2598.75; measured

## Outputs
- fluazifop-p-butyl: 0.99

## Data selection and combination
Process inventory data were obtained in accordance with ISO 14040 on LCA.35 Primary data were obtained from site-specific pot experiments, pilot studies, and vendors, which were representative of situations in Southern China. Secondary data were obtained from the Ecoinvent database v2.3, from which processes of the most similar geographic origin and technological factors are selected.

## Use advice
When utilizing this data set for life cycle assessment, users should consider the specific region of application, Southern China. It is important to acknowledge that primary data were acquired from site-specific pot experiments and pilot studies that may not fully represent field conditions. The secondary data were sourced from the Ecoinvent database v2.3; users should ensure the processes selected match the geographical and technological context of their study. Start time for the data validity should coincide with the literature publication date, and the scale of application modeled should reflect the actual 5 hectares study area with the dosages and transport distances provided.

## Review details
Inventory: The internal review was done by several iteration steps concerning raw data validation, raw data documentation, representativity, completeness and consistency of modelling with regard to ISO 14040 and 14044.

## Data sources
- Jin, Y. et al. Integrated Life Cycle Assessment for Sustainable Remediation of Contaminated Agricultural Soil in China. Environ. Sci. Technol. 55, 12032–12042 (2021).
