# Ironmaking accounting link ; Direct reduced iron ; Iron ore, lime coal powder ; Rotary Kiln Method ; All sizes; NESPS2 / 炼铁核算环节 ; 直接还原铁 ; 铁矿，石灰煤粉 ; 回转窑法 ; 所有规模 ; 全国第二次污染普查数据

Dataset: ILCD process, Unit process, single operation
Geography: CN
Reference year: 2019
Classification: Reference Parameters / Materials production / Metals and semimetals
Generated by: The data was created by the Office of the Second National Pollution Source Census of the Ministry of Ecology and Environment, and the data was organized by the TianGong Plan team for ILCD format / 生态环境部第二次全国污染源普查工作办公室创建数据，天工计划团队常慧敏整理数据为ILCD格式
Owner: Tiangong LCI Data Working Group / 天工LCI数据工作小组
Review: Dependent internal review by Tiangong LCI Data Working Group / 天工LCI数据工作小组
Amounts: no units in this file; such an amount is in the reference unit of its flow, which a separate flow dataset defines
copyright: false
licenseType: Free of charge for all users and uses

## General comment
the Technical of end-of-pipe management technology for pollution Exhaust gasis/，Its Technical efficiency of end-of-pipe management0

## Technical purpose
此数据集描述的炼铁过程涉及使用直接还原铁、铁矿石和石灰煤粉的回转窑法，适用于各种规模的操作。所述的末端污染物管理技术用于处理来自该过程的废气和颗粒物（PM2.5 - PM10）。具体技术包括用于颗粒物的静电沉降、袋式过滤器和电袋复合除尘器，以及用于控制二氧化硫的半干法脱硫、石灰石/石膏法、氨法和活性炭（焦碳）方法。用于控制氮氧化物的技术包括烟气循环、活性炭（焦碳）法和选择性催化还原（SCR）。

## Reference product
- diatomite: 1000, 1000 (2 entries); calculated
  源文件中描述为为直接还原铁，此处对其进行了匹配工作，将其匹配到LCAflow库里面相最符合的流，污染物指标备注为工业废气量

## Outputs
All rows: calculated
- particles (PM2.5 - PM10): 0.0042
  the Technical of end-of-pipe management technology for pollution particles (PM2.5 - PM10)isElectric-bag composite precipitator，Its Technical efficiency of end-of-pipe management99.99
  污染物指标颗粒物的末端治理技术是电袋复合式除尘，其效率为99.99，末端治理设施实际运行率（k值）计算公式为k=除尘设备年正常运行小时数（小时）/生产系统年生产运行小时数（小时）。原文件中描述污染物类别为废气，污染物指标为颗粒物，此处对其进行了匹配工作，将其匹配到LCAflow库里面相最符合的流，污染物指标备注为颗粒物
- Nitrogen oxides: 0.01905
  the Technical of end-of-pipe management technology for pollution Nitrogen oxidesisSCR，Its Technical efficiency of end-of-pipe management85
  污染物指标氮氧化物的末端治理技术是SCR，其效率为85，末端治理设施实际运行率（k值）计算公式为k=脱硝设备年正常运行小时数（小时）/生产系统年生产运行小时数（小时）。原文件中描述污染物类别为废气，污染物指标为氮氧化物，此处对其进行了匹配工作，将其匹配到LCAflow库里面相最符合的流，污染物指标备注为氮氧化物
- particles (PM2.5 - PM10): 0.021
  the Technical of end-of-pipe management technology for pollution particles (PM2.5 - PM10)isBag filter，Its Technical efficiency of end-of-pipe management99.95
  污染物指标颗粒物的末端治理技术是布袋除尘，其效率为99.95，末端治理设施实际运行率（k值）计算公式为k=除尘设备年正常运行小时数（小时）/生产系统年生产运行小时数（小时）。原文件中描述污染物类别为废气，污染物指标为颗粒物，此处对其进行了匹配工作，将其匹配到LCAflow库里面相最符合的流，污染物指标备注为颗粒物
- sulfur dioxide: 0.0442
  the Technical of end-of-pipe management technology for pollution sulfur dioxideisAmmonia method，Its Technical efficiency of end-of-pipe management98
  污染物指标二氧化硫的末端治理技术是氨法，其效率为98，末端治理设施实际运行率（k值）计算公式为k=脱硫设备年正常运行小时数（小时）/生产系统年生产运行小时数（小时）。原文件中描述污染物类别为废气，污染物指标为二氧化硫，此处对其进行了匹配工作，将其匹配到LCAflow库里面相最符合的流，污染物指标备注为二氧化硫
- particles (PM2.5 - PM10): 0.063
  the Technical of end-of-pipe management technology for pollution particles (PM2.5 - PM10)isElectrostatic precipitation，Its Technical efficiency of end-of-pipe management99.85
  污染物指标颗粒物的末端治理技术是静电除尘，其效率为99.85，末端治理设施实际运行率（k值）计算公式为k=除尘设备年正常运行小时数（小时）/生产系统年生产运行小时数（小时）。原文件中描述污染物类别为废气，污染物指标为颗粒物，此处对其进行了匹配工作，将其匹配到LCAflow库里面相最符合的流，污染物指标备注为颗粒物
- sulfur dioxide: 0.0663
  the Technical of end-of-pipe management technology for pollution sulfur dioxideisLimestone/lime-gypsum method，Its Technical efficiency of end-of-pipe management97
  污染物指标二氧化硫的末端治理技术是石灰石/石灰-石膏法，其效率为97，末端治理设施实际运行率（k值）计算公式为k=脱硫设备年正常运行小时数（小时）/生产系统年生产运行小时数（小时）。原文件中描述污染物类别为废气，污染物指标为二氧化硫，此处对其进行了匹配工作，将其匹配到LCAflow库里面相最符合的流，污染物指标备注为二氧化硫
- Nitrogen oxides: 0.06985
  the Technical of end-of-pipe management technology for pollution Nitrogen oxidesisActivated carbon (coke) method，Its Technical efficiency of end-of-pipe management45
  污染物指标氮氧化物的末端治理技术是活性炭（焦）法，其效率为45，末端治理设施实际运行率（k值）计算公式为k=脱硝设备年正常运行小时数（小时）/生产系统年生产运行小时数（小时）。原文件中描述污染物类别为废气，污染物指标为氮氧化物，此处对其进行了匹配工作，将其匹配到LCAflow库里面相最符合的流，污染物指标备注为氮氧化物
- Nitrogen oxides: 0.10795
  the Technical of end-of-pipe management technology for pollution Nitrogen oxidesisFlue gas recycling technology，Its Technical efficiency of end-of-pipe management15
  污染物指标氮氧化物的末端治理技术是烟气循环技术，其效率为15，末端治理设施实际运行率（k值）计算公式为k=脱硝设备年正常运行小时数（小时）/生产系统年生产运行小时数（小时）。原文件中描述污染物类别为废气，污染物指标为氮氧化物，此处对其进行了匹配工作，将其匹配到LCAflow库里面相最符合的流，污染物指标备注为氮氧化物
- Nitrogen oxides: 0.127
  the Technical of end-of-pipe management technology for pollution Nitrogen oxidesisNO8 Others
  污染物指标氮氧化物的末端治理技术是N08其他，末端治理设施实际运行率（k值）计算公式为k=脱硝设备年正常运行小时数（小时）/生产系统年生产运行小时数（小时）。原文件中描述污染物类别为废气，污染物指标为氮氧化物，此处对其进行了匹配工作，将其匹配到LCAflow库里面相最符合的流，污染物指标备注为氮氧化物
- sulfur dioxide: 0.221
  the Technical of end-of-pipe management technology for pollution sulfur dioxideisActivated carbon (coke) method，Its Technical efficiency of end-of-pipe management90
  污染物指标二氧化硫的末端治理技术是活性炭（焦）法，其效率为90，末端治理设施实际运行率（k值）计算公式为k=脱硫设备年正常运行小时数（小时）/生产系统年生产运行小时数（小时）。原文件中描述污染物类别为废气，污染物指标为二氧化硫，此处对其进行了匹配工作，将其匹配到LCAflow库里面相最符合的流，污染物指标备注为二氧化硫
- sulfur dioxide: 0.3315
  the Technical of end-of-pipe management technology for pollution sulfur dioxideisSemi-dry desulfurization，Its Technical efficiency of end-of-pipe management85
  污染物指标二氧化硫的末端治理技术是半干法脱硫，其效率为85，末端治理设施实际运行率（k值）计算公式为k=脱硫设备年正常运行小时数（小时）/生产系统年生产运行小时数（小时）。原文件中描述污染物类别为废气，污染物指标为二氧化硫，此处对其进行了匹配工作，将其匹配到LCAflow库里面相最符合的流，污染物指标备注为二氧化硫
- sulfur dioxide: 2.21
  the Technical of end-of-pipe management technology for pollution sulfur dioxideisS12 Others
  污染物指标二氧化硫的末端治理技术是S12其他，末端治理设施实际运行率（k值）计算公式为k=脱硫设备年正常运行小时数（小时）/生产系统年生产运行小时数（小时）。原文件中描述污染物类别为废气，污染物指标为二氧化硫，此处对其进行了匹配工作，将其匹配到LCAflow库里面相最符合的流，污染物指标备注为二氧化硫
- particles (PM2.5 - PM10): 42
  the Technical of end-of-pipe management technology for pollution particles (PM2.5 - PM10)isP15 Others
  污染物指标颗粒物的末端治理技术是P15其他，末端治理设施实际运行率（k值）计算公式为k=除尘设备年正常运行小时数（小时）/生产系统年生产运行小时数（小时）。原文件中描述污染物类别为废气，污染物指标为颗粒物，此处对其进行了匹配工作，将其匹配到LCAflow库里面相最符合的流，污染物指标备注为颗粒物
- Exhaust gas: 4200
  the Technical of end-of-pipe management technology for pollution Exhaust gasis/，Its Technical efficiency of end-of-pipe management0
  污染物指标工业废气量的末端治理技术是/，其效率为0。原文件中描述污染物类别为废气，污染物指标为工业废气量，此处对其进行了匹配工作，将其匹配到LCAflow库里面相最符合的流，污染物指标备注为工业废气量

## Use advice
This dataset is derived from the Pollution Source Census Report and contains information on pollution emissions and related products. However, it does not include data on energy or chemical consumption, nor does it provide information on waste or co-product generation. When utilizing this dataset, please supplement the missing data based on actual conditions before use
该数据集来源于污染源普查报告，包含污染物排放及相关产品信息，但不包含能源或化学品消耗数据，也不提供废弃物或共生产物产生信息。在使用该数据集时，请根据实际情况补充缺失数据后再使用。

## Review details
Inventory: The internal review was done by several iteration steps concerning raw data validation, raw data documentation, representativity, completeness and consistency of modelling with regard to ISO 14040 and 14044.
清单： 内部审查通过几个迭代步骤完成，涉及原始数据验证、原始数据记录、代表性、完整性、与 ISO 14040 和 14044 有关的建模的一致性。

## Data sources
- 第二次全国污染源普查产排污核算系数手册（试用版）,四级代码3110文件，在完整版文件中第4111页
