# Electricity production ; Electricity mix ; Zhejiang

Dataset: ILCD process, Unit process, single operation
Geography: ZJ-CN
Reference year: 2019
Classification: Unit processes / Energy carriers and technologies / Electricity
Generated by: Ruoxi Xiong, xiongrx0126@163.com
Owner: Tiangong LCI Data Working Group
Review: Dependent internal review by Tiangong LCI Data Working Group
Amounts: no units in this file; such an amount is in the reference unit of its flow, which a separate flow dataset defines
copyright: false
licenseType: Free of charge for all users and uses

## General comment
Electricity mix includes thermal, hydro, wind, nuclear and solar generation

## Technical purpose
This dataset represents the mixed electricity generation in Zhejiang province, including various sources such as thermal, hydro, wind, nuclear, and solar power. It is applicable for assessing the environmental impact of electricity consumption in the region, and can be used for a wide variety of applications ranging from residential electricity consumption to industrial power use, where a regional electricity mix is relevant for the assessment.

## Reference product
- Electricity: 3.6; missing unimportant
  [{'text': '能量', 'type': 'text'}]

## Inputs
All rows: missing unimportant
- electricity for thermal power: 2.54409
  [{'text': '能量', 'type': 'text'}]
- electricity from hydroelectric power plant: 0.261432
  [{'text': '能量', 'type': 'text'}]
- electricity for nuclear power: 0.63985
  [{'text': '能量', 'type': 'text'}]
- electricity from wind power: 0.03357
  [{'text': '能量', 'type': 'text'}]
- electricity for solar power: 0.121054
  [{'text': '能量', 'type': 'text'}]

## Use advice
When using this dataset for Life Cycle Assessment, take into account the regional characteristics of the electricity mix, and ensure it reflects the actual consumption patterns for the system being analyzed. Exclude any electricity sources not consistent with Zhejiang's production mix when considering the energy inputs. If the assessment is time-specific, consider seasonal variations in the electricity mix. For detailed results, consult local regulations and updates on the energy production data.

## Review details
Inventory: The internal review was done by several iteration steps concerning raw data validation, raw data documentation, representativity, completeness and consistency of modelling with regard to ISO 14040 and 14044.

## Data sources
- 能源统计年鉴2020
