# Wet sand Production;Coarse and medium sand washing;Water washing

Dataset: ILCD process, Unit process, single operation
Geography: CS-HUN-CN
Reference year: 2020
Classification: Materials production / Non-energetic raw materials
Generated by: Cui hang, Cuihang0716@163.com
Owner: Tiangong LCI Data Working Group
Review: Dependent internal review by Tiangong LCI Data Working Group
Amounts: no units in this file; such an amount is in the reference unit of its flow, which a separate flow dataset defines
copyright: false
licenseType: Free of charge for all users and uses

## General comment
With the sand production wastewater leakage of sand with a particle size of less than 4mm through the sand washer and fine sand recycling machine to obtain 2~3cm of medium sand, by the dewatering screen for the separation of water and sand, and then transported to the finished product yard through the conveyor belt.

## Technical purpose
The described industrial process is used for the production of medium-sized sand (2-3 cm) from wet sand using a sand washer and fine sand recycling machine. Following the production process, a dewatering screen is utilized to separate water from sand before the product is transported via conveyor belt to the finished product yard. This process is relevant in construction and building materials sectors where medium sand is required for concrete production, asphalt mixtures, and other construction-related applications.

## Reference product
- sand: 133333; measured
  Amount of sand

## Inputs
All rows: measured
- Water (fresh water): 85
- electricity mix: 216
  Sand washing machine power consumption
- electricity mix: 158.4
  Dewatering screen power consumption
- electricity mix: 108
  Stone washing machine power consumption
- sand: 133333
  Amount of sand

## Outputs
- water: 65.49; measured

## Use advice
When utilizing this data set for Life Cycle Assessment (LCA), users should ensure that they take into account the specific conditions under which the sand production process occurs. It's important to consider the energy and water consumption, as well as waste generation and wastewater treatment associated with the process. Moreover, if recycling of sand is applicable, it should be considered in the material's life cycle. Users should also verify the technological compatibility of this process with the regional context of the application to ensure accuracy in environmental impact assessment.

## Review details
Inventory: The internal review was done by several iteration steps concerning raw data validation, raw data documentation, representativity, completeness and consistency of modelling with regard to ISO 14040 and 14044.

## Data sources
- 年产 60 万吨机制砂建设项目环评报告
