# LFP recycling

Dataset: ILCD process, Unit process, single operation
Geography: CN
Reference year: 2020
Classification: Unit processes / End-of-life treatment / Material recycling
Functional unit: Inventory data for the recycling of 1 kWh waste LFP battery.
Generated by: huzhikang, hzk2503593129@163.com
Owner: Tiangong LCI Data Working Group
Review: Dependent internal review by Tiangong LCI Data Working Group
Amounts: no units in this file; such an amount is in the reference unit of its flow, which a separate flow dataset defines
copyright: false
licenseType: Free of charge for all users and uses

## General comment
Author's laboratory-level recovery, with inputs and outputs documented for multiple steps, but without a specific recovery process name. A type of LiFePO4 traction battery pack that is used in the Roewe 550 plug-in hybrid electric vehicle produced by SAIC

## Technology and included processes
In general, the authors adopted manual dismantling for the battery pack and module separation. Regarding cells’ disposal, the authors employed the discharging, crushing, and pyrolysis methods. The authors classified the dismantling results (without the internal material of the cells) and used different disposal methods, such as recycling or incineration for the internal material of the cells. After the dismantling and crushing phases, the cells’ internal materials were crushed to a size of 5–10 mm to prepare for the pyrolysis phase. Regarding the safe disposal of cells’ internal materials, the authors conducted the pyrolysis process in a furnace (rated power: 2.5 kW), and the cell scraps were thermally treated at 400 ◦C for 0.5 h per cell. Then, the emission gases (HF, POF3, and PF5) were neutralized by limewater and the pyrolysis solid residue was transported to landfill. The relevant key chemical reaction equations are shown below. Finally, the pyrolysis solid residue without much recycling value is treated at the landfill.

## Technical purpose
The process described is intended for the recovery and recycling of lithium iron phosphate (LFP) batteries. Such recycling processes are crucial for the sustainable management of waste LFP batteries, which are commonly used in electric vehicles, stationary energy storage applications, and electronic devices. The data represents laboratory-level procedures that can serve as a baseline for developing industrial-scale recycling systems for LFP batteries.

## Reference product
- Battery: 150; input
  Waste Battery Pack

## Inputs
- Calcium oxide: 6.22; calculated
- Electricity: 828
- nitrogen: 0.18055; calculated
  Nitrogen gas

## Outputs
- iron: 26.4
  Iron
- aluminium: 12.53
  Aluminum
- copper: 10.59
  Copper
- Printed Wire Board: 0.71
  Printed wire board (PWB)
- Plastic (unspecified),Plastic (unspecified): 26.6
  Plastics
- Dimethyl Carbonate,Dimethyl Carbonate: 5.52; calculated
  Dimethyl carbonate (DC)
- Ethyl methyl carbonate: 4.6; calculated
  Ethyl methyl carbonate (EMC)
- Ethylene carbonate: 5.52; calculated
  Ethylene carbonate (EC)
- Calcium phosphate: 3.78; calculated
  Ca3(PO4)2 (Calcium phosphate)
- Calcium Fluoride: 5.81; calculated
  Calcium fluoride
- Other Solid Waste: 51.3
  Solid Waste

## Data selection and combination
Data were recorded by the authors and calculated by means of formulae.

## Use advice
Data users should be aware that the documented process is conducted at a laboratory scale and might not directly represent industrial-scale applications. When using this data for modeling or scaling up, adjustments may be necessary to account for industrial efficiencies and additional steps not captured at the laboratory level. Users should also consider the technological applicability and ensure any adaptations of the process to specific industrial contexts are scientifically justified and transparently documented.

## Review details
Inventory: The internal review was done by several iteration steps concerning raw data validation, raw data documentation, representativity, completeness and consistency of modelling with regard to ISO 14040 and 14044.

## Data sources
- Zhu,L. & Chen, M. Research on Spent LiFePO4 Electric Vehicle Battery Disposaland Its Life Cycle Inventory Collection in China. INTERNATIONAL JOURNAL OFENVIRONMENTAL RESEARCH AND PUBLIC HEALTH 17, (2020).
