# Roasting and hydrometallurgy of Rare Earth Oxides (REO) Rare Earth Oxides (REO);bastnaesite route;Rare Earth Elements (REE) containing ore

Dataset: ILCD process, Unit process, single operation
Geography: CN
Reference year: 2007
Valid until: 2020
Classification: Unit processes / Energy carriers and technologies / Heat and steam
Functional unit: The study considered 15 different functional units corresponding to different RE metals. The assessment included three main RE production sites in China: REO production in Bayan Obo, Sichuan, and IACs. Primary data were collected for foreground production processes from Chinese and further international scientific literature, industry reports, government and industry surveys. The authors assumed a baseline for aqueous and gaseous emissions using national discharge standards for industry from the Chinese Ministry of
LCI method principle: Attributional
LCI method approaches: Allocation
Generated by: Tao Wang, twang@iue.ac.cn
Owner: Tiangong LCI Data Working Group
Review: Dependent internal review by Tiangong LCI Data Working Group
Amounts: no units in this file; such an amount is in the reference unit of its flow, which a separate flow dataset defines
copyright: false
licenseType: Free of charge for all users and uses

## General comment
The roasting and hydrometallurgy process of rare earth oxides (REO) from bastnaesite route described in this data set is used for the extraction of REEs from Bayan Obo ore in Chinese Southern Provinces, with direct applicability to the rare earth industry. It facilitates the production of REO for various high-tech applications, including magnets, alloys, glass, and electronics.

## Geography
Bayan Obo, Chinese Southern Provinces

## Technology and included processes
Because no primary mining data from Bayan Obo were available, LCI data in the studies (Sprecher, Arshi, Marx, Bailey (Classen et al., 2007)) are based on different data sources either from iron mining or in Althaus from phosphate rock mining. Main inputs are energy and blasting agent

## Reference product
- Rare Earth Oxides: 2.41; input; calculated
  LANGUAGE

## Inputs
- Primary energy: 24.52; calculated
- sulphuric acid: 3.21; calculated
- Hydrochloric acid: 1.51; calculated
- water: 33.7; calculated

## Outputs
- sulfur dioxide: 104.97; calculated
- carbon dioxide (fossil): 372; calculated
  原文未区分bio和fossil，根据专家判断此处为fossil
- hydrogen fluoride: 34.44; calculated

## Deviations from the LCI method approaches
Goal of this chapter is to identify the most important differences and uncertainties of crucial parameters in the LCIs and to link those directly to the affected LCIAs. However, comparability of LCIA results shown in Fig. 4 is limited due to different LCIA methods, as already mentioned in the chapter “methods”. All LCIA results are shown in Tables S1 and S3 (Supplementary material). It should also be mentioned that we calculated Althaus' LCIA data, as he provided only the LCI in the ecoinvent database. For this, we rebuilt Althaus' original process “rare earth oxide production from bastnasite” in the GaBi software and evaluated it with two LCIA methods for comparison (Table S1).

## Use advice
When utilizing this LCA data set, users should map the production process to the specific regulatory context of the Chinese Southern Provinces, including adherence to national discharge standards for industry. Since this data is modeled after iron and phosphate rock mining due to lack of primary data from Bayan Obo mining, users should be cautious and consider the potential differences and uncertainties in crucial parameters. This may involve adjusting inputs and emissions baselines based on actual site-specific mining data, and using consistent LCIA methodologies and methods for proper comparison and evaluation.

## Review details
Inventory: The internal review was done by several iteration steps concerning raw data validation, raw data documentation, representativity, completeness and consistency of modelling with regard to ISO 14040 and 14044.

## Data sources
- Schreiber, A., Marx, J. & Zapp, P. Life Cycle Assessment studies of rare earths production - Findings from a systematic review. Science of The Total Environment 791, 148257 (2021).
