# Roasting of Rare Earth Oxides (REO) Rare earth oxide;Rare earth oxide process;Bayan Obo

Dataset: ILCD process, Unit process, single operation
Geography: NMG-CN
Reference year: 2014
Classification: Unit processes / Materials production / Inorganic chemicals
Functional unit: The scope of the LCA is cradle-to-gate and the functional unit was chosen as 1 kg of REO.
LCI method principle: Attributional
LCI method approaches: Allocation - market value; Allocation - exergetic content
Generated by: Tao Wang, twang@iue.ac.cn
Owner: Tiangong LCI Data Working Group
Review: Dependent internal review by Tiangong LCI Data Working Group
Amounts: no units in this file; such an amount is in the reference unit of its flow, which a separate flow dataset defines
copyright: false
licenseType: Free of charge for all users and uses

## General comment
The data set describes the process chain of Rare Earth Oxide (REO) production for the purpose of obtaining various REOs utilized in a wide range of high-tech industries. These industries may include electronics, where REOs contribute to the fabrication of devices like smartphones, computers, high strength magnets, batteries, and advanced optics. The REO processed at the Bayan Obo mine is used in manufacturing processes where monazite and bastnasite are key materials for refining rare earth elements.

## Geography
Bayan Obo (China)

## Technology and included processes
The process chain for REO production includes mining followed by beneficiation, calcination, extraction, and roasting stages, see Figure 2. The first step in REO production is mining, wherein crude ore is blasted and transported for further refining. Crude ore abstracted from the Bayan Obo mine is composed of both monazite and bastnasite.

## Reference product
- Rare Earth Oxides: 1; calculated

## Inputs
- heat: 43.35; software or database
  Coal
- oxalic acid: 19.89; calculated
  Coke
- oxalic acid: 1.235; calculated
  H2SO4
- oxalic acid: 43.35; calculated
  NaOH

## Deviations from the LCI method approaches
Life cycle data was obtained from the Ecoinvent database, and mass-based-allocation was performed to partition the environmental impacts among crude ore and REO, as well as allocate the environmental impact among light, medium, heavy, and neodymium REOs. Two alternative allocations schemes, (I) market-based and (II) exegetic-based allocation, were considered as a means to partition the environmental impacts among REOs. The results for market- as well as exergetic-based allocation are provided in the Supporting Information. It is important to note that allocation based on market-value is the preferred method of the metals industry.23 When possible, Chinese-specificlifecycledatawas considered in the analysis; otherwise, European life cycle inventory (LCI) databases were used. The LCA results for REO production presented in this study provide a conservative benchmark for the environmental profile of REE. Furthermore, the LCI and LCA results can be extended/applied to evaluate the production of individual REE and REE-based technologies and products.

## Use advice
When utilizing this data for Life Cycle Assessment (LCA), take care to apply the preferred allocation method based on market-value for partitioning the environmental impacts among the different types of REOs, as per the metals industry's customary practices. The results reported should be carefully considered in light of Chinese-specific life cycle data when available to give a more accurate representation of the impacts. In absence of local data, refer to European life cycle inventory (LCI) databases. The lifecycle scope is cradle-to-gate with the functional unit set as 1 kg of REO. The results for both market and exergetic-based allocation are available and should be consulted according to the specific context of the assessment.

## Review details
Inventory: The internal review was done by several iteration steps concerning raw data validation, raw data documentation, representativity, completeness and consistency of modelling with regard to ISO 14040 and 14044.

## Data sources
- Zaimes, G. G., Hubler, B. J., Wang, S. & Khanna, V. Environmental Life Cycle Perspective on Rare Earth Oxide Production. ACS Sustainable Chem. Eng. 3, 237–244 (2015).
