# Soil Remediation;Isotopic Remediation;Bioreactor;Microbial Cultures;Microorganisms Cultured in the Laboratory

Dataset: ILCD process, Unit process, single operation
Geography: IT
Reference year: 2018
Classification: Unit processes / Other Services / Repair and maintenance
Generated by: Wang Ning, wang_ning@caep.org.cn
Owner: Tiangong LCI Data Working Group
Review: Dependent internal review by Tiangong LCI Data Working Group
Amounts: no units in this file; such an amount is in the reference unit of its flow, which a separate flow dataset defines
copyright: false
licenseType: Free of charge for all users and uses

## General comment
Cultivation of microorganisms for soil remediation by biopiles in the laboratory

## Technical purpose
The process described is used for the cultivation of specialized microorganisms in laboratory settings, which are intended for application in biopile soil remediation. Biopile soil remediation is a biotechnological process that serves to detoxify contaminated soil using the unique metabolic properties of particular microorganisms.

## Reference product
- Microorganism: 0.001; measured

## Inputs
- methane,methane: 2; measured
- Electricity: 777.6; measured

## Use advice
When using this data, it is crucial to ensure that the methodological boundary includes all relevant inputs and outputs, such as raw materials and energy consumption during the cultivation of microorganisms. It is advised that the user verify whether the data is representative of the geographical and technological context in which the application is to occur. Attention should be given to ensuring that the cultured microorganisms are suitable for the specific type of soil and contaminants they will be applied to. Appropriate safety and environmental regulations must be followed when handling and applying these cultured microorganisms during soil remediation processes.

## Review details
Inventory: The internal review was done by several iteration steps concerning raw data validation, raw data documentation, representativity, completeness and consistency of modelling with regard to ISO 14040 and 14044.

## Data sources
- D’Imporzano, G. et al. OPTIMIZING BIOREMEDIATION OF HYDROCARBON POLLUTED SOIL BY LIFE CYCLE ASSESSMENT (LCA) APPROACH. Environmental Engineering and Management Journal (2019).
