# Nose-cone manufacture ; Nose-cone of a 1.5 MW wind turbine

Dataset: ILCD process, Unit process, single operation
Geography: NMG-CN
Reference year: 2017
Classification: Unit processes / Materials production / Other materials
Functional unit: The functional unit is 1.5 MW wind turbine
LCI method principle: Attributional
LCI method approaches: Allocation
Generated by: Yunzhi Zhao, ll10088@163.com
Owner: Tiangong LCI Data Working Group
Review: Dependent internal review by Tiangong LCI Data Working Group
Amounts: no units in this file; such an amount is in the reference unit of its flow, which a separate flow dataset defines
copyright: false
licenseType: Free of charge for all users and uses

## General comment
The nose-cone manufactured in this process is designed specifically for use in 1.5 MW wind turbines. This component contributes to the aerodynamic performance and protection of the turbine's internal components. These wind turbines are typically deployed in large-scale wind farms for the generation of renewable energy, as exemplified by the wind farm consisting of 33 domestic 1.5 MW wind turbines located in the northeast of Inner Mongolia.

## Geography
The data regarding the parameters of wind power has been collected from Wang (2012). A wind farm equipped with 33 domestic 1.5 megawatts (MW) wind turbines is regarded as a case study to analyze the environmental impact and its substitution effects. The wind farm is located in the northeast of Inner Mongolia, the province in which most of China’s wind power is installed (Xia and Song, 2017).

## Reference product
- Nacelle nose-cone of wind turbine: 1; estimated

## Inputs
- iron: 3000; calculated
  Steel and iron

## Deviations from the LCI method approaches
The life cycle inventory for wind power is illustrated as follows. The production and manufacturing stage include the production of wind turbines, substations, and cables, which consume a large amount of energy and emit pollutants (Xue et al., 2015).

## Use advice
When using the LCA data set for the manufacturing process of the nose-cone for a 1.5 MW wind turbine, it is crucial to ensure that all assumptions and parameters from the underlying studies are consistent with the scope of your assessment. Be aware that the environmental impacts are specific to the production conditions in Inner Mongolia and that they take into account regional energy mixes and technological practices. If applying the data in a different context, adjustments may be required to reflect local conditions. Attention should be given to changes over time in technological practices and emission factors which may affect the relevance of the data set.

## Review details
Inventory: The internal review was done by several iteration steps concerning raw data validation, raw data documentation, representativity, completeness and consistency of modelling with regard to ISO 14040 and 14044.

## Data sources
- Li, H., Jiang, H.-D., Dong, K.-Y., Wei, Y.-M. & Liao, H. A comparative analysis of the life cycle environmental emissions from wind and coal power: Evidence from China. Journal of Cleaner Production 248, 119192 (2020).
