# Transportation ; Foundation (27×3.6MW+1×5MW) ; Road transportation negligible，but using more complex fleets including anchored vessels, dredger ships, concrete mixing vessels, crane ships, and cable laying vessels, nearly 25 miles.

Dataset: ILCD process, Unit process, single operation
Geography: SH-CN
Reference year: 2009
Classification: Unit processes / Transport services / Water
Functional unit: The functional unit is 1 kWh on-grid electricity provision.
LCI method principle: Consequential
LCI method approaches: Allocation
Generated by: Yunzhi Zhao, ll10088@163.com
Owner: Tiangong LCI Data Working Group
Review: Dependent internal review by Tiangong LCI Data Working Group
Amounts: no units in this file; such an amount is in the reference unit of its flow, which a separate flow dataset defines
copyright: false
licenseType: Free of charge for all users and uses

## General comment
This data set pertains to the transportation and installation phase of an offshore wind farm, specifically the Donghai Bridge Offshore Wind Farm (DBOWF), located near Shanghai, China. It outlines the complex fleet operations involving anchored vessels, dredger ships, concrete mixing vessels, crane ships, and cable laying vessels used for the transportation of wind turbines, foundations, and cables. It also includes the detailed energy and emissions factors for various construction materials and components. This data is applicable in the lifecycle assessment of offshore wind farms, particularly those similar to the DBOWF in terms of size, location, and operational characteristics.

## Geography
The studied wind farm, the Donghai Bridge Offshore Wind Farm (DBOWF), is China's first offshore wind farm within the jurisdiction of Shanghai, as well as the first offshore wind farm outside Europe. The project has two-phases of construction, located on each side of the Donghai bridge (Fig. 1).

## Reference product
- Wind tower foundation: 28; measured
  27 3.6-MW wind turbines and one 5-MW prototype wind turbine.

## Inputs
- Diesel: 989000; calculated
- Energy, geothermal, converted: 6.6e7; calculated

## Outputs
- carbon dioxide: 4.46e6; calculated
- particles (PM2.5): 4700; calculated
- sulfur dioxide: 6900; calculated
- nitrous oxide: 49600; calculated

## Deviations from the LCI method approaches
The present study employed the PLCA modeling approach to calculate the energy and environmental emissions of a typical offshore wind farm in China. The cradle-to-grave process includes four stages, materials and equipment manufacturing, transportation and installation, operation and maintenance, and dismantling and recycling (Fig. 2).

## Data selection and combination
The technical parameters of wind turbines, foundations and cables are obtained from the design documents of the DBOWF (Table 2). The energy and emissions factors (i.e., the energy consumption and environmental emissions of per unit material and component production) are derived from the Ecoinvent 2.2 dataset (Ecoinvent Centre, 2009), and the coefficients of China's practices were preferentially referred. For key materials and equipment, their sea transportation energy is calculated from the transportation load and shipping energy intensity. The facility installation energy and emissions were estimated based on the construction plan. The wind farm's operation and maintenance data, such as the frequency and working time of maintenance, were obtained from site investigations with engineers and technicians. The uncertainties associated with model parameters and input data are illustrated in the sensitivity analysis section of this paper.

## Use advice
Users employing this data set for lifecycle assessment (LCA) should ensure that they incorporate the energy and emission factors as described for an accurate representation of the Chinese offshore wind farm sector. Note that the transportation by road is considered negligible; focus on the sea transportation energy and emissions. The dataset must be contextualized according to Chinese practices as those coefficients were prioritized in the assessment. Ensure the parameters related to operational practices such as the frequency of maintenance and working times are aligned with the specific practices at DBOWF. When assessing the impact, account for the entire cradle-to-grave lifecycle, including manufacturing, installation, operation, maintenance, and recycling. Be aware of the uncertainties in model parameters and input data as discussed in the sensitivity analysis of the study.

## Review details
Inventory: The internal review was done by several iteration steps concerning raw data validation, raw data documentation, representativity, completeness and consistency of modelling with regard to ISO 14040 and 14044.

## Data sources
- Yang, J. et al. The life-cycle energy and environmental emissions of a typical offshore wind farm in China. Journal of Cleaner Production 180, 316–324 (2018).
