# Brick production ; concrete pavement brick ; Cutting process

Dataset: ILCD process, Unit process, single operation
Geography: JNA-SD-CN
Reference year: 2018
Classification: Materials production / Other mineralic materials
Functional unit: The functional unit is the area of 1 m2 brick products.
Generated by: Wang xiangjin, r99rt4@163.com
Owner: Tiangong LCI Data Working Group
Review: Dependent internal review by Tiangong LCI Data Working Group
Amounts: no units in this file; such an amount is in the reference unit of its flow, which a separate flow dataset defines
licenseType: Free of charge for all users and uses

## General comment
This dataset pertains to the production of concrete pavement bricks used for construction of pedestrian sidewalks, public squares, driveways, and other similar applications where concrete paving is applicable. The production involves a cutting process that enables the manufacturing of pavement bricks with precise dimensions. This specific data set can be utilized by manufacturers and researchers involved in the design and construction of urban infrastructure to improve production methods and environmental sustainability.

## Reference product
- green brick: 90; measured
  Thin billet

## Inputs
- Clay Body: 102; measured
- electricity mix: 0.4392; measured

## Outputs
- particles (PM10): 0.000333; measured

## Deviations from the LCI method approaches
ReCiPe midpoint (H) model is applied in this study.

## Data selection and combination
本研究从济南顺德水泥制品有限公司收集了混凝土路面砖和透水砖的生产能耗以及各种原材料、能源投入和废气排放的相关数据。济南顺德水泥制品有限公司 山东省。

## Sampling procedure
Most data of raw materials, energy input and waste discharge were collected from the site investigation of manufacturer. Water reducer is also called water reducing agent, whose chemical constituents is the sodium salt of the sulfonate formaldehyde condensation

## Use advice
Users of this dataset should note the precision of the functional unit in representing the production energy and materials input per square meter of brick product. It is advisable to conduct individualized assessments considering local production characteristics when applying this dataset for comparison or improvement purposes. Sensitivity analysis based on a 5% variation in inputs and outputs should be factored in when assessing the reliability of the data for different key processes. Additionally, one should include considerations of regional environmental impacts and manufacturer-specific practices when utilizing this data in Life Cycle Assessments.

## Review details
Inventory: The internal review was done by several iteration steps concerning raw data validation, raw data documentation, representativity, completeness and consistency of modelling with regard to ISO 14040 and 14044.

## Data sources
- Yuan, X. et al. Environmental and economic impacts assessment of concrete pavement brick and permeable brick production process - A case study in China. Journal of Cleaner Production 171, 198–208 (2018).
