# Toluene soaked laminates;laminates;toluene soak

Dataset: ILCD process, Unit process, single operation
Geography: CN
Classification: Unit processes / Materials production / Organic chemicals
Generated by: Nan Wang, 1209824595@qq.com
Owner: Tiangong LCI Data Working Group
Review: Dependent internal review by Tiangong LCI Data Working Group
Amounts: no units in this file; such an amount is in the reference unit of its flow, which a separate flow dataset defines
copyright: false
licenseType: Free of charge for all users and uses

## General comment
The given data set pertains to the manufacturing process of laminates that are soaked in toluene. This industrial process is applicable in the production of materials where toluene is used for impregnation to enhance certain properties of the laminates, such as adhesion, resistance, or to prepare the material for further processing steps. These materials might be employed in industries ranging from electronics to automotive, where high-performance and precision are critical.

## Reference product
- Laminate,Laminate: 745.833; input; software or database
  PV laminates

## Inputs
- toluene: 63.14; software or database
- water: 173.2; software or database
- Electricity: 204.48; software or database

## Outputs
All rows: software or database
- Glass for recovery (shards): 635
- Backsheet: 33.9
  backsheetback panel
- Multi-Si solar cell,Multi-Si solar cell,Multi-Si solar cell: 24.97
- Medium and low radioactive liquid waste: 236.34
  liquid waste
- Sludge: 18.3
- Electricity: 148.181
- municipal solid waste deposition: 38.92
  solid waste
- Nitrogen oxides: 2
- 1,2-dichloroethane: 30.82
- carbon dioxide: 32.25
- methane: 50.69
- Total Phosphorus (TP): 0.32
  total phosphorous
- Total Nitrogen: 6.6
  total nitrogen

## Use advice
Users of this data set should consider the environmental impacts of toluene usage and ensure that their life cycle assessments account for any emissions resulting from the soak process. It is also essential to consider the end-of-life phase of the laminates, including the implications for recycling, waste treatment, and potential for recovery of materials. Appropriate measures should be taken to model the use phase behavior of the laminates in their specific application context and include any maintenance or operational considerations that might affect the overall environmental footprint.

## Review details
Inventory: The internal review was done by several iteration steps concerning raw data validation, raw data documentation, representativity, completeness and consistency of modelling with regard to ISO 14040 and 14044.

## Data sources
- Li, J. et al. Life cycle analysis of the economic costs and environmental benefits of photovoltaic module waste recycling in China. (2023).
