# Brick production ; Non sintered bricks ; Raw materials processing (crushing, mixing)

Dataset: ILCD process, Unit process, single operation
Geography: MY-SC-CN
Reference year: 2020
Classification: Unit processes / Materials production / Other mineralic materials
Functional unit: 1t WDC were chosen as the functional unit
Generated by: Wang xiangjin, r99rt4@163.com
Owner: Tiangong LCI Data Working Group
Review: Dependent internal review by Tiangong LCI Data Working Group
Amounts: no units in this file; such an amount is in the reference unit of its flow, which a separate flow dataset defines
copyright: false
licenseType: Free of charge for all users and uses

## General comment
Using artificial sand, cement, and water-based drilling chips as raw materials

## Technology and included processes
Involves the preparation of non-fired bricks by adding an appropriate amount of aggregate (i.e., manufactured sand) after the WDC crushing pretreatment. The entire production process includes mixing (time of 2 min), pressing (pressure of 3 MPa; dimension of 240 × 115 × 53 mm), and maintenance steps

## Technical purpose
The non-sintered bricks produced in this industrial process are used in construction projects that require building materials with specific dimensions (240 × 115 × 53 mm) and properties. These bricks are suitable for applications where fired bricks are not necessary or desired, and can be utilized in various types of construction work, such as in the creation of walls, pavements, and other structural elements.

## Reference product
- clay: 1000; input; measured

## Inputs
All rows: measured
- sand: 2310
- Fly ash: 12
- portland cement: 530
- freshwater: 300
- Electricity: 342

## Outputs
- brickbat aggregate: 4152; measured
  Raw materials for bricks
- particles (> PM10): 0.12357; measured

## Deviations from the LCI method approaches
The eFootprint online analysis platform developed by IKE Environmental Technology Co. was used to perform quantitative analysis of the full life cycle process, as part of the LCA

## Data selection and combination
Information on the raw materials, energy inputs and pollutant emission data were obtained from Mianyang Building Materials Manufacturing Co., Ltd.

## Sampling procedure
Besides, 1t WDC were chosen as the functional unit and all the input parameters of raw materials, auxiliary materials, energy consumption, transportation, and direct emissions were calculated in accordance with the functional unit.

## Use advice
When using this LCA dataset, users should note that 1 ton of WDC (Waste Derived Cementitious material) is defined as the functional unit. The cut-off rule has been applied, allowing exclusion of low-value materials weighing less than 1% of the final product, such as fly ash, from the inventory list. This exclusion may affect the comprehensiveness of the results. Users should ensure that this approach aligns with their methodological requirements and that any significant environmental impacts are not overlooked. The data obtained from Mianyang Building Materials Manufacturing Co., Ltd. should be contextually adapted and may require updating if applied in a different geographical or technological setting.

## Review details
Inventory: The internal review was done by several iteration steps concerning raw data validation, raw data documentation, representativity, completeness and consistency of modelling with regard to ISO 14040 and 14044.

## Data sources
- Liu, W. et al. Comparative life cycle assessment of cement, sintered bricks and non-sintered bricks manufacturing using water-based drilling cuttings from shale gas production in the Sichuan Basin, China. J. Environ. Manage. 314, 115135 (2022).
