# Excavation soil ; Soil ex situ remediation ; Thermal desorption ; Excavation and transportion

Dataset: ILCD process, Unit process, black box
Geography: CN
Reference year: 2022
Classification: Unit processes / Other Services / Repair and maintenance
Generated by: Wang Feng, wangfeng@caep.org.cn
Owner: Tiangong LCI Data Working Group
Review: Dependent internal review by Tiangong LCI Data Working Group
Amounts: no units in this file; such an amount is in the reference unit of its flow, which a separate flow dataset defines
copyright: false
licenseType: Free of charge for all users and uses

## General comment
Remediation of 1 cubic metre of contaminated soil by ectopic thermal desorption. Contaminated soil was removed from the contaminated area by a digger and transport to a treatment greenhouse.

## Geography
我国华东区域5 个污染土壤异位热脱附修复工程案例

## Technology and included processes
Contaminated soil is dug out of contaminated areas with a digger and transport to treatment sheds

## Technical purpose
The technical data set describes the use of an excavation process and thermal desorption method for the remediation of contaminated soil. The process is specifically applied to ex situ treatment of soil wherein the soil is excavated from the contaminated site, transported, and subsequently treated in a separate facility or treatment greenhouse designed for thermal desorption. This process is typically employed in environmental engineering projects within the East China region and is used for remediation of small to mid-sized areas of contaminated land, making it suitable for construction, landscaping, or agricultural reuse after treatment.

## Reference product
- Excavated soil,Excavated soil: 1; measured
  基于我国华东区域 5 个污染土壤异位热脱附修复工程案例，得到异位热脱附修复 1 m3 污染土壤的平均能源和材料投入量

## Inputs
- Diesel,Diesel: 0.00011, 0.00013 (2 entries); measured
  基于我国华东区域 5 个污染土壤异位热脱附修复工程案例，得到异位热脱附修复 1 m3 污染土壤的平均能源和材料投入量

## Use advice
Data users should consider this dataset in the context of environmental remediation and waste management scenarios. It should be applied only to scenarios where ex situ thermal desorption is deemed appropriate, given the properties of the contaminant and applicable environmental regulations. The dataset reflects specific technological practices and measures customary in the East China region hence, users should ensure the regional technological applicability when applying these data. Further, users are advised to take into account transportation emissions and energy usage when utilizing this data for life cycle assessment, and to integrate this dataset with other relevant environmental impact data for a comprehensive assessment.

## Review details
Inventory: The internal review was done by several iteration steps concerning raw data validation, raw data documentation, representativity, completeness and consistency of modelling with regard to ISO 14040 and 14044.

## Data sources
- 刘爽,陈盼,宋慧敏等.我国华东地区污染土壤异位热脱附修复碳排放及减排策略[J].环境工程学报,2022,16(08):2663-2671.
