# Methanol ; Coke oven gas ; Catalytic partial oxidation method ; All sizes; NESPS2 / 甲醇 ; 焦炉气 ; 催化部分氧化法 ; 所有规模 ; 全国第二次污染普查数据

Dataset: ILCD process, Unit process, single operation
Geography: CN
Reference year: 2019
Classification: Reference Parameters / Energy carriers and technologies / Energetic raw materials
Generated by: The data was created by the Office of the Second National Pollution Source Census of the Ministry of Ecology and Environment, and the data was organized by the TianGong Plan team for ILCD format / 生态环境部第二次全国污染源普查工作办公室创建数据，天工计划团队常慧敏整理数据为ILCD格式
Owner: Tiangong LCI Data Working Group / 天工LCI数据工作小组
Review: Dependent internal review by Tiangong LCI Data Working Group / 天工LCI数据工作小组
Amounts: no units in this file; such an amount is in the reference unit of its flow, which a separate flow dataset defines
copyright: false
licenseType: Free of charge for all users and uses

## General comment
the Technical of end-of-pipe management technology for pollution Exhaust gasis/，Its Technical efficiency of end-of-pipe management0

## Technical purpose
所提供的数据描述了多种用于处理焦炉气催化部分氧化制备甲醇过程中产生的废水和排放气体的末端管控污染技术。这些技术适用于需要规范化学需氧量（COD）、氨氮、结合氮、总磷和挥发性有机化合物（VOCs）等污染物的场景，以符合环境标准。这些技术通常被工业工厂使用，在进行甲醇生产和严格的污染控制措施中尤其常见。

## Reference product
- Methanol: 1000; calculated
  源文件中描述为为甲醇，此处对其进行了匹配工作，将其匹配到LCAflow库里面相最符合的流，污染物指标备注为工业废水量

## Outputs
All rows: calculated
- volatile organic compound: 0
  the Technical of end-of-pipe management technology for pollution volatile organic compoundisDirect combustion method (remove torch)，Its Technical efficiency of end-of-pipe management100
  污染物指标挥发性有机物（甲醇精馏尾气）的末端治理技术是直接燃烧法（去火炬），其效率为100。原文件中描述污染物类别为废气，污染物指标为挥发性有机物（甲醇精馏尾气），此处对其进行了匹配工作，将其匹配到LCAflow库里面相最符合的流，污染物指标备注为挥发性有机物（甲醇精馏尾气）
- phosphorus, total: 0.00104
  the Technical of end-of-pipe management technology for pollution phosphorus, totalisPhysicochemical treatment + aerobic biological treatment + anaerobic biological treatment，Its Technical efficiency of end-of-pipe management74
  污染物指标总磷的末端治理技术是物理化学处理法+好氧生物处理法+厌氧生物处理法，其效率为74，末端治理设施实际运行率（k值）计算公式为k=处理设施运行时间(小时/年)/正常生产时间(小时/年)。原文件中描述污染物类别为废水，污染物指标为总磷，此处对其进行了匹配工作，将其匹配到LCAflow库里面相最符合的流，污染物指标备注为总磷
- sulfur dioxide: 0.009
  the Technical of end-of-pipe management technology for pollution sulfur dioxideis/，Its Technical efficiency of end-of-pipe management0
  污染物指标二氧化硫的末端治理技术是/，其效率为0。原文件中描述污染物类别为废气，污染物指标为二氧化硫，此处对其进行了匹配工作，将其匹配到LCAflow库里面相最符合的流，污染物指标备注为二氧化硫
- Ammonia Nitrogen: 0.01818
  the Technical of end-of-pipe management technology for pollution Ammonia NitrogenisPhysicochemical treatment + aerobic biological treatment + anaerobic biological treatment，Its Technical efficiency of end-of-pipe management91
  污染物指标氨氮的末端治理技术是物理化学处理法+好氧生物处理法+厌氧生物处理法，其效率为91，末端治理设施实际运行率（k值）计算公式为k=处理设施运行时间(小时/年)/正常生产时间(小时/年)。原文件中描述污染物类别为废水，污染物指标为氨氮，此处对其进行了匹配工作，将其匹配到LCAflow库里面相最符合的流，污染物指标备注为氨氮
- particles (PM2.5 - PM10): 0.05
  the Technical of end-of-pipe management technology for pollution particles (PM2.5 - PM10)is/，Its Technical efficiency of end-of-pipe management0
  污染物指标颗粒物的末端治理技术是/，其效率为0。原文件中描述污染物类别为废气，污染物指标为颗粒物，此处对其进行了匹配工作，将其匹配到LCAflow库里面相最符合的流，污染物指标备注为颗粒物
- Nitrogen, organic bound: 0.06327
  the Technical of end-of-pipe management technology for pollution Nitrogen, organic boundisPhysicochemical treatment + aerobic biological treatment + anaerobic biological treatment，Its Technical efficiency of end-of-pipe management81
  污染物指标总氮的末端治理技术是物理化学处理法+好氧生物处理法+厌氧生物处理法，其效率为81，末端治理设施实际运行率（k值）计算公式为k=处理设施运行时间(小时/年)/正常生产时间(小时/年)。原文件中描述污染物类别为废水，污染物指标为总氮，此处对其进行了匹配工作，将其匹配到LCAflow库里面相最符合的流，污染物指标备注为总氮
- volatile organic compound: 0.0813
  the Technical of end-of-pipe management technology for pollution volatile organic compoundisDirect combustion method (remove heating furnace)，Its Technical efficiency of end-of-pipe management97
  污染物指标挥发性有机物（甲醇精馏尾气）的末端治理技术是直接燃烧法（去加热炉），其效率为97，末端治理设施实际运行率（k值）计算公式为k=处理设施运行时间(小时/年)/正常生产时间(小时/年)。原文件中描述污染物类别为废气，污染物指标为挥发性有机物（甲醇精馏尾气），此处对其进行了匹配工作，将其匹配到LCAflow库里面相最符合的流，污染物指标备注为挥发性有机物（甲醇精馏尾气）
- chemical oxygen demand: 0.12315
  the Technical of end-of-pipe management technology for pollution chemical oxygen demandisPhysicochemical treatment + aerobic biological treatment + anaerobic biological treatment，Its Technical efficiency of end-of-pipe management85
  污染物指标化学需氧量的末端治理技术是物理化学处理法+好氧生物处理法+厌氧生物处理法，其效率为85，末端治理设施实际运行率（k值）计算公式为k=处理设施运行时间(小时/年)/正常生产时间(小时/年)。原文件中描述污染物类别为废水，污染物指标为化学需氧量，此处对其进行了匹配工作，将其匹配到LCAflow库里面相最符合的流，污染物指标备注为化学需氧量
- Nitrogen oxides: 0.331
  the Technical of end-of-pipe management technology for pollution Nitrogen oxidesis/，Its Technical efficiency of end-of-pipe management0
  污染物指标氮氧化物的末端治理技术是/，其效率为0。原文件中描述污染物类别为废气，污染物指标为氮氧化物，此处对其进行了匹配工作，将其匹配到LCAflow库里面相最符合的流，污染物指标备注为氮氧化物
- volatile organic compound: 1.53
  the Technical of end-of-pipe management technology for pollution volatile organic compoundis/，Its Technical efficiency of end-of-pipe management0
  污染物指标挥发性有机物（废水集输）的末端治理技术是/，其效率为0。原文件中描述污染物类别为废气，污染物指标为挥发性有机物（废水集输），此处对其进行了匹配工作，将其匹配到LCAflow库里面相最符合的流，污染物指标备注为挥发性有机物（废水集输）
- Waste water: 2.53
  the Technical of end-of-pipe management technology for pollution Waste wateris/，Its Technical efficiency of end-of-pipe management0
  污染物指标工业废水量的末端治理技术是/，其效率为0。原文件中描述污染物类别为废水，污染物指标为工业废水量，此处对其进行了匹配工作，将其匹配到LCAflow库里面相最符合的流，污染物指标备注为工业废水量
- Exhaust gas: 2540
  the Technical of end-of-pipe management technology for pollution Exhaust gasis/，Its Technical efficiency of end-of-pipe management0
  污染物指标工业废气量的末端治理技术是/，其效率为0。原文件中描述污染物类别为废气，污染物指标为工业废气量，此处对其进行了匹配工作，将其匹配到LCAflow库里面相最符合的流，污染物指标备注为工业废气量

## Use advice
This dataset is derived from the Pollution Source Census Report and contains information on pollution emissions and related products. However, it does not include data on energy or chemical consumption, nor does it provide information on waste or co-product generation. When utilizing this dataset, please supplement the missing data based on actual conditions before use
该数据集来源于污染源普查报告，包含污染物排放及相关产品信息，但不包含能源或化学品消耗数据，也不提供废弃物或共生产物产生信息。在使用该数据集时，请根据实际情况补充缺失数据后再使用。

## Review details
Inventory: The internal review was done by several iteration steps concerning raw data validation, raw data documentation, representativity, completeness and consistency of modelling with regard to ISO 14040 and 14044.
清单： 内部审查通过几个迭代步骤完成，涉及原始数据验证、原始数据记录、代表性、完整性、与 ISO 14040 和 14044 有关的建模的一致性。

## Data sources
- 第二次全国污染源普查产排污核算系数手册（试用版）,二级代码26,四级代码2614文件，在完整版文件中第4111页
