# waste polystyrene recycling; Coke, tar, and gas; the co-coking process; waste polystyrene

Dataset: ILCD process, Unit process, black box
Geography: CN
Reference year: 2010
Classification: Unit processes / End-of-life treatment / Material recycling
Functional unit: one ton of waste polystyrene
Generated by: Xiaoyu Cheng, xiaoyucheng@email.ncu.edu.cn
Owner: Tiangong LCI Data Working Group
Review: Dependent internal review by Tiangong LCI Data Working Group
Amounts: no units in this file; such an amount is in the reference unit of its flow, which a separate flow dataset defines
copyright: false
licenseType: Free of charge for all users and uses

## General comment
The research scope includes three stages: pre-treatment of waste plastic raw materials after entering the factory, preparation of mixed particles, and coking stage.

## Time period
Publication time of literature

## Technology and included processes
The use of coking technology to treat waste plastics is an industrial practical technology that can handle mixed waste plastics on a large scale. This technology is based on the high-temperature distillation technology of existing coke ovens, which converts waste plastics into coke, tar, and gas.

## Technical purpose
The described co-coking process is an industrial application specifically designed to treat mixed waste polystyrene plastics on a large scale. The technology leverages the high-temperature distillation capabilities of existing coke ovens to convert waste polystyrene into valuable by-products: coke, tar, and syngas. This process supports waste management efforts and materials recovery in the plastics industry.

## Reference product
- Polystyrene wastes: 1000; input; measured

## Inputs
- Coal: 49000; measured
- Water for industrial use: 1.7361e6; measured
- Electricity: 8169.12; measured

## Outputs
All rows: measured
- carbon dioxide (fossil): 3507.2
  原文未区分bio和fossil，根据专家判断此处为fossil
- carbon monoxide (fossil): 0.70145
  原文未区分bio和fossil，根据专家判断此处为fossil
- nitrous oxide: 0.2265
- sulfur dioxide: 28.184
- Nitrogen oxides: 12.1381
- hydrogen sulfide: 0.27
- methane (fossil): 9.59795
  原文未区分bio和fossil，根据专家判断此处为fossil
- hydrocarbons (unspecified): 0.24815
- Flue dust: 16.7631
- chemical oxygen demand: 0.70115
- Suspended solids, unspecified,Suspended solids, unspecified: 0.7228
- phenol: 0.00136
- cyanide: 0.00068
- ammonia: 0.136
- Ammonia Nitrogen: 0.00023873
- Waste Residue: 423.183
- waste water - untreated: 4.55

## Use advice
Users of this data set should note that the information pertains to the treatment of waste polystyrene using a co-coking process. The scope of research includes pre-treatment, preparation of mixed particles, and the coking stage. When modeling the environmental impact or material flow, consider the efficiency and emission profiles specific to the existing coke oven technologies. Methodological considerations such as system boundaries, energy consumption, and emissions linked to pre-treatment stages must be factored into the LCA. The dataset is applicable where waste polystyrene management or valorization is part of the industrial process.

## Review details
Inventory: The internal review was done by several iteration steps concerning raw data validation, raw data documentation, representativity, completeness and consistency of modelling with regard to ISO 14040 and 14044.

## Data sources
- 王震, 孙德智 & 高明. 废聚苯乙烯塑料共焦化过程的生命周期评价. 环境工程 102–106 (2010) doi:
