# Reclaimed copper production;Copper (1 t, 99.99%);double side blowing bath smelting technology;Copper concentrate

Dataset: ILCD process, Unit process, single operation
Geography: CN
Reference year: 2018
Classification: Unit processes / Materials production / Metals and semimetals
Functional unit: the production of 1 ton of copper (i.e., refined or reclaimed copper) was selected as the functional unit.
LCI method principle: Attributional
LCI method approaches: Allocation - mass
Generated by: Peng Wang, 2867919560@qq.com
Owner: Tiangong LCI Data Working Group
Review: Dependent internal review by Tiangong LCI Data Working Group
Amounts: no units in this file; such an amount is in the reference unit of its flow, which a separate flow dataset defines
copyright: false
licenseType: Free of charge for all users and uses

## General comment
The reclaimed copper production process utilizing double side blowing bath smelting technology primarily serves the purpose of producing high purity copper from concentrates. Typically, this refined copper, which boasts a purity of 99.99%, finds its applications in the electrical industry for the production of high-quality wiring and electrical components due to its excellent conductivity. It is also widely used in construction, for making roofing and plumbing materials, and in various industrial manufacturing processes where high-grade copper is a prerequisite.

## Geography
two refined and reclaimed copper production sites in China.

## Reference product
- Refined copper: 1000; software or database
  copper

## Inputs
- unspecified: 0.92; measured
  Land occupation
- water: 5070; measured
  Water
- Electricity: 1031.83; software or database
- Oils, unspecified: 76.41; software or database
  Oil
- hard coal,hard coal,hard coal: 201.15; software or database
  Coal
- Chemicals inorganic,Chemicals, inorganic: 0.0889; software or database
  Chemicals inorganic need to be supplemented
- Chemicals organic,Chemicals, organic: 18.29; software or database
  Chemicals organic needs to be supplemented
- natural gas,natural gas,natural gas: 0; software or database
  Natural gas
- Sulfuric acid(98%): 7.3; software or database
  Sulfuric acid needs to be supplemented with resourse

## Outputs
- carbon dioxide (fossil): 331.49; software or database
  原文未区分bio和fossil，根据专家判断此处为fossil
- particles (PM2.5 - PM10): 0.03932; software or database
- sulfur oxides: 0.40038; software or database
  Sulfur dioxide
- nitrous oxide: 0.94684; software or database
- arsenic: 0.00404, 6.51e-6 (2 entries); software or database
  Arsenic
- lead: 0.00022; software or database
  Lead
- copper: 0.00039, 0.00019 (2 entries); software or database
  Copper
- nickel: 8.48e-6, 0.00024 (2 entries); software or database
  Nickel
- sulphuric acid: 0.00021; software or database
  Sulfuric acid
- Phosphorus: 1.54e-5; software or database
- lead-210: 1.65e-5; software or database
  Lead
- ammonium: 0.0002; software or database
  Ammonia
- hazardous waste (unspecified),hazardous waste (unspecified): 4.66; measured
  Hazardous waste

## Deviations from the LCI method approaches
A life cycle impact assessment (LCIA) was conducted at the midpoint level by employing the ReCiPe method, which is one of the most commonly used indicator approaches in the LCA analysis (Goedkoop et al. 2009;Schryveretal.2009).

## Data selection and combination
The LCI data presented in this study were collected from two refined and reclaimed copper production sites in China.

## Data treatment and extrapolations
The LCA was conducted using the SimaPro 8.2 software.

## Use advice
When using the LCI data for the reclaimed copper production, it is essential to adhere strictly to the functional unit defined as the production of 1 ton of copper. The data should not be extrapolated beyond the scope of the two production sites in China from which it was collected. Users should take into consideration the geographical relevance and technological applicability of the double side blowing bath smelting technology to their specific context. Additionally, users should be aware that the data was assessed using the ReCiPe method at the midpoint level. When comparing to other datasets or applying in different LCIA metrics, the difference in methodology and scope must be accounted for to ensure the comparability and validity of the analysis.

## Review details
Inventory: The internal review was done by several iteration steps concerning raw data validation, raw data documentation, representativity, completeness and consistency of modelling with regard to ISO 14040 and 14044.

## Data sources
- Hong, J. et al. Life cycle assessment of copper production: a case study in China. Int J Life Cycle Assess 23, 1814–1824 (2018).
