# Main shaft manufacture ; Main shaft of a 1.5 MW wind turbine

Dataset: ILCD process, Unit process, single operation
Geography: NMG-CN
Reference year: 2017
Classification: Unit processes / Materials production / Metals and semimetals
Functional unit: The functional unit is 1.5 MW wind turbine
LCI method principle: Attributional
LCI method approaches: Allocation
Generated by: Yunzhi Zhao, ll10088@163.com
Owner: Tiangong LCI Data Working Group
Review: Dependent internal review by Tiangong LCI Data Working Group
Amounts: no units in this file; such an amount is in the reference unit of its flow, which a separate flow dataset defines
copyright: false
licenseType: Free of charge for all users and uses

## General comment
The data set represents the manufacturing process of the main shaft for a 1.5 MW wind turbine, designed to be used in wind farms for the generation of renewable energy. This specific component of the wind turbine is crucial for the operation of the rotor, which converts wind energy into mechanical energy. The manufacturing process outlined is intended for use in large-scale wind power projects, particularly those situated in regions with significant wind energy potential, such as the northeastern province of Inner Mongolia, China.

## Geography
The data regarding the parameters of wind power has been collected from Wang (2012). A wind farm equipped with 33 domestic 1.5 megawatts (MW) wind turbines is regarded as a case study to analyze the environmental impact and its substitution effects. The wind farm is located in the northeast of Inner Mongolia, the province in which most of China’s wind power is installed (Xia and Song, 2017).

## Reference product
- Wind turbine main shaft: 1; estimated

## Inputs
- iron: 14000; calculated
  Steel and iron

## Deviations from the LCI method approaches
The life cycle inventory for wind power is illustrated as follows. The production and manufacturing stage include the production of wind turbines, substations, and cables, which consume a large amount of energy and emit pollutants (Xue et al., 2015).

## Use advice
When using this data set for Life Cycle Assessment (LCA) purposes, it is important to consider the specific production and manufacturing phase of the wind turbine's main shaft manufacturing process. Analysts should ensure that they are using this data in conjunction with other relevant LCA data sets that describe the entire life cycle of wind power generation, including raw material extraction, transportation, installation, operation, maintenance, and end-of-life stages. Additionally, the data is based on a case study of a wind farm with specific geographical and climatic conditions, which should be taken into account when extrapolating to other situations. Furthermore, substitution effects, environmental impact assessments, and any specific technological applicability advised by the dataset must be considered for accurate LCA results.

## Review details
Inventory: The internal review was done by several iteration steps concerning raw data validation, raw data documentation, representativity, completeness and consistency of modelling with regard to ISO 14040 and 14044.

## Data sources
- Li, H., Jiang, H.-D., Dong, K.-Y., Wei, Y.-M. & Liao, H. A comparative analysis of the life cycle environmental emissions from wind and coal power: Evidence from China. Journal of Cleaner Production 248, 119192 (2020).
