# Transformer production ; A 35 kW box-type transformer

Dataset: ILCD process, Unit process, single operation
Geography: YL-GX-CN
Reference year: 2012
Classification: Systems / Electrics and electronics
Functional unit: The generation of 1 kW h (kW h) of electricity is adapted as the functional unit in this study, and the corresponding amounts of CO2 emissions and air pollutants (SO2,NOX and PM10)perkWh of electricity are chosen as the indicators for environmental performances, and the monetary value (US$) of per kW h of electricity is chosen as the indicator for cost-effectiveness evaluation.
LCI method principle: Attributional
LCI method approaches: Allocation
Generated by: Yunzhi Zhao, ll10088@163.com
Owner: Tiangong LCI Data Working Group
Review: Dependent internal review by Tiangong LCI Data Working Group
Amounts: no units in this file; such an amount is in the reference unit of its flow, which a separate flow dataset defines
copyright: false
licenseType: Free of charge for all users and uses

## General comment
This data set pertains to the lifecycle of a wind power generation system, which includes a box-type transformer production process for a wind farm. The process is applicable to wind energy infrastructure projects, specifically for the production, installation, operation, maintenance, and decommissioning stages of wind turbines with a focus on environmental and economic performance. The data are crucial for developers like China Huadian Corporation in assessing the lifecycle impact and cost-effectiveness of wind power systems.

## Geography
In this study, the typical wind farm system in Yulin City of Guangxi of Zhuang Autonomous Region China was selected as a case study site. The developer, namely, China Huadian Corporation, is a state-owned enterprise and devotes to develop wind power by providing wind power equipment and related service in China [37].

## Reference product
- Transformer: 24; article inperiodical

## Inputs
- Steel: 11000; article inperiodical
- silicon,silicon: 600; article inperiodical
- copper: 4800; article inperiodical

## Deviations from the LCI method approaches
According to Introduced by the life cycle assessment approach [34,35], firstly the system boundaries boundary of wind energy as well as and thermal power are first identified. Then, methodology on evaluating both environmental and economic benefits is presented so that co-benefits can be quantified followed by the introduction of the methodologies on environmental as well as economic impacts evaluation from the co-benefits perspective.

## Data selection and combination
This wind farm is equipped with 24 wind turbines, with a production capacity of 1.25 MW for each turbine, and t the operation life for each turbine is expected to be 20 years. The life cycle of one wind power system can be divided into five stages, including (1) production, (2) transportation and installation, (3) power generation, (4) maintenance, and (5) end-of-life recycling and disposal. The input of non-renewable energy has been shown in each stage. In this study, raw material, fossil fuel consumption and corresponding emissions have been taken into account of a life cycle process. Meanwhile, cost-effectiveness of a wind farm is considered because the cost plays a very important role in operating a wind farm [38]. Considering the data reliability and availability, the cost data of this wind farm was mainly extracted from a feasibility report of one wind farm (with a designed capacity of the 49.5 MW) in Kang ping County of Liaoning province [39].

## Use advice
When utilizing this dataset for Life Cycle Assessment (LCA), ensure to apply it to the relevant stages of the wind turbine life cycle as described: production, transportation/installation, power generation, maintenance, and end-of-life measures. It is vital to include the consumption of raw materials, fossil fuels, and the corresponding emissions within the entire life cycle. Additionally, consider the economic aspects of the wind farm's operation, as the cost data provided is specific to a wind farm with comparable characteristics. Use the functional unit of electricity generation, along with the set environmental and economic indicators, to assess the overall sustainability and performance of the wind energy system.

## Review details
Inventory: The internal review was done by several iteration steps concerning raw data validation, raw data documentation, representativity, completeness and consistency of modelling with regard to ISO 14040 and 14044.
