# 再生纸生产|新闻纸|化学品生产

Dataset: ILCD process, Unit process, single operation
Geography: CN
Classification: Materials production / Other mineralic materials
LCI method principle: Attributional
Generated by: Yixiang Gao, 22210740040@m.fudan.edu.cn
Review: Dependent internal review by Tiangong LCI Data Working Group
Amounts: no units in this file; such an amount is in the reference unit of its flow, which a separate flow dataset defines
copyright: false

## General comment
依据系统边界划分新闻纸产品为制浆、抄纸、化 学品生产、能源生产、运输、污水处理，搜集各阶段资 源、能源、原料消耗、环境排放原始数据。首先，直接获取实际数据，基于企业调研、厂商提供、采样监测等多元化方式搜集数据。其次，无法调研获取的数据，利用Ecoinvent数据库相关数据代替。

## Geography
在很大程度上补充了我国生命周期评价数据库。

## Outputs
All rows: measured
- carbon dioxide: 124.8
  CO2
- Nitrogen oxides: 0.2
  NOx
- sulfur dioxide: 0.3
  SO2
- particles (PM10): 0.011
  PM10
- chemical oxygen demand: 0.2
  COD
- biological oxygen demand: 0.2
  BOD5
- nitrogen, total (excluding N2): 0.0088
  TN
- nitrate: 0.037
  硝酸根
- phosphate: 0.004
  磷酸根
- total suspended solids, unspecified: 0.063
  TSS

## Deviations from the LCI method approaches
本研究中采用阶段方法，不考虑可回收的固体废弃物（例如，煤渣、聚酯树脂和棉纤维）回收过程或再利用过程对研究目标产生的经济环境影响。

## Review details
Inventory: The internal review was done by several iteration steps concerning raw data validation, raw data documentation, representativity, completeness and consistency of modelling with regard to ISO 14040 and 14044.; Documentation: The review of the documentation was performed by Ecobilan and is in compliance with ISO 14040 and 14044. The data set documentation is correct in view of the appropriateness of the information provided. It includes all relevant information in view of data quality and scope of application of the respective LCI result.

## Data sources
- 许远. 典型再循环纸产品的生命周期影响全评价. 造纸科学与技术 38, 58-61+86 (2019).
