# Scrap Aluminum Extraction ; Scrap Aluminum ; Waste Polyethylene and Scrap Aluminum Mixture

Dataset: ILCD process, Unit process, single operation
Geography: ZJ-CN
Reference year: 2012
Classification: Unit processes / Materials production / Metals and semimetals
Generated by: Ruoxi Xiong, xiongrx0126@163.com
Owner: Tiangong LCI Data Working Group
Review: Dependent internal review by Tiangong LCI Data Working Group
Amounts: no units in this file; such an amount is in the reference unit of its flow, which a separate flow dataset defines
copyright: false
licenseType: Free of charge for all users and uses

## General comment
The process described is used for the separation of polyethylene and aluminum from mixed waste materials. It is applied to recycle scrap aluminum and recover polyethylene from the waste polyethylene and scrap aluminum mixture. This recycled aluminum can then be used in various industries including packaging, construction, and automotive. The recovered polyethylene can be reprocessed into new plastic products.

## Time period
Date of publication

## Reference product
- aluminium scrap, post-consumer: 36; measured
  aluminium

## Inputs
- transport, freight, lorry 7.5-16 metric ton, unregulated: 3.47; measured
  transportation by diesel truck (10 mt)
- electricity, high voltage, aluminium industry: 612; measured
- Diesel oil: 3.43; measured
- formic acid: 39.3; measured

## Outputs
- waste polyethylene, for recycling, unsorted: 196; measured
  polyethylene

## Data selection and combination
The data on consumption and emissions related to the separation of polyethylene and aluminum derived from residue were taken from site investigation of the demonstration project for the separation of polyethylene and aluminum, in Zhejiang Province, China, operated by Hangzhou Fulun Ecology Technology Co., Ltd.

## Use advice
When using this data set, it is important to ensure that it represents the specific technology and region relevant to your study, in this case, Zhejiang Province, China. Users should be aware of any potential changes in the separation technology that could affect the consumption and emission factors. It is recommended to account for technological advances in the separation process when extrapolating data for future scenarios. Moreover, the inclusion of recycling in relevant categories should be consistent with the goal and scope of the LCA study.

## Review details
Inventory: The internal review was done by several iteration steps concerning raw data validation, raw data documentation, representativity, completeness and consistency of modelling with regard to ISO 14040 and 14044.

## Data sources
- Xie, M., Qiao, Q., Sun, Q. & Zhang, L. Life cycle assessment of composite packaging waste management - A Chinese case study on aseptic packaging. Int. J. Life Cycle Assess. 18, 626–635 (2013).
