# Farmland remediation ; In-situ solidification/stabilization ; Remediation implementation ; Chemical application, mixing, and blending

Dataset: ILCD process, Unit process, single operation
Geography: NJ-YN-CN
Reference year: 2023
Classification: Unit processes / Other Services / Repair and maintenance
Generated by: Xiao Meng, xiaomeng@mail
Owner: Tiangong LCI Data Working Group
Review: Dependent internal review by Tiangong LCI Data Working Group
Amounts: no units in this file; such an amount is in the reference unit of its flow, which a separate flow dataset defines
copyright: false
licenseType: Free of charge for all users and uses

## General comment
In the implementation stage of stabilization and restoration, pesticide spraying (for manual transportation and spraying) is carried out on the polluted soil, and a wheeled rotary tiller TH554 is used to apply pesticides to the polluted site. The stabilizing agents used are sepiolite and quicklime.

## Geography
云南省怒江州受铅锌矿污染某耕地土壤 污染修复工程

## Technical purpose
The described industrial process is utilized for farmland remediation through the in-situ application of stabilization agents such as sepiolite and quicklime. This process involves pesticide spraying, mixing and blending to treat soil contaminated by heavy metals, specifically on agricultural land with cadmium (Cd) and lead (Pb) pollutants. The technology is designed for restoration projects aimed at reducing bioavailable Cd and Pb concentrations by over 70%, ensuring that the concentrations of these metals in crops reach acceptable standards.

## Reference product
- contaminated soil: 9.06e6; input; measured
  受污染的农田土壤

## Inputs
All rows: measured
- Diesel: 67354.2
- natural pumice: 172000
  海泡石（pumice）
- quicklime: 68000
  生石灰（quicklime）
- Equipment and Materials Arriving on Site: 240000
  运输到场的药剂
- Equipment and Materials Arriving on Site: 2050
  运输到场的设备

## Outputs
- Soil passivation by sepiolite and quicklime: 9.06e6; measured
  使用海泡石、生石灰钝化后的农田土壤
- Soil Sample: 1000; measured
  运输到场检测的样土，用于后续效果评估

## Use advice
When utilizing this dataset for Life Cycle Assessment (LCA), ensure that the scope of your LCA includes the specific context of heavy metal-contaminated farmland. Account for manual labor involved in transportation and application of stabilization agents. Factor in the use of machinery, such as rotary tillers, in the remediation process. The effectiveness of the remediation should be considered in terms of reduction of bioavailable metal concentrations and compliance of crop metal concentrations with relevant standards. Use this data carefully when generalizing to other sites, as soil properties and contamination levels may vary.

## Review details
Inventory: The internal review was done by several iteration steps concerning raw data validation, raw data documentation, representativity, completeness and consistency of modelling with regard to ISO 14040 and 14044.

## Data sources
- 肖萌 et al. 农田污染钝化修复环境影响定量评估方法与案例分析. 中国环境科学 43, 3571–3581 (2023).
