# Sour gas recovery unit ; Sulfur, sulfuric acid ; Refinery sour gas ; Acid gas recovery ; less than or equal to50000 t/a; NESPS2 / 酸性气回收装置 ; 硫磺、硫酸 ; 炼厂酸性气 ; 酸性气回收 ; 小于等于5万吨/年 ; 全国第二次污染普查数据

Dataset: ILCD process, Unit process, single operation
Geography: CN
Reference year: 2019
Classification: Reference Parameters / Energy carriers and technologies / Other non-renewable fuels
Generated by: The data was created by the Office of the Second National Pollution Source Census of the Ministry of Ecology and Environment, and the data was organized by the TianGong Plan team for ILCD format / 生态环境部第二次全国污染源普查工作办公室创建数据，天工计划团队常慧敏整理数据为ILCD格式
Owner: Tiangong LCI Data Working Group / 天工LCI数据工作小组
Review: Dependent internal review by Tiangong LCI Data Working Group / 天工LCI数据工作小组
Amounts: no units in this file; such an amount is in the reference unit of its flow, which a separate flow dataset defines
copyright: false
licenseType: Free of charge for all users and uses

## General comment
the Technical of end-of-pipe management technology for pollution Nitrogen, organic boundisPhysical treatment + biological treatment，Its Technical efficiency of end-of-pipe management70

## Technical purpose
这个酸性气回收装置旨在处理硫磺和硫酸炼制过程中产生的酸性气体，适用于年处理能力小于或等于5万吨的工业设施。它通常作为污染废水的末端处理技术，通过多种处理类型，以去除废水中的化学需氧量、氨氮、有机结合氮、石油类废物、酚、氰化物和砷等污染物。

## Reference product
- Production residues in life cycle: 1000; calculated
  源文件中描述为为硫磺、硫酸，此处对其进行了匹配工作，将其匹配到LCAflow库里面相最符合的流，污染物指标备注为工业废水量

## Outputs
All rows: calculated
- cyanide: 0
  the Technical of end-of-pipe management technology for pollution cyanideisPhysical treatment + biological treatment + physicochemical treatment (or physical treatment, chemical treatment)，Its Technical efficiency of end-of-pipe management88
  污染物指标氰化物的末端治理技术是物理处理法+生物处理法+物理化学处理法（或物理处理法、化学处理法），其效率为88，末端治理设施实际运行率（k值）计算公式为k=污水治理设施运行时间/正常生产时间。原文件中描述污染物类别为废水，污染物指标为氰化物，此处对其进行了匹配工作，将其匹配到LCAflow库里面相最符合的流，污染物指标备注为氰化物原文描述的产污系数为 未检出。请根据备注自行核算后修改对应的排放量。
- cyanide: 0
  the Technical of end-of-pipe management technology for pollution cyanideisPhysical treatment + biological treatment，Its Technical efficiency of end-of-pipe management79
  污染物指标氰化物的末端治理技术是物理处理法+生物处理法，其效率为79，末端治理设施实际运行率（k值）计算公式为k=污水治理设施运行时间/正常生产时间。原文件中描述污染物类别为废水，污染物指标为氰化物，此处对其进行了匹配工作，将其匹配到LCAflow库里面相最符合的流，污染物指标备注为氰化物原文描述的产污系数为 0。请根据备注自行核算后修改对应的排放量。
- phenol: 7.06e-8
  the Technical of end-of-pipe management technology for pollution phenolisPhysical treatment + biological treatment + physicochemical treatment (or physical treatment, chemical treatment)，Its Technical efficiency of end-of-pipe management99.99
  污染物指标挥发酚的末端治理技术是物理处理法+生物处理法+物理化学处理法（或物理处理法、化学处理法），其效率为99.99，末端治理设施实际运行率（k值）计算公式为k=污水治理设施运行时间/正常生产时间。原文件中描述污染物类别为废水，污染物指标为挥发酚，此处对其进行了匹配工作，将其匹配到LCAflow库里面相最符合的流，污染物指标备注为挥发酚
- phenol: 1.6944e-6
  the Technical of end-of-pipe management technology for pollution phenolisPhysical treatment + biological treatment，Its Technical efficiency of end-of-pipe management99.76
  污染物指标挥发酚的末端治理技术是物理处理法+生物处理法，其效率为99.76，末端治理设施实际运行率（k值）计算公式为k=污水治理设施运行时间/正常生产时间。原文件中描述污染物类别为废水，污染物指标为挥发酚，此处对其进行了匹配工作，将其匹配到LCAflow库里面相最符合的流，污染物指标备注为挥发酚
- Ammonia Nitrogen: 1.89e-5
  the Technical of end-of-pipe management technology for pollution Ammonia NitrogenisPhysical treatment + biological treatment + physicochemical treatment (or physical treatment, chemical treatment)，Its Technical efficiency of end-of-pipe management99.99
  污染物指标氨氮的末端治理技术是物理处理法+生物处理法+物理化学处理法（或物理处理法、化学处理法），其效率为99.99，末端治理设施实际运行率（k值）计算公式为k=污水治理设施运行时间/正常生产时间。原文件中描述污染物类别为废水，污染物指标为氨氮，此处对其进行了匹配工作，将其匹配到LCAflow库里面相最符合的流，污染物指标备注为氨氮
- Waste water: 283.05
  the Technical of end-of-pipe management technology for pollution Waste wateris/，Its Technical efficiency of end-of-pipe management15
  污染物指标工业废水量的末端治理技术是/，其效率为15，末端治理设施实际运行率（k值）计算公式为k=污水治理设施运行时间/正常生产时间。原文件中描述污染物类别为废水，污染物指标为工业废水量，此处对其进行了匹配工作，将其匹配到LCAflow库里面相最符合的流，污染物指标备注为工业废水量
- Ammonia Nitrogen: 0.0003969
  the Technical of end-of-pipe management technology for pollution Ammonia NitrogenisPhysical treatment + biological treatment，Its Technical efficiency of end-of-pipe management99.79
  污染物指标氨氮的末端治理技术是物理处理法+生物处理法，其效率为99.79，末端治理设施实际运行率（k值）计算公式为k=污水治理设施运行时间/正常生产时间。原文件中描述污染物类别为废水，污染物指标为氨氮，此处对其进行了匹配工作，将其匹配到LCAflow库里面相最符合的流，污染物指标备注为氨氮
- Petroleum-related waste: 0.000521
  the Technical of end-of-pipe management technology for pollution Petroleum-related wasteisPhysical treatment + biological treatment + physicochemical treatment (or physical treatment, chemical treatment)，Its Technical efficiency of end-of-pipe management99.9
  污染物指标石油类的末端治理技术是物理处理法+生物处理法+物理化学处理法（或物理处理法、化学处理法），其效率为99.9，末端治理设施实际运行率（k值）计算公式为k=污水治理设施运行时间/正常生产时间。原文件中描述污染物类别为废水，污染物指标为石油类，此处对其进行了匹配工作，将其匹配到LCAflow库里面相最符合的流，污染物指标备注为石油类
- arsenic: 0.002014
  the Technical of end-of-pipe management technology for pollution arsenicisPhysical treatment + biological treatment + physicochemical treatment (or physical treatment, chemical treatment)，Its Technical efficiency of end-of-pipe management81
  污染物指标砷的末端治理技术是物理处理法+生物处理法+物理化学处理法（或物理处理法、化学处理法），其效率为81，末端治理设施实际运行率（k值）计算公式为k=污水治理设施运行时间/正常生产时间。原文件中描述污染物类别为废水，污染物指标为砷，此处对其进行了匹配工作，将其匹配到LCAflow库里面相最符合的流，污染物指标备注为砷
- chemical oxygen demand: 0.002268
  the Technical of end-of-pipe management technology for pollution chemical oxygen demandisPhysical treatment + biological treatment + physicochemical treatment (or physical treatment, chemical treatment)，Its Technical efficiency of end-of-pipe management99.79
  污染物指标化学需氧量的末端治理技术是物理处理法+生物处理法+物理化学处理法（或物理处理法、化学处理法），其效率为99.79，末端治理设施实际运行率（k值）计算公式为k=污水治理设施运行时间/正常生产时间。原文件中描述污染物类别为废水，污染物指标为化学需氧量，此处对其进行了匹配工作，将其匹配到LCAflow库里面相最符合的流，污染物指标备注为化学需氧量
- arsenic: 0.004558
  the Technical of end-of-pipe management technology for pollution arsenicisPhysical treatment + biological treatment，Its Technical efficiency of end-of-pipe management57
  污染物指标砷的末端治理技术是物理处理法+生物处理法，其效率为57，末端治理设施实际运行率（k值）计算公式为k=污水治理设施运行时间/正常生产时间。原文件中描述污染物类别为废水，污染物指标为砷，此处对其进行了匹配工作，将其匹配到LCAflow库里面相最符合的流，污染物指标备注为砷
- Petroleum-related waste: 0.01563
  the Technical of end-of-pipe management technology for pollution Petroleum-related wasteisPhysical treatment + biological treatment，Its Technical efficiency of end-of-pipe management97
  污染物指标石油类的末端治理技术是物理处理法+生物处理法，其效率为97，末端治理设施实际运行率（k值）计算公式为k=污水治理设施运行时间/正常生产时间。原文件中描述污染物类别为废水，污染物指标为石油类，此处对其进行了匹配工作，将其匹配到LCAflow库里面相最符合的流，污染物指标备注为石油类
- chemical oxygen demand: 0.054
  the Technical of end-of-pipe management technology for pollution chemical oxygen demandisPhysical treatment + biological treatment，Its Technical efficiency of end-of-pipe management95
  污染物指标化学需氧量的末端治理技术是物理处理法+生物处理法，其效率为95，末端治理设施实际运行率（k值）计算公式为k=污水治理设施运行时间/正常生产时间。原文件中描述污染物类别为废水，污染物指标为化学需氧量，此处对其进行了匹配工作，将其匹配到LCAflow库里面相最符合的流，污染物指标备注为化学需氧量
- Nitrogen, organic bound: 0.0828
  the Technical of end-of-pipe management technology for pollution Nitrogen, organic boundisPhysical treatment + biological treatment + physicochemical treatment (or physical treatment, chemical treatment)，Its Technical efficiency of end-of-pipe management70
  污染物指标总氮的末端治理技术是物理处理法+生物处理法+物理化学处理法（或物理处理法、化学处理法），其效率为70，末端治理设施实际运行率（k值）计算公式为k=污水治理设施运行时间/正常生产时间。原文件中描述污染物类别为废水，污染物指标为总氮，此处对其进行了匹配工作，将其匹配到LCAflow库里面相最符合的流，污染物指标备注为总氮
- Nitrogen, organic bound: 0.0828
  the Technical of end-of-pipe management technology for pollution Nitrogen, organic boundisPhysical treatment + biological treatment，Its Technical efficiency of end-of-pipe management70
  污染物指标总氮的末端治理技术是物理处理法+生物处理法，其效率为70，末端治理设施实际运行率（k值）计算公式为k=污水治理设施运行时间/正常生产时间。原文件中描述污染物类别为废水，污染物指标为总氮，此处对其进行了匹配工作，将其匹配到LCAflow库里面相最符合的流，污染物指标备注为总氮

## Use advice
This dataset is derived from the Pollution Source Census Report and contains information on pollution emissions and related products. However, it does not include data on energy or chemical consumption, nor does it provide information on waste or co-product generation. When utilizing this dataset, please supplement the missing data based on actual conditions before use
该数据集来源于污染源普查报告，包含污染物排放及相关产品信息，但不包含能源或化学品消耗数据，也不提供废弃物或共生产物产生信息。在使用该数据集时，请根据实际情况补充缺失数据后再使用。

## Review details
Inventory: The internal review was done by several iteration steps concerning raw data validation, raw data documentation, representativity, completeness and consistency of modelling with regard to ISO 14040 and 14044.
清单： 内部审查通过几个迭代步骤完成，涉及原始数据验证、原始数据记录、代表性、完整性、与 ISO 14040 和 14044 有关的建模的一致性。

## Data sources
- 第二次全国污染源普查产排污核算系数手册（试用版）,二级代码25,四级代码2511文件，在完整版文件中第4111页
