# Utilization of high alumina fly ash ; Mullite ceramics (main product) and high white aluminum hydroxide (HWAH) (by-product) and flue gas silica (by-product) ; High alumina fly ash

Dataset: ILCD process, Unit process, single operation
Geography: NMG-CN
Reference year: 2017
Classification: Unit processes / Materials production / Other mineralic materials
Generated by: Changqing Xu, xcq@bit.edu.cn
Owner: Tiangong LCI Data Working Group
Review: Dependent internal review by Tiangong LCI Data Working Group
Amounts: no units in this file; such an amount is in the reference unit of its flow, which a separate flow dataset defines
copyright: false
licenseType: Free of charge for all users and uses

## General comment
高铝飞灰（HAFA）的利用;主要产品莫来石陶瓷;副产品高白氢氧化铝（HWAH）和烟气二氧化硅

## Time period
Year of publication

## Technical purpose
The high alumina fly ash is utilized for the production of mullite ceramics, which are primarily used in high-temperature structural applications, such as furnace linings, kiln furniture, and electrical insulators due to their high melting point, low thermal conductivity, and good chemical stability. The high white aluminum hydroxide (HWAH) produced as a by-product is commonly used as a fire retardant filler in plastics and rubbers, as a raw material in aluminum chemicals, and as a precursor for aluminum oxide in ceramics. The flue gas silica, also a by-product, is often used in the manufacture of specialty glasses, silicon chemicals, or as a pozzolanic material in cement and concrete products.

## Reference product
- ash: 1000; input; measured
  功能单位是应用1000kg高铝粉煤灰

## Inputs
- electricity, high voltage, aluminium industry: 737.82; software or database
- carbon dioxide, in chemical industry: 0; measured
- quicklime, in pieces, loose: 308.48; measured
  CaO,生石灰
- freshwater: 4770.32; measured
  fresh water
- hard coal: 684.81; software or database
- Sodium hydroxide: 126.15; measured
- hydrogen chloride: 265.02; measured

## Outputs
All rows: measured
- sanitary ceramics: 353.36
  主要产品Mullite ceramics
- Calcium silicate: 247.35
  副产品硅酸钙CaSiO3，无条目
- silica fume, densified: 0
  副产品fume silica
- aluminium hydroxide: 353.36
  副产品high-white aluminum hydroxide (HWAH)
- chemical oxygen demand: 0.0375
- carbon dioxide (fossil),carbon dioxide (fossil): 1566.78
- sulfur dioxide: 0.15
- Nitrogen oxides: 0.16
- municipal solid waste: 758.3

## Use advice
When using this data set for life cycle assessment, it's important to account for the allocation of environmental impacts between the main product (mullite ceramics) and by-products (HWAH and flue gas silica), especially if the by-products are also commercialized. This might involve economic allocation or other methods as per ISO 14044 standards. Users should also consider the transportation of raw materials and products, energy consumption, and the generation of emissions specific to the industrial process when adding data to the inventory analysis phase. Any recycling or recovery of the by-products should be accounted for to avoid double-counting.

## Review details
Inventory: The internal review was done by several iteration steps concerning raw data validation, raw data documentation, representativity, completeness and consistency of modelling with regard to ISO 14040 and 14044.

## Data sources
- Yang, S. et al. Assessment and comparison of three high-aluminum fly ash utilization scenarios in Inner Mongolia, China using an eco-efficiency indicator. Waste Manag. Res. 35, 515–524 (2017).
