# Remediated soil ; PCE contaminated soil ; Combing in-situ chemical oxidization and soil vapor extraction ;

Dataset: ILCD process, Unit process, black box
Geography: BE
Reference year: 2019
Classification: Unit processes / Other Services / Repair and maintenance
Functional unit: The functional unit was defined for this study as all the relevant products and processes needed for the remediation of a site contaminated with volatile hydrocarbons with a pollution load of 3300 kg PCE, to eliminate the potential human risk.
Generated by: Yang Xintong, yangxt@caep.org.cn
Owner: Tiangong LCI Data Working Group
Review: Dependent internal review by Tiangong LCI Data Working Group
Amounts: no units in this file; such an amount is in the reference unit of its flow, which a separate flow dataset defines
copyright: false
licenseType: Free of charge for all users and uses

## General comment
In-situ chemical oxidization (ISCO) is paired with soil vapor extraction (SVE) as the main techniques to reduce the contamination load. Due to the urban layout of the sewer system and the cellars beneath the adjacent houses to the site, the use of the ozone generator for ISCO would potentially lead to the evaporation of ozone in the homes of the nearby residents. This vapor, if too concentrated, could have an impact on the health of the local residents. When starting the remediation works, PID (photoionization detector) measurements will be performed to test whether the concentrations of evaporated ozone in the houses of the nearby residents is not harmful. In the case of a potential impact of ozone on the nearby residents, another remediation alternative will be implemented.

## Geography
The case concerns the remediation of a former dry-cleaning site (with an area of 505 m2 ) in a densely populated city center in Flanders.

## Time period
Publication time of literature

## Technical purpose
The process described is intended for the remediation of soil contaminated with tetrachloroethylene (PCE), specifically utilizing the combined approach of in-situ chemical oxidation (ISCO) and soil vapor extraction (SVE). This approach is applicable for the treatment of sites like former dry-cleaning establishments in urban areas with dense populations, where PCE is a common pollutant. It serves to decrease the contamination burden and mitigate potential human health risks associated with the presence of PCE in soil. The process is particularly designed for densely populated city centers with complex underground infrastructures like sewer systems and basements, exemplified by the remediation of a 505 m2 area in Flanders.

## Reference product
- Remedied site: 505; measured

## Inputs
All rows: measured
- Electricity: 576000
  Electricity use throughout project
- Tap Water: 2400
  Water use throughout project
- Hydrogen peroxide,Hydrogen peroxide: 168
  Hydrogen peroxide use
- Tap Water: 312
  throughout project
- Digger: 1533
  Excavation
- transport in t*km: 79736
  Transport excavated soil
- Diesel,Diesel: 105
  Cleaning excavated soil
- Electricity: 41040
  Cleaning excavated soil
- Polyethylene,Polyethylene: 663
  Foil to cover after excavation
- Plastic Film: 663
  Foil to cover after excavation
- Digger: 875
  Pipe work
- Activated Carbon: 2000
  Pump and Treat
- Activated Carbon: 4000
  Soil vapor extraction
- Diesel,Diesel: 28785.6
  Coil drilling throughout the project
- Tap Water: 3000
  Coil drilling throughout the project
- Maltose Syrup: 6000
  Stimulated biological degradation
- Road Transport,Road Transport: 1.701e7, 6.66e6 (2 entries)
  Transport of workers during project
- Contaminated Site: 505

## Use advice
When utilizing this LCA data set for the described process, users should account for site-specific conditions such as urban layout and residential proximity, which could affect the applicability and environmental impact of the chosen remediation techniques. Regular PID measurements must be integrated into the assessment, ensuring that the evaporated ozone concentrations within residential areas remain non-harmful. Users should also be prepared to adapt the remediation strategy if potential ozone impacts on the local populace are identified. This data set is context-sensitive and should only be applied to scenarios with analogous characteristics to those documented in this case, especially considering population density, the extent of contamination, and local regulations.

## Review details
Inventory: The internal review was done by several iteration steps concerning raw data validation, raw data documentation, representativity, completeness and consistency of modelling with regard to ISO 14040 and 14044.

## Data sources
- Huysegoms L ,Rousseau S ,Cappuyns V . Chemical or Natural? Including LCA in Social CBA to Compare Remediation Alternatives for a Dry-Cleaning Facility [J]. Sustainability, 2019, 11 (7): 1975-1975.
