# Electrolytic Nickel Production ; Battery Grade Primary Nickel (99.9% Ni) ; Grind and Flotation Electrolytic ; Nickel-Copper-Cobalt Ore in Xinjiang Province

Dataset: ILCD process, Unit process, single operation
Geography: GS-CN
Reference year: 2018
Classification: Unit processes / Materials production / Metals and semimetals
Generated by: Sun Xin, xs389@cornell.edu
Owner: Tiangong LCI Data Working Group
Review: Dependent internal review by Tiangong LCI Data Working Group
Amounts: no units in this file; such an amount is in the reference unit of its flow, which a separate flow dataset defines
licenseType: Free of charge for all users and uses

## General comment
Data on resource consumption, raw material input, energy consumption, pollutant discharge and waste disposal during the pyrometallurgical and refining stages were referred to the enterprise operation data published by China’s largest nickel metal production base in Gansu, which contributed more 80% of China’s electrolytic nickel production. The metal emission data caused by the storage of waste rock, tailings and slags referred to the leaching experiment results. The Chinese process-based LCI database provided data support for the background inventory. The missing background inventories of chemicals (e.g., boric acid, barium carbonate, and sodium sulfide), including input and output flows, were supplemented by the Ecoinvent version 3 database.来自 GFEM（即铜精矿、二次合金和钴渣）和 LEM（即含铜和钴的浸出尾矿）镍精炼阶段的主要副产品也包括在分析中。通过计算上述副产品的质量来分配潜在的环境影响。这种分配方法目前用于镍金属的生命周期评估研究。

## Technology and included processes
At the refining stage, two mainstream technologies that have been industrially applied in China (i. e., grind and flotation electrolytic method (GFEM) and leaching electrowinning method (LEM)) were used to refine the nickel matte into a high-purity metallic nickel (MEE, 2015). In GFEM, the grinding and flotation process involving the use of jaw crushers and ball mills would produce nickel concentrate as the main product. Copper concentrate and secondary alloy were produced as by-products, which were further processed as recovery copper and platinum group metals. For the nickel concentrate in this study, it was melted in a reverberatory furnace and cast into anode plates by a casting machine. Then, under the impact of direct current, the metallic nickel was precipitated in the nickel sulphide electrolytic cell.

## Technical purpose
The high purity primary nickel produced through electrolytic process is intended for use in manufacturing batteries. Specifically, the 99.9% purity level makes it suitable for high-grade applications such as in the production of electrodes for lithium-ion batteries.

## Reference product
- Nickel metal (＞99.9% Ni): 1000; measured

## Inputs
All rows: measured
- water: 19250
- Nickel concentrate (8.6% Ni): 150
- unspecified: 0.0408
- Nickel matte: 1750
- Barium carbonate: 3.62
- sodium carbonate: 480
- Sulfuric acid: 170
- hydrogen chloride: 0.07
- chlorine: 140
- Boric acid: 8
- sodium hydroxide: 20
- Nitrogenous Fertilizer: 0.33
- Chemicals (unspecified): 0.00138
- transport in t*km: 185.62
- Electricity: 17213.9
- Hard coal, at consumer EU-27: 520
- process steam: 2990

## Outputs
All rows: measured
- sulphuric acid: 0.04815
- hydrogen sulfide: 0.04277
- chlorine: 0.07265
- particles (PM2.5 - PM10): 0.49
- chemical oxygen demand: 0.42
- Suspended solids, unspecified: 0.0476
- ammonia: 0.00773
- sulfide: 5.574e-5
- decane: 0.00079
- fluoride: 0.00238
- phosphorus, total: 0.00087
- nitrogen, total (excluding N2): 0.05164
- copper: 0.00159
- nickel: 0.00167
- lead: 0.00095
- cadmium: 0.00024
- waste water - untreated: 10500
- municipal solid waste deposition: 4.17
- hazardous waste (unspecified): 57.26

## Use advice
When applying this data set, users should consider the specific energy requirements and environmental emissions associated with the grind and flotation electrolytic process. Careful attention must be paid to the allocation of impacts when recycling of nickel is involved in the system under study. Users should also ensure technological applicability by considering the regional electricity mix of Xinjiang Province, as it may affect the overall environmental profile of the nickel production process.

## Review details
Inventory: The internal review was done by several iteration steps concerning raw data validation, raw data documentation, representativity, completeness and consistency of modelling with regard to ISO 14040 and 14044.

## Data sources
- Bai, Y. et al. Strategies for improving the environmental performance of nickel production in China: Insight into a life cycle assessment. Journal of Environmental Management 312, 114949 (2022).
