# Brick production ; Shale hollow brick production ; Cutting process

Dataset: ILCD process, Unit process, single operation
Geography: GZ-JX-CN
Reference year: 2020
Classification: Unit processes / Materials production / Other mineralic materials
Generated by: Wang xiangjin, r99rt4@163.com
Owner: Tiangong LCI Data Working Group
Review: Dependent internal review by Tiangong LCI Data Working Group
Amounts: no units in this file; such an amount is in the reference unit of its flow, which a separate flow dataset defines
copyright: false
licenseType: Free of charge for all users and uses

## General comment
Traditional shale hollow brick production process

## Technical purpose
The shale hollow bricks produced through the cutting process are primarily used for construction purposes. They are suitable for building load-bearing walls, partition walls, and insulation applications due to their hollow structure that provides thermal and acoustic advantages. These bricks are widely used in residential, commercial, and industrial construction projects.

## Reference product
- green brick: 1510; measured
  adobe

## Inputs
- Clay Body: 1520; measured
- Electricity: 2.232; measured

## Deviations from the LCI method approaches
The EIA report is based on the annual production of bricks (80 million bricks) as a whole, and for statistical purposes, the data has been converted according to the size specifications described therein, in terms of bricks produced per tonne of production

## Data selection and combination
Adopting the relevant data from the table of coefficients of production and discharge for sintered bricks and building blocks in 3131 of the Manual of Coefficients of Production and Discharge for Industrial Pollution Sources of the First National Pollution Sources Census (Seventh Subbook).

## Sampling procedure
The data for this EIA report is derived from real-time data from the plant

## Use advice
When utilizing this dataset for Life Cycle Assessment of shale hollow bricks, make sure to account for the environmental impacts associated with the cutting process explicitly. The data should be applied only to similar production scales and within the technological scope outlined in the 3131 coefficients of the manual. Consideration should be given to the potential for recycling the bricks at the end-of-life stage, and the specific use-phase behavior (thermal and acoustic insulation performance) should be modeled if relevant to the scope of the assessment. The conversion factors provided based on size specifications and annual production quantities should be carefully applied for accurate calculations.

## Review details
Inventory: The internal review was done by several iteration steps concerning raw data validation, raw data documentation, representativity, completeness and consistency of modelling with regard to ISO 14040 and 14044.

## Data sources
- 年产 8000 万块页岩标砖项目环评报告公示
