# Treatment facilities ; Groundwater ex-situ remediation ; Pump and treatment ; Infrastructure construction

Dataset: ILCD process, Unit process, single operation
Geography: JS-CN
Reference year: 2022
Classification: Unit processes / Other Services / Repair and maintenance
Generated by: Wang Ning, wang_ning@caep.org.cn
Owner: Tiangong LCI Data Working Group
Review: Dependent internal review by Tiangong LCI Data Working Group
Amounts: no units in this file; such an amount is in the reference unit of its flow, which a separate flow dataset defines
copyright: false
licenseType: Free of charge for all users and uses

## General comment
Construction of water treatment facilities using PVC pipes, concrete, steel, etc.

## Geography
a closed pesticide manufacturing plant located in Jiangsu Province, China.

## Technical purpose
This data set pertains to the construction of water treatment facilities, specifically designed for groundwater ex-situ remediation using a pump and treat (P&T) system. The construction process involves the use of materials such as PVC pipes, concrete, and steel. This infrastructure is particularly relevant for sites requiring detoxification or removal of contaminants, such as the closed pesticide manufacturing plant in Jiangsu Province, China. These facilities are crucial in industrial or municipal settings where groundwater pollution has been identified and requires remediation to meet environmental standards.

## Reference product
- Treatment facilities: 1; measured

## Inputs
- Polyvinyl chloride: 400; measured
- Concrete: 60500; measured
- Steel sections: 2250; measured
- transport in t*km: 6315; calculated

## Use advice
When utilizing this data set for Life Cycle Assessment (LCA) purposes, users should consider the specific context of the water treatment facilities' construction. This includes attention to the geographical and technological specificity (e.g., the conditions in Jiangsu Province, China) and the types of contaminants addressed by the P&T system. Users should ensure that the inventory reflects regional construction practices and the environmental impact of material extraction and processing. Care should be taken to understand the end-of-life phase of the materials used in construction and their potential for recycling or reuse in the LCA calculations. Further, when modeling the use phase, the specific operational behavior of the water treatment system must be accurately represented to capture its environmental performance.

## Review details
Inventory: The internal review was done by several iteration steps concerning raw data validation, raw data documentation, representativity, completeness and consistency of modelling with regard to ISO 14040 and 14044.

## Data sources
- Ding, D. et al. Assessing the environmental impacts and costs of biochar and monitored natural attenuation for groundwater heavily contaminated with volatile organic compounds. Science of The Total Environment 846, 157316 (2022).
