# Putty powder production ; Putty powder ; Mixing, CN

Dataset: ILCD process
Geography: CN
Classification: Unit processes / Materials production / Other mineralic materials
Generated by: Jiaqi Lu, wilsherelu@foxmail.com
Owner: Tiangong LCI Data Working Group
Review: Dependent internal review by Tiangong LCI Data Working Group
Amounts: no units in this file; such an amount is in the reference unit of its flow, which a separate flow dataset defines
copyright: false
licenseType: Free of charge for all users and uses

## General comment
This dataset represents the production of putty powder, which is commonly used as a wall finishing material to create a smooth surface for painting or decoration. It can also be used for minor surface repairs and is applicable in the construction and renovation industry.

## Reference product
- Putty Powder: 1000; missing unimportant
  Putty powder products

## Inputs
All rows: missing unimportant
- White Portland cement: 100
  white portland cement
- Calcium Powder: 440
  calcium powder
- Caulk Compound: 50
  Rubber powder
- cement, ordinary portland cement: 270
  Ordinary Portland Cement
- sand: 220
- crushed stone 16/32: 500
  stone powder
- gypsum: 160
  plaster
- Shuangfei Powder: 600
  Shuangfei powder
- cement, unspecified: 160
  cement
- Calcium carbonate (> 63 microns): 200
  Heavy calcium powder
- Electricity: 122.616
- water: 320

## Outputs
- Particles (PM0.2 - PM2.5): 70; missing unimportant
  Total particulate matter [emitted to the atmosphere (unspecified type)]
- phosphorus, total: 1.75; missing unimportant
  Total phosphorus [discharge to water (unspecified type)]
- non-methane volatile organic compounds: 3240; missing unimportant
  non-methane volatile organic compounds [emitted to atmosphere (unspecified type)]

## Use advice
When using this data set for Life Cycle Assessment, users should consider the specific application context of putty powder. It is important to include upstream processes such as the extraction and processing of raw materials, as well as energy consumption during production. End-of-life treatment and potential recycling of materials should also be addressed if applicable. Environmental impacts during the application phase are typically low but may be considered based on the solvent used if putty powder is not water-based.

## Review details
Inventory: The internal review was done by several iteration steps concerning raw data validation, raw data documentation, representativity, completeness and consistency of modelling with regard to ISO 14040 and 14044.

## Data sources
- 年产5000吨腻子粉环评报告表
