# SoG-Si wafer slicing ; SoG-Si wafer ; Ingot breaker is used to slice the ingot

Dataset: ILCD process, Unit process, single operation
Geography: CN
Reference year: 2016
Classification: Unit processes / Materials production / Other materials
Functional unit: Grid-connected electricity generation from a 1 MWp multi-Si PV system, whose lifespan is 30 years of a 10 MWp power station has been taken as the research object and the functional unit
LCI method principle: Attributional
LCI method approaches: Allocation
Generated by: Jinfeng Yang, yjfzfshn@163.com
Owner: Tiangong LCI Data Working Group
Review: Dependent internal review by Tiangong LCI Data Working Group
Amounts: no units in this file; such an amount is in the reference unit of its flow, which a separate flow dataset defines
copyright: false
licenseType: Free of charge for all users and uses

## General comment
Multi-Si

## Geography
The power station is located in the central region of Ningxia, China, where the average annual solar radiation is approximately 5955.80 MJ m2 a-1, and the annual average number of peak sunshine hours are 1718 h.

## Time period
Available online

## Technical purpose
The process involves slicing silicon wafers from a multi-crystalline silicon ingot using an ingot breaker. These sliced SoG-Si wafers are commonly used in photovoltaic (PV) systems for solar energy conversion. Specifically, they are part of 10 MWp multi-Si PV systems grid-connected for electricity generation, optimized for regions with high solar radiation like the central region of Ningxia, China.

## Reference product
- Multi-Si wafer,Multi-Si wafer,Multi-Si wafer: 1; measured
  SoG-Si wafer

## Inputs
All rows: measured
- Electricity: 2.304
- Multi-Si ingot: 0.0204
  SoG- Si ingot
- freshwater: 4.26
  Fresh water
- Steel Wire,Cable: 0.01314
  Steel wire
- Polyethylene glycol: 0.0231
- Silicon carbide,Silicon carbide: 0.02008
  Silicon carbide
- Glass: 0.00839
- Glue: 0.00012
- Lactic acid: 0.00093
- citric acid: 0.00062
  Citric acid
- Detergent: 0.00111

## Outputs
All rows: measured
- waste water - untreated: 0.48589
  Waste water
- Waste (solid): 0.09582
  Waste mortar
- Steel scrap (St): 0.01314
  Waste steel wire
- Glass for recovery (shards): 0.00839
  Waste glass
- organic waste (unspecified): 0.00012
  Glue (Organic waste)
- l-(+)-lactic acid: 0.00093
  Lactic acid (Hazardouswaste)
- citric acid: 0.00062
  Citric acid (Hazardouswaste)
- hydrogen chloride: 5e-7
  Hydrogen chloride
- Nitrogen oxides: 3e-6
- fluoride: 0.00044
  Fluoride
- chloride: 7e-5
  Chlorides
- chemical oxygen demand: 0.00312
  Chemical oxygendemand (COD)
- nitrogen, total (excluding N2): 3e-5
  Total Nitrogen (TN)
- Suspended solids, unspecified: 5e-5
  Suspended solids (SS)
- industrial waste (unspecified): 0.00034
  Solid waste

## Deviations from the LCI method approaches
A life cycle assessment (LCA) has been performed for the grid-connected electricity generation from a metallurgical route multi-crystalline silicon (multi-Si) photovoltaic (PV) system in China.

## Data selection and combination
Survery of factories in Yunnan and Ningxia

## Use advice
Users of this life cycle assessment data should consider the specific regional conditions such as solar irradiance and peak sunshine hours as represented in the study. The data is tailored for a grid-connected multi-crystalline silicon PV system with a lifespan of 30 years for a 10 MWp power station. Ensure to represent the given process within your model accurately by considering the technological aspects of wafer slicing, material quality, and energy consumption patterns specific to the local climate conditions in Ningxia.

## Review details
Inventory: The internal review was done by several iteration steps concerning raw data validation, raw data documentation, representativity, completeness and consistency of modelling with regard to ISO 14040 and 14044.

## Data sources
- Yu, Z. et al. Life cycle assessment of grid-connected power generation from metallurgical route multi-crystalline silicon photovoltaic system in China. Applied Energy 185, 68–81 (2017).
