# Aluminum ingot casting ; Primary aluminum ingot ; Liquid primary aluminum

Dataset: ILCD process, Unit process, single operation
Geography: HEN-CN
Reference year: 2018
Classification: Unit processes / Materials production / Metals and semimetals
Generated by: Changqing Xu, xcq@bit.edu.cn
Owner: Tiangong LCI Data Working Group
Review: Dependent internal review by Tiangong LCI Data Working Group
Amounts: no units in this file; such an amount is in the reference unit of its flow, which a separate flow dataset defines
copyright: false
licenseType: Free of charge for all users and uses

## General comment
无流程图

## Time period
Year of Dissertation Publication

## Technical purpose
The primary aluminum ingot casting process is intended for the production of solid aluminum shapes from molten metal. The resulting aluminum ingots are commonly used as raw materials in the manufacturing of various aluminum products, including components for the automotive, aerospace, construction, and packaging industries.

## Reference product
- aluminium, primary, ingot: 1000; missing unimportant

## Inputs
All rows: missing unimportant
- electricity, high voltage, aluminium industry: 1328.4
- hard coal: 77.8
  原煤
- light fuel oil: 38.9
- solvent, organic: 4
  溶剂
- coal gas: 311
- natural gas, high pressure: 41.8
- aluminium, primary, liquid: 1000
  电解铝液-无条目

## Outputs
All rows: missing unimportant
- carbon dioxide (fossil),carbon dioxide (fossil): 884
- carbon monoxide (fossil),carbon monoxide (fossil): 0.71
- sulfur dioxide: 0.93
- Nitrogen oxides: 1.69
- methane (fossil): 0.88
- particles (> PM10): 0.27
- particles (PM2.5): 0.16

## Use advice
When utilizing the data for this particular process, ensure that it is applicable to the regional technology level and production practices of the facility under study. Exclude any potential upstream or downstream process impacts, such as those associated with the mining of bauxite and the recycling of aluminum, unless specifically required by the study's scope. Refer to the publication year of the dissertation to determine the temporal relevance of the data.

## Review details
Inventory: The internal review was done by several iteration steps concerning raw data validation, raw data documentation, representativity, completeness and consistency of modelling with regard to ISO 14040 and 14044.

## Data sources
- 王姗姗, 刘赛男, 王灿, & 张瑞芹. 基于生命周期评价的河南省原铝生产环境影响分析. 轻金属 1-7+16 (2018)
