# a local branded pure milk productions ; Packaging disposal

Dataset: ILCD process, Unit process, single operation
Geography: CD-SC-CN
Reference year: 2017
Classification: Unit processes / End-of-life treatment / Material recycling
Functional unit: The Tetra Pak 1litre pure liquid milk is selected to assess its lifecycle based carbon footprint.
Generated by: Rui Yang, 1632707028@qq.com
Owner: Tiangong LCI Data Working Group
Review: Dependent internal review by Tiangong LCI Data Working Group
Amounts: no units in this file; such an amount is in the reference unit of its flow, which a separate flow dataset defines
copyright: false
licenseType: Free of charge for all users and uses

## General comment
Recycling is selected for the packaging waste pre-treatment. Because of the separation technique for aluminum-plastic composites usually with a lower heating value, these containers are not suitable for incineration

## Geography
The milk source base is located at Hongya Country, Southwestern Sichuan Province, China, about 147 kilometres far from Chengdu City, the provincial capital. The diary processing plant is located at Pixian, suburb of Chengdu City, which is about 175 kilometres far from the milk source base. The branded milk is mainly distributed to the central Chengdu City, about 40 kilometres distances from the diary processing plant. The milk packaging waste is transported to the municipal landfill for final disposal, about 30 kilometres away from the central city.

## Technology and included processes
This study only focused on processes that directly contributed to pure milk production, that is, only the effects of energy and material input and carbon emissions, as shown in Figure 1. The system boundary of milk life cycle is thus simplified and divided into four stages, namely, raw milk production, dairy product processing, product transportation and packaging waste disposal.

## Technical purpose
This local branded pure milk production and packaging disposal process is designed for the generation of dairy products, specifically pure liquid milk distributed primarily within the Chengdu city center. The process includes the life cycle stages of raw milk production, dairy product processing, product transportation, and packaging waste disposal, with an emphasis on sustainability and minimizing the carbon footprint associated with each stage. The packaging materials are composed of aluminum-plastic composites, which are not designed for incineration due to low heating value and are instead directed towards recycling and final disposal in landfills.

## Reference product
- milk: 0.001; measured
  pure liquid milk

## Inputs
- hard coal: 0.00903; measured
  Raw coal
- Natural gas, at consumer EU-27: 4.63e-10; measured
- crude oil: 7.76e-6; measured
- Electricity: 0.04104; measured

## Outputs
- carbon dioxide (fossil),carbon dioxide (fossil): 0.0155, 0.0623738 (2 entries); measured
- methane (fossil): 8.43e-5; measured
- carbon dioxide (fossil),carbon dioxide (fossil): 0.012; measured
  Landfill disposal

## Deviations from the LCI method approaches
Compared with the conventional LCA, the process of life cycle impact assessment is simplified in this study, as it mainly uses different categories of indicators to elaborate results of life cycle inventory (Nigri et al., 2014).

## Data selection and combination
Recycling is selected for the packaging waste pre-treatment. Because of the separation technique for aluminum-plastic composites usually with a lower heating value, these containers are not suitable for incineration (Xie et al., 2011). Therefore, landfill disposal is the ultimate choice (Meneses et al., 2012). Data on the carbon emissions during the landfill stage are by analogy to Cherubini’s inventory of sanitary landfill disposal (Cherubini et al., 2009), shown in Table 4.

## Use advice
Users of this LCA data should focus only on the processes that directly contribute to pure milk production, specifically considering the inputs of energy and materials as well as the associated carbon emissions. Allocated system boundaries simplify the life cycle into raw milk production, dairy product processing, product transportation, and packaging waste disposal. Users must employ recycling for pre-treatment of packaging waste, refrain from incineration due to low heating values of aluminum-plastic composites, and consider landfill disposal as the final step, referencing carbon emission data from established inventories such as Cherubini et al. (2009). Methodologically, this study simplifies the life cycle impact assessment process and should be factored in when interpreting LCA results.

## Review details
Inventory: The internal review was done by several iteration steps concerning raw data validation, raw data documentation, representativity, completeness and consistency of modelling with regard to ISO 14040 and 14044.

## Data sources
- Zhao, R., Xu, Y., Wen, X., Zhang, N. & Cai, J. Carbon footprint assessment for a local branded pure milk product: a lifecycle based approach. Food Sci. Technol 38, 98–105 (2017).
