# Municipal sludge treatment and disposal;dry sludge;thermal drying-incineration

Dataset: ILCD process, Unit process, single operation
Geography: CN
Classification: Unit processes / End-of-life treatment / Waste water treatment
Functional unit: One ton of sludge on a dry basis (1 t-DS) is defined as the functional unit.
Generated by: Jin Sitian, 2331276@tongji.edu.cn
Owner: Tiangong LCI Data Working Group
Review: Dependent internal review by Tiangong LCI Data Working Group
Amounts: no units in this file; such an amount is in the reference unit of its flow, which a separate flow dataset defines
copyright: ['opt4ROkqig']
licenseType: Free of charge for all users and uses

## General comment
Several typical sludge treatment facilities in China, representing anaerobic digestion, composting, co-combustion, thermal drying-incineration, and cement production, respectively, are selected to carry out the inventory. Data are mainly taken from the site-specific measurement, either by field survey or by operation report. Sludge characteristics are based on the average values of the sites investigated.

## Technology and included processes
The sludge is semidried to 40% before incineration. An important amount of coal can be saved for evaporating moisture contained in the sludge. A combined heat and power (CHP) system is used, with an overall thermal efficiency of 83%.The exhaust steam from the backpressure turbine is used to offset the energy demand for drying, with the surplus sent for district heating. The drying machine is a disc type, and the thermal utilization efficiency of the drying process is 85%.24 The semidried sludge can realize monoincineration; however, an extra 9% coal is added per ton of the dried sludge to maintain stable combustion and ensure adequate electricity generation.

## Technical purpose
This data set describes the treatment and disposal of municipal sludge through a process of thermal drying followed by incineration. It is applicable in the design and assessment of waste management systems, especially for municipal wastewater treatment facilities. The process is utilized to reduce the volume of sludge produced, efficiently manage waste, and possibly recover energy through the incineration process.

## Reference product
- Sludge: 1000; input; estimated
  a dry basis (1 t-DS)

## Inputs
All rows: measured
- Electricity: 707.04
- Diesel: 0.3
- hard coal; 26.3 MJ/kg: 900
- hydrogen chloride gas: 6.1
- sodium hydroxide: 5.4
- Limestone: 70

## Outputs
- electricity from waste incineration: 3535.2; measured
- heat: 11800; measured
- mineral waste (ash): 600; measured

## Use advice
When using this data set, the user should consider that the functional unit is one ton of dry sludge (1 t-DS). It is essential to ensure that the data is applied to comparable scenarios, considering the composition and properties of the municipal sludge. Users should account for the specific technology used in the thermal drying and incineration and its efficiency when incorporating it into a Life Cycle Assessment model. The potential energy recovery as well as emissions associated with the process should also be included.

## Review details
Inventory: The internal review was done by several iteration steps concerning raw data validation, raw data documentation, representativity, completeness and consistency of modelling with regard to ISO 14040 and 14044.

## Data sources
- Dong, J., Chi, Y., Tang, Y., Wang, F. & Huang, Q. Combined Life Cycle Environmental and Exergetic Assessment of Four Typical Sewage Sludge Treatment Techniques in China. Energy Fuels 28, 2114–2122 (2014).
