# Bioethanol ; Steam explosion ; Collection and transportation

Dataset: ILCD process
Geography: GLO
Classification: Unit processes / Energy carriers and technologies / Renewable fuels
Generated by: Jiayi Yuan, jiayi_y@mail.bnu.edu.cn
Owner: Tiangong LCI Data Working Group
Review: Dependent internal review by Tiangong LCI Data Working Group
Amounts: no units in this file; such an amount is in the reference unit of its flow, which a separate flow dataset defines
copyright: false
licenseType: Free of charge for all users and uses

## General comment
The bioethanol production data set represents the process of collecting and transporting biomass, followed by pretreatment through steam explosion. This bioethanol is suitable for use as a biofuel in automotive applications, specifically for the combustion in vehicles designed to run on ethanol or ethanol-blended fuels.

## Technology and included processes
Through data quality evaluation, 141 datasets with high completeness and consistency were selected from the reported 561 datasets in 474 published papers and classified into eight technological configurations determined by the pretreatment technology. The technological steps following pretreatment were all the same, although actual flows and parameter values vary, as observed in the literature

## Inputs
- Diesel: 0.0006
  L/kg

## Data selection and combination
Global datasets were used where possible, since the study does not apply to any specific region. LCI data for one external process named “Combustion of bioethanol in car” were obtained from the GREET database

## Data treatment and extrapolations
We assessed the robustness of the modeling results through uncertainty propagation (Monte Carlo), discernibility analysis, global sensitivity analysis, and scenario variation.

## Use advice
When utilizing this data set for LCA, ensure that the scope of your study aligns with the global applicability of the data, as it is not region-specific. Incorporate the LCI data for 'Combustion of bioethanol in car' obtained from the GREET database for a comprehensive analysis. Carefully consider the technological configurations presented, and adjust the actual flows and parameter values based on observed variations in the literature. Apply uncertainty propagation such as Monte Carlo simulations, discernibility analysis, global sensitivity analysis, and scenario variation to assess the robustness of the modeling results appropriately.

## Review details
Inventory: The internal review was done by several iteration steps concerning raw data validation, raw data documentation, representativity, completeness and consistency of modelling with regard to ISO 14040 and 14044.
