# Technical and economic evaluation of deep natural gas ; Volcanic reservoir ; Optimization of TOPSIS method

Dataset: ILCD process, Unit process, single operation
Geography: HLJ-CN
Reference year: 2009
Classification: Unit processes / Energy carriers and technologies / Natural gas based fuels
LCI method principle: Attributional
LCI method approaches: Consequential
Generated by: Shikang Kang, 908798159@qq.com
Owner: Tiangong LCI Data Working Group
Review: Dependent internal review by Tiangong LCI Data Working Group
Amounts: no units in this file; such an amount is in the reference unit of its flow, which a separate flow dataset defines
copyright: false
licenseType: Free of charge for all users and uses

## General comment
According to the principle and program of gas field development scheme design, the paper puts forward the key consideration problems in selecting development mode, dividing development series and determining development well pattern when designing the development scheme of Xingcheng volcanic reservoir, and optimizes the development scheme by using the improved TOPSIS method.

## Geography
Xingcheng gas field in Songliao basin

## Time period
Publication time of literature

## Technology and included processes
The so-called gas field development is based on the detailed exploration results and necessary productive development tests, on the basis of comprehensive research, according to the national requirements for natural gas production, and starting from the actual situation and production law of the gas field, a reasonable development scheme is worked out, and the gas field is constructed and put into production

## Technical purpose
The technical and economic evaluation process for deep natural gas in volcanic reservoirs, particularly regarding the Xingcheng gas field in the Songliao basin, involves selecting an optimal development mode, dividing development strata, and determining well patterns for extraction. This process utilizes the improved TOPSIS method for decision-making, and targets applications that include gas field development with considerations for industrial value and national production requirements for natural gas, adhering to technological, economic, quality, and efficiency standards. It is specifically suited for the development of gas fields with high formation pressure and without issues such as retrograde condensation or hydrogen sulfide corrosion, contributing to health, safety, and environmental protection standards.

## Reference product
- natural gas: 14229.6; input; normal; missing unimportant
  Valuation mode, the data is distribution, and the data filled in the quantity is the result of averaging (median value)

## Outputs
- natural gas: 14229.6; normal; missing unimportant
  Not mentioned in the literature, assuming (1:1)

## Data selection and combination
The natural gas in Xushen well area mainly contains methane 71.81%-80.23%, and there is no retrograde condensation phenomenon. Hydrogen sulfide corrosion will not occur. Formation pressure is as high as left and right elastic energy. Scorpion mining is more economical and simple than any other development methods

## Data treatment and extrapolations
A gas field development plan should reflect technology, economy, quality, benefit and performance, etc. For a gas field that is in line with international standards, health, safety, environmental protection and other factors should be considered. The indexes designed by the scheme should conform to the national and industry standards and norms. The selection of indicators requires wide coverage and relative independence among indicators

## Use advice
When using the data set for the Xingcheng volcanic reservoir gas field development, users should ensure that the application of data aligns with the characteristics of the gas field as identified in the evaluation. This includes considering the specific composition of natural gas, absence of retrograde condensation and hydrogen sulfide corrosion, and the economic efficiency of scorpion mining methods. Users are advised to adhere to national and industry standards in applying this data and ensure independent selection of wide-ranging indexes for a comprehensive evaluation that supports decision-making in line with technological, economic, quality, and efficiency considerations, as well as health, safety, and environmental standards.

## Review details
Inventory: The internal review was done by several iteration steps concerning raw data validation, raw data documentation, representativity, completeness and consistency of modelling with regard to ISO 14040 and 14044.

## Data sources
- 巩艳芬. 松辽盆地兴城气田火山岩储层天然气开发技术经济评价[D].大庆石油学院,2010.
