# Rare Earth cleaning;Rare Earth;Molten Salt Electrolysis;NdFeB Magnet Scrap

Dataset: ILCD process, Unit process, single operation
Geography: CN
Reference year: 2013
Valid until: 2016
Classification: Materials production / Non-energetic raw materials
Functional unit: The functional unit of this analysis was chosen as the production of one kg Nd–Pr alloy through extraction from NdFeB magnet scrap
LCI method principle: Attributional
LCI method approaches: Allocation - market value
Generated by: Tao Wang, twang@iue.ac.cn
Owner: Tiangong LCI Data Working Group
Review: Dependent internal review by Tiangong LCI Data Working Group
Amounts: no units in this file; such an amount is in the reference unit of its flow, which a separate flow dataset defines
copyright: false
licenseType: Free of charge for all users and uses

## General comment
The described process is a laboratory-scale development for recycling rare earth metals, specifically neodymium (Nd) and praseodymium (Pr), from NdFeB magnet scrap. The extraction method recovers Nd and Pr for the production of Nd-Pr alloy, which is used in the manufacture of new magnets, typically applied in various high-tech applications such as wind turbines, electric motors, and other devices requiring strong permanent magnets.

## Technology and included processes
The one-step recycling process to extract rare earth metals from scrap magnets is being developed on a laboratory scale at TU Delft. Nonmagnetized, uncoated magnet samples were used in the experiment. The magnets were ball milled under inert atmosphere to increase the surface area to facilitate the electrochemical reactions, and the powder was inserted into the salt bath.

## Reference product
- carbon dioxide: 0.15; input; min 0.1; max 0.2; uniform; article inperiodical
  Pre-treatment steps: The kg CO2 emissions per kg magnet (GWP 100a) cleaned from SiC roughly correspond to its contribution in the MoRe project.

## Inputs
- Electricity: 6.48; min 3.96; max 9; uniform; article inperiodical
  Pre-treatment steps: Demagnetization of magnet
- Electricity: 4.212; article inperiodical
  Pre-treatment steps: Cleaning of magnet with silicon carbide
- Electricity: 0.0288; article inperiodical
  Pre-treatment steps: Polishing

## Deviations from the LCI method approaches
The allocation of environmental flows to Nd and Pr was updated. Value allocation was used to share the process impacts from both multi-output stages, reflecting prices from recent years (2013–2016). There are two stages in the primary production of rare earths for which assumptions regarding coproductions are necessary: the beneficiation stage, where concentrated iron ore and rare earth concentrate are separated, and the solvent extraction stage undertaken to separate individual rare earths.

## Use advice
When using this data set for Life Cycle Assessment (LCA) purposes, it is important to note that the data reflects a one-step recycling process developed in a laboratory setting, which may not be directly scalable or applicable to industrial processes without modification. The environmental impacts have been allocated to Nd and Pr based on value allocation, considering prices between 2013–2016. Users should exercise caution when extrapolating this data to different temporal contexts or market conditions. Methodological considerations such as coproduction assumptions in the beneficiation and solvent extraction stages should be reviewed and adjusted according to the specifics of the analyzed system.

## Review details
Inventory: The internal review was done by several iteration steps concerning raw data validation, raw data documentation, representativity, completeness and consistency of modelling with regard to ISO 14040 and 14044.

## Data sources
- Schulze, R., Abbasalizadeh, A., Bulach, W., Schebek, L. & Buchert, M. An Ex-ante LCA Study of Rare Earth Extraction from NdFeB Magnet Scrap Using Molten Salt Electrolysis. J. Sustain. Metall. 4, 493–505 (2018).
