# Shale gas production;Drilling, fracturing and completion Stage;Well drilling, cementation, cleaning, perforation & fracturing, and production testing process

Dataset: ILCD process, Unit process, black box
Geography: SC-CN
Reference year: 2014
Valid until: 2016
Classification: Unit processes / Energy carriers and technologies / Natural gas based fuels
Generated by: Pu Hong, 15695258655@163.com
Owner: Tiangong LCI Data Working Group
Review: Dependent internal review by Tiangong LCI Data Working Group
Amounts: no units in this file; such an amount is in the reference unit of its flow, which a separate flow dataset defines
copyright: false
licenseType: Free of charge for all users and uses

## General comment
The dataset describes the production stage of shale gas involving processes such as well drilling, cementation, cleaning, perforation, fracturing, and production testing. It is used for life cycle assessment (LCA) specific to shale gas extraction, primarily for environmental impact studies and optimization of extraction processes.

## Geography
China's shale gas extraction work is currently concentrated in the Sichuan and Chongqing areas, and the data from Sichuan and Chongqing are selected for LCA calculations.

## Time period
Raw data dates between 2014-2016

## Reference product
- Shale gas well: 1; measured
  页岩气井的数目

## Inputs
- freshwater: 627000; min 330000; max 849000; uniform; measured
  Components of water-based and oil-based drilling fluids
- Diesel: 330; min 267; max 432; uniform; measured
  Oil-based drilling fluid components
- bentonite: 21000; min 12000; max 30000; uniform; measured
  Oil-based drilling fluid components
- Limestone: 42000; min 34000; max 54000; uniform; measured
  Oil-based drilling fluid components
- calcium chloride: 61000; min 50000; max 80000; uniform; measured
  Oil-based drilling fluid components
- Diesel: 395000; min 220000; max 522000; uniform; measured
  Drilling equipment
- Diesel: 2596; min 1453; max 3642; uniform; measured
  Material transportation
- casing: 607000; min 353000; max 760000; uniform; measured
  钻井阶段-固井流程消耗的套管
- freshwater: 293000; min 72000; max 419000; uniform; measured
  G grade cement slurry components
- G class cement: 405000; min 235000; max 499000; uniform; measured
  G grade cement slurry components
- Diesel: 4682; min 2709; max 5806; uniform; measured
  Transporting materials and driving equipment
- freshwater: 104000; measured
  clean well
- Diesel: 451000; measured
  Clean water and wastewater transportation
- freshwater: 2.6071e7; min 1.0253e7; max 4.0237e7; uniform; measured
  Fracturing fluid composition
- sand: 1.253e6; min 304000; max 1.91e6; uniform; measured
  Fracturing fluid composition
- Diesel: 6470; min 2025; max 9920; uniform; measured
  Material, water and wastewater transportation
- Diesel: 209794; min 82508; max 323791; uniform; measured
  Use of field equipment
- freshwater: 295000; min 174000; max 432000; uniform; estimated
  Domestic water use during the project
- Diesel: 25; min 14; max 36; uniform; estimated
  Domestic water transportation during the project
- Road: 2200; min 22; max 7664; uniform; measured
  场地准备阶段--道路维修及新建道路的长度
- Well pad: 8100; min 7350; max 9600; uniform; measured
  场地准备阶段--建成井场的面积
- Retention pond: 13300; min 18600; max 6450; uniform; measured
  场地准备阶段--累计蓄水池，固废池等体积

## Outputs
- waste water - untreated: 100000; measured
  wastewater produced
- waste water - untreated: 209000; min 82000; max 322000; uniform; measured
  wastewater produced
- methane (fossil): 1679.72; calculated
  Methane emissions during testing phase
- carbon dioxide (fossil): 226343; calculated
  Emission of CO2 generated by methane combustion during the test phase

## Use advice
This dataset should be utilized for LCA studies for shale gas extraction in the Sichuan and Chongqing regions of China, reflecting regional specificity in methodology. The data is historical, referring to the period from 2014 to 2016; users should be aware of technological changes since then that may have impacted the process efficiency and environmental outputs. When comparing with other datasets, ensure temporal, geographical, and technological congruency.

## Review details
Inventory: The internal review was done by several iteration steps concerning raw data validation, raw data documentation, representativity, completeness and consistency of modelling with regard to ISO 14040 and 14044.

## Data sources
- Wang, J., Liu, M., McLellan, B. C., Tang, X. & Feng, L. Environmental impacts of shale gas development in China: A hybrid life cycle analysis. Resources, Conservation and Recycling 120, 38–45 (2017).
