# Remediated soil ; Soil ex-situ remediation ; Chemical Oxidation ; Cyanide pollution

Dataset: ILCD process, Unit process, black box
Geography: ZB-SD-CN
Reference year: 2024
Classification: Unit processes / Other Services / Repair and maintenance
Functional unit: 59922m3 polluted soil, with an average cyanide content of 13.77 mg/kg
Generated by: Yang Xintong, yangxt@caep.org.cn
Owner: Tiangong LCI Data Working Group
Review: Dependent internal review by Tiangong LCI Data Working Group
Amounts: no units in this file; such an amount is in the reference unit of its flow, which a separate flow dataset defines
copyright: false
licenseType: Free of charge for all users and uses

## General comment
Excavated soil undergoes pre-treatment such as crushing and screening, pH and moisture adjustment, and then adds 5 ‰ to 8 ‰ sodium persulfate for chemical oxidation

## Geography
The polluted site is located in Zibo City, Shandong Province, covering a total area of approximately 87800 m2.

## Technology and included processes
After ectopic chemical oxidation remediation, the average cyanide content in 3-10 m polluted soil decreased from 13.77 mg/kg to 0.02 mg/kg, and the pollutant removal rate was 99.85%

## Technical purpose
The described industrial process is intended for the remediation of cyanide-contaminated soil at a specific site in Zibo City, Shandong Province. The soil, after excavation, undergos preparatory treatments such as crushing, screening, pH adjustment, and moisture regulation. This is followed by a chemical oxidation process using sodium persulfate to degrade the cyanide. This process is specifically designed for ex-situ soil remediation where the contaminated soil is treated in a controlled environment away from the original location, such as a sealed greenhouse, to achieve a high rate of pollutant removal.

## Reference product
- Remediated soil: 59922; measured

## Inputs
All rows: measured
- Diesel,Diesel: 29.8793
  使用挖掘机搭载ALLU斗进行土壤的预处理和药剂混合工作，该过程的柴油消耗量
- Diesel,Diesel: 0.26858
  运输环节柴油消耗，主要为设备及材料入场环节的运输过程
- Tap Water: 2150
- quicklime: 466540
  氧化钙消耗量
- sodium hydroxide: 40000
  氢氧化钠消耗量
- Sodium persulfate: 275750
  过硫酸钠消耗量
- contaminated soil: 59922
  开挖出的污染土壤，暂存于密闭负压大棚内，待进行氧化处置

## Outputs
- Soil Sample: 198; measured
  修复后土壤自检，按每500m3一个样品进行土壤样品的取样以及氰化物含量的检测
- Exhaust gas: 1; measured
  没有单独计算棚内土壤修复过程中废气产生量，仅计算了用于尾气处置的材料消耗量，因此采用项为计量单位

## Use advice
Users of this Life Cycle Assessment data should note that the dataset is specific to the process of soil ex-situ remediation via chemical oxidation using sodium persulfate for cyanide pollution. The information relates to the treatment of soil from a polluted site in Zibo City, Shandong Province. Therefore, its applicability might be limited to similar contexts of cyanide-contaminated soil remediation. The dataset includes the consumption of diesel fuel for the operation of excavation machinery with an ALLU bucket, production and transportation of oxidants, and tap water usage for soil moisture adjustment and preparation of chemical solutions. When modeling this process in LCA software, users should ensure to account for these inputs and adjust boundaries if the data is used in broader or different contexts. The high pollutant removal efficiency reported should be scrutinized in alternative applications, as it may vary with soil composition and contamination levels.

## Review details
Inventory: The internal review was done by several iteration steps concerning raw data validation, raw data documentation, representativity, completeness and consistency of modelling with regard to ISO 14040 and 14044.

## Data sources
- 桑春晖,杨欣桐,张红振等. 氰化物污染土壤修复工程环境足迹评估方法和案例研究 [J/OL]. 中国环境科学, 1-11[2024-02-11].
