# Soil Remediation;Isotopic Remediation;Bio-pile;Excavation;Excavated Soil

Dataset: ILCD process, Unit process, single operation
Geography: IT
Reference year: 2018
Classification: Unit processes / Other Services / Repair and maintenance
Generated by: Wang Ning, wang_ning@caep.org.cn
Owner: Tiangong LCI Data Working Group
Review: Dependent internal review by Tiangong LCI Data Working Group
Amounts: no units in this file; such an amount is in the reference unit of its flow, which a separate flow dataset defines
copyright: false
licenseType: Free of charge for all users and uses

## General comment
Consumption of diesel for excavation of contaminated soil

## Technical purpose
This data set represents the excavation of contaminated soil for the purpose of soil remediation, specifically bio-pile remediation which is a type of ex-situ treatment. The process involves the use of diesel-powered machinery to excavate contaminated soil for subsequent biological treatment in a controlled pile environment.

## Reference product
- Excavated soil,Excavated soil: 600000; measured

## Inputs
- Diesel,Diesel: 0.5; measured

## Use advice
When using this data set, it's important to ensure that the scope of the Life Cycle Assessment appropriately reflects the use of diesel for excavation as part of the soil remediation process. Users should include all related upstream processes for the provision of diesel as well as the direct emissions from the excavation machinery. Special consideration should be made for the system boundary definition to include transportation of the excavated soil, if applicable.

## Review details
Inventory: The internal review was done by several iteration steps concerning raw data validation, raw data documentation, representativity, completeness and consistency of modelling with regard to ISO 14040 and 14044.

## Data sources
- D’Imporzano, G. et al. OPTIMIZING BIOREMEDIATION OF HYDROCARBON POLLUTED SOIL BY LIFE CYCLE ASSESSMENT (LCA) APPROACH. Environmental Engineering and Management Journal (2019).
