# Alkali recovery ; Chemical wood pulp ; Biomass gas ; Lime kiln ; All sizes; NESPS2 / 碱回收 ; 化学木浆 ; 生物质气 ; 石灰窑 ; 所有规模 ; 全国第二次污染普查数据

Dataset: ILCD process, Unit process, single operation
Geography: CN
Reference year: 2019
Classification: Reference Parameters / Energy carriers and technologies / Renewable fuels
Generated by: The data was created by the Office of the Second National Pollution Source Census of the Ministry of Ecology and Environment, and the data was organized by the TianGong Plan team for ILCD format / 生态环境部第二次全国污染源普查工作办公室创建数据，天工计划团队常慧敏整理数据为ILCD格式
Owner: Tiangong LCI Data Working Group / 天工LCI数据工作小组
Review: Dependent internal review by Tiangong LCI Data Working Group / 天工LCI数据工作小组
Amounts: no units in this file; such an amount is in the reference unit of its flow, which a separate flow dataset defines
copyright: false
licenseType: Free of charge for all users and uses

## General comment
the Technical of end-of-pipe management technology for pollution volatile organic compoundis/，The formula for calculating the actual operation rate (k-value) of the end-of-pipe treatment facility is /

## Technical purpose
本工业过程旨在用于制浆造纸行业，特别是化学木浆生产中的碱回收。所有规模的石灰窑使用生物质气作为燃料。该过程包括用于减少诸如二氧化硫和颗粒物 (PM2.5 - PM10) 等污染物的管末管理技术。污染控制装置包括板式和管式静电除尘器、电袋复合式除尘器和布袋过滤器来去除颗粒物，其技术效率高达99.9%的静电和电袋除尘器，以及布袋过滤器的99.74%。对于氮氧化物和挥发性有机化合物的控制技术并未详细说明。该过程配置适用于希望遵守环境法规以最小化空气污染的设施。

## Reference product
- Wood Pulp: 1000; calculated
  源文件中描述为为化学木浆，此处对其进行了匹配工作，将其匹配到LCAflow库里面相最符合的流

## Outputs
All rows: calculated
- sulfur dioxide: 0.00243
  the Technical of end-of-pipe management technology for pollution sulfur dioxideis/，The formula for calculating the actual operation rate (k-value) of the end-of-pipe treatment facility is k = operating time of waste gas treatment equipment (hours/year) / normal production time (hours/year)
  污染物指标二氧化硫的末端治理技术是/。原文件中描述污染物类别为废气，污染物指标为二氧化硫，此处对其进行了匹配工作，将其匹配到LCAflow库里面相最符合的流
- particles (PM2.5 - PM10): 0.00824
  the Technical of end-of-pipe management technology for pollution particles (PM2.5 - PM10)isElectric-bag composite precipitator，Its Technical efficiency of end-of-pipe management99.9，The formula for calculating the actual operation rate (k-value) of the end-of-pipe treatment facility is k = operating time of waste gas treatment equipment (hours/year) / normal production time (hours/year)
  污染物指标颗粒物的末端治理技术是电袋组合，其效率为99.9，末端治理设施实际运行率（k值）计算公式为k=环保设施实际运行小时数（小时）/环保设施应运行小时数（小时）。原文件中描述污染物类别为废气，污染物指标为颗粒物，此处对其进行了匹配工作，将其匹配到LCAflow库里面相最符合的流
- particles (PM2.5 - PM10): 0.00824
  the Technical of end-of-pipe management technology for pollution particles (PM2.5 - PM10)isPlate type, tube type electrostatic precipitator，Its Technical efficiency of end-of-pipe management99.9，The formula for calculating the actual operation rate (k-value) of the end-of-pipe treatment facility is k = operating time of waste gas treatment equipment (hours/year) / normal production time (hours/year)
  污染物指标颗粒物的末端治理技术是板式、管式电除尘，其效率为99.9，末端治理设施实际运行率（k值）计算公式为k=环保设施实际运行小时数（小时）/环保设施应运行小时数（小时）。原文件中描述污染物类别为废气，污染物指标为颗粒物，此处对其进行了匹配工作，将其匹配到LCAflow库里面相最符合的流
- particles (PM2.5 - PM10): 0.021424
  the Technical of end-of-pipe management technology for pollution particles (PM2.5 - PM10)isBag filter，Its Technical efficiency of end-of-pipe management99.74，The formula for calculating the actual operation rate (k-value) of the end-of-pipe treatment facility is k = operating time of waste gas treatment equipment (hours/year) / normal production time (hours/year)
  污染物指标颗粒物的末端治理技术是袋式除尘，其效率为99.74，末端治理设施实际运行率（k值）计算公式为k=环保设施实际运行小时数（小时）/环保设施应运行小时数（小时）。原文件中描述污染物类别为废气，污染物指标为颗粒物，此处对其进行了匹配工作，将其匹配到LCAflow库里面相最符合的流
- Nitrogen oxides: 0.129
  the Technical of end-of-pipe management technology for pollution Nitrogen oxidesis/，The formula for calculating the actual operation rate (k-value) of the end-of-pipe treatment facility is /
  污染物指标氮氧化物的末端治理技术是/。原文件中描述污染物类别为废气，污染物指标为氮氧化物，此处对其进行了匹配工作，将其匹配到LCAflow库里面相最符合的流
- Exhaust gas: 1630
  the Technical of end-of-pipe management technology for pollution Exhaust gasis/，The formula for calculating the actual operation rate (k-value) of the end-of-pipe treatment facility is /
  污染物指标工业废气量的末端治理技术是/。原文件中描述污染物类别为废气，污染物指标为工业废气量，此处对其进行了匹配工作，将其匹配到LCAflow库里面相最符合的流
- volatile organic compound: 3.15
  the Technical of end-of-pipe management technology for pollution volatile organic compoundis/，The formula for calculating the actual operation rate (k-value) of the end-of-pipe treatment facility is /
  污染物指标挥发性有机物的末端治理技术是/。原文件中描述污染物类别为废气，污染物指标为挥发性有机物，此处对其进行了匹配工作，将其匹配到LCAflow库里面相最符合的流

## Use advice
This dataset is derived from the Pollution Source Census Report and contains information on pollution emissions and related products. However, it does not include data on energy or chemical consumption, nor does it provide information on waste or co-product generation. When utilizing this dataset, please supplement the missing data based on actual conditions before use
该数据集来源于污染源普查报告，包含污染物排放及相关产品信息，但不包含能源或化学品消耗数据，也不提供废弃物或共生产物产生信息。在使用该数据集时，请根据实际情况补充缺失数据后再使用。

## Review details
Inventory: The internal review was done by several iteration steps concerning raw data validation, raw data documentation, representativity, completeness and consistency of modelling with regard to ISO 14040 and 14044.
清单： 内部审查通过几个迭代步骤完成，涉及原始数据验证、原始数据记录、代表性、完整性、与 ISO 14040 和 14044 有关的建模的一致性。

## Data sources
- 第二次全国污染源普查产排污核算系数手册（试用版）,二级代码22,三级代码221.0,四级代码2211文件，在完整版文件中第486页
