# Oyster culture ; Adult oyster ; Longline-culture;Single-celled algae feeding

Dataset: ILCD process, Unit process, black box
Geography: FJ-CN
Reference year: 2021
Valid until: 2021
Classification: Unit processes / Materials production / Food and renewable raw materials
Functional unit: 1 tonne of fresh oyster
LCI method principle: Attributional
LCI method approaches: Allocation
Generated by: Kangni Wu, wukangni@xmu.stu.edu.cn
Owner: Tiangong LCI Data Working Group
Review: Dependent internal review by Tiangong LCI Data Working Group
Amounts: no units in this file; such an amount is in the reference unit of its flow, which a separate flow dataset defines
copyright: false
licenseType: Free of charge for all users and uses

## General comment
The scope of this carbon footprint is from ‘cradle to gate’, including all life cycle stages of the Pacific oyster until they were transported to the market for distribution and detail farming stages are showed in Fig. 1. Emissions from building and production of capital equipment such as vessels, factory, machinery and their maintenance are not considered in this study. Material input were divided by service time to average for each round of farming.

## Geography
The study is located in Fujian Province, and the data collection time will be from May to August 2021, and the collection time will be 6 seedlings in Fujian province and 3-10 farmers in each province. After collection, the data is transferred to a single database so it can be interpreted.

## Time period
The literature data are from the survey of seedling data in Fujian Province and the survey of farmers in each province from May to August 2021

## Technology and included processes
Technology of long line culture of oyster in Marine area. Longline culture is suitable for offshore culture areas with water depth above 4m at the lowest spring tide; Moderate wind and tide. The rope floating raft is composed of polyethylene rope, 80 m×4 m is a breeding monomer, and a hoisting rope is hung longitudinally-every 1.5 m ~ 1.7 m.

## Technical purpose
This data set describes the lifecycle of Pacific oysters, specifically cultured using the longline method with single-celled algae feeding, intended for human consumption. The oysters are farmed until they reach adulthood and are then transported to the market for distribution. This is a sustainable aquaculture process suitable for the seafood industry, particularly for markets requiring fresh, adult Pacific oysters.

## Model description
No specific instructions are seen

## Reference product
- Oyster: 1000; measured

## Inputs
All rows: measured
- Electricity: 5.148, 22.32 (2 entries)
- Glass (formed & finished): 0.0004
- polymethyl methacrylate (PMMA) beads: 0.008
  acrylic bucket
- polyethylene terephthalate fibres (PET): 0.01, 4 (2 entries)
- Sodium hypochlorite: 0.04, 0.07 (2 entries)
- sodium nitrate: 0.03
- sodium silicate: 0.0072
- ferric citrate: 0.0014
- sodium dihydrogen phosphate: 0.0016
- Coke: 1.56
  coke
- Diesel: 3.35, 0.33 (2 entries)
- nylon 66 GF 30 compound (PA 66 GF 30): 2.4
  Nylon rope
- polypropylene fibres (PP): 1.67

## Data selection and combination
The data were derived from field research, and the collected data were transferred to a single database for their interpretation

## Sampling procedure
The data include primary data from flue use, electricity use, and raw material input, as well as a survey of seedling data in Fujian province from May to August 2021 and a survey of farmers in each province

## Use advice
When using this data set for Life Cycle Assessment (LCA), the user must note that it covers the cradle-to-gate stages of Pacific oyster farming, excluding any processes beyond market distribution. Capital investments such as ships, factories, and machinery, as well as their maintenance, have been omitted from the study. To apply this data, allocate the material inputs per round of farming based on service time for more accurate impact assessment. This data is specific to the Fujian province and reflects practices within that region; caution should be used when extrapolating to different geographical areas or contexts.

## Review details
Inventory: The internal review was done by several iteration steps concerning raw data validation, raw data documentation, representativity, completeness and consistency of modelling with regard to ISO 14040 and 14044.

## Data sources
- Sun, L., Feng, J.-C. & Zhang, S. The Carbon Footprint of Pacific Oyster Farming in China. 19, (2021).
