# Pyraclostrobin ; Dicyclopentadiene, 2chloro-5chloromethylpyridine ; Dicyclopentadiene method ; All sizes; NESPS2 / 吡虫啉 ; 双环戊二烯、2氯-5氯甲基吡啶 ; 双环戊二烯法 ; 所有规模 ; 全国第二次污染普查数据

Dataset: ILCD process, Unit process, single operation
Geography: CN
Reference year: 2019
Classification: Reference Parameters / Materials production / Organic chemicals
Generated by: The data was created by the Office of the Second National Pollution Source Census of the Ministry of Ecology and Environment, and the data was organized by the TianGong Plan team for ILCD format / 生态环境部第二次全国污染源普查工作办公室创建数据，天工计划团队常慧敏整理数据为ILCD格式
Owner: Tiangong LCI Data Working Group / 天工LCI数据工作小组
Review: Dependent internal review by Tiangong LCI Data Working Group / 天工LCI数据工作小组
Amounts: no units in this file; such an amount is in the reference unit of its flow, which a separate flow dataset defines
copyright: false
licenseType: Free of charge for all users and uses

## General comment
the Technical of end-of-pipe management technology for pollution Ammonia NitrogenisRedox process + electrolysis + chemical coagulation method + anaerobic hydrolysis + shaped anaerobic reactor + A/O process，Its Technical efficiency of end-of-pipe management72

## Technical purpose
拟除虫菊酯和双环戊二烯以及采用双环戊二烯法生产的2氯-5氯甲基吡啶是应用于各种规模的农业和病虫害控制产品生产过程中的化学物质。这些化学品特别用于合成高级杀菌剂和杀虫剂。此外，所描述的尾端处理技术的技术规格被设计为有效处理废水污染。报告的方法和效率表明它们适用于处理高浓度化学需氧量、氨氮、有机结合氮和总磷污染物的工业设施。

## Reference product
- Imidacloprid: 1000; calculated
  源文件中描述为为吡虫啉，此处对其进行了匹配工作，将其匹配到LCAflow库里面相最符合的流，污染物指标备注为工业废水量

## Outputs
All rows: calculated
- Waste water: 3000
  the Technical of end-of-pipe management technology for pollution Waste wateris/，Its Technical efficiency of end-of-pipe management0
  污染物指标工业废水量的末端治理技术是/，其效率为0。原文件中描述污染物类别为废水，污染物指标为工业废水量，此处对其进行了匹配工作，将其匹配到LCAflow库里面相最符合的流，污染物指标备注为工业废水量
- phosphorus, total: 0.00526
  the Technical of end-of-pipe management technology for pollution phosphorus, totalis(2500 others) Incineration，Its Technical efficiency of end-of-pipe management99.9
  污染物指标总磷的末端治理技术是（2500其他）焚烧，其效率为99.9，末端治理设施实际运行率（k值）计算公式为k=治理设施耗电量（千瓦时）/（治理设施运行时数（小时）*治理设施额定功率(千瓦)）。原文件中描述污染物类别为废水，污染物指标为总磷，此处对其进行了匹配工作，将其匹配到LCAflow库里面相最符合的流，污染物指标备注为总磷
- Ammonia Nitrogen: 0.0385
  the Technical of end-of-pipe management technology for pollution Ammonia Nitrogenis(2500 others) Incineration，Its Technical efficiency of end-of-pipe management99.9
  污染物指标氨氮的末端治理技术是（2500其他）焚烧，其效率为99.9，末端治理设施实际运行率（k值）计算公式为k=治理设施耗电量（千瓦时）/（治理设施运行时数（小时）*治理设施额定功率(千瓦)）。原文件中描述污染物类别为废水，污染物指标为氨氮，此处对其进行了匹配工作，将其匹配到LCAflow库里面相最符合的流，污染物指标备注为氨氮
- Nitrogen, organic bound: 0.138
  the Technical of end-of-pipe management technology for pollution Nitrogen, organic boundis(2500 others) Incineration，Its Technical efficiency of end-of-pipe management99.9
  污染物指标总氮的末端治理技术是（2500其他）焚烧，其效率为99.9，末端治理设施实际运行率（k值）计算公式为k=治理设施耗电量（千瓦时）/（治理设施运行时数（小时）*治理设施额定功率(千瓦)）。原文件中描述污染物类别为废水，污染物指标为总氮，此处对其进行了匹配工作，将其匹配到LCAflow库里面相最符合的流，污染物指标备注为总氮
- phosphorus, total: 0.263
  the Technical of end-of-pipe management technology for pollution phosphorus, totalisRedox process + electrolysis + chemical coagulation method + anaerobic hydrolysis + shaped anaerobic reactor + A/O process，Its Technical efficiency of end-of-pipe management95
  污染物指标总磷的末端治理技术是氧化还原法+电解法+化学混凝法+厌氧水解类+定型厌氧反应器类+A/O工艺，其效率为95，末端治理设施实际运行率（k值）计算公式为k=治理设施耗电量（千瓦时）/（治理设施运行时数（小时）*治理设施额定功率(千瓦)）。原文件中描述污染物类别为废水，污染物指标为总磷，此处对其进行了匹配工作，将其匹配到LCAflow库里面相最符合的流，污染物指标备注为总磷
- chemical oxygen demand: 0.922
  the Technical of end-of-pipe management technology for pollution chemical oxygen demandis(2500 others) Incineration，Its Technical efficiency of end-of-pipe management99.9
  污染物指标化学需氧量的末端治理技术是（2500其他）焚烧，其效率为99.9，末端治理设施实际运行率（k值）计算公式为k=治理设施耗电量（千瓦时）/（治理设施运行时数（小时）*治理设施额定功率(千瓦)）。原文件中描述污染物类别为废水，污染物指标为化学需氧量，此处对其进行了匹配工作，将其匹配到LCAflow库里面相最符合的流，污染物指标备注为化学需氧量
- Nitrogen, organic bound: 2.76
  the Technical of end-of-pipe management technology for pollution Nitrogen, organic boundisRedox process + electrolysis + chemical coagulation method + anaerobic hydrolysis + shaped anaerobic reactor + A/O process，Its Technical efficiency of end-of-pipe management98
  污染物指标总氮的末端治理技术是氧化还原法+电解法+化学混凝法+厌氧水解类+定型厌氧反应器类+A/O工艺，其效率为98，末端治理设施实际运行率（k值）计算公式为k=治理设施耗电量（千瓦时）/（治理设施运行时数（小时）*治理设施额定功率(千瓦)）。原文件中描述污染物类别为废水，污染物指标为总氮，此处对其进行了匹配工作，将其匹配到LCAflow库里面相最符合的流，污染物指标备注为总氮
- chemical oxygen demand: 5.532
  the Technical of end-of-pipe management technology for pollution chemical oxygen demandisRedox process + electrolysis + chemical coagulation method + anaerobic hydrolysis + shaped anaerobic reactor + A/O process，Its Technical efficiency of end-of-pipe management99.4
  污染物指标化学需氧量的末端治理技术是氧化还原法+电解法+化学混凝法+厌氧水解类+定型厌氧反应器类+A/O工艺，其效率为99.4，末端治理设施实际运行率（k值）计算公式为k=治理设施耗电量（千瓦时）/（治理设施运行时数（小时）*治理设施额定功率(千瓦)）。原文件中描述污染物类别为废水，污染物指标为化学需氧量，此处对其进行了匹配工作，将其匹配到LCAflow库里面相最符合的流，污染物指标备注为化学需氧量
- Ammonia Nitrogen: 10.78
  the Technical of end-of-pipe management technology for pollution Ammonia NitrogenisRedox process + electrolysis + chemical coagulation method + anaerobic hydrolysis + shaped anaerobic reactor + A/O process，Its Technical efficiency of end-of-pipe management72
  污染物指标氨氮的末端治理技术是氧化还原法+电解法+化学混凝法+厌氧水解类+定型厌氧反应器类+A/O工艺，其效率为72，末端治理设施实际运行率（k值）计算公式为k=治理设施耗电量（千瓦时）/（治理设施运行时数（小时）*治理设施额定功率(千瓦)）。原文件中描述污染物类别为废水，污染物指标为氨氮，此处对其进行了匹配工作，将其匹配到LCAflow库里面相最符合的流，污染物指标备注为氨氮

## Use advice
This dataset is derived from the Pollution Source Census Report and contains information on pollution emissions and related products. However, it does not include data on energy or chemical consumption, nor does it provide information on waste or co-product generation. When utilizing this dataset, please supplement the missing data based on actual conditions before use
该数据集来源于污染源普查报告，包含污染物排放及相关产品信息，但不包含能源或化学品消耗数据，也不提供废弃物或共生产物产生信息。在使用该数据集时，请根据实际情况补充缺失数据后再使用。

## Review details
Inventory: The internal review was done by several iteration steps concerning raw data validation, raw data documentation, representativity, completeness and consistency of modelling with regard to ISO 14040 and 14044.
清单： 内部审查通过几个迭代步骤完成，涉及原始数据验证、原始数据记录、代表性、完整性、与 ISO 14040 和 14044 有关的建模的一致性。

## Data sources
- 第二次全国污染源普查产排污核算系数手册（试用版）,二级代码26,三级代码263.0文件，在完整版文件中第2936页
