# Milk production ; transportation stage

Dataset: ILCD process, Unit process, single operation
Geography: HLJ-CN
Reference year: 2012
Classification: Unit processes / Transport services / Other transport
Functional unit: In this study, the functional unit was set to 1 ton FPCM (fat-protein corrected milk).
Generated by: Rui Yang, 1632707028@qq.com
Owner: Tiangong LCI Data Working Group
Review: Dependent internal review by Tiangong LCI Data Working Group
Amounts: no units in this file; such an amount is in the reference unit of its flow, which a separate flow dataset defines
copyright: false
licenseType: Free of charge for all users and uses

## General comment
In the dairy farm production process, it is assumed that the word material, word material raw materials and fertilizer are mainly transported by provincial roads

## Geography
In this paper, LCA method was used to assess the environmental impact of dairy farm production system in Heilongjiang Province.

## Technology and included processes
In the process of road transportation, environmental pollution mainly comes from vehicle exhaust emissions, due to the use of ready-made road transportation system, the environmental impact of road construction related to road transportation is not considered here, and the impact of surface soil and vegetation damage caused by road construction is not considered, only the pollution emissions in the process of road transportation is considered. 80% of the transportation vocabulary is gasoline engine, and the remaining 20% is diesel engine.

## Technical purpose
The industrial process data pertains to the dairy farm production focusing on the environmental impacts of milk transportation stage within Heilongjiang province. This data is relevant for evaluating the use of provincial road transport systems in the dairy industry, considering specific scenarios where only the pollution emissions during transportation are of interest. It can be applied to calculations of the environmental footprint of milk distribution, especially for the dairy farms accounting for the mixture of gasoline (80%) and diesel-engine (20%) vehicles.

## Reference product
- feed: 1; estimated
  假设运输过程中没有饲料的损耗

## Inputs
- feed: 1; measured
- Gasoline (regular): 0.01701; measured

## Outputs
- carbon monoxide (fossil): 0.0005156; measured
- nitrogen, total (excluding N2): 3.63e-5; measured
  1 NOx
- sulfur dioxide: 3.63e-5; measured
- carbon dioxide (fossil),carbon dioxide (fossil): 0.04754; measured

## Use advice
Users should address the transportation stage using this LCA data for milk production while focusing on the emissions exclusively from vehicle exhaust without considering other potential impacts such as infrastructure construction. While modeling the environmental impacts, users should apply the data only to scenarios involving road transportation of milk-related materials and should ensure the correct proportioning of gasoline and diesel-engine vehicles. Since the functional unit is 1 ton FPCM, calculations and comparisons should be standardized to this unit. Pay attention to any updates in regional transportation policies or fuel types which may affect emissions profiles.

## Review details
Inventory: The internal review was done by several iteration steps concerning raw data validation, raw data documentation, representativity, completeness and consistency of modelling with regard to ISO 14040 and 14044.

## Data sources
- 曹正纲. 黑龙江省奶牛场生命周期评价. (东北农业大学, 2012).
