# Aluminum Recycling ; Recycled Aluminum Ingots ; Scrap Aluminum ; 2017

Dataset: ILCD process, Unit process, single operation
Geography: CN
Reference year: 2021
Classification: Unit processes / Materials production / Metals and semimetals
Generated by: Zimeng Cai, caizm6178@163.com
Owner: Tiangong LCI Data Working Group
Review: Dependent internal review by Tiangong LCI Data Working Group
Amounts: no units in this file; such an amount is in the reference unit of its flow, which a separate flow dataset defines
copyright: false
licenseType: Free of charge for all users and uses

## General comment
The recycled aluminum ingots produced from this industrial process are intended for use in various sectors where aluminum is required. These ingots can be used to manufacture automotive parts, construction materials, packaging, and consumer electronics. The high-purity recycled aluminum is suitable for applications that demand metal with less impurity, whereas the technical quality recycled aluminum might be utilized for less critical applications in large-scale manufacturing.

## Time period
Date of publication

## Reference product
- secondary aluminium ingot: 1000; missing unimportant
  ingot

## Inputs
- electricity, high voltage, aluminium industry: 1148.4; missing unimportant
  electricity
- aluminium scrap, unspecified: 1180; missing unimportant
  aluminum scrap

## Data selection and combination
The data in this study refers to the LCA data of PA, SA, electricity, and other background data. The PA data were obtained from statistical data sources, and the SA data were mainly obtained from the literatures. The background data were mainly derived from the Chinese localization LCA database CAS RCEES 2018, which was established by the Research Center for Eco-Environmental Sciences, Chinese Academy of Sciences and covers LCA data for energy, materials, transportation, waste management etc.

## Use advice
When utilizing this LCA data for recycled aluminum ingots, it is crucial to consider the year of publication and the regional context of the data. The LCA data should be specifically applied to processes and products relevant to the Chinese market, as it is sourced from the CAS RCEES 2018 database. Users must take into account the technological applicability limits such as the type of scrap aluminum input and the efficiency of the recycling process. Moreover, users should be aware of the methodological assumptions, such as the inclusion or exclusion of ancillary material recycling and any credits from byproducts or waste management strategies inherent in the process.

## Review details
Inventory: The internal review was done by several iteration steps concerning raw data validation, raw data documentation, representativity, completeness and consistency of modelling with regard to ISO 14040 and 14044.

## Data sources
- Ding, N., Liu, N., Lu, B. & Yang, J. Life cycle greenhouse gas emissions of aluminum based on regional industrial transfer in China. J. Ind. Ecol. 25, 1657–1672 (2021).
