# Soil remediation ; In-situ remediation ; Phytoextraction remediation ; Engineering implementation ; Soil treatment

Dataset: ILCD process, Unit process, single operation
Geography: IT
Classification: Other Services / Repair and maintenance
Generated by: Xiao Meng, xiaomeng@mail
Owner: Tiangong LCI Data Working Group
Review: Dependent internal review by Tiangong LCI Data Working Group
Amounts: no units in this file; such an amount is in the reference unit of its flow, which a separate flow dataset defines
licenseType: Free of charge for all users and uses

## General comment
Excavating the existing asphalt on the site

## Geography
The site taken as a reference for the remediation is an area of 712 m2 located in a disused industrial district of Tuscany (Italy), in the past subjected to various productive activities that led to contamination with various metals, some of which potentially toxic such as lead (Pb), arsenic (As) and thallium (Tl). As it is a “site of national interest”, its exact location is considered confidential and cannot be disclosed.

## Technical purpose
This dataset describes a soil remediation process which involves in-situ phytoextraction to treat contaminated land. The primary application of this data is intended for environmental engineers and practitioners involved in land redevelopment, particularly in cases of heavy metal contamination such as lead (Pb), arsenic (As), and thallium (Tl). The process includes the excavation of existing asphalt and the implementation of phytoextraction techniques over an area of 712 m2. This remediation approach can be referenced for similar projects in industrial districts with a need for soil treatment and stabilization.

## Reference product
- Excavated asphalt: 142.4; measured
  场地处理过程开挖的沥青

## Inputs
- Diesel: 19.366; measured

## Use advice
When applying this dataset for soil remediation projects, users should ensure that the site conditions and contamination profiles closely match those described in the dataset. The site size, contaminant types, and concentration levels are critical parameters to be considered. Also, it's imperative to maintain confidentiality for any site designated as a 'site of national interest', and comply with local regulations regarding environmental remediation. Since this data pertains to a specific location with a unique contamination history, extrapolating results to another site should be done cautiously and may require consultation with environmental remediation experts.

## Review details
Inventory: The internal review was done by several iteration steps concerning raw data validation, raw data documentation, representativity, completeness and consistency of modelling with regard to ISO 14040 and 14044.

## Data sources
- Vocciante, M., De Folly D’Auris, A., Franchi, E., Petruzzelli, G. & Ferro, S. CO2 footprint analysis of consolidated and innovative technologies in remediation activities. J Clean Prod 297, 126723 (2021).
