# Wine ; Grapes ; Liquid fermentation method (juicing, degumming, precipitation, fermentation, pouring, storage, filling) ; greater than or equal to5000 kl/a; NESPS2 / 葡萄酒 ; 葡萄 ; 液态发酵法（榨汁、脱胶、沉淀、发酵、倒罐、储存、灌装） ; 大于等于0.5万千升/年 ; 全国第二次污染普查数据

Dataset: ILCD process, Unit process, single operation
Geography: CN
Reference year: 2019
Classification: Reference Parameters / Materials production / Food and renewable raw materials
Generated by: The data was created by the Office of the Second National Pollution Source Census of the Ministry of Ecology and Environment, and the data was organized by the TianGong Plan team for ILCD format / 生态环境部第二次全国污染源普查工作办公室创建数据，天工计划团队常慧敏整理数据为ILCD格式
Owner: Tiangong LCI Data Working Group / 天工LCI数据工作小组
Review: Dependent internal review by Tiangong LCI Data Working Group / 天工LCI数据工作小组
Amounts: no units in this file; such an amount is in the reference unit of its flow, which a separate flow dataset defines
copyright: false
licenseType: Free of charge for all users and uses

## General comment
the Technical of end-of-pipe management technology for pollution chemical oxygen demandisPhysicochemical method + two-stage aerobic biological treatment method + chemical method，Its Technical efficiency of end-of-pipe management80

## Technical purpose
此描述的工艺属于葡萄酒行业，专注于使用液态发酵法大规模生产葡萄酒。该工艺年处理能力达到或超过5000千升。所加工的葡萄汁预期可用于生产多种类型的葡萄酒。该数据集还包括有关处理废水污染物的末端处理技术信息，比如化学需氧量、氨氮、有机结合态氮和总磷。治疗方式结合了物理化学方法、两阶段好氧生物处理法和化学方法，达到不同污染物的技术效率。这些效率对于确保葡萄酒生产过程的环境影响得到有效管理至关重要。

## Reference product
- Wine: 1; calculated
  源文件中描述为为葡萄酒，此处对其进行了匹配工作，将其匹配到LCAflow库里面相最符合的流，污染物指标备注为工业废水量

## Outputs
All rows: calculated
- Waste water: 4000
  the Technical of end-of-pipe management technology for pollution Waste wateris/，Its Technical efficiency of end-of-pipe management0
  污染物指标工业废水量的末端治理技术是/，其效率为0，末端治理设施实际运行率（k值）计算公式为/。原文件中描述污染物类别为废水，污染物指标为工业废水量，此处对其进行了匹配工作，将其匹配到LCAflow库里面相最符合的流，污染物指标备注为工业废水量
- phosphorus, total: 0.0315
  the Technical of end-of-pipe management technology for pollution phosphorus, totalisPhysicochemical method + two-stage aerobic biological treatment method + chemical method，Its Technical efficiency of end-of-pipe management91
  污染物指标总磷的末端治理技术是物化法+两段好氧生物处理法+化学法，其效率为91，末端治理设施实际运行率（k值）计算公式为k=污水末端治理设施运行时间（小时）/正常生产时间（小时）。原文件中描述污染物类别为废水，污染物指标为总磷，此处对其进行了匹配工作，将其匹配到LCAflow库里面相最符合的流，污染物指标备注为总磷
- Ammonia Nitrogen: 0.06
  the Technical of end-of-pipe management technology for pollution Ammonia NitrogenisPhysicochemical method + two-stage aerobic biological treatment method + chemical method，Its Technical efficiency of end-of-pipe management50
  污染物指标氨氮的末端治理技术是物化法+两段好氧生物处理法+化学法，其效率为50，末端治理设施实际运行率（k值）计算公式为k=污水末端治理设施运行时间（小时）/正常生产时间（小时）。原文件中描述污染物类别为废水，污染物指标为氨氮，此处对其进行了匹配工作，将其匹配到LCAflow库里面相最符合的流，污染物指标备注为氨氮
- Nitrogen, organic bound: 0.18
  the Technical of end-of-pipe management technology for pollution Nitrogen, organic boundisPhysicochemical method + two-stage aerobic biological treatment method + chemical method，Its Technical efficiency of end-of-pipe management85
  污染物指标总氮的末端治理技术是物化法+两段好氧生物处理法+化学法，其效率为85，末端治理设施实际运行率（k值）计算公式为k=污水末端治理设施运行时间（小时）/正常生产时间（小时）。原文件中描述污染物类别为废水，污染物指标为总氮，此处对其进行了匹配工作，将其匹配到LCAflow库里面相最符合的流，污染物指标备注为总氮
- chemical oxygen demand: 2
  the Technical of end-of-pipe management technology for pollution chemical oxygen demandisPhysicochemical method + two-stage aerobic biological treatment method + chemical method，Its Technical efficiency of end-of-pipe management80
  污染物指标化学需氧量的末端治理技术是物化法+两段好氧生物处理法+化学法，其效率为80，末端治理设施实际运行率（k值）计算公式为k=污水末端治理设施运行时间（小时）/正常生产时间（小时）。原文件中描述污染物类别为废水，污染物指标为化学需氧量，此处对其进行了匹配工作，将其匹配到LCAflow库里面相最符合的流，污染物指标备注为化学需氧量

## Use advice
This dataset is derived from the Pollution Source Census Report and contains information on pollution emissions and related products. However, it does not include data on energy or chemical consumption, nor does it provide information on waste or co-product generation. When utilizing this dataset, please supplement the missing data based on actual conditions before use
该数据集来源于污染源普查报告，包含污染物排放及相关产品信息，但不包含能源或化学品消耗数据，也不提供废弃物或共生产物产生信息。在使用该数据集时，请根据实际情况补充缺失数据后再使用。

## Review details
Inventory: The internal review was done by several iteration steps concerning raw data validation, raw data documentation, representativity, completeness and consistency of modelling with regard to ISO 14040 and 14044.
清单： 内部审查通过几个迭代步骤完成，涉及原始数据验证、原始数据记录、代表性、完整性、与 ISO 14040 和 14044 有关的建模的一致性。

## Data sources
- 第二次全国污染源普查产排污核算系数手册（试用版）,二级代码15,四级代码1515文件，在完整版文件中第4067页
