# Naphtha fraction, fuel oil, diesel fraction, bitumen, gasoline fraction, coke ; Coal tar, hydrogen ; Pre-fractionation - fixed bed hydrogenation process ; All sizes; NESPS2 / 石脑油组分、燃料油、柴油组分、沥青、汽油组分、焦炭 ; 煤焦油、氢气 ; 预分馏-固定床加氢工艺 ; 所有规模 ; 全国第二次污染普查数据

Dataset: ILCD process, Unit process, single operation
Geography: CN
Reference year: 2019
Classification: Reference Parameters / Energy carriers and technologies / Crude oil based fuels
Generated by: The data was created by the Office of the Second National Pollution Source Census of the Ministry of Ecology and Environment, and the data was organized by the TianGong Plan team for ILCD format / 生态环境部第二次全国污染源普查工作办公室创建数据，天工计划团队常慧敏整理数据为ILCD格式
Owner: Tiangong LCI Data Working Group / 天工LCI数据工作小组
Review: Dependent internal review by Tiangong LCI Data Working Group / 天工LCI数据工作小组
Amounts: no units in this file; such an amount is in the reference unit of its flow, which a separate flow dataset defines
copyright: false
licenseType: Free of charge for all users and uses

## General comment
the Technical of end-of-pipe management technology for pollution Exhaust gasis/

## Technical purpose
描述的工业过程涉及石油化工组分的生产和加工，如石脑油组分、燃料油、柴油组分、沥青和汽油组分。还包括使用固定床加氢工艺对这些组分进行预分馏，适用于所有规模的操作。这些产品通常在化学和能源工业中使用，生产从塑料和合成材料到燃料和润滑油等广泛的下游产品。资料集还描述了用于处理此类工业过程通常生成的各种污染物的末端管理技术，包括化学需氧量、氰化物、酚、硝酸盐、氨氮、石油相关废物、废气、颗粒物（PM2.5 - PM10）、氮氧化物、硫二氧化物、氨和挥发性有机物。

## Reference product
- Coal tar: 1000; input; calculated
  源文件中描述为为煤焦油、氢气，此处对其进行了匹配工作，将其匹配到LCAflow库里面相最符合的流，污染物指标备注为工业废水量

## Outputs
All rows: calculated
- cyanide: 0.00014762
  the Technical of end-of-pipe management technology for pollution cyanideisOthers (biochemical treatment)，Its Technical efficiency of end-of-pipe management78
  污染物指标氰化物的末端治理技术是其他（生化处理），其效率为78，末端治理设施实际运行率（k值）计算公式为k=污水治理设施运行时间（小时/年）/正常生产时间（小时/年）。原文件中描述污染物类别为废水，污染物指标为氰化物，此处对其进行了匹配工作，将其匹配到LCAflow库里面相最符合的流，污染物指标备注为氰化物
- phenol: 0.000319
  the Technical of end-of-pipe management technology for pollution phenolisOthers (biochemical treatment)，Its Technical efficiency of end-of-pipe management99
  污染物指标挥发酚的末端治理技术是其他（生化处理），其效率为99，末端治理设施实际运行率（k值）计算公式为k=污水治理设施运行时间（小时/年）/正常生产时间（小时/年）。原文件中描述污染物类别为废水，污染物指标为挥发酚，此处对其进行了匹配工作，将其匹配到LCAflow库里面相最符合的流，污染物指标备注为挥发酚
- Water (river water from technosphere, waste water): 370
  the Technical of end-of-pipe management technology for pollution Water (river water from technosphere, waste water)is/
  污染物指标工业废水量的末端治理技术是/，末端治理设施实际运行率（k值）计算公式为/。原文件中描述污染物类别为废气，污染物指标为工业废水量，此处对其进行了匹配工作，将其匹配到LCAflow库里面相最符合的流，污染物指标备注为工业废水量
- volatile organic compound: 0.00131
  the Technical of end-of-pipe management technology for pollution volatile organic compoundisOthers (wastewater treatment station: capped collection + biological method + adsorption)，Its Technical efficiency of end-of-pipe management95
  污染物指标挥发性有机物的末端治理技术是其他（废水处理站：加盖收集+生物法+吸附），其效率为95，末端治理设施实际运行率（k值）计算公式为k=工艺废气治理设施运行时间（小时/年）/正常生产时间（小时/年）。原文件中描述污染物类别为废气，污染物指标为挥发性有机物，此处对其进行了匹配工作，将其匹配到LCAflow库里面相最符合的流，污染物指标备注为挥发性有机物
- Waste water: 1550
  the Technical of end-of-pipe management technology for pollution Waste wateris/
  污染物指标工业废水量的末端治理技术是/，末端治理设施实际运行率（k值）计算公式为/。原文件中描述污染物类别为废水，污染物指标为工业废水量，此处对其进行了匹配工作，将其匹配到LCAflow库里面相最符合的流，污染物指标备注为工业废水量
- Ammonia Nitrogen: 0.0052
  the Technical of end-of-pipe management technology for pollution Ammonia NitrogenisOthers (biochemical treatment)，Its Technical efficiency of end-of-pipe management96
  污染物指标氨氮的末端治理技术是其他（生化处理），其效率为96，末端治理设施实际运行率（k值）计算公式为k=污水治理设施运行时间（小时/年）/正常生产时间（小时/年）。原文件中描述污染物类别为废水，污染物指标为氨氮，此处对其进行了匹配工作，将其匹配到LCAflow库里面相最符合的流，污染物指标备注为氨氮
- particles (PM2.5 - PM10): 0.0181
  the Technical of end-of-pipe management technology for pollution particles (PM2.5 - PM10)isOthers (direct discharge)，Its Technical efficiency of end-of-pipe management0
  污染物指标颗粒物的末端治理技术是其他（直接排放），其效率为0，末端治理设施实际运行率（k值）计算公式为/。原文件中描述污染物类别为废气，污染物指标为颗粒物，此处对其进行了匹配工作，将其匹配到LCAflow库里面相最符合的流，污染物指标备注为颗粒物
- Petroleum-related waste: 0.018653
  the Technical of end-of-pipe management technology for pollution Petroleum-related wasteisOthers (biochemical treatment)，Its Technical efficiency of end-of-pipe management77
  污染物指标石油类的末端治理技术是其他（生化处理），其效率为77，末端治理设施实际运行率（k值）计算公式为k=污水治理设施运行时间（小时/年）/正常生产时间（小时/年）。原文件中描述污染物类别为废水，污染物指标为石油类，此处对其进行了匹配工作，将其匹配到LCAflow库里面相最符合的流，污染物指标备注为石油类
- volatile organic compound: 0.0262
  the Technical of end-of-pipe management technology for pollution volatile organic compoundisOthers (direct discharge)，Its Technical efficiency of end-of-pipe management0
  污染物指标挥发性有机物的末端治理技术是其他（直接排放），其效率为0，末端治理设施实际运行率（k值）计算公式为/。原文件中描述污染物类别为废气，污染物指标为挥发性有机物，此处对其进行了匹配工作，将其匹配到LCAflow库里面相最符合的流，污染物指标备注为挥发性有机物
- ammonia: 0.0544608
  the Technical of end-of-pipe management technology for pollution ammoniaisOthers (wastewater treatment station: capped collection + biological method + adsorption)，Its Technical efficiency of end-of-pipe management2.4
  污染物指标氨的末端治理技术是其他（废水处理站：加盖收集+生物法+吸附），其效率为2.4，末端治理设施实际运行率（k值）计算公式为k=工艺废气治理设施运行时间（小时/年）/正常生产时间（小时/年）。原文件中描述污染物类别为废气，污染物指标为氨，此处对其进行了匹配工作，将其匹配到LCAflow库里面相最符合的流，污染物指标备注为氨
- ammonia: 0.0558
  the Technical of end-of-pipe management technology for pollution ammoniaisOthers (direct discharge)，Its Technical efficiency of end-of-pipe management0
  污染物指标氨的末端治理技术是其他（直接排放），其效率为0，末端治理设施实际运行率（k值）计算公式为k=工艺废气治理设施运行时间（小时/年）/正常生产时间（小时/年）。原文件中描述污染物类别为废气，污染物指标为氨，此处对其进行了匹配工作，将其匹配到LCAflow库里面相最符合的流，污染物指标备注为氨
- sulfur dioxide: 0.0619
  the Technical of end-of-pipe management technology for pollution sulfur dioxideisOthers (direct discharge)，Its Technical efficiency of end-of-pipe management0
  污染物指标二氧化硫的末端治理技术是其他（直接排放），其效率为0，末端治理设施实际运行率（k值）计算公式为/。原文件中描述污染物类别为废气，污染物指标为二氧化硫，此处对其进行了匹配工作，将其匹配到LCAflow库里面相最符合的流，污染物指标备注为二氧化硫
- chemical oxygen demand: 0.1037
  the Technical of end-of-pipe management technology for pollution chemical oxygen demandisOthers (biochemical treatment)，Its Technical efficiency of end-of-pipe management95
  污染物指标化学需氧量的末端治理技术是其他（生化处理），其效率为95，末端治理设施实际运行率（k值）计算公式为k=污水治理设施运行时间（小时/年）/正常生产时间（小时/年）。原文件中描述污染物类别为废水，污染物指标为化学需氧量，此处对其进行了匹配工作，将其匹配到LCAflow库里面相最符合的流，污染物指标备注为化学需氧量
- Nitrogen oxides: 0.138
  the Technical of end-of-pipe management technology for pollution Nitrogen oxidesisOthers (direct discharge)，Its Technical efficiency of end-of-pipe management0
  污染物指标氮氧化物的末端治理技术是其他（直接排放），其效率为0，末端治理设施实际运行率（k值）计算公式为/。原文件中描述污染物类别为废气，污染物指标为氮氧化物，此处对其进行了匹配工作，将其匹配到LCAflow库里面相最符合的流，污染物指标备注为氮氧化物
- Exhaust gas: 1402
  the Technical of end-of-pipe management technology for pollution Exhaust gasis/
  污染物指标工业废气量的末端治理技术是/，末端治理设施实际运行率（k值）计算公式为/。原文件中描述污染物类别为废气，污染物指标为工业废气量，此处对其进行了匹配工作，将其匹配到LCAflow库里面相最符合的流，污染物指标备注为工业废气量

## Use advice
This dataset is derived from the Pollution Source Census Report and contains information on pollution emissions and related products. However, it does not include data on energy or chemical consumption, nor does it provide information on waste or co-product generation. When utilizing this dataset, please supplement the missing data based on actual conditions before use
该数据集来源于污染源普查报告，包含污染物排放及相关产品信息，但不包含能源或化学品消耗数据，也不提供废弃物或共生产物产生信息。在使用该数据集时，请根据实际情况补充缺失数据后再使用。

## Review details
Inventory: The internal review was done by several iteration steps concerning raw data validation, raw data documentation, representativity, completeness and consistency of modelling with regard to ISO 14040 and 14044.
清单： 内部审查通过几个迭代步骤完成，涉及原始数据验证、原始数据记录、代表性、完整性、与 ISO 14040 和 14044 有关的建模的一致性。

## Data sources
- 第二次全国污染源普查产排污核算系数手册（试用版）,二级代码25,四级代码2519文件，在完整版文件中第4111页
