# Electricity production ; Electricity mix ; Hunan

Dataset: ILCD process, Unit process, single operation
Geography: HUN-CN
Reference year: 2019
Classification: Unit processes / Energy carriers and technologies / Electricity
Generated by: Ruoxi Xiong, xiongrx0126@163.com
Owner: Tiangong LCI Data Working Group
Review: Dependent internal review by Tiangong LCI Data Working Group
Amounts: no units in this file; such an amount is in the reference unit of its flow, which a separate flow dataset defines
copyright: false
licenseType: Free of charge for all users and uses

## General comment
Electricity mix includes thermal, hydro, wind, nuclear and solar generation

## Technical purpose
This dataset represents the electricity mix utilized for various applications in Hunan, covering electricity generated from multiple sources such as thermal (coal, natural gas, etc.), hydroelectric, wind, nuclear, and solar power plants. It is intended for use in assessing the energy component of product life cycles, infrastructure projects, and other services where mixed-source electricity is consumed.

## Reference product
- Electricity: 3.6; missing unimportant
  [{'text': '能量', 'type': 'text'}]

## Inputs
All rows: missing unimportant
- electricity for thermal power: 2.11116
  [{'text': '能量', 'type': 'text'}]
- electricity from hydroelectric power plant: 1.25571
  [{'text': '能量', 'type': 'text'}]
- electricity for nuclear power: 0
  [{'text': '能量', 'type': 'text'}]
- electricity from wind power: 0.17312
  [{'text': '能量', 'type': 'text'}]
- electricity for solar power: 0.0600156
  [{'text': '能量', 'type': 'text'}]

## Use advice
When using this dataset for Life Cycle Assessment, it is important to attribute the electricity mix accurately to the specific application scenario. Consider the variability in the generation mix over time. Pay particular attention to the assumptions regarding the proportion of each generation type within the mix, as this may affect the overall environmental impact assessment. Ensure that the temporal and geographical relevance of the data aligns with the system being evaluated. Update the dataset if significant changes in the generation mix occur.

## Review details
Inventory: The internal review was done by several iteration steps concerning raw data validation, raw data documentation, representativity, completeness and consistency of modelling with regard to ISO 14040 and 14044.

## Data sources
- 能源统计年鉴2020
