# Lithium Concentrate Production ; Lithium Spodumene Concentrate (6% Li2O) ; Crushing ; Whabouchi, Canada (0.7% Li2O)

Dataset: ILCD process, Unit process, single operation
Geography: CA
Reference year: 2013
Classification: Unit processes / Materials production / Non-energetic raw materials
Generated by: Sun Xin, xs389@cornell.edu
Owner: Tiangong LCI Data Working Group
Review: Dependent internal review by Tiangong LCI Data Working Group
Amounts: no units in this file; such an amount is in the reference unit of its flow, which a separate flow dataset defines
licenseType: Free of charge for all users and uses

## General comment
The future supply routes reviewed in this study are based on data gathered from technical reports and environmental impact assessment reports of several lithium mining and processing companies (Lithium Americas Corp., Minera Salar Blanco, Nemaska Lithium Inc., and Keliber Oy) that are at various stages of developing their lithium assets. These are considered future supply routes as they are not yet active but areexpected to be operational in 5–10 years. The lower lithium concentrations at these brine-based sources also reflect the possible future lithium grades of current supply routes from brines, whose lithium concentrations will likely decrease over the years due to extraction

## Technology and included processes
The future supply routes for spodumene are described in technical reports of operations at the Whabouchi site, Canada and the Central Ostrobothnia region, Finland. While neither Canada nor Finland are among the countries with the largest lithium reserves (USGS, 2021), they represent examples of new lithium supplies that might become exploited in response to increased lithium demand. The average lithium concentration in spodumene at the Whabouchi site is about 0.7% and in Central Ostrobothnia region it is 0.6%. In these future supply routes, concentrated spodumene is directly converted to LiOH⋅H2O without producing Li2CO3 as an intermediate. The datasets representing mining operations in Canada and Finland are based on the technical reports prepared for Nemaska Lithium Inc. (Golder Associates, 2013; Laferri´ere et al., 2012; Nemaska Lithium Inc., 2013; SENES Consultants Ltd., 2013) and Keliber Oy (Keliber Oy, 2020a, b; Sweco, 2016), respectively. Specific data for chemical inputs was not available for the LiOH⋅H2O production unit process (from concentrated spodumene) in the Nemaska Lithium reports. Therefore, the chemical usage in the Keliber Oy reports were used as proxy data when comparing the different lithium supplies.

## Technical purpose
This data set represents the industrial process for the production of lithium spodumene concentrate with a lithium oxide (Li2O) content of 6% from raw spodumene ore with a lithium oxide content of 0.7%, obtained specifically from the Whabouchi mining site in Canada. The process includes a crushing step to produce the concentrate. This concentrate is primarily used as a raw material for the production of lithium compounds, which are essential for various applications such as lithium-ion batteries, ceramics, glass, and grease lubricants.

## Reference product
- Spodumene concentrate (7.6% Li2O): 1000; measured

## Inputs
All rows: measured
- Spodumene（0.8% Li2O）: 4790
- sodium carbonate: 0.474, 0.474 (2 entries)
- freshwater,freshwater: 5.88
- Diesel: 247
- Electricity: 1656
- sodium hydroxide: 2.07
- Sulfuric acid: 0.337
- Isopropyl Ethyl Thionocarbamate: 1.31
- Polyacrylamide,Polyacrylamide: 0.0464

## Use advice
Users of this data set should note that it specifically excludes the production processes of raw materials and associated energy flows that contribute less than 1%, and therefore may not represent the full environmental impacts of raw material extraction and processing. To ensure proper lifecycle assessment, users should complement this data with additional information on ancillary processes and minor energy flows if they fall within the scope of the LCA study. Moreover, users should make sure that their boundary conditions for the assessment are consistent with the system boundaries and exclusions set forth by this data set.

## Review details
Inventory: The internal review was done by several iteration steps concerning raw data validation, raw data documentation, representativity, completeness and consistency of modelling with regard to ISO 14040 and 14044.

## Data sources
- Chordia, M., Wickerts, S., Nordelöf, A. & Arvidsson, R. Life cycle environmental impacts of current and future battery-grade lithium supply from brine and spodumene. Resources, Conservation and Recycling 187, 106634 (2022).
