# Egg production ; transportation

Dataset: ILCD process, Unit process, single operation
Geography: HLJ-CN
Reference year: 2009
Classification: Unit processes / Transport services / Road
Functional unit: The main output product of laying hens is eggs, so the functional unit defined in this study is "1kg egg".
Generated by: Rui Yang, 1632707028@qq.com
Owner: Tiangong LCI Data Working Group
Review: Dependent internal review by Tiangong LCI Data Working Group
Amounts: no units in this file; such an amount is in the reference unit of its flow, which a separate flow dataset defines
copyright: false
licenseType: Free of charge for all users and uses

## General comment
It is assumed that all chicken word materials come from the province, and the word materials are mainly transported by road. In the process of road transportation, the impact on the environment is mainly reflected in vehicle exhaust emissions. Due to the use of ready-made road transportation systems, the environmental impact of road construction related to road transportation is not considered here, nor is the impact of surface soil and vegetation destruction caused by road construction, and only the exhaust emissions during road transportation are considered.

## Geography
Life cycle evaluation of intensive egg farm in Heilongjiang Province

## Technology and included processes
Quantitative method was used in this study. This evaluation includes a re-examination or revision of the objectives and scope of the research to determine how the objectives of the research can be met. According to the actual situation of layer production, the technical framework of life cycle impact assessment (FIG. Impact assessment includes four steps: classification, characterization, standardization and weighted assessment. (1) Classification: The input and output data in the life cycle inventory analysis were classified into different types of environmental impact. Based on the analysis results of the life cycle inventory of laying hens, the following four types of environmental impact were evaluated: global warming, environmental acidification, eutrophication and photochemical ozone synthesis. (2) Characterization: Quantitative inventory analysis of data to determine the degree of impact of four types of environmental impact. This makes the amount of environmental pollution that would otherwise not be comparable comparable. (3) Standardization: First of all, standardization benchmarks should be established to provide comparable standards for the relative sizes of the four environmental impact types of global warming, environmental acidification, eutrophication, and photochemical ozone synthesis. (4) Weighted assessment: is the process of grouping environmental impact into a unified indicator - environmental load size, so as to directly compare different production systems.

## Technical purpose
The data set describes the environmental impacts specifically related to the road transportation of materials for intensive egg farming within a given province. It focuses on the laying hen production process with eggs as the primary output. This data may be applicable to lifecycle assessments of agricultural products where the regional transportation of raw materials is a necessary consideration. This can include local egg production operations seeking to understand or improve their transportation-related emissions.

## Reference product
- feed: 2.332; estimated
  假设运输过程无消耗

## Inputs
- feed: 2.332; calculated

## Outputs
- carbon monoxide (fossil): 0.00120238; measured
- carbon dioxide (fossil),carbon dioxide (fossil): 0.110863; measured
- sulfur dioxide: 8.4652e-5; measured
- nitrogen, total (excluding N2): 0.00035633; measured

## Use advice
When utilizing this data set for lifecycle assessment, exclude environmental impacts of road construction and infrastructure as these are not included in the study. Focus solely on exhaust emissions from road transport during the product's transport phase. Ensure that assessments include calculations per the functional unit of '1kg egg' to maintain consistency and comparability with other datasets or evaluations.

## Review details
Inventory: The internal review was done by several iteration steps concerning raw data validation, raw data documentation, representativity, completeness and consistency of modelling with regard to ISO 14040 and 14044.

## Data sources
- 高雪. 黑龙江省集约化蛋鸡场的生命周期评价. (东北农业大学, 2012).
