# Chicken meat ; Live Chicken ; Semi-mechanized slaughtering/mechanized slaughtering; NESPS2 / 鸡肉 ; 活鸡 ; 半机械化屠宰/机械化屠宰 ; 小于60000只/天 ; 全国第二次污染普查数据

Dataset: ILCD process, Unit process, single operation
Geography: CN
Reference year: 2019
Classification: Reference Parameters / Materials production / Food and renewable raw materials
Generated by: The data was created by the Office of the Second National Pollution Source Census of the Ministry of Ecology and Environment, and the data was organized by the TianGong Plan team for ILCD format / 生态环境部第二次全国污染源普查工作办公室创建数据，天工计划团队常慧敏整理数据为ILCD格式
Owner: Tiangong LCI Data Working Group / 天工LCI数据工作小组
Review: Dependent internal review by Tiangong LCI Data Working Group / 天工LCI数据工作小组
Amounts: no units in this file; such an amount is in the reference unit of its flow, which a separate flow dataset defines
copyright: false
licenseType: Free of charge for all users and uses

## General comment
the Technical of end-of-pipe management technology for pollution chemical oxygen demandis/，The formula for calculating the actual operation rate (k-value) of the end-of-pipe treatment facility is k = power consumption of treatment facilities (kWh) / (rated power of treatment facilities (kW) × operating hours of treatment facilities (hours))

## Technical purpose
本工业过程涉及活鸡的半机械化和机械化屠宰，日处理能力低于60,000只。数据集代表了用于处理来自屠宰过程产生的废水中的污染物（如氨氮、化学需氧量（COD）、总磷和有机结合氮）的各种末端处理技术。这包括沉淀分离、厌氧水解、生物接触氧化、序批式反应器（SBR）、化学混凝、厌氧生物处理以及使用化粪池。每种方法都有一个相关的技术效率，表示污染物的百分比减少。

## Reference product
- Live Chicken: 100; input; calculated
  源文件中描述为为活鸡，此处对其进行了匹配工作，将其匹配到LCAflow库里面相最符合的流

## Outputs
All rows: calculated
- Waste water: 1203
  the Technical of end-of-pipe management technology for pollution Waste wateris/
  污染物指标工业废水量的末端治理技术是/，末端治理设施实际运行率（k值）计算公式为/。原文件中描述污染物类别为废水，污染物指标为工业废水量，此处对其进行了匹配工作，将其匹配到LCAflow库里面相最符合的流
- Waste water: 1430
  the Technical of end-of-pipe management technology for pollution Waste wateris/，The formula for calculating the actual operation rate (k-value) of the end-of-pipe treatment facility is k = power consumption of treatment facilities (kWh) / (rated power of treatment facilities (kW) × operating hours of treatment facilities (hours))
  污染物指标工业废水量的末端治理技术是/，末端治理设施实际运行率（k值）计算公式为/。原文件中描述污染物类别为废水，污染物指标为工业废水量，此处对其进行了匹配工作，将其匹配到LCAflow库里面相最符合的流
- phosphorus, total: 0.0102
  the Technical of end-of-pipe management technology for pollution phosphorus, totalisPrecipitation separation + anaerobic hydrolysis + bio-contact oxidation process，Its Technical efficiency of end-of-pipe management70，The formula for calculating the actual operation rate (k-value) of the end-of-pipe treatment facility is k = power consumption of treatment facilities (kWh) / (rated power of treatment facilities (kW) × operating hours of treatment facilities (hours))
  污染物指标总磷的末端治理技术是沉淀分离+厌氧水解类+生物接触氧化法，其效率为70，末端治理设施实际运行率（k值）计算公式为k=污水治理设施耗电量（千瓦时/年）/污水治理设施运行时间（小时/年）/污水治理设施总功率（千瓦）。原文件中描述污染物类别为废水，污染物指标为总磷，此处对其进行了匹配工作，将其匹配到LCAflow库里面相最符合的流
- Ammonia Nitrogen: 0.0111
  the Technical of end-of-pipe management technology for pollution Ammonia NitrogenisPrecipitation separation + anaerobic hydrolysis + bio-contact oxidation process，Its Technical efficiency of end-of-pipe management85，The formula for calculating the actual operation rate (k-value) of the end-of-pipe treatment facility is k = power consumption of treatment facilities (kWh) / (rated power of treatment facilities (kW) × operating hours of treatment facilities (hours))
  污染物指标氨氮的末端治理技术是沉淀分离+厌氧水解类+生物接触氧化法，其效率为85，末端治理设施实际运行率（k值）计算公式为k=污水治理设施耗电量（千瓦时/年）/污水治理设施运行时间（小时/年）/污水治理设施总功率（千瓦）。原文件中描述污染物类别为废水，污染物指标为氨氮，此处对其进行了匹配工作，将其匹配到LCAflow库里面相最符合的流
- phosphorus, total: 0.0204
  the Technical of end-of-pipe management technology for pollution phosphorus, totalisChemical coagulation，Its Technical efficiency of end-of-pipe management40，The formula for calculating the actual operation rate (k-value) of the end-of-pipe treatment facility is k = power consumption of treatment facilities (kWh) / (rated power of treatment facilities (kW) × operating hours of treatment facilities (hours))
  污染物指标总磷的末端治理技术是化学混凝法，其效率为40，末端治理设施实际运行率（k值）计算公式为k=污水治理设施耗电量（千瓦时/年）/污水治理设施运行时间（小时/年）/污水治理设施总功率（千瓦）。原文件中描述污染物类别为废水，污染物指标为总磷，此处对其进行了匹配工作，将其匹配到LCAflow库里面相最符合的流
- phosphorus, total: 0.0204
  the Technical of end-of-pipe management technology for pollution phosphorus, totalisPrecipitation separation + SBR，Its Technical efficiency of end-of-pipe management40，The formula for calculating the actual operation rate (k-value) of the end-of-pipe treatment facility is k = power consumption of treatment facilities (kWh) / (rated power of treatment facilities (kW) × operating hours of treatment facilities (hours))
  污染物指标总磷的末端治理技术是沉淀分离+SBR类，其效率为40，末端治理设施实际运行率（k值）计算公式为k=污水治理设施耗电量（千瓦时/年）/污水治理设施运行时间（小时/年）/污水治理设施总功率（千瓦）。原文件中描述污染物类别为废水，污染物指标为总磷，此处对其进行了匹配工作，将其匹配到LCAflow库里面相最符合的流
- Ammonia Nitrogen: 0.0222
  the Technical of end-of-pipe management technology for pollution Ammonia NitrogenisPrecipitation separation + SBR，Its Technical efficiency of end-of-pipe management70，The formula for calculating the actual operation rate (k-value) of the end-of-pipe treatment facility is k = power consumption of treatment facilities (kWh) / (rated power of treatment facilities (kW) × operating hours of treatment facilities (hours))
  污染物指标氨氮的末端治理技术是沉淀分离+SBR类，其效率为70，末端治理设施实际运行率（k值）计算公式为k=污水治理设施耗电量（千瓦时/年）/污水治理设施运行时间（小时/年）/污水治理设施总功率（千瓦）。原文件中描述污染物类别为废水，污染物指标为氨氮，此处对其进行了匹配工作，将其匹配到LCAflow库里面相最符合的流
- phosphorus, total: 0.0272
  the Technical of end-of-pipe management technology for pollution phosphorus, totalisPrecipitation separation + anaerobic biological treatment，Its Technical efficiency of end-of-pipe management20，The formula for calculating the actual operation rate (k-value) of the end-of-pipe treatment facility is k = power consumption of treatment facilities (kWh) / (rated power of treatment facilities (kW) × operating hours of treatment facilities (hours))
  污染物指标总磷的末端治理技术是沉淀分离+厌氧生物处理法，其效率为20，末端治理设施实际运行率（k值）计算公式为k=污水治理设施耗电量（千瓦时/年）/污水治理设施运行时间（小时/年）/污水治理设施总功率（千瓦）。原文件中描述污染物类别为废水，污染物指标为总磷，此处对其进行了匹配工作，将其匹配到LCAflow库里面相最符合的流
- phosphorus, total: 0.0306
  the Technical of end-of-pipe management technology for pollution phosphorus, totalisPrecipitation separation，Its Technical efficiency of end-of-pipe management10，The formula for calculating the actual operation rate (k-value) of the end-of-pipe treatment facility is k = power consumption of treatment facilities (kWh) / (rated power of treatment facilities (kW) × operating hours of treatment facilities (hours))
  污染物指标总磷的末端治理技术是沉淀分离，其效率为10，末端治理设施实际运行率（k值）计算公式为k=1。原文件中描述污染物类别为废水，污染物指标为总磷，此处对其进行了匹配工作，将其匹配到LCAflow库里面相最符合的流
- phosphorus, total: 0.0306
  the Technical of end-of-pipe management technology for pollution phosphorus, totalisSeptic tanks，Its Technical efficiency of end-of-pipe management10
  污染物指标总磷的末端治理技术是化粪池，其效率为10，末端治理设施实际运行率（k值）计算公式为k=1。原文件中描述污染物类别为废水，污染物指标为总磷，此处对其进行了匹配工作，将其匹配到LCAflow库里面相最符合的流
- phosphorus, total: 0.034
  the Technical of end-of-pipe management technology for pollution phosphorus, totalis/
  污染物指标总磷的末端治理技术是/，末端治理设施实际运行率（k值）计算公式为/。原文件中描述污染物类别为废水，污染物指标为总磷，此处对其进行了匹配工作，将其匹配到LCAflow库里面相最符合的流
- Nitrogen, organic bound: 0.0476
  the Technical of end-of-pipe management technology for pollution Nitrogen, organic boundisPrecipitation separation + anaerobic hydrolysis + bio-contact oxidation process，Its Technical efficiency of end-of-pipe management80，The formula for calculating the actual operation rate (k-value) of the end-of-pipe treatment facility is k = power consumption of treatment facilities (kWh) / (rated power of treatment facilities (kW) × operating hours of treatment facilities (hours))
  污染物指标总氮的末端治理技术是沉淀分离+厌氧水解类+生物接触氧化法，其效率为80，末端治理设施实际运行率（k值）计算公式为k=污水治理设施耗电量（千瓦时/年）/污水治理设施运行时间（小时/年）/污水治理设施总功率（千瓦）。原文件中描述污染物类别为废水，污染物指标为总氮，此处对其进行了匹配工作，将其匹配到LCAflow库里面相最符合的流
- Ammonia Nitrogen: 0.0592
  the Technical of end-of-pipe management technology for pollution Ammonia NitrogenisChemical coagulation，Its Technical efficiency of end-of-pipe management20，The formula for calculating the actual operation rate (k-value) of the end-of-pipe treatment facility is k = power consumption of treatment facilities (kWh) / (rated power of treatment facilities (kW) × operating hours of treatment facilities (hours))
  污染物指标氨氮的末端治理技术是化学混凝法，其效率为20，末端治理设施实际运行率（k值）计算公式为k=污水治理设施耗电量（千瓦时/年）/污水治理设施运行时间（小时/年）/污水治理设施总功率（千瓦）。原文件中描述污染物类别为废水，污染物指标为氨氮，此处对其进行了匹配工作，将其匹配到LCAflow库里面相最符合的流
- Ammonia Nitrogen: 0.0592
  the Technical of end-of-pipe management technology for pollution Ammonia NitrogenisPrecipitation separation + anaerobic biological treatment，Its Technical efficiency of end-of-pipe management20，The formula for calculating the actual operation rate (k-value) of the end-of-pipe treatment facility is k = power consumption of treatment facilities (kWh) / (rated power of treatment facilities (kW) × operating hours of treatment facilities (hours))
  污染物指标氨氮的末端治理技术是沉淀分离+厌氧生物处理法，其效率为20，末端治理设施实际运行率（k值）计算公式为k=污水治理设施耗电量（千瓦时/年）/污水治理设施运行时间（小时/年）/污水治理设施总功率（千瓦）。原文件中描述污染物类别为废水，污染物指标为氨氮，此处对其进行了匹配工作，将其匹配到LCAflow库里面相最符合的流
- Ammonia Nitrogen: 0.0666
  the Technical of end-of-pipe management technology for pollution Ammonia NitrogenisPrecipitation separation，Its Technical efficiency of end-of-pipe management10，The formula for calculating the actual operation rate (k-value) of the end-of-pipe treatment facility is k = power consumption of treatment facilities (kWh) / (rated power of treatment facilities (kW) × operating hours of treatment facilities (hours))
  污染物指标氨氮的末端治理技术是沉淀分离，其效率为10，末端治理设施实际运行率（k值）计算公式为k=1。原文件中描述污染物类别为废水，污染物指标为氨氮，此处对其进行了匹配工作，将其匹配到LCAflow库里面相最符合的流
- Ammonia Nitrogen: 0.0666
  the Technical of end-of-pipe management technology for pollution Ammonia NitrogenisSeptic tanks，Its Technical efficiency of end-of-pipe management10，The formula for calculating the actual operation rate (k-value) of the end-of-pipe treatment facility is k = power consumption of treatment facilities (kWh) / (rated power of treatment facilities (kW) × operating hours of treatment facilities (hours))
  污染物指标氨氮的末端治理技术是化粪池，其效率为10，末端治理设施实际运行率（k值）计算公式为k=1。原文件中描述污染物类别为废水，污染物指标为氨氮，此处对其进行了匹配工作，将其匹配到LCAflow库里面相最符合的流
- Ammonia Nitrogen: 0.074
  the Technical of end-of-pipe management technology for pollution Ammonia Nitrogenis/，The formula for calculating the actual operation rate (k-value) of the end-of-pipe treatment facility is k = power consumption of treatment facilities (kWh) / (rated power of treatment facilities (kW) × operating hours of treatment facilities (hours))
  污染物指标氨氮的末端治理技术是/，末端治理设施实际运行率（k值）计算公式为/。原文件中描述污染物类别为废水，污染物指标为氨氮，此处对其进行了匹配工作，将其匹配到LCAflow库里面相最符合的流
- chemical oxygen demand: 0.08812
  the Technical of end-of-pipe management technology for pollution chemical oxygen demandisPrecipitation separation + anaerobic hydrolysis + bio-contact oxidation process，Its Technical efficiency of end-of-pipe management96
  污染物指标化学需氧量的末端治理技术是沉淀分离+厌氧水解类+生物接触氧化法，其效率为96，末端治理设施实际运行率（k值）计算公式为k=污水治理设施耗电量（千瓦时/年）/污水治理设施运行时间（小时/年）/污水治理设施总功率（千瓦）。原文件中描述污染物类别为废水，污染物指标为化学需氧量，此处对其进行了匹配工作，将其匹配到LCAflow库里面相最符合的流
- Nitrogen, organic bound: 0.1428
  the Technical of end-of-pipe management technology for pollution Nitrogen, organic boundisPrecipitation separation + SBR，Its Technical efficiency of end-of-pipe management40，The formula for calculating the actual operation rate (k-value) of the end-of-pipe treatment facility is k = power consumption of treatment facilities (kWh) / (rated power of treatment facilities (kW) × operating hours of treatment facilities (hours))
  污染物指标总氮的末端治理技术是沉淀分离+SBR类，其效率为40，末端治理设施实际运行率（k值）计算公式为k=污水治理设施耗电量（千瓦时/年）/污水治理设施运行时间（小时/年）/污水治理设施总功率（千瓦）。原文件中描述污染物类别为废水，污染物指标为总氮，此处对其进行了匹配工作，将其匹配到LCAflow库里面相最符合的流
- Nitrogen, organic bound: 0.1904
  the Technical of end-of-pipe management technology for pollution Nitrogen, organic boundisChemical coagulation，Its Technical efficiency of end-of-pipe management20，The formula for calculating the actual operation rate (k-value) of the end-of-pipe treatment facility is k = power consumption of treatment facilities (kWh) / (rated power of treatment facilities (kW) × operating hours of treatment facilities (hours))
  污染物指标总氮的末端治理技术是化学混凝法，其效率为20，末端治理设施实际运行率（k值）计算公式为k=污水治理设施耗电量（千瓦时/年）/污水治理设施运行时间（小时/年）/污水治理设施总功率（千瓦）。原文件中描述污染物类别为废水，污染物指标为总氮，此处对其进行了匹配工作，将其匹配到LCAflow库里面相最符合的流
- Nitrogen, organic bound: 0.1904
  the Technical of end-of-pipe management technology for pollution Nitrogen, organic boundisPrecipitation separation + anaerobic biological treatment，Its Technical efficiency of end-of-pipe management20，The formula for calculating the actual operation rate (k-value) of the end-of-pipe treatment facility is k = power consumption of treatment facilities (kWh) / (rated power of treatment facilities (kW) × operating hours of treatment facilities (hours))
  污染物指标总氮的末端治理技术是沉淀分离+厌氧生物处理法，其效率为20，末端治理设施实际运行率（k值）计算公式为k=污水治理设施耗电量（千瓦时/年）/污水治理设施运行时间（小时/年）/污水治理设施总功率（千瓦）。原文件中描述污染物类别为废水，污染物指标为总氮，此处对其进行了匹配工作，将其匹配到LCAflow库里面相最符合的流
- Nitrogen, organic bound: 0.2142
  the Technical of end-of-pipe management technology for pollution Nitrogen, organic boundisPrecipitation separation，Its Technical efficiency of end-of-pipe management10，The formula for calculating the actual operation rate (k-value) of the end-of-pipe treatment facility is k = power consumption of treatment facilities (kWh) / (rated power of treatment facilities (kW) × operating hours of treatment facilities (hours))
  污染物指标总氮的末端治理技术是沉淀分离，其效率为10，末端治理设施实际运行率（k值）计算公式为k=1。原文件中描述污染物类别为废水，污染物指标为总氮，此处对其进行了匹配工作，将其匹配到LCAflow库里面相最符合的流
- Nitrogen, organic bound: 0.2142
  the Technical of end-of-pipe management technology for pollution Nitrogen, organic boundisSeptic tanks，Its Technical efficiency of end-of-pipe management10，The formula for calculating the actual operation rate (k-value) of the end-of-pipe treatment facility is k = power consumption of treatment facilities (kWh) / (rated power of treatment facilities (kW) × operating hours of treatment facilities (hours))
  污染物指标总氮的末端治理技术是化粪池，其效率为10，末端治理设施实际运行率（k值）计算公式为k=1。原文件中描述污染物类别为废水，污染物指标为总氮，此处对其进行了匹配工作，将其匹配到LCAflow库里面相最符合的流
- Nitrogen, organic bound: 0.238
  the Technical of end-of-pipe management technology for pollution Nitrogen, organic boundis/，The formula for calculating the actual operation rate (k-value) of the end-of-pipe treatment facility is k = power consumption of treatment facilities (kWh) / (rated power of treatment facilities (kW) × operating hours of treatment facilities (hours))
  污染物指标总氮的末端治理技术是/，末端治理设施实际运行率（k值）计算公式为/。原文件中描述污染物类别为废水，污染物指标为总氮，此处对其进行了匹配工作，将其匹配到LCAflow库里面相最符合的流
- chemical oxygen demand: 0.55075
  the Technical of end-of-pipe management technology for pollution chemical oxygen demandisPrecipitation separation + SBR，Its Technical efficiency of end-of-pipe management75，The formula for calculating the actual operation rate (k-value) of the end-of-pipe treatment facility is k = power consumption of treatment facilities (kWh) / (rated power of treatment facilities (kW) × operating hours of treatment facilities (hours))
  污染物指标化学需氧量的末端治理技术是沉淀分离+SBR类，其效率为75，末端治理设施实际运行率（k值）计算公式为k=污水治理设施耗电量（千瓦时/年）/污水治理设施运行时间（小时/年）/污水治理设施总功率（千瓦）。原文件中描述污染物类别为废水，污染物指标为化学需氧量，此处对其进行了匹配工作，将其匹配到LCAflow库里面相最符合的流
- chemical oxygen demand: 1.1015
  the Technical of end-of-pipe management technology for pollution chemical oxygen demandisPrecipitation separation + anaerobic biological treatment，Its Technical efficiency of end-of-pipe management50，The formula for calculating the actual operation rate (k-value) of the end-of-pipe treatment facility is k = power consumption of treatment facilities (kWh) / (rated power of treatment facilities (kW) × operating hours of treatment facilities (hours))
  污染物指标化学需氧量的末端治理技术是沉淀分离+厌氧生物处理法，其效率为50，末端治理设施实际运行率（k值）计算公式为k=污水治理设施耗电量（千瓦时/年）/污水治理设施运行时间（小时/年）/污水治理设施总功率（千瓦）。原文件中描述污染物类别为废水，污染物指标为化学需氧量，此处对其进行了匹配工作，将其匹配到LCAflow库里面相最符合的流
- chemical oxygen demand: 1.3218
  the Technical of end-of-pipe management technology for pollution chemical oxygen demandisChemical coagulation，Its Technical efficiency of end-of-pipe management40，The formula for calculating the actual operation rate (k-value) of the end-of-pipe treatment facility is k = power consumption of treatment facilities (kWh) / (rated power of treatment facilities (kW) × operating hours of treatment facilities (hours))
  污染物指标化学需氧量的末端治理技术是化学混凝法，其效率为40，末端治理设施实际运行率（k值）计算公式为k=污水治理设施耗电量（千瓦时/年）/污水治理设施运行时间（小时/年）/污水治理设施总功率（千瓦）。原文件中描述污染物类别为废水，污染物指标为化学需氧量，此处对其进行了匹配工作，将其匹配到LCAflow库里面相最符合的流
- chemical oxygen demand: 1.7624
  the Technical of end-of-pipe management technology for pollution chemical oxygen demandisPrecipitation separation，Its Technical efficiency of end-of-pipe management20，The formula for calculating the actual operation rate (k-value) of the end-of-pipe treatment facility is k = power consumption of treatment facilities (kWh) / (rated power of treatment facilities (kW) × operating hours of treatment facilities (hours))
  污染物指标化学需氧量的末端治理技术是沉淀分离，其效率为20，末端治理设施实际运行率（k值）计算公式为k=1。原文件中描述污染物类别为废水，污染物指标为化学需氧量，此处对其进行了匹配工作，将其匹配到LCAflow库里面相最符合的流
- chemical oxygen demand: 1.7624
  the Technical of end-of-pipe management technology for pollution chemical oxygen demandisSeptic tanks，Its Technical efficiency of end-of-pipe management20，The formula for calculating the actual operation rate (k-value) of the end-of-pipe treatment facility is k = power consumption of treatment facilities (kWh) / (rated power of treatment facilities (kW) × operating hours of treatment facilities (hours))
  污染物指标化学需氧量的末端治理技术是化粪池，其效率为20，末端治理设施实际运行率（k值）计算公式为k=1。原文件中描述污染物类别为废水，污染物指标为化学需氧量，此处对其进行了匹配工作，将其匹配到LCAflow库里面相最符合的流
- chemical oxygen demand: 2.203
  the Technical of end-of-pipe management technology for pollution chemical oxygen demandis/，The formula for calculating the actual operation rate (k-value) of the end-of-pipe treatment facility is k = power consumption of treatment facilities (kWh) / (rated power of treatment facilities (kW) × operating hours of treatment facilities (hours))
  污染物指标化学需氧量的末端治理技术是/，末端治理设施实际运行率（k值）计算公式为/。原文件中描述污染物类别为废水，污染物指标为化学需氧量，此处对其进行了匹配工作，将其匹配到LCAflow库里面相最符合的流

## Use advice
This dataset is derived from the Pollution Source Census Report and contains information on pollution emissions and related products. However, it does not include data on energy or chemical consumption, nor does it provide information on waste or co-product generation. When utilizing this dataset, please supplement the missing data based on actual conditions before use
该数据集来源于污染源普查报告，包含污染物排放及相关产品信息，但不包含能源或化学品消耗数据，也不提供废弃物或共生产物产生信息。在使用该数据集时，请根据实际情况补充缺失数据后再使用。

## Review details
Inventory: The internal review was done by several iteration steps concerning raw data validation, raw data documentation, representativity, completeness and consistency of modelling with regard to ISO 14040 and 14044.
清单： 内部审查通过几个迭代步骤完成，涉及原始数据验证、原始数据记录、代表性、完整性、与 ISO 14040 和 14044 有关的建模的一致性。

## Data sources
- 第二次全国污染源普查产排污核算系数手册（试用版）,四级代码1352文件，在完整版文件中第2548页
