# Muncipal sludge treatment and disposal;dry sludge;anaerobic digestion

Dataset: ILCD process, Unit process, single operation
Geography: CN
Classification: Unit processes / End-of-life treatment / Waste water treatment
Functional unit: One ton of sludge on a dry basis (1 t-DS) is defined as the functional unit.
Generated by: Jin Sitian, 2331276@tongji.edu.cn
Owner: Tiangong LCI Data Working Group
Review: Dependent internal review by Tiangong LCI Data Working Group
Amounts: no units in this file; such an amount is in the reference unit of its flow, which a separate flow dataset defines
copyright: ['opt4ROkqig']
licenseType: Free of charge for all users and uses

## General comment
Several typical sludge treatment facilities in China, representing anaerobic digestion, composting, co-combustion, thermal drying-incineration, and cement production, respectively, are selected to carry out the inventory. Data are mainly taken from the site-specific measurement, either by field survey or by operation report. Sludge characteristics are based on the average values of the sites investigated.

## Technology and included processes
In order to investigate the effect of anaerobic digestion, each system is further divided into two subunits: one is the baseline case , while the other is in combination with anaerobic digestion. Anaerobic digestion is conducted prior to dewatering.

## Technical purpose
This data set is applicable to environmental impact assessments for municipal sludge treatment and disposal processes, specifically the part of the process involving the anaerobic digestion of dry sludge. It is relevant for assessing the environmental footprint of waste management systems and can be used to evaluate the sustainability of sludge treatment facilities.

## Reference product
- Sludge: 1000; input; estimated
  a dry basis (1 t-DS)

## Inputs
- Electricity: 323.64; measured
- Diesel: 7.5; measured

## Outputs
- electricity from landfill gas utilisation: 1258.2; measured

## Use advice
When utilizing this data, ensure that the system boundary includes the anaerobic digestion of sludge as well as any upstream and downstream processing stages relevant to the lifecycle of the sludge. For the functional unit, consider one ton of dry sludge as the reference amount for comparison and impact analysis. Include considerations for the ultimate disposal of digested sludge and the possibility of energy recovery, such as biogas production, within the assessment.

## Review details
Inventory: The internal review was done by several iteration steps concerning raw data validation, raw data documentation, representativity, completeness and consistency of modelling with regard to ISO 14040 and 14044.

## Data sources
- Dong, J., Chi, Y., Tang, Y., Wang, F. & Huang, Q. Combined Life Cycle Environmental and Exergetic Assessment of Four Typical Sewage Sludge Treatment Techniques in China. Energy Fuels 28, 2114–2122 (2014).
