# Lithium Battery Production ; 1GWh of Ternary Lithium Battery ; Lithium Battery Production Assembly

Dataset: ILCD process, Unit process, black box
Geography: YB-SC-CN
Reference year: 2022
Classification: Energy carriers and technologies / Electricity
Functional unit: 1 GWh Ternary Lithium-ion Battery
LCI method principle: Attributional
LCI method approaches: Allocation - mass
Generated by: Bingqian Zhang, zhangbq22@mails.tsinghua.edu.cn
Owner: Tiangong LCI Data Working Group
Review: Dependent internal review by Tiangong LCI Data Working Group
Amounts: no units in this file; such an amount is in the reference unit of its flow, which a separate flow dataset defines
copyright: false
licenseType: Free of charge for all users and uses

## General comment
Using traditional lithium-ion battery technology

## Time period
Lithium Battery Production Data for the Jiang'an Industrial Park in Yibin, Sichuan, in 2022

## Technical purpose
The data set is indicative of the materials and processes involved in the assembly of 1 GWh of Ternary Lithium-ion Batteries using traditional lithium-ion battery technology, applicable specifically to battery production facilities or energy storage companies requiring battery packs of such capacity.

## Reference product
- Battery: 3.6e6; normal; measured

## Inputs
All rows: normal; measured
- Graphite Anode: 1.5e6
- Lithium Hydroxide: 396000
- Butane-1,4-diol: 1.67e6
- Methylamine: 1.36e6
- POLYACRYLATE-2: 8100
- Carboxymethyl cellulose: 1260
- N,N-Dimethylacetamide: 387
- Polyvinylidene fluoride: 6960
- Alumina: 78300
- Tributyl phosphate: 329
- Propane: 260
- Polyvinyl pyrrolidone: 360
- Vinylene Carbonate: 13500
- Ethyl methyl carbonate: 203000
- Dimethyl carbonate: 225000
- 1,3-Propane sultone: 18100
- Propyl acetate: 45000
- ethyl acetate: 82000
- Diethyl carbonate: 2520
- Propylene carbonate: 35100
- Ethylene carbonate: 181000
- Acetyl chloride: 26700
- 2,2-Difluoroethanol: 27800
- Lithium fluoride: 21700
- Coating: 17600
- Anhydrous Hydrogen Fluoride: 84400
- Hydrochloric Acid: 5910
- Sulfuric acid(98%): 1.236e6
- Ammonium hydroxide: 10600
- Manganese(II) sulfate: 661000
- Cobalt Sulfate: 956000
- Nickel Sulfate: 2.95e6
- Sodium carbonate: 818000
- sodium hydroxide: 5.42e6, 167000 (2 entries)
- sulfur: 304000
- process water: 4.31e7
- nitrogen: 41900
- compressed air: 5.43e8
- lithium: 2.86e6
- calcium carbonate: 244000
- carbon dioxide: 104000
- oxygen: 12300
- freshwater: 2e7
- hydrated lime dry slaked: 172000
- phosphorus trichloride: 114000
- chlorine: 58900
- polyethylene low density granulate (PE-LD): 163000
- process steam: 1.84e7
- electricity mix: 3.3336e7
- natural gas; 44.1 MJ/kg: 852000

## Outputs
All rows: normal; measured
- Total Nitrogen: 315000
- Ammonia Nitrogen: 63100
- Chemical Oxygen Demand: 19700
- ammonia: 6700
- dichloromethane: 329
- sulfur dioxide: 259
- nitrous oxide: 3060
- nickel: 9210
- cobalt: 5280
- manganese: 5440
- hydrogen chloride: 1.67e6, 37.2 (2 entries)

## Deviations from the LCI method approaches
Unit process data is obtained through material flow analysis in the industrial park

## Data selection and combination
The data represents material flow data for lithium battery production in the Jiang'an Industrial Park in Yibin, Sichuan

## Data treatment and extrapolations
The data is all based on the average values

## Sampling procedure
The real-world data is sourced from lithium battery production in Jiang'an, Yibin, Sichuan

## Use advice
Users of this data set should take into account that the information is based on average values from the production processes in 2022 at the Jiang'an Industrial Park in Yibin, Sichuan. It represents a black-box unit process and only includes production phase data. It is important to consider this context when applying the data to other scenarios, ensuring its technological applicability and relevance.

## Review details
Inventory: The internal review was done by several iteration steps concerning raw data validation, raw data documentation, representativity, completeness and consistency of modelling with regard to ISO 14040 and 14044.

## Data sources
- 四川宜宾项目数据
