# Lead production ; Total of all wind farm

Dataset: ILCD process, Unit process, single operation
Geography: SH-CN
Reference year: 2009
Classification: Unit processes / Materials production / Metals and semimetals
Functional unit: The functional unit is 1 kWh on-grid electricity provision.
LCI method principle: Attributional
LCI method approaches: Allocation
Generated by: Yunzhi Zhao, ll10088@163.com
Owner: Tiangong LCI Data Working Group
Review: Dependent internal review by Tiangong LCI Data Working Group
Amounts: no units in this file; such an amount is in the reference unit of its flow, which a separate flow dataset defines
copyright: false
licenseType: Free of charge for all users and uses

## General comment
The Donghai Bridge Offshore Wind Farm (DBOWF) data set represents the lifecycle of an offshore wind farm, specifically used for generating electricity. This includes phases of materials and equipment manufacturing, construction, transportation and installation, operation and maintenance, as well as dismantling and recycling. The data set can be used for environmental impact assessment and performance evaluation of offshore wind farms.

## Geography
The studied wind farm, the Donghai Bridge Offshore Wind Farm (DBOWF), is China's first offshore wind farm within the jurisdiction of Shanghai, as well as the first offshore wind farm outside Europe. The project has two-phases of construction, located on each side of the Donghai bridge (Fig. 1).

## Reference product
- lead: 649000; estimated

## Inputs
- Energy, geothermal, converted: 7.72e6; software or database

## Outputs
- carbon dioxide: 681000; software or database
- particles (PM2.5): 260; software or database
- sulfur dioxide: 12590; software or database
- nitrous oxide: 2900; software or database

## Deviations from the LCI method approaches
The present study employed the PLCA modeling approach to calculate the energy and environmental emissions of a typical offshore wind farm in China. The cradle-to-grave process includes four stages, materials and equipment manufacturing, transportation and installation, operation and maintenance, and dismantling and recycling (Fig. 2).

## Data selection and combination
The technical parameters of wind turbines, foundations and cables are obtained from the design documents of the DBOWF (Table 2). The energy and emissions factors (i.e., the energy consumption and environmental emissions of per unit material and component production) are derived from the Ecoinvent 2.2 dataset (Ecoinvent Centre, 2009), and the coefficients of China's practices were preferentially referred. For key materials and equipment, their sea transportation energy is calculated from the transportation load and shipping energy intensity. The facility installation energy and emissions were estimated based on the construction plan. The wind farm's operation and maintenance data, such as the frequency and working time of maintenance, were obtained from site investigations with engineers and technicians. The uncertainties associated with model parameters and input data are illustrated in the sensitivity analysis section of this paper.

## Use advice
When using the DBOWF data set for Life Cycle Assessment (LCA), it is essential to consider the methodology, scope, and the functional unit (i.e., 1 kWh of on-grid electricity). Ensure that the reference system boundaries are consistent with the phases included in the study (manufacturing, transportation, installation, operation, maintenance, dismantling, and recycling). Use China's practice coefficients as a reference for local applicability and consider the provided energy and emissions factors derived from the Ecoinvent 2.2 dataset. Sensitivity analysis should be consulted to understand the potential uncertainties connected with the model parameters and input data.

## Review details
Inventory: The internal review was done by several iteration steps concerning raw data validation, raw data documentation, representativity, completeness and consistency of modelling with regard to ISO 14040 and 14044.

## Data sources
- Yang, J. et al. The life-cycle energy and environmental emissions of a typical offshore wind farm in China. Journal of Cleaner Production 180, 316–324 (2018).
