# Treatment process of construction waste ;Recycling after treatment,CN

Dataset: ILCD process
Geography: SH-CN
Classification: Unit processes / End-of-life treatment / Material recycling
Generated by: Jiaqi Lu, wilsherelu@foxmail.com
Owner: Tiangong LCI Data Working Group
Review: Dependent internal review by Tiangong LCI Data Working Group
Amounts: no units in this file; such an amount is in the reference unit of its flow, which a separate flow dataset defines
copyright: true
licenseType: Free of charge for all users and uses

## General comment
The industrial process described is used for the treatment and recycling of construction waste. Typically, materials such as concrete, bricks, wood, metal, and gypsum are processed to remove contaminants and then recycled for use as raw materials in new construction projects or for road base, backfill, landscaping, and other applications where virgin materials would traditionally be used.

## Reference product
- Construction Waste Disposal: 1000; input; measured
  Process 1 ton of construction waste

## Inputs
- Electricity: 99.828; measured
  electricity
- Diesel: 0.69; measured
  diesel fuel
- natural gas,natural gas: 0.0058; measured
  natural gas

## Outputs
- Recycle Metals: 4.6; measured
  recycling metal
- Recycle Bricks: 21010; measured
  recycling bricks
- Recycled Aggregate: 1400; measured
  Recycled aggregate

## Use advice
When using this data set for Life Cycle Assessment, users must take into consideration the energy and emissions associated with the treatment and recycling processes. It is important to include the transportation of construction waste to the treatment facility and the possible environmental impact of the recycled materials compared to virgin materials. Users should consider the geographical relevance, as the data set is specific to China, and should account for technological advancements that might affect the efficiency of recycling processes over time.

## Review details
Inventory: The internal review was done by several iteration steps concerning raw data validation, raw data documentation, representativity, completeness and consistency of modelling with regard to ISO 14040 and 14044.

## Data sources
- 上海市市政固废调研结果
