# Glass production ; PMMA production ; Two-stage condensation process

Dataset: ILCD process, Unit process, single operation
Geography: JX-CN
Classification: Materials production / Inorganic chemicals
Generated by: He xiaxia, 18616148319@163.com
Owner: Tiangong LCI Data Working Group
Review: Dependent internal review by Tiangong LCI Data Working Group
Amounts: no units in this file; such an amount is in the reference unit of its flow, which a separate flow dataset defines
copyright: false
licenseType: Free of charge for all users and uses

## Reference product
- polymethyl methacrylate (PMMA) beads: 998.097; measured

## Inputs
- electricity mix: 372.96; measured
- polymethyl methacrylate (PMMA) beads: 1091.94; measured

## Outputs
- waste heat: 94.66; measured

## Review details
Inventory: The internal review was done by several iteration steps concerning raw data validation, raw data documentation, representativity, completeness and consistency of modelling with regard to ISO 14040 and 14044.

## Data sources
- 江西旺达新材料有限公司年产20000吨有机玻璃原料生产项目
