# Coal Gasification Unit ; Synthetic gas ; Raw material coal ; Pulverized coal gasification ; All sizes; NESPS2 / 煤气化单元 ; 合成气 ; 原料煤 ; 粉煤气化 ; 所有规模 ; 全国第二次污染普查数据

Dataset: ILCD process, Unit process, single operation
Geography: CN
Reference year: 2019
Classification: Reference Parameters / Energy carriers and technologies / Other non-renewable fuels
Generated by: The data was created by the Office of the Second National Pollution Source Census of the Ministry of Ecology and Environment, and the data was organized by the TianGong Plan team for ILCD format / 生态环境部第二次全国污染源普查工作办公室创建数据，天工计划团队常慧敏整理数据为ILCD格式
Owner: Tiangong LCI Data Working Group / 天工LCI数据工作小组
Review: Dependent internal review by Tiangong LCI Data Working Group / 天工LCI数据工作小组
Amounts: no units in this file; such an amount is in the reference unit of its flow, which a separate flow dataset defines
copyright: false
licenseType: Free of charge for all users and uses

## General comment
the treatment technology for the pollution of Crude coaldidn't offered，The formula for calculating the actual operation rate (k-value) of the end-of-pipe treatment facility is /

## Technical purpose
本工艺描述的是适用于各种规模化学合成过程的煤粉煤气化单元，该单元用于从粉煤制备合成气。值得注意的是，该单元缺少针对PM2.5至PM10颗粒物的尾气处理技术，转而依赖直接排放。这表明它的使用可能仅限于排放法规较少的地区或应用。工艺包括用于处理化学需氧量、氨氮、石油相关废物、氰化物和酚类等排放物的尾气和废水处理技术，指定了经过预处理、生化处理和高级处理阶段的技术效率。

## Reference product
- Crude coal: 1000; input; calculated
  源文件中描述为为原料煤，此处对其进行了匹配工作，将其匹配到LCAflow库里面相最符合的流，污染物指标备注为工业废气量

## Outputs
All rows: calculated
- phenol: 2e-6
  the Technical of end-of-pipe management technology for pollution phenolisPretreatment + biochemical treatment + advenced treatment，Its Technical efficiency of end-of-pipe management60，The formula for calculating the actual operation rate (k-value) of the end-of-pipe treatment facility is k = annual power consumption of wastewater treatment facilities (kWh) / (total rated power (kW) × annual operating time (hours))
  污染物指标挥发酚的末端治理技术是预处理+生化处理+深度处理，其效率为60，末端治理设施实际运行率（k值）计算公式为k=治理设施运行时间（小时）/正常生产时间（小时）。原文件中描述污染物类别为废水，污染物指标为挥发酚，此处对其进行了匹配工作，将其匹配到LCAflow库里面相最符合的流，污染物指标备注为挥发酚
- Petroleum-related waste: 3e-6
  the Technical of end-of-pipe management technology for pollution Petroleum-related wasteisPretreatment + biochemical treatment + advenced treatment，Its Technical efficiency of end-of-pipe management85，The formula for calculating the actual operation rate (k-value) of the end-of-pipe treatment facility is /
  污染物指标石油类的末端治理技术是预处理+生化处理+深度处理，其效率为85，末端治理设施实际运行率（k值）计算公式为k=治理设施运行时间（小时）/正常生产时间（小时）。原文件中描述污染物类别为废水，污染物指标为石油类，此处对其进行了匹配工作，将其匹配到LCAflow库里面相最符合的流，污染物指标备注为石油类
- cyanide: 8.8e-6
  the Technical of end-of-pipe management technology for pollution cyanideisPretreatment + biochemical treatment + advenced treatment，Its Technical efficiency of end-of-pipe management60，The formula for calculating the actual operation rate (k-value) of the end-of-pipe treatment facility is /
  污染物指标氰化物的末端治理技术是预处理+生化处理+深度处理，其效率为60，末端治理设施实际运行率（k值）计算公式为k=治理设施运行时间（小时）/正常生产时间（小时）。原文件中描述污染物类别为废水，污染物指标为氰化物，此处对其进行了匹配工作，将其匹配到LCAflow库里面相最符合的流，污染物指标备注为氰化物
- Ammonia Nitrogen: 0.0025
  the Technical of end-of-pipe management technology for pollution Ammonia NitrogenisPretreatment + biochemical treatment + advenced treatment，Its Technical efficiency of end-of-pipe management90
  污染物指标氨氮的末端治理技术是预处理+生化处理+深度处理，其效率为90，末端治理设施实际运行率（k值）计算公式为k=治理设施运行时间（小时）/正常生产时间（小时）。原文件中描述污染物类别为废水，污染物指标为氨氮，此处对其进行了匹配工作，将其匹配到LCAflow库里面相最符合的流，污染物指标备注为氨氮
- particles (PM2.5 - PM10): 0.018
  the Technical of end-of-pipe management technology for pollution particles (PM2.5 - PM10)isDirect discharge，Its Technical efficiency of end-of-pipe management0
  污染物指标颗粒物的末端治理技术是直排，其效率为0，末端治理设施实际运行率（k值）计算公式为-。原文件中描述污染物类别为废气，污染物指标为颗粒物，此处对其进行了匹配工作，将其匹配到LCAflow库里面相最符合的流，污染物指标备注为颗粒物，产污系数备注为煤气化工段只考虑气化灰渣遗散
- chemical oxygen demand: 0.023
  the Technical of end-of-pipe management technology for pollution chemical oxygen demandisPretreatment + biochemical treatment + advenced treatment，Its Technical efficiency of end-of-pipe management90，The formula for calculating the actual operation rate (k-value) of the end-of-pipe treatment facility is /
  污染物指标化学需氧量的末端治理技术是预处理+生化处理+深度处理，其效率为90，末端治理设施实际运行率（k值）计算公式为k=治理设施运行时间（小时）/正常生产时间（小时）。原文件中描述污染物类别为废水，污染物指标为化学需氧量，此处对其进行了匹配工作，将其匹配到LCAflow库里面相最符合的流，污染物指标备注为化学需氧量
- particles (PM2.5 - PM10): 0.0252
  the Technical of end-of-pipe management technology for pollution particles (PM2.5 - PM10)isBag filter，Its Technical efficiency of end-of-pipe management99，The formula for calculating the actual operation rate (k-value) of the end-of-pipe treatment facility is /
  污染物指标颗粒物的末端治理技术是袋式除尘，其效率为99，末端治理设施实际运行率（k值）计算公式为k=除尘设备耗电量（千瓦时）/（除尘设备额定功率（千瓦）×除尘设备运行时间（小时））。原文件中描述污染物类别为废气，污染物指标为颗粒物，此处对其进行了匹配工作，将其匹配到LCAflow库里面相最符合的流，污染物指标备注为颗粒物，产污系数备注为煤气化工段包括煤粉再破碎研磨和气化灰渣遗散
- Exhaust gas: 460
  the treatment technology for the pollution of Exhaust gasdidn't offered
  污染物指标工业废气量的末端治理技术是-，末端治理设施实际运行率（k值）计算公式为-。原文件中描述污染物类别为废气，污染物指标为工业废气量，此处对其进行了匹配工作，将其匹配到LCAflow库里面相最符合的流，污染物指标备注为工业废气量
- Waste water: 0.25
  the treatment technology for the pollution of Waste waterdidn't offered，The formula for calculating the actual operation rate (k-value) of the end-of-pipe treatment facility is /
  污染物指标工业废水量的末端治理技术是-，末端治理设施实际运行率（k值）计算公式为-。原文件中描述污染物类别为废水，污染物指标为工业废水量，此处对其进行了匹配工作，将其匹配到LCAflow库里面相最符合的流，污染物指标备注为工业废水量

## Use advice
This dataset is derived from the Pollution Source Census Report and contains information on pollution emissions and related products. However, it does not include data on energy or chemical consumption, nor does it provide information on waste or co-product generation. When utilizing this dataset, please supplement the missing data based on actual conditions before use
该数据集来源于污染源普查报告，包含污染物排放及相关产品信息，但不包含能源或化学品消耗数据，也不提供废弃物或共生产物产生信息。在使用该数据集时，请根据实际情况补充缺失数据后再使用。

## Review details
Inventory: The internal review was done by several iteration steps concerning raw data validation, raw data documentation, representativity, completeness and consistency of modelling with regard to ISO 14040 and 14044.
清单： 内部审查通过几个迭代步骤完成，涉及原始数据验证、原始数据记录、代表性、完整性、与 ISO 14040 和 14044 有关的建模的一致性。

## Data sources
- 第二次全国污染源普查产排污核算系数手册（试用版）,二级代码25,四级代码2522文件，在完整版文件中第2904页
