# Electricity/electrical energy + heat energy ; Coal ; Pulverized coal boiler or circulating fluidized bed boiler ; 450~749 MW; NESPS2 / 电能/电能+热能 ; 煤炭 ; 煤粉锅炉或循环流化床锅炉 ; 450～749兆瓦 ; 全国第二次污染普查数据

Dataset: ILCD process, Unit process, single operation
Geography: CN
Reference year: 2019
Classification: Reference Parameters / Energy carriers and technologies / Electricity
Generated by: The data was created by the Office of the Second National Pollution Source Census of the Ministry of Ecology and Environment, and the data was organized by the TianGong Plan team for ILCD format / 生态环境部第二次全国污染源普查工作办公室创建数据，天工计划团队常慧敏整理数据为ILCD格式
Owner: Tiangong LCI Data Working Group / 天工LCI数据工作小组
Review: Dependent internal review by Tiangong LCI Data Working Group / 天工LCI数据工作小组
Amounts: no units in this file; such an amount is in the reference unit of its flow, which a separate flow dataset defines
copyright: false
licenseType: Free of charge for all users and uses

## General comment
the Technical of end-of-pipe management technology for pollution Exhaust gasisOthers (direct discharge)

## Technical purpose
该数据集代表了一种使用粉煤炉或循环流化床锅炉的燃煤发电过程，发电能力在450到749兆瓦之间。这种能源生成过程适用于主要使用煤炭作为初级能源的区域大规模供电。该数据集中指明的管末管理技术包括通过回用和利用策略处理废水，通过物理和化学过程处理化学需氧量（COD）和氨氮污染，以及通过直接排放处理废气。

## Reference product
- Coal: 1000; input; calculated
  源文件中描述为为煤炭，此处对其进行了匹配工作，将其匹配到LCAflow库里面相最符合的流，污染物指标备注为工业废水量

## Outputs
All rows: calculated
- Waste water: 240
  the Technical of end-of-pipe management technology for pollution Waste waterisOthers (reuse)
  污染物指标工业废水量的末端治理技术是其他（重复利用），末端治理设施实际运行率（k值）计算公式为（机组年实际运行小时数-废水总排口年事故排放小时数）/机组年实际运行小时数。原文件中描述污染物类别为废水，污染物指标为工业废水量，此处对其进行了匹配工作，将其匹配到LCAflow库里面相最符合的流，污染物指标备注为工业废水量
- Waste water: 240
  the Technical of end-of-pipe management technology for pollution Waste waterisOthers (utilization + direct discharge)
  污染物指标工业废水量的末端治理技术是其他（利用+直排），末端治理设施实际运行率（k值）计算公式为（机组年实际运行小时数-废水总排口年事故排放小时数）/机组年实际运行小时数。原文件中描述污染物类别为废水，污染物指标为工业废水量，此处对其进行了匹配工作，将其匹配到LCAflow库里面相最符合的流，污染物指标备注为工业废水量
- Ammonia Nitrogen: 0.00265
  the Technical of end-of-pipe management technology for pollution Ammonia NitrogenisOthers (physical treatment + chemical treatment)
  污染物指标氨氮的末端治理技术是其他（物理处理法+化学处理法），末端治理设施实际运行率（k值）计算公式为（机组年实际运行小时数-废水总排口年事故排放小时数）/机组年实际运行小时数。原文件中描述污染物类别为废水，污染物指标为氨氮，此处对其进行了匹配工作，将其匹配到LCAflow库里面相最符合的流，污染物指标备注为氨氮
- chemical oxygen demand: 0.03408
  the Technical of end-of-pipe management technology for pollution chemical oxygen demandisOthers (physical treatment + chemical treatment)
  污染物指标化学需氧量的末端治理技术是其他（物理处理法+化学处理法），末端治理设施实际运行率（k值）计算公式为（机组年实际运行小时数-废水总排口年事故排放小时数）/机组年实际运行小时数。原文件中描述污染物类别为废水，污染物指标为化学需氧量，此处对其进行了匹配工作，将其匹配到LCAflow库里面相最符合的流，污染物指标备注为化学需氧量
- Exhaust gas: 10150
  the Technical of end-of-pipe management technology for pollution Exhaust gasisOthers (direct discharge)
  污染物指标工业废气量的末端治理技术是其他（直排）。原文件中描述污染物类别为废气，污染物指标为工业废气量，此处对其进行了匹配工作，将其匹配到LCAflow库里面相最符合的流，污染物指标备注为工业废气量

## Use advice
This dataset is derived from the Pollution Source Census Report and contains information on pollution emissions and related products. However, it does not include data on energy or chemical consumption, nor does it provide information on waste or co-product generation. When utilizing this dataset, please supplement the missing data based on actual conditions before use
该数据集来源于污染源普查报告，包含污染物排放及相关产品信息，但不包含能源或化学品消耗数据，也不提供废弃物或共生产物产生信息。在使用该数据集时，请根据实际情况补充缺失数据后再使用。

## Review details
Inventory: The internal review was done by several iteration steps concerning raw data validation, raw data documentation, representativity, completeness and consistency of modelling with regard to ISO 14040 and 14044.
清单： 内部审查通过几个迭代步骤完成，涉及原始数据验证、原始数据记录、代表性、完整性、与 ISO 14040 和 14044 有关的建模的一致性。

## Data sources
- 第二次全国污染源普查产排污核算系数手册（试用版）,四级代码4411、4412文件，在完整版文件中第5275页
