# Rare Earth solvent extraction and precipitation;Rare Earth;In-situ leaching;neodymium iron boron (NdFeB) magnet

Dataset: ILCD process, Unit process, single operation
Geography: NMG-CN
Reference year: 2014
Classification: Unit processes / Materials production / Metals and semimetals
Functional unit: The functional unit is a 1 kg NdFeB magnet
LCI method principle: Attributional
LCI method approaches: Allocation - market value; Allocation - mass
Generated by: Tao Wang, twang@iue.ac.cn
Owner: Tiangong LCI Data Working Group
Review: Dependent internal review by Tiangong LCI Data Working Group
Amounts: no units in this file; such an amount is in the reference unit of its flow, which a separate flow dataset defines
copyright: false
licenseType: Free of charge for all users and uses

## General comment
This data set represents the production process for neodymium iron boron (NdFeB) magnets, which are critical components in various high-tech applications including electric motors in hybrid and electric vehicles, wind turbine generators, and hard disk drives. The process encompasses rare earth solvent extraction and precipitation, and in-situ leaching specifically within the Bayan Obo region in China. This data set is primarily valuable for stakeholders and industries involved in the production or utilization of NdFeB magnets. Nd and Pr are essential elements in this process, and despite their extraction and processing being similar, they are separated in the final solvent extraction step.

## Geography
Bayan Obo (China)

## Technology and included processes
The basic process for Nd and Pr production is the same at all three deposits. It is identical for Nd and Pr except for the last solvent extraction step (SX5) where both are separated.

## Reference product
- Neodymium oxalate: 2.49; calculated
  Neodymium oxalate. Bayan Obo: input for next process, Calcination

## Inputs
- Chemicals inorganic,Chemicals, inorganic: 0.13; calculated
  Chemicals, inorganic. Bayan Obo: annual demand of an industrial process is basis for the calculation
- Chemicals organic,Chemicals, organic: 1.63; calculated
  Chemicals, organic. Bayan Obo: annual demand of an industrial process is basis for the calculation
- Kerosene: 0.25; calculated
  Bayan Obo: annual demand of an industrial process is basis for the calculation
- hydrogen chloride: 22.02; calculated
  Bayan Obo: annual demand of an industrial process is basis for the calculation
- hexane: 0.045; calculated
  Bayan Obo: annual demand of an industrial process is basis for the calculation
- Magnesium oxide: 0.23; calculated
  Magnesium oxide. Bayan Obo: annual demand of an industrial process is basis for the calculation
- sodium hydroxide: 6.16; calculated
  Bayan Obo: annual demand of an industrial process is basis for the calculation
- sodium sulfate: 0.016; calculated
  Bayan Obo: annual demand of an industrial process is basis for the calculation
- phosphoric acid: 0.045; calculated
  Bayan Obo: annual demand of an industrial process is basis for the calculation
- Sodium carbonate: 2.95; calculated
  Sodium carbonate. Bayan Obo: annual demand of an industrial process is basis for the calculation
- transport in t*km,transport in t*km: 2.59; measured
  Bayan Obo: 20 km, 803 km for extraction and precipitation chemicals, lorry EURO3
- transport in t*km,transport in t*km: 0.26; measured
  Bayan Obo: 1046 km (Tianjin-Baotou), only for kerosene
- Electricity: 3.924; calculated
  Bayan Obo: estimation based on 200 solvent extraction cells and an energy consumption of 3 kW for each pump an 5 kW for each motor
- Water: 50.88
  Bayan Obo: predominantly calculated on base of molar dilution of the chemicals
- hydrated lime dry slaked: 10.18; calculated
  Bayan Obo: for wastewater treatment

## Outputs
- waste water - treated: 211; calculated
  Bayan Obo: calculation is based on water and chemicals input

## Deviations from the LCI method approaches
In this study, an allocation method based on the market prices of REOs28 is considered. To estimate uncertainties that refer to the allocation method, a mass-based allocation is undertaken as a sensitivity analysis

## Use advice
Users applying this data set in a Life Cycle Assessment must consider the specific nature of the NdFeB magnet production process, with particular attention to the solvent extraction step which involves the separation of neodymium (Nd) and praseodymium (Pr). For impact assessment purposes, it is crucial to account for the allocation method based on market prices of rare earth oxides, and also to incorporate a sensitivity analysis via a mass-based allocation approach to estimate uncertainties pertinent to the allocation method. The function of the process data is to analyze the environmental impacts per 1 kg of NdFeB magnet produced.

## Review details
Inventory: The internal review was done by several iteration steps concerning raw data validation, raw data documentation, representativity, completeness and consistency of modelling with regard to ISO 14040 and 14044.

## Data sources
- Marx, J., Schreiber, A., Zapp, P. & Walachowicz, F. Comparative Life Cycle Assessment of NdFeB Permanent Magnet Production from Different Rare Earth Deposits. ACS Sustainable Chem. Eng. 6, 5858–5867 (2018).
