# Ethylene carbonate production ; Ethylene carbonate ; Ethylene oxide and carbon dioxide cycloaddition method ; Ethylene oxide, carbon dioxide

Dataset: ILCD process, Unit process, single operation
Geography: BJ-CN
Classification: Materials production / Organic chemicals
Functional unit: Produce 1kg of ethylene carbonate
LCI method principle: Attributional
Generated by: Xin Chen, xinchen@mail.nankai.edu.cn
Owner: Tiangong LCI Data Working Group
Review: Dependent internal review by Tiangong LCI Data Working Group
Amounts: no units in this file; such an amount is in the reference unit of its flow, which a separate flow dataset defines
copyright: false
licenseType: Free of charge for all users and uses

## General comment
Ethylene oxide and carbon dioxide are the main production raw materials. This process not only generates ethylene carbonate, but also produces two side reactions, producing a large amount of water.

## Geography
Beijing Kunyuan Carbonic Ester & Chemicals Co., Ltd

## Technology and included processes
Ethylene oxide and carbon dioxide cycloaddition method

## Technical purpose
Ethylene carbonate is a critical intermediate used in the production of lithium batteries, electrolytes, and as a solvent and plasticizer in various industrial applications. It is also used as an intermediate in the synthesis of other chemicals.

## Reference product
- Ethylene carbonate: 1
  Data comes from the environmental performance assessment report of Beijing Kunyuan Carbonic Ester & Chemicals Co., Ltd

## Inputs
- carbon dioxide: 0.562
  (same comment as for Ethylene carbonate)
- Ethylene Oxide: 0.51
  (same comment as for Ethylene carbonate)
- Electricity: 0.07884
  (same comment as for Ethylene carbonate)
- process steam: 2.69
  (same comment as for Ethylene carbonate)

## Outputs
- non-methane volatile organic compounds: 2.93e-6
  (same comment as for Ethylene carbonate)

## Data selection and combination
All data comes from the environmental performance assessment report of Beijing Kunyuan Carbonic Ester & Chemicals Co., Ltd

## Data treatment and extrapolations
The data may have been simply multiplied or divided

## Use advice
When using this data set, ensure that the energy and material inputs as well as emissions related to the production of ethylene carbonate are fully accounted for. Consider the production of water as a byproduct and its treatment in the LCA. Users should verify that the data has been appropriately scaled to their specific context, especially if data has undergone simple multiplication or division. Given that the data is sourced from an environmental performance assessment report, subsequent developments or changes in the production process should be monitored for potential updates.

## Review details
Inventory: The internal review was done by several iteration steps concerning raw data validation, raw data documentation, representativity, completeness and consistency of modelling with regard to ISO 14040 and 14044.

## Data sources
- Yin, R., Hu, S. & Yang, Y. Life cycle inventories of the commonly used materials for lithium-ion batteries in China. Journal of Cleaner Production227, 960–971 (2019).
