# Vegetable Production ; Agricultural Inputs Production (Plastic Shed)

Dataset: ILCD process, Unit process, single operation
Geography: XA-SAX-CN
Reference year: 2012
Valid until: 2013
Classification: Materials production / Agricultural production means
Functional unit: 1000 kg tomatoes
Generated by: Haoran Zhang, hrzhang@whu.edu.cn
Owner: Tiangong LCI Data Working Group
Review: Dependent internal review by Tiangong LCI Data Working Group
Amounts: no units in this file; such an amount is in the reference unit of its flow, which a separate flow dataset defines
copyright: false
licenseType: Free of charge for all users and uses

## General comment
The study area is the suburb of Xi 'an, Shaanxi Province. The total annual solar radiation in this area is 4.81 MJ·m-2, the annual sunshine duration is 2163.8 h, the annual average temperature is 12.9 °C, the average precipitation is 630 mm, the average evaporation is 884 mm, and the frost-free period is 221 days. The solar greenhouse in this area belongs to the structure of earth wall and steel frame, and the vegetables are mainly tomatoes, and the farming method of planting two crops of tomatoes a year is used. Plastic greenhouses belong to steel frame structure, generally planting melons in early spring, and planting tomatoes in autumn. In this study, 10 solar greenhouses (all 6 m× 90 m) and 5 plastic greenhouses (all 9 m×110 m) were selected as research objects to investigate the material consumption in the construction and daily operation of solar greenhouses and plastic greenhouses. The input and output of tomato and watermelon production from July 2012 to June 2013 were recorded in detail. During this period, two crops of tomatoes were planted in each of the 10 solar temperature rooms, covering the shed in July 2012, planting in mid-August, harvesting in mid-November, pulling seedlings in mid-January and late 2013, planting the second crop of tomatoes in early February, harvesting began in early April and mid-mid-June, and the final harvest was in mid-late June. Five plastic greenhouses planted melons in mid-to-late March, harvested in mid-to-late May, pulled seedlings in mid-to-late June, planted tomatoes in mid-July, harvested in mid-to-late September, and pulled seedlings in late November. Soil disinfection and tilling should be carried out before planting. Organic fertilizer and phosphate fertilizer should be applied before planting. Topdressing fertilizer should be applied along with irrigation water, which is deep well water.

## Technology and included processes
The data were obtained as averages from 10 solar greenhouses and 5 plastic greenhouses. Based on the typical service life of construction materials, the consumption of building materials and energy for constructing solar greenhouses and plastic greenhouses were calculated as the equivalent of one year of usage. The service life was assumed to be 15 years for general building materials, 5 years for PVC water pipes, 1 year for greenhouse films (3 years for plastic greenhouses), and 3 years for the anti-cold films (skirt films of plastic greenhouses). The annual consumption of building materials for plastic greenhouses was evenly allocated to tomatoes and watermelons.

## Technical purpose
The data set describes the process of vegetable production using solar and plastic greenhouses with a focus on the production of tomatoes. It outlines the average consumption of materials and energy sources needed for the construction and maintenance of greenhouses, specific to agricultural applications. The service life of materials like PVC water pipes, greenhouse films, and anti-cold films is included to provide a realistic representation of annual material consumption distributed across tomato and watermelon production. Moreover, the system boundary encompasses the entire tomato cultivation process from nursery to harvest, excluding the stages beyond farm gate such as machinery production, market transport, and consumer phases.

## Reference product
- tomato: 1000; measured
  plastic greenhouse

## Inputs
- water: 0.159; measured
  plastic greenhouse
- Electricity: 600.13; measured
  plastic greenhouse

## Outputs
All rows: measured
- carbon dioxide (fossil): 41.953
  plastic greenhouse
- carbon monoxide: 0.03
  plastic greenhouse
- non-methane volatile organic compounds: 0.004
  plastic greenhouse
- acetylene: 0.002
  plastic greenhouse
- sulfur dioxide: 195
  plastic greenhouse
- Nitrogen oxides: 0.231
  plastic greenhouse
- Ammonia (NH4+, NH3, as N): 0.005
  plastic greenhouse
- ammonia: 0.032
  plastic greenhouse

## Deviations from the LCI method approaches
The system boundary defined in this study includes the construction of facilities and their routine operation (hereinafter referred to as "facility infrastructure"), and the production of materials required for them (cement, steel, bricks, and shed films, etc.), the production of agricultural inputs (chemical fertilizers, mulch films, fungicides, and insecticides), the cultivation of tomatoes (nursery, plowing, transplanting, mulching, fertilizing, spraying, irrigation, and harvesting) as well as the production and consumption of energy used in each process. It does not include the production of agricultural machinery, the transportation of tomatoes to the market for sale, or the process of consumer consumption.

## Data selection and combination
The environmental impact data of energy production and usage processes are sourced from literature (Di et al., 2007; Hu Zhiyuan et al., 2006). The resource, energy, and environmental emission data of the production of steel, cement, bricks, mulching films, frost protection films, plastic films, PVC water pipes, and fertilizers are taken from literature and the 'Clean Production Indicator System of the Phosphate Fertilizer Industry' and 'Clean Production Indicator System of the Nitrogen Fertilizer Industry'. Due to the lack of detailed research data, only energy consumption and CO2 emission volumes are considered in the production processes of insecticides and fungicides, represented in terms of the quality of effective ingredients, and data are adopted from the research results of West et al. (2002).

## Sampling procedure
In this study, 10 sunlight greenhouses (each with an area of 6 m×90 m) and 5 plastic greenhouses (each with an area of 9 m×110 m) were selected as research objects, and the material consumption of the construction and daily operation of the sunlight greenhouses and plastic greenhouses were investigated.

## Use advice
Users of this data set should take into account the specific service lives of different materials used in greenhouse construction for accurate life cycle assessment. Ensure the allocation of building materials consumption is properly scaled to the intended crop production. When applying this data to model the environmental impact of vegetable production, it is crucial to incorporate it within the defined system boundaries, and to not include post-harvest processes such as machinery production, transportation, and consumer consumption which are outside the scope of this study. Pay attention to the updates in methodological approaches, and if analyzing pesticides and fungicides production, only consider the energy and CO2 emissions due to limited available data.

## Review details
Inventory: The internal review was done by several iteration steps concerning raw data validation, raw data documentation, representativity, completeness and consistency of modelling with regard to ISO 14040 and 14044.

## Data sources
- 王效琴,吴庆强,周建斌,陈妍,吴发启.设施番茄生产系统的环境影响生命周期评价[J].环境科学学报,2014,34(11):2940-2947.
