# Chemical Pharmaceutical Ingredients ; Fermentation medium (corn, protein powder (slurry), starch, glucose, etc.) ; Fermentation ; 200~1000 t/a; NESPS2 / 化学药品原料药 ; 发酵培养基（玉米、蛋白粉（浆）、淀粉、葡萄糖等） ; 发酵 ; 200~1000吨/年 ; 全国第二次污染普查数据

Dataset: ILCD process, Unit process, single operation
Geography: CN
Reference year: 2019
Classification: Reference Parameters / Materials production / Organic chemicals
Generated by: The data was created by the Office of the Second National Pollution Source Census of the Ministry of Ecology and Environment, and the data was organized by the TianGong Plan team for ILCD format / 生态环境部第二次全国污染源普查工作办公室创建数据，天工计划团队常慧敏整理数据为ILCD格式
Owner: Tiangong LCI Data Working Group / 天工LCI数据工作小组
Review: Dependent internal review by Tiangong LCI Data Working Group / 天工LCI数据工作小组
Amounts: no units in this file; such an amount is in the reference unit of its flow, which a separate flow dataset defines
copyright: false
licenseType: Free of charge for all users and uses

## General comment
the Technical of end-of-pipe management technology for pollution Exhaust gasis/

## Technical purpose
所述的工业过程涉及使用由玉米、蛋白粉（浆）、淀粉和葡萄糖组成的发酵培养基，用于年产200至1000吨的高品质化学药品原料。此发酵过程对于生产各种药物在医药行业中至关重要。数据还详细说明了针对废水和废气的各种尾端污染控制技术途径，具体的管理技术针对化学需氧量、氨氮、磷、总氮和挥发性有机化合物，具有不同程度的技术效率。

## Reference product
- Chemical Drug Raw Materials: 1000; calculated
  源文件中描述为为化学药品原料药，此处对其进行了匹配工作，将其匹配到LCAflow库里面相最符合的流，污染物指标备注为废水量，产污系数备注为发酵工艺中采用非树脂提取工艺

## Outputs
All rows: calculated
- volatile organic compound: 0.07139
  the Technical of end-of-pipe management technology for pollution volatile organic compoundisRegenerative catalytic combustion method，Its Technical efficiency of end-of-pipe management99，The formula for calculating the actual operation rate (k-value) of the end-of-pipe treatment facility is k = power consumption of equipment (kWh) / (equipment rated power (kW) × equipment operating time (hours))
  污染物指标挥发性有机物的末端治理技术是蓄热式催化燃烧法，其效率为99，末端治理设施实际运行率（k值）计算公式为k=治理设施运行时间(天)/正常生产时间（天）/正常生产时间（天）。原文件中描述污染物类别为废气，污染物指标为挥发性有机物，此处对其进行了匹配工作，将其匹配到LCAflow库里面相最符合的流，污染物指标备注为挥发性有机物，产污系数备注为发酵工艺中采用树脂提取工艺
- volatile organic compound: 0.085668
  the Technical of end-of-pipe management technology for pollution volatile organic compoundisAdsorption + steam desorption，Its Technical efficiency of end-of-pipe management98.8，The formula for calculating the actual operation rate (k-value) of the end-of-pipe treatment facility is k = opreating time of treatment facilities (hours/year) / normal production time (hours/year)
  污染物指标挥发性有机物的末端治理技术是吸附+蒸气解析，其效率为98.8，末端治理设施实际运行率（k值）计算公式为k=治理设施运行时间(天)/正常生产时间（天）/正常生产时间（天）。原文件中描述污染物类别为废气，污染物指标为挥发性有机物，此处对其进行了匹配工作，将其匹配到LCAflow库里面相最符合的流，污染物指标备注为挥发性有机物，产污系数备注为发酵工艺中采用树脂提取工艺
- volatile organic compound: 0.10655
  the Technical of end-of-pipe management technology for pollution volatile organic compoundisRegenerative catalytic combustion method，Its Technical efficiency of end-of-pipe management99
  污染物指标挥发性有机物的末端治理技术是蓄热式催化燃烧法，其效率为99，末端治理设施实际运行率（k值）计算公式为k=治理设施运行时间(天)/正常生产时间（天）/正常生产时间（天）。原文件中描述污染物类别为废气，污染物指标为挥发性有机物，此处对其进行了匹配工作，将其匹配到LCAflow库里面相最符合的流，污染物指标备注为挥发性有机物，产污系数备注为发酵工艺中采用非树脂提取工艺
- phosphorus, total: 0.11153
  the Technical of end-of-pipe management technology for pollution phosphorus, totalisPhysicochemical treatment + anaerobic/aerobic biological combined treatment + physicochemical treatment，Its Technical efficiency of end-of-pipe management99，The formula for calculating the actual operation rate (k-value) of the end-of-pipe treatment facility is k = total amount of pollutants actually treated by the treatment facility (kg) / total amount of pollutants that should be treated (kg)
  污染物指标总磷的末端治理技术是物理化学处理法+厌/好氧生物组合处理+物理化学处理法，其效率为99，末端治理设施实际运行率（k值）计算公式为k=治理设施运行时间(天)/正常生产时间（天）/正常生产时间（天）。原文件中描述污染物类别为废水，污染物指标为总磷，此处对其进行了匹配工作，将其匹配到LCAflow库里面相最符合的流，污染物指标备注为总磷，产污系数备注为发酵工艺中采用非树脂提取工艺
- volatile organic compound: 0.12786
  the Technical of end-of-pipe management technology for pollution volatile organic compoundisAdsorption + steam desorption，Its Technical efficiency of end-of-pipe management98.8
  污染物指标挥发性有机物的末端治理技术是吸附+蒸气解析，其效率为98.8，末端治理设施实际运行率（k值）计算公式为k=治理设施运行时间(天)/正常生产时间（天）/正常生产时间（天）。原文件中描述污染物类别为废气，污染物指标为挥发性有机物，此处对其进行了匹配工作，将其匹配到LCAflow库里面相最符合的流，污染物指标备注为挥发性有机物，产污系数备注为发酵工艺中采用非树脂提取工艺
- phosphorus, total: 0.16461
  the Technical of end-of-pipe management technology for pollution phosphorus, totalisPhysicochemical treatment + anaerobic/aerobic biological combined treatment + physicochemical treatment，Its Technical efficiency of end-of-pipe management99
  污染物指标总磷的末端治理技术是物理化学处理法+厌/好氧生物组合处理+物理化学处理法，其效率为99，末端治理设施实际运行率（k值）计算公式为k=治理设施运行时间(天)/正常生产时间（天）/正常生产时间（天）。原文件中描述污染物类别为废水，污染物指标为总磷，此处对其进行了匹配工作，将其匹配到LCAflow库里面相最符合的流，污染物指标备注为总磷，产污系数备注为发酵工艺中采用树脂提取工艺
- phosphorus, total: 0.948005
  the Technical of end-of-pipe management technology for pollution phosphorus, totalisPhysicochemical treatment + anaerobic biological treatment + aerobic biological treatment，Its Technical efficiency of end-of-pipe management91.5
  污染物指标总磷的末端治理技术是物理化学处理法+厌氧生物处理+好氧生物处理，其效率为91.5，末端治理设施实际运行率（k值）计算公式为k=治理设施运行时间(天)/正常生产时间（天）/正常生产时间（天）。原文件中描述污染物类别为废水，污染物指标为总磷，此处对其进行了匹配工作，将其匹配到LCAflow库里面相最符合的流，污染物指标备注为总磷，产污系数备注为发酵工艺中采用非树脂提取工艺
- phosphorus, total: 1.39918
  the Technical of end-of-pipe management technology for pollution phosphorus, totalisPhysicochemical treatment + anaerobic biological treatment + aerobic biological treatment，Its Technical efficiency of end-of-pipe management91.5
  污染物指标总磷的末端治理技术是物理化学处理法+厌氧生物处理+好氧生物处理，其效率为91.5，末端治理设施实际运行率（k值）计算公式为k=治理设施运行时间(天)/正常生产时间（天）/正常生产时间（天）。原文件中描述污染物类别为废水，污染物指标为总磷，此处对其进行了匹配工作，将其匹配到LCAflow库里面相最符合的流，污染物指标备注为总磷，产污系数备注为发酵工艺中采用树脂提取工艺
- phosphorus, total: 1.50565
  the Technical of end-of-pipe management technology for pollution phosphorus, totalisPhysicochemical treatment + aerobic biological treatment，Its Technical efficiency of end-of-pipe management86.5
  污染物指标总磷的末端治理技术是物理化学处理法+好氧生物处理法，其效率为86.5，末端治理设施实际运行率（k值）计算公式为k=治理设施运行时间(天)/正常生产时间（天）/正常生产时间（天）。原文件中描述污染物类别为废水，污染物指标为总磷，此处对其进行了匹配工作，将其匹配到LCAflow库里面相最符合的流，污染物指标备注为总磷，产污系数备注为发酵工艺中采用非树脂提取工艺
- volatile organic compound: 1.78475
  the Technical of end-of-pipe management technology for pollution volatile organic compoundisCondensation，Its Technical efficiency of end-of-pipe management75，The formula for calculating the actual operation rate (k-value) of the end-of-pipe treatment facility is k = opreating time of treatment facilities (hours/year) / normal production time (hours/year)
  污染物指标挥发性有机物的末端治理技术是冷凝法，其效率为75，末端治理设施实际运行率（k值）计算公式为k=治理设施运行时间(天)/正常生产时间（天）/正常生产时间（天）。原文件中描述污染物类别为废气，污染物指标为挥发性有机物，此处对其进行了匹配工作，将其匹配到LCAflow库里面相最符合的流，污染物指标备注为挥发性有机物，产污系数备注为发酵工艺中采用树脂提取工艺
- phosphorus, total: 2.22223
  the Technical of end-of-pipe management technology for pollution phosphorus, totalisPhysicochemical treatment + aerobic biological treatment，Its Technical efficiency of end-of-pipe management86.5
  污染物指标总磷的末端治理技术是物理化学处理法+好氧生物处理法，其效率为86.5，末端治理设施实际运行率（k值）计算公式为k=治理设施运行时间(天)/正常生产时间（天）/正常生产时间（天）。原文件中描述污染物类别为废水，污染物指标为总磷，此处对其进行了匹配工作，将其匹配到LCAflow库里面相最符合的流，污染物指标备注为总磷，产污系数备注为发酵工艺中采用树脂提取工艺
- volatile organic compound: 2.66375
  the Technical of end-of-pipe management technology for pollution volatile organic compoundisCondensation，Its Technical efficiency of end-of-pipe management75，The formula for calculating the actual operation rate (k-value) of the end-of-pipe treatment facility is k = opreating time of treatment facilities (hours/year) / normal production time (hours/year)
  污染物指标挥发性有机物的末端治理技术是冷凝法，其效率为75，末端治理设施实际运行率（k值）计算公式为k=治理设施运行时间(天)/正常生产时间（天）/正常生产时间（天）。原文件中描述污染物类别为废气，污染物指标为挥发性有机物，此处对其进行了匹配工作，将其匹配到LCAflow库里面相最符合的流，污染物指标备注为挥发性有机物，产污系数备注为发酵工艺中采用非树脂提取工艺
- volatile organic compound: 4.9973
  the Technical of end-of-pipe management technology for pollution volatile organic compoundisLow temperature plasma，Its Technical efficiency of end-of-pipe management30，The formula for calculating the actual operation rate (k-value) of the end-of-pipe treatment facility is k = total amount of pollutants actually treated by the treatment facility (kg) / total amount of pollutants that should be treated (kg)
  污染物指标挥发性有机物的末端治理技术是低温等离子体，其效率为30，末端治理设施实际运行率（k值）计算公式为k=治理设施运行时间(天)/正常生产时间（天）/正常生产时间（天）。原文件中描述污染物类别为废气，污染物指标为挥发性有机物，此处对其进行了匹配工作，将其匹配到LCAflow库里面相最符合的流，污染物指标备注为挥发性有机物，产污系数备注为发酵工艺中采用树脂提取工艺
- Nitrogen, organic bound: 5.24115
  the Technical of end-of-pipe management technology for pollution Nitrogen, organic boundisPhysicochemical treatment + anaerobic/aerobic biological combined treatment + physicochemical treatment，Its Technical efficiency of end-of-pipe management97.2
  污染物指标总氮的末端治理技术是物理化学处理法+厌/好氧生物组合处理+物理化学处理法，其效率为97.2，末端治理设施实际运行率（k值）计算公式为k=治理设施运行时间(天)/正常生产时间（天）/正常生产时间（天）。原文件中描述污染物类别为废水，污染物指标为总氮，此处对其进行了匹配工作，将其匹配到LCAflow库里面相最符合的流，污染物指标备注为总氮，产污系数备注为发酵工艺中采用非树脂提取工艺
- Ammonia Nitrogen: 6.19732
  the Technical of end-of-pipe management technology for pollution Ammonia NitrogenisPhysicochemical treatment + anaerobic/aerobic biological combined treatment + physicochemical treatment，Its Technical efficiency of end-of-pipe management95.1
  污染物指标氨氮的末端治理技术是物理化学处理法+厌/好氧生物组合处理+物理化学处理法，其效率为95.1，末端治理设施实际运行率（k值）计算公式为k=治理设施运行时间(天)/正常生产时间（天）/正常生产时间（天）。原文件中描述污染物类别为废水，污染物指标为氨氮，此处对其进行了匹配工作，将其匹配到LCAflow库里面相最符合的流，污染物指标备注为氨氮，产污系数备注为发酵工艺中采用非树脂提取工艺
- volatile organic compound: 7.139
  the Technical of end-of-pipe management technology for pollution volatile organic compoundisWithout terminal treatment facility，Its Technical efficiency of end-of-pipe management0，The formula for calculating the actual operation rate (k-value) of the end-of-pipe treatment facility is k = total amount of pollutants actually treated by the treatment facility (kg) / total amount of pollutants that should be treated (kg)
  污染物指标挥发性有机物的末端治理技术是无末端处理设施，其效率为0，末端治理设施实际运行率（k值）计算公式为/。原文件中描述污染物类别为废气，污染物指标为挥发性有机物，此处对其进行了匹配工作，将其匹配到LCAflow库里面相最符合的流，污染物指标备注为挥发性有机物，产污系数备注为发酵工艺中采用树脂提取工艺
- volatile organic compound: 7.4585
  the Technical of end-of-pipe management technology for pollution volatile organic compoundisLow temperature plasma，Its Technical efficiency of end-of-pipe management30
  污染物指标挥发性有机物的末端治理技术是低温等离子体，其效率为30，末端治理设施实际运行率（k值）计算公式为k=治理设施运行时间(天)/正常生产时间（天）/正常生产时间（天）。原文件中描述污染物类别为废气，污染物指标为挥发性有机物，此处对其进行了匹配工作，将其匹配到LCAflow库里面相最符合的流，污染物指标备注为挥发性有机物，产污系数备注为发酵工艺中采用非树脂提取工艺
- Ammonia Nitrogen: 10.4975
  the Technical of end-of-pipe management technology for pollution Ammonia NitrogenisPhysicochemical treatment + anaerobic/aerobic biological combined treatment + physicochemical treatment，Its Technical efficiency of end-of-pipe management91.7
  污染物指标氨氮的末端治理技术是物理化学处理法+厌/好氧生物组合处理+物理化学处理法，其效率为91.7，末端治理设施实际运行率（k值）计算公式为k=治理设施运行时间(天)/正常生产时间（天）/正常生产时间（天）。原文件中描述污染物类别为废水，污染物指标为氨氮，此处对其进行了匹配工作，将其匹配到LCAflow库里面相最符合的流，污染物指标备注为氨氮，产污系数备注为发酵工艺中采用非树脂提取工艺
- volatile organic compound: 10.655
  the Technical of end-of-pipe management technology for pollution volatile organic compoundisWithout terminal treatment facility，Its Technical efficiency of end-of-pipe management0
  污染物指标挥发性有机物的末端治理技术是无末端处理设施，其效率为0，末端治理设施实际运行率（k值）计算公式为/。原文件中描述污染物类别为废气，污染物指标为挥发性有机物，此处对其进行了匹配工作，将其匹配到LCAflow库里面相最符合的流，污染物指标备注为挥发性有机物，产污系数备注为发酵工艺中采用非树脂提取工艺
- phosphorus, total: 11.153
  the Technical of end-of-pipe management technology for pollution phosphorus, totalisWithout terminal treatment facility，Its Technical efficiency of end-of-pipe management0
  污染物指标总磷的末端治理技术是无末端处理设施，其效率为0，末端治理设施实际运行率（k值）计算公式为/。原文件中描述污染物类别为废水，污染物指标为总磷，此处对其进行了匹配工作，将其匹配到LCAflow库里面相最符合的流，污染物指标备注为总磷，产污系数备注为发酵工艺中采用非树脂提取工艺
- Nitrogen, organic bound: 11.3098
  the Technical of end-of-pipe management technology for pollution Nitrogen, organic boundisPhysicochemical treatment + anaerobic/aerobic biological combined treatment + physicochemical treatment，Its Technical efficiency of end-of-pipe management97.2
  污染物指标总氮的末端治理技术是物理化学处理法+厌/好氧生物组合处理+物理化学处理法，其效率为97.2，末端治理设施实际运行率（k值）计算公式为k=治理设施运行时间(天)/正常生产时间（天）/正常生产时间（天）。原文件中描述污染物类别为废水，污染物指标为总氮，此处对其进行了匹配工作，将其匹配到LCAflow库里面相最符合的流，污染物指标备注为总氮，产污系数备注为发酵工艺中采用树脂提取工艺
- Ammonia Nitrogen: 11.5093
  the Technical of end-of-pipe management technology for pollution Ammonia NitrogenisPhysicochemical treatment + aerobic biological treatment，Its Technical efficiency of end-of-pipe management90.9
  污染物指标氨氮的末端治理技术是物理化学处理法+好氧生物处理法，其效率为90.9，末端治理设施实际运行率（k值）计算公式为k=治理设施运行时间(天)/正常生产时间（天）/正常生产时间（天）。原文件中描述污染物类别为废水，污染物指标为氨氮，此处对其进行了匹配工作，将其匹配到LCAflow库里面相最符合的流，污染物指标备注为氨氮，产污系数备注为发酵工艺中采用非树脂提取工艺
- Ammonia Nitrogen: 15.9615
  the Technical of end-of-pipe management technology for pollution Ammonia NitrogenisPhysicochemical treatment + anaerobic/aerobic biological combined treatment + physicochemical treatment，Its Technical efficiency of end-of-pipe management95.1，The formula for calculating the actual operation rate (k-value) of the end-of-pipe treatment facility is k = operating time of wastewater treatment facilities (hours) / normal production time (hours)
  污染物指标氨氮的末端治理技术是物理化学处理法+厌/好氧生物组合处理+物理化学处理法，其效率为95.1，末端治理设施实际运行率（k值）计算公式为k=治理设施运行时间(天)/正常生产时间（天）/正常生产时间（天）。原文件中描述污染物类别为废水，污染物指标为氨氮，此处对其进行了匹配工作，将其匹配到LCAflow库里面相最符合的流，污染物指标备注为氨氮，产污系数备注为发酵工艺中采用树脂提取工艺
- phosphorus, total: 16.461
  the Technical of end-of-pipe management technology for pollution phosphorus, totalisWithout terminal treatment facility，Its Technical efficiency of end-of-pipe management0
  污染物指标总磷的末端治理技术是无末端处理设施，其效率为0，末端治理设施实际运行率（k值）计算公式为/。原文件中描述污染物类别为废水，污染物指标为总磷，此处对其进行了匹配工作，将其匹配到LCAflow库里面相最符合的流，污染物指标备注为总磷，产污系数备注为发酵工艺中采用树脂提取工艺
- Ammonia Nitrogen: 27.0368
  the Technical of end-of-pipe management technology for pollution Ammonia NitrogenisPhysicochemical treatment + anaerobic/aerobic biological combined treatment + physicochemical treatment，Its Technical efficiency of end-of-pipe management91.7
  污染物指标氨氮的末端治理技术是物理化学处理法+厌/好氧生物组合处理+物理化学处理法，其效率为91.7，末端治理设施实际运行率（k值）计算公式为k=治理设施运行时间(天)/正常生产时间（天）/正常生产时间（天）。原文件中描述污染物类别为废水，污染物指标为氨氮，此处对其进行了匹配工作，将其匹配到LCAflow库里面相最符合的流，污染物指标备注为氨氮，产污系数备注为发酵工艺中采用树脂提取工艺
- Ammonia Nitrogen: 29.6428
  the Technical of end-of-pipe management technology for pollution Ammonia NitrogenisPhysicochemical treatment + aerobic biological treatment，Its Technical efficiency of end-of-pipe management90.9
  污染物指标氨氮的末端治理技术是物理化学处理法+好氧生物处理法，其效率为90.9，末端治理设施实际运行率（k值）计算公式为k=治理设施运行时间(天)/正常生产时间（天）/正常生产时间（天）。原文件中描述污染物类别为废水，污染物指标为氨氮，此处对其进行了匹配工作，将其匹配到LCAflow库里面相最符合的流，污染物指标备注为氨氮，产污系数备注为发酵工艺中采用树脂提取工艺
- Nitrogen, organic bound: 41.1805
  the Technical of end-of-pipe management technology for pollution Nitrogen, organic boundisPhysicochemical treatment + anaerobic biological treatment + aerobic biological treatment，Its Technical efficiency of end-of-pipe management78
  污染物指标总氮的末端治理技术是物理化学处理法+厌氧生物处理+好氧生物处理，其效率为78，末端治理设施实际运行率（k值）计算公式为k=治理设施运行时间(天)/正常生产时间（天）/正常生产时间（天）。原文件中描述污染物类别为废水，污染物指标为总氮，此处对其进行了匹配工作，将其匹配到LCAflow库里面相最符合的流，污染物指标备注为总氮，产污系数备注为发酵工艺中采用非树脂提取工艺
- chemical oxygen demand: 45.0891
  the Technical of end-of-pipe management technology for pollution chemical oxygen demandisPhysicochemical treatment + anaerobic/aerobic biological combined treatment + physicochemical treatment，Its Technical efficiency of end-of-pipe management97.2
  污染物指标化学需氧量的末端治理技术是物理化学处理法+厌/好氧生物组合处理+物理化学处理法，其效率为97.2，末端治理设施实际运行率（k值）计算公式为k=治理设施运行时间(天)/正常生产时间（天）/正常生产时间（天）。原文件中描述污染物类别为废水，污染物指标为化学需氧量，此处对其进行了匹配工作，将其匹配到LCAflow库里面相最符合的流，污染物指标备注为化学需氧量，产污系数备注为发酵工艺中采用非树脂提取工艺
- Nitrogen, organic bound: 53.7218
  the Technical of end-of-pipe management technology for pollution Nitrogen, organic boundisPhysicochemical treatment + aerobic biological treatment，Its Technical efficiency of end-of-pipe management71.3，The formula for calculating the actual operation rate (k-value) of the end-of-pipe treatment facility is k = opreating time of treatment facilities (hours) / normal production time (hours)
  污染物指标总氮的末端治理技术是物理化学处理法+好氧生物处理法，其效率为71.3，末端治理设施实际运行率（k值）计算公式为k=治理设施运行时间(天)/正常生产时间（天）/正常生产时间（天）。原文件中描述污染物类别为废水，污染物指标为总氮，此处对其进行了匹配工作，将其匹配到LCAflow库里面相最符合的流，污染物指标备注为总氮，产污系数备注为发酵工艺中采用非树脂提取工艺
- chemical oxygen demand: 78.9059
  the Technical of end-of-pipe management technology for pollution chemical oxygen demandisPhysicochemical treatment + anaerobic biological treatment + aerobic biological treatment，Its Technical efficiency of end-of-pipe management95.1
  污染物指标化学需氧量的末端治理技术是物理化学处理法+厌氧生物处理+好氧生物处理，其效率为95.1，末端治理设施实际运行率（k值）计算公式为k=治理设施运行时间(天)/正常生产时间（天）/正常生产时间（天）。原文件中描述污染物类别为废水，污染物指标为化学需氧量，此处对其进行了匹配工作，将其匹配到LCAflow库里面相最符合的流，污染物指标备注为化学需氧量，产污系数备注为发酵工艺中采用非树脂提取工艺
- Nitrogen, organic bound: 88.8628
  the Technical of end-of-pipe management technology for pollution Nitrogen, organic boundisPhysicochemical treatment + anaerobic biological treatment + aerobic biological treatment，Its Technical efficiency of end-of-pipe management78，The formula for calculating the actual operation rate (k-value) of the end-of-pipe treatment facility is k = opreating time of treatment facilities (hours) / normal production time (hours)
  污染物指标总氮的末端治理技术是物理化学处理法+厌氧生物处理+好氧生物处理，其效率为78，末端治理设施实际运行率（k值）计算公式为k=治理设施运行时间(天)/正常生产时间（天）/正常生产时间（天）。原文件中描述污染物类别为废水，污染物指标为总氮，此处对其进行了匹配工作，将其匹配到LCAflow库里面相最符合的流，污染物指标备注为总氮，产污系数备注为发酵工艺中采用树脂提取工艺
- Nitrogen, organic bound: 115.926
  the Technical of end-of-pipe management technology for pollution Nitrogen, organic boundisPhysicochemical treatment + aerobic biological treatment，Its Technical efficiency of end-of-pipe management71.3
  污染物指标总氮的末端治理技术是物理化学处理法+好氧生物处理法，其效率为71.3，末端治理设施实际运行率（k值）计算公式为k=治理设施运行时间(天)/正常生产时间（天）/正常生产时间（天）。原文件中描述污染物类别为废水，污染物指标为总氮，此处对其进行了匹配工作，将其匹配到LCAflow库里面相最符合的流，污染物指标备注为总氮，产污系数备注为发酵工艺中采用树脂提取工艺
- chemical oxygen demand: 126.23
  the Technical of end-of-pipe management technology for pollution chemical oxygen demandisPhysicochemical treatment + anaerobic/aerobic biological combined treatment + physicochemical treatment，Its Technical efficiency of end-of-pipe management97.2
  污染物指标化学需氧量的末端治理技术是物理化学处理法+厌/好氧生物组合处理+物理化学处理法，其效率为97.2，末端治理设施实际运行率（k值）计算公式为k=治理设施运行时间(天)/正常生产时间（天）/正常生产时间（天）。原文件中描述污染物类别为废水，污染物指标为化学需氧量，此处对其进行了匹配工作，将其匹配到LCAflow库里面相最符合的流，污染物指标备注为化学需氧量，产污系数备注为发酵工艺中采用树脂提取工艺
- Ammonia Nitrogen: 126.476
  the Technical of end-of-pipe management technology for pollution Ammonia NitrogenisWithout terminal treatment facility，Its Technical efficiency of end-of-pipe management0
  污染物指标氨氮的末端治理技术是无末端处理设施，其效率为0，末端治理设施实际运行率（k值）计算公式为/。原文件中描述污染物类别为废水，污染物指标为氨氮，此处对其进行了匹配工作，将其匹配到LCAflow库里面相最符合的流，污染物指标备注为氨氮，产污系数备注为发酵工艺中采用非树脂提取工艺
- chemical oxygen demand: 146.539
  the Technical of end-of-pipe management technology for pollution chemical oxygen demandisPhysicochemical treatment + aerobic biological treatment，Its Technical efficiency of end-of-pipe management90.9
  污染物指标化学需氧量的末端治理技术是物理化学处理法+好氧生物处理法，其效率为90.9，末端治理设施实际运行率（k值）计算公式为k=治理设施运行时间(天)/正常生产时间（天）/正常生产时间（天）。原文件中描述污染物类别为废水，污染物指标为化学需氧量，此处对其进行了匹配工作，将其匹配到LCAflow库里面相最符合的流，污染物指标备注为化学需氧量，产污系数备注为发酵工艺中采用非树脂提取工艺
- Nitrogen, organic bound: 187.184
  the Technical of end-of-pipe management technology for pollution Nitrogen, organic boundisWithout terminal treatment facility，Its Technical efficiency of end-of-pipe management0
  污染物指标总氮的末端治理技术是无末端处理设施，其效率为0，末端治理设施实际运行率（k值）计算公式为/。原文件中描述污染物类别为废水，污染物指标为总氮，此处对其进行了匹配工作，将其匹配到LCAflow库里面相最符合的流，污染物指标备注为总氮，产污系数备注为发酵工艺中采用非树脂提取工艺
- chemical oxygen demand: 220.903
  the Technical of end-of-pipe management technology for pollution chemical oxygen demandisPhysicochemical treatment + anaerobic biological treatment + aerobic biological treatment，Its Technical efficiency of end-of-pipe management95.1
  污染物指标化学需氧量的末端治理技术是物理化学处理法+厌氧生物处理+好氧生物处理，其效率为95.1，末端治理设施实际运行率（k值）计算公式为k=治理设施运行时间(天)/正常生产时间（天）/正常生产时间（天）。原文件中描述污染物类别为废水，污染物指标为化学需氧量，此处对其进行了匹配工作，将其匹配到LCAflow库里面相最符合的流，污染物指标备注为化学需氧量，产污系数备注为发酵工艺中采用树脂提取工艺
- Ammonia Nitrogen: 325.745
  the Technical of end-of-pipe management technology for pollution Ammonia NitrogenisWithout terminal treatment facility，Its Technical efficiency of end-of-pipe management0
  污染物指标氨氮的末端治理技术是无末端处理设施，其效率为0，末端治理设施实际运行率（k值）计算公式为/。原文件中描述污染物类别为废水，污染物指标为氨氮，此处对其进行了匹配工作，将其匹配到LCAflow库里面相最符合的流，污染物指标备注为氨氮，产污系数备注为发酵工艺中采用树脂提取工艺
- Waste water: 350.12
  the Technical of end-of-pipe management technology for pollution Waste wateris/
  污染物指标废水量的末端治理技术是/，末端治理设施实际运行率（k值）计算公式为/。原文件中描述污染物类别为废水，污染物指标为废水量，此处对其进行了匹配工作，将其匹配到LCAflow库里面相最符合的流，污染物指标备注为废水量，产污系数备注为发酵工艺中采用非树脂提取工艺
- Nitrogen, organic bound: 403.922
  the Technical of end-of-pipe management technology for pollution Nitrogen, organic boundisWithout terminal treatment facility，Its Technical efficiency of end-of-pipe management0，The formula for calculating the actual operation rate (k-value) of the end-of-pipe treatment facility is k = total amount of pollutants actually treated by the treatment facility (kg) / total amount of pollutants that should be treated (kg)
  污染物指标总氮的末端治理技术是无末端处理设施，其效率为0，末端治理设施实际运行率（k值）计算公式为/。原文件中描述污染物类别为废水，污染物指标为总氮，此处对其进行了匹配工作，将其匹配到LCAflow库里面相最符合的流，污染物指标备注为总氮，产污系数备注为发酵工艺中采用树脂提取工艺
- chemical oxygen demand: 410.249
  the Technical of end-of-pipe management technology for pollution chemical oxygen demandisPhysicochemical treatment + aerobic biological treatment，Its Technical efficiency of end-of-pipe management90.9
  污染物指标化学需氧量的末端治理技术是物理化学处理法+好氧生物处理法，其效率为90.9，末端治理设施实际运行率（k值）计算公式为k=治理设施运行时间(天)/正常生产时间（天）/正常生产时间（天）。原文件中描述污染物类别为废水，污染物指标为化学需氧量，此处对其进行了匹配工作，将其匹配到LCAflow库里面相最符合的流，污染物指标备注为化学需氧量，产污系数备注为发酵工艺中采用树脂提取工艺
- Waste water: 1347.75
  the Technical of end-of-pipe management technology for pollution Waste wateris/，The formula for calculating the actual operation rate (k-value) of the end-of-pipe treatment facility is k = annual power consumption of equipment (kWh) / (equipment power (kW) × annual operating hours (hours))
  污染物指标废水量的末端治理技术是/，末端治理设施实际运行率（k值）计算公式为/。原文件中描述污染物类别为废水，污染物指标为废水量，此处对其进行了匹配工作，将其匹配到LCAflow库里面相最符合的流，污染物指标备注为废水量，产污系数备注为发酵工艺中采用树脂提取工艺
- chemical oxygen demand: 1610.32
  the Technical of end-of-pipe management technology for pollution chemical oxygen demandisWithout terminal treatment facility，Its Technical efficiency of end-of-pipe management0
  污染物指标化学需氧量的末端治理技术是无末端处理设施，其效率为0，末端治理设施实际运行率（k值）计算公式为/。原文件中描述污染物类别为废水，污染物指标为化学需氧量，此处对其进行了匹配工作，将其匹配到LCAflow库里面相最符合的流，污染物指标备注为化学需氧量，产污系数备注为发酵工艺中采用非树脂提取工艺
- chemical oxygen demand: 4508.23
  the Technical of end-of-pipe management technology for pollution chemical oxygen demandisWithout terminal treatment facility，Its Technical efficiency of end-of-pipe management0
  污染物指标化学需氧量的末端治理技术是无末端处理设施，其效率为0，末端治理设施实际运行率（k值）计算公式为/。原文件中描述污染物类别为废水，污染物指标为化学需氧量，此处对其进行了匹配工作，将其匹配到LCAflow库里面相最符合的流，污染物指标备注为化学需氧量，产污系数备注为发酵工艺中采用树脂提取工艺
- Exhaust gas: 404201
  the Technical of end-of-pipe management technology for pollution Exhaust gasis/
  污染物指标废气量的末端治理技术是/，末端治理设施实际运行率（k值）计算公式为/。原文件中描述污染物类别为废气，污染物指标为废气量，此处对其进行了匹配工作，将其匹配到LCAflow库里面相最符合的流，污染物指标备注为废气量，产污系数备注为发酵工艺中采用非树脂提取工艺
- Exhaust gas: 516479
  the Technical of end-of-pipe management technology for pollution Exhaust gasis/
  污染物指标废气量的末端治理技术是/，末端治理设施实际运行率（k值）计算公式为/。原文件中描述污染物类别为废气，污染物指标为废气量，此处对其进行了匹配工作，将其匹配到LCAflow库里面相最符合的流，污染物指标备注为废气量，产污系数备注为发酵工艺中采用树脂提取工艺

## Use advice
This dataset is derived from the Pollution Source Census Report and contains information on pollution emissions and related products. However, it does not include data on energy or chemical consumption, nor does it provide information on waste or co-product generation. When utilizing this dataset, please supplement the missing data based on actual conditions before use
该数据集来源于污染源普查报告，包含污染物排放及相关产品信息，但不包含能源或化学品消耗数据，也不提供废弃物或共生产物产生信息。在使用该数据集时，请根据实际情况补充缺失数据后再使用。

## Review details
Inventory: The internal review was done by several iteration steps concerning raw data validation, raw data documentation, representativity, completeness and consistency of modelling with regard to ISO 14040 and 14044.
清单： 内部审查通过几个迭代步骤完成，涉及原始数据验证、原始数据记录、代表性、完整性、与 ISO 14040 和 14044 有关的建模的一致性。

## Data sources
- 第二次全国污染源普查产排污核算系数手册（试用版）,二级代码27,三级代码271.0文件，在完整版文件中第3027页
