# Aluminum electrolysis carbon anode production ; carbon anode ; petroleum coke

Dataset: ILCD process, Unit process, single operation
Geography: HEN-CN
Reference year: 2018
Classification: Unit processes / Materials production / Non-energetic raw materials
Generated by: Changqing Xu, xcq@bit.edu.cn
Owner: Tiangong LCI Data Working Group
Review: Dependent internal review by Tiangong LCI Data Working Group
Amounts: no units in this file; such an amount is in the reference unit of its flow, which a separate flow dataset defines
copyright: false
licenseType: Free of charge for all users and uses

## General comment
无流程图

## Time period
Year of publication

## Technical purpose
The carbon anodes produced through this process are predominantly used in the aluminum electrolysis industry. They are essential components for the production of primary aluminum where they function as conductors of electricity and take part in the electrolytic reduction of alumina. As such, they are integral to the aluminum smelting process.

## Reference product
- anode, for metal electrolysis: 1000; missing unimportant

## Inputs
All rows: missing unimportant
- electricity, high voltage, aluminium industry: 759.6
- light fuel oil: 69
- pitch: 220
  煤沥青
- Petroleum Coke: 1140
- coal gas: 1.29e6

## Outputs
All rows: missing unimportant
- carbon dioxide (fossil),carbon dioxide (fossil): 1053
- carbon monoxide (fossil),carbon monoxide (fossil): 400
- sulfur dioxide: 3.03
- Nitrogen oxides: 2.04
- methane (fossil): 0.49
- particles (> PM10): 0.16
- particles (PM2.5): 0.1
- hydrogen fluoride: 0.046
- polycyclic aromatic hydrocarbons: 0.027

## Use advice
When using this data set, users should ensure that it is applicable to the specific type of aluminum electrolysis process in question. The data likely excludes the potential recycling of carbon anodes and does not account for the production of petroleum coke (a precursor for carbon anode production). Special attention should be paid to the year of publication, as technological and environmental standards may have evolved since the data was reported. Adaptation may be required to reflect current processes.

## Review details
Inventory: The internal review was done by several iteration steps concerning raw data validation, raw data documentation, representativity, completeness and consistency of modelling with regard to ISO 14040 and 14044.

## Data sources
- 王姗姗, 刘赛男, 王灿, & 张瑞芹. 基于生命周期评价的河南省原铝生产环境影响分析. 轻金属 1-7+16 (2018)
