# PVC production and waste ; PVC materials

Dataset: ILCD process, Unit process, black box
Geography: CN
Reference year: 1995
Classification: Unit processes / Materials production / Plastics
Generated by: Huijuan Guo, GHJ@email.ncu.edu.cn
Owner: Tiangong LCI Data Working Group
Review: Dependent internal review by Tiangong LCI Data Working Group
Amounts: no units in this file; such an amount is in the reference unit of its flow, which a separate flow dataset defines
copyright: false
licenseType: Free of charge for all users and uses

## General comment
The starting and ending points of this study are focused on the extraction, transportation, extraction, production of polymers, and waste disposal of crude oil. However, the use stage of materials is not considered in this article, and waste disposal has chosen the landfill method that is considered to have a significant environmental impact in relevant literature, And this landfill method is also widely used in the disposal of urban solid waste in China. The environmental emissions brought by energy production are included in the energy consumption ratio of each stage

## Geography
我国的国情出发

## Technical purpose
The PVC material resulting from this industrial process is designed for various applications including construction materials, household items, medical devices, and automotive parts. The polymer exhibits qualities relevant to these uses such as durability, chemical resistance, and flexibility. However, the specific data set does not account for the usage phase of the materials.

## Reference product
- polyvinylchloride resin (B-PVC): 1000; measured
  PVC

## Inputs
- crude oil; 42.3 MJ/kg: 0.73; measured
  crude
- Energy,unspecified: 55943; measured
  Energy consumption
- sodium chloride: 0.56; measured
  crude salt

## Outputs
All rows: measured
- carbon dioxide (fossil): 8688.59
  原文未区分bio和fossil，根据专家判断此处为fossil
- sulfur dioxide: 74.18
- Nitrogen oxides: 0.172
  NOx
- methane (fossil): 13
  原文未区分bio和fossil，根据专家判断此处为fossil
- chlorine: 7.6e-5
  Cl2
- 1,2-dichloroethane: 4.93
  EDC
- carbon monoxide (fossil): 1.03
  原文未区分bio和fossil，根据专家判断此处为fossil
- vinyl chloride: 0.34
  VCM (Vent to atmosphere)
- polyvinylchloride resin (B-PVC): 0.01
  PVC
- waste water - untreated: 37123
  wastewater
- Waste (unspecified): 1183.35
  Waste residue

## Data selection and combination
本文评价中所使用的数据来源有：企业内部实际生产数据、工艺改进的设计数据、国家环 境保护部门数据；我国相关的统计年鉴、文献等公开出版

## Data treatment and extrapolations
由于本文所研究的材料涉及到多产品系统，我们将各产品系统的输入和输出数据按照质量比例进行了分配

## Use advice
When utilizing this LCA data set, it is critical to note that it does not include the use phase of PVC materials, making it less suitable for studies investigating the entire lifecycle of PVC products. For waste disposal, it assumes landfilling as the primary method, which should be considered when assessing environmental impact. The user should ensure alignment with the goal and scope of their study when applying the data, which includes emissions data based on the energy consumed at each production stage. The inputs and outputs of the multi-product system were allocated based on mass ratios, and this should be taken into account if the data set is used in a context with different treatment options or a specific product focus. The functional unit for this evaluation is 1000kg of PVC.

## Review details
Inventory: The internal review was done by several iteration steps concerning raw data validation, raw data documentation, representativity, completeness and consistency of modelling with regard to ISO 14040 and 14044.

## Data sources
- 陈红, 郝维昌, 石凤 & 王天民. 几种典型高分子材料的生命周期评价. 环境科学学报 24, 545–549 (2004).
