# nickel–cobalt saggarsrecycling and utilizing

Dataset: ILCD process, Unit process, black box
Geography: CN
Reference year: 2018
Classification: Unit processes / End-of-life treatment / Material recycling
Functional unit: calculation basis is GEB2016 (12.0 × 1024 sej)
Generated by: Pengfei, pengfei24@email.ncu.edu.cn
Owner: Tiangong LCI Data Working Group
Review: Dependent internal review by Tiangong LCI Data Working Group
Amounts: no units in this file; such an amount is in the reference unit of its flow, which a separate flow dataset defines
copyright: false
licenseType: Free of charge for all users and uses

## General comment
Utilizing the recycled waste sagger, nickel, cobalt and manganese precursors are extracted, as well as lithium carbonate and other products, and by-products such as alum and potassium sulphate are produced through the processes of physical separation, reductive leaching, tandem separation, evaporation and crystallization, and purification.

## Technology and included processes
In the physical separation process, the inner surface of recycled waste saggars which contain multiple metals is first mechanically ground into powder. Then, this powder is separated from the saggars and enters the reduction and leaching process. The remain.ing saggars are used as a base aggregate for ceramic production, In the reduction andleaching process, the metal elements, including nickel, cobalt, lithium, and manganeseare immersed in an acid solution. The acid solution enters the cascade separation processto obtain primary products of important elements. The produced acid leaching residuesare treated as solid waste by qualified institutions for further processing. The acid leach.ing solution enters the cascade separation step, a crude nickel-cobalt-manganese ternaryprecursor product is generated that goes to the purification step, and alum, aluminumhydroxide, and magnesium hydroxide are generated for sale. The remaining filtrate entersthe crystallization step for further refinement, In the crystallization process, the filtrateis evaporated and crystallized to produce a crude product of lithium carbonate, and itproduces potassium sulfate, The crude lithium carbonate enters the purification processand the potassium sulfate is for direct sale. The remaining concentrated mother liquorenters the cascade separation process for the further extraction of metal elements. In thepurification process, the nickel, cobalt, and manganese precursors and lithium carbonateare purified to battery quality and sold as the main products.

## Technical purpose
The technology for recycling and utilizing nickel-cobalt saggars described refers to the extraction of valuable materials such as nickel, cobalt, and manganese precursors, as well as lithium carbonate from recycled waste sagger materials. This process is designed for the recovery of these critical materials from spent lithium battery casings. The secondary products produced, including alum and potassium sulphate, are typically utilized in various industrial applications, such as in the production of alum-based products and fertilizers.

## Reference product
- Ni-Co-containing saggars: 1000; input

## Inputs
- water,water: 149.2, 216, 85.6, 96.4 (4 entries)
- Electricity: 29.7, 17.82, 3.96, 59.4, 7.2 (5 entries)
- Sulfuric acid: 216
- waste water - untreated: 160
  Leaching residue washing water
- process steam: 10, 12, 10 (3 entries)
- potassium: 55.6
  Potassium hydroxide
- Concentrated Mother Liquor: 59.6
  Concentrated mother liquor
- potassium: 20
  Potassium sulfate
- Potassium carbonate: 66
- process steam: 198
  Steam
- Ni-Co-Mn precursor: 5.8
  Crude Ni-Co-Mn precursor
- Lithium carbonate: 35.2
  Crude lithium carbonate
- Sulfuric acid(98%): 10
  Sulfuric acid（98%）
- Carbon dioxide (fossil): 11
  The original text does not distinguish between bio and fossil, and according to experts, it is fossil here
- water,water: 16
  Pure water
- ammonium: 9
  25%Ammonia
- sodium hydroxide: 6
- Polishing Powder: 171.4
  Polishing powder with 30% water content
- Acidic Leaching Liquor: 647
  Acidic leaching liquor
- Methanol: 693.2
  Contains potassium ion and lithium ion filter liquor

## Outputs
- bauxite: 977.8
  Ceramic aggregate
- Polishing Powder: 171.4
  Polishing powder with 30% water content
- Acidic Leaching Liquor: 647
  Acidic leaching liquor
- Production residues (unspecified): 128.4
  Leaching residue
- Alum: 166.2
- Ni-Co-Mn precursor: 5.8, 5, 28.2 (3 entries)
- Methanol: 693.2
  Contains potassium ion and lithium ion filter liquor
- Magnesium hydroxide: 1.4
- Aluminum hydroxide: 1.2
- sulfate: 104
  Potassium sulfate
- Concentrated Mother Liquor: 59.6
  Concentrated mother liquor
- Process water: 656.8
  Condensed water
- Lithium carbonate: 35.2
  Crude lithium carbonate
- Slag: 1.8
  Calcium Magnesium slag
- waste water - untreated: 58

## Data selection and combination
The data used in this article are mainly derived from the analysis data of the results of the pilot test conducted by the Institute of Process Engineering of the Chinese Academy of Sciences with a company in Hunan Province, China, including physical separation, reduction and leaching, cascade separation, crystallization, and purification. The emergy values of the various raw materials and emissions are from the Appendix of “Energy Analysis Theory and Practice” by Liu and Yang

## Use advice
Users of this data set should ensure that the data is applied specifically to scenarios involving the recycling and recovery of nickel, cobalt, and manganese from lithium battery casings. It is important to account for the use phase behavior of recycled materials and to apply the data accordingly when modeling life cycle assessments. The emergy values given in the provided data must be handled with care, incorporating Liu and Yang's 'Energy Analysis Theory and Practice' for methodology reference. This data set is based on the functional unit of 1 kWh energy equivalence, with the calculation basis being GEB2016 (12.0 × 1024 sej). Users should ensure that their methodologies align with this basis when interpreting and integrating the data.

## Review details
Inventory: The internal review was done by several iteration steps concerning raw data validation, raw data documentation, representativity, completeness and consistency of modelling with regard to ISO 14040 and 14044.

## Data sources
- Zhang, W. et al. Evaluation of the Ecological Benefits of Recycling Multiple Metals from Lithium Battery Saggars Based on Emergy Analysis. SUSTAINABILITY 13, (2021).
