# Electricity production ; Thermal power ; Xinjiang

Dataset: ILCD process, Unit process, single operation
Geography: XJ-CN
Reference year: 2019
Classification: Unit processes / Energy carriers and technologies / Electricity
Generated by: Ruoxi Xiong, xiongrx0126@163.com
Owner: Tiangong LCI Data Working Group
Review: Dependent internal review by Tiangong LCI Data Working Group
Amounts: no units in this file; such an amount is in the reference unit of its flow, which a separate flow dataset defines
copyright: false
licenseType: Free of charge for all users and uses

## General comment
Thermal power generation includes seventeen fossil fuels such as raw coal, washed coal, oil and natural gas. The process only considers the direct power generation process, not the upstream raw material extraction and processing and the downstream power consumption

## Time period
Calculated based on data from the 2019 Energy Statistics Yearbook

## Technical purpose
The data represents a thermal power generation process within the Xinjiang Uygur Autonomous Region, primarily utilizing seventeen types of fossil fuels including raw coal, washed coal, oil, and natural gas. This process is dedicated to the direct generation of electricity and is typically employed within the energy sector to provide power for residential, commercial, and industrial purposes across the region.

## Reference product
- electricity for thermal power: 3.6; calculated

## Inputs
All rows: calculated
- Raw coal: 0.466137
- Other Washed Coal: 7.07e-6
- Gangue, in ground: 0.00524956
- Coke oven gas: 0.005365
- blast furnace gas: 0.00614
- Converter gas: 0.001654
- Diesel: 1.06e-5
- fuel oil, unspecified: 2.12e-6
- natural gas: 0.001212

## Outputs
- carbon dioxide (fossil): 0.875763; calculated
- sulfur dioxide: 0.000151336; calculated
- Nitrogen oxides: 0.000238566; calculated
- particles (> PM10): 2.8896e-5; calculated

## Data treatment and extrapolations
For the accounting method, please refer to the "Enterprise Greenhouse Gas Emissions Accounting Methods and Reporting Guidelines for Power Generation Facilities". Different forms of power generation and fuel consumption come from Chapter 3 (Energy Production) and Chapter 6 (Regional Energy Balance Sheet) in the "China Energy Statistical Yearbook 2020". The fuel parameters such as low calorific value and carbon content per unit calorific value used to calculate the carbon dioxide emission factor come from the "2019 China Regional Power Grid Carbon Dioxide Baseline Emission Factor Calculation Instructions OM" and the "Enterprise Greenhouse Gas Emission Accounting Method and Reporting Guide for Power Generation Facilities" 》

## Use advice
When utilizing this data for Life Cycle Assessment (LCA), users should note that only direct electricity generation processes are considered. Upstream raw material extraction and processing, as well as downstream power consumption, are excluded. The data should be interpreted within the context of energy production from fossil fuels specific to the Xinjiang Uygur Autonomous Region. Methodological considerations must accord with the 'Enterprise Greenhouse Gas Emissions Accounting Methods and Reporting Guidelines for Power Generation Facilities' and take into account the fuel parameters from the 'China Energy Statistical Yearbook 2020' and other cited official documentation. Appropriate application of carbon dioxide emission factors is critical for accurate environmental impact assessment.

## Review details
Inventory: The internal review was done by several iteration steps concerning raw data validation, raw data documentation, representativity, completeness and consistency of modelling with regard to ISO 14040 and 14044.

## Data sources
- 熊若熙. 中国电力生产和消费二氧化碳与污染物排放因子核算. (清华大学, 2023).
