# Municipal sludge treatment and disposal;wet sludge moisture content 76.2%;composting

Dataset: ILCD process, Unit process, single operation
Geography: XA-SAX-CN
Classification: Unit processes / End-of-life treatment / Waste water treatment
Functional unit: The residual sludge sludge of Xi'an No. 3 Sewage Treatment Plant has a moisture content of 76.2% and a functional unit of 1t residual sludge.
Generated by: Jin Sitian, 2331276@tongji.edu.cn
Owner: Tiangong LCI Data Working Group
Review: Dependent internal review by Tiangong LCI Data Working Group
Amounts: no units in this file; such an amount is in the reference unit of its flow, which a separate flow dataset defines
copyright: ['opt4ROkqig']
licenseType: Free of charge for all users and uses

## General comment
The composting process refers to high-temperature aerobic composting.

## Geography
Xi'an No. 3 Sewage Treatment Plant

## Technology and included processes
During the composting process, about 2/3 of the carbon is converted into carbon dioxide and 13.16% of the nitrogen is converted into ammonia when microorganisms are metabolized.

## Technical purpose
The residual sludge from Xi'an No. 3 Sewage Treatment Plant is used for composting purposes. This process serves an essential role in the waste management and fertilizer production sectors, transforming wet sludge with a moisture content of 76.2% into a product that can be utilized as a soil amendment.

## Reference product
- Sludge: 1000; input; estimated
  1t of remaining sludge with a moisture content of 76.2%

## Inputs
- Diesel: 0.00116; measured
- Electricity: 237.96; measured

## Outputs
All rows: calculated
- carbon dioxide (biogenic): 166.27
  The original text does not distinguish between biogenic and fossil, and according to experts, it is biogenic here.
- ammonia: 1.738
- Nitrogen oxides: 0.002316
- hydrogen sulfide: 0.03215
- sulfur dioxide: 0.00438

## Use advice
When incorporating this dataset into a Life Cycle Assessment, it is paramount to consider the boundaries of the composting process, ensuring that upstream and downstream impacts, such as transportation of sludge and the usage of compost, are accounted for. It is also essential to assess the methodological compatibility with the specific LCA study, for instance, adjusting the functional unit to match the scale of the treatment facility in the assessment.

## Review details
Inventory: The internal review was done by several iteration steps concerning raw data validation, raw data documentation, representativity, completeness and consistency of modelling with regard to ISO 14040 and 14044.

## Data sources
- 齐星昊. 基于生命周期评价的典型剩余污泥处理方法的环境影响比较研究[D].河南师范大学,2020.
