# Electrodeionization module production ; spiral-wound, CN

Dataset: ILCD process, Unit process, single operation
Geography: CN
Reference year: 2022
Classification: Materials production / Other materials
Functional unit: 1 item of EDI module
Generated by: Jiaqi Lu, wilsherelu@foxmail.com
Owner: Tiangong LCI Data Working Group
Review: Dependent internal review by Tiangong LCI Data Working Group
Amounts: no units in this file; such an amount is in the reference unit of its flow, which a separate flow dataset defines
copyright: false
licenseType: Free of charge for all users and uses

## General comment
The electrodeionization (EDI) module produced through the spiral-wound process is primarily used in water purification systems to remove ions from water, making it highly purified. This EDI module can be used in a variety of settings, including medical, laboratory, pharmaceutical, and industrial applications where demineralized water of high quality is a necessity.

## Reference product
- Electrodeionization components: 1; article inperiodical
  1 EDI module

## Inputs
All rows: article inperiodical
- electricity mix: 684
  Factory power consumption
- Titanium Ruthenium Electrode: 1.2
  Titanium-coated ruthenium anodes
- Steel hot rolled coil: 4.5
  Stainless steel cathode
- polyvinylchloride resin (E-PVC): 12.71
  PVC shell
- acrylonitrile-butadiene-styrene granulate (ABS): 3.82
  ABS shell
- Anion exchange resin: 3.35
  anion exchange resin
- Cation Exchange Resin: 2.75
  Cation exchange resin
- polyethylene high density granulate (PE-HD): 1.55
  polyethylene
- Anion exchange membrane: 3.36
  anion exchange membrane
- Ion Exchange Membranes: 4.38
  cation exchange membrane
- Epoxy resin: 0.71
  Epoxy glue

## Outputs
- waste incineration of plastics (unspecified) fraction in municipal solid waste (MSW): 0.021; article inperiodical
  Waste cation exchange membrane
- waste incineration of plastics (unspecified) fraction in municipal solid waste (MSW): 0.018; article inperiodical
  Waste anion exchange membrane
- waste incineration of plastics (unspecified) fraction in municipal solid waste (MSW): 0.37; article inperiodical
  Waste cation exchange resin
- waste incineration of plastics (unspecified) fraction in municipal solid waste (MSW): 0.31; article inperiodical
  Waste anion exchange resin

## Use advice
When incorporating this data set for the EDI module into a Life Cycle Assessment, it is important to ensure that the system boundaries include all life cycle stages of the module, from production to disposal. The use of the module in water purification should be modeled according to the specific requirements of the application, taking into account the expected lifespan and maintenance needs. Additionally, if the EDI module replaced or worked in conjunction with other water purification technologies, these changes should be reflected in the system analysis to accurately assess environmental impacts.

## Review details
Inventory: The internal review was done by several iteration steps concerning raw data validation, raw data documentation, representativity, completeness and consistency of modelling with regard to ISO 14040 and 14044.

## Data sources
- Yuan, Y. et al. Deduction of carbon footprint for membrane desalination processes towards carbon neutrality: A case study on electrodeionization for ultrapure water preparation. Desalination 559, 116648 (2023).
