# cement production|cement, alternative constituents 100%|new dry process kiln|mixed solid wastes

Dataset: ILCD process, LCI结果
Geography: XJ-CN
Reference year: 2021
Classification: Materials production / Other mineralic materials
Generated by: Jianchuan Qi
Amounts: no units in this file; such an amount is in the reference unit of its flow, which a separate flow dataset defines
copyright: false

## General comment
We adopt a new dry kiln process, using calcium carbide slag as the main raw material, combined with other industrial solid waste to produce cement, achieving the innovation of 100% solid waste raw material cement production.

## Geography
Tianye Group

## Model description
The system boundary in this evaluation starts from raw material mining and ends at the output of finished cement. The system includes the transportation process of raw materials and waste, pre-treatment process, cement preparation process, and is divided into 10 sub-processes based on actual production conditions. The functional unit for is defined as 1 ton of cement product.

## Reference product
- cement, alternative constituents 100%: 1000
  Full-solid waste raw material cement

## Inputs
All rows: measured
- steel slag: 20.1
  Steel slag
- copper scrap, sorted, pressed: 28.5
  Copper scrap
- blast furnace slag: 74.8
  Slag
- ash: 197.1
  Fly ash
- Carbide slag: 921
- Carbide slag, wet: 789
  Wet carbide slag
- Purified ash, from calcium carbide furnace off-gas: 249
  Purified gray
- silica sand: 102
  Silicon sand
- gypsum (desulphurized): 18.6
  Desulfurization gypsum
- citric acid residue: 10
  Citric acid residue
- limestone, crushed, for mill: 5
  Crushed limestone
- tap water: 219
  Water
- transport, freight, lorry, unspecified: 362
  Road transportation. Road transportation using the global common truck road transportation life cycle model inventory.
- hard coal: 79.5
  Coal. Coal using the Chinese commercial coal life cycle model inventory.
- electricity, medium voltage: 211.633
  Electricity. Electricity using the Chinese high-voltage power life cycle model inventory.

## Outputs
- carbon dioxide: 146; calculated
  CO2. The amount of CO2 emissions is calculated based on the limestone content and coal consumption of the raw materials, combined with the carbon content in the composition analysis results.
- sulfur dioxide: 0.01003; measured
  SO2
- Nitrogen oxides: 0.2313; measured
  NOX
- particles (> PM10): 0.01689; measured
  Particulate matter (PM), with an unspecified particle size, is treated as PM > 10 micrometers in diameter.
- ash: 0.715; measured
  Chlorine ash. The solid waste mainly consists of recyclable fly ash and non-recyclable chlorine-containing residues collected.

## Data selection and combination
The input and output data of materials and energy from various stage of cement production process were collected. The input and output of materials and energy came from enterprise production records, the rest of the data such as industrial solid waste treatment and direct discharge of pollutants come from the data in Ecoinvent3.0, ELCD, USLCI and other databases.
1. The main background resources consumed in the process of cement production from industrial solid waste are electricity are electricity, coal and energy consumed in the road transportation process. In order to ensure the unity of the evaluation basic data and the usability of the case, the life cycle inventory of background resources is based on the data in the Ecoinvent 3.0 database. Electricity adopts the inventory of life cycle models of high-voltage electricity sold in China's market, coal adopts the inventory of life cycle models of coal sold in China's market, and road transportation adopts the inventory of life cycle models of road transportation of universal trucks in the world.
2. The raw materials consumed in the process can be divided into raw meal and raw materials for blending. The raw meal consumed mainly include: calcium carbide slag, calcium carbide furnace dust, purification ash, fly ash, slag, silica sand, steel slag, copper slag. The raw materials for blending mainly include: desulfurization gypsum, fly ash, citric acid slag, crushed limestone. All raw material input values are from the actual production data of the enterprise.
3.The main pollutants produced in the process include exhaust gas, gas, waste water and solid waste. The exhaust gas mainly consists of CO2, SO2, NOx, and other pollutants emitted during the production process. The wastewater mainly comes from the cooling water and washing water used during the production process. The solid waste mainly includes fly ash that can be recycled and non-recyclable chlorine-containing residues. Among the above pollutants emitted, the emissions of SO2, NOx and atmospheric particulate matter are recorded in real time by the enterprise, and the CO2 emissions are calculated from the limestone content and coal consumption in the raw materials, combined with the carbon content in the composition analysis results.
4. The raw materials of industrial solid waste come from the surrounding power plants and chemical plants, and the transportation methods are truck road transportation outside the factory and crawler transportation inside the factory. The maximum road transportation distance is no more than 200 km. The movement of raw materials in the plant relies on electric crawlers, which are not included in the transportation distance.

## Sampling procedure
Tianye Group uses a new dry kiln technology and mainly utilizes carbide slag as the main raw material, combined with other industrial solid waste to produce cement, achieving 100% solid waste raw material cement production innovation.

## Data sources
- 宋晓玲, 梁智霖, 罗维, 黄东, 杨忠, 徐盼盼, 胡敬平, 侯慧杰, 刘冰川, & 杨家宽. (2021). 全工业固废原料制备水泥工艺的生命周期评价研究. 环境科学学报, 41(12), 5190–5199.
