# Wet sand Production;Sandstone sand making;Sand making machine sand making

Dataset: ILCD process, Unit process, single operation
Geography: CS-HUN-CN
Reference year: 2020
Classification: Unit processes / Materials production / Other mineralic materials
Generated by: Cui hang, Cuihang0716@163.com
Owner: Tiangong LCI Data Working Group
Review: Dependent internal review by Tiangong LCI Data Working Group
Amounts: no units in this file; such an amount is in the reference unit of its flow, which a separate flow dataset defines
copyright: false
licenseType: Free of charge for all users and uses

## General comment
The belt conveys the gravel with particle size less than 1cm to the sand making machine to produce 4~7mm coarse sand.

## Technical purpose
The given industrial process is utilized in the production of 4-7mm coarse sand from gravel with a particle size smaller than 1cm using a wet sand technique. This processed sand is likely used in the construction industry for concrete production, mortars, or as a base material under foundations, roads, and railroads.

## Reference product
- sand: 133333; measured
  Produced 4~7mm coarse sand

## Inputs
- gravel: 133333; measured
  The belt transports gravel with a particle size less than 1cm to the sand making machine to produce 4~7mm coarse sand.
- Electricity: 144; measured
  Sand making machine power consumption

## Use advice
When integrating this dataset into a Life Cycle Assessment, it is essential to account for the energy consumption and emissions associated with the conveyance and processing using the sand making machine. Considerations for the end-of-life phase should also include potential recycling of the produced sand or its use as a secondary material. Ensure that regional variations in raw material sourcing and technology efficiencies are considered.

## Review details
Inventory: The internal review was done by several iteration steps concerning raw data validation, raw data documentation, representativity, completeness and consistency of modelling with regard to ISO 14040 and 14044.

## Data sources
- 年产 60 万吨机制砂建设项目环评报告
