# Wet-steamed cotton dyeing and finishing ; printing and dyeing cotton ; singeing

Dataset: ILCD process, Unit process, single operation
Geography: SZ-JS-CN
Reference year: 2012
Classification: Unit processes / Systems / Textiles, furnitures and other interiors
Generated by: Yingfan Duan, 1300925579@qq.com
Owner: Tiangong LCI Data Working Group
Review: Dependent internal review by Tiangong LCI Data Working Group
Amounts: no units in this file; such an amount is in the reference unit of its flow, which a separate flow dataset defines
copyright: false
licenseType: Free of charge for all users and uses

## General comment
"Singeing" is a treatment in the printing and dyeing process aimed at removing surface fuzz or short fibers from cotton fabric using a flame. This process typically involves passing the cotton fabric through a flame or a heating device to burn off the surface fuzz or fine fibers, enhancing the overall smoothness and texture of the fabric.

## Geography
The study focuses on a printing and dyeing enterprise in Jiangsu Province, located in Changshu within the Yangtze River Delta Economic Zone.

## Technical purpose
The wet-steamed cotton dyeing and finishing process is primarily utilized in the textile industry for the treatment of cotton fabrics. This process involves printing, dyeing, and singeing operations. Singeing is employed to burn off the surface fibers from the fabric to create a smooth finish. Coal is used for generating steam and for heating transfer oil in boilers to achieve high operating temperatures necessary during the singeing and stentering (stretching and setting the width of fabric) processes. This specific use case is targeted at a textile enterprise located in the Yangtze River Delta economic zone, in Changshu, Jiangsu Province.

## Reference product
- Cotton Fabric: 167; measured

## Inputs
- Electricity: 98.8; measured
- Standard coal: 231; measured
- Crude coal: 21.8; calculated
- Cleaned coal: 54; calculated
- Fuel Oil: 0.465; calculated
- heavy fuel oil: 0.14; calculated
- Diesel oil: 0.64; calculated
- Coke Oven Gas: 0.853; calculated
- natural gas: 0.0109; calculated
- Gasoline (regular): 1400; measured
- river water: 5960; measured
- freshwater: 541; measured

## Outputs
- carbon dioxide (fossil): 670; calculated
- carbon monoxide (fossil): 0.0714; calculated
- sulfur dioxide: 4.71; calculated
- methane (fossil): 3.2; calculated
- Nitrogen oxides: 0.144; calculated
- nitrous oxide: 0.133; measured
- particles (> PM10): 0.201; calculated
- ammonia: 8.6e-6; measured
- non-methane volatile organic compounds: 0.00174; measured
- waste water - untreated: 4460; measured
- chemical oxygen demand: 5.08; calculated
- Suspended solids, unspecified,Suspended solids, unspecified: 0.552; calculated
- volatile organic compound: 0.265; calculated
- lead: 1.71e-6; calculated
- mercury: 3.6e-8; calculated
- fluorine: 3.24e-7; calculated
- cadmium: 6.35e-8; calculated
- arsenic: 1.47e-6; calculated

## Use advice
Users of this Life Cycle Assessment data should carefully consider the ratio of coal consumption between steam and heat transfer oil boilers, which according to surveyed enterprise's clean production reports, is 17:1. It is assumed that coal consumption for singeing and stentering is equal. The production and emission data for gasoline used as a heat transfer medium should be evenly allocated to these two processes since it circulates within the system with minimal loss and does not produce relevant pollutant emissions. When applying this data, ensure that methodological consistencies are maintained with respect to the energy sources used in the process and the geographical specificity of the data (Jiangsu Province, China).

## Review details
Inventory: The internal review was done by several iteration steps concerning raw data validation, raw data documentation, representativity, completeness and consistency of modelling with regard to ISO 14040 and 14044.

## Data sources
- 朱亚楠. 棉布连续轧染工艺生命周期环境影响评价. (南京大学, 2012).
