# Remediated soil ; Mercury contaminated agricultural soil ; Acid-facilitated low temperature desorption

Dataset: ILCD process, Unit process, black box
Geography: GZ-CN
Reference year: 2016
Classification: Unit processes / Other Services / Repair and maintenance
Functional unit: The functional unit in this study is the treatment of 1 tonne of mercury contaminated top soil in agricultural land to meet regulatory standards. The average initial mercury concentration is 134 mg/kg.
Generated by: Yang Xintong, yangxt@caep.org.cn
Owner: Tiangong LCI Data Working Group
Review: Dependent internal review by Tiangong LCI Data Working Group
Amounts: no units in this file; such an amount is in the reference unit of its flow, which a separate flow dataset defines
copyright: false
licenseType: Free of charge for all users and uses

## General comment
According to laboratory scale feasibility studies, the contaminated soil can be remediated by heating at 700°C for 30 min, or heating at 400°C for 60 min with a citric acid addition

## Geography
The study site is agricultural land contaminated by mercury, located in Guizhou Province in Southern China.This particular case is representative of the typical scale and scenario where agricultural land is contaminated by nearby mining and smelting operations.

## Technology and included processes
Contaminated soil is excavated and stockpiled at the site. The soil is crushed and screened to remove large debris including plastic, rubber, rocks, etc. Firstly, an additional acid-mixing step is added before soil is put in the kiln, an optimum dosage ratio of 15:1 molar ratio is used in acid addition. After being heated at 400 °C for 60 min to reach the cleanup goal of 1.5 mg/kg, the soil is cooled by spraying water onto it. After cooling, the soil is stockpiled at the site before it is transported to a nearby location for stockpiling (i.e. non-beneficial usage). During the thermal treatment, atmospheric air is continuously drawn into the kiln via a vacuum pump, and the vaporized mercury is carried out with the exhaust air. The exhaust air is then cooled using a water cooling system and subsequently with an air to-air heat exchanger. The majority of mercury compounds are removed by condensation in two knock-out tanks. The exhaust air then flows through two air phase, sulfur-impreganated activated carbon vessels to meet the air emission threshold of 12 mg/m3 for new emission sources in China. The condensed water is coagulated with metal scavenger, calcium hydroxide and poly aluminum chloride and the sludge is dewatered. The sludge is containerized and transported to a permanent storage facility for long-term mercury disposal. The supernatant water is treated by two liquid phase, sulfur-impreganated activated carbon vessels. The low temperature heating does not significantly alter soil properties; therefore, the treated soil is put back to the excavated agricultural land area for immediate reuse.

## Technical purpose
The provided data set represents a remediation process for agricultural land contaminated by mercury, typically arising from mining and smelting operations in the vicinity. It details the methodology for decontaminating mercury-laden soil to achieve regulatory cleanup targets suitable for agricultural use. The remediation technique involves heating the soil to facilitate desorption of mercury and additional treatments to meet air and water emission standards in China. The process allows for treated soil to be reused for agricultural purposes, maintaining the productivity of the land.

## Reference product
- Remediated soil: 1000; missing unimportant

## Inputs
All rows: missing unimportant
- coal-based powdered activated carbon: 1.1
- Plastic (unspecified): 0.25
- Steel: 1.6
- Concrete: 0.02
- Metal scavengers: 1.78
- hydrated lime dry slaked: 1.78
- Tap Water: 0.1
- transport in t*km: 13
- Electricity: 518.4
- Waste (solid): 3.6
  Mercury sludge for permanent storage
- Waste (solid): 1.1
  PAC with mercury residual for landilling
- contaminated soil: 1000

## Use advice
Users of this data set should take note that the process described is specific to mercury-contaminated soil in agricultural settings, particularly reflecting conditions typical of Guizhou Province in Southern China. When applying this data in life cycle assessments or similar studies, ensure that contextual factors such as local regulations, soil properties, and contamination levels are comparable. The thermal desorption technique and subsequent treatments highlighted should be evaluated for technological applicability in the targeted region. Additionally, the input and output flows, along with energy consumption detailed in the data set, must be carefully accounted for to ensure accurate environmental impact assessments.

## Review details
Inventory: The internal review was done by several iteration steps concerning raw data validation, raw data documentation, representativity, completeness and consistency of modelling with regard to ISO 14040 and 14044.

## Data sources
- Hou D ,Gu Q ,Ma F , et al. Life cycle assessment comparison of thermal desorption and stabilization/solidification of mercury contaminated soil on agricultural land [J]. Journal of Cleaner Production, 2016, 139 949-956.
