# clinker production|clinker

Dataset: ILCD process, LCI结果
Geography: CN
Reference year: 2022
Classification: Materials production / Other mineralic materials
LCI method principle: Other
Generated by: Siqi Yang
Amounts: no units in this file; such an amount is in the reference unit of its flow, which a separate flow dataset defines
copyright: false

## General comment
Producing cement clinker.

## Geography
A Cement Co., Ltd. along the Yangtze River

## Model description
The functional unit is 1 ton of P·I type portland cement. The carbon emission boundary for the entire life cycle of cement is set from the "cradle" to the "gate", which means from the upstream energy extraction, production and transportation stages to the transportation of finished cement to the using enterprise.

## Reference product
- clinker: 1000
  Clinker

## Inputs
- limestone, crushed, for mill: 1382; measured
  Limestone
- sandstone: 47; measured
  Sandstone
- iron ore: 19; measured
  Iron ore. There is a lack of relevant statistical data, and it is calculated the same as clay.

## Outputs
- carbon dioxide: 525.059; calculated
  CO2. It does not include carbon emissions during skilled calcination.

## Cut-off and completeness
Only the carbon footprint of clinker production is considered. The data is incomplete because the carbon emissions do not include "carbon emissions from the clinker calcination process".

## Data treatment and extrapolations
Carbon emissions value: The carbon footprint data of each unit process is accumulated.

## Data sources
- 甘万贵 & 赵青林. (2022). 钢渣烧制硅酸盐水泥熟料的减碳效果分析. 建材世界, 43(6), 121–125.
