# cement production|cement, ordinary portland cement|mixed solid wastes

Dataset: ILCD process, LCI结果
Geography: CN
Reference year: 2004
Classification: Materials production / Other mineralic materials
LCI method principle: Other
Generated by: Siqi Yang
Amounts: no units in this file; such an amount is in the reference unit of its flow, which a separate flow dataset defines
copyright: false

## General comment
In the burning or incineration process, the raw meal is fed from feed inlet to the preheater, and then falls into the calciner to decompose with coal combustion at 950 °C. Afterward, this decomposed materials fall into the kiln to be incinerated to form a new intermediate product–clinker over 1400 °C. This is New Suspended Preheater (NSP) technology. In 2012, there are more than 80% cement plants in China applying New Suspended Preheater (NSP) technology (CCA, 2013). In the final finishing process, cement is produced by granulating clinker, admixture and gypsum finely in cement grinding mill.

## Model description
“1 t of P·O cement” and “1 t of clinker (cl)” are used as functional unit at the same time. According to China Cement Association (CCA, 2013), P·O (Portland Ordinary) cement contributes more than 50% sales of total cement product. It is the requirement in China that there would be no more than 20% of admixtures and no more than 5% of gypsum in P·O cement. Therefore, the functional unit of “P·O cement” could be transferred to “clinker” by the ratio of 1:0.75.
The system boundary includes the cement production process within the boundaries of the cement plant, which is divided into the Preparation process, Incineration process, and Finishing process. The Preparation process includes the raw materials and coal transportation, transfer from yard to mill, grinding, homogenizing, and storage in the silo.

## Reference product
- cement, ordinary portland cement: 1000
  P. O cement

## Inputs
All rows: measured
- calcium carbonate: 1150
  Limestone;<=5km, belt conveyors
- sandstone: 40
  Sandstone;<=40km, heavy-duty trucks
- Iron tailings: 7.5
  Ferrous tailings;<=40km, heavy-duty trucks
- gypsum: 50
  Gypsum;<=60km, heavy-duty trucks
- Slags and ashes: 177.5; min 0.2; max 0.155; uniform
  Slag, Flyash (Flyash and Furnace Slag); <= 50km, heavy-duty trucks. The range of data (0.155-0.200) is given in the literature, here the mean value is filled in and the maximum and minimum values are recorded with uncertainty. Since the data distribution is not given in the literature, the default is uniform distribution.
- hard coal: 96
  Coal or Thermal energy;<=350 km, railways. The original data provided is 0.096 t ce or 2,814 MJ. The “ce” unit represents energy generated by burning one metric ton of coal, equivalent to the energy obtained from burning 5.2 barrels (700 kg) of oil or 890 cubic meters of natural gas, that is, 29,308 kJ.
- ground water: 0.165
  Fresh water. Pumped from wells. Water recycled rate 95-99%. Usually in China, every cement production line has about more than four wells in the cement plant to pump up fresh water only for cooling the machines with few pollutants. After sterilization there are even no pollutants in the waste water to be monitored. In this paper, the consumption of ground water is only considered which could be measured by flow meters. The recycled rate of fresh water in cement production can be high up to more than 95-99%. At an average level in a whole year the total fresh water demand is about 93.7 m3/h, or 0.165 m3/t P. O cement.

## Outputs
- carbon dioxide: 605; calculated
  CO2. It is noticed that only the direct CO2 emissions in the boundary of cement plant would be discussed in this paper. It is assumed that at high temperature and after long burning time, the CaCO3 and MgCO3 in the limestone should decompose completely in this paper. The amount of CO2 emissions can be concluded with the chemical composition analysis of clinker by X-ray diffraction (XRD) method in the laboratory of cement plant itself. The mass percentage of CaO and MgO to clinker is 63.55% and 3.00%. With the molecular weights of CO2, CaO and MgO, the amount of CO2 emissions from raw materials incineration is calculated to be 0.5323 tCO2/t cl. The calculation is as follows. (44/56 x 63.55% + 44/40 x 3.00%)x1 = 0.5323 tCO2=tcl. The mass percentage of carbon to coal is 51.36% with the chemical composition analysis in the cement laboratory. The consumptions of coal are 0.146 t/t cl. With the molecular weights of CO2 and C, the amounts of CO2 emissions due to coal combustion are calculated to be 0.2749 t/t cl. The calculation is as follows. 44/12 x 51.36% x 0.146 = 0.2749 tCO2/tcl. Then, the total CO2 emissions are added to be 0.807 t/t cl or 0.605 t/t P. O cement in the whole cement manufacturing.
- sulfur dioxide: 0.0745; min 0.113; max 0.036; uniform; measured
  SO2. The primary source of SO2 emissions is the chemical reactions of the sulfur content of raw materials and coal in the cement kiln. Cui and Li designed an on-line monitoring system which can measure pollution such as the SO2 emissions and to control the cement manufacturing safely with environmental benefit and energy is saving.
- Nitrogen oxides: 1.165; min 1.65; max 0.68; uniform; measured
  NOx. In this paper NOx is defined the total concentration of NO and NO2 and is presented by NO2 according to international standards. The high temperature and oxidizing atmosphere required for cement manufacturing in the incineration process are favorable for NOx formation. In the calciner and kiln, NOx emissions are formed by fuel combustion.
- particles (> PM10): 0.095; measured
  PM. In this paper, the PM emissions in cement production are from six processes as follows. I, the process of uploading, smashing, transferring, and stroraging of raw materials. II, the process of uploading, gringding, transferring, and stroraging of coal. III, the process of gringding of raw meal. IV, the process of incinerating, cooling, smashing, transferring, and stroraging of clinker. V, the process of drying and grinding of admixtures and gypsum. VI, the gringding, transferring, and stroraging of cement. In this study, there are 189 spots equipped to capture the PM including Electro-static Precipitators (ESP) and bag filters in cement plant. The concentration of PM emissions are measured by monitors equipped besides the outlets of dedust machines. The results in operation condition must be transferred to be standard condition with standard temperature and pressure. The type of particles is not given, so here we use >PM10 to represent.
- 2,3,7,8-tetrachlorodibenzo-p-dioxin: 3.32e-6; measured
  Dioxin (PCDD/FS), where the original unit of DIOXIN is written as NG I-Teq/M3.
- hydrogen chloride: 0.0002053; measured
  HCl
- non-methane volatile organic compounds: 0.0003047; measured
  NMVOC
- fluoride: 0.0002294; measured
  F(fluoride)
- arsenic V: 1.751e-5; min 27.4; max 7.62; uniform; measured
  As. Heavy metal particles
- cadmium: 2.855e-6; min 4.57; max 1.14; uniform; measured
  Cd. Heavy metal particles
- chromium: 8.78e-6; min 16.04; max 1.52; uniform; measured
  Cr. Heavy metal particles
- mercury: 7.41e-7; min 0.91; max 0.572; uniform; measured
  Hg. Heavy metal particles
- Nickel, ion: 1.712e-5; min 25.1; max 9.14; uniform; measured
  Ni. Heavy metal particles
- lead: 4e-6; min 6.86; max 1.14; uniform; measured
  Pb. Heavy metal particles
- Zinc, ion: 7.775e-6; min 13.95; max 1.6; uniform; measured
  Zn. Heavy metal particles
- copper: 1.33e-6; min 1.52; max 1.14; uniform; measured
  Cu. Heavy metal particles

## Sampling procedure
The input and output data are measured on-site from 18 cement plants with 30 cement production lines from 2004 to 2007and the biggest cement production company in BeijingTianjin-Hebei economy area of China–Beijing Building Material Group (BBMG) in 2010.

## Data sources
- Chen Li, Zuoren Nie, Suping Cui, Xianzheng Gong, Zhihong Wang, & Xiance Meng. (2014). The life cycle inventory study of cement manufacture in China. Journal of Cleaner Production, 72, 204–211.
