# Alumina production ; Alumina for metallurgy ; Bauxite ; 2016

Dataset: ILCD process, Unit process, single operation
Geography: CN
Reference year: 2021
Classification: Unit processes / Materials production / Non-energetic raw materials
Generated by: Yuzhen Feng, fyz22
Owner: Tiangong LCI Data Working Group
Review: Dependent internal review by Tiangong LCI Data Working Group
Amounts: no units in this file; such an amount is in the reference unit of its flow, which a separate flow dataset defines
copyright: false
licenseType: Free of charge for all users and uses

## General comment
Alumina produced in this process is intended for metallurgical applications. It is commonly used in the aluminum production industry as a primary raw material for the extraction of metallic aluminum through the Hall-Héroult process. This dataset represents alumina sourced from bauxite and refined in the year 2016 for industrial uses.

## Time period
Date of publication

## Reference product
- aluminium oxide, metallurgical: 1000; software or database
  alumina

## Inputs
All rows: software or database
- soda ash, dense: 137.77
  soda ash
- Petroleum Coke: 845.986
  Energy sources proportion of energy consumption is coal: fuel oil: coke: natural gas: coke even gas=46.0%: 11.0%: 7.1%: 14.1%: 21.7%
- coal gas: 2585.62
  (same comment as for Petroleum Coke)
- natural gas, high pressure: 1680.06
  (same comment as for Petroleum Coke)
- fuel oil, unspecified: 1310.68
  (same comment as for Petroleum Coke)
- hard coal: 5481.04
  (same comment as for Petroleum Coke)
- Water, unspecified natural origin: 1.27
  water consumption

## Data selection and combination
The data in this study refers to the LCA data of PA, SA, electricity, and other background data. The PA data were obtained from statistical data sources, and the SA data were mainly obtained from the literatures. The background data were mainly derived from the Chinese localization LCA database CAS RCEES 2018, which was established by the Research Center for Eco-Environmental Sciences, Chinese Academy of Sciences and covers LCA data for energy, materials, transportation, waste management etc.

## Use advice
The LCA data in this study should be used to evaluate the environmental performance of alumina production for metallurgical purposes. Attention should be given to the year of data collection (2016) as technology and environmental regulations may have evolved since then. Users should ensure to update the dataset with the most recent LCA data where available and consider geographical, temporal, and technological relevance when applying the dataset. For cradle-to-gate assessments, include transportation of bauxite and impacts of raw material extraction. Incorporate updates from CAS RCEES or equivalent databases for Chinese localization.

## Review details
Inventory: The internal review was done by several iteration steps concerning raw data validation, raw data documentation, representativity, completeness and consistency of modelling with regard to ISO 14040 and 14044.

## Data sources
- Ding, N., Liu, N., Lu, B. & Yang, J. Life cycle greenhouse gas emissions of aluminum based on regional industrial transfer in China. J. Ind. Ecol. 25, 1657–1672 (2021).
