# Transportation of straw｜Wheat straw｜Trucks with a capacity of 8 tons

Dataset: ILCD process, Unit process, single operation
Geography: CN
Reference year: 2020
Classification: Unit processes / Transport services / Road
Functional unit: taking 1 ton of wheat straw as the functional unit
LCI method principle: Consequential
Generated by: Chaoshuo Liu, liucs22@mails.jlu.edu.cn
Owner: Tiangong LCI Data Working Group
Review: Dependent internal review by Tiangong LCI Data Working Group
Amounts: no units in this file; such an amount is in the reference unit of its flow, which a separate flow dataset defines
copyright: false
licenseType: Free of charge for all users and uses

## General comment
The process data refers to the transportation of wheat straw using trucks that have a capacity of 8 tons. This transport function is integral for the supply chain in agricultural industries or bioenergy production where wheat straw is used as a raw material or feedstock.

## Reference product
- Wheat straw: 1000; measured

## Inputs
- Diesel: 2.685; measured

## Outputs
All rows: measured
- nitrogen dioxide: 0.09
- nitrous oxide: 0.000354
- hydrocarbons (unspecified): 0.014
- carbon dioxide (fossil): 8.698
  The expert notes that the original text does not differentiate between biogenic and fossil sources of emissions, and in their opinion, the emissions in question are fossil.
- carbon monoxide,carbon monoxide (fossil): 0.052
  (same comment as for carbon dioxide (fossil))

## Use advice
When utilizing this dataset for Life Cycle Assessment (LCA), ensure that the transportation distance, vehicle fuel efficiency, and load factor are appropriately accounted for. The functional unit for this dataset is the transportation of 1 ton of wheat straw. Adjustments should be made if the transportation conditions differ (e.g. distance, vehicle type) from the described process. Exclude any upstream processes such as the production of the wheat straw or the manufacturing of the truck. This data set should be used in conjunction with other datasets to model the full life cycle of the product.

## Review details
Inventory: The internal review was done by several iteration steps concerning raw data validation, raw data documentation, representativity, completeness and consistency of modelling with regard to ISO 14040 and 14044.

## Data sources
- Cheng, G., Zhao, Y., Pan, S., Wang, X. & Dong, C. A comparative life cycle analysis of wheat straw utilization modes in China. Energy 194, 116914 (2020).
