# Cold processing ; Optical components made of glass ; Optical component blanks ; Cold processing ; All sizes; NESPS2 / 冷加工 ; 玻璃制光学元件 ; 光学元件毛坯 ; 冷加工 ; 所有规模 ; 全国第二次污染普查数据

Dataset: ILCD process, Unit process, single operation
Geography: CN
Reference year: 2019
Classification: Reference Parameters / Materials production / Glass and ceramics
Generated by: The data was created by the Office of the Second National Pollution Source Census of the Ministry of Ecology and Environment, and the data was organized by the TianGong Plan team for ILCD format / 生态环境部第二次全国污染源普查工作办公室创建数据，天工计划团队常慧敏整理数据为ILCD格式
Owner: Tiangong LCI Data Working Group / 天工LCI数据工作小组
Review: Dependent internal review by Tiangong LCI Data Working Group / 天工LCI数据工作小组
Amounts: no units in this file; such an amount is in the reference unit of its flow, which a separate flow dataset defines
copyright: false
licenseType: Free of charge for all users and uses

## General comment
the Technical of end-of-pipe management technology for pollution chemical oxygen demandisPrecipitation separation，Its Technical efficiency of end-of-pipe management35，The formula for calculating the actual operation rate (k-value) of the end-of-pipe treatment facility is /

## Technical purpose
该工业过程用于冷加工玻璃制造光学元件，适合各种类型的光学元件毛坯。这些元件可用于如相机、显微镜和望远镜等精密设备，其中一致的光学清晰度和质量至关重要。所生产的光学元件可涵盖所有大小，既适合小型专用设备，也适合大型工业应用。

## Reference product
- Optical Glass: 1000; calculated
  源文件中描述为为玻璃制光学元件，此处对其进行了匹配工作，将其匹配到LCAflow库里面相最符合的流

## Outputs
- Waste water: 8100; calculated
  the Technical of end-of-pipe management technology for pollution Waste wateris/，The formula for calculating the actual operation rate (k-value) of the end-of-pipe treatment facility is /
  污染物指标废水量的末端治理技术是/。原文件中描述污染物类别为废水，污染物指标为废水量，此处对其进行了匹配工作，将其匹配到LCAflow库里面相最符合的流
- chemical oxygen demand: 0.2665; calculated
  the Technical of end-of-pipe management technology for pollution chemical oxygen demandisPrecipitation separation，Its Technical efficiency of end-of-pipe management35，The formula for calculating the actual operation rate (k-value) of the end-of-pipe treatment facility is /
  污染物指标化学需氧量的末端治理技术是沉淀分离，其效率为35，末端治理设施实际运行率（k值）计算公式为k=治理设施正常运行小时数（小时/年）/企业正常运转小时数（小时/年）。原文件中描述污染物类别为废水，污染物指标为化学需氧量，此处对其进行了匹配工作，将其匹配到LCAflow库里面相最符合的流

## Use advice
This dataset is derived from the Pollution Source Census Report and contains information on pollution emissions and related products. However, it does not include data on energy or chemical consumption, nor does it provide information on waste or co-product generation. When utilizing this dataset, please supplement the missing data based on actual conditions before use
该数据集来源于污染源普查报告，包含污染物排放及相关产品信息，但不包含能源或化学品消耗数据，也不提供废弃物或共生产物产生信息。在使用该数据集时，请根据实际情况补充缺失数据后再使用。

## Review details
Inventory: The internal review was done by several iteration steps concerning raw data validation, raw data documentation, representativity, completeness and consistency of modelling with regard to ISO 14040 and 14044.
清单： 内部审查通过几个迭代步骤完成，涉及原始数据验证、原始数据记录、代表性、完整性、与 ISO 14040 和 14044 有关的建模的一致性。

## Data sources
- 第二次全国污染源普查产排污核算系数手册（试用版）,二级代码30,三级代码305.0,四级代码3052文件，在完整版文件中第737页
