# Production stage ; crude oil ; logging, drilling and oil production engineering

Dataset: ILCD process, Unit process, single operation
Geography: DQ-HLJ-CN
Reference year: 2018
Classification: Unit processes / Energy carriers and technologies / Crude oil based fuels
LCI method principle: Attributional
LCI method approaches: Consequential
Generated by: zimeng li, 1577978537@qq.com
Owner: Tiangong LCI Data Working Group
Review: Dependent internal review by Tiangong LCI Data Working Group
Amounts: no units in this file; such an amount is in the reference unit of its flow, which a separate flow dataset defines
copyright: false
licenseType: Free of charge for all users and uses

## General comment
Mining Link

## Geography
This enterprise is the largest Daqing crude oil processing base in China.

## Technology and included processes
Logging refers to the process of measuring, analyzing and recording the physical properties of rocks and formations in Wells by using logging instruments during or after drilling, so as to obtain the properties of underground rocks and reservoir characteristics.Logging technology includes the selection and use of logging instruments, the acquisition and analysis of logging data, and the interpretation of logging curves. The commonly used logging methods include electric logging, acoustic logging, nuclear magnetic resonance logging and so on. Drilling technology involves the selection and operation of drilling equipment, the design and use of drill bit and drill pipe, and the circulation and management of drilling fluid. Common drilling methods include rotary drilling, circulation drilling and non-circulation drilling. Oil engineering involves the design, construction and management of oil Wells, the selection and operation of oil production equipment, and the maintenance and control of reservoir pressure. Common oil recovery technologies include natural oil production, artificial lifting, water flooding, gas flooding, polymer flooding and so on.

## Technical purpose
This industrial process pertains to the extraction stage of crude oil involving well logging, drilling, and oil production engineering. The crude oil extracted from this process at the largest Daqing crude oil processing base in China is intended for refining and subsequent use as a feedstock for producing various petrochemicals, fuels, and as a raw material for energy generation and industrial applications.

## Reference product
- LPG - liquefied petroleum gas: 1.171e9; uniform; missing unimportant
  Gasoline produced

## Inputs
- LPG - liquefied petroleum gas: 5.837e9; uniform; missing unimportant
  The total amount of carbon input in oil at the input end. 85% of which comes from Daqing Oilfield, accounting for14% of oil production in 2015. The enterprise is the largest Daqing crude oil processing base in the country.

## Outputs
- LPG - liquefied petroleum gas: 8.92e8; uniform; missing unimportant
  Amount of kerosene produced

## Use advice
When utilizing this dataset for Life Cycle Assessment, users must consider the technological specificity of the extraction process which includes well logging, drilling, and oil production engineering. Attention should be given to the environmental impact of these activities, including energy use, emissions, and potential ecosystems disturbances. It's important to integrate this data accurately within the broader LCA model, ensuring alignment with the goal and scope of the assessment, especially focusing on the upstream extraction impacts. Any recycling or end-of-life aspects concerning the crude oil should be examined in the context of their subsequent processing and usage phases.

## Review details
Inventory: The internal review was done by several iteration steps concerning raw data validation, raw data documentation, representativity, completeness and consistency of modelling with regard to ISO 14040 and 14044.

## Data sources
- 吴明,姜国强,贾冯睿等.基于物质流和生命周期分析的石油行业碳排放[J].资源科学,2018,40(06):1287-1296.
