# Municipal Sewage Treatment ; Wastewater ; AAO+MBR Process (Above Ground)

Dataset: ILCD process, Unit process, single operation
Geography: GZ-GD-CN
Classification: Unit processes / End-of-life treatment / Wastewater treatment
Generated by: HUANG Runyao, runyaoh@163.com
Owner: Tiangong LCI Data Working Group
Review: Dependent internal review by Tiangong LCI Data Working Group
Amounts: no units in this file; such an amount is in the reference unit of its flow, which a separate flow dataset defines
copyright: ['opt4ROkqig']
licenseType: Free of charge for all users and uses

## General comment
In municipal wastewater treatment, the above-ground AAO+MBR treatment process is an advanced combination of sewage treatment technologies. This process begins by introducing sewage into the treatment system utilizing AAO (Anaerobic-Anoxic-Oxic), where organic matter is oxidized and degraded in the aerobic zone before entering the anaerobic-anoxic zone for further removal of nutrients such as nitrogen and phosphorus. Subsequently, through the MBR (Membrane Bioreactor) process, water and microorganisms are effectively separated, ensuring high-quality treated water through solid-liquid separation with microfiltration membranes. The above-ground arrangement of this technology requires minimal space and is easy to maintain and operate. This combination of technologies efficiently removes pollutants such as organic matter, nitrogen, and phosphorus from wastewater, producing stable and reliable water quality that meets stringent discharge standards.

## Geography
广州市白云区沙太北路以东、犀牛南路以北地段

## Technology and included processes
The AAO+MBR treatment process (above-ground) exhibits the following technical characteristics:Membrane Bioreactor (MBR): This process utilizes a membrane bioreactor (MBR) wherein microfiltration membranes effectively separate water and microorganisms within the bioreactor. This membrane separation technology enables efficient solid-liquid separation, enhancing the water quality of treated water.Anaerobic-Anoxic-Oxic (AAO) Treatment Process: The AAO process combines aerobic and anoxic treatment zones, allowing for the removal of organic matter and nutrients such as nitrogen and phosphorus within a single system. Operational parameters such as oxygen supply, mixing rate, and gas-liquid ratio in both aerobic and anoxic zones need to be controlled to maintain optimal microbial growth conditions and reaction efficiency.Operational Conditions for Membrane Modules: Regarding the operation of MBR membrane modules, it is essential to maintain appropriate transmembrane pressure, flux, and cleaning cycles to ensure stable operation and long-term service life of the membrane modules.Related Upstream and Downstream Processes: Upstream processes for this technology include pretreatment of wastewater influent, such as screening, grit removal, and sedimentation, to remove large particles and settleable solids. Downstream processes involve membrane module cleaning and maintenance, as well as potential additional treatment steps such as advanced oxidation or disinfection, to ensure the final treated water meets discharge standards.

## Technical purpose
The AAO+MBR (Anoxic-Anaerobic-Oxic + Membrane Bioreactor) treatment process unit is intended for advanced wastewater treatment and recycling. This process is typically utilized in municipal or industrial wastewater treatment facilities for water purification and reduction of pollutants. The application of this process is relevant for areas in need of efficient space utilization and high-quality effluent, such as the urban region located east of Shatai North Road and north of Xinhu South Road in the Baiyun District of Guangzhou City.

## Reference product
- Wastewater: 0.1; input; measured

## Inputs
All rows: measured
- Secondary Steel Making Slag: 3.151e6
- aerated concrete block: 24033, 5693 (2 entries)
- Compost: 846
- Electricity: 1.998e7, 7.56e6 (2 entries)
- chemical oxygen demand: 0.00027
- biological oxygen demand: 0.00016
- nitrogen, total (excluding N2): 3.5e-5
- ammonia: 3e-5
- Phosphorus: 4.5e-6
- Suspended solids, unspecified,Suspended solids, unspecified,Suspended solids, unspecified: 0.00022
- primary energy from geothermics: 2.124
- sodium hypochlorite: 41.7, 2320 (2 entries)
- Gasoline (regular): 218

## Outputs
All rows: measured
- zirconium: 2e-5
- nitrogen trifluoride: 5e-6
- nitrogen monoxide: 1.17e-5
- nitrogen, total (excluding N2): 3.2e-7
- phosphorus, total: 3e-7
- carbon dioxide (fossil),carbon dioxide (fossil): 5e-7
- Sludge: 56260
- municipal solid waste deposition: 2.985e7
- steel rebar: 1.197e6

## Use advice
It is important to consider the specific context and regulatory requirements of the geographical area where the AAO+MBR treatment process is being evaluated. Users of this dataset should account for potential variations in influent wastewater characteristics and adapt the process parameters accordingly. The data should be applied with caution to other regions without proper calibration. Life cycle inventory and impact assessment practitioners must include considerations for energy use, chemical consumption, and treatment efficiency. Exclusion of recycling flows should be stated clearly if applicable. Moreover, technological advancements or changes in regulations may affect the relevance of the data; hence updates may be necessary over time.

## Review details
Inventory: The internal review was done by several iteration steps concerning raw data validation, raw data documentation, representativity, completeness and consistency of modelling with regard to ISO 14040 and 14044.

## Data sources
- 郝晓地,于文波,王向阳等.地下式污水处理厂全生命周期综合效益评价[J].中国给水排水,2021,37(07):1-10.DOI:10.19853/j.zgjsps.1000-4602.2021.07.001.
