# Electricity production ; Thermal power ; Gansu

Dataset: ILCD process, Unit process, single operation
Geography: GS-CN
Reference year: 2019
Classification: Unit processes / Energy carriers and technologies / Electricity
Generated by: Ruoxi Xiong, xiongrx0126@163.com
Owner: Tiangong LCI Data Working Group
Review: Dependent internal review by Tiangong LCI Data Working Group
Amounts: no units in this file; such an amount is in the reference unit of its flow, which a separate flow dataset defines
copyright: false
licenseType: Free of charge for all users and uses

## General comment
Thermal power generation includes seventeen fossil fuels such as raw coal, washed coal, oil and natural gas. The process only considers the direct power generation process, not the upstream raw material extraction and processing and the downstream power consumption

## Time period
Calculated based on data from the 2019 Energy Statistics Yearbook

## Technical purpose
The data set pertains to thermal power generation processes located in Gansu, China. It includes a variety of fossil fuels like raw coal, washed coal, petroleum, and natural gas for the production of electricity. This process is used to provide electric power to industrial, residential, and commercial sectors within regional networks. It should be noted that the data only encompasses the direct generation of electricity and does not account for the life cycle stages involving raw material extraction, processing or the consumption phase of the electricity produced.

## Reference product
- electricity for thermal power: 3.6; calculated

## Inputs
All rows: calculated
- Raw coal: 0.440306
- Gangue, in ground: 0.00467837
- Coke oven gas: 0.001065
- blast furnace gas: 0.016078
- Converter gas: 0.001561
- Diesel: 2.178e-5
- fuel oil, unspecified: 2.42e-6
- refinery gas: 8.348e-5
- natural gas: 0.001161

## Outputs
- carbon dioxide (fossil): 0.83301; calculated
- sulfur dioxide: 0.000143664; calculated
- Nitrogen oxides: 0.000226591; calculated
- particles (> PM10): 2.7597e-5; calculated

## Data treatment and extrapolations
For the accounting method, please refer to the "Enterprise Greenhouse Gas Emissions Accounting Methods and Reporting Guidelines for Power Generation Facilities". Different forms of power generation and fuel consumption come from Chapter 3 (Energy Production) and Chapter 6 (Regional Energy Balance Sheet) in the "China Energy Statistical Yearbook 2020". The fuel parameters such as low calorific value and carbon content per unit calorific value used to calculate the carbon dioxide emission factor come from the "2019 China Regional Power Grid Carbon Dioxide Baseline Emission Factor Calculation Instructions OM" and the "Enterprise Greenhouse Gas Emission Accounting Method and Reporting Guide for Power Generation Facilities" 》

## Use advice
Users of this data set should utilize it specifically for evaluating direct emissions from thermal power generation in Gansu and for calculating carbon dioxide emission factors. It is vital to adhere to the methodological framework provided in the 'Enterprise Greenhouse Gas Emissions Accounting Methods and Reporting Guidelines for Power Generation Facilities' when analyzing the data. Additionally, calculations should align with the parameters and statistics from the 2019 Energy Statistics Yearbook and the '2019 China Regional Power Grid Carbon Dioxide Baseline Emission Factor Calculation Instructions OM'. Users must ensure they are not incorporating upstream or downstream processes (e.g., fuel extraction or end-user electricity consumption) into their assessment when using this data.

## Review details
Inventory: The internal review was done by several iteration steps concerning raw data validation, raw data documentation, representativity, completeness and consistency of modelling with regard to ISO 14040 and 14044.

## Data sources
- 熊若熙. 中国电力生产和消费二氧化碳与污染物排放因子核算. (清华大学, 2023).
