# Alumina production ; Alumina for metallurgy ; Mixed process ; Bauxite

Dataset: ILCD process, Unit process, single operation
Geography: CN
Reference year: 2011
Classification: Materials production / Non-energetic raw materials
Generated by: Jinliang Xie, jinliang.research@gmail.com
Owner: Tiangong LCI Data Working Group
Review: Dependent internal review by Tiangong LCI Data Working Group
Amounts: no units in this file; such an amount is in the reference unit of its flow, which a separate flow dataset defines
copyright: false
licenseType: Free of charge for all users and uses

## General comment
The alumina produced through the mixed process, combining the Bayer and sintering methods, is intended for use in the metallurgical industry. The alumina serves as a vital precursor in the production of primary aluminum, where it undergoes the Hall-Héroult process to produce the metallic aluminum. As China's bauxite is primarily low-grade monohydrate bauxite with higher consumption of resources and energy, such alumina is crucial for aluminum production within the country.

## Time period
Dissertation Completion Date

## Reference product
- aluminium oxide, metallurgical: 1000; missing unimportant

## Inputs
All rows: missing unimportant
- electricity, high voltage, aluminium industry: 1152
- bauxite: 1910
- hard coal: 393.8
- petroleum coke: 33.1
- steam, in chemical industry: 3260
- heavy fuel oil: 83.9

## Outputs
All rows: missing unimportant
- chemical oxygen demand: 0.003
- carbon dioxide (fossil): 3572
- carbon monoxide: 4.004
- sulfur dioxide: 44.079
- methane: 4.807
- Nitrogen oxides: 17.601
- VOC, volatile organic compounds, unspecified origin: 0.545
- dinitrogen: 0.176
- Dust: 9.025
  粉尘
- Solid Waste: 921
  固体废物

## Use advice
This data set is related to the production of metallurgy-grade alumina by the mixed process and should only be applied to life cycle assessments (LCAs) of aluminum production from bauxite to primary aluminum. Consider the technological advancements that have altered the proportions of the Bayer and sintering processes over time. Exclude auxiliary materials like limestone and asphalt as their environmental impact is considered secondary to that of aluminum production. When modeling, focus on resource and energy consumption along with waste emissions during the manufacturing process, as these factors predominantly determine the environmental impact, while transportation, usage, and recycling phases have a lesser impact.

## Review details
Inventory: The internal review was done by several iteration steps concerning raw data validation, raw data documentation, representativity, completeness and consistency of modelling with regard to ISO 14040 and 14044.

## Data sources
- 李贵奇. 基于生命周期思想的环境评估模型及其在铝工业中的应用. (中南大学, 2011).
