# Leaching of Rare Earth Elements (REE) Rare Earth Elements (REE);baseline;Rare Earth Elements (REE) containing ore

Dataset: ILCD process, Unit process, single operation
Geography: NMG-CN
Reference year: 2012
Classification: Unit processes / Materials production / Non-energetic raw materials
Functional unit: Not Mentationed
LCI method principle: Attributional
LCI method approaches: Allocation - market value
Generated by: Tao Wang, twang@iue.ac.cn
Owner: Tiangong LCI Data Working Group
Review: Dependent internal review by Tiangong LCI Data Working Group
Amounts: no units in this file; such an amount is in the reference unit of its flow, which a separate flow dataset defines
copyright: false
licenseType: Free of charge for all users and uses

## General comment
The described process is employed in the extraction of rare earth elements (REE) using conventional open-pit mining techniques, including drilling and blasting. The extracted ore, with a concentration of 4.1% rare earth oxides (REO), is used as the raw material for the production of various rare earth products, which are critical for high-tech industries, electronics, magnetic materials such as NdFeB magnets, and other advanced applications. The baselined industrial process specifically relates to the leaching phase, which is a crucial step in the beneficiation and extraction of REE from the mined ore.

## Technology and included processes
Ore is recovered from the open pit mine using conventional surface mining techniques such as drilling and blasting. The mine contains 750 million tons of ore at 4.1% REO

## Reference product
- Rare Earth Oxides: 1; software or database
  LANGUAGE

## Inputs
All rows: software or database
- Sodium carbonate: 1
  Soda ash
- transport in t*km,transport in t*km: 0.53
  lorry >16t
- transport in t*km,transport in t*km: 9.54
  freight, rail
- Hydrochloric acid: 1
- Rare Earth Oxides: 1.77
  LANGUAGE

## Outputs
- water: 0.00756; software or database

## Deviations from the LCI method approaches
In this section, we discuss the life cycle inventory (LCI) in detail. Each subsection discusses one process of the LCA. Section 3.1 describes the conventional method of rare earths in China from mineral sources. Section 3.2 describes the production process used to transform neodymium oxide into an NdFeB magnet. Finally, section 3.3 describes two alternative recycling processes that could be used. Detailed information on the LCI, assumptions, and allocation choices can be found in the Supporting Information.

## Use advice
When utilizing this dataset for life cycle assessment, it is essential to account for the specific LCI of the conventional REE leaching process including conventional surface mining techniques. The user must consider the technological boundaries and assumptions stated in Section 3.1 for accurate REE production modelling. If applying this data to the downstream production of NdFeB magnets, as described in Section 3.2, or to alternative recycling processes, these applications must be accurately reflected in the LCA with corresponding allocations and impacts. Detailed methodological considerations are provided in the Supporting Information document and should be reviewed to ensure completeness and validity of the assessment.

## Review details
Inventory: The internal review was done by several iteration steps concerning raw data validation, raw data documentation, representativity, completeness and consistency of modelling with regard to ISO 14040 and 14044.

## Data sources
- Sprecher, B. et al. Life Cycle Inventory of the Production of Rare Earths and the Subsequent Production of NdFeB Rare Earth Permanent Magnets. Environ. Sci. Technol. 48, 3951–3958 (2014).
