# Vapor Injection Well ; Soil in situ remediation ; Soil Bioventilation ; Vapor Injection Well Construction

Dataset: ILCD process, Unit process, single operation
Geography: CN
Reference year: 2022
Classification: Unit processes / Other Services / Repair and maintenance
Generated by: Wang Ning, wang_ning@caep.org.cn
Owner: Tiangong LCI Data Working Group
Review: Dependent internal review by Tiangong LCI Data Working Group
Amounts: no units in this file; such an amount is in the reference unit of its flow, which a separate flow dataset defines
copyright: false
licenseType: Free of charge for all users and uses

## General comment
Construction of air injection well

## Geography
案例焦化厂位于我国北方中纬度地带

## Technology and included processes
Construction of air injection and extraction wells using materials such as steel, concrete, cement, PVC, etc.

## Technical purpose
The data set represents the construction of vapor injection wells for in situ soil remediation and soil bioventilation. This industrial process is typically applied in environmental engineering for the remediation of contaminated land, particularly in cases where conventional excavation is impractical. The process is ideal for use at sites such as former industrial facilities, chemical/petroleum spills, and other areas affected by soil contamination.

## Reference product
- injection well: 1; measured

## Inputs
- Diesel oil,diesel oil: 0.506; measured
- Polyvinyl chloride: 1000; measured
- Tap Water: 785; measured
- Equipment and Materials Arriving on Site: 1; measured

## Use advice
When utilizing this data set, users should carefully consider the technological applicability pertaining to soil types, contamination levels, and local regulations. The data is specific for the construction phase and may not fully represent operational or end-of-life phases of the well. Ensure that all included materials, such as diesel, water, and PVC, are applicable to the specific site conditions. Methodological considerations should also include the energy inputs for the construction process and potential environmental impacts associated with the use of the specified materials.

## Review details
Inventory: The internal review was done by several iteration steps concerning raw data validation, raw data documentation, representativity, completeness and consistency of modelling with regard to ISO 14040 and 14044.

## Data sources
- 刘文晓等.基于修复效果的污染土壤修复工程环境足迹分析[J].环境科学研究 35,2367-2377（2022）.
