# Cell production ; Diffusion junctioning ; Semiconductor process

Dataset: ILCD process, Unit process, single operation
Geography: CN
Reference year: 2014
Classification: Unit processes / Materials production / Other materials
Functional unit: The functional unit selected for this paper is a 1 kWp
LCI method principle: Attributional
LCI method approaches: Allocation
Generated by: Jinfeng Yang, yjfzfshn@163.com
Owner: Tiangong LCI Data Working Group
Review: Dependent internal review by Tiangong LCI Data Working Group
Amounts: no units in this file; such an amount is in the reference unit of its flow, which a separate flow dataset defines
copyright: false
licenseType: Free of charge for all users and uses

## General comment
Multi-Si

## Geography
Life cycle assessment of mono-Si and multi-Si photovoltaic systems produced in China

## Time period
Available online

## Technology and included processes
The cell production process consists of the following steps: fluffing, diffusion Junctioning, Edge etching, Cleaning, Deposition of reflective layers, Screen printing of upper and lower electrodes, Co-firing to form metal contacts, Cell testing

## Technical purpose
The described industrial process pertains to the production of PV cells for monocrystalline and multi-Si photovoltaic systems. These PV cells are critical components for solar panels, which capture solar energy and convert it into electrical power. This process is specifically used in the manufacturing of photovoltaic cells in China, contributing to the lifecycle of monocrystalline and multi-Si solar energy systems. The final products are implemented in various applications, ranging from residential and commercial solar panel installations to large scale solar farms.

## Reference product
- Multi-Si solar cell,Multi-Si solar cell,Multi-Si solar cell: 1; measured
  Cell

## Inputs
All rows: measured
- Multi-Si wafer,Multi-Si wafer,Multi-Si wafer: 1.06
  silicon wafer
- silver: 0.02
- aluminium: 0.12
  aluminum
- dinitrogen: 3.6
  Nitrogen
- oxygen: 0.18
- Sodium hydroxide: 0.28
  sodium hydroxide
- Hydrochloric acid: 0.08
  hydrochloric acid
- Electricity: 187.2
  Power consumption

## Outputs
All rows: measured
- carbon dioxide (fossil): 57
  CO2
- carbon monoxide,carbon monoxide (fossil): 0.1
  carbon monoxide
- methane (fossil): 0.1
  Methane
- Nitrogen oxides: 0.3
- sulfur dioxide: 0.47
- particles (> PM10),particles (>PM10): 0.9
  dust
- biological oxygen demand: 0.02
- chemical oxygen demand: 0.05
  Cod
- DOC, Dissolved Organic Carbon: 0.01
  DOC
- total organic carbon: 0.02
  TOC

## Deviations from the LCI method approaches
The objective of this paper is to conduct a life cycle assessment of monocrystalline and multi-Si photovoltaic (PV) systems produced in China, and to analyze the methods of disposal and the environmental impacts of different methods of disposal.

## Data selection and combination
Input and output substances refer to Hu Runqing, Diao Zhouwei and Scholten et al.

## Use advice
When using the LCA data set of the PV cell production process, ensure the inclusion of all relevant steps such as fluffing, diffusion junctioning, edge etching, cleaning, deposition of anti-reflective layers, screen printing of electrodes, co-firing, and cell testing. Compare the environmental impacts during disposal by referencing the methodologies and results from Hu Runqing, Diao Zhouwei, and Scholten et al. It is essential to model the use phase behavior accurately for this 1 kWp functional unit and to consider region-specific disposal methods and environmental impacts for the lifecycle assessment.

## Review details
Inventory: The internal review was done by several iteration steps concerning raw data validation, raw data documentation, representativity, completeness and consistency of modelling with regard to ISO 14040 and 14044.

## Data sources
- 李鹞 & 于随然. 中国光伏系统的生命周期评价. 环境工程 32, 119–124 (2014).
