# Biomass Aviation Fuel Gasification Fischer-Tropsch Synthesis;Distillation Upgrading Route

Dataset: ILCD process, Unit process, black box
Geography: CN
Classification: Unit processes / Energy carriers and technologies / Renewable fuels
Functional unit: 1 MJ aviation fuel
LCI method principle: Attributional
LCI method approaches: Allocation - market value
Generated by: Zhang Jingjing, 22110740027@m.fudan.edu.cn
Owner: Tiangong LCI Data Working Group
Review: Dependent internal review by Tiangong LCI Data Working Group
Amounts: no units in this file; such an amount is in the reference unit of its flow, which a separate flow dataset defines
licenseType: Free of charge for all users and uses

## General comment
After pre-treatment operations such as grinding and drying, the biomass enters the gasifier for reaction, and the gasification agent is introduced. The gasification reactor is a circulating fluidized bed furnace. After cooling, the reaction products are separated from exhaust gas and solid impurities, and the synthesized gas obtained is purified and adjusted (mainly for water gas shift reaction) to achieve the optimal hydrogen carbon ratio (H2/CO=2) required for the Fischer Tropsch synthesis reaction. Under the action of a cobalt based catalyst, a Fischer-Tropsch synthesis reaction occurs, separating the reaction products into gas, liquid, and solid phases. The low-carbon components (C1-C4) in the gas phase enter the stacking oligomerization unit for stacking alkylation reaction and olefin polymerization reaction, generating C5+hydrocarbon components and sending them to the hydrogenation isomerization unit to produce the liquid phase alkane components. The unreacted low-carbon hydrocarbons are separated from methane and collected together with methane generated in other stages of the process, The collected methane and carbon dioxide generated during the purification and transformation process enter the methane carbon dioxide reforming unit for hydrogen production reaction, and the generated hydrogen enters the upgrading unit for hydrogenation isomerization and hydrocracking reaction. H2 and CO reflux to the Fischer Tropsch synthesis reactor for cyclic reaction. The liquid phase components of C5-C16 are mixed with C5-C16 liquid alkanes generated by hydrocracking of C16+heavy components after hydroisomerization, and then separated by distillation. The C8-C16 product is output as an aviation oil component, and the C5-C7 product is output as a gasoline component; The C16+heavy component undergoes hydrocracking reaction with hydrogen gas under high temperature environment, producing C5-C16 liquid alkane component, C3-C4 liquefied petroleum gas component (LPG), and unreacted wax phase products. Each link of the quality improvement unit will generate some combustible gases (low-carbon hydrocarbons, H2, CO, etc.), and the separated H2 and CO will enter the Fischer-Tropsch synthesis reactor for re reaction. Some methane will enter the reforming unit for hydrogen production, and the remaining combustible gas will enter the boiler for combustion. The heat released will be partially supplied to the logistics entering the reactor for heating, and some will enter the energy recovery unit for heating water to generate steam for power generation.

## Technical purpose
This biomass-based aviation fuel production process, involving gasification and Fischer-Tropsch synthesis followed by distillation upgrading, is used for converting corn straw, an agricultural waste byproduct of corn cultivation, into high-value aviation fuel and gasoline components. It employs a circular fluidized bed furnace for the gasification of biomass and cobalt-based catalysts for the Fischer-Tropsch reaction, to produce liquid fuels suitable for use as aviation fuel and gasoline after further treatment and separation. Excess gases produced in the process are used for energy recovery and power generation.

## Model description
Build a simulation model of the complete process using Aspen Plus software and perform simulation calculations to obtain the mass flow, energy flow, thermodynamic parameters, and reactor power consumption of each process based on mass balance

## Reference product
- methane (biogenic): 0.017; calculated
  The original article did not distinguish between bio and fossil, but experts judged that this is bio.

## Inputs
All rows: calculated
- oxygen: 0.07
- water: 0.0019
  irrigation water
- Electricity: 0.02448
  Planting consumes electricity
- Electricity: 0.08352
  Baling straw consumes electricity
- Light fuel oil: 0.0073
- zinc oxide: 0.005
- Electricity: 1.476
- water: 6.5

## Outputs
- nitrous oxide: 0.001; calculated
- ammonia: 0.004; calculated
- carbon dioxide (biogenic): 2.55e-9; calculated
  The original article does not distinguish between bio and fossil, and experts judge that this is bio
- waste water - untreated: 0.175; calculated

## Deviations from the LCI method approaches
The corn straw selected in this article is agricultural waste generated during the corn planting process. Therefore, the environmental impact caused by resource investment and pollutant emissions during the planting process needs to be allocated in a certain way. In this article, economic coefficients are used for allocation calculation

## Use advice
When utilizing this dataset for Life Cycle Assessment, ensure proper allocation of environmental impacts from the corn cultivation phase based on economic coefficients. The simulation model constructed with Aspen Plus software should be meticulously reviewed for accurate mass and energy balance assessments, accounting for thermodynamic parameters and power consumption. Care must be taken to accurately model the byproduct utilization, energy recovery and power generation stages for comprehensive LCA application. The results should be contextually matched with real-world processing conditions, considering potential variations in feedstock quality and process efficiency.

## Review details
Inventory: The internal review was done by several iteration steps concerning raw data validation, raw data documentation, representativity, completeness and consistency of modelling with regard to ISO 14040 and 14044.

## Data sources
- 邓玥. 纤维素类生物质气化催化合成制备航空燃油系统的综合评价. (东南大学, 2021).
