# Wet steaming cotton dyeing and finishing processing ; printing and dyeing cotton ; scouring and oxygen bleaching

Dataset: ILCD process, Unit process, single operation
Geography: SZ-JS-CN
Reference year: 2012
Classification: Unit processes / Materials production / Organic chemicals
Generated by: Yingfan Duan, 1300925579@qq.com
Owner: Tiangong LCI Data Working Group
Review: Dependent internal review by Tiangong LCI Data Working Group
Amounts: no units in this file; such an amount is in the reference unit of its flow, which a separate flow dataset defines
copyright: false
licenseType: Free of charge for all users and uses

## General comment
Scouring and bleaching with hydrogen peroxide is a crucial step in the printing and dyeing process, aimed at removing unwanted pigments or impurities from cotton fabric. This process typically involves immersing the cotton fabric in a scouring and bleaching bath containing hydrogen peroxide to ensure effective and efficient bleaching of pigments.

## Geography
The study focuses on a printing and dyeing enterprise in Jiangsu Province, located in Changshu within the Yangtze River Delta Economic Zone.

## Technical purpose
This industrial process refers to wet steaming cotton dyeing and finishing, including printing and dyeing of cotton fabrics as well as scouring and oxygen bleaching. The process uses coal in steam and thermal oil boilers to generate steam and higher operational temperatures. This steam is primarily used in various stages of cotton processing such as scouring and oxygen bleaching, calendaring, napping, width washing, predrying, and squeezing dyeing. The steam facilitates drying of greige fabric in the mentioned processes, with each step generally involving a single drying except for the squeezing dyeing, which requires two drying sessions. The steam consumption is distributed across these stages accordingly.

## Reference product
- Cotton Fabric: 167; measured

## Inputs
- Electricity: 523; measured
- Standard coal: 1960; measured
- Crude coal: 293; calculated
- Cleaned coal: 725; calculated
- Fuel Oil: 6.25; calculated
- heavy fuel oil: 1.88; calculated
- Diesel oil: 8.6; calculated
- Coke Oven Gas: 11.5; calculated
- natural gas: 0.147; calculated
- process steam: 6.3e7; measured
- Hydrogen peroxide: 25; measured
- Stabilizer: 26.7; measured
- Penetrant: 40; measured
- Chelating Agent: 20; measured
- sodium hydroxide: 183; measured
- river water: 34500; measured
- freshwater: 4600; measured

## Outputs
- carbon dioxide (fossil): 5520; calculated
- carbon monoxide (fossil): 0.279; calculated
- sulfur dioxide: 4.15; calculated
- methane (fossil): 27.2; calculated
- Nitrogen oxides: 0.585; calculated
- nitrous oxide: 0.0862; measured
- particles (> PM10): 0.867; calculated
- ammonia: 1.53e-5; measured
- non-methane volatile organic compounds: 0.00825; measured
- waste water - untreated: 31800; measured
- chemical oxygen demand: 36.2; calculated
- Suspended solids, unspecified,Suspended solids, unspecified: 3.93; calculated
- lead: 6.39e-6; calculated
- mercury: 1.34e-7; calculated
- fluorine: 1.21e-6; calculated
- cadmium: 2.37e-7; calculated
- arsenic: 5.47e-6; calculated

## Use advice
When utilizing this data set, it is critical to consider the specific proportions of steam consumption during the cotton dyeing and finishing process. For life cycle assessments, the steam consumption ratio should be reflected as 2:1:1:1:1:2 for the respective processes of scouring and bleaching, calendaring, napping, width washing, predrying, and squeezing dyeing. Users should ensure that energy inputs from coal are accurately accounted for in both the steam and thermal oil boilers, with the consumption ratio between the two types of boilers being 17:1. The data set applies to a dyeing and finishing enterprise located in Changshu within the Yangtze River Delta Economic Zone, and users should consider this regional context when assessing technological applicability and environmental impact.

## Review details
Inventory: The internal review was done by several iteration steps concerning raw data validation, raw data documentation, representativity, completeness and consistency of modelling with regard to ISO 14040 and 14044.

## Data sources
- 朱亚楠. 棉布连续轧染工艺生命周期环境影响评价. (南京大学, 2012).
