# Electricity production by a dam-toe-based small hydropower plant

Dataset: ILCD process, Unit process, single operation
Geography: ZY-GZ-CN
Reference year: 2012
Classification: Unit processes / Energy carriers and technologies / Electricity
Functional unit: the functional unit (FU) is defined to be1 MWh of net electricity produced by the plant
LCI method principle: Attributional
LCI method approaches: Consequential
Generated by: Mingyue Pang, pangmingyue@cqu.edu.cn
Owner: Tiangong LCI Data Working Group
Review: Dependent internal review by Tiangong LCI Data Working Group
Amounts: no units in this file; such an amount is in the reference unit of its flow, which a separate flow dataset defines
copyright: false
licenseType: Free of charge for all users and uses

## General comment
The Guanyinyan small hydropower (SHP) plant serves the purpose of generating clean renewable energy. This specific plant is utilized for the production of electricity through the conversion of kinetic energy from flowing water into mechanical energy, which in turn powers electric generators. The electricity generated by this dam-toe-based plant is significant for the local energy infrastructure as it feeds into the local grid, potentially supporting residential, commercial, and industrial activities in the northwest region of Guizhou Province.

## Geography
The Guanyinyan SHP plant is a typical dam-toe-based project,located on the main stream of the Xishui River (N28° 32′24.89″, E106° 06′ 39.81″) in Chishui City, northwest ofGuizhou Province in China

## Technology and included processes
The main purpose of this projectis to generate electricity. The dam impounds water and forms areservoir with a volume of 1.21E+06 m3 and an average waterhead of 11.75 m. Through a penstock, water descends to theturbines installed in the powerhouse with an average dischargeof 32.2 m3/s, through which the kinetic energy of the flowingwater is converted into mechanical energy to drive the electricgenerators. The plant is composed of two hydro-turbines, eachwith a generating capacity of 1.6 MW. The electricity produced is directed to a transmission line and then integratedinto the local grid after voltage transformation. Finally, theused water is returned to the main channel through a tailrace.Excluding the plant self-supply electricity use, the averageannual net electricity output of the plant to access grid is6.28 GWh, accounting for 57.3 % of the designed output.

## Reference product
- electricity from hydroelectric power plant: 2.2608e7; measured

## Inputs
- (unnamed flow): 5e6; measured
- Steel sections: 240000, 41000, 30000 (3 entries); measured
- Wood: 140; measured
- explosive: 15000; measured
- Diesel: 63000; measured
- Electricity: 1.332e6, 504000 (2 entries); measured
- Stainless steel: 1300; measured
- iron: 730; measured
- aluminium: 54; measured
- copper: 21000; measured
- Steel sections: 4700; measured
  Speed governor
- Steel sections: 480; measured
  Exciter
- Steel sections: 10000; measured
  King valve
- Steel sections: 13000; measured
  Crane
- Steel sections: 22000; measured
  Water gate and screen
- Steel sections: 65000; measured
  Penstock
- Transformer: 9600; measured
- transport in t*km: 590000; measured
- Lubricant oil: 6000; measured
- landfill of ferro metals: 180000, 710, 52, 1300, 21000 (5 entries); estimated

## Use advice
When utilizing this LCA data, users must consider the specific characteristics of the Guanyinyan SHP plant in the context of their assessment. It is essential to account for the regional specificities, such as the local energy mix and geographical considerations that may affect the environmental impact of the hydropower generation. Moreover, users should note that the functional unit for this data set is defined as 1 MWh of net electricity produced by the plant. This will ensure accurate and consistent application in comparative studies. The exclusion of plant self-supply for its own electricity use must also be taken into consideration to avoid double-counting.

## Review details
Inventory: The internal review was done by several iteration steps concerning raw data validation, raw data documentation, representativity, completeness and consistency of modelling with regard to ISO 14040 and 14044.

## Data sources
- Pang M, Zhang L, Wang C, et al. Environmental life cycle assessment of a small hydropower plant in China[J]. The International Journal of Life Cycle Assessment, 2015, 20: 796-806.
