# Rare Earth milling;Rare Earth;In-situ leaching;neodymium iron boron (NdFeB) magnet

Dataset: ILCD process, Unit process, single operation
Geography: NMG-CN
Reference year: 2014
Classification: Materials production / Metals and semimetals
Functional unit: The functional unit is a 1 kg NdFeB magnet
LCI method principle: Attributional
LCI method approaches: Allocation - market value; Allocation - mass
Generated by: Tao Wang, twang@iue.ac.cn
Owner: Tiangong LCI Data Working Group
Review: Dependent internal review by Tiangong LCI Data Working Group
Amounts: no units in this file; such an amount is in the reference unit of its flow, which a separate flow dataset defines
copyright: false
licenseType: Free of charge for all users and uses

## General comment
The industrial process described is involved in the production of neodymium-iron-boron (NdFeB) magnets. These magnets are powerful permanent magnets made from alloys of rare earth elements. NdFeB magnets are widely used in various applications including computer hard disk drives, wind turbine generators, MRI scanners, cordless tool motors, and electric vehicle motors.

## Geography
Bayan Obo (China)

## Technology and included processes
The basic process for Nd and Pr production is the same at all three deposits. It is identical for Nd and Pr except for the last solvent extraction step (SX5) where both are separated.

## Reference product
- Steel: 0.375; input; article inperiodical
  Steel. Bayan Obo: calculation is based on Abrasion inde

## Inputs
- Electricity: 15.12; article inperiodical
  Bayan Obo: calculation with Bond index formula
- Water: 365.8; article inperiodical
  Bayan Obo: production of ore pulp with 40 % milled ore
- transport in t*km,transport in t*km: 0.027; article inperiodical
  Bayan Obo: same distances as in error! Reference source not found
- transport in t*km,transport in t*km: 180.612; article inperiodical
  Bayan Obo: 150 km for the crushed ore

## Deviations from the LCI method approaches
In this study, an allocation method based on the market prices of REOs28 is considered. To estimate uncertainties that refer to the allocation method, a mass-based allocation is undertaken as a sensitivity analysis

## Use advice
When using the LCA data for NdFeB magnet production, it is essential to consider the allocation method based on market prices of rare earth oxides (REOs) as described in the data set. In order to understand the potential impact of allocation methods on the results, users of the data should also consider the results of the sensitivity analysis that employs a mass-based allocation. The provided data is for the unit process of producing 1 kg of NdFeB magnet at the Bayan Obo site in China. Ensure that any comparison of processes or products is made using the same functional unit to maintain consistency.

## Review details
Inventory: The internal review was done by several iteration steps concerning raw data validation, raw data documentation, representativity, completeness and consistency of modelling with regard to ISO 14040 and 14044.

## Data sources
- Marx, J., Schreiber, A., Zapp, P. & Walachowicz, F. Comparative Life Cycle Assessment of NdFeB Permanent Magnet Production from Different Rare Earth Deposits. ACS Sustainable Chem. Eng. 6, 5858–5867 (2018).
