# Glyphosate Production ; Glycine Diacetonitrile Method

Dataset: ILCD process, Unit process, black box
Geography: CN
Reference year: 2009
Classification: Materials production / Organic chemicals
Functional unit: producing 10000 tons glyphosate
Generated by: Kailingli Liao, calinly@163.com
Owner: Tiangong LCI Data Working Group
Review: Dependent internal review by Tiangong LCI Data Working Group
Amounts: no units in this file; such an amount is in the reference unit of its flow, which a separate flow dataset defines
copyright: false
licenseType: Free of charge for all users and uses

## General comment
No flowchart

## Technical purpose
This data set represents the production of glyphosate using the glycine diacetonitrile method. Glyphosate produced by this process is used as a non-selective herbicide for weed control in various agricultural practices. It is effective against a wide range of weed species and is applied in agricultural land, orchards, and non-cropping areas.

## Reference product
- glyphosate: 1e7; measured
  Glyphosate

## Inputs
- Road Transport: 6.7e6
  Automotive/Shipping (ammonium sulfate)
- Road Transport: 9.08e6
  Automotive/Shipping (Glyphosate)
- Road Transport: 1e7
  Automobile (sulfuric acid)
- Road Transport: 70000
  Automotive (Catalyst)
- Road Transport: 880000
  Automobile (auxiliaries)
- Road Transport: 2e6
  Automobile (liquid ammonia)
- Road Transport: 2.6e6
  Automotive (Isopropylamine)
- Pipeline transport: 1.64e7
  Pipes (phosphorus trichloride)
- Pipeline transport: 3.87e7
  Pipeline (liquid alkali)
- Pipeline transport: 6.7e6
  Pipeline (hydrochloric acid)
- Road Transport: 1.2e7
  Automobile (methanol)
- Road Transport: 1.06e7
  Automotive/Shipping (Iminodiacetonitrile)
- Auxiliary: 878000; measured
  Additive, specification: 0.45%
- catalyst: 67000; measured
- Iminodiacetonitrile: 1.0152e7; measured
  Iminodiacetonitrile, specification 93.5%
- sodium hydroxide: 3.8686e7; measured
  Liquid caustic soda, specification 30%
- phosphorus trichloride: 1.6408e7; measured
  Phosphorus trichloride, specification 98%
- methanal: 1.2e7; measured
  Formaldehyde, specification 36.5%
- Hydrochloric Acid: 6.667e6; measured
  Hydrochloric acid, specification 30%
- isopropamide: 2.622e6; measured
  Isopropylamine, specification 0.98%
- Aqueous ammonia: 2e6; measured
  Liquid ammonia, specification 0.997%
- Sulfuric acid(98%): 1e7; measured
  Sulfuric acid, specification 98%
- Water for industrial use: 2e9; measured
  water
- process water: 1.5e10; measured
  Recycled water
- electricity mix: 6.84e7; measured
  electricity
- process steam: 1.1e8; measured
  Steam, MPa
- compressed air: 4.7e6; measured
  Compressed air, 0.5MPa

## Use advice
When utilizing this dataset for life cycle assessment, users should note that the data encompasses the production phase using the glycine diacetonitrile method for manufacturing glyphosate, without detailed process flowcharts. It includes the production of 10000 tons of glyphosate and incorporates partial transportation information. The data may have to be adapted for regional-specific practices and logistics, and the excluded details, such as energy consumption or waste generation, should be modelled using proxy data or additional research where necessary.

## Review details
Inventory: The internal review was done by several iteration steps concerning raw data validation, raw data documentation, representativity, completeness and consistency of modelling with regard to ISO 14040 and 14044.

## Data sources
- 孙丽云. 龙达公司草甘膦扩建项目可行性研究. (中国海洋大学, 2009).
