# Alumina production ; Alumina for metallurgy ; Bauxite ; 2013

Dataset: ILCD process, Unit process, single operation
Geography: CN
Reference year: 2021
Classification: Unit processes / Materials production / Non-energetic raw materials
Generated by: Yuzhen Feng, fyz22
Owner: Tiangong LCI Data Working Group
Review: Dependent internal review by Tiangong LCI Data Working Group
Amounts: no units in this file; such an amount is in the reference unit of its flow, which a separate flow dataset defines
copyright: false
licenseType: Free of charge for all users and uses

## General comment
Alumina produced through this industrial process is intended for use in metallurgy, specifically for the extraction and refining of aluminum from bauxite. The high purity of the alumina is suitable for aluminum smelting processes and the production of aluminum products.

## Time period
Date of publication

## Reference product
- aluminium oxide, metallurgical: 1000; software or database
  alumina

## Inputs
All rows: software or database
- soda ash, dense: 155.18
  soda ash
- Petroleum Coke: 1103.45
  Energy sources proportion of energy consumption is coal: fuel oil: coke: natural gas: coke even gas=46.0%: 11.0%: 7.1%: 14.1%: 21.7%
- coal gas: 3372.51
  (same comment as for Petroleum Coke)
- natural gas, high pressure: 2191.36
  (same comment as for Petroleum Coke)
- fuel oil, unspecified: 1709.57
  (same comment as for Petroleum Coke)
- hard coal: 7149.1
  (same comment as for Petroleum Coke)
- Water, unspecified natural origin: 2.52
  water consumption

## Data selection and combination
The data in this study refers to the LCA data of PA, SA, electricity, and other background data. The PA data were obtained from statistical data sources, and the SA data were mainly obtained from the literatures. The background data were mainly derived from the Chinese localization LCA database CAS RCEES 2018, which was established by the Research Center for Eco-Environmental Sciences, Chinese Academy of Sciences and covers LCA data for energy, materials, transportation, waste management etc.

## Use advice
Users of this LCA data set should note that the data is specific to alumina production for metallurgical applications as of 2013 and is based on Chinese production processes and standards. The data for Process Analysis (PA) and Sensitivity Analysis (SA) are derived from statistical sources and literature, respectively, and should be used accordingly. Users should refer to the CAS RCEES 2018 LCA database for background data, which includes localized Chinese data for energy, materials, transportation, and waste management within the context of a Life Cycle Assessment. Methodological considerations such as the inclusion or exclusion of recycling should be taken into account when applying this data to specific scenarios.

## Review details
Inventory: The internal review was done by several iteration steps concerning raw data validation, raw data documentation, representativity, completeness and consistency of modelling with regard to ISO 14040 and 14044.

## Data sources
- Ding, N., Liu, N., Lu, B. & Yang, J. Life cycle greenhouse gas emissions of aluminum based on regional industrial transfer in China. J. Ind. Ecol. 25, 1657–1672 (2021).
