# Casting ; Casting ; Metal fluids, etc., mold release agents ; All sizes; NESPS2 / 铸造 ; 铸件 ; 金属液等、脱模剂 ; 造型/浇注(重力、低压：限金属型，石膏/陶瓷型/石墨型等) ; 所有规模 ; 全国第二次污染普查数据

Dataset: ILCD process, Unit process, single operation
Geography: CN
Reference year: 2019
Classification: Reference Parameters / Materials production / Metals and semimetals
Generated by: The data was created by the Office of the Second National Pollution Source Census of the Ministry of Ecology and Environment, and the data was organized by the TianGong Plan team for ILCD format / 生态环境部第二次全国污染源普查工作办公室创建数据，天工计划团队常慧敏整理数据为ILCD格式
Owner: Tiangong LCI Data Working Group / 天工LCI数据工作小组
Review: Dependent internal review by Tiangong LCI Data Working Group / 天工LCI数据工作小组
Amounts: no units in this file; such an amount is in the reference unit of its flow, which a separate flow dataset defines
copyright: false
licenseType: Free of charge for all users and uses

## General comment
the treatment technology for the pollution of Exhaust gasdidn't offered，The formula for calculating the actual operation rate (k-value) of the end-of-pipe treatment facility is /

## Technical purpose
该数据集涉及使用金属、石膏、陶瓷和石墨等不同模具材料的金属铸造过程，用以创建各种尺寸的金属铸件。此过程涉及脱模剂和几种末端管控污染管理技术，用来处理颗粒物（PM2.5 - PM10）。适用的技术包括板式静电除尘器、管式过滤、文丘里洗涤、袋式过滤器、喷雾塔/水冲击浴、多管和单筒旋风除尘系统。它通常用于汽车、航空航天、机械和建筑等行业专门铸造金属零件的生产。

## Reference product
- Casting: 1000; calculated
  源文件中描述为为铸件，此处对其进行了匹配工作，将其匹配到LCAflow库里面相最符合的流

## Outputs
All rows: calculated
- particles (PM2.5 - PM10): 0.01235
  the Technical of end-of-pipe management technology for pollution particles (PM2.5 - PM10)isBag filter，Its Technical efficiency of end-of-pipe management95，The formula for calculating the actual operation rate (k-value) of the end-of-pipe treatment facility is /
  污染物指标颗粒物的末端治理技术是袋式除尘，其效率为95，末端治理设施实际运行率（k值）计算公式为k=除尘设备耗电量（千瓦时）/(除尘设备额定功率（千瓦）×除尘设备运行时间（小时）)。原文件中描述污染物类别为废气，污染物指标为颗粒物，此处对其进行了匹配工作，将其匹配到LCAflow库里面相最符合的流
- particles (PM2.5 - PM10): 0.01235
  the Technical of end-of-pipe management technology for pollution particles (PM2.5 - PM10)isPlate electrostatic precipitator，Its Technical efficiency of end-of-pipe management95
  污染物指标颗粒物的末端治理技术是板式，其效率为95，末端治理设施实际运行率（k值）计算公式为k=除尘设备耗电量（千瓦时）/(除尘设备额定功率（千瓦）×除尘设备运行时间（小时）)。原文件中描述污染物类别为废气，污染物指标为颗粒物，此处对其进行了匹配工作，将其匹配到LCAflow库里面相最符合的流
- particles (PM2.5 - PM10): 0.01235
  the Technical of end-of-pipe management technology for pollution particles (PM2.5 - PM10)isTubular filtration，Its Technical efficiency of end-of-pipe management95，The formula for calculating the actual operation rate (k-value) of the end-of-pipe treatment facility is /
  污染物指标颗粒物的末端治理技术是管式，其效率为95，末端治理设施实际运行率（k值）计算公式为k=除尘设备耗电量（千瓦时）/(除尘设备额定功率（千瓦）×除尘设备运行时间（小时）)。原文件中描述污染物类别为废气，污染物指标为颗粒物，此处对其进行了匹配工作，将其匹配到LCAflow库里面相最符合的流
- particles (PM2.5 - PM10): 0.03705
  the Technical of end-of-pipe management technology for pollution particles (PM2.5 - PM10)isSpray tower/water shock bath，Its Technical efficiency of end-of-pipe management85，The formula for calculating the actual operation rate (k-value) of the end-of-pipe treatment facility is /
  污染物指标颗粒物的末端治理技术是喷淋塔/冲击水浴，其效率为85，末端治理设施实际运行率（k值）计算公式为k=除尘设备耗电量（千瓦时）/(除尘设备额定功率（千瓦）×除尘设备运行时间（小时）)。原文件中描述污染物类别为废气，污染物指标为颗粒物，此处对其进行了匹配工作，将其匹配到LCAflow库里面相最符合的流
- particles (PM2.5 - PM10): 0.03705
  the Technical of end-of-pipe management technology for pollution particles (PM2.5 - PM10)isVenturi，Its Technical efficiency of end-of-pipe management85，The formula for calculating the actual operation rate (k-value) of the end-of-pipe treatment facility is /
  污染物指标颗粒物的末端治理技术是文丘里，其效率为85，末端治理设施实际运行率（k值）计算公式为k=除尘设备耗电量（千瓦时）/(除尘设备额定功率（千瓦）×除尘设备运行时间（小时）)。原文件中描述污染物类别为废气，污染物指标为颗粒物，此处对其进行了匹配工作，将其匹配到LCAflow库里面相最符合的流
- particles (PM2.5 - PM10): 0.0741
  the Technical of end-of-pipe management technology for pollution particles (PM2.5 - PM10)isMulti-tube cyclone dust removal，Its Technical efficiency of end-of-pipe management70
  污染物指标颗粒物的末端治理技术是多管旋风，其效率为70，末端治理设施实际运行率（k值）计算公式为k=除尘设备耗电量（千瓦时）/(除尘设备额定功率（千瓦）×除尘设备运行时间（小时）)。原文件中描述污染物类别为废气，污染物指标为颗粒物，此处对其进行了匹配工作，将其匹配到LCAflow库里面相最符合的流
- particles (PM2.5 - PM10): 0.0988
  the Technical of end-of-pipe management technology for pollution particles (PM2.5 - PM10)isSingle cylinder (multiple cylinders in parallel) cyclone，Its Technical efficiency of end-of-pipe management60，The formula for calculating the actual operation rate (k-value) of the end-of-pipe treatment facility is /
  污染物指标颗粒物的末端治理技术是单筒（多筒并联）旋风，其效率为60，末端治理设施实际运行率（k值）计算公式为k=除尘设备耗电量（千瓦时）/(除尘设备额定功率（千瓦）×除尘设备运行时间（小时）)。原文件中描述污染物类别为废气，污染物指标为颗粒物，此处对其进行了匹配工作，将其匹配到LCAflow库里面相最符合的流
- particles (PM2.5 - PM10): 0.247
  the Technical of end-of-pipe management technology for pollution particles (PM2.5 - PM10)isDirect discharge
  污染物指标颗粒物的末端治理技术是直排，末端治理设施实际运行率（k值）计算公式为k=除尘设备耗电量（千瓦时）/(除尘设备额定功率（千瓦）×除尘设备运行时间（小时）)。原文件中描述污染物类别为废气，污染物指标为颗粒物，此处对其进行了匹配工作，将其匹配到LCAflow库里面相最符合的流
- Exhaust gas: 6000
  the treatment technology for the pollution of Exhaust gasdidn't offered，The formula for calculating the actual operation rate (k-value) of the end-of-pipe treatment facility is /
  污染物指标工业废气量的末端治理技术未说明。原文件中描述污染物类别为废气，污染物指标为工业废气量，此处对其进行了匹配工作，将其匹配到LCAflow库里面相最符合的流

## Use advice
This dataset is derived from the Pollution Source Census Report and contains information on pollution emissions and related products. However, it does not include data on energy or chemical consumption, nor does it provide information on waste or co-product generation. When utilizing this dataset, please supplement the missing data based on actual conditions before use
该数据集来源于污染源普查报告，包含污染物排放及相关产品信息，但不包含能源或化学品消耗数据，也不提供废弃物或共生产物产生信息。在使用该数据集时，请根据实际情况补充缺失数据后再使用。

## Review details
Inventory: The internal review was done by several iteration steps concerning raw data validation, raw data documentation, representativity, completeness and consistency of modelling with regard to ISO 14040 and 14044.
清单： 内部审查通过几个迭代步骤完成，涉及原始数据验证、原始数据记录、代表性、完整性、与 ISO 14040 和 14044 有关的建模的一致性。

## Data sources
- 第二次全国污染源普查产排污核算系数手册（试用版）,二级代码33-37文件，在完整版文件中第954页
