# Lithium Carbonate Production ; Battery Grade Lithium Carbonate ; Sulfuric Acid ; Australia Exports Lithium Spodumene Concentrate

Dataset: ILCD process, Unit process, single operation
Geography: SZ-JS-CN
Reference year: 2014
Classification: Unit processes / Materials production / Inorganic chemicals
Generated by: Sun Xin, xs389@cornell.edu
Owner: Tiangong LCI Data Working Group
Review: Dependent internal review by Tiangong LCI Data Working Group
Amounts: no units in this file; such an amount is in the reference unit of its flow, which a separate flow dataset defines
licenseType: Free of charge for all users and uses

## General comment
The functional unit is defined as 1 kg of refined lithium carbonate (Li2CO3) with a purity of 99.9% preparing for Li-ion battery. As it is shown in Fig. 1, the system boundary of rock-based lithium production includes rock mining, transportation, and onsite production processes.To extend the process to natural resources extraction, the upstream processes for producing raw materials are also considered, including spodumene, natural gas, electricity, and additive materials. However, analogous to other LCAs (e.g. Tong et al., 2013), the buildings andinfrastructure are not taken into consideration because of data unavailability.

## Technology and included processes
The onsite process of rock-based lithium consists of eight major steps, including calcining, roasting, leaching, purification, carbonation, drying, air compression, and auxiliary system. In the calcining step, the α-spodumene is produced into the β-spodumene in a rotary kiln at the temperature of 1070–1100 ℃ powered by the pipeline natural gas, before being subsequently cooled down to less than 100 ℃ and grounded into powder. In the sulfating roasting step, the powdered β-spodumene is then mixed well with the concentrated sulfuric acid (98.3%) in another rotary kiln, where it is roasted at the temperature of 250 ℃ powered by pipeline natural gas. Mother liquor leaching at 60 �C is then conducted to extract Li2SO4 into solution, which is further processed at pH 12 by adding NaOH to remove impurities like Fe, Al, Mg, and the residual sulfuric acid. To remove Ca, Na2CO3 is added to react with CaSO4 to precipitate CaCO3 at pH 10. Thereafter, the leach liquor is purified by ion-exchange using HCl (6%).The lithium-rich solution is then carbonated by adding Na2CO3 to precipitate lithium carbonate (Eq. (2)). The solid Li2CO3 is then dissolved in water and reacts with CO2 to generate dissolved LiHCO3 (Eq. (3)), which is afterward treated with steam to obtain purified Li2CO3(Eq. (4)). During the process, steam is used to keep the temperature at 85 �C and the filtering process is conducted to remove the residues.Finally, natural gas is used as an energy source to obtain dried battery-grade Li2CO3 (99.9%) as a main product and sodium sulfate (Na2SO4) as a by-product. At last, the wet product is dried powered by natural gas to generate a final product (Li2CO3 with a purity of 99.9%).The air compression step offers compressed air as a power source. The auxiliary step includes circulating water, dust removing and waste disposal system. The air pollutants from different steps are treated by equipment like cyclone precipitator, electrostatic precipitator, and bag filter, but part of them, like sulfur dioxide, dust and sulfuric acid mist, are still emitted to the atmosphere. The wastewater is collected and neutralized before it is pumped to a centralized sewage treatment plant for further treatment, where it is finally discharged into the Yangtze River. Solid wastes are sold out and reused as building materials.

## Technical purpose
The production of battery-grade lithium carbonate described in this data set involves the sulfuric acid method. The lithium carbonate produced through this process is intended for use in the manufacture of lithium-ion batteries. This high-purity chemical serves as a critical component in the production of electric vehicles, portable electronics, and energy storage systems.

## Reference product
- Lithium carbonate,Lithium carbonate: 1; measured

## Inputs
All rows: measured
- Spodumene concentrate (6% Li2O): 8.67
- Electricity: 13.788
- process steam: 7.77
- Natural gas, at consumer EU-27: 1.36
- water: 49.46
- Sulfuric acid: 3.02
- sodium carbonate: 2.26
- sodium hydroxide: 0.55
- diatomite: 0.06
- hydrogen chloride: 0.18
- Hydrogen peroxide (30%): 0.12
- hydrated lime dry slaked: 0.65
- carbon dioxide (fossil): 0.05

## Outputs
All rows: measured
- municipal solid waste deposition: 13.04
- sodium sulfate: 2.27
- Water: 38.8
- chemical oxygen demand: 0.55
- Suspended solids, unspecified: 0.74
- ammonia: 0.03
- sulphuric acid: 5e-5
- phosphate: 0.003
- sulfur dioxide: 9e-5
- nitrogen dioxide: 0.00131
- particles (PM2.5 - PM10): 0.00053

## Use advice
When using this data set for life cycle assessment, ensure that the scope includes the exportation of lithium spodumene concentrate from Australia as well as the production of lithium carbonate using the sulfuric acid method. It is critical to account for the transportation impacts and the extraction methodology of the spodumene concentrate. Exclude recycling processes in this data set as it focuses on the primary production of battery-grade lithium carbonate.

## Review details
Inventory: The internal review was done by several iteration steps concerning raw data validation, raw data documentation, representativity, completeness and consistency of modelling with regard to ISO 14040 and 14044.

## Data sources
- Jiang, S. et al. Environmental impacts of lithium production showing the importance of primary data of upstream process in life-cycle assessment. Journal of Environmental Management 262, 110253 (2020).
