# Anaerobic-anoxic-oxic (A2/O) | Wastewater | wastewater treatment

Dataset: ILCD process, Unit process, single operation
Geography: CN
Classification: Materials production / Other mineralic materials
Generated by: YU Chenyang, yuchenyang0506@foxmail.com
Review: Dependent internal review by Tiangong LCI Data Working Group
Amounts: no units in this file; such an amount is in the reference unit of its flow, which a separate flow dataset defines

## Geography
17 WWTPs in China

## Reference product
- Wastewater: 1; input; measured

## Inputs
- Electricity: 1.188; measured
- Polyacrylamide: 0.00094; measured
- Polyferric chloride: 0.0858; measured
  Polymeric ferric sulfate

## Outputs
All rows: measured
- chemical oxygen demand: 0.01857
- Biochemical Oxygen Demand: 0.00486
  biochemical oxygen demand
- ammonia: 0.00044
  ammonia nitrogen
- nitrogen, total (excluding N2): 0.00894
- phosphorus, total: 0.0001
- Suspended solids, unspecified: 0.00691
- methane: 0.00354
- nitrous oxide: 0.00031

## Review details
Inventory: The internal review was done by several iteration steps concerning raw data validation, raw data documentation, representativity, completeness and consistency of modelling with regard to ISO 14040 and 14044.

## Data sources
- Understanding the greenhouse gas emissions from China’s wastewater treatment plants: Based on life cycle assessment coupled with statistical data
