# Aluminum electrolysis carbon anode production ; Carbon anode ; Petroleum coke ; 2013

Dataset: ILCD process, Unit process, single operation
Geography: CN
Reference year: 2021
Classification: Unit processes / Materials production / Inorganic chemicals
Generated by: Zimeng Cai, caizm6178@163.com
Owner: Tiangong LCI Data Working Group
Review: Dependent internal review by Tiangong LCI Data Working Group
Amounts: no units in this file; such an amount is in the reference unit of its flow, which a separate flow dataset defines
copyright: false
licenseType: Free of charge for all users and uses

## General comment
This dataset describes the production of carbon anodes using petroleum coke for aluminum electrolysis. Carbon anodes are crucial components in the aluminum smelting process, where they are used to conduct electrical current during the electrolysis of alumina (Al2O3). The high levels of electrical and thermal conductivity of carbon anodes make them suitable for this application. The carbon anodes described are specifically manufactured for the aluminum industry and are not intended for other applications such as fuel cells or battery technology.

## Time period
Date of publication

## Reference product
- anode, for metal electrolysis: 1000; software or database
  anode

## Inputs
All rows: software or database
- electricity, high voltage, aluminium industry: 748.8
  electricty
- heavy fuel oil: 65
  fuel oil
- coal tar: 214
  coal tar pitch
- Petroleum Coke: 1089
  petroleum coak
- coal gas: 1277

## Data selection and combination
The data in this study refers to the LCA data of PA, SA, electricity, and other background data. The PA data were obtained from statistical data sources, and the SA data were mainly obtained from the literatures. The background data were mainly derived from the Chinese localization LCA database CAS RCEES 2018, which was established by the Research Center for Eco-Environmental Sciences, Chinese Academy of Sciences and covers LCA data for energy, materials, transportation, waste management etc.

## Use advice
The LCA data provided should be applied carefully, ensuring that methodological consistency is maintained with the study's base year (2013). Users should note that the Process Analysis (PA) data reflects statistical data sources, while the System Analysis (SA) data is primarily derived from literature. The background data is sourced from the CAS RCEES 2018 Chinese localization LCA database. It is important to reflect on the technological advancements and industry changes since the base year when using this data in current assessments. Additionally, the geographical specificity of the LCA database suggests that these data are most useful for studies concerning the Chinese context. When considering recycling in LCA, users must acknowledge that the data may not include end-of-life considerations, thus recycling processes may need to be modeled separately.

## Review details
Inventory: The internal review was done by several iteration steps concerning raw data validation, raw data documentation, representativity, completeness and consistency of modelling with regard to ISO 14040 and 14044.

## Data sources
- Ding, N., Liu, N., Lu, B. & Yang, J. Life cycle greenhouse gas emissions of aluminum based on regional industrial transfer in China. J. Ind. Ecol. 25, 1657–1672 (2021).
