# Groundwater remediation;In-situ remediation ; Adsorption ; Preparation of adsorbents ; Electrolysis

Dataset: ILCD process, Unit process, single operation
Geography: ID
Reference year: 2022
Classification: Unit processes / Other Services / Repair and maintenance
Generated by: Xiao Meng, xiaomeng@mail.bnu.edu.cn
Owner: Tiangong LCI Data Working Group
Review: Dependent internal review by Tiangong LCI Data Working Group
Amounts: no units in this file; such an amount is in the reference unit of its flow, which a separate flow dataset defines
copyright: false
licenseType: Free of charge for all users and uses

## General comment
The aluminum electrode was dissolved in distilled water with a current density of 195 A/m to prepare AHNP2. The electrolysis process lasted for 2 hours, after which it was stopped and the aluminum hydroxide nanoparticles were allowed to settle at the bottom of the electrochemical reactor. The settled particles (precipitate) were filtered and washed multiple times with distilled water to remove traces of sodium chloride used in the electrochemical cell, in order to increase the conductivity of the electrolyte solution.

## Technical purpose
The process described is used for the production of aluminum hydroxide nanoparticles (AHNP2), which are intended for in-situ groundwater remediation applications. These nanoparticles are designed to adsorb contaminants from groundwater by being directly applied to the contaminated site, hence facilitating the removal of pollutants without the need for pumping out the water.

## Reference product
- Aluminium hydroxide/oxide nanoparticles adsorption (Electrolysis; prepeard; in water): 8.5; measured
  Wet Adsorbent

## Inputs
- Aluminium and aluminium alloy products: 1.05; measured
- Tap Water: 0.015; measured
- sodium chloride: 0.17; measured
- Electricity: 130.392; measured

## Outputs
- Wastewater: 0.0065; measured
  Washed water

## Use advice
When utilizing the dataset for modeling and assessment purposes, ensure all methodology follows best practices for in-situ remediation lifecycle assessment. This includes proper accounting for the production and application of the AHNP2 nanoparticles and the associated energy and material inputs into the system. Attention should be paid to the impact of electrolysis conditions, such as current density and duration, on the properties of the nanoparticles. It is also essential to consider the removal efficiency of the nanoparticles and their fate post-treatment in the environmental impact assessment.

## Review details
Inventory: The internal review was done by several iteration steps concerning raw data validation, raw data documentation, representativity, completeness and consistency of modelling with regard to ISO 14040 and 14044.

## Data sources
- Goyal, H. & Mondal, P. Life cycle assessment (LCA) of the arsenic and fluoride removal from groundwater through adsorption and electrocoagulation: A comparative study. Chemosphere 304, 135243 (2022).
