# Electricity production ; Thermal power ; Guizhou

Dataset: ILCD process, Unit process, single operation
Geography: GZ-CN
Reference year: 2019
Classification: Unit processes / Energy carriers and technologies / Electricity
Generated by: Ruoxi Xiong, xiongrx0126@163.com
Owner: Tiangong LCI Data Working Group
Review: Dependent internal review by Tiangong LCI Data Working Group
Amounts: no units in this file; such an amount is in the reference unit of its flow, which a separate flow dataset defines
copyright: false
licenseType: Free of charge for all users and uses

## General comment
Thermal power generation includes seventeen fossil fuels such as raw coal, washed coal, oil and natural gas. The process only considers the direct power generation process, not the upstream raw material extraction and processing and the downstream power consumption

## Time period
Calculated based on data from the 2019 Energy Statistics Yearbook

## Technical purpose
This industrial process of thermal power generation in Guizhou is used for the production of electricity utilizing a variety of fossil fuels such as raw coal, washed coal, oil, and natural gas. As a part of the energy sector, it serves as a source of electric power for residential, commercial, and industrial purposes. The data set represents only the direct power generation aspect, meaning it is specifically relevant for assessments of the direct environmental impacts of electricity generation without considering upstream mining and processing of raw materials or downstream electricity consumption by end-users.

## Reference product
- electricity for thermal power: 3.6; calculated

## Inputs
All rows: calculated
- Raw coal: 0.329966
- Other Washed Coal: 0.162252
- Gangue, in ground: 0.00747476
- Coke oven gas: 0.001468
- blast furnace gas: 0.01345
- Converter gas: 0.001166
- Diesel: 0.00019214
- natural gas: 0.002511

## Outputs
- carbon dioxide (fossil): 0.752153; calculated
- sulfur dioxide: 0.00016113; calculated
- Nitrogen oxides: 0.000253818; calculated
- particles (> PM10): 3.0899e-5; calculated

## Data treatment and extrapolations
For the accounting method, please refer to the "Enterprise Greenhouse Gas Emissions Accounting Methods and Reporting Guidelines for Power Generation Facilities". Different forms of power generation and fuel consumption come from Chapter 3 (Energy Production) and Chapter 6 (Regional Energy Balance Sheet) in the "China Energy Statistical Yearbook 2020". The fuel parameters such as low calorific value and carbon content per unit calorific value used to calculate the carbon dioxide emission factor come from the "2019 China Regional Power Grid Carbon Dioxide Baseline Emission Factor Calculation Instructions OM" and the "Enterprise Greenhouse Gas Emission Accounting Method and Reporting Guide for Power Generation Facilities" 》

## Use advice
When utilizing this data set for Life Cycle Assessment (LCA), attention must be paid to the boundaries of the included processes. This data set should not be used to calculate impacts related to the extraction and processing of raw materials or downstream usage of electricity. It is tailored for modeling the direct emissions and resource usage associated with thermal power generation only. For methodological consistency, the users should refer to the specified accounting methods in the 'Enterprise Greenhouse Gas Emissions Accounting Methods and Reporting Guidelines for Power Generation Facilities'. Ensure that the energy statistics and emission factors applied are congruent with the 2019 Energy Statistics Yearbook and other referenced Chinese guidelines. Future updates to the methodological guidelines and energy statistics should be considered for maintaining accurate and current LCA results.

## Review details
Inventory: The internal review was done by several iteration steps concerning raw data validation, raw data documentation, representativity, completeness and consistency of modelling with regard to ISO 14040 and 14044.

## Data sources
- 熊若熙. 中国电力生产和消费二氧化碳与污染物排放因子核算. (清华大学, 2023).
